# aluminium oxide factory construction

Dataset: EcoSpold 2, unit process
Geography: RER
Time period: 2002-01-01 to 2019-12-31
Technology level: current
Classification: EcoSpold01Categories: metals/extraction
Classification: ISIC rev.4 ecoinvent: 4100a: Construction of factory buildings for the metal industry
Tags: ConvertedDataset
Scenario: Business-as-Usual
System model: Allocation at the point of substitution
Generated by: Hans-Jörg Althaus
Published in: Althaus H.-J. 2000
Database: ecoinvent
isCopyrightProtected: true
accessRestrictedTo: 1

## General comment
Medium sized plant. Output: 800'000 t/a, life time: 50 years
[This dataset was already contained in the ecoinvent database version 2. It was not individually updated during the transfer to ecoinvent version 3. Life Cycle Impact Assessment results may still have changed, as they are affected by changes in the supply chain, i.e. in other datasets. This dataset was generated following the ecoinvent quality guidelines for version 2. It may have been subject to central changes described in the ecoinvent version 3 change report (http://www.ecoinvent.org/database/ecoinvent-version-3/reports-of-changes/), and the results of the central updates were reviewed extensively. The changes added e.g. consistent water flows and other information throughout the database. The documentation of this dataset can be found in the ecoinvent reports of version 2, which are still available via the ecoinvent website. The change report linked above covers all central changes that were made during the conversion process.]

## Included activities end
Part of the Al2O3 plant needed only for Al2O3 fabrication (= calcination and Al2O3 storage) including disposal

## Geography
Some Swiss datasets are used for European processes.

## Technology
Technology of one medium sized plant in Germany

## Reference product
- aluminium oxide factory: 1 unit; By-product classification allocatable product; CPC 53269: Other constructions for manufacturing
  EcoSpold01Location=RER
  production volume 1.32237 unit
    This is a placeholder value that does not reflect real-world production volumes. This dataset does not currently require a real-world production volume to work in the database framework, and no actual data were collected yet. This has no negative effect on the results of the ecoinvent database. The placeholder value of this activity was scaled according to the nominal GDP of 2005 (source: United Nations, http://data.un.org/Glossary.aspx?q=GDP+%28current+US%24%29, accessed 20130726) to reflect an appropriate share of the global production volume, which is also a placeholder value.
  property price 2.91128e7 EUR2005
    Upscale from EU 27 to the world by PPP (0.8458 in 2003 and 0,8426 in 2004)
  property true value 2.91128e7
    allocation property applied in "true value" allocation // value calculated from revenue

## By-products
- iron scrap, sorted, pressed: 0 kg; By-product classification Recyclable; CPC 39310: Slag, dross, scalings and other waste from the manufacture of iron or steel; pedigree (1,1,1,1,1)
  Iron scrap recovered from this waste.
  production volume 1431.24 kg
  property price 0.175 EUR2005
    Temporary price data. Calculated as 90% of purchasers price based on: 2005 import and export prices (total trades (USD) divided by total weight (kg) in biggest economies of the world: EU27, USA, Brasil, China, India, Japan and Russia) from UN Commodity Trade Statistics Database (http://data.un.org/Explorer.aspxDatabase [Accessed 2011.06.20]). Commodity: Waste or scrap, of cast iron
  property carbon content 0
    carbon content on a dry matter basis (reserved; not for manual entry)
  property true value 20.6274
    allocation property applied in "true value" allocation // value calculated from revenue
  properties: water content 0, water in wet mass 0 kg, carbon content, fossil 0, dry mass 1 kg, carbon content, non-fossil 0, wet mass 1 kg, carbon allocation 0 kg

## Inputs from technosphere
- reinforcing steel: 979999 kg; lognormal variance with pedigree 0.344, pedigree (3,4,5,1,1)
  EcoSpold01Location=RER
  properties: dry mass 1 kg, carbon content, fossil 0.004, wet mass 1 kg
- conveyor belt: 200 m; lognormal variance with pedigree 0.344, pedigree (3,4,5,1,1)
  EcoSpold01Location=RER
  activityLink introduced to establish a direct link to the corresponding regional supply of this product
- concrete, normal: 1420 m3; lognormal variance with pedigree 0.344, pedigree (3,4,5,1,1)
  EcoSpold01Location=CH
  properties: water content 0.086758, dry mass 2190 kg, wet mass 2380 kg
- steel, low-alloyed, hot rolled: 61500 kg; lognormal variance with pedigree 0.344, pedigree (3,4,5,1,1)
  EcoSpold01Location=RER
  properties: dry mass 1 kg, carbon content, fossil 0.005, wet mass 1 kg
  note on carbon content, fossil: Low alloyed steel composition given in Tab. 3.2 ecoinvent v2.2 report 10_partII. Steel assumed to have a C content of 0.5%
- steel, chromium steel 18/8, hot rolled: 40000 kg; lognormal variance with pedigree 0.344, pedigree (3,4,5,1,1)
  EcoSpold01Location=RER
  properties: wet mass 1 kg, dry mass 1 kg, carbon content, fossil 0.0008
  note on carbon content, fossil: Stainless steel model is the grade 304 steel (18/8 stainless, 18% chromium 8% nickel; max. 0.08% C)
- waste reinforced concrete: 0 kg; pedigree (1,1,1,1,1)
  EcoSpold01Location=CH
  production volume 0 kg
    Calculated from the production volume of aluminium oxide factory in proportion to the respective output amounts.
  properties: dry mass 0.99418 kg, wet mass 1 kg, water content 0.00585407
- waste reinforced concrete: -4.04711e6, -42882.2 kg (2 entries); lognormal variance with pedigree 0.344, pedigree (3,4,5,1,1)
  EcoSpold01Location=CH
  production volume 4.09e6 kg

## Inputs from nature
- Transformation, to industrial area [natural resource, land]: 27500 m2; lognormal variance with pedigree 0.1626, pedigree (2,4,5,1,1)
- Transformation, from unspecified [natural resource, land]: 27500 m2; lognormal variance with pedigree 0.162, pedigree (1,4,5,1,1)
- Occupation, industrial area [natural resource, land]: 1.375e6 m2*year; lognormal variance with pedigree 0.0826, pedigree (2,4,5,1,1)

## Sampling procedure
Internet search

## Extrapolations
see Geography

## Review by Roland Hischier 2003-06-10
Passed.
