# gold-silver-zinc-lead-copper mining and benefication

Dataset: EcoSpold 2, unit process
Geography: CA-QC
Time period: 2012-01-01 to 2019-12-31
Technology level: current
Classification: ISIC rev.4 ecoinvent: 0729:Mining of other non-ferrous metal ores
Tags: single enterprise data
Scenario: Business-as-Usual
System model: Allocation at the point of substitution
Share of production covered: 100 %
Generated by: Catherine Reid
Database: ecoinvent
isCopyrightProtected: true
accessRestrictedTo: 1

## Included activities start
From metal containing ore extraction from the ground.

## Included activities end
This activity ends with the benefication of the concentrates and a first refining of the gold-silver ingots.

The dataset includes underground mining, benefication, first refining of the ingots, waste rock piles, tailings ponds and wastewater treatment.

This dataset doesn't include :
- Waste sent to recycling : Paper, cardboard, plastic, glass (3.129E0 kg/kg), batteries (1.865E-1 kg/kg), textiles (5.028E-2 kg/kg)
- Waste sent back to provider for reuse : ink cartridges (1.658E-3 kg/kg)
- Electro-winning : anode and cathode production and infrastructures.

Also, emissions to air and water are limited to what has been measured on site.

## Geography
Inputs and outputs relate to Quebec production.

## Technology
The ore is mined in an underground mine and transported by trucks to the mill for further processing.
The ore is then fed into a series of grinding mills where steel balls grind the ore. Then follows the steps of flotation of copper and zinc, concentrate handling, cyanide destruction and backfilling of the tailings, refining of gold by electro-winning and melting in furnace to produce the gold and silver ingots. 20% of the tailings produce are sent underground to be used as backfill; sulfidic tailing is managed on site in tailings ponds.

## Time period
The dataset represents the activity in 2012

## Parameters
- fraction_PW_to_air: 0.15
  Literature value. In case when no industry/process specific data are available, default evaporation fraction value is used. This value is 15% and is based on literature (Statistics Canada, 2007 & Shaffer, K.H., 2008, Consumptive water use in the Great Lakes Basin, USGS & Shiklomanov, 2003, World Water Resources at the Beginning of the 21st Century) and has been approved by an expert.
- fraction_TW_to_air: 0.15; = fraction_PW_to_air
  Calculated value. See comment in the other parametres present in this dataset. Tap water is considered to be always used as process water, thus process water fractions to air are applied to all tap water input flows to calculate the amount of water consumed in the processes.

## Reference product
- gold-silver, ingot: 0 kg; name PV_ref; CPC 41320: Gold (including gold plated with platinum), unwrought or in semi-manufactured forms, or in powder form; By-product classification allocatable product
  production volume 14478 kg; name PV_Quebec
    Measured Value. Source: questionnaire. Primary data for 2012 gold-silver-zinc-lead-copper mining and benefication in Quebec.
  property carbon content, fossil 0; name PV_ref_C_content_fossil
    fossil carbon content on a dry matter basis
  property carbon content, non-fossil 0; name PV_ref_C_content_non_fossil
    biogene carbon content on a dry matter basis
  property water in wet mass 0 kg; name PV_ref_WWM
  property price 1011 EUR2005; name PV_ref_price_EUR2005
    The price of gold is estimated to be 10600 Euro (Temporary price data. Calculated as 90% of purchasers price based on: Source: ecoinvent v2 report 10-part IX, Tab 2.5). The price of silver is estimated to be 178 Euro (Temporary price data. Calculated as 90% of purchasers price based on: Source: ecoinvent v2 report 10-part IX, Tab 5.10 & 2.5). The amount of gold in this gold-silver ingot is 0.0853kg based on the properties supplied by the data provider. The amount of silver in this gold-ingot is 0.5992kg based on the properties supplied by the data provider.
  property water content 0; name PV_ref_water_content
  property carbon content 0
    carbon content on a dry matter basis (reserved; not for manual entry)
  property true value 1011; name PV_ref_true_value
    allocation property applied in "true value" allocation // value calculated from revenue
  properties: zinc content 0.03155, copper content 0.2524, wet mass 1 kg, dry mass 1 kg, silver content 0.5992, lead content 0.03155, gold content 0.0853, carbon allocation 0 kg
- iron scrap, sorted, pressed: 1 kg; name ironScrap; By-product classification Recyclable; CPC 39310: Slag, dross, scalings and other waste from the manufacture of iron or steel; pedigree (1,1,1,1,1)
  Measured Value. Reported as ferrous metal sent to recovery.
  production volume 848990 kg; = PV_Quebec * (ironScrap / PV_ref)
    Calculated from production volume of reference product using the relative outputs.
  property price 0.175 EUR2005; name ironScrap_price_EUR2005
    Temporary price data. Calculated as 90% of purchasers price based on: 2005 import and export prices (total trades (USD) divided by total weight (kg) in biggest economies of the world: EU27, USA, Brasil, China, India, Japan and Russia) from UN Commodity Trade Statistics Database (http://data.un.org/Explorer.aspxDatabase [Accessed 2011.06.20]). Commodity: Waste or scrap, of cast iron
  property carbon content 0
    carbon content on a dry matter basis (reserved; not for manual entry)
  property true value 10.262; name ironScrap_true_value
    allocation property applied in "true value" allocation // value calculated from revenue
  properties: water content 0, carbon content, non-fossil 0, carbon content, fossil 0, dry mass 1 kg, water in wet mass 0 kg, wet mass 1 kg, carbon allocation 0 kg

## By-products
- zinc concentrate: 0 kg; name zincConcentrate; CPC 14290: Other non-ferrous metal ores and concentrates (other than uranium or thorium ores and concentrates); By-product classification allocatable product; pedigree (1,1,1,1,1)
  Measured Value.
  production volume 8.09899e7 kg; = PV_Quebec * (zincConcentrate / PV_ref)
    Calculated from production volume of reference product using the relative outputs.
  property price 0.38 EUR2005; name zincConcentrate_price_EUR2005
    Temporary price data. Calculated as 90% of purchasers price based on: Zinc content in concentrate 53%. Concentrate price per kg Zn 86.5% of refined Zn price (13.5% treatment charges according to CHR Metals Limited 2005: Dynamic cost curves. http://www.minecost.com/dynamic.pdf). 2004 zinc price from USGS (2007) Mineral commodity summaries 2007. <http://minerals.usgs.gov/minerals/pubs/mcs/2007/mcs2007.pdf> [Accessed 25 May 2010]
  property carbon content 0
    carbon content on a dry matter basis (reserved; not for manual entry)
  property true value 2125.72; name zincConcentrate_true_value
    allocation property applied in "true value" allocation // value calculated from revenue
  properties: dry mass 1 kg, zinc content 0.5613, water in wet mass 0 kg, wet mass 1 kg, carbon content, non-fossil 0, gold content 3.19e-6, carbon content, fossil 0, water content 0, silver content 0.0001742, carbon allocation 0 kg
- copper concentrate, sulfide ore: 0 kg; name copperConcentrate; By-product classification allocatable product; CPC 14290: Other non-ferrous metal ores and concentrates (other than uranium or thorium ores and concentrates); pedigree (1,1,1,1,1)
  Measured Value.
  production volume 3.79179e7 kg; = PV_Quebec * (copperConcentrate / PV_ref)
    Calculated from production volume of reference product using the relative outputs.
  property price 0.534 EUR2005; name copperConcentrate_price_EUR2005
    Temporary price data. Calculated as 90% of purchasers price based on: Concentrate per kg Cu (3.15). Concentrate price per kg Cu 77% of refined Cu price (23% treatment and refining charges according to Barr G, Defreyne J, Jones D, Mean R (2005). On-site processing vs. sale of copper concentrates. Perth: CESL. http://www.cesl.com/DocumentViewer.aspx?elementId=152856&portalName=tc ). 2004 copper price from USGS (2007) Mineral commodity summaries 2007. <http://minerals.usgs.gov/minerals/pubs/mcs/2007/mcs2007.pdf> [Accessed 25 May 2010]
  property carbon content 0
    carbon content on a dry matter basis (reserved; not for manual entry)
  property true value 1398.55; name copperConcentrate_true_value
    allocation property applied in "true value" allocation // value calculated from revenue
  properties: wet mass 1 kg, water in wet mass 0 kg, copper content 0.1188, zinc content 0.0415, carbon content, fossil 0, dry mass 1 kg, gold content 7.969e-5, water content 0, carbon content, non-fossil 0, lead content 0.07146, silver content 0.00108, carbon allocation 0 kg
- lead concentrate: 0 kg; name leadConcentrate; By-product classification allocatable product; CPC 14290: Other non-ferrous metal ores and concentrates (other than uranium or thorium ores and concentrates); pedigree (1,1,1,1,1)
  Measured Value.
  production volume 2.09641e6 kg; = PV_Quebec * (leadConcentrate / PV_ref)
    Calculated from production volume of reference product using the relative outputs.
  property price 0.376 EUR2005; name leadConcentrate_price_EUR2005
    Temporary price data. Calculated as 90% of purchasers price based on: Lead content in concentrate 55%. Concentrate price per kg Pb 86.5% of refined Pb price (13.5% treatment charges according to CHR Metals Limited 2005: Dynamic cost curves. http://www.minecost.com/dynamic.pdf). 2004 lead price from USGS (2007) Mineral commodity summaries 2007. <http://minerals.usgs.gov/minerals/pubs/mcs/2007/mcs2007.pdf> [Accessed 25 May 2010]
  property concentration, lead 0 kg/kg
    Calculated based on information from the zinc-lead mine operation dataset.
  property carbon content 0
    carbon content on a dry matter basis (reserved; not for manual entry)
  property true value 54.4448; name leadConcentrate_true_value
    allocation property applied in "true value" allocation // value calculated from revenue
  properties: lead content 0.5347, water content 0, silver content 0.003829, carbon content, fossil 0, water in wet mass 0 kg, gold content 0.0002174, dry mass 1 kg, wet mass 1 kg, copper content 0.04562, carbon content, non-fossil 0, carbon allocation 0 kg
- electricity, for reuse in municipal waste incineration only: 0 kWh; CPC 17100: Electrical energy; By-product classification allocatable product; pedigree (1,1,1,1,1)
  Net electricity generated from this waste and used in internal MSWI plant energy redistribution.
  Uncertainty: uncertainty is calculated from uncertainties in waste composition and uncertainties in energy efficiency and the uncertainty in internal energy demand
  production volume 18560.5 kWh
  property true value relation 3.6; name E_el_prod_MSWI_true_value_relation
    property to calculate "true value" from
  property price 0.1 EUR2005; name E_el_prod_MSWI_price_EUR2005
    Estimated to be the same price as in case of electricity, medium voltage.
  property exergy 3.6 MJ; name E_el_prod_MSWI_exergy
    This exergy property is based on the exergy content of the product.
  property true value 0.16528
    allocation property applied in "true value" allocation // value calculated from true value relation
- heat, for reuse in municipal waste incineration only: 0 MJ; CPC 17300: Steam and hot water; By-product classification allocatable product; pedigree (1,1,1,1,1)
  (same comment as for electricity, for reuse in municipal waste incineration only)
  production volume 134110 MJ
  property exergy 0.1842 MJ; name E_th_prod_MSWI_exergy
    This exergy property is based on the exergy content of the product.
  property price 0.0106 EUR2005; name E_th_prod_MSWI_price_EUR2005
    Average European district heat price from Ecoheatcool and Euroheat 2005-2006, Ecoheat Work package 1: The European heat market. Final report. 10.6 EUR/GJ i s the price of district heat. http://www.solarthermalworld.org/files/Ecoheatcool%20WP1%20Web.pdf?download
  property true value relation 0.1842; name E_th_prod_MSWI_true_value_relation
    property to calculate "true value" from
  property true value 0.0611057
    (same comment as for electricity, for reuse in municipal waste incineration only)
- lead: 0 kg; CPC 41441: Lead, unwrought; By-product classification allocatable product
  EcoSpold01Location=SE
  production volume 7.40922 kg
  property price 0.744 EUR2005
    Temporary price data. Calculated as 90% of purchasers price based on: Source: ecoinvent v2 report 10-part IX, Tab 5.10 & 2.5
  property carbon content 0
    carbon content on a dry matter basis (reserved; not for manual entry)
  property true value 0.000380748
    allocation property applied in "true value" allocation // value calculated from revenue
  properties: wet mass 1 kg, water content 0, carbon content, non-fossil 0, carbon content, fossil 0, dry mass 1 kg, water in wet mass 0 kg, carbon allocation 0 kg
- copper: 0 kg; By-product classification allocatable product; CPC 41413: Refined copper and copper alloys, unwrought; master alloys of copper
  EcoSpold01Location=SE
  production volume 109.759 kg
  property price 5.52 EUR2005
    Literature value (http://www.economist.com/news/business/21576714-mining-industry-has-enriched-chile-its-future-precarious-copper-solution). Average price between 20015 and 2013.
  property carbon content 0
    carbon content on a dry matter basis (reserved; not for manual entry)
  property true value 0.0418475
    allocation property applied in "true value" allocation // value calculated from revenue
  properties: water content 0, water in wet mass 0 kg, carbon content, fossil 0, carbon content, non-fossil 0, dry mass 1 kg, wet mass 1 kg, carbon allocation 0 kg
- nickel, 99.5%: 0 kg; CPC 41422: Unwrought nickel; By-product classification allocatable product
  EcoSpold01Location=SE
  production volume 15.4666 kg
  property price 10.4 EUR2005
    Temporary price data. Calculated as 90% of purchasers price based on: 2004 nickel price from USGS (2007) Mineral commodity summaries 2007. <http://minerals.usgs.gov/minerals/pubs/mcs/2007/mcs2007.pdf> [Accessed 25 May 2010]
  property carbon content 0
    carbon content on a dry matter basis (reserved; not for manual entry)
  property true value 0.0111101
    allocation property applied in "true value" allocation // value calculated from revenue
  properties: water in wet mass 0 kg, wet mass 1 kg, carbon content, non-fossil 0, dry mass 1 kg, water content 0, carbon content, fossil 0, carbon allocation 0 kg
- silver: 0 kg; CPC 41310: Silver (including silver plated with gold or platinum), unwrought or in semi-manufactured forms, or in powder […]; By-product classification allocatable product; CAS 7440-22-4
  EcoSpold01Location=SE
  production volume 2.55415 kg
  property price 178 EUR2005
    (same comment as for lead)
  property carbon content 0
    carbon content on a dry matter basis (reserved; not for manual entry)
  property true value 0.031402
    allocation property applied in "true value" allocation // value calculated from revenue
  properties: wet mass 1 kg, carbon content, non-fossil 0, dry mass 1 kg, water content 0, carbon content, fossil 0, water in wet mass 0 kg, carbon allocation 0 kg
- palladium: 0 kg; CPC 4160: Other non-ferrous metals and articles thereof (including waste and scrap of some metals); cermets and articles […]; By-product classification allocatable product
  EcoSpold01Location=SE
  production volume 0.141389 kg
  property price 5640 EUR2005
    Temporary price data. Calculated as 90% of purchasers price based on: 2004 price from USGS (2007) Mineral commodity summaries 2007. <http://minerals.usgs.gov/minerals/pubs/mcs/2007/mcs2007.pdf> [Accessed 25 May 2010]
  property carbon content 0
    carbon content on a dry matter basis (reserved; not for manual entry)
  property true value 0.0550789
    allocation property applied in "true value" allocation // value calculated from revenue
  properties: wet mass 1 kg, carbon content, fossil 0, water in wet mass 0 kg, water content 0, carbon content, non-fossil 0, dry mass 1 kg, carbon allocation 0 kg
- gold: 0 kg; CPC 41320: Gold (including gold plated with platinum), unwrought or in semi-manufactured forms, or in powder form; By-product classification allocatable product; CAS 7440-57-5
  EcoSpold01Location=SE
  production volume 0.077537 kg
  property price 10600 EUR2005
    Temporary price data. Calculated as 90% of purchasers price based on: Source: ecoinvent v2 report 10-part IX, Tab 2.5
  property carbon content 0
    carbon content on a dry matter basis (reserved; not for manual entry)
  property true value 0.0567684
    allocation property applied in "true value" allocation // value calculated from revenue
  properties: wet mass 1 kg, carbon content, fossil 0, dry mass 1 kg, carbon content, non-fossil 0, water content 0, water in wet mass 0 kg, carbon allocation 0 kg
- iron scrap, unsorted: 0 kg; source European Aluminium Association 2008; CPC 39310: Slag, dross, scalings and other waste from the manufacture of iron or steel; By-product classification Recyclable; pedigree (1,1,1,1,1)
  production volume 7.50296 kg
  property price 0.149 EUR2005; name ironScrapAmount_price_EUR2005
    Temporary price data. Calculated as 90% of purchasers price based on: estimated at 85% of sorted scrap
  property carbon content 0
    carbon content on a dry matter basis (reserved; not for manual entry)
  property true value 7.72165e-5
    allocation property applied in "true value" allocation // value calculated from revenue
  properties: water in wet mass 0 kg, water content 0, carbon content, fossil 0, carbon content, non-fossil 0, dry mass 1 kg, wet mass 1 kg, carbon allocation 0 kg
- aluminium oxide, non-metallurgical: 0 kg; source European Aluminium Association 2008; CPC 41432: Alumina (aluminium oxide), except artificial corundum; By-product classification allocatable product; CAS 1344-28-1; pedigree (1,1,1,1,1)
  production volume 472.133 kg
  property carbon content, non-fossil 0; name C_content_non_fossil
  property price 0.28 EUR2005; name Al2O3Amount_price_EUR2005
    From UN trade database. http://data.un.org/ Import data from the largest economies of the world are used (Brazil, India, USA, China, Japan and EU-27).
  property dry mass 1 kg; name DM
  property water content 0; name water_content
  property wet mass 1 kg; name WM
  property water in wet mass 0 kg; name WWM
  property carbon content, fossil 0; name C_content_fossil
  property carbon content 0
    carbon content on a dry matter basis (reserved; not for manual entry)
  property true value 0.0091309
    allocation property applied in "true value" allocation // value calculated from revenue
  properties: carbon allocation 0 kg
- aluminium, cast alloy: 0 kg; source European Aluminium Association 2008; By-product classification allocatable product; CPC 41431: Unwrought aluminium; pedigree (1,1,1,1,1)
  EcoSpold01Location=RER
  production volume 4413.39 kg
  property price 1.3 EUR2005; name castAlloyAmount_price_EUR2005
    Temporary price data. Calculated as 90% of purchasers price based on: Source: London Metal Exchange, Aluminium alloy price for 2005
  property carbon content 0
    carbon content on a dry matter basis (reserved; not for manual entry)
  property true value 0.396285
    allocation property applied in "true value" allocation // value calculated from revenue
  properties: water in wet mass 0 kg, carbon content, non-fossil 0, water content 0, dry mass 1 kg, carbon content, fossil 0, wet mass 1 kg, carbon allocation 0 kg
- aluminium, wrought alloy: 0 kg; source European Aluminium Association 2008; By-product classification allocatable product; CPC 4153: Semi-finished products of aluminium or aluminium alloys; pedigree (1,1,1,1,1)
  production volume 1932.1 kg
  property price 1.44 EUR2005; name secondaryAluminiumOutput_price_EUR2005
    Estimated based on literature values and expert judgement. Aluminium ccast alloys are about 90% of the price of aluminium wrought alloys.
  property carbon content 0
    carbon content on a dry matter basis (reserved; not for manual entry)
  property true value 0.192169
    allocation property applied in "true value" allocation // value calculated from revenue
  properties: wet mass 1 kg, water content 0, carbon content, fossil 0, water in wet mass 0 kg, carbon content, non-fossil 0, dry mass 1 kg, carbon allocation 0 kg

## Inputs from technosphere
- diesel, low-sulfur: 0.000155374 kg; lognormal variance with pedigree 0.0032, pedigree (2,1,3,1,1)
  Calculated Value. It is assume that the given amount represented the complecte explosive, i.e. 94% ammonium nitrate and 6% petrol.
  Assumption : diesel low sulfur.
  properties: wet mass 1 kg, carbon content, fossil 0.865, dry mass 1 kg
- chemical, inorganic: 0.000288688 kg; lognormal variance with pedigree 0.0026, pedigree (1,1,3,1,1)
  Measured Value. Stands for Collector (3418-A) - aérophine (91%); Collector (KAX-51) - xantate (3%); lead nitrate (6%, for Merill-Crowe process).
  properties: dry mass 1 kg, carbon content, fossil 0.003, wet mass 1 kg
  note on carbon content, fossil: This dataset is an unweighted average of 20 inorganic substances (listed in Tab 88.1, ecoinvent v2.2 report 8, part II), being part of the top100 chemicals included in this database. The C-content has also been calculated as an unweighted average of the C content of the substances composing this dataset.
- waste wood, untreated: -0.000961151 kg; name wasteWood; lognormal variance with pedigree 0.0026, pedigree (1,1,3,1,1)
  Measured Value. Reported as wood sent to recovery.
  production volume 365859 kg; = PV_Quebec * (wasteWood / PV_ref)
    Calculated from production volume of reference product using the relative outputs.
  property net heating value 0 MJ/kg; name LHV_wastewood
  property price 0 EUR2005; name wasteWood_price_EUR2005
  properties: water content 0.25, carbon content, non-fossil 0.48632, wet mass 1 kg, dry mass 0.8 kg
  note on net heating value: Literature value. Ecoinvent dataset 'treatment of waste wood, untreated, municipal incineration/CH'. Accessed on 25.09.2017
- synthetic rubber: 2.88992e-6 kg; lognormal variance with pedigree 0.0026, pedigree (1,1,3,1,1)
  Measured Value. Reported as rubber protective coating for pumps (amount for grinders not known).
  properties: carbon content, fossil 0.871949, dry mass 1 kg, wet mass 1 kg
  note on carbon content, fossil: EPDM (Ethylene-propene-diene terpolymer) rubber is a terpolymer of ethylene, propene, and a diene with the residual unsaturated portion of the diene in the side chain (ecoinvent v2.2 report 7-part XX & Ullmann). Chemical formula (deduced from Evidences of Solvent-Induced Miscibility in Polychloroprene-co-Ethylene-Propene Diene Terpolymer Blends, Dubey et al., Journal of Applied Polymer Science, 2009, 111:1884–1891): C20H35
- fatty alcohol: 8.28788e-5 kg; lognormal variance with pedigree 0.0026, pedigree (1,1,3,1,1)
  Measured Value. Reported as Oil-based anti-foaming agent. Stands for CC-5428 (77%), Nalco 7810 (7%) and CC-7425/76 (16% ; for wastewater treatment).
  properties: carbon content, fossil 0.0408973, carbon content, non-fossil 0.743434, wet mass 1 kg, dry mass 1 kg
- electronics scrap: -1.21637e-6 kg; name electronicsScrap; lognormal variance with pedigree 0.0026, pedigree (1,1,3,1,1)
  Measured Value. Reported as computer equipement sent to recovery.
  production volume 463.006 kg; = PV_Quebec * (electronicsScrap / PV_ref)
    Calculated from production volume of reference product using the relative outputs.
  property price 16.1 EUR2005; name electronicsScrap_price_EUR2005
  properties: wet mass 1 kg, dry mass 1 kg
- lubricating oil: 5.72765e-6 kg; = input_lubricatingOil*density_lubricatingOil; lognormal variance with pedigree 0.002, pedigree (1,1,3,1,1)
  Calculated value. Reported as 'grease and oils'. See parameters exchanges properties for details.
  Uncertainty: C
  property density 0.89 kg/l; name density_lubricatingOil
  property input 0.1692 l; name input_lubricatingOil
  properties: carbon content, fossil 0.75, dry mass 1 kg, wet mass 1 kg
  note on density: Literature Value taken from MSDS obtained from data provider.
  note on carbon content, fossil: Lubricating oil is produced from diesel. C-content/dry mass of fats and oils considered 75%, from: ecoinvent v2.2 report, n 15a, pg 40
- aluminium sulfate, powder: 0.000403554 kg; lognormal variance with pedigree 0.0026, pedigree (1,1,3,1,1)
  Measured Value. Used for wastewater treatment.
  properties: wet mass 1 kg, dry mass 1 kg
- waste mineral oil: -0.00056498 kg; name wasteMineralOil; = (wasteMineralOil_output*density_lubricatingOil)*-1; lognormal variance with pedigree 0.002, pedigree (1,1,3,1,1)
  Calculated Value. See parameters exchanges properties for details.
  Uncertainty: C
  production volume 215058 kg; = PV_Quebec * (wasteMineralOil / PV_ref)
    Calculated from production volume of reference product using the relative outputs.
  property net heating value 0 MJ/kg; name LHV_wasteoil
  property price 0 EUR2005; name wasteMineralOil_price_EUR2005
  property input 16.69 l; name wasteMineralOil_output
  properties: wet mass 1 kg, water content 0.111111, dry mass 0.9 kg, carbon content, fossil 0.864444
  note on net heating value: Literature value. Ecoinvent dataset 'treatment of waste mineral oil, hazardous waste incineration/CH'. Accessed on 25.09.2017
  note on carbon content, fossil: Tab A.6, ecoinvent v2.2 report 13_I. C content has been calculated after data in the tables, and then referred to 1 kg DM
- copper sulfate: 0.00072267 kg; lognormal variance with pedigree 0.0026, pedigree (1,1,3,1,1)
  Measured Value.
  properties: wet mass 1 kg, dry mass 1 kg
- phosphoric acid, industrial grade, without water, in 85% solution state: 7.10118e-5 kg; lognormal variance with pedigree 0.0026, pedigree (1,1,3,1,1)
  Measured Value. Used for wastewater treatment. The amount is the active agent only. It is used in a 85% solution.
  properties: wet mass 1 kg, dry mass 1 kg
- municipal solid waste: -0.000964574 kg; name municipalSolidWaste; lognormal variance with pedigree 0.0026, pedigree (1,1,3,1,1)
  Measured Value. Reported as domestic waste sent to landfill.
  production volume 367162 kg; = PV_Quebec * (municipalSolidWaste / PV_ref)
    Calculated from the production volume of copper in proportion to the respective output amounts.
  properties: water content 0.297017, wet mass 1 kg, dry mass 0.771 kg, carbon content, non-fossil 0.261655, carbon content, fossil 0.171549
  note on carbon content, non-fossil: MSW composition in tab 4.1, ecoinvent v2.2 report 13_I. C content referred to 1 kg DM
- zinc monosulfate: 0.00216459 kg; lognormal variance with pedigree 0.0026, pedigree (1,1,3,1,1)
  Measured Value.
  properties: dry mass 1 kg, wet mass 1 kg
- lime, hydrated, loose weight: 0.00459846 kg; lognormal variance with pedigree 0.0026, pedigree (1,1,3,1,1)
  Measured Value. Used for wastewater treatment.
  properties: wet mass 1 kg, dry mass 0.997 kg, water content 0.00300903
- borax, anhydrous, powder: 0.000411542 kg; lognormal variance with pedigree 0.0026, pedigree (1,1,3,1,1)
  Measured Value. Used as Fluxing agent.
  properties: dry mass 1 kg, wet mass 1 kg
- chromium: 0.00139742 kg; lognormal variance with pedigree 0.0032, pedigree (2,1,3,1,1)
  Calculated Value. Different types of steel balls are used. The only available composition contains 15% chromium. We hence assume a composition of 15% chromium and 85% steel for all balls.
  properties: wet mass 1 kg, dry mass 1 kg
- polyacrylamide: 4.30559e-5 kg; lognormal variance with pedigree 0.0026, pedigree (1,1,3,1,1)
  Measured Value reported as Floculant (Flomin 905MC). Sum of three uses : 1) 9% of total for concentrate handling, 2) 69% of total for backfilling and 3) 22% of total for wastewater treatment.
  properties: wet mass 1 kg, carbon content, fossil 0.51, dry mass 1 kg
- hydrogen peroxide, without water, in 50% solution state: 0.00741307 kg; lognormal variance with pedigree 0.0026, pedigree (1,1,3,1,1)
  Measured Value. For wastewater treatment - Amount is active agent only, to be used in a 70% solution (around 1/3) and a 50% solution.
  properties: dry mass 1 kg, wet mass 1 kg
- carboxymethyl cellulose, powder: 0.00126543 kg; lognormal variance with pedigree 0.0026, pedigree (1,1,3,1,1)
  Measured Value. Used for the Merill-Crowe process (gold recovery).
  properties: carbon content, fossil 0.0979592, wet mass 1 kg, dry mass 1 kg, carbon content, non-fossil 0.293878
- cement, Portland: 0.0823083 kg; lognormal variance with pedigree 0.0026, pedigree (1,1,3,1,1)
  Measured Value. Extrapolation for ciment type10 (60%) and ciment type 50 (40%).
  properties: wet mass 1 kg, dry mass 1 kg
- quicklime, milled, loose: 0.0116122 kg; lognormal variance with pedigree 0.0026, pedigree (1,1,3,1,1)
  Measured Value. Reported as quicklime, loose. Assumption : milled.
  Sum of three uses : 1) 56% of total for the Merill-Crowe process (gold recovery), 2) 4% of total for backfilling and 3) 40% of total for wastewater treatment.
  properties: water content 0.010101, wet mass 1 kg, dry mass 0.99 kg
- mine infrastructure, underground, non-ferrous metal: 5.25267e-11 unit; lognormal variance with pedigree 0.304, pedigree (3,1,3,1,1)
  Extrapolation based on mine life time of the underground mine dataset which is 50 years. This extrapolation is validated based on the area of buildings. The dataset for the 'lead-copper-zinc-silver-gold' mine infrastructure is based on an open-pit mine, hence not representative for this underground mine
- manganese dioxide: 0.000140997 kg; lognormal variance with pedigree 0.0032, pedigree (2,1,3,1,1)
  Calculated Value. Used as oxydising agent. The amount is given for all 4 agents together (silica sand, manganese dioxide, soda ash, sodium nitrate - we assume 25% of each).
  property molecular weight 0 g/mol; name manganese_dioxide_output_MW
  properties: wet mass 1 kg, dry mass 1 kg
- steel, unalloyed: 0.00791894 kg; lognormal variance with pedigree 0.0032, pedigree (2,1,3,1,1)
  (same comment as for chromium)
  properties: carbon content, fossil 0.0025, dry mass 1 kg, wet mass 1 kg
- heat, district or industrial, natural gas: 0.406374 MJ; = fuel_input_naturalgas*Net_heat_value_naturalgas/fuel_use_naturalgas; lognormal variance with pedigree 0.002, pedigree (1,1,3,1,1)
  Calculated value based on reported fuel input (in m³), the Net Heating Value of the fuel and assumed efficiency (1/Fuel_use).
  See parameters exchanges properties for details.
  Uncertainty: C
  property fuel input in physical units, m3 308 m3; name fuel_input_naturalgas
  property Corresponding fuel use 1.04645 MJ; name fuel_use_naturalgas; = (0.98039+1.0417+1.0526+1.1111)/4
  property heating value, net 36.3 MJ; name Net_heat_value_naturalgas
  note on Corresponding fuel use: Calculated value. Lower heating value of the fuel input related to the heat/electricity output. Calculated with corresponding heat production datasets.
  note on heating value, net: Literature value.Net (lower) heating (calorific) value. Value Taken from Table 5.1 of report 'Overview and methodology, Data quality guideline for the ecoinvent database version 3' (ecoinvent report No. 1 (v3), 2011)
- silica sand: 0.000140997 kg; lognormal variance with pedigree 0.0032, pedigree (2,1,3,1,1)
  (same comment as for manganese dioxide)
  properties: wet mass 1 kg, dry mass 0.99 kg, water content 0.010101
- soap: 8.60358e-5 kg; lognormal variance with pedigree 0.0026, pedigree (1,1,3,1,1)
  Measured Value reported as Foaming agent MIBC.
  properties: wet mass 1 kg, water content 0.149425, carbon content, non-fossil 0.692237, dry mass 0.87 kg
- zinc: 0.00106156 kg; lognormal variance with pedigree 0.0026, pedigree (1,1,3,1,1)
  Measured Value. Used for the Merill-Crowe process (gold recovery).
  properties: wet mass 1 kg, dry mass 1 kg
- sulfur dioxide, liquid: 0.00217562 kg; lognormal variance with pedigree 0.0026, pedigree (1,1,3,1,1)
  Measured Value.
  properties: dry mass 1 kg, wet mass 1 kg
- sulfidic tailings, generic: -4.57945 kg; name sulfidicTailing; lognormal variance with pedigree 0.0026, pedigree (1,1,3,1,1)
  Measured Value. 20% is sent underground to be used as backfill (excluded from the amount); sulfidic tailing is managed on site.
  production volume 1.74315e9 kg; = PV_Quebec * (sulfidicTailing / PV_ref)
    (same comment as for municipal solid waste)
  property price 0 EUR2005; name sulfidicTailing_price_EUR2005
  properties: magnesium content 0.0022359, silicon content 0.053273, oxygen content 0.89157, aluminium content 0.014738, dry mass 0.7 kg, wet mass 1 kg, water content 0.428571, carbon content, fossil 0.0087785, sodium content 0.0014472, iron content 0.015374, potassium content 0.0025181, calcium content 0.0045972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
- oxygen, liquid: 0.00541242 kg; lognormal variance with pedigree 0.0026, pedigree (1,1,3,1,1)
  Measured Value.
  properties: dry mass 1 kg, wet mass 1 kg
- soda ash, dense: 0.00356505 kg; lognormal variance with pedigree 0.0026, pedigree (1,1,3,1,1)
  Calculated Value for the first use and Measured Value for the second use. Sum of two uses : 1) 4% of total for oxydising agent - the amount is given for all 4 agents together (silica sand, manganese dioxide, soda ash, sodium nitrate - we assume 25% of each), 2) 96% of total for wastewater treatment.
  properties: carbon content, fossil 0.113208, dry mass 1 kg, wet mass 1 kg
- diesel, burned in building machine: 0.457547 MJ; = fuel_input_diesel_buildingmachine*density_diesel_buildingmachine*UnitConversion(1, 'm3', 'l')*Net_heat_value_diesel_buildingmachine; lognormal variance with pedigree 0.002, pedigree (1,1,3,1,1)
  Calculated value. See parameters exchanges properties for details.
  Uncertainty: C
  property density 0.84 kg/l; name density_diesel_buildingmachine
  property heating value, net 42.8 MJ; name Net_heat_value_diesel_buildingmachine
  property fuel input in physical units, m3 0.3346 m3; name fuel_input_diesel_buildingmachine
  note on density: Density value. Value Taken from Table 5.1 of report 'Overview and methodology, Data quality guideline for the ecoinvent database version 3' (ecoinvent report No. 1 (v3), 2011)
  note on heating value, net: Net (lower) heating (calorific) value. Value Taken from Table 5.1 of report 'Overview and methodology, Data quality guideline for the ecoinvent database version 3' (ecoinvent report No. 1 (v3), 2011)
- sodium nitrate: 0.000140997 kg; lognormal variance with pedigree 0.0032, pedigree (2,1,3,1,1)
  (same comment as for manganese dioxide)
  properties: dry mass 1 kg, wet mass 1 kg
- sodium cyanide: 0.00256282 kg; lognormal variance with pedigree 0.0026, pedigree (1,1,3,1,1)
  Measured Value. Sum of sodium cyanide (96%, of which 97% is for cyanidation), used in a 30% solution and cyanure (4%, proxy, used for the Merill-Crowe process).
  Proxy: 'sodium cyanide' is used as a proxy for Cyanide.
  properties: carbon content, fossil 0.244898, wet mass 1 kg, dry mass 1 kg
- iron sulfate: 0.00111824 kg; lognormal variance with pedigree 0.0026, pedigree (1,1,3,1,1)
  Measured Value used for wastewater treatment.
  properties: dry mass 1 kg, wet mass 1 kg
- electricity, high voltage: 0.964955 kWh; lognormal variance with pedigree 0.0026, pedigree (1,1,3,1,1)
  Measured Value.
- sodium silicate, spray powder, 80%: 0.00346729 kg; lognormal variance with pedigree 0.0026, pedigree (1,1,3,1,1)
  Measured Value used for wastewater treatment.
  properties: wet mass 1 kg, dry mass 1 kg
- ammonium nitrate, as N: 0.000851857 kg; = input_ammoniumNitrate*N_content_ammoniumNitrate; lognormal variance with pedigree 0.002, pedigree (1,1,3,1,1)
  Calculated value. See parameters exchanges properties for details.
  Uncertainty: C
  property input_kg 63.99 kg; name input_ammoniumNitrate
  property N content 0.35; name N_content_ammoniumNitrate
  properties: wet mass 1 kg, dry mass 1 kg
  note on input_kg: Calculated Value. It is assume that the given amount represented the complecte explosive, i.e. 94% ammonium nitrate and 6% petrol.
- carbon dioxide, liquid: 0.000556836 kg; lognormal variance with pedigree 0.0026, pedigree (1,1,3,1,1)
  Measured Value. Used for wastewater treatment. The given amount represent the active agent only, used in a 60-100% solution.
  properties: wet mass 1 kg, carbon content, fossil 0.272727, dry mass 1 kg
- scrap aluminium: -5.62161e-5 kg; name scrapAluminium; lognormal variance with pedigree 0.0026, pedigree (1,1,3,1,1)
  Measured Value. Reported as non-ferrous metal sent to recovery.
  production volume 21398.5 kg; = PV_Quebec * (scrapAluminium / PV_ref)
    Calculated from production volume of reference product using the relative outputs.
  property price 0 EUR2005; name scrapAluminium_price_EUR2005
  properties: wet mass 1 kg, dry mass 1 kg
- transport, passenger car, large size, petrol, EURO 3: 0.00195615 km; lognormal variance with pedigree 0.292, pedigree (3,5,5,5,5)
  Calculated value. Reported as liters of petrol used in pickup trucks (5.571E+0 liters/kg). Conversion using : 0.081237 kg/km (taken directly from ecoinvent v3.0 dataset 'transport, passenger car, large size, petrol, EURO 3, GLO') and 0.75 kg/l (taken from Table 5.1 of the data quality guideline).
- polycarboxylates, 40% active substance: 8.64922e-5 kg; lognormal variance with pedigree 0.0026, pedigree (1,1,3,1,1)
  Measured Value. Sum of sodium cyanide (96%, of which 97% is for cyanidation ) and cyanure (4%, proxy, used for the Merill-Crowe process)
  properties: wet mass 1 kg, carbon content, fossil 0.496429, dry mass 0.4 kg, water content 1.5
- waste plastic, mixture: -1.37916e-5 kg; name wastePlastic; lognormal variance with pedigree 0.0026, pedigree (1,1,3,1,1)
  Measured Value. Reported as rigid plastic sent to recovery.
  production volume 5249.72 kg; = PV_Quebec * (wastePlastic / PV_ref)
    Calculated from production volume of reference product using the relative outputs.
  property price 0 EUR2005; name wastePlastic_price_EUR2005
  property net heating value 0 MJ/kg; name LHV_wasteplastic
  properties: wet mass 1 kg, carbon content, fossil 0.747344, dry mass 0.847 kg, water content 0.180638
  note on net heating value: Literature value. Ecoinvent dataset 'treatment of waste plastic, mixture, municipal incineration/CH'. Accessed on 25.09.2017

## Inputs from nature
- Transformation, from forest, unspecified [natural resource, land]: 0.000925398 m2; = surface_kg; lognormal variance with pedigree 0.002, pedigree (1,1,3,1,1)
  Calculated Value. See parameters exchanges properties for details.
  Uncertainty: S
  property Surface 24.33 m2; name surface_kg
- Gold, in ground [natural resource, in ground]: 1.53624e-5 kg; source Ressources naturelles Québec 2011; lognormal variance with pedigree 0.0046, pedigree (3,1,3,1,1)
  1.8 ppm Au in ore; Calculated Value. When the amount is calculated based on the ore composition (1,79 g Au/t ore), the amount of recovered gold is higher than the amount of extracted gold. We hence calculate the amount of extracted gold based on a hypothetic recovery rate of 85%.
- Copper, in ground [natural resource, in ground]: 0.0128711 kg; source Ressources naturelles Québec 2011; lognormal variance with pedigree 0.0032, pedigree (2,1,3,1,1)
  0.2% Cu in ore; Calculated Value based on ore composition.
- Lead, in ground [natural resource, in ground]: 0.0231673 kg; source Ressources naturelles Québec 2011; lognormal variance with pedigree 0.0032, pedigree (2,1,3,1,1)
  0.36% Pb in ore; Calculated Value based on ore composition.
- Zinc, in ground [natural resource, in ground]: 0.198848 kg; source Ressources naturelles Québec 2011; lognormal variance with pedigree 0.0032, pedigree (2,1,3,1,1)
  3.1% Zn in ore; Calculated Value based on ore composition.
- Water, well, in ground [natural resource, in water]: 8.22322e-6 m3; name water_well_in_ground_input; lognormal variance with pedigree 0.0026, pedigree (1,1,3,1,1)
  Measured Value.
- Silver, in ground [natural resource, in ground]: 0.000350229 kg; source Ressources naturelles Québec 2011; lognormal variance with pedigree 0.0032, pedigree (2,1,3,1,1)
  54 ppm Ag in ore; Calculated Value based on ore composition.
- Water, lake [natural resource, in water]: 0.00287356 m3; name water_lake_input; lognormal variance with pedigree 0.0026, pedigree (1,1,3,1,1)
  Measured Value.
- Transformation, to industrial area [natural resource, land]: 0.000925398 m2; = surface_kg; lognormal variance with pedigree 0.002, pedigree (1,1,3,1,1)
  Calculated Value. See parameters exchanges properties for details.
  Uncertainty: S
- Occupation, industrial area [natural resource, land]: 0.0351651 m2*year; = surface_kg*lifetime; lognormal variance with pedigree 0.002, pedigree (1,1,3,1,1)
  Calculated Value. See parameters exchanges properties for details.
  Uncertainty: C
  property lifetime 38 year; name lifetime

## Emissions to nature
- Nickel, ion [water, surface water]: 6.4736e-7 kg; lognormal variance with pedigree 0.652, pedigree (1,1,3,1,1)
  Measured Value. Final effluent (does not include recirculated water).
  It is considered that the water emissions given by the plant are additional to those of the sulfidic tailing dataset. The first go to surface water after going through the WWT, while the second come from leaching and go to underground water.
- Ammonium, ion [water, surface water]: 4.49957e-5 kg; lognormal variance with pedigree 0.042, pedigree (1,1,3,1,1)
  (same comment as for Nickel, ion)
- Water [water, surface water]: 0.00288179 m3; = water_well_in_ground_input+water_lake_input; lognormal variance with pedigree 0.0026, pedigree (1,1,3,1,1)
  (same comment as for Nickel, ion)
- Sulfur dioxide [air, non-urban air or from high stacks]: 0.000163209 kg; lognormal variance with pedigree 0.0026, pedigree (1,1,3,1,1)
  Measured Value. Process emission only.
- Antimony [water, surface water]: 9.33005e-7 kg; lognormal variance with pedigree 0.652, pedigree (1,1,3,1,1)
  (same comment as for Nickel, ion)
- Lead [air, non-urban air or from high stacks]: 5.3934e-8 kg; lognormal variance with pedigree 0.652, pedigree (1,1,3,1,1)
  Measured Value. Process emission only.
- Arsenic, ion [water, surface water]: 1.14486e-5 kg; lognormal variance with pedigree 0.0026, pedigree (1,1,3,1,1)
  (same comment as for Nickel, ion)
- Particulates, < 2.5 um [air, non-urban air or from high stacks]: 3.51864e-6 kg; lognormal variance with pedigree 0.302, pedigree (1,1,3,1,1)
  Measured Value. Process emission only.
- Particulates, > 10 um [air, non-urban air or from high stacks]: 3.28168e-5 kg; lognormal variance with pedigree 0.042, pedigree (1,1,3,1,1)
  Measured Value. Process emission only.
- Nitrogen oxides [air, non-urban air or from high stacks]: 0.000712781 kg; lognormal variance with pedigree 0.042, pedigree (1,1,3,1,1)
  Measured Value. Process emission only.
- Nitrate [water, surface water]: 0.000512715 kg; lognormal variance with pedigree 0.042, pedigree (1,1,3,1,1)
  (same comment as for Nickel, ion)
- Cadmium, ion [water, surface water]: 4.02793e-8 kg; lognormal variance with pedigree 0.652, pedigree (1,1,3,1,1)
  (same comment as for Nickel, ion)
- Particulates, > 2.5 um, and < 10um [air, non-urban air or from high stacks]: 7.56141e-5 kg; lognormal variance with pedigree 0.122, pedigree (1,1,3,1,1)
  Measured Value. Process emission only.
- Zinc, ion [water, surface water]: 1.10797e-7 kg; lognormal variance with pedigree 0.652, pedigree (1,1,3,1,1)
  (same comment as for Nickel, ion)
- Cobalt [water, surface water]: 6.61053e-7 kg; lognormal variance with pedigree 0.652, pedigree (1,1,3,1,1)
  (same comment as for Nickel, ion)
- Copper, ion [water, surface water]: 1.82759e-7 kg; lognormal variance with pedigree 0.652, pedigree (1,1,3,1,1)
  (same comment as for Nickel, ion)
- Cyanide [water, surface water]: 2.85759e-7 kg; lognormal variance with pedigree 0.042, pedigree (1,1,3,1,1)
  (same comment as for Nickel, ion)
- Dinitrogen monoxide [air, non-urban air or from high stacks]: 1.1848e-6 kg; lognormal variance with pedigree 0.042, pedigree (1,1,3,1,1)
  Measured Value. Process emission only.
- Lead [water, surface water]: 4.22952e-9 kg; lognormal variance with pedigree 0.652, pedigree (1,1,3,1,1)
  (same comment as for Nickel, ion)

## Sampling procedure
Specific data were collected on the only production site in Quebec.

## Extrapolations
Specific data were collected from the only mine in Quebec who produced all of these products from one ore.
Extrapolation was done for the infrastructure based on dataset ''mine infrastructure, underground, non-ferrous metal''.
Uncertainty has been adjusted accordingly.
