# ethoxylated alcohol (AE7) production, petrochemical

Dataset: EcoSpold 2, unit process
Geography: RER
Time period: 1992-01-01 to 2020-12-31
Technology level: modern
Classification: ISIC rev.4 ecoinvent: 2023:Manufacture of soap and detergents, cleaning and polishing preparations, pe
Synonyms: alcohol ethoxylate; Fatty Alcohol Ethoxylate
Scenario: Business-as-Usual
System model: Allocation at the point of substitution
Share of production covered: 40 %
Generated by: Rainer Zah
Published in: Zah R. 2007
Database: ecoinvent
isCopyrightProtected: true
accessRestrictedTo: 1

## General comment
This dataset represents the production of 1 kg of ethoxylated alcohol with seven polyether units (AE7) from C12-C15 fatty alcohol derived from petrochemicals. AE7 is one type of alcohol ethoxylate (AE).
Alcohol ethoxylates are the largest group within the class of nonionic tensides. The hydrophobic part is formed by fatty alcohols with chain lengths from C9-C18. The hydrophilic part consists of a polyether chain formed by condensation of ethylene oxide to the fatty alcohol. Several hundred different AE are commercially available, differing by alcohol structure and number of polyether units. The generic chemical structure of AE is:
CH3-(CH2)n-CHR-CH2-(O-CH2-CH2)m-OH (n = 5-15, m = 2-100, R = H or n-alkyl)
Because of their structural variety, AE have very different physical and chemical properties. In comparison with other tensides like anionic surfactants, alcohol ethoxylates exhibit a better fat soil removal capacity, especially at low temperatures. AE7 is mainly used in the detergents industry.
AE are produced by the reaction of fatty alcohols with ethylene oxide, leading to a condensation of polyethylene glycolether groups on the alcohol chains. The production of AE is described on the following flow diagram:
The fatty alcohols can be derived from petrochemicals, palm kernel, or coconut oil.
In this dataset, the material and energy inputs are based on literature sources, the water consumption is estimated based on data from a large chemical plant (Gendorf 2016). The production of waste and emissions to water and air are calculated based on literature sources.
References:
Zah R., Hischier R. (2007) Life Cycle Inventories of Detergents. ecoinvent report No. 12. Swiss Centre for Life Cycle Inventories, Dübendorf, 2007.
Gendorf (2016) Umwelterklärung 2015, Werk Gendorf Industriepark, www.gendorf.de.

## Included activities start
From reception of fatty alcohol from petrochemicals, ethylene oxide, and nitrogen at the factory gate.

## Included activities end
This activity ends with 1 kg of ethoxylated alcohol (AE7). The dataset includes the processing of the material inputs, the consumption of energy, the use of infrastructure, the production of waste, and emissions to water and air. The dataset doesn't include water consumption.

## Geography
Data based on the European ethoxylated alcohols production. Some values are based on data from a large chemical factory located in Germany. These are assumed to be valid for this geography.

## Technology
Alcohol ethoxylates (AE) are produced by the reaction of fatty alcohols with ethylene oxide leading to a condensation of polyethylene glycolether groups on the alcohol chains. The fatty alcohols can be derived from petrochemical, palm kernel, or coconut oil. The reaction takes place at temperatures ranging from 150°C to 200°C. The grade of ethoxylation, e.g. the specific number of polyether units condensed to the alcohol chains, is controlled by the concentration of ethylene oxid in the ethoxylation process. The petrochemical route has been designated as modern technology, since it has the best ability to change capacity with changes in demand. This is an average technology for the production of AE representing typical European production mix in the mid 90s.
Reference:
Schul W. (1995) A Life-Cycle Inventory for the Production of Detergent Range Alcohol Ethoxylates in Europe. In: Tenside, Surfactants, Detergents, 32(2), pp. 171-192.
Stalmans M., Berenbold H., Berna J. L., Cavalli L., Dillarstone A., Franke M., Hirsinger F., Janzen D., Kosswig K., Postlethwaite D., Rappert T., Renta C., Scharer D., Schick K.-P., Schul W., Thomas H. and Sloten R. V. (1995) European Life-Cycle Inventory for Detergent Surfactants Production. In: Tenside, Surfactants, Detergents, 32(2), pp. 84-109

## Time period
Date of published literature. Some values are based on data published by the Gendorf factory that were collected between 2011 and 2015. The time period has been adjusted accordingly. For more details, see the comments of the exchanges.

## Reference product
- ethoxylated alcohol (AE7): 1 kg; name RP; CPC 353: Soap, cleaning preparations, perfumes and toilet preparations; By-product classification allocatable product
  Alcohol Ethoxylates (AE) are molecules with an hydrophobic and an hydrophilic part. The hydrophobic part is formed by fatty alcohols with chain lengths from C9-C18. The hydrophilic part consists of a polyether chain formed by condensation of ethylene oxide to the fatty alcohol. Several hundred different AE are commercially available, differing by alcohol structure and number of polyether units. The generic chemical structure of AE is:
  CH3-(CH2)n-CHR-CH2-(O-CH2-CH2)m-OH
  (n = 5-15, m = 2-100, R = H or n-alkyl)
  AE7 have an average value of seven polyether units (m = 7).
  Alcohol Ethoxylates (AE) are the largest group within the class of nonionic tensides. In comparison with other tensides like anionic surfactants, alcohol ethoxylates exhibit a better fat soil removal capacity, especially at low temperatures.
  production volume 1.7661e6 kg; name RP_PV
    Estimated value. The European production volume is extrapolated from the global production volume based on information from Cefic (European Chemical Industry Council) and the American Chemistry Council.
    According to Cefic (2016), the global sales of chemicals in the year 2015 was 3 534 billion euros. The reported share of sales per region are: EU28 14.7%; Other Europe (Switzerland, Norway, Turkey, Russia and Ukraine) 2.7%; NAFTA (US, Canada and Mexico) 16.5%; Latin America 3.8%; China 39.9%; Japan 3.9%; Republic of Korea 3.2%; India 2.2%; Rest of Asia 11.9%; Rest of the World 1.3%, Switzerland 1%. Cefic also reports the US total sales, which amount to 518.7 billion euros out of the global 3 534 billion euros (14.7%). The same share is reported by the American Chemistry Council (2016), according to which the USA sales account for 15% of global sales for the year 2016.
    The production volume of RER is therefore estimated to be 17.4% of the global production volume.
    The global production volume is estimated based on HERA (2009), according to which the global production volume is estimated to be 290000000 kg for the year 2003. Moreover, it is assumed that 50% of ethoxylated alcohols originate from vegetable oil sources whilst the remaining 50% comes from petrochemical origins. In addition, according to HERA (2009), the distribution of AE7 in household products is 7%.
    Reference:
    HERA 2009, Human & Environmental Risk Assessment on ingredients of European household cleaning products, Alcohol Ethoxylates, September 2009.
    FAOSTAT, 2017, Food and Agricultural Organization of the United Nations. Accessible at: http://www.fao.org/faostat/en/#data/QD
    Cefic 2016. Facts and figures 2016 of the European chemical industry. Accessible at: http://www.cefic.org/Facts-and-Figures/Chemicals-Industry-Profile/
    American Chemistry Council 2016. Outlook: U.S. Chemical Industry Continues to Outpace Industrial Output; Accounts for More Than One-Half of Construction Spending by Manufacturing Sector. Accessible at: https://www.americanchemistry.com/Media/PressReleasesTranscripts/ACC-news-releases/US-Chemical-Industry-Continues-to-Outpace-Industrial-Output.html""
  property price 1.62893 EUR2005
    Calculated based on inputs: The price of the product has been calculated as a sum of the values of the material and energy inputs for this product. This value is therefore a rough estimation. It may underestimate the real price since there are additional expenses when producing any product. These expences can include for example labour costs, treatment of waste materials and profit for the producer. Please consider carefully whether this level of data quality is acceptable for your application.
  property carbon content, fossil 0.643327
    The generic chemical structure of AE is: CH3-(CH2)n-CHR-CH2-(O-CH2-CH2)m-OH (n = 5-15, m = 2-100, R = H or n-alkyl). AE are produced by the reaction of fatty alcohols with ethylene oxide leading to a condensation of polyethylene glycolether groups on the alcohol chains (ecoinvent report 12-part 4). Fatty alcohols were considered to have an average length of C14. Ethoxylated alcohol (AE7) has an average value of seven polyether units (AE7) (ecoinvent report 12-part 4). The formula that has then been used to calculate the C content of the products is CH3-(CH2)11-CH2-CH2-(O-CH2-CH2)7-OH. In this molecule, all C has a fossile origin, as fatty alcohols are produced from petrochemical oil
  property carbon content, non-fossil 0
    (same comment as for ethoxylated alcohol (AE7))
  property carbon content 0.643327
    carbon content on a dry matter basis (reserved; not for manual entry)
  property true value 1.62893; name RP_true_value
    allocation property applied in "true value" allocation // value calculated from revenue
  properties: water content 0, wet mass 1 kg, water in wet mass 0 kg, dry mass 1 kg, carbon allocation 0.643327 kg

## By-products
- heat, for reuse in municipal waste incineration only: 0 MJ; CPC 17300: Steam and hot water; By-product classification allocatable product; pedigree (1,1,1,1,1)
  Net electricity generated from this waste and used in internal MSWI plant energy redistribution.
  Uncertainty: uncertainty is calculated from uncertainties in waste composition and uncertainties in energy efficiency and the uncertainty in internal energy demand
  production volume 1.07742 MJ
  property exergy 0.1842 MJ; name E_th_prod_MSWI_exergy
    This exergy property is based on the exergy content of the product.
  property price 0.0106 EUR2005; name E_th_prod_MSWI_price_EUR2005
    Average European district heat price from Ecoheatcool and Euroheat 2005-2006, Ecoheat Work package 1: The European heat market. Final report. 10.6 EUR/GJ i s the price of district heat. http://www.solarthermalworld.org/files/Ecoheatcool%20WP1%20Web.pdf?download
  property true value relation 0.1842; name E_th_prod_MSWI_true_value_relation
    property to calculate "true value" from
  property true value 1.16811e-9
    allocation property applied in "true value" allocation // value calculated from true value relation
- electricity, for reuse in municipal waste incineration only: 0 kWh; CPC 17100: Electrical energy; By-product classification allocatable product; pedigree (1,1,1,1,1)
  (same comment as for heat, for reuse in municipal waste incineration only)
  production volume 0.151493 kWh
  property true value relation 3.6; name E_el_prod_MSWI_true_value_relation
    property to calculate "true value" from
  property price 0.1 EUR2005; name E_el_prod_MSWI_price_EUR2005
    Estimated to be the same price as in case of electricity, medium voltage.
  property exergy 3.6 MJ; name E_el_prod_MSWI_exergy
    This exergy property is based on the exergy content of the product.
  property true value 3.17451e-9
    (same comment as for heat, for reuse in municipal waste incineration only)
- zinc concentrate: 0 kg; CPC 14290: Other non-ferrous metal ores and concentrates (other than uranium or thorium ores and concentrates); By-product classification allocatable product
  Calculated value from the knowledge of the properties of both products.
  production volume 2.04952e-5 kg
  property price 0.38 EUR2005; name ByP_price_EUR2005
    Temporary price data. Calculated as 90% of purchasers price based on: Zinc content in concentrate 53%. Concentrate price per kg Zn 86.5% of refined Zn price (13.5% treatment charges according to CHR Metals Limited 2005: Dynamic cost curves. http://www.minecost.com/dynamic.pdf). 2004 zinc price from USGS (2007) Mineral commodity summaries 2007. <http://minerals.usgs.gov/minerals/pubs/mcs/2007/mcs2007.pdf> [Accessed 25 May 2010]
  property zinc content 0.53; name zinc_C_zinc_concentrate
    Zinc content on a dry matter basis. Value taken from teh "zinc mine operation" /GLO dataset.
  property dry mass 1 kg; name DM_zinc_concentrate
  property carbon content 0
    carbon content on a dry matter basis (reserved; not for manual entry)
  property true value 4.30488e-13
    allocation property applied in "true value" allocation // value calculated from revenue
  properties: wet mass 1 kg, water content 0, carbon content, non-fossil 0, carbon content, fossil 0, water in wet mass 0 kg, carbon allocation 0 kg

## Inputs from technosphere
- heat, district or industrial, natural gas: 0.24 MJ; source Schul W. 1995; lognormal variance with pedigree 0.013225, pedigree (2,3,3,2,1)
  Literature Value.
- tap water: 0.026 kg; lognormal variance with pedigree 0.009825, pedigree (2,3,1,2,3)
  Calculated based on literature data published by the industry. This value is a 5-year average of data (2011 - 2015) published by the Gendorf factory (Gendorf, 2016, Umwelterklärung, www.gendorf.de), (Gendorf, 2015, Umwelterklärung, www.gendorf.de), (Gendorf, 2014, Umwelterklärung, www.gendorf.de). The amount of tap water per kg of chemical substance produced is calculated using literature data published by the Gendorf factory based in Germany, which produces a wide range of chemical substances. The factory produced 1657400 tonnes of chemical substances in the year 2015 (Gendorf, 2016, Umwelterklärung, www.gendorf.de) and 740000 tonnes of intermediate products. The amount of tap water consumed in the year 2015 was 55100 tonnes (Gendorf, 2016, Umwelterklärung, www.gendorf.de). The resulting amount of tap water is 0.023 kg/kg of chemical product produced. The 5-year average (2011 - 2015, weighted by production volume) is 0.026 kg/kg.
  properties: carbon content, fossil 0.00178991, wet mass 1 kg, water content 2962.17, dry mass 0.000337476 kg
  note on carbon content, fossil: Bicarbonate content is 2.93 mol/m3. CO2 content is 0.1 mol/m3 (ecoinvent v2.2 report 8, Tab 93.1).
- chemical factory, organics: 4e-10 unit; source Frischknecht R. 2007; lognormal variance with pedigree 0.309225, pedigree (2,3,1,2,3)
  Calculated based on literature data published by the industry. For this activity, no information was readily available concerning infrastructure and land-use. Therefore, the infrastructure is estimated based on data from two chemical factories, the BASF site of Ludwigshafen and the chemical factory in Gendorf (which are both located in Germany), which produce a wide range of chemical substances. Based on this data, the following assumptions are made: the built area amounts to about 4.2 ha, the plant has an average output of 50'000 t/a and a lifespan of fifty years. The estimated infrastructure amount is therefore 4.00 E-10 units per kg of produced chemical.
  References:
  Althaus H.-J., Chudacoff M., Hischier R., Jungbluth N., Osses M. and Primas A. (2007) Life Cycle Inventories of Chemicals. ecoinvent report No. 8, v2.0. EMPA Dübendorf, Swiss Centre for Life Cycle Inventories, Dübendorf, CH.
  Gendorf (2000) Umwelterklärung 2000, Werk Gendorf. Werk Gendorf, Burgkirchen.
- nitrogen, liquid: 0.019 kg; source Schul W. 1995; lognormal variance with pedigree 0.015225, pedigree (2,3,1,2,3)
  Literature Value.
  properties: wet mass 1 kg, dry mass 1 kg
- ethylene oxide: 0.556 kg; source Schul W. 1995; lognormal variance with pedigree 0.013225, pedigree (2,3,3,2,1)
  Literature Value.
  properties: carbon content, fossil 0.545455, dry mass 1 kg, wet mass 1 kg
- heat, district or industrial, other than natural gas: 0.46 MJ; source Schul W. 1995; lognormal variance with pedigree 0.013225, pedigree (2,3,3,2,1)
  Literature Value.
- wastewater, average: 0 m3; name BP_wastewater_average; pedigree (1,1,1,1,1)
  Calculated based on literature data published by the industry. This value is a 5-year average of data (2011 - 2015) published by the Gendorf factory (Gendorf, 2016, Umwelterklärung, www.gendorf.de), (Gendorf, 2015, Umwelterklärung, www.gendorf.de), (Gendorf, 2014, Umwelterklärung, www.gendorf.de). The amount of wastewater (which is later on treated in the municipal WWTP) per kg of chemical substance produced is calculated using literature data published by the Gendorf factory based in Germany, which produces a wide range of chemical substances. The factory produced 1657400 tonnes of chemical substances in the year 2015 (Gendorf, 2016, Umwelterklärung, www.gendorf.de) and 740000 tonnes of intermediate products. The amount of wastewater which is later on treated in the municipal WWTP in the year 2015 was 1200 tonnes (Gendorf, 2016, Umwelterklärung, www.gendorf.de). The resulting amount of wastewater is 2.7E-06 m3/kg of chemical product produced.
  production volume 0 m3
    Calculated from the production volume of ethoxylated alcohol (AE7) in proportion to the respective output amounts.
  property price 0 EUR2005; name BP_wastewater_average_price_EUR2005
  properties: wet mass 1000 kg, dry mass 0.346837 kg, water content 2882.2, carbon content, non-fossil 0.194039
  note on carbon content, non-fossil: 0.0673 kg TOC/m3 (Tab A.17, ecoinvent v2.2 report 13_I). TOC was considered as Total Carbon.
- fatty alcohol: 0.416 kg; source Schul W. 1995; lognormal variance with pedigree 0.015225, pedigree (2,3,1,2,3)
  Literature Value.
  properties: carbon content, non-fossil 0.743434, carbon content, fossil 0.0408973, wet mass 1 kg, dry mass 1 kg
  note on carbon content, non-fossil: Fatty alcohols have chain lengths between C6 and C22, their chemical formula is CH3(CH2)nCH2OH (ecoinvent v2.2 report 12, pg 16). As an average, C14 was used. The dataset represents a mix of 27% produced from fatty acid splitting and 73% produced from methyl ester (ecoinvent v2.2 report 12, pg 21). In the methyl esterification, methanol (CH3OH) has a fossil origin
- electricity, medium voltage: 0.0624 kWh; source Schul W. 1995; lognormal variance with pedigree 0.013225, pedigree (2,3,3,2,1)
  Literature Value.
- wastewater, average: -2.43642e-6, -2.63575e-7 m3 (2 entries); lognormal variance with pedigree 0.009825, pedigree (2,3,1,2,3)
  (same comment as for wastewater, average)
  production volume 4.76847 m3

## Inputs from nature
- Water, cooling, unspecified natural origin [natural resource, in water]: 0.0164 m3; lognormal variance with pedigree 0.009825, pedigree (2,3,1,2,3)
  Calculated based on literature data published by the industry. This value is a 5-year average of data (2011 - 2015) published by the Gendorf factory (Gendorf, 2016, Umwelterklärung, www.gendorf.de), (Gendorf, 2015, Umwelterklärung, www.gendorf.de), (Gendorf, 2014, Umwelterklärung, www.gendorf.de). The amount of water for cooling extracted per kg of chemical substance produced is calculated using literature data published by the Gendorf factory based in Germany, which produces a wide range of chemical substances. The factory produced 1657400 tonnes of chemical substances in the year 2015 (Gendorf, 2016, Umwelterklärung, www.gendorf.de) and 740000 tonnes of intermediate products. The reported amounts of water extracted as groundwater and surface water (river) are assumed to be used entirely for cooling purposes.
- Water, river [natural resource, in water]: 0.00086 m3; lognormal variance with pedigree 0.009825, pedigree (2,3,1,2,3)
  Calculated based on literature data published by the industry. This value is a 5-year average of data (2011 - 2015) published by the Gendorf factory (Gendorf, 2016, Umwelterklärung, www.gendorf.de), (Gendorf, 2015, Umwelterklärung, www.gendorf.de), (Gendorf, 2014, Umwelterklärung, www.gendorf.de). The amount of groundwater and surface water (river) extracted per kg of chemical substance produced is calculated using literature data published by the Gendorf factory based in Germany, which produces a wide range of chemical substances. The factory produced 1657400 tonnes of chemical substances in the year 2015 (Gendorf, 2016, Umwelterklärung, www.gendorf.de) and 740000 tonnes of intermediate products. The amount of groundwater and surface water (river) extracted in the year 2015 was 19950000 tonnes and 21488100 tonnes respectively (Gendorf, 2016, Umwelterklärung, www.gendorf.de).
- Water, well, in ground [natural resource, in water]: 0.00083 m3; lognormal variance with pedigree 0.009825, pedigree (2,3,1,2,3)
  (same comment as for Water, river)

## Emissions to nature
- Particulates, > 10 um [air, urban air close to ground]: 8.44e-6 kg; source Schul W. 1995; lognormal variance with pedigree 0.053225, pedigree (2,3,3,2,1)
  Calculated Value: calculated by comparing the aggregated emissions of the alcohol ethoxylates with the aggregated emissions of the fatty alcohols and of ethylene oxide.
- Phenol [water, surface water]: 3.17e-9 kg; source Schul W. 1995; lognormal variance with pedigree 0.313225, pedigree (2,3,3,2,1)
  (same comment as for Particulates, > 10 um)
- Acidity, unspecified [water, surface water]: 6e-7 kg; source Schul W. 1995; lognormal variance with pedigree 0.053225, pedigree (2,3,3,2,1)
  (same comment as for Particulates, > 10 um)
- Sulfate [water, surface water]: 8.88e-6 kg; source Schul W. 1995; lognormal variance with pedigree 0.053225, pedigree (2,3,3,2,1)
  (same comment as for Particulates, > 10 um)
- Aldehydes, unspecified [air, urban air close to ground]: 1.01e-5 kg; source Schul W. 1995; lognormal variance with pedigree 0.133225, pedigree (2,3,3,2,1)
  (same comment as for Particulates, > 10 um)
- Sulfide [water, surface water]: 2.6e-7 kg; source Schul W. 1995; lognormal variance with pedigree 0.053225, pedigree (2,3,3,2,1)
  (same comment as for Particulates, > 10 um)
- Aluminium [water, surface water]: 1.84e-10 kg; source Schul W. 1995; lognormal variance with pedigree 0.053225, pedigree (2,3,3,2,1)
  (same comment as for Particulates, > 10 um)
- Sulfur dioxide [air, urban air close to ground]: 0.00015 kg; source Schul W. 1995; lognormal variance with pedigree 0.013225, pedigree (2,3,3,2,1)
  (same comment as for Particulates, > 10 um)
- Ammonia [air, urban air close to ground]: 4.51e-6 kg; source Schul W. 1995; lognormal variance with pedigree 0.053225, pedigree (2,3,3,2,1)
  (same comment as for Particulates, > 10 um)
- Suspended solids, unspecified [water, surface water]: 5.6e-6 kg; source Schul W. 1995; lognormal variance with pedigree 0.053225, pedigree (2,3,3,2,1)
  (same comment as for Particulates, > 10 um)
- Carbon dioxide, fossil [air, urban air close to ground]: 0.0213 kg; source Schul W. 1995; lognormal variance with pedigree 0.013225, pedigree (2,3,3,2,1)
  (same comment as for Particulates, > 10 um)
- Water [air, unspecified]: 0.0014 m3; lognormal variance with pedigree 0.009825, pedigree (2,3,1,2,3)
  Calculated to ensure the water balance. In general, in the case of recirculating cooling systems, 77% of the water input evaporates to air. In case of once-through cooling systems, 4% of the water input evaporates to air. The process water has in the chemical industry an average evaporation rate of 20.5%. In the specific case of the Gendorf factory, the calculated evaporation rate based on the data published is 6.3%. This matches the qualitative information, that the majority of the cooling systems in Gendorf are once-through and that the amount of cooling water used is significantly higher than the amount of process water used (Gendorf, 2016, Umwelterklärung, www.gendorf.de).
- Carbon monoxide, fossil [air, urban air close to ground]: 5.18e-5 kg; source Schul W. 1995; lognormal variance with pedigree 0.653225, pedigree (2,3,3,2,1)
  (same comment as for Particulates, > 10 um)
- Water [water, unspecified]: 0.0167 m3; lognormal variance with pedigree 0.009825, pedigree (2,3,1,2,3)
  Calculated based on literature data published by the industry (Gendorf, 2016, Umwelterklärung, www.gendorf.de). The amount of water released back to the environment consists of the amount of process water treated in the internal WWTP and then released back to the environment and the amount of cooling water released back to the environment.
- Chloride [water, surface water]: 1.92e-6 kg; source Schul W. 1995; lognormal variance with pedigree 0.053225, pedigree (2,3,3,2,1)
  (same comment as for Particulates, > 10 um)
- Zinc, ion [water, surface water]: 1.88e-8 kg; source Schul W. 1995; lognormal variance with pedigree 0.653225, pedigree (2,3,3,2,1)
  (same comment as for Particulates, > 10 um)
- Chromium, ion [water, surface water]: 3.5e-8 kg; source Schul W. 1995; lognormal variance with pedigree 0.653225, pedigree (2,3,3,2,1)
  (same comment as for Particulates, > 10 um)
- DOC, Dissolved Organic Carbon [water, unspecified]: 6.44583e-7 kg; lognormal variance with pedigree 0.218, pedigree (4,5,5,5,5)
  Calculated value. The BOD, COD, TOC and BOD5 are calculated based on the amount and type of emissions released to water in the same activity.
- Dissolved solids [water, surface water]: 2.56e-5 kg; source Schul W. 1995; lognormal variance with pedigree 0.053225, pedigree (2,3,3,2,1)
  (same comment as for Particulates, > 10 um)
- COD, Chemical Oxygen Demand [water, unspecified]: 2.36665e-6 kg; lognormal variance with pedigree 0.218, pedigree (4,5,5,5,5)
  (same comment as for DOC, Dissolved Organic Carbon)
- Fluoride [water, surface water]: 2e-8 kg; source Schul W. 1995; lognormal variance with pedigree 0.053225, pedigree (2,3,3,2,1)
  (same comment as for Particulates, > 10 um)
- TOC, Total Organic Carbon [water, unspecified]: 6.44583e-7 kg; lognormal variance with pedigree 0.218, pedigree (4,5,5,5,5)
  (same comment as for DOC, Dissolved Organic Carbon)
- Hydrocarbons, unspecified [water, surface water]: 4.48e-8 kg; source Schul W. 1995; lognormal variance with pedigree 0.313225, pedigree (2,3,3,2,1)
  (same comment as for Particulates, > 10 um)
- BOD5, Biological Oxygen Demand [water, unspecified]: 2.36665e-6 kg; lognormal variance with pedigree 0.218, pedigree (4,5,5,5,5)
  (same comment as for DOC, Dissolved Organic Carbon)
- Iron, ion [water, surface water]: 4.29e-8 kg; source Schul W. 1995; lognormal variance with pedigree 0.653225, pedigree (2,3,3,2,1)
  (same comment as for Particulates, > 10 um)
- Nickel, ion [water, surface water]: 1.39e-9 kg; source Schul W. 1995; lognormal variance with pedigree 0.653225, pedigree (2,3,3,2,1)
  (same comment as for Particulates, > 10 um)
- Nitrogen oxides [air, urban air close to ground]: 9.93e-5 kg; source Schul W. 1995; lognormal variance with pedigree 0.053225, pedigree (2,3,3,2,1)
  (same comment as for Particulates, > 10 um)
- NMVOC, non-methane volatile organic compounds, unspecified origin [air, urban air close to ground]: 0.00252 kg; source Schul W. 1995; lognormal variance with pedigree 0.053225, pedigree (2,3,3,2,1)
  (same comment as for Particulates, > 10 um)
- Oils, unspecified [water, surface water]: 7.93e-7 kg; source Schul W. 1995; lognormal variance with pedigree 0.313225, pedigree (2,3,3,2,1)
  (same comment as for Particulates, > 10 um)

## Sampling procedure
Data from ECOSOL study of European Surfactant Industry. Some values are calculated based on data from a large chemical factory located in Germany. For more details, see the comments of the exchanges.

## Review by Emilia Moreno Ruiz 2017-09-05
This dataset was additionally reviewed in a separate review process by Eric Johnson of Atlantic Consulting as well as Emilia Moreno Ruiz and Gregor Wernet of ecoinvent.
