# maize grain processing, dry milling

Dataset: EcoSpold 2, unit process
Geography: RoW
Time period: 2016-01-01 to 2019-12-31
Technology level: current
Classification: ISIC rev.4 ecoinvent: 1061:Manufacture of grain mill products
Classification: EcoSpold01Categories: agricultural means of production/feed
Scenario: Business-as-Usual
System model: Allocation at the point of substitution
Generated by: [System]
Published in: Russo, V 2017
Database: ecoinvent
isCopyrightProtected: true
accessRestrictedTo: 1

## General comment
This dataset represents the production of 1 kg of maize flour, as well as the secondary products maize chop and maize screenings from global dry milling practices. Maize flour (or corn meal) is a common staple food made from maize ground to different consistencies of fine, medium or coarse. In this dataset maize flour represents all grades of maize meal (sifted, super, special, unsifted etc.), maize rice, maize grits and other products, all intended for human consumption. The secondary products are intended for use in animal feed as an energy and/or protein source, particularly in beef production. The module includes the receiving of maize and processing thereof through multiple cleaning, grinding and sieving steps. Activities that have been considered in this dataset are the inputs of maize, water, electricity, land, infrastructure and an output of waste water.
Boundary of exchanges for maize grain processing by dry milling

## Included activities start
This activity starts with the maize received at the gate of the dry milling plant. Maize received is weighed on weighbridges before entering the plant. Stones, sand, sticks, etc. contained in the maize are removed during the initial cleaning process step.

## Included activities end
This activity ends with the delivery of 1 kg of maize flour, along with by-product(s), at the factory gate of the dry milling plant.

## Geography
The inventory is based on calculations made for South Africa.

## Technology
The data are intended to reflect current equipment and processes.

## Time period
The production data represented in this dataset are based on International Grain Council (IGC) supply and demand data for the 2016/2017 marketing season retrieved online. Reference(s): IGC (2017) Market Information - Supply and Demand, International Grain Council, Available at: https://www.igc.int/en/markets/marketinfo-sd.aspx. (Accessed November 2017); IGC (2014) Five-Year Global Supply and Demand Projections, International Grain Council, Available at: http://www.igc.int/en/downloads/grainsupdate/igc_5yrprojections2014.pdf. (Accessed November 2017).

## Parameters
- fraction, tap water, to air: 0.9; lognormal variance with pedigree 0.092025, pedigree (4,4,3,2,4)
- fraction, process water, to air: 0.32 dimensionless; lognormal variance with pedigree 0.092025, pedigree (4,4,3,2,4)
  Estimate, not geography specific. Water is used to clean the maize received ( to remove stones, sand, sticks, etc. picked up from the field during the harvesting of the maize and during storage) and to increase the moisture content of the grain. The estimate that 32% of water input is consumptive is from literature for a European mill: Salzgeber & Lörcher (1996), cited in "maize grain, feed production, GLO"
- fraction, material rejected: 0.06 dimensionless; name reject_material; lognormal variance with pedigree 0.052025, pedigree (4,4,3,2,4)
  Maize screenings: 6% of maize received is estimated to be reject material (foreign matter and defective kernels), representative of a high grade of maize (see comment on maize grain from technosphere for references). Maize received is weighed on weighbridges before entering the plant and contains stones, sand, sticks, etc. which are removed during the initial cleaning process step. Defective kernels and foreign matter (maize screenings) are assumed to be mixed in with the chop and sold as an animal feed product (personal communication with mill operator). Maize screenings are fed to livestock as an energy feed. A gross energy content of 18.5 MJ/kg dry matter (DM) and DM of 87% of feed was applied in this dataset, based on properties of "maize bran" (Feedipedia, 2015). While maize bran theoretically consists of the bran coating removed during the early stages of processing, in practice the maize bran sold as livestock feed is generally a mixture of the bran fraction and other by-products (Feedipedia, 2015). Reference(s): Feedipedia (2015) Animal Feed Resources Information System: Maize Bran and Hominy Feed, Available at: https://www.feedipedia.org/node/712. (Accessed October 2017).

## Reference product
- maize chop: 1 kg; name by_product; By-product classification allocatable product; CPC 01122: Maize (corn), other; pedigree (1,1,1,1,1)
  This figure is based on the annual average output of products from dry milling for human consumption in South Africa reported by SAGIS (South African Grain Information Service) on a monthly basis (July 2015 - June 2016). Maize processed for human consumption refers to dry milling for the production of samp, maize meal, rice, grits and other products for human consumption, and a hominy chop by-product sold into the animal feed industry. Reference(s): SAGIS (2016) Maize Products per Month Manufactured - July 2015 to June 2016, South African Grain Information Service. Available at: www.sagis.org.za. (Accessed April 2017)
  production volume 3.21321e10 kg; name ref_product_chop; = ref_product_flour* by_product
    Calculated from production volume of reference product using the relative outputs.
  property price 0.1 EUR2005; name by_product_price_EUR2005
    Estimated value. According to LFC Milling PTY (Ltd), the price of maize chop is set at 85% of the price of maize grain. Price of maize grain is set to 0.12 comment: Literature value. Based on SAFEX price of R 2,025 per tonne (average yellow and white). Source: SAGIS, 2018. Retrieved from: http://www.sagis.org.za/safex_historic.html, accessed 28May2018.
  property carbon content, fossil 0; name by_product_C_content_fossil
    fossil carbon content on a dry matter basis
  property dry mass 0.893 kg; name by_product_DM
  property gross energy, feed per kg of dry mass 18.7 MJ/kg; name by_product_gross_E_feed_per_kg_DM
    A gross energy content of 18.7 MJ/kg dry matter (DM) applied in this dataset, based on properties of "hominy feed" (Feedipedia, 2015). Reference(s): Feedipedia (2015) Animal Feed Resources Information System: Maize Bran and Hominy Feed, Available at: https://www.feedipedia.org/node/712. (Accessed October 2017).
  property wet mass 1 kg; name by_product_WM
  property water content 0.119821; name by_product_water_content
  property carbon content, non-fossil 0.46957; name by_product_C_content_non_fossil
    Have assumed the same as maize grain input
  property water in wet mass 0.107 kg; name by_product_WWM
  property carbon content 0.46957
    carbon content on a dry matter basis (reserved; not for manual entry)
  property true value 0.042; name by_product_true_value
    allocation property applied in "true value" allocation // value calculated from revenue
  properties: carbon allocation 0.419326 kg
- maize flour: 0 kg; name ref_product; CPC 23120: Other cereal flours; By-product classification allocatable product
  This includes maize flour (sifted, special, super and unsifted), maize meal, samp, maize rice, maize grits and other maize products intended for human consumption. This figure is based on the annual average output of products from dry milling for human consumption in South Africa reported by SAGIS (South African Grain Information Service) on a monthly basis (July 2015 - June 2016). Maize processed for human consumption refers to dry milling for the production of samp, maize meal, rice, grits and other products for human consumption, and a hominy chop by-product sold into the animal feed industry. Reference(s): SAGIS (2016) Maize Products per Month Manufactured - July 2015 to June 2016, South African Grain Information Service. Available at: www.sagis.org.za. (Accessed April 2017)
  production volume 7.6505e10 kg; name ref_product_flour
    Calculated from the annual consumption of maize for food (114.4 million tonnes) and the fraction of total product that is maize flour. This production figure represents the maize consumed for food forecast for 2016/2017 marketing season by the International Grain Council (IGC, 2017). Food category assumed to refer to dry milling, as industrial use includes starch production (wet milling) and ethanol production (IGC, 2014). It was further assumed that the breakdown of the milled products would be the same as that for South Africa, i.e. about 70% for products for human consumption and the remaining 30% for maize chop for animal consumption (SAGIS, 2017). Reference(s): IGC (2017) Market Information - Supply and Demand, International Grain Council, Available at: https://www.igc.int/en/markets/marketinfo-sd.aspx. (Accessed November 2017); IGC (2014) Five-Year Global Supply and Demand Projections, International Grain Council, Available at: http://www.igc.int/en/downloads/grainsupdate/igc_5yrprojections2014.pdf. (Accessed November 2017); SAGIS (2017) Supply and Demand: Marketing Year March 2016 to February 2017, South African Grain Information Service. Available at: http://www.sagis.org.za/sd_marketing_year.html. (Accessed August 2017).
  property price 0.36 EUR2005; name ref_product_price_EUR2005
    Personal communication.
  property water in wet mass 0.11 kg; name ref_product_WWM
  property digestable energy content 13.78 MJ/kg
    A weighted average based on the % breakdown of the different maize products for human consumption in South Africa (i.e. maize meal, samp, maize rice, maize grits and other maize products intended for human consumption) and the energy content of representative maize products produced in the region.
  property dry mass 0.89 kg; name ref_product_DM
  property water content 0.123596; name ref_product_water_content
  property wet mass 1 kg; name ref_product_WM
  property carbon content, fossil 0; name ref_product_C_content_fossil
    fossil carbon content on a dry matter basis
  property carbon content, non-fossil 0.46957; name ref_product_C_content_non_fossil
    Have assumed the same as maize grain input
  property carbon content 0.46957
    carbon content on a dry matter basis (reserved; not for manual entry)
  property true value 0.36; name ref_product_true_value
    allocation property applied in "true value" allocation // value calculated from revenue
  properties: carbon allocation 0.417917 kg

## By-products
- energy feed, gross: 0 MJ; name reject_product; CPC 23319: Preparations used in animal feeding n.e.c.; By-product classification allocatable product; pedigree (1,1,1,1,1)
  (same comment as for fraction, material rejected)
  production volume 1.11607e11 MJ; = ref_product_flour* reject_product
    Calculated from production volume of reference product using the relative outputs.
  property price 0.0108 EUR2005; name reject_product_price_EUR2005
    Based on energy feed, gross content in soybean meal and prices per kg of soybean meal. Assumed soybean meal is the most used feed. Soybean meal 2004 prices for World import/export data (tonnes and US$) from FaoStat statistics (http://faostat.fao.org/site/535/default.aspx#ancor, TRADE)- [Accessed 24 May 2010]. See calculations for protein /energy content
  property gross energy, feed per kg of dry mass 18.5 MJ/kg; name reject_product_gross_E_feed_per_kg_DM
    A gross energy content of 18.5 MJ/kg dry matter (DM) applied in this dataset, based on properties of "maize bran" (Feedipedia, 2015). While maize bran theoretically consists of the bran coating removed during the early stages of processing, in practice the maize bran sold as livestock feed is generally a mixture of the bran fraction and other by-products (Feedipedia, 2015). Reference(s): Feedipedia (2015) Animal Feed Resources Information System: Maize Bran and Hominy Feed, Available at: https://www.feedipedia.org/node/712. (Accessed October 2017).
  property dry mass 0.047027 kg; name reject_product_dry_mass
  property water in wet mass 0.00702703 kg; name reject_product_water_in_wet_mass
  property carbon content 0.46957
    carbon content on a dry matter basis (reserved; not for manual entry)
  property true value 0.0157553; name reject_product_true_value
    allocation property applied in "true value" allocation // value calculated from revenue
  properties: wet mass 0.0540541 kg, carbon content, non-fossil 0.46957, water content 0.149425, carbon content, fossil 0, carbon allocation 0.0220825 kg
- electricity, for reuse in municipal waste incineration only: 0 kWh; CPC 17100: Electrical energy; By-product classification allocatable product; pedigree (1,1,1,1,1)
  Net electricity generated from this waste and used in internal MSWI plant energy redistribution.
  Uncertainty: uncertainty is calculated from uncertainties in waste composition and uncertainties in energy efficiency and the uncertainty in internal energy demand
  production volume 37140.2 kWh
  property exergy 3.6 MJ; name E_el_prod_MSWI_exergy
    This exergy property is based on the exergy content of the product.
  property true value relation 3.6; name E_el_prod_MSWI_true_value_relation
    property to calculate "true value" from
  property price 0.1 EUR2005; name E_el_prod_MSWI_price_EUR2005
    Estimated to be the same price as in case of electricity, medium voltage.
  property true value 6.23735e-8
    allocation property applied in "true value" allocation // value calculated from true value relation
- heat, for reuse in municipal waste incineration only: 0 MJ; CPC 17300: Steam and hot water; By-product classification allocatable product; pedigree (1,1,1,1,1)
  Net useful heat generated from this waste and used in internal MSWI plant energy redistribution.
  Uncertainty: uncertainty is calculated from uncertainties in waste composition and uncertainties in energy efficiency and the uncertainty in internal energy demand
  production volume 262762 MJ
  property true value relation 0.1842; name E_th_prod_MSWI_true_value_relation
    property to calculate "true value" from
  property exergy 0.1842 MJ; name E_th_prod_MSWI_exergy
    This exergy property is based on the exergy content of the product.
  property price 0.0106 EUR2005; name E_th_prod_MSWI_price_EUR2005
    Average European district heat price from Ecoheatcool and Euroheat 2005-2006, Ecoheat Work package 1: The European heat market. Final report. 10.6 EUR/GJ i s the price of district heat. http://www.solarthermalworld.org/files/Ecoheatcool%20WP1%20Web.pdf?download
  property true value 2.2579e-8
    (same comment as for electricity, for reuse in municipal waste incineration only)
- zinc concentrate: 0 kg; CPC 14290: Other non-ferrous metal ores and concentrates (other than uranium or thorium ores and concentrates); By-product classification allocatable product
  Calculated value from the knowledge of the properties of both products.
  production volume 6.57383 kg
  property price 0.38 EUR2005; name ByP_price_EUR2005
    Temporary price data. Calculated as 90% of purchasers price based on: Zinc content in concentrate 53%. Concentrate price per kg Zn 86.5% of refined Zn price (13.5% treatment charges according to CHR Metals Limited 2005: Dynamic cost curves. http://www.minecost.com/dynamic.pdf). 2004 zinc price from USGS (2007) Mineral commodity summaries 2007. <http://minerals.usgs.gov/minerals/pubs/mcs/2007/mcs2007.pdf> [Accessed 25 May 2010]
  property zinc content 0.53; name zinc_C_zinc_concentrate
    Zinc content on a dry matter basis. Value taken from teh "zinc mine operation" /GLO dataset.
  property dry mass 1 kg; name DM_zinc_concentrate
  property carbon content 0
    carbon content on a dry matter basis (reserved; not for manual entry)
  property true value 3.26522e-11
    allocation property applied in "true value" allocation // value calculated from revenue
  properties: wet mass 1 kg, water content 0, carbon content, non-fossil 0, carbon content, fossil 0, water in wet mass 0 kg, carbon allocation 0 kg

## Inputs from technosphere
- wastewater, unpolluted: -4.78558e-6 m3; name waste_water; lognormal variance with pedigree 0.004, pedigree (2,3,2,5,1)
  Estimate, not geography specific. Water is used to clean the maize received ( to remove stones, sand, sticks, etc. picked up from the field during the harvesting of the maize and during storage) and to increase the moisture content of the grain. The water does not contain any chemicals, only minor impurities from the washing process, and is thus considered to be unpolluted. The waste water is released to the municipal sewage system, without prior treatment, based on information provided by two South African mills. The estimate that 32% of water input is consumptive is from literature for a European mill: Salzgeber & Lörcher (1996), cited in "maize grain, feed production, GLO".
  production volume 1.52949e6 m3; = ref_product_flour* waste_water
    Calculated from production volume of reference product using the relative outputs.
  property price 0 EUR2005; name waste_water_price_EUR2005
  properties: water content 2962.17, dry mass 0.337476 kg, carbon content, fossil 0.00178991, wet mass 1000 kg, carbon content, non-fossil 0.00178991
  note on carbon content, fossil: Assumed to be like in tap water. Bicarbonate content is 2.93 mol/m3. CO2 content is 0.1 mol/m3 (ecoinvent v2.2 report 8, Tab 93.1).
- electricity, low voltage: 0 kWh; pedigree (1,1,1,1,1)
  Average electricity use of two dry milling facilities in South Africa: 26 kWh/tonne based on annual production data of a combined wheat & maize mill, and 86 kWh/tonne based on hourly production data of a dedicated maize mill.
  EcoSpold01Location=CH
- building, multi-storey: 2.89643e-6 m3; lognormal variance with pedigree 0.212, pedigree (3,5,5,5,4)
  Estimation. Not geography specific. Value scaled to reference product. Comment from "maize grain, feed production, GLO": The typical storage capacity of the cereal silo found in some feed processing centres in Switzerland is 10,000 tonnes, with an effective storage volume of about 80% of the building volume. With an average grain specific weight of 750 kg/m3, this gives a building volume of about 16,650 m3. Assuming that these feed processing centres process 25,000 tonnes of grain per year, the cereals will be stored for about three months before being processed. The largest feed processing centre in Switzerland (UFA-Biblis) has a feedstuff storage compound of 29,440 m3 (80 m length * 23 m * 16 m height) with an effective storage capacity of 4,140 tonnes (5520 palettes of 750 kg), or about 150 kg/m3 (UFA 2002). This centre processes 275,000 tonnes of concentrate feeds yearly. After processing, the feedstuff must therefore be stored for approx. one week in the processing centre before being sent to the regional storehouse. The average length of storage of the raw materials is set at 3 months in the calculations. The storage volume required was estimated as 1.7 m3/tonne of raw material (grain specific weight 750 kg/m3 and 80% of the building volume used for storage). The lifetime of the storage silo was assumed to be 50 years, the length of the construction phase 2 years. Land use was estimated from the height of Biblis’s storage silo (UFA 2002). Taking the height of 16 m, the area used is 0.1 m2/tonne of feedstuff for 3 months.
- tap water: 0 kg; name water_input; pedigree (1,1,1,1,1)
  Average water use of two dry milling facilities in South Africa. The two mills show very different water usage rates (1.3 litres/tonne and 40 litres/tonne). The former is calculated from annual water use and production tonnages, and the latter on hourly production data.
  properties: water content 2962.17, wet mass 1 kg, dry mass 0.000337476 kg, carbon content, fossil 0.00178991
  note on carbon content, fossil: Estimate not geography specific. Value and comment from "maize grain, feed production, GLO": Bicarbonate content is 2.93 mol/m3. CO2 content is 0.1 mol/m3 (ecoinvent v2.2 report 8, Tab 93.1).
- industrial machine, heavy, unspecified: 4.42843e-6 kg; lognormal variance with pedigree 0.1306, pedigree (5,5,5,5,4)
  Estimate from industrial machinery used in "Limestone, crushed, for mill production" (annual production of 195,000 tonnes), which is assumed to provide a good proxy for flour milling. Value adapted on the basis of annual production, which was estimated to be an average of 415,000 tonnes per year, based on the production figures of two dry milling facilities in South Africa. The estimated life span of the machines is 25 years.
- maize grain: 0 kg; name maize_received; pedigree (1,1,1,1,1)
  This figure represents maize received at the gate of the dry milling plant to produce 1 kg milled maize products. An average of 6% of maize received is estimated to be reject material (foreign matter and defective kernels), representative of a high grade of maize. Maize received is weighed on weighbridges before entering the plant and contains stones, sand, sticks, etc. which are removed during the initial cleaning process step. Maximum permissable levels of deviations depend on the grade of maize, and range from 8% to 30%, this includes foreign matter (with max permissable levels ranging from 0.3%-0.75%) and defective maize kernels. Quality sampling over the period 2001/02 - 2010/11 suggests the majority of maize produced falls within the standard, with a weighted average of 6.2% total deviations over this period (with a weighted average foreign matter of 0.2%). References: Department of Agriculture (2009). Regulations relating to the grading, packing and marking of maize intended for sale in the Republic of South Africa. Government gazette, 8 May 2009; Southern African Grain Laboratory (SAGL) (2011) South African Maize Crop Quality Report 2010/2011 Season.
  property water in wet mass 0.14 kg; name maize_grain_water_in_wet_mass
  property dry mass 0.86 kg; name maize_grain_dry_mass
  properties: water content 0.162791, carbon content, non-fossil 0.46957, wet mass 1 kg
  note on carbon content, non-fossil: Estimate not geography specific. Value from "maize grain, feed production, GLO".
- electricity, low voltage: 8.01874e-6, 0.000204591, 1.08776e-6, 3.49601e-6, 7.10882e-6, 5.01131e-7, 5.85103e-6, 3.7317e-6, 4.99178e-5, 0.000152773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 kWh (36 entries); lognormal variance with pedigree 0.004, pedigree (2,3,2,5,1)
  (same comment as for electricity, low voltage)
- tap water: 7.93669e-6, 0.00282632, 6.59341e-5, 1.31167e-5, 0.000330751, 8.60441e-6, 0.00378495 kg (7 entries); lognormal variance with pedigree 0.0434, pedigree (2,3,2,5,1)
  (same comment as for tap water)
- maize grain: 0.0152307, 0.346378 kg (2 entries); lognormal variance with pedigree 0.004, pedigree (2,3,2,5,1)
  (same comment as for maize grain)
  properties: water content 0.162791, carbon content, non-fossil 0.46957, wet mass 1 kg, dry mass 0.86 kg

## Inputs from nature
- Transformation, to industrial area [natural resource, land]: 3.39912e-7 m2; source UFA 2002; lognormal variance with pedigree 0.212, pedigree (3,5,5,5,4)
  Estimation. Not geography specific. Value scaled to reference product. Comment from "maize grain, feed production, GLO": Corresponds to occupation industrial area/50 years (the lifetime of the storage silo was assumed to be 50 years).
- Occupation, construction site [natural resource, land]: 6.82217e-7 m2*year; source UFA 2002; lognormal variance with pedigree 0.132, pedigree (3,5,5,5,4)
  Estimation. Not geography specific.. Value scaled to reference product. Comment from "maize grain, feed production, GLO":Corresponds to land use Transformation*2 years (the length of the construction phase is 2 years).
- Transformation, from unspecified [natural resource, land]: 3.39912e-7 m2; source UFA 2002; lognormal variance with pedigree 0.212, pedigree (3,5,5,5,4)
  Estimation. Not geography specific. Value scaled to reference product. Comment from "maize grain, feed production, GLO":Corresponds to occupation industrial area/50 years (the lifetime of the storage silo was assumed to be 50 years).
- Occupation, industrial area [natural resource, land]: 1.70195e-5 m2*year; source UFA 2002; lognormal variance with pedigree 0.132, pedigree (3,5,5,5,4)
  Estimation. Not geography specific. Value scaled to reference product. Comment from "maize grain, feed production, GLO":Corresponds to 0.2m2/tonne (because the total area occupied as “industrial area” was estimated as twice as high, namely 0.2 m2/tonne) multiplied by 3 months (because the average length of storage of the raw materials is set at 3 months in the calculations).

## Emissions to nature
- Water [water, unspecified]: 1.33346e-5 m3; lognormal variance with pedigree 0.0034, pedigree (2,3,2,5,1)
  Water balance of mill. All water not in products or leaving via waste water stream is assumed to have been lost to air.

## Sampling procedure
Extrapolated from South African data, uncertainty adjusted accordingly.
