# isophthalic acid based unsaturated polyester resin production

Dataset: EcoSpold 2, unit process
Geography: RER
Time period: 2013-01-01 to 2019-12-31
Technology level: current
Classification: ISIC rev.4 ecoinvent: 2013:Manufacture of plastics and synthetic rubber in primary forms
Synonyms: UP resin
Scenario: Business-as-Usual
System model: Allocation at the point of substitution
Generated by: Etienne LEES-PERASSO
Published in: Eelco Rietveld 2014
Database: ecoinvent
isCopyrightProtected: true
accessRestrictedTo: 1

## General comment
This dataset represents the production of unsaturated polyester resins (UPR).
This resin belongs to the unsaturated polyester composite resin category. They are often used as matrix for composite materials, when applied on glass fibre or natural fibres (ex: flax).
The perimeter of this data includes the manufacturing of the resin from raw materials.

Resin type is Isophthalic acid (ISO) based unsaturated polyester resin (UPR).
Typical characteristics:
Appearance: Homogeneous liquid resin.
Main applications: Marine.
Other possible applications: Swimming pool.
Specific weight at 20 °C: 1,10g/cm3
Viscosity (mPa.s): V25 - Brookfield at 23 oC, Spindle Speed 50rpm: 550-650.
Solid content (%) PC53: 50-54.
They are among the most used thermoset resins. They have uses in many applications. The Isophthtalic resins have better mecanical and chemical properties than orthophthalic acid based resin, and are used for more specific purposes.
The use of one resin over another depends on the user required physical caracteristics.
Data for the life cycle inventory for this resin were primarly taken from the Ernst & Young Report: "Life cycle assessment of four generic unsaturated polyester (UP) resins and one vinyl ester (VE) resins", Revised version, September 2014. The following companies participated in the study: Reichhold, Polynt Composites, Ashland Performance Materials.

## Included activities start
Cradle to gate. This activity starts with the raw materials delivery at the manufacturing plant gate.

## Included activities end
Cradle to gate. This activity ends with the isophthalic acid based unsaturated polyester resin at the manufacturing plant gate. Packaging is not included.

## Geography
Based on the average production of three European producers: Polynt Composites, Reichhold and Ashland, representing a significant part of the European production.

## Technology
This resin is manufactured from styrene, maleic anhydrid, isophtalic acid, propylene glycol and di ethylene glycol.
Resin manufacturing process. Source : "Life cycle assessment of four generic unsaturated polyester (UP) resins and one vinyl ester (VE) resins", Revised version, September 2014, Ernst & Young Accountants
Not included in this dataset, there are different shaping solutions for this resin in order to obtain a usable, finished or semi-finished product. The most common are sheet molding compound (SMC) and bulk moulding compound (BMC). It can be reinforced with fibres, such as glass fibre, in order to modify its mecanical properties and allow new uses.

## Reference product
- isophthalic acid based unsaturated polyester resin: 1 kg; By-product classification allocatable product; CPC 34740: Polyacetals, other polyethers and epoxide resins, in primary forms; polycarbonates, alkyd resins, polyallyl es[…]
  This resin belongs to the unsaturated polyester composite resin category. They are often used as matrix for composite materials, when applied on glass fibre or natural fibres (ex: flax). Typical characteristics: Appearance: Homogeneous liquid resin. Main applications: Marine. Other possible applications: Swimming pool. Specific weight at 20 °C: 1,10g/cm3 Viscosity (mPa.s): V25 - Brookfield at 23 oC, Spindle Speed 50rpm: 550-650. Solid content (%) PC53: 50-54. They are among the most used thermoset resins. They have uses in many applications. The Isophthtalic resins have better mecanical and chemical properties than orthophthalic acid based resin, and are used for more specific purposes. The use of one resin over another depends on the user required physical caracteristics.
  production volume 1.5e8 kg; = 600000000/4
    Total production of west Europe UPR resins in 2013. No distinction could be made between the different UPR resin as no more specific data was available. 1/4 of the total production volume has been allocated to each resin.
  property price 1.31524 EUR2005
    Calculated based on inputs: The price of the product has been calculated as a sum of the values of the material and energy inputs for this product. This value is therefore a rough estimation. It may underestimate the real price since there are additional expenses when producing any product. These expences can include for example labour costs, treatment of waste materials and profit for the producer. Please consider carefully whether this level of data quality is acceptable for your application.
  property carbon content 0.712854
    carbon content on a dry matter basis (reserved; not for manual entry)
  property true value 1.31524
    allocation property applied in "true value" allocation // value calculated from revenue
  properties: wet mass 1 kg, water content 0, water in wet mass 0 kg, carbon content, fossil 0.712854, dry mass 1 kg, carbon content, non-fossil 0, carbon allocation 0.712854 kg

## By-products
- heat, for reuse in municipal waste incineration only: 0 MJ; CPC 17300: Steam and hot water; By-product classification allocatable product; pedigree (1,1,1,1,1)
  Net electricity generated from this waste and used in internal MSWI plant energy redistribution.
  Uncertainty: uncertainty is calculated from uncertainties in waste composition and uncertainties in energy efficiency and the uncertainty in internal energy demand
  production volume 674.789 MJ
  property exergy 0.1842 MJ; name E_th_prod_MSWI_exergy
    This exergy property is based on the exergy content of the product.
  property price 0.0106 EUR2005; name E_th_prod_MSWI_price_EUR2005
    Average European district heat price from Ecoheatcool and Euroheat 2005-2006, Ecoheat Work package 1: The European heat market. Final report. 10.6 EUR/GJ i s the price of district heat. http://www.solarthermalworld.org/files/Ecoheatcool%20WP1%20Web.pdf?download
  property true value relation 0.1842; name E_th_prod_MSWI_true_value_relation
    property to calculate "true value" from
  property true value 8.61376e-9
    allocation property applied in "true value" allocation // value calculated from true value relation
- electricity, for reuse in municipal waste incineration only: 0 kWh; CPC 17100: Electrical energy; By-product classification allocatable product; pedigree (1,1,1,1,1)
  (same comment as for heat, for reuse in municipal waste incineration only)
  production volume 94.8803 kWh
  property true value relation 3.6; name E_el_prod_MSWI_true_value_relation
    property to calculate "true value" from
  property price 0.1 EUR2005; name E_el_prod_MSWI_price_EUR2005
    Estimated to be the same price as in case of electricity, medium voltage.
  property exergy 3.6 MJ; name E_el_prod_MSWI_exergy
    This exergy property is based on the exergy content of the product.
  property true value 2.34091e-8
    (same comment as for heat, for reuse in municipal waste incineration only)
- zinc concentrate: 0 kg; CPC 14290: Other non-ferrous metal ores and concentrates (other than uranium or thorium ores and concentrates); By-product classification allocatable product
  Calculated value from the knowledge of the properties of both products.
  production volume 0.0128362 kg
  property price 0.38 EUR2005; name ByP_price_EUR2005
    Temporary price data. Calculated as 90% of purchasers price based on: Zinc content in concentrate 53%. Concentrate price per kg Zn 86.5% of refined Zn price (13.5% treatment charges according to CHR Metals Limited 2005: Dynamic cost curves. http://www.minecost.com/dynamic.pdf). 2004 zinc price from USGS (2007) Mineral commodity summaries 2007. <http://minerals.usgs.gov/minerals/pubs/mcs/2007/mcs2007.pdf> [Accessed 25 May 2010]
  property zinc content 0.53; name zinc_C_zinc_concentrate
    Zinc content on a dry matter basis. Value taken from teh "zinc mine operation" /GLO dataset.
  property dry mass 1 kg; name DM_zinc_concentrate
  property carbon content 0
    carbon content on a dry matter basis (reserved; not for manual entry)
  property true value 3.17445e-12
    allocation property applied in "true value" allocation // value calculated from revenue
  properties: wet mass 1 kg, water content 0, carbon content, non-fossil 0, carbon content, fossil 0, water in wet mass 0 kg, carbon allocation 0 kg

## Inputs from technosphere
- electricity, low voltage: 0.0953 kWh; lognormal variance with pedigree 0.0012, pedigree (1,3,1,1,1)
  Value based on data from three producers.
- purified terephthalic acid: 0.24 kg; name ISO; lognormal variance with pedigree 0.0326, pedigree (1,3,1,1,1)
  Value based on data from three producers.
  properties: dry mass 1 kg, carbon content, fossil 0.578313, wet mass 1 kg
- wastewater, average: 0 m3; pedigree (1,1,1,1,1)
  production volume 0 m3
    Calculated from production volume of reference product using the relative outputs.
  properties: carbon content, non-fossil 0.194039, water content 2882.2, wet mass 1000 kg, dry mass 0.346837 kg
  note on carbon content, non-fossil: 0.0673 kg TOC/m3 (Tab A.17, ecoinvent v2.2 report 13_I). TOC was considered as Total Carbon.
- nitrogen, liquid: 0.03627 kg; lognormal variance with pedigree 0.0012, pedigree (1,3,1,1,1)
  Value based on data from three producers.
  properties: dry mass 1 kg, wet mass 1 kg
- styrene: 0.4 kg; name STYR; lognormal variance with pedigree 0.0012, pedigree (1,3,1,1,1)
  Value based on data from three producers.
  properties: wet mass 1 kg, carbon content, fossil 0.923077, dry mass 1 kg
- propylene glycol, liquid: 0.2 kg; name PROPYL; lognormal variance with pedigree 0.0012, pedigree (1,3,1,1,1)
  Value based on data from three producers.
  properties: dry mass 1 kg, carbon content, fossil 0.473684, wet mass 1 kg
- steam, in chemical industry: 0.64 kg; lognormal variance with pedigree 0.0012, pedigree (1,3,1,1,1)
  Value based on data from three producers.
- diethylene glycol: 0.07 kg; name DIETHYL; lognormal variance with pedigree 0.0326, pedigree (1,3,1,1,1)
  Value based on data from three producers.
  properties: dry mass 1 kg, wet mass 1 kg, carbon content, fossil 0.45283
- heat, district or industrial, natural gas: 0.8505 MJ; lognormal variance with pedigree 0.0012, pedigree (1,3,1,1,1)
  Based on a calorific value of 10.5 kWh/m3. Activity link has been defined as the ratio between heat from natural gas and heavy fuel oil iw known.
- maleic anhydride: 0.16 kg; lognormal variance with pedigree 0.0012, pedigree (1,3,1,1,1)
  properties: carbon content, fossil 0.489955, wet mass 1 kg, dry mass 1 kg
- chemical factory, organics: 4e-10 unit; lognormal variance with pedigree 0.476025, pedigree (4,5,5,2,5)
  Estimation. Data was estimated based on the dataset "chemical plant, organics". This module assumes a built area of about 4.2 ha, an average output of 50'000 t/a, and plant life of fifty years.
- hazardous waste, for incineration: 0 kg; pedigree (1,1,1,1,1)
  production volume 0 kg
    Calculated from production volume of reference product using the relative outputs.
  properties: wet mass 1 kg, dry mass 0.75 kg, water content 0.333333, carbon content, fossil 0.554667
  note on carbon content, fossil: Tab A.6, ecoinvent v2.2 report 13_I. C content has been calculated after data in the tables, and then referred to 1 kg DM
- heat, district or industrial, other than natural gas: 0.25891 MJ; lognormal variance with pedigree 0.0012, pedigree (1,3,1,1,1)
  Based on a calorific value of 12.4 kWh/kg. Activity link has been defined as the ratio between heat from natural gas and heavy fuel oil iw known.
  properties: corresponding fuel use, propane, furnace >100kW 1.05263 MJ
  note on corresponding fuel use, propane, furnace >100kW: Lower heating value of the fuel input related to the heat/electricity output, taken directly from ecoinvent v3.0 dataset "heat production, natural gas, at industrial furnace >100kW, GLO 2000".
- municipal solid waste: -0.000336 kg; lognormal variance with pedigree 0.0018, pedigree (2,3,1,1,1)
  production volume 50400 kg; = Ref('7912f279-a1c2-4678-9d15-c5e0c76ce9d6', 'ProductionVolume') * ((Ref('2e4389c2-f6d6-416f-b246-179e596abe6b')*-1) / Ref('7912f279-a1c2-4678-9d15-c5e0c76ce9d6'))
    Calculated from production volume of reference product using the relative outputs.
  properties: dry mass 0.771 kg, carbon content, fossil 0.171549, carbon content, non-fossil 0.261655, water content 0.297017, wet mass 1 kg
  note on carbon content, fossil: MSW composition in tab 4.1, ecoinvent v2.2 report 13_I. C content referred to 1 kg DM
- wastewater, average: -1.79664e-5, -1.94362e-6 m3 (2 entries); lognormal variance with pedigree 0.0018, pedigree (2,3,1,1,1)
  production volume 2986.5 m3
- hazardous waste, for incineration: -1.36434e-6, -3.56629e-8 kg (2 entries); lognormal variance with pedigree 0.0018, pedigree (2,3,1,1,1)
  production volume 210 kg

## Emissions to nature
- Water [air, unspecified]: 7e-5 m3; lognormal variance with pedigree 0.0486, pedigree (4,3,1,1,1)
  Estimation based on the hypothesis that all condensating water is evaporating.
- Nitrogen [air, unspecified]: 0.03627 kg; lognormal variance with pedigree 0.0486, pedigree (4,3,1,1,1)
  Estimation based on the hypothesis that all used nitrogen is emitted to air.

## Sampling procedure
The data come from three different European producers. The average values have been used.

## Extrapolations
The infrastructure impacts have been assessed based on chemical industry average infrastructure, as no specific data was available.
