# finishing, textile, woven cotton

Dataset: EcoSpold 2, unit process
Geography: GLO
Time period: 2016-01-01 to 2019-12-31
Technology level: current
Classification: EcoSpold01Categories: textiles/processing
Classification: ISIC rev.4 ecoinvent: 1313:Finishing of textiles
Scenario: Business-as-Usual
System model: Allocation at the point of substitution
Generated by: Mireille Faist Emmenegger
Published in: Cotton Inc 2017
Database: ecoinvent
isCopyrightProtected: true
accessRestrictedTo: 1

## General comment
Data collected from mostly vertically integrated mills on a global level. The activity begins with dyed, woven cotton and ends with cotton finished. It includes electricity use and chemicals (softeners, water repellents, wrinkle resist, flame retardants, catalysts, etc). It does not include the cotton fibres.

## Included activities start
The activity begins with dyed, woven cotton.

## Included activities end
The activity ends with cotton fabric finished and dryed. The dataset needs to be used with 1kg of fabric

## Geography
Data collected from mostly vertically integrated mills on a global level (Eurasia, East Asia, South/Central Asia, and Latin America).

## Reference product
- finishing, textile, woven cotton: 1 kg; CPC 88213: Textile finishing services; By-product classification allocatable product; pedigree (1,1,1,1,1)
  production volume 3.7685e10 kg; name pv_finish; = 75370000000/2
    assumption: 50% knit 50% woven Source: The Fibre Year, FAO, own calculations
  property price 0.122532 EUR2005
    Calculated based on inputs: The price of the product has been calculated as a sum of the values of the material and energy inputs for this product. This value is therefore a rough estimation. It may underestimate the real price since there are additional expenses when producing any product. These expences can include for example labour costs, treatment of waste materials and profit for the producer. Please consider carefully whether this level of data quality is acceptable for your application.
  property true value 0.122532
    allocation property applied in "true value" allocation // value calculated from revenue

## By-products
- iron scrap, sorted, pressed: 0 kg; By-product classification Recyclable; CPC 39310: Slag, dross, scalings and other waste from the manufacture of iron or steel; pedigree (1,1,1,1,1)
  metallic iron scrap removed from ash reamains and recycled.
  Uncertainty: uncertainty is calculated from uncertainties in waste composition and transfer coefficients to soild residues
  production volume 47420.2 kg
  property price 0.175 EUR2005
    Temporary price data. Calculated as 90% of purchasers price based on: 2005 import and export prices (total trades (USD) divided by total weight (kg) in biggest economies of the world: EU27, USA, Brasil, China, India, Japan and Russia) from UN Commodity Trade Statistics Database (http://data.un.org/Explorer.aspxDatabase [Accessed 2011.06.20]). Commodity: Waste or scrap, of cast iron
  property carbon content 0
    carbon content on a dry matter basis (reserved; not for manual entry)
  property true value 1.88669e-7
    allocation property applied in "true value" allocation // value calculated from revenue
  properties: carbon content, non-fossil 0, wet mass 1 kg, dry mass 1 kg, water content 0, carbon content, fossil 0, water in wet mass 0 kg, carbon allocation 0 kg
- copper: 0 kg; source Rentz O. 1999; By-product classification allocatable product; CPC 41413: Refined copper and copper alloys, unwrought; master alloys of copper
  Literature value. Copper uses: Before end-use copper is manufactured into semi fabricated products, such as shapes and ingots (known as 'semis'). These manufacturing processes are subdivided into hot working, cold working and, if necessary, process annealing. Few of the semis are ready for use as such. They more typically travel to first-stage manufacturers, who make metal rods, wire, and casting, and then to component manufacturers who produce such things as motors, valves, and insulated cables The components in turn are incorporated by final-stage manufacturers into a variety of finished products - automobiles, commercial buildings, residential housing, and so forth. These uses account for about 79% of the world-wide consumption of copper.
  production volume 1528.04 kg
  property price 5.52 EUR2005
    Literature value (http://www.economist.com/news/business/21576714-mining-industry-has-enriched-chile-its-future-precarious-copper-solution). Average price between 20015 and 2013.
  property carbon content 0
    carbon content on a dry matter basis (reserved; not for manual entry)
  property true value 1.89426e-7
    allocation property applied in "true value" allocation // value calculated from revenue
  properties: dry mass 1 kg, water in wet mass 0 kg, wet mass 1 kg, carbon content, non-fossil 0, water content 0, carbon content, fossil 0, carbon allocation 0 kg
- electricity, for reuse in municipal waste incineration only: 0 kWh; CPC 17100: Electrical energy; By-product classification allocatable product; pedigree (1,1,1,1,1)
  Net electricity generated from this waste and used in internal MSWI plant energy redistribution.
  Uncertainty: uncertainty is calculated from uncertainties in waste composition and uncertainties in energy efficiency and the uncertainty in internal energy demand
  production volume 2.12255e7 kWh
  property exergy 3.6 MJ; name E_el_prod_MSWI_exergy
    This exergy property is based on the exergy content of the product.
  property true value relation 3.6; name E_el_prod_MSWI_true_value_relation
    property to calculate "true value" from
  property price 0.1 EUR2005; name E_el_prod_MSWI_price_EUR2005
    Estimated to be the same price as in case of electricity, medium voltage.
  property true value 2.05356e-5
    allocation property applied in "true value" allocation // value calculated from true value relation
- heat, for reuse in municipal waste incineration only: 0 MJ; CPC 17300: Steam and hot water; By-product classification allocatable product; pedigree (1,1,1,1,1)
  Net useful heat generated from this waste and used in internal MSWI plant energy redistribution.
  Uncertainty: uncertainty is calculated from uncertainties in waste composition and uncertainties in energy efficiency and the uncertainty in internal energy demand
  production volume 1.50979e8 MJ
  property true value relation 0.1842; name E_th_prod_MSWI_true_value_relation
    property to calculate "true value" from
  property exergy 0.1842 MJ; name E_th_prod_MSWI_exergy
    This exergy property is based on the exergy content of the product.
  property price 0.0106 EUR2005; name E_th_prod_MSWI_price_EUR2005
    Average European district heat price from Ecoheatcool and Euroheat 2005-2006, Ecoheat Work package 1: The European heat market. Final report. 10.6 EUR/GJ i s the price of district heat. http://www.solarthermalworld.org/files/Ecoheatcool%20WP1%20Web.pdf?download
  property true value 7.57321e-6
    (same comment as for electricity, for reuse in municipal waste incineration only)
- zinc concentrate: 0 kg; CPC 14290: Other non-ferrous metal ores and concentrates (other than uranium or thorium ores and concentrates); By-product classification allocatable product
  Calculated value from the knowledge of the properties of both products.
  production volume 2702.83 kg
  property price 0.38 EUR2005; name ByP_price_EUR2005
    Temporary price data. Calculated as 90% of purchasers price based on: Zinc content in concentrate 53%. Concentrate price per kg Zn 86.5% of refined Zn price (13.5% treatment charges according to CHR Metals Limited 2005: Dynamic cost curves. http://www.minecost.com/dynamic.pdf). 2004 zinc price from USGS (2007) Mineral commodity summaries 2007. <http://minerals.usgs.gov/minerals/pubs/mcs/2007/mcs2007.pdf> [Accessed 25 May 2010]
  property zinc content 0.53; name zinc_C_zinc_concentrate
    Zinc content on a dry matter basis. Value taken from teh "zinc mine operation" /GLO dataset.
  property dry mass 1 kg; name DM_zinc_concentrate
  property carbon content 0
    carbon content on a dry matter basis (reserved; not for manual entry)
  property true value 2.18034e-10
    allocation property applied in "true value" allocation // value calculated from revenue
  properties: wet mass 1 kg, water content 0, carbon content, non-fossil 0, carbon content, fossil 0, water in wet mass 0 kg, carbon allocation 0 kg
- iron scrap, unsorted: 0 kg; source European Aluminium Association 2008; CPC 39310: Slag, dross, scalings and other waste from the manufacture of iron or steel; By-product classification Recyclable; pedigree (1,1,1,1,1)
  production volume 1.25455 kg
  property price 0.149 EUR2005; name ironScrapAmount_price_EUR2005
    Temporary price data. Calculated as 90% of purchasers price based on: estimated at 85% of sorted scrap
  property carbon content 0
    carbon content on a dry matter basis (reserved; not for manual entry)
  property true value 4.57021e-12
    allocation property applied in "true value" allocation // value calculated from revenue
  properties: water in wet mass 0 kg, water content 0, carbon content, fossil 0, carbon content, non-fossil 0, dry mass 1 kg, wet mass 1 kg, carbon allocation 0 kg
- aluminium oxide, non-metallurgical: 0 kg; source European Aluminium Association 2008; CPC 41432: Alumina (aluminium oxide), except artificial corundum; By-product classification allocatable product; CAS 1344-28-1; pedigree (1,1,1,1,1)
  production volume 78.9438 kg
  property carbon content, non-fossil 0; name C_content_non_fossil
  property price 0.28 EUR2005; name Al2O3Amount_price_EUR2005
    From UN trade database. http://data.un.org/ Import data from the largest economies of the world are used (Brazil, India, USA, China, Japan and EU-27).
  property dry mass 1 kg; name DM
  property water content 0; name water_content
  property wet mass 1 kg; name WM
  property water in wet mass 0 kg; name WWM
  property carbon content, fossil 0; name C_content_fossil
  property carbon content 0
    carbon content on a dry matter basis (reserved; not for manual entry)
  property true value 5.4043e-10
    allocation property applied in "true value" allocation // value calculated from revenue
  properties: carbon allocation 0 kg
- aluminium, cast alloy: 0 kg; source European Aluminium Association 2008; By-product classification allocatable product; CPC 41431: Unwrought aluminium; pedigree (1,1,1,1,1)
  EcoSpold01Location=RER
  production volume 737.95 kg
  property price 1.3 EUR2005; name castAlloyAmount_price_EUR2005
    Temporary price data. Calculated as 90% of purchasers price based on: Source: London Metal Exchange, Aluminium alloy price for 2005
  property carbon content 0
    carbon content on a dry matter basis (reserved; not for manual entry)
  property true value 2.34549e-8
    allocation property applied in "true value" allocation // value calculated from revenue
  properties: water in wet mass 0 kg, carbon content, non-fossil 0, water content 0, dry mass 1 kg, carbon content, fossil 0, wet mass 1 kg, carbon allocation 0 kg
- aluminium, wrought alloy: 0 kg; source European Aluminium Association 2008; By-product classification allocatable product; CPC 4153: Semi-finished products of aluminium or aluminium alloys; pedigree (1,1,1,1,1)
  production volume 323.06 kg
  property price 1.44 EUR2005; name secondaryAluminiumOutput_price_EUR2005
    Estimated based on literature values and expert judgement. Aluminium ccast alloys are about 90% of the price of aluminium wrought alloys.
  property carbon content 0
    carbon content on a dry matter basis (reserved; not for manual entry)
  property true value 1.13739e-8
    allocation property applied in "true value" allocation // value calculated from revenue
  properties: wet mass 1 kg, water content 0, carbon content, fossil 0, water in wet mass 0 kg, carbon content, non-fossil 0, dry mass 1 kg, carbon allocation 0 kg

## Inputs from technosphere
- municipal solid waste: 0 kg; name msw; pedigree (1,1,1,1,1)
  production volume 0 kg
    Calculated from production volume of reference product using the relative outputs.
  property price 0 EUR2005; name msw_price_EUR2005
  properties: wet mass 1 kg, dry mass 0.771 kg, carbon content, non-fossil 0.261655, carbon content, fossil 0.171549, water content 0.297017
  note on carbon content, non-fossil: MSW composition in tab 4.1, ecoinvent v2.2 report 13_I. C content referred to 1 kg DM
- wastewater, unpolluted: 0 m3; name ww; pedigree (1,1,1,1,1)
  water emissions in wastewater are taken separately into account.
  production volume 0 m3
    Calculated from production volume of reference product using the relative outputs.
  property price 0 EUR2005; name ww_price_EUR2005
  properties: carbon content, fossil 0.00178991, dry mass 0.337476 kg, wet mass 1000 kg, carbon content, non-fossil 0.00178991, water content 2962.17
  note on carbon content, fossil: Assumed to be like in tap water. Bicarbonate content is 2.93 mol/m3. CO2 content is 0.1 mol/m3 (ecoinvent v2.2 report 8, Tab 93.1).
- heat, district or industrial, other than natural gas: 2.20949 MJ; lognormal variance with pedigree 0.0021, pedigree (2,3,2,3,1)
  properties: corresponding fuel use, propane, furnace >100kW 1.05263 MJ
  note on corresponding fuel use, propane, furnace >100kW: Lower heating value of the fuel input related to the heat/electricity output, taken directly from ecoinvent v3.0 dataset "heat production, natural gas, at industrial furnace >100kW, GLO 2000".
- chemical, organic: 0.0258853 kg; lognormal variance with pedigree 0.0021, pedigree (2,3,2,3,1)
  properties: carbon content, fossil 0.628, dry mass 1 kg, wet mass 1 kg
  note on carbon content, fossil: This dataset is an unweighted average of 20 organic substances (listed in Tab 88.1, ecoinvent v2.2 report 8, part II), being part of the top100 chemicals included in this database. The C-content has also been calculated as an unweighted average of the C content of the substances composing this dataset.
- tap water: 23.3426 kg; name water; lognormal variance with pedigree 0.0021, pedigree (2,3,2,3,1)
  properties: carbon content, fossil 0.00178991, dry mass 0.000337476 kg, water content 2962.17, wet mass 1 kg
  note on carbon content, fossil: Bicarbonate content is 2.93 mol/m3. CO2 content is 0.1 mol/m3 (ecoinvent v2.2 report 8, Tab 93.1).
- waste yarn and waste textile: -0.00019793 kg; name waste_Yarn; lognormal variance with pedigree 0.0021, pedigree (2,3,2,3,1)
  Waste produced during the process.
  production volume 7.46073e6 kg; = PV_finish* waste_Yarn
    Calculated based on the production volume of woven yarn.
  property price 0 EUR2005; name waste_Yarn_price_EUR2005
  properties: dry mass 0.97917 kg, carbon content, non-fossil 0.44455, wet mass 1 kg, water content 0.0212731
- electricity, low voltage: 0.418902 kWh; lognormal variance with pedigree 0.0021, pedigree (2,3,2,3,1)
- acetic acid, without water, in 98% solution state: 0.00505671 kg; lognormal variance with pedigree 0.0021, pedigree (2,3,2,3,1)
  properties: wet mass 1 kg, carbon content, fossil 0.400016, dry mass 1 kg
- building, hall: 1.39967e-5 m2; lognormal variance with pedigree 0.0035, pedigree (3,3,2,3,1)
  Industry data from Bangladesh. Uncertainty has been adapted accordingly.
- municipal solid waste: -2.90854e-5, -1.78272e-7, -1.24748e-7, -4.95081e-7, -0.000350141 kg (5 entries); lognormal variance with pedigree 0.0021, pedigree (2,3,2,3,1)
  production volume 1.43246e7 kg
- wastewater, unpolluted: -0.000133465, -0.0165497 m3 (2 entries); lognormal variance with pedigree 0.0021, pedigree (2,3,2,3,1)
  water emissions in wastewater are taken separately into account.
  production volume 6.2885e8 m3

## Emissions to nature
- Chromium VI [water, unspecified]: 2.54941e-7 kg; lognormal variance with pedigree 0.0035, pedigree (2,4,2,3,1)
- Phenol [water, unspecified]: 4.45896e-7 kg; lognormal variance with pedigree 0.0021, pedigree (2,3,2,3,1)
- Nitrogen [water, unspecified]: 0.000131301 kg; lognormal variance with pedigree 0.0035, pedigree (2,4,2,3,1)
- Nitrate [water, unspecified]: 4.45896e-6 kg; lognormal variance with pedigree 0.0021, pedigree (2,3,2,3,1)
- Chlorine [water, unspecified]: 6.56847e-7 kg; lognormal variance with pedigree 0.0035, pedigree (2,4,2,3,1)
- Selenium [water, unspecified]: 2.22948e-8 kg; lognormal variance with pedigree 0.0021, pedigree (2,3,2,3,1)
- Oils, unspecified [water, unspecified]: 1.49965e-5 kg; lognormal variance with pedigree 0.0035, pedigree (2,4,2,3,1)
- Aniline [water, unspecified]: 4.21902e-7 kg; lognormal variance with pedigree 0.0021, pedigree (2,3,2,3,1)
- Phosphorus [water, unspecified]: 1.36968e-5 kg; lognormal variance with pedigree 0.0035, pedigree (2,4,2,3,1)
- Water [air, unspecified]: 0.00665945 m3; = water/1000-(ww*-1); lognormal variance with pedigree 0.0021, pedigree (2,3,2,3,1)
  Calculated as input water minus wastewater. Based on industry data.
- Nickel, ion [water, unspecified]: 1.45966e-6 kg; lognormal variance with pedigree 0.0035, pedigree (2,4,2,3,1)
- Vanadium, ion [water, unspecified]: 8.91792e-8 kg; lognormal variance with pedigree 0.0021, pedigree (2,3,2,3,1)
- Iron, ion [water, unspecified]: 1.33969e-6 kg; lognormal variance with pedigree 0.0021, pedigree (2,3,2,3,1)
- Fluoride [water, unspecified]: 8.91792e-7 kg; lognormal variance with pedigree 0.0021, pedigree (2,3,2,3,1)
- Suspended solids, unspecified [water, unspecified]: 0.000208891 kg; lognormal variance with pedigree 0.0035, pedigree (2,4,2,3,1)
- DOC, Dissolved Organic Carbon [water, unspecified]: 0.00013511 kg; lognormal variance with pedigree 0.0021, pedigree (2,3,2,3,1)
- AOX, Adsorbable Organic Halogen as Cl [water, unspecified]: 1.00976e-5 kg; lognormal variance with pedigree 0.0021, pedigree (2,3,2,3,1)
- Sulfide [water, unspecified]: 1.3097e-6 kg; lognormal variance with pedigree 0.0035, pedigree (2,4,2,3,1)
- Zinc, ion [water, unspecified]: 2.5794e-6 kg; lognormal variance with pedigree 0.0035, pedigree (2,4,2,3,1)
- Cyanide [water, unspecified]: 8.91792e-8 kg; lognormal variance with pedigree 0.0021, pedigree (2,3,2,3,1)
- TOC, Total Organic Carbon [water, unspecified]: 0.00013511 kg; lognormal variance with pedigree 0.0035, pedigree (2,4,2,3,1)
- Chromium, ion [water, unspecified]: 1.45966e-6 kg; lognormal variance with pedigree 0.0035, pedigree (2,4,2,3,1)
- Arsenic, ion [water, unspecified]: 1.60963e-6 kg; lognormal variance with pedigree 0.0021, pedigree (2,3,2,3,1)
- COD, Chemical Oxygen Demand [water, unspecified]: 0.000554007 kg; lognormal variance with pedigree 0.0035, pedigree (2,4,2,3,1)
- Lead [water, unspecified]: 4.45896e-8 kg; lognormal variance with pedigree 0.0021, pedigree (2,3,2,3,1)
- BOD5, Biological Oxygen Demand [water, unspecified]: 4.289e-5 kg; lognormal variance with pedigree 0.0035, pedigree (2,4,2,3,1)
- Dissolved solids [water, unspecified]: 0.00132969 kg; lognormal variance with pedigree 0.0021, pedigree (2,3,2,3,1)
- Ammonium, ion [water, unspecified]: 8.39805e-6 kg; lognormal variance with pedigree 0.0021, pedigree (2,3,2,3,1)
- Manganese [water, unspecified]: 8.91792e-7 kg; lognormal variance with pedigree 0.0021, pedigree (2,3,2,3,1)
- Copper, ion [water, unspecified]: 1.74959e-6 kg; lognormal variance with pedigree 0.0035, pedigree (2,4,2,3,1)
- Mercury [water, unspecified]: 4.45896e-9 kg; lognormal variance with pedigree 0.0021, pedigree (2,3,2,3,1)

## Sampling procedure
Industry data.

## Extrapolations
Extrapolated from data from mostly vertically integrated mills.
