# heat and power co-generation, hard coal

Dataset: EcoSpold 2, unit process
Geography: DK
Time period: 1980-01-01 to 2019-12-31
Technology level: modern
Classification: ISIC rev.4 ecoinvent: 3510:Electric power generation, transmission and distribution
Classification: EcoSpold01Categories: hard coal/power plants
Synonyms: other bituminous coal; anthracite; coking coal
Tags: hard coal power; fossil fuels; coal power
Scenario: Business-as-Usual
System model: Allocation at the point of substitution
Generated by: Karin Treyer
Published in: Röder, A. 2007
Database: ecoinvent
isCopyrightProtected: true
accessRestrictedTo: 1

## General comment
This dataset represents the production of high voltage electricity and district heat in an average combined heat and power hard coal power plant in Denmark in 2012. The exchanges are valid for 1MJ of hard coal burned. 'Hard coal' includes anthracite, coking coal and other bituminous coal according to the definition of the IEA electricity information 2014.
All exchanges in this dataset except for emissions of SO2, NOx and particles are production-weighted averages of the figures in the datasets in ecoinvent version two, which are valid for the following 14 countries: AT, BE, ES, FR, IT, NL, PT, DE, CZ, HR, PL, SK, CN, US. The exception values are production-weighted averages of version 2 countries and the new countries in version 3 (AU, CA, CL, ID, IN, KR, MX, MY, PE, RU, TH, TR, TW, TZ, UA, ZA){{children_only}}
Comments on the inventory data of emissions:
- For the assessment of main characteristics (sulphur and ash content of coal, efficiency of the plant) and CO2 a bottom-up approach has been used. It consists in the collection of information about single plants.
- The size distribution of particle emissions has been derived from German data.
- Halogene emissions have been estimated on the basis of the content of the species in the country-specific coal input mix, assuming average retention rates.
- For CO and particle emissions average values for the former UCTE are included (Union for the Coordination of the Transmission of Electricity, since 2009 replaced by ENTSO-E European Network of Transmission System Operators for Electricity).
- The country specific emission depend on the share of DeNOx.
- Emissions of trace elements were calculated by means of a formula (CORINAIR) using the ash content in the country-specific coal input mix and average transfer coefficients for coal power plants, taking into account the share of DeSOx installed.
- Emission of uranium and thorium radioactive isotopes were assumed proportional to the corresponding element emitted with particles; the other non-gaseous radioactive isotopes of the uranium and thorium decay chain were assumed proportional to the emitted U-238 or Th-232.
- The emission of gaseous radon and K-40 are taken from the literature.
IEA. 2014. Electricity Information 2014. ISBN 978-92-64-21692-1. International Energy Agency (IEA), Paris Cedex (FR)
European Environment Agency (1991) CORINAIR Inventory; VOC's Default Emission Factors
[This dataset is meant to replace the following datasets:]

## Included activities start
From the constructed hard coal power plant ready to produce electricity.
From reception of hard coal and operating materials at power plant gate. Functional unit is the combustion of 1MJ of hard coal.

## Included activities end
This activity ends with heat and electricity generated in a CHP power plant.
This dataset includes:
- all operation and maintenance activities and materials of the power plants.
- Use of fuel oil for startup
- Particle removal (dedusting of the flue gas)

- Desulfurisation and denitrification. These processes are described in separate modules; it can be decided by changing the values of NOx and SOx retained whether and how much DeNOx and DeSOx are installed.
- Cooling: It is assumed that all plants use wet cooling with a cooling tower. No cooling tower is included in this dataset (will be implemented in future versions)
- Loss of feed water

This dataset doesn't include
- raw materials extraction, decommissioning and waste treatment as these activities are already included in the infrastructure datasets
- transformation of the electricity produced
- The disposal of non-recycled ashes is modelled separately.

## Technology
POWER PLANT:
Hard coal power plant input is a market mix of 100MWe power plants (representing all power plants with a capacity <250MWe and 7% of the installed capacity) and 500MWe power plants (representing all power plants with a capacity >250MWe and 93% of the installed capacity). The plants are used for middle load with 4000 hours of operation at full capacity per year. The plants are assumed to operate 150000 hours during its lifetime.
Coal power plants are installed with an electrical filter and a flue gas desulfurization (DeSOx). To a large extent a selective catalytic reduction (SCR) takes place and a DeNOx plant is installed additionally. The electrical filter is the most widely used technology in UCTE countries. The system is highly efficient with filtration efficiency up to 99.9%. The electrical filter increases the energy consumption. The downstream flue gas desulfurization (DeSOx) reduces the particles further by 80% to 95%.
- Dones, R., Bauer, C., Röder, A. (2007) Kohle. In: Dones, R. (Ed.) et al., Sachbilanzen von Energiesystemen: Grundlagen für den ökologischen Vergleich von Energiesystemen und den Einbezug von Energiesystemen in Ökobilanzen für die Schweiz. Final report ecoinvent No.

## Time period
The Annual Production Volume is valid for the year 2012.

## Parameters
- efficiency: 0.347 dimensionless; lognormal variance with pedigree 0.003325, pedigree (3,2,1,2,2)
  Literature value/calculated value. Net electrical efficiency based on the lower heating value (LHV).
  For all OECD countries, the IEA Electricity information 2014 provides data for the year 2012 on fuel input (TJ, Net calorific value NCV) and gross electricity production (GWh) as well as heat production (TJ) in tables 8 and 9 for each country for electricity only and Combined Heat and Power (CHP) plants each. Together with the information on own use (see parameter 'losses'), the net electrical efficiency based on the NCV is calculated.
  For all non-OECD countries, data from the IEA Energy balances of non-OECD countries 2014 have been used. These tables do not always provide information on how much of the electricity has been produced in electricity only and in CHP plants, but often give the total value only.
  IEA. 2014. Electricity Information 2014. ISBN 978-92-64-21692-1. International Energy Agency (IEA), Paris Cedex (FR).
  IEA/OECD. 2014. Energy balances of non-OECD countries 2014. International Energy Agency (IEA), Paris Cedex (FR).
- factor: input of MJ for the production of 1 kWh: 10.3746 MJ/kWh; name factor_MJ_kWh; = 1*3.6/efficiency; lognormal variance with pedigree 0.0532, pedigree (4,4,3,4,4)
  Calculated value. 3.6 MJ = 1kWh.
- gross electricity production: 1.0565e10 kWh; name gross_electricity; lognormal variance with pedigree 0.001225, pedigree (2,1,1,2,1)
  Literature value/statistics. Taken from the IEA electricity information 2014, table 1.3.
  IEA. 2014. Electricity Information 2014. ISBN 978-92-64-21692-1. International Energy Agency (IEA), Paris Cedex (FR).
- water withdrawal, electricity production from hard coal, once-through and coolin: 0.0815 m3/kWh; name WWithdrawal_EP_HC_once_through_andCP_CS; lognormal variance with pedigree 0.092025, pedigree (4,4,3,2,4)
  Estimated based on literature (Scown, 2011, Water Footprint of U.S. Transportation Fuels, SI). The amount of water withdrawn while burning lignite and peat is assumed to be the same as in case of coal.
- fraction, cooling water, to air: 0.0299662; name fraction_CW_to_air; = (WConsumption_EP_HC_recirculatingCS*recirculating_CS_fraction_from_allCS+WConsumption_EP_HC_once_through_andCP_CS*once_through_andCP_CS_fractio_from_allCS)/(WWithdrawal_EP_HC_recirculating_CS*recirculating_CS_fraction_from_allCS+WWithdrawal_EP_HC_once_through_andCP_CS*once_through_andCP_CS_fractio_from_allCS); lognormal variance with pedigree 0.092025, pedigree (4,4,3,2,4)
  Calculated value
- once-through and cooling pond cooling systems as a fraction of all cooling syste: 0.625 dimensionless; name once_through_andCP_CS_fractio_from_allCS; lognormal variance with pedigree 0.092025, pedigree (4,4,3,2,4)
  Calculated as an average of data available for Europe (Floerke, 2008, Future changes of freshwater needs in the electricity production sector) and USA (NERL, 2011, Estimating freshwater needs to meet future thermoelectric generation requirements).
- fraction, water, decarbonised, to air: 0.0299662; name fraction_WDC_to_air; = fraction_CW_to_air; lognormal variance with pedigree 0.092025, pedigree (4,4,3,2,4)
  Calculated value. See comments in the other parametres present in this dataset. Decarbonised water is considered to be always used as cooling water, thus cooling water fractions to air are applied to all carbonised water input flows to calculate the amount of water consumed in the processes.
- fraction, water, completely softened, to air: 0.15; name fraction_WCS_to_air; = fraction_PW_to_air; lognormal variance with pedigree 0.092025, pedigree (4,4,3,2,4)
  Calculated value. See comment in the other parametres present in this dataset. Water, completely softened is considered to be always used as process water, thus process water fractions to air are applied to all water, completely softened input flows to calculate the amount of water consumed in the processes.
- water withdrawal, electricity production from hard coal, recirculating CS: 0.0021 m3/kWh; name WWithdrawal_EP_HC_recirculating_CS; lognormal variance with pedigree 0.092025, pedigree (4,4,3,2,4)
  (same comment as for water withdrawal, electricity production from hard coal, once-through )
- fraction, process water, to air: 0.15 dimensionless; name fraction_PW_to_air; lognormal variance with pedigree 0.092025, pedigree (4,4,3,2,4)
  Literature value. In case when no industry/process specific data are available, default evaporation fraction value is used. This value is 15% and is based on literature (Statistics Canada, 2007 & Shaffer, K.H., 2008, Consumptive water use in the Great Lakes Basin, USGS & Shiklomanov, 2003, World Water Resources at the Beginning of the 21st Century) and has been approved by an expert.
- losses from gross electricity production: 0.07 dimensionless; name gross_net_electricity; lognormal variance with pedigree 0.0012, pedigree (2,1,1,1,1)
  Calculated value. Own use of electricity plants in this country in 2012. For the OECD countries, the OECD iLibrary provides gross and net electricity values for the specific sector 'Total Fuel Combustion', from which the loss value is being calculated. This value is then applied to all fossil fuel datasets, as no data on a more detailed level were available.
  OECD. 2014. IEA Electricity Information Statistics: OECD - Electricity and heat generation. OECD iLibrary. Online database. DOI : 10.1787/elect-data-en
- water consumption, electricity production from hard coal, once-through and cooli: 0.0014 m3/kWh; name WConsumption_EP_HC_once_through_andCP_CS; lognormal variance with pedigree 0.092025, pedigree (4,4,3,2,4)
  Estimated based on literature (Scown, 2011, Water Footprint of U.S. Transportation Fuels, SI). The amount of water consumed while burning lignite and peat is assumed to be the same as in case of coal.
- water consumption, electricity production from hard coal, recirculating CS: 0.0018 m3/kWh; name WConsumption_EP_HC_recirculatingCS; lognormal variance with pedigree 0.092025, pedigree (4,4,3,2,4)
  (same comment as for water consumption, electricity production from hard coal, once-through)
- recirculating cooling system as a fraction of all cooling systems: 0.375 dimensionless; name recirculating_CS_fraction_from_allCS; lognormal variance with pedigree 0.092025, pedigree (4,4,3,2,4)
  (same comment as for once-through and cooling pond cooling systems as a fraction of all coo)

## Reference product
- heat, district or industrial, other than natural gas: 1 MJ; name heat; CPC 17300: Steam and hot water; By-product classification allocatable product
  Literature value/calculated value. Net thermal efficiency based on the lower heating value (LHV).
  For all OECD countries, the IEA Electricity information 2014 provides data for the year 2012 on fuel input (TJ, Net calorific value NCV) and gross electricity production (GWh) as well as heat production (TJ) in tables 8 and 9 for each country for electricity only and Combined Heat and Power (CHP) plants each. Together with the information on own use (see parameter 'losses'), the net electrical efficiency based on the NCV is calculated.
  For all non-OECD countries, data from the IEA Energy balances of non-OECD countries 2014 have been used. These tables do not always provide information on how much of the electricity has been produced in electricity only and in CHP plants, but often give the total value only.
  IEA. 2014. Electricity Information 2014. ISBN 978-92-64-21692-1. International Energy Agency (IEA), Paris Cedex (FR).
  IEA/OECD. 2014. Energy balances of non-OECD countries 2014. International Energy Agency (IEA), Paris Cedex (FR).
  production volume 3.216e10 MJ
    Literature value/statistics. Taken from the IEA electricity information 2014. The global value is the sum of all hard coal CHP datasets in ecoinvent.
    IEA. 2014. Electricity Information 2014. ISBN 978-92-64-21692-1. International Energy Agency (IEA), Paris Cedex (FR).
  property true value relation 0.1842; name heat_true_value_relation
    property to calculate "true value" from
  property exergy 0.1842 MJ; name heat_exergy
    This exergy property is based on the exergy content of the product.
  property price 0.0106 EUR2005; name heat_price_EUR2005
    Average European district heat price from Ecoheatcool and Euroheat 2005-2006, Ecoheat Work package 1: The European heat market. Final report. 10.6 EUR/GJ i s the price of district heat. http://www.solarthermalworld.org/files/Ecoheatcool%20WP1%20Web.pdf?download
  property true value 0.00185992; name heat_true_value
    allocation property applied in "true value" allocation // value calculated from true value relation
  properties: corresponding fuel use, propane, furnace >100kW 0 MJ

## By-products
- hard coal ash: 0 kg; name amount_ash; CPC 39: Wastes or scraps; By-product classification Waste; pedigree (1,1,3,1,1)
  Literature value/calculated value. Hard coal ash produced when producing 1kWh of electricity from hard coal, based on the value for burning 1MJ of hard coal. Weighted average with electricity production data (Itten&Frischknecht 2012) and values of 12 countries
  (AT, BE, ES, FR, IT, NL, PT, DE, CZ, HR, PL, SK). These values were valid for the ash being disposed off. Now, total amount of ash has been calculated (disposed+recycled) with the data in Tab. 9.69 p. 165 in Röder et al. 2007. Globally, 74% of the lignite ash are recycled, 26% go to disposal.
  Source:
  Itten R. and Frischknecht R. (2012) Life Cycle Inventories of Electricity Mixes and Grid. ESU-services Ltd., Uster, Switzerland.
  production volume 0 kg; = amount_ash/electricity*electricity_apv
    Calculated from the production volume of electricity produced in proportion to the respective output amounts. An extra amount has been added to the global dataset due to parent child relationship.
  property price 0 EUR2005; name amount_ash_price_EUR2005
    Waste products are assigned a price of zero as they are assumed to require further treatment.
  property carbon content 0
    carbon content on a dry matter basis (reserved; not for manual entry)
  properties: water content 0, wet mass 1 kg, carbon content, non-fossil 0, water in wet mass 0 kg, carbon content, fossil 0, dry mass 1 kg, carbon allocation 0 kg
- electricity, high voltage: 0 kWh; name electricity; = efficiency/3.6; CPC 17100: Electrical energy; By-product classification allocatable product; undefined min 0.112233, max 0.112233, standardDeviation95 0, pedigree (1,1,3,1,1)
  Electricity output per MJ of hard coal burned.
  production volume 9.82545e9 kWh; name electricity_apv; = gross_electricity*(1-gross_net_electricity)
    Calculated value
  property price 0.0977 EUR2005; name electricity_price_EUR2005
    Temporary price data. Calculated as 90% of purchasers price based on: 94% of the average price (to account for a 6% loss in transformation and transmission) for electricity for industrial consumersin 2005 (excluded taxes). From IEA.
  property true value relation 3.6; name electricity_true_value_relation
    property to calculate "true value" from
  property exergy 3.6 MJ; name electricity_exergy
    This exergy property is based on the exergy content of the product.
  property true value 0.0109493; name electricity_true_value
    (same comment as for heat, district or industrial, other than natural gas)
- heat, for reuse in municipal waste incineration only: 0 MJ; CPC 17300: Steam and hot water; By-product classification allocatable product; pedigree (1,1,1,1,1)
  Net electricity generated from this waste and used in internal MSWI plant energy redistribution.
  Uncertainty: uncertainty is calculated from uncertainties in waste composition and uncertainties in energy efficiency and the uncertainty in internal energy demand
  production volume 19.8343 MJ
  property exergy 0.1842 MJ; name E_th_prod_MSWI_exergy
    This exergy property is based on the exergy content of the product.
  property price 0.0106 EUR2005; name E_th_prod_MSWI_price_EUR2005
    (same comment as for heat, district or industrial, other than natural gas)
  property true value relation 0.1842; name E_th_prod_MSWI_true_value_relation
    property to calculate "true value" from
  property true value 1.13093e-12
    (same comment as for heat, district or industrial, other than natural gas)
- electricity, for reuse in municipal waste incineration only: 0 kWh; CPC 17100: Electrical energy; By-product classification allocatable product; pedigree (1,1,1,1,1)
  (same comment as for heat, for reuse in municipal waste incineration only)
  production volume 2.79342 kWh
  property true value relation 3.6; name E_el_prod_MSWI_true_value_relation
    property to calculate "true value" from
  property price 0.1 EUR2005; name E_el_prod_MSWI_price_EUR2005
    Estimated to be the same price as in case of electricity, medium voltage.
  property exergy 3.6 MJ; name E_el_prod_MSWI_exergy
    This exergy property is based on the exergy content of the product.
  property true value 3.11293e-12
    (same comment as for heat, district or industrial, other than natural gas)

## Inputs from technosphere
- residue from cooling tower: -2.26879e-6 kg; name amount_residue; lognormal variance with pedigree 0.0812, pedigree (5,3,4,5,2)
  Literature value/calculated value. Amount of cooling tower needed for producing 1kWh of electricity from hard coal, based on the value for burning 1MJ of hard coal. Weighted average with electricity production data (Itten&Frischknecht 2012) and values of 14 countries
  (AT, BE, ES, FR, IT, NL, PT, DE, CZ, HR, PL, SK, CN, US) (Röder et al. 2007) .
  Country values calculated from mass balance.
  Source:
  Itten R. and Frischknecht R. (2012) Life Cycle Inventories of Electricity Mixes and Grid. ESU-services Ltd., Uster, Switzerland.
  production volume 509678 kg; = amount_residue/electricity*electricity_apv
    (same comment as for hard coal ash)
  property price 0 EUR2005; name amount_residue_price_EUR2005
  properties: dry mass 0.7 kg, carbon content, fossil 0.0544233, water content 0.428571, wet mass 1 kg
- hard coal power plant: 5.89884e-13 unit; name hard_coal_power_plant; source Röder, A. 2007; lognormal variance with pedigree 0.3686, pedigree (5,3,4,5,3)
  Calculated value. At the moment, the hard coal power plant input consists of a market mix of a 100MWe power plant and a 500MWe power plant
  .
  For this calculation, 4000 load hours per year are assumed. It is assumed that a total of 150'000h is reached during the lifetime. A capacity of 500MW is taken for the calculation.
- water, decarbonised: 0 kg; name water_decarbonised_user; pedigree (1,1,3,1,1)
  Literature value/calculated value. Cooling water, decarbonised, for the cooling water circuit lost when producing 1kWh of electricity from hard coal, based on the value for burning 1MJ of hard coal. Röder et al. 2007, Tab. 9.65 and Tab. 9.66, p. 160f. These tables give an amount of 0.15 kg/MJ burned, which is valid for the assumption of 75% wet cooling and 25% run-through cooling. However, this revised dataset assumes 100% wet cooling.
  properties: wet mass 1 kg
- light fuel oil: 0 kg; name light_fuel_oil; pedigree (1,1,3,1,1)
  Literature value/calculated value. Light fuel oil use per 1MJ of hard coal burned, use for start-up of the power plant after shut down. Weighted average with electricity production data (Itten&Frischknecht 2012) and ight fuel oil use values of 14 countries
  (AT, BE, ES, FR, IT, NL, PT, DE, CZ, HR, PL, SK, CN, US) (Röder et al. 2007)
  Country values are typical values for hard coal plants.
  Source:
  Itten R. and Frischknecht R. (2012) Life Cycle Inventories of Electricity Mixes and Grid. ESU-services Ltd., Uster, Switzerland.
  properties: wet mass 1 kg, dry mass 1 kg, carbon content, fossil 0.862
- hard coal: 0 kg; pedigree (1,1,3,1,1)
  activityLink to RNA
- hard coal: 0 kg; pedigree (1,1,3,1,1)
  activityLink to AU
- hard coal: 0 kg; pedigree (1,1,3,1,1)
  activityLink to ID
- NOx retained, by selective catalytic reduction: 3.19281e-5 kg; name nox_retained; = 0.00073*(efficiency/3.6); source Itten R. 2012; lognormal variance with pedigree 0.093, pedigree (4,4,5,5,4)
  Calculated value. Weighted average from all figures from countries in ecoinvent version 2 (AT, BE, BR, CN, CZ, DE, DK, ES, FI, FR, GB, ES, FI, FR, GB, HR, HU, IE, IT, JP, NL, NO, PL, PT, RO, SE, SI, SK) and the new countries for version 3 (AU, CA regions, CL, IN, KR, MX, MY, PE, RU, TH, TR, TW, TZ, UA, US regions, ZA). Weighting was made with net electricity production 2008 in these countries (Itten&Frischknecht 2012).
  BA and BG were not included in the calculation of the GLO average as they inherit all GLO values at the moment.
  properties: wet mass 1 kg, dry mass 1 kg
- SOx retained, in hard coal flue gas desulfurisation: 8.79117e-5 kg; name sox_retained; = 0.00201*(efficiency/3.6); source Itten R. 2012; lognormal variance with pedigree 0.093, pedigree (4,4,5,5,4)
  (same comment as for NOx retained, by selective catalytic reduction)
  properties: wet mass 1 kg, dry mass 1 kg
- hard coal: 0.0195569 kg; name hard_coal; lognormal variance with pedigree 0.0212, pedigree (3,3,4,5,3)
  Literature value/calculated value. Hard coal use when producing 1kWh of electricity from hard coal, based on the value for burning 1MJ of hard coal. Weighted average with electricity production data (Itten&Frischknecht 2012) and hard coal use values of 14 countries
  (AT, BE, ES, FR, IT, NL, PT, DE, CZ, HR, PL, SK, CN, US) (Röder et al. 2007)
  Source:
  Itten R. and Frischknecht R. (2012) Life Cycle Inventories of Electricity Mixes and Grid. ESU-services Ltd., Uster, Switzerland.
  properties: dry mass 0.94 kg, carbon content, fossil 0.845, water content 0.0638298, wet mass 1 kg
  note on carbon content, fossil: C content 75-94% (specified in Tab 1.1, report 6, part VI). A mean content of 0.845 kg C/ kg dry hard coal was considered
- chlorine, liquid: 4.53757e-6 kg; pedigree (1,1,3,1,1)
  Exchange present due to parent child relationship
- water, completely softened: 0.00272254 kg; name water_completely_softened; lognormal variance with pedigree 0.054, pedigree (4,5,4,5,3)
  Literature value/calculated value. Feed water for the steam circuit lost when producing 1kWh of electricity from hard coal, based on the value for burning 1MJ of hard coal. Röder et al. 2007, Tab. 9.65 and Tab. 9.66, p. 160f.
  properties: wet mass 1 kg

## Inputs from nature
- Water, cooling, unspecified natural origin [natural resource, in water]: 0.00207521 m3; name water_cooling_UNO_input; = ((recirculating_CS_fraction_from_allCS*WWithdrawal_EP_HC_recirculating_CS)+(once_through_andCP_CS_fractio_from_allCS*WWithdrawal_EP_HC_once_through_andCP_CS))/11.31*factor_MJ_kWh*(efficiency/3.6); lognormal variance with pedigree 0.098025, pedigree (4,4,4,2,4)
  Calculated based on literature data.

## Emissions to nature
- Polonium-210 [air, non-urban air or from high stacks]: 6.21647e-7 kBq; name polonium_210; lognormal variance with pedigree 0.3986, pedigree (5,3,4,5,3)
  Literature value/calculated value. Emissions when producing 1kWh of electricity from hard coal, based on the value for burning 1MJ of hard coal. Weighted average with electricity production data (Itten&Frischknecht 2012) and emission values of 14 countries
  (AT, BE, ES, FR, IT, NL, PT, DE, CZ, HR, PL, SK, CN, US) (Röder et al. 2007)
  Country emissions values calculated from trace element balance, input uncertain
  Source:
  Itten R. and Frischknecht R. (2012) Life Cycle Inventories of Electricity Mixes and Grid. ESU-services Ltd., Uster, Switzerland.
- Radon-222 [air, non-urban air or from high stacks]: 0.000220072 kBq; name radon_222; lognormal variance with pedigree 0.3986, pedigree (5,3,4,5,3)
  (same comment as for Polonium-210)
- Thorium-232 [air, non-urban air or from high stacks]: 7.48699e-8 kBq; name thorium_232; lognormal variance with pedigree 0.3986, pedigree (5,3,4,5,3)
  (same comment as for Polonium-210)
- Carbon monoxide, fossil [air, non-urban air or from high stacks]: 3.63006e-6 kg; name carbon_monoxide_fossil; lognormal variance with pedigree 0.674, pedigree (3,4,4,5,1)
  Literature value/calculated value. Emissions when producing 1kWh of electricity from hard coal, based on the value for burning 1MJ of hard coal. Weighted average with electricity production data (Itten&Frischknecht 2012) and emission values of 14 countries
  (AT, BE, ES, FR, IT, NL, PT, DE, CZ, HR, PL, SK, CN, US) (Röder et al. 2007)
  Country emissions values based on literature.
  Source:
  Itten R. and Frischknecht R. (2012) Life Cycle Inventories of Electricity Mixes and Grid. ESU-services Ltd., Uster, Switzerland.
- Butane [air, non-urban air or from high stacks]: 8.62139e-9 kg; name butane; lognormal variance with pedigree 0.08, pedigree (3,5,4,5,1)
  (same comment as for Carbon monoxide, fossil)
- Hydrocarbons, aliphatic, alkanes, cyclic [air, non-urban air or from high stacks]: 0 kg; name hydrocarbons_al_al_cyclic; pedigree (1,1,3,1,1)
  (same comment as for Carbon monoxide, fossil)
- Sulfur dioxide [air, non-urban air or from high stacks]: 5.89884e-5 kg; name sulfur_dioxide; source Itten R. 2012; lognormal variance with pedigree 0.093, pedigree (4,4,5,5,4)
  (same comment as for NOx retained, by selective catalytic reduction)
- Thorium-230 [air, non-urban air or from high stacks]: 0 kBq; name thorium_230; pedigree (1,1,3,1,1)
  (same comment as for Carbon monoxide, fossil)
- Benzo(a)pyrene [air, non-urban air or from high stacks]: 9.07514e-14 kg; name benzo_a_pyrene; lognormal variance with pedigree 0.08, pedigree (3,5,4,5,1)
  (same comment as for Carbon monoxide, fossil)
- Manganese [air, non-urban air or from high stacks]: 1.17069e-9 kg; name manganese; lognormal variance with pedigree 0.7486, pedigree (5,3,4,5,3)
  (same comment as for Polonium-210)
- Methane, dichloro-, HCC-30 [air, non-urban air or from high stacks]: 0 kg; name methane_dichloro; pedigree (1,1,3,1,1)
  (same comment as for Carbon monoxide, fossil)
- Thorium-234 [air, non-urban air or from high stacks]: 0 kBq; name thorium_234; pedigree (1,1,3,1,1)
  (same comment as for Carbon monoxide, fossil)
- Xylene [air, non-urban air or from high stacks]: 4.18364e-7 kg; name xylene; lognormal variance with pedigree 0.08, pedigree (3,5,4,5,1)
  (same comment as for Carbon monoxide, fossil)
- Ethane [air, non-urban air or from high stacks]: 1.8604e-8 kg; name ethane; lognormal variance with pedigree 0.08, pedigree (3,5,4,5,1)
  (same comment as for Carbon monoxide, fossil)
- Particulates, > 2.5 um, and < 10um [air, non-urban air or from high stacks]: 1.45202e-7 kg; name particulates_2_5_to_10; source Itten R. 2012; lognormal variance with pedigree 0.093, pedigree (4,4,5,5,4)
  (same comment as for NOx retained, by selective catalytic reduction)
- Magnesium [air, non-urban air or from high stacks]: 0 kg; name magnesium; pedigree (1,1,3,1,1)
  (same comment as for Carbon monoxide, fossil)
- Iodine [air, non-urban air or from high stacks]: 7.21474e-9 kg; name iodine; lognormal variance with pedigree 0.2186, pedigree (5,3,4,5,3)
  (same comment as for Polonium-210)
- Cyanide [air, non-urban air or from high stacks]: 0 kg; name cyanide; pedigree (1,1,3,1,1)
  Literature value/calculated value. Emissions when producing 1kWh of electricity from hard coal, based on the value for burning 1MJ of hard coal. Weighted average with electricity production data (Itten&Frischknecht 2012) and emission values of 14 countries
  (AT, BE, ES, FR, IT, NL, PT, DE, CZ, HR, PL, SK, CN, US) (Röder et al. 2007)
  Source:
  Itten R. and Frischknecht R. (2012) Life Cycle Inventories of Electricity Mixes and Grid. ESU-services Ltd., Uster, Switzerland.
- Actinides, radioactive, unspecified [air, non-urban air or from high stacks]: 0 kBq; name actinides_radioactive_unspecified; pedigree (1,1,3,1,1)
  (same comment as for Carbon monoxide, fossil)
- Barium [air, non-urban air or from high stacks]: 2.355e-9 kg; name barium; lognormal variance with pedigree 0.7486, pedigree (5,3,4,5,3)
  (same comment as for Polonium-210)
- NMVOC, non-methane volatile organic compounds, unspecified origin [air, non-urban air or from high stacks]: 0 kg; name nmvoc; pedigree (1,1,3,1,1)
  (same comment as for Carbon monoxide, fossil)
- Dinitrogen monoxide [air, non-urban air or from high stacks]: 1.76965e-6 kg; name dinitrogen_monoxide; lognormal variance with pedigree 0.074, pedigree (3,4,4,5,1)
  (same comment as for Carbon monoxide, fossil)
- Benzene [air, non-urban air or from high stacks]: 9.84653e-8 kg; name benzene; lognormal variance with pedigree 0.088, pedigree (3,5,4,5,3)
  (same comment as for Carbon monoxide, fossil)
- Hydrogen fluoride [air, non-urban air or from high stacks]: 1.24329e-6 kg; name hydrogen_fluoride; lognormal variance with pedigree 0.2186, pedigree (5,3,4,5,3)
  (same comment as for Polonium-210)
- Sulfate [air, non-urban air or from high stacks]: 0 kg; name sulfate; pedigree (1,1,3,1,1)
  (same comment as for Carbon monoxide, fossil)
- Copper [air, non-urban air or from high stacks]: 4.09743e-10 kg; name copper; lognormal variance with pedigree 0.7486, pedigree (5,3,4,5,3)
  (same comment as for Polonium-210)
- Methane, fossil [air, non-urban air or from high stacks]: 4.53757e-7 kg; name methane_fossil; lognormal variance with pedigree 0.074, pedigree (3,4,4,5,1)
  (same comment as for Carbon monoxide, fossil)
- Bromine [air, non-urban air or from high stacks]: 3.84786e-8 kg; name bromine; lognormal variance with pedigree 0.1806, pedigree (3,3,4,5,3)
  (same comment as for Polonium-210)
- Acrolein [air, non-urban air or from high stacks]: 0 kg; name acrolein; pedigree (1,1,3,1,1)
  (same comment as for Carbon monoxide, fossil)
- Aldehydes, unspecified [air, non-urban air or from high stacks]: 0 kg; name aldehydes_unspecified; pedigree (1,1,3,1,1)
  (same comment as for Carbon monoxide, fossil)
- Ethane, 1,2-dichloro- [air, non-urban air or from high stacks]: 0 kg; name ethane_dichloro; pedigree (1,1,3,1,1)
  (same comment as for Carbon monoxide, fossil)
- Ethane, 1,1,1-trichloro-, HCFC-140 [air, non-urban air or from high stacks]: 0 kg; name ethane_trichloro; pedigree (1,1,3,1,1)
  (same comment as for Carbon monoxide, fossil)
- Ethene, tetrachloro- [air, non-urban air or from high stacks]: 0 kg; name ethene_tetrachloro; pedigree (1,1,3,1,1)
  (same comment as for Carbon monoxide, fossil)
- Uranium-234 [air, non-urban air or from high stacks]: 0 kBq; name uranium_234; pedigree (1,1,3,1,1)
  (same comment as for Carbon monoxide, fossil)
- Hydrocarbons, aliphatic, alkanes, unspecified [air, non-urban air or from high stacks]: 9.93728e-8 kg; name hydrocarbons_al_al_unspec; lognormal variance with pedigree 0.08, pedigree (3,5,4,5,1)
  (same comment as for Carbon monoxide, fossil)
- Propane [air, non-urban air or from high stacks]: 1.58815e-8 kg; name propane; lognormal variance with pedigree 0.08, pedigree (3,5,4,5,1)
  (same comment as for Carbon monoxide, fossil)
- Boron [air, non-urban air or from high stacks]: 9.61965e-8 kg; name boron; lognormal variance with pedigree 0.7486, pedigree (5,3,4,5,3)
  (same comment as for Polonium-210)
- Particulates, > 10 um [air, non-urban air or from high stacks]: 2.34139e-6 kg; name particulates_gt10; source Itten R. 2012; lognormal variance with pedigree 0.093, pedigree (4,4,5,5,4)
  (same comment as for NOx retained, by selective catalytic reduction)
- Dioxins, measured as 2,3,7,8-tetrachlorodibenzo-p-dioxin [air, non-urban air or from high stacks]: 3.1763e-15 kg; name dioxins; lognormal variance with pedigree 0.34, pedigree (3,5,4,5,1)
  (same comment as for Carbon monoxide, fossil)
- Cobalt [air, non-urban air or from high stacks]: 8.30376e-11 kg; name cobalt; lognormal variance with pedigree 0.7486, pedigree (5,3,4,5,3)
  (same comment as for Polonium-210)
- Arsenic [air, non-urban air or from high stacks]: 1.36581e-10 kg; name arsenic; lognormal variance with pedigree 0.7486, pedigree (5,3,4,5,3)
  (same comment as for Polonium-210)
- Hexane [air, non-urban air or from high stacks]: 0 kg; name hexane; pedigree (1,1,3,1,1)
  (same comment as for Carbon monoxide, fossil)
- Zinc [air, non-urban air or from high stacks]: 2.06006e-9 kg; name zinc; lognormal variance with pedigree 0.7486, pedigree (5,3,4,5,3)
  (same comment as for Polonium-210)
- Acenaphthene [air, non-urban air or from high stacks]: 0 kg; name acenaphthene; pedigree (1,1,3,1,1)
  (same comment as for Carbon monoxide, fossil)
- Nitrogen oxides [air, non-urban air or from high stacks]: 2.78153e-5 kg; name nitrogen_oxides; source Itten R. 2012; lognormal variance with pedigree 0.093, pedigree (4,4,5,5,4)
  (same comment as for NOx retained, by selective catalytic reduction)
- Chromium [air, non-urban air or from high stacks]: 9.57428e-11 kg; name chromium; lognormal variance with pedigree 0.7486, pedigree (5,3,4,5,3)
  (same comment as for Polonium-210)
- Toluene [air, non-urban air or from high stacks]: 4.94595e-8 kg; name toluene; lognormal variance with pedigree 0.08, pedigree (3,5,4,5,1)
  (same comment as for Carbon monoxide, fossil)
- Mercury [air, non-urban air or from high stacks]: 6.71561e-10 kg; name mercury; lognormal variance with pedigree 0.7486, pedigree (5,3,4,5,3)
  (same comment as for Polonium-210)
- PAH, polycyclic aromatic hydrocarbons [air, non-urban air or from high stacks]: 4.53757e-10 kg; name pah; lognormal variance with pedigree 0.34, pedigree (3,5,4,5,1)
  (same comment as for Carbon monoxide, fossil)
- Chloroform [air, non-urban air or from high stacks]: 0 kg; name chloroform; pedigree (1,1,3,1,1)
  (same comment as for Cyanide)
- Antimony [air, non-urban air or from high stacks]: 3.54384e-11 kg; name antimony; lognormal variance with pedigree 0.7486, pedigree (5,3,4,5,3)
  (same comment as for Polonium-210)
- Particulates, < 2.5 um [air, non-urban air or from high stacks]: 1.23422e-6 kg; name particulates_lt2_5; source Itten R. 2012; lognormal variance with pedigree 0.093, pedigree (4,4,5,5,4)
  (same comment as for NOx retained, by selective catalytic reduction)
- Hydrogen chloride [air, non-urban air or from high stacks]: 1.63353e-6 kg; name hydrogen_chloride; lognormal variance with pedigree 0.2186, pedigree (5,3,4,5,3)
  (same comment as for Polonium-210)
- Strontium [air, non-urban air or from high stacks]: 3.51662e-10 kg; name strontium; lognormal variance with pedigree 0.7486, pedigree (5,3,4,5,3)
  (same comment as for Polonium-210)
- Lead [air, non-urban air or from high stacks]: 2.83144e-9 kg; name lead; lognormal variance with pedigree 0.7486, pedigree (5,3,4,5,3)
  (same comment as for Polonium-210)
- Carbon disulfide [air, non-urban air or from high stacks]: 0 kg; name carbon_disulfide; pedigree (1,1,3,1,1)
  (same comment as for Cyanide)
- Radium-228 [air, non-urban air or from high stacks]: 8.84826e-8 kBq; name radium_228; lognormal variance with pedigree 0.3986, pedigree (5,3,4,5,3)
  (same comment as for Polonium-210)
- Nickel [air, non-urban air or from high stacks]: 7.80462e-10 kg; name nickel; lognormal variance with pedigree 0.7486, pedigree (5,3,4,5,3)
  (same comment as for Polonium-210)
- Radium-226 [air, non-urban air or from high stacks]: 8.80289e-8 kBq; name radium_226; lognormal variance with pedigree 0.3907, pedigree (3,3,5,3,3)
  (same comment as for Polonium-210)
- Selenium [air, non-urban air or from high stacks]: 2.00561e-9 kg; name selenium; lognormal variance with pedigree 0.7486, pedigree (5,3,4,5,3)
  (same comment as for Polonium-210)
- Cadmium [air, non-urban air or from high stacks]: 4.11104e-11 kg; name cadmium; lognormal variance with pedigree 0.7486, pedigree (5,3,4,5,3)
  (same comment as for Polonium-210)
- Furan [air, non-urban air or from high stacks]: 0 kg; name furan; pedigree (1,1,3,1,1)
  (same comment as for Carbon monoxide, fossil)
- Formaldehyde [air, non-urban air or from high stacks]: 2.63179e-8 kg; name formaldehyde; lognormal variance with pedigree 0.08, pedigree (3,5,4,5,1)
  (same comment as for Carbon monoxide, fossil)
- Cumene [air, non-urban air or from high stacks]: 0 kg; name cumene; pedigree (1,1,3,1,1)
  (same comment as for Cyanide)
- Pentane [air, non-urban air or from high stacks]: 6.67023e-8 kg; name pentane; lognormal variance with pedigree 0.08, pedigree (3,5,4,5,1)
  (same comment as for Carbon monoxide, fossil)
- Protactinium-234 [air, non-urban air or from high stacks]: 0 kBq; name protactinium_234; pedigree (1,1,3,1,1)
  (same comment as for Carbon monoxide, fossil)
- Thorium-228 [air, non-urban air or from high stacks]: 4.76445e-8 kBq; name throium_228; lognormal variance with pedigree 0.3986, pedigree (5,3,4,5,3)
  (same comment as for Polonium-210)
- Water [air, unspecified]: 6.40242e-6 m3; name water_to_air_unspecified; = (water_completely_softened/1000)*fraction_WCS_to_air+(water_decarbonised_user/1000)*fraction_WDC_to_air+water_cooling_UNO_input*fraction_CW_to_air*(efficiency/3.6); lognormal variance with pedigree 0.098025, pedigree (4,4,4,2,4)
  Calculated value based on literature values and expert opinion. See comments in the parametres' comment field.
  property fraction, origin: fresh water 0.047882; name fraction_origin_fresh_water
  property fraction, origin: salt water 0; name fraction_origin_salt_water
  property fraction, origin: unspecified 0.952118; name fraction_origin_unspecified
- Hydrocarbons, aliphatic, unsaturated [air, non-urban air or from high stacks]: 9.80115e-8 kg; name hydrocarbons_aliphatic_unsaturated; lognormal variance with pedigree 0.08, pedigree (3,5,4,5,1)
  (same comment as for Carbon monoxide, fossil)
- Water [water, unspecified]: 0.000196347 m3; name water_to_water_unspecified; = (water_completely_softened/1000)*(1-fraction_WCS_to_air)+(water_decarbonised_user/1000)*(1-fraction_WDC_to_air)+water_cooling_UNO_input*(1-fraction_CW_to_air)*(efficiency/3.6); lognormal variance with pedigree 0.098025, pedigree (4,4,4,2,4)
  (same comment as for Water)
  property fraction, origin: salt water 0; name fraction_origin_salt_water_Ww
  property fraction, origin: unspecified 0.957054; name fraction_origin_unspecified_Ww
  property fraction, origin: fresh water 0.0429463; name fraction_origin_fresh_water_Ww
- Hydrocarbons, chlorinated [air, non-urban air or from high stacks]: 0 kg; name hydrocarbons_chlorinated; pedigree (1,1,3,1,1)
  (same comment as for Carbon monoxide, fossil)
- Potassium-40 [air, non-urban air or from high stacks]: 7.30549e-7 kBq; name potassium_40; lognormal variance with pedigree 0.3986, pedigree (5,3,4,5,3)
  (same comment as for Polonium-210)
- Methane, monochloro-, R-40 [air, non-urban air or from high stacks]: 0 kg; name methane_monochloro; pedigree (1,1,3,1,1)
  (same comment as for Carbon monoxide, fossil)
- Carbon dioxide, fossil [air, non-urban air or from high stacks]: 0.0426532 kg; name carbon_dioxide_fossil; lognormal variance with pedigree 0.0206, pedigree (3,3,4,5,3)
  (same comment as for Carbon monoxide, fossil)
- Chromium VI [air, non-urban air or from high stacks]: 1.18431e-11 kg; name chromium_vi; lognormal variance with pedigree 0.5006, pedigree (3,3,4,5,3)
  Literature value/calculated value. Emissions when producing 1kWh of electricity from hard coal, based on the value for burning 1MJ of hard coal. Weighted average with electricity production data (Itten&Frischknecht 2012) and emission values of 14 countries
  (AT, BE, ES, FR, IT, NL, PT, DE, CZ, HR, PL, SK, CN, US) (Röder et al. 2007)
  Country emissions values based on range of data.
  Source:
  Itten R. and Frischknecht R. (2012) Life Cycle Inventories of Electricity Mixes and Grid. ESU-services Ltd., Uster, Switzerland.
- Benzene, ethyl- [air, non-urban air or from high stacks]: 0 kg; name benzene_ethyl; pedigree (1,1,3,1,1)
  (same comment as for Cyanide)
- Phenol [air, non-urban air or from high stacks]: 0 kg; name phenol; pedigree (1,1,3,1,1)
  (same comment as for Carbon monoxide, fossil)
- Lead-210 [air, non-urban air or from high stacks]: 3.40772e-7 kBq; name lead_210; lognormal variance with pedigree 0.3986, pedigree (5,3,4,5,3)
  (same comment as for Polonium-210)
- Beryllium [air, non-urban air or from high stacks]: 0 kg; name beryllium; pedigree (1,1,3,1,1)
  (same comment as for Cyanide)
- Uranium-238 [air, non-urban air or from high stacks]: 7.35087e-8 kBq; name uranium_238; lognormal variance with pedigree 0.3986, pedigree (5,3,4,5,3)
  (same comment as for Polonium-210)
- Styrene [air, non-urban air or from high stacks]: 0 kg; name styrene; pedigree (1,1,3,1,1)
  (same comment as for Carbon monoxide, fossil)
- Propene [air, non-urban air or from high stacks]: 7.26011e-9 kg; name propene; lognormal variance with pedigree 0.08, pedigree (3,5,4,5,1)
  (same comment as for Carbon monoxide, fossil)
- Vanadium [air, non-urban air or from high stacks]: 2.35954e-10 kg; name vanadium; lognormal variance with pedigree 0.7486, pedigree (5,3,4,5,3)
  (same comment as for Polonium-210)
- Molybdenum [air, non-urban air or from high stacks]: 7.21474e-11 kg; name molybdenum; lognormal variance with pedigree 0.7486, pedigree (5,3,4,5,3)
  (same comment as for Polonium-210)
- Radon-220 [air, non-urban air or from high stacks]: 0.000123876 kBq; name radon_220; lognormal variance with pedigree 0.3986, pedigree (5,3,4,5,3)
  (same comment as for Polonium-210)

## Sampling procedure
literature and statistics

## Extrapolations
Original emission data from 1993 have been updated for the years 2000 (v1.0), and 2004-2005 (v2.0). Uncertainty was adjusted accordingly.

Most of the exchanges were extrapolated through production-weighted averages of the datasets of the following 14 countries: AT, BE, ES, FR, IT, NL, PT, DE, CZ, HR, PL, SK, CN, US.

## Review by Carl Vadenbo 2015-07-02
The update of the whole electricity sector for the ecoinvent v3.2 database consist of hundreds of datasets. All these datasets have passed through a streamlined review processes where the underlying modelling of production volumes, technology shares and efficiencies was reviewed in detail prior to the datasets being submitted to the database.
