# building construction, budget hotel

Dataset: EcoSpold 2, unit process
Geography: BR
Time period: 2017-01-01 to 2019-12-31
Technology level: current
Classification: ISIC rev.4 ecoinvent: 4100:Construction of buildings
Synonyms: budget hotel construction; 3 star hotel construction
Tags: single enterprise data
Scenario: Business-as-Usual
System model: Allocation at the point of substitution
Generated by: Marina Santa Rosa Rocha
Published in: Filimonau, V 2018
Database: ecoinvent
isCopyrightProtected: true
accessRestrictedTo: 1

## General comment
This dataset represents a tourist accommodation facility classed as a budget hotel (comfort category 3*), located in Rio de Janeiro, RJ, Brazil. It was first opened in 1982 as a brand new urban hotel. The hotel has capacity to host 108 people and offers rooms of the following types (total number of rooms is given in brackets): suites (16) and double (40). The hotel has 9 floors which host a lobby, a restaurant, a meeting room and a small parking lot behind the building exclusively for employees.The laundry is outsourced. The hotel occupies a total area of 826,67 m2. The average annual occupancy of the hotel is estimated to be 50% which is equal to 20440 guest nights per year. The load bearing structure of hotel building is made of concrete and the facade is made of concrete and brickwork.

## Included activities start
This dataset is modelled to include the inputs for the construction of a hotel building. This includes:energy and water used in construction, land transformation, building structure and outer building shell, foundations, inner walls, roofs, ceiling and windows, doors, floors, finishing and painting, bathroom equipment. Activities include hotel building construction with lifeframe of the hotel building of 75 years. Maintenance is included only through the consideration of the lifetime of the different exchanges. For example, windows are assumed to have a lifetime of 35 years, therefore the exchange amount is multiplied by 75years / 35 years=2.14.

## Included activities end
Activities end with 1 unit of hostel building, including maintenance. Due to data availability, the following building construction processes have been excluded: mirror, urinary, shower, cables, gutter, drains, ventilation.

## Geography
The hostel is based in the city of Rio de Janeiro, RJ, Brazil.

## Technology
The level of technology is considered current. The load bearing structure of hotel building is made of concrete and the facade is made of concrete and brickwork.

## Time period
The survey was done in the year 2017 with the data provided covering the operational year 2016-2017.

## Parameters
- volume: 13413.3 m3; = AFA*3
  Building volume. Calculated by multiplying sum of all floor areas (AFA) by the height of the floor. Height of the floor is assumed to be equal to 3 meters.
- gross floor area: 684.44 m2; name GFA
  This represents occupied plot area of the budget hotel.
- occupancy rate/year: 0.5 dimensionless; name occupancy_y
  The average annual occupancy of the hotel is estimated to be 50%, based on survey information.
- sum of all floors area: 4471.11 m2; name AFA
  This represents the sum of all floors area for the budget hotel buildings.

## Reference product
- building, budget hotel: 1 unit; name RP; By-product classification allocatable product
  production volume 37 unit; name RP_PV
    In 2017 it was estimate that there were 10314 hotels in Brazil (Source: JLL, FOHB and ABR. Lodging Industry in Numbers - Brazil 2017. Available from: http://www.jll.com.br/brazil/pt-br/relatorios/175/hotelaria-em-numeros-2017) Accessed 27 March 2018. A study from the Brazilian Institute of Geography and Statistics (IBGE, 2012) showed that 46,9% of tourism accomodations in main urban areas in Brazil are hotels and 25,8% of these hotels are consider tourist/medium comfort hotels. (Source: IBGE, 2012. Pesquisa de Serviços de Hospedagem 2011- Municípios das Capitais, Regiões Metropolitanas das Capitais e Regiões Integradas Available from: ftp://ftp.ibge.gov.br/Comercio_e_Servicos/Pesquisa_Servicos_de_Hospedagem/2011/psh2011.pdf. Accessed 27 March 2018). These percentages are used as a proxy to calculate the total amount of luxury hotels in Brazil: 10314*0,469*0,258 = 1245 budget hotels. Another study from IBGE (2017) showed that from 2011 to 2016 the Brazilian hotel supply increased 15% (Source: IBGE, 2017. Pesquisa de Serviços de Hospedagem 2016 Available from: https://biblioteca.ibge.gov.br/index.php/biblioteca-catalogo?view=detalhes&id=2100623 Accessed 04 June 2018). Assuming this growth distributes equally across the years and various categories of hotels in Brazil, it can be estimated that the number of budget hotel properties annually constructed in Brazil is equal to: 1245 hotels * (0.15/5) = 37 hotels.
  property price 666584 EUR2005; name RP_price_EUR2005
    Calculated based on inputs: The price of the product has been calculated as a sum of the values of the material and energy inputs for this product. This value is therefore a rough estimation. It may underestimate the real price since there are additional expenses when producing any product. These expences can include for example labour costs, treatment of waste materials and profit for the producer. Please consider carefully whether this level of data quality is acceptable for your application.
  property lifetime 75 year; name lifetime
    Estimated value. The lifetime of a hotel building is assumed to be equal to 75 years which is an average of the 50-100 years' estimates available in the literature. Source: Filimonau et al. 2011. Reviewing the carbon footprint analysis of hotels: Life Cycle Energy Analysis (LCEA) as a holistic method for carbon impact appraisal of tourist accommodation. Journal of Cleaner Production, 19, 1917-1930.
  property lifetime capacity 2.9565e6 guest night; name lifetime_guests; = 108*365*lifetime
    Lifetime capacity represents the maximum capacity of the hotel during the building lifetime.
  property true value 666584; name RP_true_value
    allocation property applied in "true value" allocation // value calculated from revenue

## By-products
- electricity, for reuse in municipal waste incineration only: 0 kWh; CPC 17100: Electrical energy; By-product classification allocatable product; pedigree (1,1,1,1,1)
  Net electricity generated from this waste and used in internal MSWI plant energy redistribution.
  Uncertainty: uncertainty is calculated from uncertainties in waste composition and uncertainties in energy efficiency and the uncertainty in internal energy demand
  production volume 22312.2 kWh
  property true value relation 3.6; name E_el_prod_MSWI_true_value_relation
    property to calculate "true value" from
  property price 0.1 EUR2005; name E_el_prod_MSWI_price_EUR2005
    Estimated to be the same price as in case of electricity, medium voltage.
  property exergy 3.6 MJ; name E_el_prod_MSWI_exergy
    This exergy property is based on the exergy content of the product.
  property true value 77.6729
    allocation property applied in "true value" allocation // value calculated from true value relation
- heat, for reuse in municipal waste incineration only: 0 MJ; CPC 17300: Steam and hot water; By-product classification allocatable product; pedigree (1,1,1,1,1)
  (same comment as for electricity, for reuse in municipal waste incineration only)
  production volume 160287 MJ
  property exergy 0.1842 MJ; name E_th_prod_MSWI_exergy
    This exergy property is based on the exergy content of the product.
  property price 0.0106 EUR2005; name E_th_prod_MSWI_price_EUR2005
    Average European district heat price from Ecoheatcool and Euroheat 2005-2006, Ecoheat Work package 1: The European heat market. Final report. 10.6 EUR/GJ i s the price of district heat. http://www.solarthermalworld.org/files/Ecoheatcool%20WP1%20Web.pdf?download
  property true value relation 0.1842; name E_th_prod_MSWI_true_value_relation
    property to calculate "true value" from
  property true value 28.5505
    (same comment as for electricity, for reuse in municipal waste incineration only)
- iron scrap, unsorted: 0 kg; source European Aluminium Association 2008; CPC 39310: Slag, dross, scalings and other waste from the manufacture of iron or steel; By-product classification Recyclable; pedigree (1,1,1,1,1)
  Reported as "Iron scrap"
  production volume 2341.79 kg
  property price 0.149 EUR2005; name ironScrapAmount_price_EUR2005
    Temporary price data. Calculated as 90% of purchasers price based on: estimated at 85% of sorted scrap
  property carbon content 0
    carbon content on a dry matter basis (reserved; not for manual entry)
  property true value 9.43045
    allocation property applied in "true value" allocation // value calculated from revenue
  properties: water content 0, water in wet mass 0 kg, dry mass 1 kg, carbon content, non-fossil 0, wet mass 1 kg, carbon content, fossil 0, carbon allocation 0 kg
- aluminium oxide, non-metallurgical: 0 kg; source European Aluminium Association 2008; CPC 41432: Alumina (aluminium oxide), except artificial corundum; By-product classification allocatable product; CAS 1344-28-1; pedigree (1,1,1,1,1)
  production volume 4801.52 kg
  property carbon content, non-fossil 0; name C_content_non_fossil
  property price 0.28 EUR2005; name Al2O3Amount_price_EUR2005
    From UN trade database. http://data.un.org/ Import data from the largest economies of the world are used (Brazil, India, USA, China, Japan and EU-27).
  property dry mass 1 kg; name DM
  property water content 0; name water_content
  property wet mass 1 kg; name WM
  property water in wet mass 0 kg; name WWM
  property carbon content, fossil 0; name C_content_fossil
  property carbon content 0
    carbon content on a dry matter basis (reserved; not for manual entry)
  property true value 36.3358
    allocation property applied in "true value" allocation // value calculated from revenue
  properties: carbon allocation 0 kg
- aluminium, cast alloy: 0 kg; source European Aluminium Association 2008; By-product classification allocatable product; CPC 41431: Unwrought aluminium; pedigree (1,1,1,1,1)
  EcoSpold01Location=RER
  production volume 44883.5 kg
  property price 1.3 EUR2005; name castAlloyAmount_price_EUR2005
    Temporary price data. Calculated as 90% of purchasers price based on: Source: London Metal Exchange, Aluminium alloy price for 2005
  property carbon content 0
    carbon content on a dry matter basis (reserved; not for manual entry)
  property true value 1576.99
    allocation property applied in "true value" allocation // value calculated from revenue
  properties: water in wet mass 0 kg, carbon content, non-fossil 0, water content 0, dry mass 1 kg, carbon content, fossil 0, wet mass 1 kg, carbon allocation 0 kg
- aluminium, wrought alloy: 0 kg; source European Aluminium Association 2008; By-product classification allocatable product; CPC 4153: Semi-finished products of aluminium or aluminium alloys; pedigree (1,1,1,1,1)
  production volume 19649.2 kg
  property price 1.44 EUR2005; name secondaryAluminiumOutput_price_EUR2005
    Estimated based on literature values and expert judgement. Aluminium ccast alloys are about 90% of the price of aluminium wrought alloys.
  property carbon content 0
    carbon content on a dry matter basis (reserved; not for manual entry)
  property true value 764.724
    allocation property applied in "true value" allocation // value calculated from revenue
  properties: wet mass 1 kg, water content 0, carbon content, fossil 0, water in wet mass 0 kg, carbon content, non-fossil 0, dry mass 1 kg, carbon allocation 0 kg
- copper: 0 kg; source Rentz O. 1999; By-product classification allocatable product; CPC 41413: Refined copper and copper alloys, unwrought; master alloys of copper
  Literature value. Copper uses: Before end-use copper is manufactured into semi fabricated products, such as shapes and ingots (known as 'semis'). These manufacturing processes are subdivided into hot working, cold working and, if necessary, process annealing. Few of the semis are ready for use as such. They more typically travel to first-stage manufacturers, who make metal rods, wire, and casting, and then to component manufacturers who produce such things as motors, valves, and insulated cables The components in turn are incorporated by final-stage manufacturers into a variety of finished products - automobiles, commercial buildings, residential housing, and so forth. These uses account for about 79% of the world-wide consumption of copper.
  production volume 1813.31 kg
  property price 5.52 EUR2005
    Literature value (http://www.economist.com/news/business/21576714-mining-industry-has-enriched-chile-its-future-precarious-copper-solution). Average price between 20015 and 2013.
  property carbon content 0
    carbon content on a dry matter basis (reserved; not for manual entry)
  property true value 270.527
    allocation property applied in "true value" allocation // value calculated from revenue
  properties: dry mass 1 kg, water in wet mass 0 kg, wet mass 1 kg, carbon content, non-fossil 0, water content 0, carbon content, fossil 0, carbon allocation 0 kg
- zinc concentrate: 0 kg; CPC 14290: Other non-ferrous metal ores and concentrates (other than uranium or thorium ores and concentrates); By-product classification allocatable product
  Calculated value from the knowledge of the properties of both products.
  production volume 0.284466 kg
  property price 0.38 EUR2005; name ByP_price_EUR2005
    Temporary price data. Calculated as 90% of purchasers price based on: Zinc content in concentrate 53%. Concentrate price per kg Zn 86.5% of refined Zn price (13.5% treatment charges according to CHR Metals Limited 2005: Dynamic cost curves. http://www.minecost.com/dynamic.pdf). 2004 zinc price from USGS (2007) Mineral commodity summaries 2007. <http://minerals.usgs.gov/minerals/pubs/mcs/2007/mcs2007.pdf> [Accessed 25 May 2010]
  property zinc content 0.53; name zinc_C_zinc_concentrate
    Zinc content on a dry matter basis. Value taken from teh "zinc mine operation" /GLO dataset.
  property dry mass 1 kg; name DM_zinc_concentrate
  property carbon content 0
    carbon content on a dry matter basis (reserved; not for manual entry)
  property true value 0.00292155
    allocation property applied in "true value" allocation // value calculated from revenue
  properties: wet mass 1 kg, water content 0, carbon content, non-fossil 0, carbon content, fossil 0, water in wet mass 0 kg, carbon allocation 0 kg
- iron scrap, sorted, pressed: 0 kg; By-product classification Recyclable; CPC 39310: Slag, dross, scalings and other waste from the manufacture of iron or steel; pedigree (1,1,1,1,1)
  metallic iron scrap removed from ash reamains and recycled.
  Uncertainty: uncertainty is calculated from uncertainties in waste composition and transfer coefficients to soild residues
  production volume 24.0642 kg
  property price 0.175 EUR2005
    Temporary price data. Calculated as 90% of purchasers price based on: 2005 import and export prices (total trades (USD) divided by total weight (kg) in biggest economies of the world: EU27, USA, Brasil, China, India, Japan and Russia) from UN Commodity Trade Statistics Database (http://data.un.org/Explorer.aspxDatabase [Accessed 2011.06.20]). Commodity: Waste or scrap, of cast iron
  property carbon content 0
    carbon content on a dry matter basis (reserved; not for manual entry)
  property true value 0.113817
    allocation property applied in "true value" allocation // value calculated from revenue
  properties: carbon content, non-fossil 0, wet mass 1 kg, dry mass 1 kg, water content 0, carbon content, fossil 0, water in wet mass 0 kg, carbon allocation 0 kg

## Inputs from technosphere
- blower and heat exchange unit, decentralized, 180-250 m3/h: 298.761 unit; = 60*lifetime/15; lognormal variance with pedigree 0.422225, pedigree (1,4,2,2,5)
  Calculated value. Represents here an air-conditioning unit. The amount of exchange is calculated as: amount of input product * (lifetime of the hotel / lifetime of the product). Assumed service life of the air-conditioning unit is 15 years. Source: ASHRAE 2018. ASHRAE Equipment Life Expectancy chart. Available from: http://www.culluminc.com/wp-content/uploads/2013/02/ASHRAE_Chart_HVAC_Life_Expectancy%201.pdf Accessed 23 March 2018.
  properties: carbon content, non-fossil 6.48865e-7, dry mass 43.1 kg, wet mass 43.1 kg, carbon content, fossil 0.225044
- waste concrete: -9.28225e6 kg; name waste_concrete; = ((concrete*concrete_WM)+brick+plaster)*-1; lognormal variance with pedigree 0.122825, pedigree (1,4,2,2,5)
  Calculated value. Amount of output material is set equal to the amount of respective input material, concrete, clay brick, base plaster and foundation. Conversion is made from m3 of concrete to kg of concrete based on the density reported in the properties section for the product "concrete, normal" (see wet mass property).
  production volume 3.44868e8 kg; = waste_concrete*RP_PV
    Calculated from production volume of reference product using the relative outputs.
  property price 0 EUR2005; name waste_concrete_price_EUR2005
  properties: wet mass 1 kg, water content 1, dry mass 0.5 kg
- door, inner, wood: 286.564 m2; name door_inner_w; = 127*1,981*0,610*(lifetime/40); lognormal variance with pedigree 0.122825, pedigree (1,4,2,2,5)
  Calculated value. The amount of exchange is calculated as: amount of input product * (lifetime of the hotel / lifetime of the product). Dimensions of a standar assumed to be 1,981 x 0,610 m and include wooden door frame. Souce: https://www.jbkind.com/info-centre/standard-door-sizes. Assumed service life of 40 years. Source: Cobut et al. 2015. The environmental footprint of interior wood doors in non-residential buildings - part 1: life cycle assessment. Journal of Cleaner Production, 109, 232-246. In terms of outputs, assumed to have gone to used door, inner, wood.
  properties: water content 0.0526316, wet mass 27.6 kg, carbon content, fossil 0.074995, dry mass 26.22 kg, carbon content, non-fossil 0.715131
- clay brick: 973194 kg; name brick; = 508,4444444*1922; lognormal variance with pedigree 0.123425, pedigree (2,4,2,2,5)
  Calculated value. Combined of all instances of use across the building structure and walls. Assumed density of bricks = 1922 kg/m3. Source: The calculator site, 2018. Construction. Available from: https://www.thecalculatorsite.com/conversions/substances/construction.php. Accessed 13 January 2018. Assumed service life of 75 years which is equal to the service life of the hotel building with minor refurbishments throughout. In terms of outputs assumed to have gone to waste concrete.
  properties: dry mass 1 kg, wet mass 1 kg
- glass wool mat: 617.882 kg; name wool_mat; = (155,1111111*0,1*40); lognormal variance with pedigree 0.123425, pedigree (2,4,2,2,5)
  Calculated value. Used here in place of acustic tile as a more conventional product. The amount of exchange is calculated as: amount of input product * (lifetime of the hotel / lifetime of the product). Combined of all instances of use across the building structure, walls and ceiling. Assumed service life of 75 years which is equal to the service life of the hotel building with minor refurbishments throughout. Assumed thickiness of glass wool 100 mm. Source: Knauf Insulation 2018. Knauf Insulation. Available from: http://www.knaufinsulation.co.uk/products/glass-mineral-wool-rolls/loft-insulation-rolls/earthwool-loft-roll-44 Accessed 16 March 2018. The density of glass wool is assumed to be 40 kg/m3 based on the specifications in ecoinvent dataset "glass wool mat production, CH 2000" accessed 22 Janaury 2018. In terms of outputs, assumed to have gone to waste glass.
  properties: wet mass 1 kg, carbon content, fossil 0.0107327, dry mass 1 kg
  note on carbon content, fossil: A share of 16 w-% for the binders is taken into account. The binder used in this study is a mixture of phenol, formaldehyde and urea resins (ecoinvent v2.2 report 16_part XIV), and the C content was calculated as a weigthed average of phenol, formaldehyde and urea C content.
- ceramic tile: 55754.3 kg; name tile; = (303,4444444*12.3)*(lifetime/5); lognormal variance with pedigree 0.122825, pedigree (1,4,2,2,5)
  Calculated value. The amount of exchange is calculated as: amount of input product * (lifetime of the hotel / lifetime of the product). Combined of all instances of use across the building floor. Assuming 12.3 kg of tiles is required to cover 1 m2 of floor area. Source: Victoria Plumbing 2018. British ceramic tile. Available from: https://victoriaplum.com/product/british-ceramic-tile-metro-bevel-white-gloss-tile-100mm-x-200mm Accessed 16 March 2018. Assumed service life of 5 years for floor ceramic tile which is equivalent to the period of major refurbishments in hotels. Source: Filimonau et al. 2011. Reviewing the carbon footprint analysis of hotels: Life Cycle Energy Analysis (LCEA) as a holistic method for carbon impact appraisal of tourist accommodation. Journal of Cleaner Production, 19(17-18), 1917-1930. In terms of outputs assumed to have gone to insert waste.
  properties: dry mass 1 kg, wet mass 1 kg
- waste wood, untreated: -17375.3 kg; name waste_w; = ((sawnwood*sawnwood_WM))*-1; lognormal variance with pedigree 0.123425, pedigree (2,4,2,2,5)
  Calculated value. The amount is set equal to the amount of input materials, sawnwood, with conversion made from volume to weight. The conversion is based on the density reported in the property section for the respective products (see the wet mass property).
  production volume 645553 kg; = waste_w*RP_PV/RP
    Calculated from production volume of reference product using the relative outputs.
  property price 0 EUR2005; name waste_w_price_EUR2005
  properties: wet mass 1 kg, carbon content, non-fossil 0.48632, dry mass 0.8 kg, water content 0.25
- aluminium scrap, post-consumer: -2241.78 kg; name waste_alu; = ((window*window_WM))*-1; lognormal variance with pedigree 0.123425, pedigree (2,4,2,2,5)
  Calculated value. Amount of output material is set equal to the amount of respective input material, window frame, aluminium multiplied by its wet mass (assumed to equals the density) plus structural aluminium.
  production volume 83290 kg; = waste_alu*RP_PV/RP
    Calculated from production volume of reference product using the relative outputs.
  property price 0.685 EUR2005; name waste_alu_price_EUR2005
  properties: dry mass 1 kg, wet mass 1 kg
- gypsum plasterboard: 16505.8 kg; name gypsum; = (((1736+335,7822222)*12.5)/1000)*640; lognormal variance with pedigree 0.123425, pedigree (2,4,2,2,5)
  Calculated value. Combined of all instances of all across the building walls, ceiling and roof. Assumed thickness of roof plasterboard 12.5 mm. Source: Practical DYI 2018. Types of plasterboard. Available from: https://www.practicaldiy.com/general-building/plasterboard/plasterboard.php Accessed 23 March 2018. Assumed density of plasterboard 640 kg/m3. Source: British Gypsum 2018. What is the density of Gyproc plasterboards? Available from: http://www.british-gypsum.com/technical-advice/faqs/114-what-is-the-density-of-gyproc-plasterboards Accessed 23 March 2018. Assumed service life of 75 years with minor refurbishments throughout. In terms of outputs assumed to have gone to waste gypsum plasterboard.
  properties: carbon content, fossil 0.00113571, dry mass 1 kg, wet mass 1 kg, carbon content, non-fossil 0.0188747
- tap water: 2.22632e6 kg; name tap_water; = (0.5*1000*AFA); lognormal variance with pedigree 0.422225, pedigree (1,4,2,2,5)
  Calculated value. Assuming that 0.5 kl per 1 m2 of floor area (AFA) is required in building construction. Source: Crawford et al. 2005. In terms of outputs assumed to have gone to wastewater. Value double checked in McCormack, et al. 2007.
  Reference:
  Crawford, Robert and Treloar, Graham 2005, An assessment of the energy and water embodied in commercial building construction, in Australian Life Cycle Assessment Conference (4th : 2005 : Novotel, Sydney, N.S.W.), Australian Life Cycle Assessment Society, Sydney, N.S.W., pp. 1-10.
  McCormack, et al. 2007. Modelling direct and indirect water requirements of construction. Building research & information. 35(2), 156-162.
  properties: carbon content, fossil 0.00178991, wet mass 1 kg, dry mass 0.000337476 kg, water content 2962.17
  note on carbon content, fossil: Bicarbonate content is 2.93 mol/m3. CO2 content is 0.1 mol/m3 (ecoinvent v2.2 report 8, Tab 93.1).
- flat glass, coated: 8266.22 kg; name glass; = ((((56*0,37)+64,44444444)*15)+(360*2,6))*(lifetime/20); lognormal variance with pedigree 0.122825, pedigree (1,4,2,2,5)
  Estimated value. For window glass: Assuming each room has two windows. Assumed size of a standard 2020 window of 0.37 m2, https://modernize.com/windows/standard-sizes Assuming 15 kg of window glass is required to cover 1m2 of area (double-glazed windows). For construction glass: Assuming density of glass 2.6 kg/m3. Available from https://www.engineeringtoolbox.com/density-solids-d_1265.html Accessed 16 March 2018. Assumed average service life of 20 years for both types. Source: Howard et al. 2007. Comparative service life assessment of window systems. Available from: http://www.fwpa.com.au/images/marketaccess/PR07.1047%20Final%20Report%20WEB.pdf Accessed 16 March 2018. In terms of outputs assumed to have gone to waste glass.
  properties: dry mass 1 kg, wet mass 1 kg
- sawnwood, beam, softwood, dried (u=10%), planed: 40.7948 m3; name sawnwood; = 4312*9,5/1000; lognormal variance with pedigree 0.123425, pedigree (2,4,2,2,5)
  Calculated value. Represents here all wood used in flooring and for wall decoration. Combined of all instances of use across the building. Assumed thickness of wood to be 9.5 mm. Source: APA 2016. Wall construction. An excerpt of the engineering wood construction guide. Available from: https://www.buildgp.com/DocumentViewer.aspx?elementid=10198 Accessed 25 March 2018. Assumed service life of 75 years with minor refurbishments throughout. In terms of outputs assumed to have gone to waste wood, untreated.
  property wet mass 425.92 kg; name sawnwood_WM
  properties: water content 0.1, carbon content, non-fossil 0.494, dry mass 387.2 kg
- electricity, low voltage: 4007.38 kWh; name el; = 0.3* volume; lognormal variance with pedigree 0.422225, pedigree (1,4,2,2,5)
  Calculated value. Assuming that 0.30 kWh/m3 of electricity is necessary to construct a building. Source: Zabalza et al. 2013. Use of LCA as a Tool for Building Ecodesign. A Case Study of a Low Energy Building in Spain. Energies, 6 (8), 3901-3921.
- window frame, aluminium, U=1.6 W/m2K: 44.2166 m2; name window; = 20,72*(lifetime/35); lognormal variance with pedigree 0.2106, pedigree (5,5,5,5,5)
  Calculated value. The amount of exchange is calculated as: amount of input product * (lifetime of the hotel / lifetime of the product). Assumed service life of 35 years. Source: Asif et al. 2002. LIFE CYCLE OF WINDOW MATERIALS - A COMPARATIVE ASSESSMENT. Available from: http://ohp.parks.ca.gov/pages/1054/files/uk%20window%20frame%20lca.pdf Accessed 16 March 2018.
  property wet mass 50.7 kg; name window_WM
  properties: dry mass 50.7 kg, carbon content, fossil 0.142876
- natural stone plate, cut: 63.1558 kg; name natural_stone; = ((169,4111111*22/1000)*2,7)+((898,2266667*22/1000)*2,7); lognormal variance with pedigree 0.123425, pedigree (2,4,2,2,5)
  Calculated value. Used here in place of marble. Combined of all instances of use across the building. Assumed thickness of marble is 22 mm. Source: Erdly and Schwartz 2004. Building facade maintenance, repair, and inspection. ASTM International, West Conshohocken, USA. Assumed density of marble is 2.7 kg/m3. Source: The Engineering Toolbox 2018. Densities of common solids. Available from: https://www.engineeringtoolbox.com/density-solids-d_1265.html Accessed 25 March 2018. Assumed service life of 75 years which is equal to the service life of the hotel building with minor refurbishments throughout. In terms of outputs assumed to have gone to inert waste.
  properties: wet mass 1 kg, dry mass 1 kg
- wastewater, average: -2226.32 m3; name wastewater; = (tap_water/1000)*-1; lognormal variance with pedigree 0.122825, pedigree (1,4,2,2,5)
  Calculated value. The amount is set equal to the amount of input material, tap water with conversion from kg to m3. 1 m3 of water is assumed to be equal to 1000 kg of water.
  production volume 82715.5 m3; = wastewater*RP_PV/RP
    Calculated from production volume of reference product using the relative outputs.
  property price 0 EUR2005; name wastewater_price_EUR2005
  properties: wet mass 1000 kg, dry mass 0.346837 kg, water content 2882.2, carbon content, non-fossil 0.194039
  note on carbon content, non-fossil: 0.0673 kg TOC/m3 (Tab A.17, ecoinvent v2.2 report 13_I). TOC was considered as Total Carbon.
- concrete, normal: 3487.01 m3; name concrete; = 3334,977778+(9,88*0,225)+164,2656; lognormal variance with pedigree 0.122825, pedigree (1,4,2,2,5)
  Calculated value.
  Combined of all instances of use across the building structure, walls (m2) and floor (3501.5m3). Assumed thickness of 225 mm, Available at http://kingspaninsulation.co.uk/getattachment/5fdd04b2-e58e-4622-97bb-5861799ab02a/Thermafloor-TF70-pdf.pdf Accessed on 10 Feb 2018 Assumed service life of 75 years which is equal to the service life of the hotel building with minor refurbishments throughout.
  Additionally the concrete for foundations is accounted for (164.27m3). Estimated value based on the hotel area. In terms of outputs assumed to have gone to waste concrete.
  property wet mass 2380 kg; name concrete_WM
  properties: dry mass 2190 kg, water content 0.086758
- used door, inner, wood: -286.564 m2; name used_door; = (door_inner_w)*-1; lognormal variance with pedigree 0.122825, pedigree (1,4,2,2,5)
  Calculated value. Amount of output material is set equal to the amount of respectiveinput material, door, inner, wood.
  production volume 10646.8 m2; = used_door*RP_PV/RP
    Calculated from production volume of reference product using the relative outputs.
  property price 0 EUR2005; name used_door_price_EUR2005
  properties: carbon content, fossil 0.074995, wet mass 27.6 kg, water content 0.0526316, dry mass 26.22 kg, carbon content, non-fossil 0.715131
- sanitary ceramics: 14938.1 kg; name sanitary; = ((60*15)*(lifetime/15)+(60*35)*(lifetime/15)); lognormal variance with pedigree 0.422225, pedigree (1,4,2,2,5)
  Calculated value. The amount of exchange is calculated as: amount of input product * (lifetime of the hotel / lifetime of the product). This flow represents ceramic washing basin and ceramic toilet seat. The hotel has 60 washing basins and 60 toilet seats. Washing basins are assumed to weigh 15kg (information taken from IKEA (2018) for the product "TÖRNVIKEN Countertop wash-basin", source retrieved from: http://www.ikea.com/gb/en/products/washstands-taps/wash-basins/t%C3%B6rnviken-countertop-wash-basin-white-art-90291518/, accessed 12 Feb 2018). The assumed lifetime is 15 years. Toilet seats are assumed to weigh 35kg (information taken from B&Q (2018) for the product "COOKE & LEWIS FABIENNE CLOSE-COUPLED TOILET WITH SOFT CLOSE SEAT", source retrieved from: https://www.diy.com/departments/cooke-lewis-fabienne-close-coupled-toilet-with-soft-close-seat/1142804_BQ.prd?B/R_Toilets_C_CT, accessed 12 Feb 2018). In terms of outputs, assumed to have gone to inert waste.
  In terms of outputs, assumed to have gone to inert waste.
  properties: dry mass 1 kg, wet mass 1 kg
- elevator, hydraulic: 7.46903 unit; = 2*lifetime/20; lognormal variance with pedigree 0.422225, pedigree (1,4,2,2,5)
  Calculated value. The amount of exchange is calculated as: amount of input product * (lifetime of the hotel / lifetime of the product). Assumed service life of elevator unit is 20 years. Source: Miljögiraff 2015. LCA of elevator lifting service in property. Miljögiraff Report 56. Available from: https://www.researchgate.net/profile/Marcus_Wendin/publication/301295772_Elevators_towards_a_circular_economy/links/5717790f08ae2679a8c772db/Elevators-towards-a-circular-economy.pdf Accessed 23 March 2018.
  properties: wet mass 2490 kg, carbon content, fossil 42.2962, lifetime 80 year, dry mass 2490 kg
- diesel, burned in building machine: 66843.1 MJ; name diesel; = 1.39*3.6*volume; lognormal variance with pedigree 0.422225, pedigree (1,4,2,2,5)
  Calculated value. Assuming that 1.39 kWh/m3 of diesel is necessary to construct a building. Source: Zabalza et al. 2013. Use of LCA as a Tool for Building Ecodesign. A Case Study of a Low Energy Building in Spain. Energies, 6(8), 3901-3921. Assuming 1 kWh = 3.6 MJ
- waste gypsum plasterboard: -16505.8 kg; name waste_g; = (gypsum)*-1; lognormal variance with pedigree 0.123425, pedigree (2,4,2,2,5)
  Calculated value. Amount of output material is set equal to the amount of respective input material, gypsum plasterboard.
  production volume 613248 kg; = waste_g*RP_PV/RP
    Calculated from production volume of reference product using the relative outputs.
  property price 0 EUR2005; name waste_g_price_EUR2005
  properties: dry mass 0.807 kg, wet mass 1 kg, water content 0.239157
- inert waste: -70755.5 kg; name inert_w; = (sanitary+ tile+natural_stone)*-1; lognormal variance with pedigree 0.122825, pedigree (1,4,2,2,5)
  Calculated value. Amount of output material is set equal to the amount of respective input material, sanitary ceramics. It also contains waste ceramic tile and natural stone.
  production volume 2.62881e6 kg; = inert_w*RP_PV/RP
    Calculated from production volume of reference product using the relative outputs.
  property price 0 EUR2005; name inert_w_price_EUR2005
  properties: dry mass 1 kg, wet mass 1 kg
- base plaster: 9983.6 kg; name plaster; = 401*25; lognormal variance with pedigree 0.122825, pedigree (1,4,2,2,5)
  Estimated value. Combined of all instances of use across the building structure and walls. Assuming that 401 bags of base paster (each bag has a weight of 25 kg) are required to plaster the area of circa 3638,89 m2. Source: British Gypsum 2018. Plaster Coverage Tool. Available from: http://www.british-gypsum.com/technical-advice/plaster-coverage-tool. Accessed 23 March 2018. Assumed service life of 75 years which is equal to the service life of the hotel building with minor refurbishments throughout. In terms of outputs assumed to have gone to waste concrete.
  properties: wet mass 1 kg, dry mass 1 kg
- waste glass: -8884.1 kg; name waste_glass; = (glass+wool_mat)*-1; lognormal variance with pedigree 0.122825, pedigree (1,4,2,2,5)
  Calculated value. Amount of output material is set equal to the amount of respective input material, flat glass and glass wool mat.
  production volume 330075 kg; = waste_glass*RP_PV/RP
    Calculated from production volume of reference product using the relative outputs.
  property price 0 EUR2005; name waste_glass_price_EUR2005
  properties: dry mass 1 kg, wet mass 1 kg

## Inputs from nature
- Transformation, to urban, continuously built [natural resource, land]: 681.613 m2; = GFA; lognormal variance with pedigree 0.242225, pedigree (1,4,2,2,5)
  Calculated value. Based on survey data.
- Occupation, urban, continuously built [natural resource, land]: 51121 m2*year; = GFA* lifetime; lognormal variance with pedigree 0.162225, pedigree (1,4,2,2,5)
  Calculated value. Based on survey data, the gross floor area multiplied by the lifetime of the building.
- Transformation, from urban, continuously built [natural resource, land]: 681.613 m2; = GFA; lognormal variance with pedigree 0.242225, pedigree (1,4,2,2,5)
  Calculated value. Based on survey data.

## Sampling procedure
Primary data from the hotel supplemented with literature-based calculations and estimates, where appropriate.

## Extrapolations
In terms of construction, the amounts of input material are calculated based on usage across all instances within the hotel building.

## Review by Sirje Vares 2018-04-09
The Hotel dataset representing tourist accommodation facilities in different comfort category. The dataset takes into account all relevant building structures. The main information source was an enterprise data. The reliability of this dataset is good. The data is in correlation of the buildings, in which Load bearing structure is made from concrete and façades from brick and concrete.
Buildings have many architectural and geographical differences like typical building technology, traditionally used materils, weather condition or other. This dataset based on the building construction, Brasil. When the construction dataset applied for different regions / countries, regional differences and climate conditions should be taken into account additionally.
