# reefer production, intermodal shipping container, 40-foot, high-cube, carbon dioxide, liquid as refrigerant

Dataset: EcoSpold 2, unit process
Geography: GLO
Time period: 2010-01-01 to 2019-12-31
Technology level: modern
Classification: ISIC rev.4 ecoinvent: 2920:Manufacture of bodies (coachwork) for motor vehicles; manufacture of traile
Synonyms: freight container; sea can; reefer; refrigerated container; ISO container
Scenario: Business-as-Usual
System model: Allocation at the point of substitution
Generated by: Tereza Levova
Database: ecoinvent
isCopyrightProtected: true
accessRestrictedTo: 1

## General comment
This dataset represents production of reefer (refrigerated container), 40-foot, high-cube ISO standard container.
The intermodal shipping containers are basically metal boxes which are used for storage and transport of goods. The advantage of using these containers is, that they can be easily transferred from one type of transport to another without the necessity of unloading the goods.
There are several types and sizes of the containers mainly related to the historical development of intermodal container transport in the given region. There is a continuous effort in the standardization of the container sizes. Below see the table of the different sizes of the intermodal shipping containers as defined by the ISO standard (ISO 6346:1995, ISO 1161:1984, ISO 1496-1:2013).
Reefer is used for transport of goods which need atmosphere (mainly temperature) control during the transport. The difference between the dry cargo containers is, that reefers have foam insulation and attached refrigeration unit. The external size is the same as in case of dry cargo containers, but the internal volume is smaller due to the fact, that the space is partially taken by the refrigeration unit and the insulation.
Data for the life cycle inventory of this container were taken from different sources, primarily from the documentation of different container producers. The main sources of information is the technical documentation from Mearsk container industry (Marq Q container technical description) and Steinecker Containerhandel (Technical Specification for typical 40'x8'x9'6'' ISO Type Steel Dry Cargo Container, "High Cube", 2012).
Reefer (refrigerated container). Source (http://www.friconreefer.nl/index.php?categoryID=20&menu=1, accessed 20141015).
While reefers have their own integral refrigeration unit, they rely on external power. Most reefers are fitted with a standard plugs which means, they can be connected to different power points. On the ships they can be directly connected to the vessel's internal electricity system or the power can be supplied by auxiliary diesel generators. While being transported by train or truck the power is usually supplied by so called "gensets" which are basically auxiliary diesel generators.
Auxiliary diesel generator unit (genset) providing power to the reefer during transport on a truck, ship or train (http://www.gopixpic.com/600/reefer-container-gensets-40kva-keyword-/, accessed 20141031).

## Included activities start
The activity starts when all the individual parts needed for the production of a container enter the assembly site.

## Included activities end
The activity ends when the container is ready to be used.

## Technology
The container side rails are welded to create a frame. The walls of the container are made from corrugated steel. In order to protect the container againt different weather conditions zinc coating is needed.
Technical sketch of the differnt parts of the shipping container. Source: (http://shippingandfreightresource.com/how-strong-is-your-container-floorboard/, accessed 20141015).
The container has door on one side which can be locked using four locking bars. The doors have rubber seal gasket to ensure the water resistence of the container.
The most used refrigerant in refrigeration machines is the R134a. Since this refrigerant has a high global warming potential the refrigeration technology producers started producing referigeration machines with alternative refrigerants (Carrier, 2014, http://dms.hvacpartners.com//docs/2000/Public/0D/62-11665.pdf, accessed 20141105). One of them is liquid carbon dioxide.

## Parameters
- density: 7800 kg/m3; name density_corrugated_steel_wall; lognormal variance with pedigree 0.0032, pedigree (3,3,1,1,1)
  Estimated. The density of steel, low-alloyed used for the corrugated steel walls of the container.
- density of polyurethane foam insulation_base: 50 kg/m3; name density_insulation_base; lognormal variance with pedigree 0.0106, pedigree (4,4,1,1,1)
  Literature data (Mearsk Container Industry, 2012, Technical Specifications for 40'x8'x9'6'' refrigerated container with integrated star cool machine, http://www1.cma-cgm.com/mnr/page/DocAndProg/Spec%20for%20TAL%2040'hc%20SCIF%20x%201,000%20boxes(provisional%20CA).pdf, accessed 20141016).
- reefer, average power consumption: 3.6 kW/TEU; name reefer_power_consumption; lognormal variance with pedigree 0.0106, pedigree (3,5,1,1,1)
  Literature value (Sorensen, K.K.; Energy Saving Control-Strategies for Reefer Containers, Lodam Electronics).
- density of polyurethane foam insulation_side: 45 kg/m3; name density_insulation_side; lognormal variance with pedigree 0.0106, pedigree (4,4,1,1,1)
  (same comment as for density of polyurethane foam insulation_base)
- distance of travel of average 1 tone of persihable goods: 10000 km; name distance_ave_1ton; lognormal variance with pedigree 0.0186, pedigree (4,5,1,5,1)
  Estimated value.
  The distance taken by 1 ton of parishable food tansported in reefer.
  The distance is estimated by looking at the main reefer transport rouds around the world. For example the bananas (representing 20% of reefer transport) are transported mainly from South America to Europe.
  Dekker, N., 2014, Global reefer trades - 2014, Dewry Meritime Research (http://www.joc.com/sites/default/files/u221106/SpeakerPresentations/March3/Dekker_Neil_Cool_Cargoes_Presentation.pdf, accessed 20141030)
  Hamburh Süd, 2013, Reefer services company information (http://www.hamburg-sued.com/group/media/sharedmedia/dokumente/brochures/Reefer_guide.pdf, accessed 20141030)
- thickness of insulation_side: 65 mm; name thickness_insulation_side; lognormal variance with pedigree 0.0018, pedigree (2,3,1,1,1)
  (same comment as for density of polyurethane foam insulation_base)
- number of days_cargo present in the container: 10 day; name number_days_cargo_in; lognormal variance with pedigree 0.0166, pedigree (4,5,1,1,1)
  Estimated value based on literature.
  Approximate shelf life of bananas in ambient air is 18 to 20 days.
  The biggest exporters of bananas are Ecuador, Philippines and Costa Rica. The biggest importer is Europe (FAOSTAT).
  It is estimated, that it takes 10 days for the boat to reach an European port and 2 days before it is unloaded from the reefer at its final destination.
- thickness of insulation_roof: 90 mm; name thickness_insulation_roof; lognormal variance with pedigree 0.0018, pedigree (2,3,1,1,1)
  (same comment as for density of polyurethane foam insulation_base)
- volume of the T-bar floor for reefer: 0.134551 m3; name volume_floor; = ((reefer_RP_length_external* reefer_RP_width_external)*(2/1000))+(35*((((63.5-4)*2)+(28.5*2))/1000000)* reefer_RP_length_external); lognormal variance with pedigree 0.0092, pedigree (4,3,1,1,1)
  Calculated based on the knowledge of the cross section of the T-bar floor (Lukasse, 2003, The effect of T-bar height on air distribution in reefer containers, http://edepot.wur.nl/258963, accessed 20141015) and (Mearsk Container Industry, 2012, Technical Specifications for 40'x8'x9'6'' refrigerated container with integrated star cool machine, http://www1.cma-cgm.com/mnr/page/DocAndProg/Spec%20for%20TAL%2040'hc%20SCIF%20x%201,000%20boxes(provisional%20CA).pdf, accessed 20141016).
  The T-bar floor is placed on 2mm thick aluminium sheet. The hight of the T-bars is 63.5mm. There are two identical T-bars present per every 92mm.
- thickness of insulation_base: 95 mm; name thickness_insulation_base; lognormal variance with pedigree 0.0018, pedigree (2,3,1,1,1)
  (same comment as for density of polyurethane foam insulation_base)
- thickness of glass fibre reinforced polypropylene liner: 1.89692 mm; name thickness_liner; = ((reefer_RP_length_external* reefer_RP_width_external*1.5)+((area_corrugated_steel_walls-( reefer_RP_length_external* reefer_RP_width_external))*2))/area_corrugated_steel_walls; lognormal variance with pedigree 0.0032, pedigree (3,3,1,1,1)
  Literature data (http://ipaper.ipapercms.dk/MCI/Brochures/Qliner/, accessed 20141016).
- weight of a steel frame: 1442.97 kg; name weight_steel_frame; = weight_container- PP_in-PUR_foam_input- weight_walls- aluminium_in- steel_pipe_input+ (waste_PP*-1); lognormal variance with pedigree 0.0566, pedigree (4,5,1,1,4)
  Calculated value.
  The weight of the frame is calculated as a difference between the weight of the whole container minus the other materials (walls, floor, etc.).
- density of glass fibre reinforced polypropylene: 1050 kg/m3; name density_GFP_polypropylene; lognormal variance with pedigree 0.0032, pedigree (3,3,1,1,1)
  Literature value (http://cdn.intechopen.com/pdfs-wm/34071.pdf, accessed 20141016). The filler content is assumed to be 20%.
- weight of steel container's walls: 1574.5 kg; name weight_walls; = (area_corrugated_steel_walls*( thickness_walls/1000)* density_corrugated_steel_wall); lognormal variance with pedigree 0.0006, pedigree (1,1,1,1,1)
  Calculated value.
- density of polyurethane foam insulation_door: 55 kg/m3; name density_insulation_door; lognormal variance with pedigree 0.0106, pedigree (4,4,1,1,1)
  (same comment as for density of polyurethane foam insulation_base)
- area: 144.185 m2; name area_corrugated_steel_walls; = (reefer_RP_length_external* reefer_RP_height_external*2)+( reefer_RP_length_external* reefer_RP_width_external*2)+( reefer_RP_width_external* reefer_RP_height_external*2); lognormal variance with pedigree 0.0006, pedigree (1,1,1,1,1)
  Calculated value. Area of the corrugated steel walls.
- density of polyurethane foam insulation_roof: 45 kg/m3; name density_insulation_roof; lognormal variance with pedigree 0.0106, pedigree (4,4,1,1,1)
  (same comment as for density of polyurethane foam insulation_base)
- thickness of metal sheet_01: 1.4 mm; name thickness_walls; lognormal variance with pedigree 0.0026, pedigree (1,4,1,1,1)
  Industrial data.
- thickness of insulation_door: 78 mm; name thickness_insulation_door; lognormal variance with pedigree 0.0018, pedigree (2,3,1,1,1)
  (same comment as for density of polyurethane foam insulation_base)

## Reference product
- reefer, intermodal shipping container, 40-foot, high-cube, carbon dioxide, liquid as refrigerant: 1 unit; name reefer_RP; CPC 49221: Containers specially designed and equipped for carriage by one or more modes of transport; By-product classification allocatable product
  Standard refrigerated 40-food, high-cube intermodal shipping container.
  External dimensions; length - 12.192 m, width - 2.438 m and height - 2.896 m.
  Interior dimensions: length - 11.585 m, width - 2.290 m and height - 2.545 m.
  Internal volume: 67.5 m3
  Maximum gross weight: 34.000 tons
  Empty weight: 4.49 tons - 0.39 (refrigeration unit not included) = 4.1 tons
  Net load: 29.51 tons
  production volume 4500 unit; name reefer_RP_PV; = (1.6*1000000*0.9*0.0625)/2*0.1
    Calculated value.
    1.6 million TEU (Twenty-foot Equivalent unit) is newly added to the total capacity of shipping containers in the world (World Shipping Council, http://www.worldshipping.org/about-the-industry/containers/global-container-fleet, accessed 20141014).
    Out of that 6.25% are reefers (refrigerated containers).
    It is estimated, that 90% of the reefers produced are 40-foot, high-cube reefers.
    One 40-food, high-cube container has a capacity of 2 TEU.
    It is estimated, that from all the refrigeration machines produced 10% is meant to use carbon dioxide, liquid as refrigerant and 90% R134a as refrigerant.
  property width, external 2.438 m; name reefer_RP_width_external
    Industrial data. Standard 40-foot, high-cube intermodal refrigerated shipping container.
  property length, external 12.192 m; name reefer_RP_length_external
    Industrial data. Standard 40-foot, high-cube intermodal refrigerated shipping container.
  property width, internal 2.29 m; name reefer_RP_width_internal
    Industrial data. Standard 40-foot, high-cube intermodal refrigerated shipping container.
  property height, internal 2.545 m; name reefer_RP_height_internal
    Industrial data. Standard 40-foot, high-cube intermodal refrigerated shipping container.
  property weight 4100 kg; name weight_container
    Industrial data. Tare weight of a refrigerated container. The weight of the refrigeration unit is not included.
  property capacity, cargo 2 TEU; name reefer_RP_capacity_cargo
    Literature value. The 40-foot container has a cargo capacity of 2 TEU. It does not matter, that the container is high-cube and thus has actually bigger volume than the non high-cube container.
  property weight with a refrigeration unit 4480 kg; name weight_total; = weight_container+ weight_machine
    Calculated value. Weight of the reefer together with the build-in refrigeration machine.
  property height, external 2.896 m; name reefer_RP_height_external
    Industrial data. Standard 40-foot, high-cube intermodal refrigerated shipping container.
  property volume 67.5 m3; name reefer_RP_volume
    The maximum inside cubic capacity of the container.
  property maximum gross weight 34000 kg
    Industrial data. The maxiumum payload of a refrigerated container.
  property price 19498.8 EUR2005; name reefer_RP_price_EUR2005
    Calculated based on inputs: The price of the product has been calculated as a sum of the values of the material and energy inputs for this product. This value is therefore a rough estimation. It may underestimate the real price since there are additional expenses when producing any product. These expences can include for example labour costs, treatment of waste materials and profit for the producer. Please consider carefully whether this level of data quality is acceptable for your application.
  property maximum payload 29510 kg; name max_payload
    Industrial data. The maxiumum payload of a refrigerated container.
  property lifetime 10 year; name reefer_RP_lifetime
    Industrial data.
  property length, internal 11.585 m; name reefer_RP_length_internal
    Industrial data. Standard 40-foot, high-cube intermodal refrigerated shipping container.
  property lifetime capacity [kg*day] 3.30164e8 kg*day; name reefer_RP_lifetime_capacity_kg_day; = reefer_RP_capacity_cargo/(32.9E+6*0.0625)*6.51E+10*(1/0.7)*reefer_RP_lifetime*365
    Calculated value.
    65.11 mil. tons is the amount of perishable goods transported in 2012 by reefers (Dekker, 2014, Global reefer trades - 2014, Dewry, accessed 20141022).
    32.9 million TEU (Twenty-foot Equivalent unit) is current global capacity of shipping containers in the world (World Shipping Council, http://www.worldshipping.org/about-the-industry/containers/global-container-fleet, accessed 20141014).
    Out of that 6.25% are reefers (refrigerated containers).
    One 40-food, high-cube container has a capacity of 2 TEU.
    70% is the utilization rate - weight, the container carry 70% (in kg) of what they could be able to carry
  property true value 19498.8; name reefer_RP_true_value
    allocation property applied in "true value" allocation // value calculated from revenue

## By-products
- electricity, for reuse in municipal waste incineration only: 0 kWh; CPC 17100: Electrical energy; By-product classification allocatable product; pedigree (1,1,1,1,1)
  Net electricity generated from this waste and used in internal MSWI plant energy redistribution.
  Uncertainty: uncertainty is calculated from uncertainties in waste composition and uncertainties in energy efficiency and the uncertainty in internal energy demand
  production volume 626819 kWh
  property price 0.1 EUR2005; name E_el_prod_MSWI_price_EUR2005
    Estimated to be the same price as in case of electricity, medium voltage.
  property exergy 3.6 MJ; name E_el_prod_MSWI_exergy
    This exergy property is based on the exergy content of the product.
  property true value relation 3.6; name E_el_prod_MSWI_true_value_relation
    property to calculate "true value" from
  property true value 10.8589
    allocation property applied in "true value" allocation // value calculated from true value relation
- heat, for reuse in municipal waste incineration only: 0 MJ; CPC 17300: Steam and hot water; By-product classification allocatable product; pedigree (1,1,1,1,1)
  (same comment as for electricity, for reuse in municipal waste incineration only)
  production volume 4.39344e6 MJ
  property exergy 0.1842 MJ; name E_th_prod_MSWI_exergy
    This exergy property is based on the exergy content of the product.
  property true value relation 0.1842; name E_th_prod_MSWI_true_value_relation
    property to calculate "true value" from
  property price 0.0106 EUR2005; name E_th_prod_MSWI_price_EUR2005
    Average European district heat price from Ecoheatcool and Euroheat 2005-2006, Ecoheat Work package 1: The European heat market. Final report. 10.6 EUR/GJ i s the price of district heat. http://www.solarthermalworld.org/files/Ecoheatcool%20WP1%20Web.pdf?download
  property true value 3.8954
    (same comment as for electricity, for reuse in municipal waste incineration only)
- zinc concentrate: 0 kg; CPC 14290: Other non-ferrous metal ores and concentrates (other than uranium or thorium ores and concentrates); By-product classification allocatable product
  Calculated value from the knowledge of the properties of both products.
  production volume 0.667163 kg
  property price 0.38 EUR2005; name ByP_price_EUR2005
    Temporary price data. Calculated as 90% of purchasers price based on: Zinc content in concentrate 53%. Concentrate price per kg Zn 86.5% of refined Zn price (13.5% treatment charges according to CHR Metals Limited 2005: Dynamic cost curves. http://www.minecost.com/dynamic.pdf). 2004 zinc price from USGS (2007) Mineral commodity summaries 2007. <http://minerals.usgs.gov/minerals/pubs/mcs/2007/mcs2007.pdf> [Accessed 25 May 2010]
  property zinc content 0.53; name zinc_C_zinc_concentrate
    Zinc content on a dry matter basis. Value taken from teh "zinc mine operation" /GLO dataset.
  property dry mass 1 kg; name DM_zinc_concentrate
  property carbon content 0
    carbon content on a dry matter basis (reserved; not for manual entry)
  property true value 5.63382e-5
    allocation property applied in "true value" allocation // value calculated from revenue
  properties: wet mass 1 kg, water content 0, carbon content, non-fossil 0, carbon content, fossil 0, water in wet mass 0 kg, carbon allocation 0 kg
- iron scrap, sorted, pressed: 0 kg; By-product classification Recyclable; CPC 39310: Slag, dross, scalings and other waste from the manufacture of iron or steel; pedigree (1,1,1,1,1)
  Iron scrap recovered from this waste.
  production volume 10385.8 kg
  property price 0.175 EUR2005
    Temporary price data. Calculated as 90% of purchasers price based on: 2005 import and export prices (total trades (USD) divided by total weight (kg) in biggest economies of the world: EU27, USA, Brasil, China, India, Japan and Russia) from UN Commodity Trade Statistics Database (http://data.un.org/Explorer.aspxDatabase [Accessed 2011.06.20]). Commodity: Waste or scrap, of cast iron
  property carbon content 0
    carbon content on a dry matter basis (reserved; not for manual entry)
  property true value 0.403891
    allocation property applied in "true value" allocation // value calculated from revenue
  properties: water content 0, water in wet mass 0 kg, carbon content, fossil 0, dry mass 1 kg, carbon content, non-fossil 0, wet mass 1 kg, carbon allocation 0 kg
- iron scrap, unsorted: 0 kg; source European Aluminium Association 2008; CPC 39310: Slag, dross, scalings and other waste from the manufacture of iron or steel; By-product classification Recyclable; pedigree (1,1,1,1,1)
  production volume 573.208 kg
  property price 0.149 EUR2005; name ironScrapAmount_price_EUR2005
    Temporary price data. Calculated as 90% of purchasers price based on: estimated at 85% of sorted scrap
  property carbon content 0
    carbon content on a dry matter basis (reserved; not for manual entry)
  property true value 0.0189796
    allocation property applied in "true value" allocation // value calculated from revenue
  properties: water in wet mass 0 kg, water content 0, carbon content, fossil 0, carbon content, non-fossil 0, dry mass 1 kg, wet mass 1 kg, carbon allocation 0 kg
- aluminium oxide, non-metallurgical: 0 kg; source European Aluminium Association 2008; CPC 41432: Alumina (aluminium oxide), except artificial corundum; By-product classification allocatable product; CAS 1344-28-1; pedigree (1,1,1,1,1)
  production volume 36069.8 kg
  property carbon content, non-fossil 0; name C_content_non_fossil
  property price 0.28 EUR2005; name Al2O3Amount_price_EUR2005
    From UN trade database. http://data.un.org/ Import data from the largest economies of the world are used (Brazil, India, USA, China, Japan and EU-27).
  property dry mass 1 kg; name DM
  property water content 0; name water_content
  property wet mass 1 kg; name WM
  property water in wet mass 0 kg; name WWM
  property carbon content, fossil 0; name C_content_fossil
  property carbon content 0
    carbon content on a dry matter basis (reserved; not for manual entry)
  property true value 2.24434
    allocation property applied in "true value" allocation // value calculated from revenue
  properties: carbon allocation 0 kg
- aluminium, cast alloy: 0 kg; source European Aluminium Association 2008; By-product classification allocatable product; CPC 41431: Unwrought aluminium; pedigree (1,1,1,1,1)
  EcoSpold01Location=RER
  production volume 337173 kg
  property price 1.3 EUR2005; name castAlloyAmount_price_EUR2005
    Temporary price data. Calculated as 90% of purchasers price based on: Source: London Metal Exchange, Aluminium alloy price for 2005
  property carbon content 0
    carbon content on a dry matter basis (reserved; not for manual entry)
  property true value 97.4055
    allocation property applied in "true value" allocation // value calculated from revenue
  properties: water in wet mass 0 kg, carbon content, non-fossil 0, water content 0, dry mass 1 kg, carbon content, fossil 0, wet mass 1 kg, carbon allocation 0 kg
- aluminium, wrought alloy: 0 kg; source European Aluminium Association 2008; By-product classification allocatable product; CPC 4153: Semi-finished products of aluminium or aluminium alloys; pedigree (1,1,1,1,1)
  production volume 147608 kg
  property price 1.44 EUR2005; name secondaryAluminiumOutput_price_EUR2005
  properties: wet mass 1 kg, water content 0, carbon content, fossil 0, water in wet mass 0 kg, carbon content, non-fossil 0, dry mass 1 kg, carbon content 0, carbon allocation 0 kg, true value 47.2345

## Inputs from technosphere
- aluminium, wrought alloy: 360.293 kg; name aluminium_in; = volume_floor* aluminium_wrought_density; source Maersk Container Industry 2013; lognormal variance with pedigree 0.0126, pedigree (4,4,3,1,1)
  Calculated value based on the knowledge of the cross section of the T-bone floor.
  property bulk density 2700 kg/m3; name aluminium_wrought_density
  properties: dry mass 1 kg, wet mass 1 kg
  note on bulk density: Literature data. The aluminium used for the floor in the reefer is aluminium 6082 t6 (Mearsk Container Industry, 2012, Technical Specifications for 40'x8'x9'6'' refrigerated container with integrated star cool machine, http://www1.cma-cgm.com/mnr/page/DocAndProg/Spec%20for%20TAL%2040'hc%20SCIF%20x%201,000%20boxes(provisional%20CA).pdf, accessed 20141016) which has density 2700 kg/m3 (http://www.aalco.co.uk/datasheets/Aluminium-Alloy-6082-T6T651-Plate_148.ashx, accessed 20141017).
- used reefer, intermodal shipping container, 40-foot, high-cube: -0.991757 unit; = (reefer_RP)*-1; lognormal variance with pedigree 0.0026, pedigree (1,1,3,1,1)
  Calculated value.
  production volume 4500 unit; = reefer_RP_PV * ((Ref('c8d664b3-dc23-4846-8a4c-1da2c6b7104e')*-1) / reefer_RP)
    Calculated from production volume of reference product using the relative outputs.
  properties: carbon content, fossil 0.1353, wet mass 4100 kg, dry mass 4100 kg
- synthetic rubber: 5.83825 kg; name rubber_in; = (reefer_RP_width_external*2+ reefer_RP_height_external*3)*rubber_kg_per_m; source Maersk Container Industry 2013; lognormal variance with pedigree 0.0038, pedigree (2,3,3,1,1)
  Calculated value. The seal gasket is made of EPDM synthetic rubber. It cover all the edges of the container door.
  property weight per length 0.434 kg/m; name rubber_kg_per_m
  properties: dry mass 1 kg, wet mass 1 kg, carbon content, fossil 0.871949
  note on weight per length: Industrial data (http://hxtruck.en.made-in-china.com/product/OMqJuparbeRw/China-Container-Door-Seal-Rubber-Door-Seal-Door-Gasket-072006-.html, accessed 20141015). Container door seal (seal gasket) from synthetic rubber (EPDM).
  note on carbon content, fossil: EPDM (Ethylene-propene-diene terpolymer) rubber is a terpolymer of ethylene, propene, and a diene with the residual unsaturated portion of the diene in the side chain (ecoinvent v2.2 report 7-part XX & Ullmann). Chemical formula (deduced from Evidences of Solvent-Induced Miscibility in Polychloroprene-co-Ethylene-Propene Diene Terpolymer Blends, Dubey et al., Journal of Applied Polymer Science, 2009, 111:1884–1891): C20H35
- refrigeration machine, carbon dioxide, liquid as refrigerant: 0.991757 unit; lognormal variance with pedigree 0.0026, pedigree (1,1,3,1,1)
  Literature value.
  property weight 380 kg; name weight_machine
- welding, arc, steel: 69.5261 m; = reefer_RP_length_external*4+ reefer_RP_height_external*4+ reefer_RP_width_external*4; source Maersk Container Industry 2013; lognormal variance with pedigree 0.0038, pedigree (2,3,3,1,1)
  Calculated value based on estimates.
- metal working, average for aluminium product manufacturing: 360.293 kg; = aluminium_in; source Maersk Container Industry 2013; lognormal variance with pedigree 0.0038, pedigree (2,3,3,1,1)
  Calculated value.
- zinc coat, pieces: 428.99 m2; = area_corrugated_steel_walls*3; source Maersk Container Industry 2013; lognormal variance with pedigree 0.0038, pedigree (2,3,3,1,1)
  Calculated value.
  The "zinc coating, pieces" dataset is created for the thickess of the coat of 65µm. While the interior coating of the container should be approximatelly 65µm the exterior should be at least double (Steinecker, 2012). So the additional amount of coating is added to assure the correct thickness of the exterior coat.
- building, hall: 0.0242294 m2; = 1/(( lifetime_building*365)/( reefer_RP_length_external* reefer_RP_width_external*15)); source Maersk Container Industry 2013; lognormal variance with pedigree 0.318, pedigree (4,5,3,1,1)
  Calculated value based on estimates.
  1m2 of hall is available every day for 50 years
  1 container occupies the area of its base for the period of 15 days
  Resulting lifetime capacity of m2 of hall is 41 containers. Thus one container is responsible of construction of 0.024m2 of a hall.
  property lifetime 50 year; name lifetime_building
- metal working, average for chromium steel product manufacturing: 11.1077 kg; = steel_pipe_input; source Maersk Container Industry 2013; lognormal variance with pedigree 0.0038, pedigree (2,3,3,1,1)
  Calculated value.
- polypropylene, granulate: 257.326 kg; name PP_in; = (area_corrugated_steel_walls-( reefer_RP_width_external* reefer_RP_height_external))*(thickness_liner/1000)* density_GFP_polypropylene*0.95; source Maersk Container Industry 2013; lognormal variance with pedigree 0.0186, pedigree (4,5,3,1,1)
  Calculated value.
  The walls are covered on the inside of the container by polypropylene fibre reinforced thermoplastic. Since this product is not available in the database ordinary polypropylene is used instead.
  properties: wet mass 1 kg, dry mass 1 kg, carbon content, fossil 0.857143
- metal working, average for steel product manufacturing: 2992.6 kg; = steel_input; source Maersk Container Industry 2013; lognormal variance with pedigree 0.0038, pedigree (2,3,3,1,1)
  Calculated value.
  This exchange represent general metal working of the steel to form it into all the individual components needed for the assemby of the container.
- waste polyurethane foam: 0 kg; name waste_PP; source Maersk Container Industry 2013; pedigree (1,1,1,1,1)
  Estimated value. It is estimated, that app. 10% of the insulation is cut-off as a waste during the assembly of the container.
  production volume 0 kg
    Calculated from production volume of reference product using the relative outputs.
  property price 0 EUR2005; name waste_PP_price_EUR2005
  properties: carbon content, fossil 0.641283, water content 0.00200401, wet mass 1 kg, dry mass 0.998 kg
- chromium steel pipe: 11.1077 kg; name steel_pipe_input; = 4*2.8; source Maersk Container Industry 2013; lognormal variance with pedigree 0.0038, pedigree (2,3,3,1,1)
  Industrial value (Jost, Products for Container Equipment and Intermodal transports, http://www.jost-world.com/workflow/pdfanleitungen/kataloge/JOST_CT_ZDE180000039E_0910.pdf, accessed 20141014).
  There are 4 locking bars on the container.
  properties: dry mass 1 kg, wet mass 1 kg, carbon content, fossil 0.0008
- polyurethane, rigid foam: 0 kg; name PUR_foam_input; source Maersk Container Industry 2013; pedigree (1,1,1,1,1)
  Calculated value.
  properties: wet mass 1 kg, dry mass 1 kg, carbon content, fossil 0.69089
- steel, low-alloyed, hot rolled: 2992.6 kg; name steel_input; = weight_walls+ weight_steel_frame; source Maersk Container Industry 2013; lognormal variance with pedigree 0.0038, pedigree (2,3,3,1,1)
  Calculated value based on dimentions, thickness and density of the material.
  This exchange represent the amount of steel needed both for the frame and the sides of the container.
  properties: carbon content, fossil 0.005, wet mass 1 kg, dry mass 1 kg
  note on carbon content, fossil: Low alloyed steel composition given in Tab. 3.2 ecoinvent v2.2 report 10_partII. Steel assumed to have a C content of 0.5%
- waste polyurethane foam: -0.0387421, -49.3918 kg (2 entries); source Maersk Container Industry 2013; lognormal variance with pedigree 0.0186, pedigree (4,5,3,1,1)
  (same comment as for waste polyurethane foam)
  production volume 224286 kg
- polyurethane, rigid foam: 163.413, 330.892 kg (2 entries); source Maersk Container Industry 2013; lognormal variance with pedigree 0.0052, pedigree (3,3,3,1,1)
  Calculated value.
