# continuous dyeing, fibre, cotton

Dataset: EcoSpold 2, unit process
Geography: GLO
Time period: 2016-01-01 to 2019-12-31
Technology level: current
Classification: ISIC rev.4 ecoinvent: 1313:Finishing of textiles
Scenario: Business-as-Usual
System model: Allocation at the point of substitution
Generated by: Mireille Faist Emmenegger
Published in: Cotton Inc 2017
Database: ecoinvent
isCopyrightProtected: true
accessRestrictedTo: 1

## General comment
Data collected from mostly vertically integrated mills on a global level. The activity begins with untreated cotton fibres, which are first pre-treated before being dyed, and ends with cotton dyed. It includes electricity use and chemicals. It does not include the cotton fibres.
Wastewater emissions have been modelled based on primary data and completed with default data, considering wastewater treatment.

## Included activities start
The activity begins with loading untreated fabric. However, this is service activity. This means that the loaded fabric is not considered as an input of this process.

## Included activities end
The activity delivers the service of dyeing 1kg fabric. It has to be used with 1.04 kg of fabric (taking into account the fabric loss). This dataset represents a mixture of dryed and undryed fabric. This activity is for a fabric with a grammage of 236g/square meter.

## Geography
Eurasia, East Asia, South/Central Asia,
and Latin America

## Reference product
- continuous dyeing, fibre, cotton: 1 kg; By-product classification allocatable product; CPC 97150: Dyeing and colouring services
  Based on the Fibre Year report 2017 for the overall fibre production and assumptions on losses (17%) based on FAO World Apparel Fiber Consumption Survey 2013.
  production volume 7e10 kg
    (same comment as for continuous dyeing, fibre, cotton)
  property price 0.537952 EUR2005
    Calculated based on inputs: The price of the product has been calculated as a sum of the values of the material and energy inputs for this product. This value is therefore a rough estimation. It may underestimate the real price since there are additional expenses when producing any product. These expences can include for example labour costs, treatment of waste materials and profit for the producer. Please consider carefully whether this level of data quality is acceptable for your application.
  property true value 0.537952
    allocation property applied in "true value" allocation // value calculated from revenue

## By-products
- electricity, for reuse in municipal waste incineration only: 0 kWh; CPC 17100: Electrical energy; By-product classification allocatable product; pedigree (1,1,1,1,1)
  Net electricity generated from this waste and used in internal MSWI plant energy redistribution.
  Uncertainty: uncertainty is calculated from uncertainties in waste composition and uncertainties in energy efficiency and the uncertainty in internal energy demand
  production volume 2.41783e8 kWh
  property exergy 3.6 MJ; name E_el_prod_MSWI_exergy
    This exergy property is based on the exergy content of the product.
  property true value relation 3.6; name E_el_prod_MSWI_true_value_relation
    property to calculate "true value" from
  property price 0.1 EUR2005; name E_el_prod_MSWI_price_EUR2005
    Estimated to be the same price as in case of electricity, medium voltage.
  property true value 0.000130767
    allocation property applied in "true value" allocation // value calculated from true value relation
- heat, for reuse in municipal waste incineration only: 0 MJ; CPC 17300: Steam and hot water; By-product classification allocatable product; pedigree (1,1,1,1,1)
  Net useful heat generated from this waste and used in internal MSWI plant energy redistribution.
  Uncertainty: uncertainty is calculated from uncertainties in waste composition and uncertainties in energy efficiency and the uncertainty in internal energy demand
  production volume 1.72094e9 MJ
  property true value relation 0.1842; name E_th_prod_MSWI_true_value_relation
    property to calculate "true value" from
  property exergy 0.1842 MJ; name E_th_prod_MSWI_exergy
    This exergy property is based on the exergy content of the product.
  property price 0.0106 EUR2005; name E_th_prod_MSWI_price_EUR2005
    Average European district heat price from Ecoheatcool and Euroheat 2005-2006, Ecoheat Work package 1: The European heat market. Final report. 10.6 EUR/GJ i s the price of district heat. http://www.solarthermalworld.org/files/Ecoheatcool%20WP1%20Web.pdf?download
  property true value 4.82884e-5
    (same comment as for electricity, for reuse in municipal waste incineration only)
- zinc concentrate: 0 kg; CPC 14290: Other non-ferrous metal ores and concentrates (other than uranium or thorium ores and concentrates); By-product classification allocatable product
  Calculated value from the knowledge of the properties of both products.
  production volume 30267.7 kg
  property price 0.38 EUR2005; name ByP_price_EUR2005
    Temporary price data. Calculated as 90% of purchasers price based on: Zinc content in concentrate 53%. Concentrate price per kg Zn 86.5% of refined Zn price (13.5% treatment charges according to CHR Metals Limited 2005: Dynamic cost curves. http://www.minecost.com/dynamic.pdf). 2004 zinc price from USGS (2007) Mineral commodity summaries 2007. <http://minerals.usgs.gov/minerals/pubs/mcs/2007/mcs2007.pdf> [Accessed 25 May 2010]
  property zinc content 0.53; name zinc_C_zinc_concentrate
    Zinc content on a dry matter basis. Value taken from teh "zinc mine operation" /GLO dataset.
  property dry mass 1 kg; name DM_zinc_concentrate
  property carbon content 0
    carbon content on a dry matter basis (reserved; not for manual entry)
  property true value 1.31448e-9
    allocation property applied in "true value" allocation // value calculated from revenue
  properties: wet mass 1 kg, water content 0, carbon content, non-fossil 0, carbon content, fossil 0, water in wet mass 0 kg, carbon allocation 0 kg
- iron scrap, sorted, pressed: 0 kg; By-product classification Recyclable; CPC 39310: Slag, dross, scalings and other waste from the manufacture of iron or steel; pedigree (1,1,1,1,1)
  metallic iron scrap removed from ash reamains and recycled.
  Uncertainty: uncertainty is calculated from uncertainties in waste composition and transfer coefficients to soild residues
  production volume 1.08449e6 kg
  property price 0.175 EUR2005
    Temporary price data. Calculated as 90% of purchasers price based on: 2005 import and export prices (total trades (USD) divided by total weight (kg) in biggest economies of the world: EU27, USA, Brasil, China, India, Japan and Russia) from UN Commodity Trade Statistics Database (http://data.un.org/Explorer.aspxDatabase [Accessed 2011.06.20]). Commodity: Waste or scrap, of cast iron
  property carbon content 0
    carbon content on a dry matter basis (reserved; not for manual entry)
  property true value 2.32292e-6
    allocation property applied in "true value" allocation // value calculated from revenue
  properties: carbon content, non-fossil 0, wet mass 1 kg, dry mass 1 kg, water content 0, carbon content, fossil 0, water in wet mass 0 kg, carbon allocation 0 kg
- copper: 0 kg; source Rentz O. 1999; By-product classification allocatable product; CPC 41413: Refined copper and copper alloys, unwrought; master alloys of copper
  Literature value. Copper uses: Before end-use copper is manufactured into semi fabricated products, such as shapes and ingots (known as 'semis'). These manufacturing processes are subdivided into hot working, cold working and, if necessary, process annealing. Few of the semis are ready for use as such. They more typically travel to first-stage manufacturers, who make metal rods, wire, and casting, and then to component manufacturers who produce such things as motors, valves, and insulated cables The components in turn are incorporated by final-stage manufacturers into a variety of finished products - automobiles, commercial buildings, residential housing, and so forth. These uses account for about 79% of the world-wide consumption of copper.
  production volume 34945.9 kg
  property price 5.52 EUR2005
    Literature value (http://www.economist.com/news/business/21576714-mining-industry-has-enriched-chile-its-future-precarious-copper-solution). Average price between 20015 and 2013.
  property carbon content 0
    carbon content on a dry matter basis (reserved; not for manual entry)
  property true value 2.33224e-6
    allocation property applied in "true value" allocation // value calculated from revenue
  properties: dry mass 1 kg, water in wet mass 0 kg, wet mass 1 kg, carbon content, non-fossil 0, water content 0, carbon content, fossil 0, carbon allocation 0 kg
- iron scrap, unsorted: 0 kg; source European Aluminium Association 2008; CPC 39310: Slag, dross, scalings and other waste from the manufacture of iron or steel; By-product classification Recyclable; pedigree (1,1,1,1,1)
  production volume 28.6912 kg
  property price 0.149 EUR2005; name ironScrapAmount_price_EUR2005
    Temporary price data. Calculated as 90% of purchasers price based on: estimated at 85% of sorted scrap
  property carbon content 0
    carbon content on a dry matter basis (reserved; not for manual entry)
  property true value 5.6269e-11
    allocation property applied in "true value" allocation // value calculated from revenue
  properties: water in wet mass 0 kg, water content 0, carbon content, fossil 0, carbon content, non-fossil 0, dry mass 1 kg, wet mass 1 kg, carbon allocation 0 kg
- aluminium oxide, non-metallurgical: 0 kg; source European Aluminium Association 2008; CPC 41432: Alumina (aluminium oxide), except artificial corundum; By-product classification allocatable product; CAS 1344-28-1; pedigree (1,1,1,1,1)
  production volume 1805.43 kg
  property carbon content, non-fossil 0; name C_content_non_fossil
  property price 0.28 EUR2005; name Al2O3Amount_price_EUR2005
    From UN trade database. http://data.un.org/ Import data from the largest economies of the world are used (Brazil, India, USA, China, Japan and EU-27).
  property dry mass 1 kg; name DM
  property water content 0; name water_content
  property wet mass 1 kg; name WM
  property water in wet mass 0 kg; name WWM
  property carbon content, fossil 0; name C_content_fossil
  property carbon content 0
    carbon content on a dry matter basis (reserved; not for manual entry)
  property true value 6.65384e-9
    allocation property applied in "true value" allocation // value calculated from revenue
  properties: carbon allocation 0 kg
- aluminium, cast alloy: 0 kg; source European Aluminium Association 2008; By-product classification allocatable product; CPC 41431: Unwrought aluminium; pedigree (1,1,1,1,1)
  EcoSpold01Location=RER
  production volume 16876.8 kg
  property price 1.3 EUR2005; name castAlloyAmount_price_EUR2005
    Temporary price data. Calculated as 90% of purchasers price based on: Source: London Metal Exchange, Aluminium alloy price for 2005
  property carbon content 0
    carbon content on a dry matter basis (reserved; not for manual entry)
  property true value 2.88779e-7
    allocation property applied in "true value" allocation // value calculated from revenue
  properties: water in wet mass 0 kg, carbon content, non-fossil 0, water content 0, dry mass 1 kg, carbon content, fossil 0, wet mass 1 kg, carbon allocation 0 kg
- aluminium, wrought alloy: 0 kg; source European Aluminium Association 2008; By-product classification allocatable product; CPC 4153: Semi-finished products of aluminium or aluminium alloys; pedigree (1,1,1,1,1)
  production volume 7388.33 kg
  property price 1.44 EUR2005; name secondaryAluminiumOutput_price_EUR2005
    Estimated based on literature values and expert judgement. Aluminium ccast alloys are about 90% of the price of aluminium wrought alloys.
  property carbon content 0
    carbon content on a dry matter basis (reserved; not for manual entry)
  property true value 1.40037e-7
    allocation property applied in "true value" allocation // value calculated from revenue
  properties: wet mass 1 kg, water content 0, carbon content, fossil 0, water in wet mass 0 kg, carbon content, non-fossil 0, dry mass 1 kg, carbon allocation 0 kg

## Inputs from technosphere
- hydrogen peroxide, without water, in 50% solution state: 0 kg; pedigree (1,1,1,1,1)
  properties: wet mass 1 kg, dry mass 1 kg
- steam, in chemical industry: 0 kg; pedigree (1,1,1,1,1)
  properties: dry mass 1 kg, wet mass 1 kg
- ethoxylated alcohol (AE7): 0 kg; pedigree (1,1,1,1,1)
  properties: dry mass 1 kg, carbon content, fossil 0.321663, carbon content, non-fossil 0.321663, wet mass 1 kg
- sodium sulfate, anhydrite: 0 kg; pedigree (1,1,1,1,1)
  properties: wet mass 1 kg, dry mass 1 kg
- chemical, inorganic: 0.0157214 kg; lognormal variance with pedigree 0.0421, pedigree (2,3,2,3,4)
  Proxy for dyes and pigments.
  properties: dry mass 1 kg, wet mass 1 kg, carbon content, fossil 0.003
  note on carbon content, fossil: This dataset is an unweighted average of 20 inorganic substances (listed in Tab 88.1, ecoinvent v2.2 report 8, part II), being part of the top100 chemicals included in this database. The C-content has also been calculated as an unweighted average of the C content of the substances composing this dataset.
- acetic acid, without water, in 98% solution state: 0.0338762 kg; lognormal variance with pedigree 0.0021, pedigree (2,3,2,3,1)
  properties: dry mass 1 kg, wet mass 1 kg, carbon content, fossil 0.400016
- sodium hydroxide, without water, in 50% solution state: 0.613469 kg; lognormal variance with pedigree 0.0021, pedigree (2,3,2,3,1)
  properties: dry mass 1 kg, wet mass 1 kg
- soda ash, light, crystalline, heptahydrate: 0.00781835 kg; lognormal variance with pedigree 0.0021, pedigree (2,3,2,3,1)
  Sodium carbonate
  properties: dry mass 1 kg, wet mass 1 kg, carbon content, fossil 0.0517241
- chemical, organic: 0.0244229 kg; lognormal variance with pedigree 0.0021, pedigree (2,3,2,3,1)
  properties: dry mass 1 kg, carbon content, fossil 0.628, wet mass 1 kg
  note on carbon content, fossil: This dataset is an unweighted average of 20 organic substances (listed in Tab 88.1, ecoinvent v2.2 report 8, part II), being part of the top100 chemicals included in this database. The C-content has also been calculated as an unweighted average of the C content of the substances composing this dataset.
- wastewater, unpolluted: 0 m3; name ww; pedigree (1,1,1,1,1)
  Emissions in wastewater are taken into account separately.
  production volume 0 m3
    Calculated from production volume of reference product using the relative outputs.
  property price 0 EUR2005; name ww_price_EUR2005
  properties: water content 2962.17, carbon content, non-fossil 0.00178991, wet mass 1000 kg, dry mass 0.337476 kg, carbon content, fossil 0.00178991
  note on carbon content, fossil: Assumed to be like in tap water. Bicarbonate content is 2.93 mol/m3. CO2 content is 0.1 mol/m3 (ecoinvent v2.2 report 8, Tab 93.1).
- sodium chlorate, powder: 0 kg; pedigree (1,1,1,1,1)
  properties: dry mass 1 kg, wet mass 1 kg
- heat, district or industrial, other than natural gas: 4.53043 MJ; lognormal variance with pedigree 0.0021, pedigree (2,3,2,3,1)
  properties: corresponding fuel use, propane, furnace >100kW 1.05263 MJ
  note on corresponding fuel use, propane, furnace >100kW: Lower heating value of the fuel input related to the heat/electricity output, taken directly from ecoinvent v3.0 dataset "heat production, natural gas, at industrial furnace >100kW, GLO 2000".
- waste yarn and waste textile: -0.0391644 kg; lognormal variance with pedigree 0.0021, pedigree (2,3,2,3,1)
  production volume 2.74245e9 kg; = Ref('5f917c23-9036-4248-be50-9ee6a7a6b500', 'ProductionVolume') * ((Ref('a31e6ce7-054d-4c2b-90fe-559386809b07')*-1) / Ref('5f917c23-9036-4248-be50-9ee6a7a6b500'))
    Calculated from production volume of reference product using the relative outputs.
  properties: hydrogen content 0.06215, oxygen content 0.4933, dry mass 0.97917 kg, carbon content, non-fossil 0.44455, water content 0.0212731, wet mass 1 kg
- tap water: 144.251 kg; name water; lognormal variance with pedigree 0.0021, pedigree (2,3,2,3,1)
  properties: carbon content, fossil 0.00178991, wet mass 1 kg, water content 2962.17, dry mass 0.000337476 kg
  note on carbon content, fossil: Bicarbonate content is 2.93 mol/m3. CO2 content is 0.1 mol/m3 (ecoinvent v2.2 report 8, Tab 93.1).
- sodium dithionite, anhydrous: 0 kg; pedigree (1,1,1,1,1)
  properties: wet mass 1 kg, dry mass 1 kg
- electricity, low voltage: 0.0992861 kWh; lognormal variance with pedigree 0.0021, pedigree (2,3,2,3,1)
- sodium hydrosulfide: 0.00224023 kg; lognormal variance with pedigree 0.0021, pedigree (2,3,2,3,1)
  properties: dry mass 1 kg, wet mass 1 kg
- municipal solid waste: 0 kg; pedigree (1,1,1,1,1)
  production volume 0 kg
    Calculated from production volume of reference product using the relative outputs.
  properties: carbon content, fossil 0.171549, dry mass 0.771 kg, carbon content, non-fossil 0.261655, wet mass 1 kg, water content 0.297017
  note on carbon content, fossil: MSW composition in tab 4.1, ecoinvent v2.2 report 13_I. C content referred to 1 kg DM
- hydrogen peroxide, without water, in 50% solution state: 0.00630339, 0.029923 kg (2 entries); lognormal variance with pedigree 0.0021, pedigree (2,3,2,3,1)
- steam, in chemical industry: 0.465062, 2.63771 kg (2 entries); lognormal variance with pedigree 0.0021, pedigree (2,3,2,3,1)
- ethoxylated alcohol (AE7): 0.00335343, 0.0159191 kg (2 entries); lognormal variance with pedigree 0.0021, pedigree (2,3,2,3,1)
- sodium sulfate, anhydrite: 0.000627256, 0.00328927 kg (2 entries); lognormal variance with pedigree 0.0021, pedigree (2,3,2,3,1)
- wastewater, unpolluted: -0.000804544, -0.0997635 m3 (2 entries); lognormal variance with pedigree 0.0021, pedigree (2,3,2,3,1)
  Emissions in wastewater are taken into account separately.
  production volume 7.04217e9 m3
- sodium chlorate, powder: 0.0114803, 0.118104 kg (2 entries); lognormal variance with pedigree 0.0021, pedigree (2,3,2,3,1)
- sodium dithionite, anhydrous: 7.44465e-6, 3.53407e-5 kg (2 entries); lognormal variance with pedigree 0.0021, pedigree (2,3,2,3,1)
- municipal solid waste: -0.000358064, -2.19467e-6, -1.53575e-6, -6.09484e-6, -0.00431051 kg (5 entries); lognormal variance with pedigree 0.0021, pedigree (2,3,2,3,1)
  production volume 3.276e8 kg

## Emissions to nature
- Chromium VI [water, ground-]: 2.00748e-6 kg; lognormal variance with pedigree 0.0021, pedigree (2,3,2,3,1)
- Selenium [water, ground-]: 5.49616e-6 kg; lognormal variance with pedigree 0.2106, pedigree (5,5,5,5,5)
- Chlorine [water, ground-]: 7.50512e-6 kg; lognormal variance with pedigree 0.0021, pedigree (2,3,2,3,1)
- Phosphorus [water, ground-]: 5.23952e-5 kg; lognormal variance with pedigree 0.0021, pedigree (2,3,2,3,1)
- Arsenic, ion [water, ground-]: 0.000163738 kg; lognormal variance with pedigree 0.0021, pedigree (2,3,2,3,1)
- Oils, unspecified [soil, unspecified]: 0.000236188 kg; lognormal variance with pedigree 0.0021, pedigree (2,3,2,3,1)
- BOD5, Biological Oxygen Demand [water, ground-]: 0.000912212 kg; lognormal variance with pedigree 0.0021, pedigree (2,3,2,3,1)
- Nitrogen [water, ground-]: 0.000719614 kg; lognormal variance with pedigree 0.0021, pedigree (2,3,2,3,1)
- Cadmium, ion [water, ground-]: 3.59915e-6 kg; lognormal variance with pedigree 0.0021, pedigree (2,3,2,3,1)
- Phenol [water, ground-]: 3.75221e-6 kg; lognormal variance with pedigree 0.0021, pedigree (2,3,2,3,1)
- AOX, Adsorbable Organic Halogen as Cl [water, ground-]: 0.00015236 kg; lognormal variance with pedigree 0.0021, pedigree (2,3,2,3,1)
- Manganese [water, ground-]: 4.50224e-6 kg; lognormal variance with pedigree 0.0021, pedigree (2,3,2,3,1)
- Aniline [water, ground-]: 9.48847e-6 kg; lognormal variance with pedigree 0.0021, pedigree (2,3,2,3,1)
- Nitrate [water, ground-]: 1.76942e-5 kg; lognormal variance with pedigree 0.0021, pedigree (2,3,2,3,1)
- Antimony [water, ground-]: 2.20924e-7 kg; lognormal variance with pedigree 0.0021, pedigree (2,3,2,3,1)
- Nickel, ion [water, ground-]: 5.49836e-6 kg; lognormal variance with pedigree 0.0021, pedigree (2,3,2,3,1)
- Water [air, unspecified]: 0.0436826 m3; = water/1000-(ww*-1); lognormal variance with pedigree 0.0021, pedigree (2,3,2,3,1)
  Calculated as water input minus wastewater. Based on industry data.
- Mercury [water, ground-]: 2.17774e-7 kg; lognormal variance with pedigree 0.0021, pedigree (2,3,2,3,1)
- Ammonium, ion [water, ground-]: 5.46528e-5 kg; lognormal variance with pedigree 0.0021, pedigree (2,3,2,3,1)
- Lead [water, ground-]: 1.84975e-7 kg; lognormal variance with pedigree 0.0021, pedigree (2,3,2,3,1)
- Iron, ion [water, unspecified]: 7.261e-6 kg; lognormal variance with pedigree 0.0021, pedigree (2,3,2,3,1)
- Fluoride [water, ground-]: 3.69908e-6 kg; lognormal variance with pedigree 0.0021, pedigree (2,3,2,3,1)
- DOC, Dissolved Organic Carbon [water, unspecified]: 0.000215864 kg; lognormal variance with pedigree 0.0021, pedigree (2,3,2,3,1)
- Dissolved solids [water, ground-]: 8.52282e-5 kg; lognormal variance with pedigree 0.0021, pedigree (2,3,2,3,1)
- TOC, Total Organic Carbon [water, ground-]: 0.000215864 kg; lognormal variance with pedigree 0.0021, pedigree (2,3,2,3,1)
- Copper, ion [water, ground-]: 8.52128e-6 kg; lognormal variance with pedigree 0.0021, pedigree (2,3,2,3,1)
- Vanadium, ion [water, ground-]: 3.35917e-6 kg; lognormal variance with pedigree 0.0021, pedigree (2,3,2,3,1)
- Cyanide [water, ground-]: 3.5015e-6 kg; lognormal variance with pedigree 0.0021, pedigree (2,3,2,3,1)
- Zinc, ion [water, ground-]: 1.27536e-5 kg; lognormal variance with pedigree 0.0021, pedigree (2,3,2,3,1)
- Chromium, ion [water, ground-]: 6.37131e-6 kg; lognormal variance with pedigree 0.0021, pedigree (2,3,2,3,1)
- Suspended solids, unspecified [water, ground-]: 0.00140081 kg; lognormal variance with pedigree 0.0021, pedigree (2,3,2,3,1)
- COD, Chemical Oxygen Demand [water, ground-]: 0.00218974 kg; lognormal variance with pedigree 0.0021, pedigree (2,3,2,3,1)
- Sulfide [water, ground-]: 1.50103e-5 kg; lognormal variance with pedigree 0.2106, pedigree (5,5,5,5,5)

## Extrapolations
Extrapolated from data from mostly vertically integrated mills.
