# maintenance, solid oxide fuel cell 125kW electrical, future

Dataset: EcoSpold 2, unit process
Geography: CH
Time period: 2000-01-01 to 2019-12-31
Technology level: current
Classification: EcoSpold01Categories: natural gas/cogeneration
Classification: ISIC rev.4 ecoinvent: 3314:Repair of electrical equipment
Synonyms: solid oxide fuel cell; oxidkeramische Hochtemperaturbrennstoffzelle; Festkeramik Brennstoffzelle; Festoxid Brennstoffzelle
Tags: ConvertedDataset
Scenario: Business-as-Usual
System model: Allocation at the point of substitution
Generated by: Alex Primas
Published in: Primas A. 2007
Database: ecoinvent
isCopyrightProtected: true
accessRestrictedTo: 1

## General comment
The module reflects the maintenance for a solid oxide fuel cell (SOFC) system with 125 kW electrical output. Inventory based on information from literature for future production based on manufacturer data. Maintenance is carried out every 8'000 h. Stack lifetime is 48'000 h. Desulpurising catalyst replacement every 8'000 h.
[This dataset was already contained in the ecoinvent database version 2. It was not individually updated during the transfer to ecoinvent version 3. Life Cycle Impact Assessment results may still have changed, as they are affected by changes in the supply chain, i.e. in other datasets. This dataset was generated following the ecoinvent quality guidelines for version 2. It may have been subject to central changes described in the ecoinvent version 3 change report (http://www.ecoinvent.org/database/ecoinvent-version-3/reports-of-changes/), and the results of the central updates were reviewed extensively. The changes added e.g. consistent water flows and other information throughout the database. The documentation of this dataset can be found in the ecoinvent reports of version 2, which are still available via the ecoinvent website. The change report linked above covers all central changes that were made during the conversion process.]

## Included activities end
The module includes an estimation for materials and transport used for the maintenance of the SOFC fuel cell unit.

## Geography
Process applicable in central European conditions.

## Technology
Solid oxide fuel cell (SOFC) with unpressurised tubular stack design for central cogeneration use. Performance, stack lifetime and catalyst use according to expected future values for a serial product. Operation with connection to low pressure gas network. Electrical efficiency 47%, total efficiency 80%.

## Reference product
- maintenance, solid oxide fuel cell, 125kW electrical, future: 1 unit; CPC 87152: Maintenance and repair services of electrical machinery and apparatus n.e.c.; By-product classification allocatable product
  EcoSpold01Location=CH
  production volume 0.0336675 unit
    This is a placeholder value that does not reflect real-world production volumes. This dataset does not currently require a real-world production volume to work in the database framework, and no actual data were collected yet. This has no negative effect on the results of the ecoinvent database. The placeholder value of this activity was scaled according to the nominal GDP of 2005 (source: United Nations, http://data.un.org/Glossary.aspx?q=GDP+%28current+US%24%29, accessed 20130726) to reflect an appropriate share of the global production volume, which is also a placeholder value.
  property price 1315.07 EUR2005
    Calculated based on inputs: The price of the product has been calculated as a sum of the values of the material and energy inputs for this product. This value is therefore a rough estimation. It may underestimate the real price since there are additional expenses when producing any product. These expences can include for example labour costs, treatment of waste materials and profit for the producer. Please consider carefully whether this level of data quality is acceptable for your application.

## Inputs from technosphere
- reinforcing steel: 128 kg; lognormal variance with pedigree 0.068, pedigree (4,5,5,5,1)
  Estimate
  EcoSpold01Location=RER
  Uncertainty: estimate
  properties: carbon content, fossil 0.004, dry mass 1 kg, wet mass 1 kg
- zinc: 1.25 kg; lognormal variance with pedigree 0.068, pedigree (4,5,5,5,1)
  Estimate based on expected lifetime of reformer catalyst
  EcoSpold01Location=RER
  Uncertainty: estimate based on expected lifetime of reformer catalyst
  properties: dry mass 1 kg, wet mass 1 kg
- fuel cell, stack solid oxide, 125kW electrical, future: 0.167 unit; lognormal variance with pedigree 0.368, pedigree (4,5,5,5,1)
  EcoSpold01Location=CH
  Estimate based on expected stack lifetime in future
  Uncertainty: estimate based on expected stack lifetime in future
- steel, chromium steel 18/8, hot rolled: 32 kg; lognormal variance with pedigree 0.068, pedigree (4,5,5,5,1)
  EcoSpold01Location=RER
  Estimate
  Uncertainty: estimate
  properties: dry mass 1 kg, wet mass 1 kg, carbon content, fossil 0.0008
  note on carbon content, fossil: Stainless steel model is the grade 304 steel (18/8 stainless, 18% chromium 8% nickel; max. 0.08% C)
- transport, passenger car: 200 km; lognormal variance with pedigree 0.188, pedigree (4,5,5,5,1)
  Estimated
  EcoSpold01Location=CH
  Uncertainty: estimated

## Sampling procedure
Literature data and manufacturer information

## Extrapolations
This dataset has been extrapolated from year 2005 to the year of the calculation (2019). The uncertainty has been adjusted accordingly.

## Review by Rolf Frischknecht 2007-08-13
passed
none
