# harvester production

Dataset: EcoSpold 2, unit process
Geography: RoW
Time period: 1995-01-01 to 2019-12-31
Technology level: current
Classification: EcoSpold01Categories: agricultural means of production/machinery
Classification: ISIC rev.4 ecoinvent: 2821:Manufacture of agricultural and forestry machinery
Tags: ConvertedDataset
Scenario: Business-as-Usual
System model: Allocation at the point of substitution
Generated by: Albert Zimmermann
Published in: Nemecek, T. 2007
Database: ecoinvent
isCopyrightProtected: true
accessRestrictedTo: 1

## General comment
Representatives of this class are for example: combine-harvester. Calculations are based on a 10000 kg harvesters, with a useful life of 1300 hours and a repair factor of 0.55. For exact results, module should only be used if lifetime and repair factor of the balanced machinery are within a narrow range of the values the module is based on. The functional unit is 1kg harvester during its lifetime.
[This dataset was already contained in the ecoinvent database version 2. It was not individually updated during the transfer to ecoinvent version 3. Life Cycle Impact Assessment results may still have changed, as they are affected by changes in the supply chain, i.e. in other datasets. This dataset was generated following the ecoinvent quality guidelines for version 2. It may have been subject to central changes described in the ecoinvent version 3 change report (http://www.ecoinvent.org/database/ecoinvent-version-3/reports-of-changes/), and the results of the central updates were reviewed extensively. The changes added e.g. consistent water flows and other information throughout the database. The documentation of this dataset can be found in the ecoinvent reports of version 2, which are still available via the ecoinvent website. The change report linked above covers all central changes that were made during the conversion process.]

## Included activities end
The inventory takes into account the use of resources and the amount of emissions during the production, the maintenance and repair and the disposal of agricultural harvesters. Not taken into account were the impacts caused by fuel consumption during operation-time of the machinery, and the amount of emission from the tyre abrasion during this time. No data was available about buildings needed for manufacture and maintenance of the machinery. The routes needed for transport from manufacturer place to the farm and from here to disposal place of the waste, are balanced in the utilised transport modules.

## Geography
The inventories apply to the production in Western Europe and transportation to Switzerland.

## Technology
Values are based and adapted on a different technology (lorries-manufacture).

## Time period
Considered references range from start- to end-date

## Reference product
- harvester: 1 kg; CPC 441: Agricultural or forestry machinery and parts thereof; By-product classification allocatable product
  EcoSpold01Location=CH
  production volume 2.67582e9 kg
    Calculated from area with 'combine harvesting' at 6.3 kg harvester per hectar
  property true value 6.54
    allocation property applied in "true value" allocation // value calculated from revenue
  properties: price 6.54 EUR2005

## By-products
- heat, for reuse in municipal waste incineration only: 0 MJ; CPC 17300: Steam and hot water; By-product classification allocatable product; pedigree (1,1,1,1,1)
  Net electricity generated from this waste and used in internal MSWI plant energy redistribution.
  Uncertainty: uncertainty is calculated from uncertainties in waste composition and uncertainties in energy efficiency and the uncertainty in internal energy demand
  production volume 1.17961e8 MJ
  property exergy 0.1842 MJ; name E_th_prod_MSWI_exergy
    This exergy property is based on the exergy content of the product.
  property price 0.0106 EUR2005; name E_th_prod_MSWI_price_EUR2005
    Average European district heat price from Ecoheatcool and Euroheat 2005-2006, Ecoheat Work package 1: The European heat market. Final report. 10.6 EUR/GJ i s the price of district heat. http://www.solarthermalworld.org/files/Ecoheatcool%20WP1%20Web.pdf?download
  property true value relation 0.1842; name E_th_prod_MSWI_true_value_relation
    property to calculate "true value" from
  property true value 0.000216006
    allocation property applied in "true value" allocation // value calculated from true value relation
- electricity, for reuse in municipal waste incineration only: 0 kWh; CPC 17100: Electrical energy; By-product classification allocatable product; pedigree (1,1,1,1,1)
  (same comment as for heat, for reuse in municipal waste incineration only)
  production volume 1.67756e7 kWh
  property price 0.1 EUR2005; name E_el_prod_MSWI_price_EUR2005
    Estimated to be the same price as in case of electricity, medium voltage.
  property exergy 3.6 MJ; name E_el_prod_MSWI_exergy
    This exergy property is based on the exergy content of the product.
  property true value relation 3.6; name E_el_prod_MSWI_true_value_relation
    property to calculate "true value" from
  property true value 0.000600362
    (same comment as for heat, for reuse in municipal waste incineration only)

## Inputs from technosphere
- waste plastic, mixture: 0 kg; pedigree (1,1,1,1,1)
  EcoSpold01Location=CH
  production volume 0 kg
    Calculated from the production volume of harvester in proportion to the respective output amounts.
  properties: dry mass 0.847 kg, wet mass 1 kg, water content 0.180638, carbon content, fossil 0.747344
  note on carbon content, fossil: C content in 1 kg DM was calculated using data in Tab A.2, ecoinvent v2.2 report 13_I
- waste graphical paper: 0 kg; pedigree (1,1,1,1,1)
  EcoSpold01Location=CH
  production volume 0 kg
    (same comment as for waste plastic, mixture)
  properties: water content 0.126126, wet mass 1 kg, carbon content, non-fossil 0.454955, dry mass 0.888 kg
- steel, chromium steel 18/8, hot rolled: 0.039995 kg; lognormal variance with pedigree 0.0601, pedigree (4,2,5,5,1)
  EcoSpold01Location=RER
  properties: carbon content, fossil 0.0008, dry mass 1 kg, wet mass 1 kg
  note on carbon content, fossil: Stainless steel model is the grade 304 steel (18/8 stainless, 18% chromium 8% nickel; max. 0.08% C)
- heat, district or industrial, other than natural gas: 0 MJ; pedigree (1,1,1,1,1)
  EcoSpold01Location=RER
- synthetic rubber: 0.105987 kg; lognormal variance with pedigree 0.0601, pedigree (4,2,5,5,1)
  EcoSpold01Location=RER
  properties: wet mass 1 kg, carbon content, fossil 0.871949, dry mass 1 kg
  note on carbon content, fossil: EPDM (Ethylene-propene-diene terpolymer) rubber is a terpolymer of ethylene, propene, and a diene with the residual unsaturated portion of the diene in the side chain (ecoinvent v2.2 report 7-part XX & Ullmann). Chemical formula (deduced from Evidences of Solvent-Induced Miscibility in Polychloroprene-co-Ethylene-Propene Diene Terpolymer Blends, Dubey et al., Journal of Applied Polymer Science, 2009, 111:1884–1891): C20H35
- aluminium, wrought alloy: 0.040115 kg; lognormal variance with pedigree 0.0601, pedigree (4,2,5,5,1)
  EcoSpold01Location=RER
  properties: wet mass 1 kg, dry mass 1 kg
- steel, unalloyed: 0.924885 kg; lognormal variance with pedigree 0.0601, pedigree (4,2,5,5,1)
  EcoSpold01Location=RER
  properties: dry mass 1 kg, carbon content, fossil 0.0025, wet mass 1 kg
  note on carbon content, fossil: Unalloyed steels or carbon steels are those in which the level of an individual element in no case reaches or exceeds the limiting concentration given in Tab. 3.1 ecoinvent v2.2 report 10_partII. Assumed to have a C content of 0.25%
- zinc: 0.0129984 kg; lognormal variance with pedigree 0.0601, pedigree (4,2,5,5,1)
  EcoSpold01Location=RER
  properties: wet mass 1 kg, dry mass 1 kg
- aluminium, cast alloy: 0.0188776 kg; lognormal variance with pedigree 0.0601, pedigree (4,2,5,5,1)
  EcoSpold01Location=RER
  properties: wet mass 1 kg, dry mass 1 kg
- polypropylene, granulate: 0.039995 kg; lognormal variance with pedigree 0.0601, pedigree (4,2,5,5,1)
  EcoSpold01Location=RER
  properties: wet mass 1 kg, dry mass 1 kg, carbon content, fossil 0.857143
  note on carbon content, fossil: Polypropylene is formed by the polymerisation of propylene, C3H6 (ecoinvent v2.2 report 11_II)
- waste mineral oil: 0 kg; pedigree (1,1,1,1,1)
  EcoSpold01Location=CH
  production volume 0 kg
    (same comment as for waste plastic, mixture)
  properties: dry mass 0.9 kg, carbon content, fossil 0.864444, water content 0.111111, wet mass 1 kg
  note on carbon content, fossil: Tab A.6, ecoinvent v2.2 report 13_I. C content has been calculated after data in the tables, and then referred to 1 kg DM
- waste glass sheet: 0 kg; pedigree (1,1,1,1,1)
  EcoSpold01Location=CH
  production volume 0 kg
    (same comment as for waste plastic, mixture)
  properties: dry mass 1 kg, wet mass 1 kg
- copper: 0.0259968 kg; lognormal variance with pedigree 0.0601, pedigree (4,2,5,5,1)
  EcoSpold01Location=RER
  properties: dry mass 1 kg, wet mass 1 kg
- lubricating oil: 0.0129984 kg; lognormal variance with pedigree 0.0601, pedigree (4,2,5,5,1)
  EcoSpold01Location=RER
  properties: wet mass 1 kg, carbon content, fossil 0.75, dry mass 1 kg
  note on carbon content, fossil: Lubricating oil is produced from diesel. C-content/dry mass of fats and oils considered 75%, from: ecoinvent v2.2 report, n 15a, pg 40
- steel, low-alloyed, hot rolled: 0.0929884 kg; lognormal variance with pedigree 0.0601, pedigree (4,2,5,5,1)
  EcoSpold01Location=RER
  properties: wet mass 1 kg, dry mass 1 kg, carbon content, fossil 0.005
  note on carbon content, fossil: Low alloyed steel composition given in Tab. 3.2 ecoinvent v2.2 report 10_partII. Steel assumed to have a C content of 0.5%
- heat, central or small-scale, other than natural gas: 0 MJ; pedigree (1,1,1,1,1)
  EcoSpold01Location=CH
- alkyd paint, white, without solvent, in 60% solution state: 0.00699913 kg; lognormal variance with pedigree 0.0601, pedigree (4,2,5,5,1)
  EcoSpold01Location=RER
  properties: dry mass 1 kg, wet mass 1 kg, carbon content, fossil 0.140367, carbon content, non-fossil 0.199629
  note on carbon content, fossil: C content was calculated as an addition of C content in the raw materials.
- electricity, medium voltage: 0 kWh; pedigree (1,1,1,1,1)
  EcoSpold01Location=CH
- flat glass, uncoated: 0.0129984 kg; lognormal variance with pedigree 0.0601, pedigree (4,2,5,5,1)
  EcoSpold01Location=RER
  properties: wet mass 1 kg, dry mass 1 kg
- lead: 0.0179978 kg; lognormal variance with pedigree 0.0601, pedigree (4,2,5,5,1)
  EcoSpold01Location=RER
  properties: wet mass 1 kg, dry mass 1 kg
- paper, woodfree, coated: 0.000999875 kg; lognormal variance with pedigree 0.0601, pedigree (4,2,5,5,1)
  EcoSpold01Location=RER
  properties: water content 0.0582011, carbon content, fossil 0.0590617, dry mass 0.945 kg, carbon content, non-fossil 0.22775, wet mass 1 kg
  note on carbon content, fossil: Fossil C content was calculated after fossil C contents of chemicals used in the production of the paper (in Tab 8.72 & 8.73 ecoinvent v2.2 report 11_III, part 8).
  note on carbon content, non-fossil: Biogenic C content was calculated after biogenic C contents of chemicals used in the production of the paper (in Tab 8.72 & 8.73 ecoinvent v2.2 report 11_III, part 8). The cellulose content in 1 kg of paper (on a wet mas basis) was estimated as (1-chemical content), C content of cellulose was considered 0.44 kgC/kg dry mass (ecoinvent v2.2 report, n 15a, pg 40)
- heat, district or industrial, natural gas: 0 MJ; pedigree (1,1,1,1,1)
  EcoSpold01Location=RER
- waste plastic, mixture: -0.00559477, -0.000373821, -2.82715e-5, -0.000154401, -6.23764e-5, -0.000146619, -0.004767, -0.0391665 kg (8 entries); lognormal variance with pedigree 0.07, pedigree (4,4,5,5,3)
  EcoSpold01Location=CH
  production volume 1.34594e8 kg
- waste graphical paper: -4.37384e-5, -6.67905e-6, -5.84022e-7, -2.41342e-5, -2.35329e-6, -4.35618e-6, -0.000105519, -0.000812511 kg (8 entries); lognormal variance with pedigree 0.07, pedigree (4,4,5,5,3)
  EcoSpold01Location=CH
  production volume 2.67582e6 kg
- heat, district or industrial, other than natural gas: 0.000293245, 0.0175016, 0.654121 MJ (3 entries); lognormal variance with pedigree 0.064, pedigree (3,4,5,5,3)
  EcoSpold01Location=RER
- waste mineral oil: -0.00326982, -0.00972856 kg (2 entries); lognormal variance with pedigree 0.07, pedigree (4,4,5,5,3)
  EcoSpold01Location=CH
  production volume 3.47856e7 kg
- waste glass sheet: -0.00267822, -0.0103202 kg (2 entries); lognormal variance with pedigree 0.07, pedigree (4,4,5,5,3)
  EcoSpold01Location=CH
  production volume 3.47856e7 kg
- heat, central or small-scale, other than natural gas: 0.110334, 7.71889 MJ (2 entries); lognormal variance with pedigree 0.064, pedigree (3,4,5,5,3)
  EcoSpold01Location=CH
- electricity, medium voltage: 0.0234992, 0.00427587, 0.0986995, 0.335919, 0.0725123, 1.05135, 0.150468, 0.492996 kWh (8 entries); lognormal variance with pedigree 0.064, pedigree (3,4,5,5,3)
  EcoSpold01Location=CH
- heat, district or industrial, natural gas: 0.0581844, 1.32577, 3.28946 MJ (3 entries); lognormal variance with pedigree 0.064, pedigree (3,4,5,5,3)
  EcoSpold01Location=RER

## Emissions to nature
- NMVOC, non-methane volatile organic compounds, unspecified origin [air, urban air close to ground]: 0.00863892 kg; lognormal variance with pedigree 0.104, pedigree (3,4,5,5,3)
- Carbon dioxide, fossil [air, non-urban air or from high stacks]: 6.99913e-6 kg; lognormal variance with pedigree 0.064, pedigree (3,4,5,5,3)

## Sampling procedure
Values given in the reference originate mainly from studies about lorry production in Europe as examined and adapted by Zimmermann (2002) and experts estimations.

## Extrapolations
Data are extrapolated, examined and adapted from lorry production in Europe. This dataset has been copied from an original dataset covering the geography CH. The uncertainty has been adjusted accordingly.

## Review by Roland Hischier 2003-08-06
Passed.
