# treatment of waste wood, untreated, sanitary landfill

Dataset: EcoSpold 2, unit process
Geography: CH
Time period: 1994-01-01 to 2019-12-31
Technology level: current
Classification: ISIC rev.4 ecoinvent: 3821:Treatment and disposal of non-hazardous waste
Classification: EcoSpold01Categories: waste management/sanitary landfill
Tags: ConvertedDataset; Treatment
Scenario: Business-as-Usual
System model: Allocation at the point of substitution
Generated by: Gabor Doka (obsolete)
Published in: Doka G. 2007
Database: ecoinvent
isCopyrightProtected: true
accessRestrictedTo: 1

## General comment
Inventoried waste contains 100% natural wood; .
waste composition (wet, in ppm): upper heating value 15.36 MJ/kg; lower heating value 13.99 MJ/kg; H2O 174080; O 372180; H 50163; C 401470; S 125.51; N 986.98; P 108.97; B 2.1107; Cl 330.95; Br n.a.; F 21.106; I n.a.; Ag n.a.; As 0.42213; Ba n.a.; Cd 0.20051; Co 0.086772; Cr 0.65782; Cu 4.1482; Hg 0.31976; Mn 53.118; Mo 0.8302; Ni 0.55581; Pb 27.868; Sb n.a.; Se n.a.; Sn n.a.; V n.a.; Zn 17.807; Be n.a.; Sc n.a.; Sr n.a.; Ti n.a.; Tl n.a.; W n.a.; Si n.a.; Fe 15.479; Ca 130.89; Al 6.3322; K 65.412; Mg 197.56; Na 14.071;
Share of carbon in waste that is biogenic 100%.
Overall degradability of waste during 100 years: 1.5%.
[This dataset was already contained in the ecoinvent database version 2. It was not individually updated during the transfer to ecoinvent version 3. Life Cycle Impact Assessment results may still have changed, as they are affected by changes in the supply chain, i.e. in other datasets. This dataset was generated following the ecoinvent quality guidelines for version 2. It may have been subject to central changes described in the ecoinvent version 3 change report (http://www.ecoinvent.org/database/ecoinvent-version-3/reports-of-changes/), and the results of the central updates were reviewed extensively. The changes added e.g. consistent water flows and other information throughout the database. The documentation of this dataset can be found in the ecoinvent reports of version 2, which are still available via the ecoinvent website. The change report linked above covers all central changes that were made during the conversion process.]

## Included activities end
Waste-specific short-term emissions to air via landfill gas incineration and landfill leachate. Burdens from treatment of short-term leachate (0-100a) in wastewater treatment plant (including WWTP sludge disposal in municipal incinerator). Long-term emissions from landfill to groundwater (after base lining failure).

## Geography
Technology encountered in Switzerland in 2000. Landfill includes base seal, leachate collection system, treatment of leachate in municipal wastewater treatment plant.

## Technology
Swiss municipal sanitary landfill for biogenic or untreated municipal waste ('reactive organic landfill'). Landfill gas and leachate collection system. Recultivation and monitoring for 150 years after closure.

## Reference product
- waste wood, untreated: -1 kg; CPC 3928: Sawdust and wood waste and scrap; By-product classification Waste
  production volume 0 kg
    estimated proportion; source: ecoinvent v2; value to be replaced by value to be calculated from the demand for this treatment activity
  property price 0 EUR2005
    Waste products are assigned a price of zero as they are assumed to require further treatment.
  property carbon content, non-fossil 0.48632
    Tab A.4, ecoinvent v2.2 report 13_I. C content has been referred to 1 kg DM,
  property carbon content 0.48632
    carbon content on a dry matter basis (reserved; not for manual entry)
  properties: water in wet mass 0.2 kg, dry mass 0.8 kg, water content 0.25, wet mass 1 kg, carbon content, fossil 0, carbon allocation 0.389056 kg

## By-products
- electricity, for reuse in municipal waste incineration only: 0 kWh; CPC 17100: Electrical energy; By-product classification allocatable product; pedigree (1,1,1,1,1)
  Net electricity generated from this waste and used in internal MSWI plant energy redistribution.
  Uncertainty: uncertainty is calculated from uncertainties in waste composition and uncertainties in energy efficiency and the uncertainty in internal energy demand
  property exergy 3.6 MJ; name E_el_prod_MSWI_exergy
  property true value relation 3.6; name E_el_prod_MSWI_true_value_relation
  property price 0.1 EUR2005; name E_el_prod_MSWI_price_EUR2005
- heat, for reuse in municipal waste incineration only: 0 MJ; CPC 17300: Steam and hot water; By-product classification allocatable product; pedigree (1,1,1,1,1)
  Net useful heat generated from this waste and used in internal MSWI plant energy redistribution.
  Uncertainty: uncertainty is calculated from uncertainties in waste composition and uncertainties in energy efficiency and the uncertainty in internal energy demand
  property true value relation 0.1842; name E_th_prod_MSWI_true_value_relation
  property exergy 0.1842 MJ; name E_th_prod_MSWI_exergy
  property price 0.0106 EUR2005; name E_th_prod_MSWI_price_EUR2005
- zinc concentrate: 0 kg; CPC 14290: Other non-ferrous metal ores and concentrates (other than uranium or thorium ores and concentrates); By-product classification allocatable product
  Calculated value from the knowledge of the properties of both products.
  property price 0.38 EUR2005; name ByP_price_EUR2005
    Temporary price data. Calculated as 90% of purchasers price based on: Zinc content in concentrate 53%. Concentrate price per kg Zn 86.5% of refined Zn price (13.5% treatment charges according to CHR Metals Limited 2005: Dynamic cost curves. http://www.minecost.com/dynamic.pdf). 2004 zinc price from USGS (2007) Mineral commodity summaries 2007. <http://minerals.usgs.gov/minerals/pubs/mcs/2007/mcs2007.pdf> [Accessed 25 May 2010]
  property zinc content 0.53; name zinc_C_zinc_concentrate
    Zinc content on a dry matter basis. Value taken from teh "zinc mine operation" /GLO dataset.
  property dry mass 1 kg; name DM_zinc_concentrate
  property carbon content 0
    carbon content on a dry matter basis (reserved; not for manual entry)
  properties: wet mass 1 kg, water content 0, carbon content, non-fossil 0, carbon content, fossil 0, water in wet mass 0 kg, carbon allocation 0 kg

## Inputs from technosphere
- iron (III) chloride, without water, in 40% solution state: 5.96e-7 kg; lognormal variance with pedigree 1.67, pedigree (1,1,5,1,1)
  burden from incineration of sludge from wastewater treatment of the short-term leachate (0-100a). uncertainty is calculated from uncertainties in waste composition and transfer coefficients in incinerator and uncertainty of waste decomposition and short-term leaching in sanitary landfill
  properties: dry mass 1 kg, wet mass 1 kg
- process-specific burdens, municipal waste incineration: 0.000103 kg; lognormal variance with pedigree 0.74, pedigree (1,1,5,1,1)
  Burden from incineration of sludge from wastewater treatment of the short-term leachate (0-100a).
  Burden from incineration of sludge from wastewater treatment of the short-term leachate (0-100a).;activityLink introduced to establish a direct link to the corresponding regional supply of this product
- slag landfill: 3.27e-15 unit; lognormal variance with pedigree 0.68, pedigree (1,1,5,1,1)
  (same comment as for iron (III) chloride, without water, in 40% solution state)
- process-specific burdens, slag landfill: 1.84e-6 kg; lognormal variance with pedigree 0.68, pedigree (1,1,5,1,1)
  burden from incineration of sludge from wastewater treatment of the short-term leachate (0-100a). uncertainty is calculated from uncertainties in waste composition and transfer coefficients in incinerator and uncertainty of waste decomposition and short-term leaching in sanitary landfill;activityLink introduced to establish a direct link to the corresponding regional supply of this product
- quicklime, milled, packed: 4.95e-10 kg; lognormal variance with pedigree 0.6, pedigree (1,1,5,1,1)
  (same comment as for iron (III) chloride, without water, in 40% solution state)
  properties: dry mass 0.99 kg, wet mass 1 kg, water content 0.010101
- sanitary landfill facility: 5.56e-10 unit; lognormal variance with pedigree 0.04, pedigree (1,1,5,1,1)
  demands per kilogram waste. uncertainty is heeded in the module
  This exchange has an activity link directly to the producing activity because the product is primarily consumed in the same geographical area where it is produced.
- electricity, for reuse in municipal waste incineration only: 1.48e-5 kWh; name E_el_prod_MSWI; lognormal variance with pedigree 1.16, pedigree (1,1,5,1,1)
  (same comment as for iron (III) chloride, without water, in 40% solution state)
- residual material landfill: 0 unit; pedigree (1,1,1,1,1)
  (same comment as for iron (III) chloride, without water, in 40% solution state)
- heat, for reuse in municipal waste incineration only: 8.61e-5 MJ; name E_th_prod_MSWI; lognormal variance with pedigree 0.74, pedigree (1,1,5,1,1)
  (same comment as for iron (III) chloride, without water, in 40% solution state)
- heat, central or small-scale, other than natural gas: 3.384e-5 MJ; lognormal variance with pedigree 0.2106, pedigree (5,5,5,5,5)
  burden from wastewater treatment of the short-term leachate (0-100a). Uncertainty calculated from unertainty of the waste composition of this waste, uncertainty in waste decomposition and short-term leaching in sanitary landfill
- waste plastic, mixture: -3.88e-5 kg; lognormal variance with pedigree 0.2106, pedigree (5,5,5,5,5)
  (same comment as for heat, central or small-scale, other than natural gas)
  production volume 0 kg
    Calculated from the production volume of waste wood, untreated, 20% water in proportion to the respective output amounts.
  properties: carbon content, fossil 0.747344, wet mass 1 kg, water content 0.180638, dry mass 0.847 kg
  note on carbon content, fossil: C content in 1 kg DM was calculated using data in Tab A.2, ecoinvent v2.2 report 13_I
- wastewater treatment facility, capacity 5E9l/year: 1.42e-11 unit; lognormal variance with pedigree 0.2106, pedigree (5,5,5,5,5)
  (same comment as for heat, central or small-scale, other than natural gas)
- waste graphical paper: -3.88e-5 kg; lognormal variance with pedigree 0.2106, pedigree (5,5,5,5,5)
  (same comment as for heat, central or small-scale, other than natural gas)
  production volume 0 kg
    (same comment as for waste plastic, mixture)
  properties: carbon content, non-fossil 0.454955, dry mass 0.888 kg, wet mass 1 kg, water content 0.126126
- chromium oxide, flakes: 3.04e-11 kg; lognormal variance with pedigree 1.11, pedigree (5,5,5,5,5)
  burden from incineration of sludge from wastewater treatment of the short-term leachate (0-100a). Proxy for vanadium pentoxide V2O5 in SCR catalyst, uncertainty calculated from uncertainty in average DeNOx input, uncertainty in the share of thermal NOx, uncertainty of nitrogen content in average municipal waste and the unertainty in nitrogen content in *this* waste and uncertainty of waste decomposition and short-term leaching in sanitary landfill
  properties: wet mass 1 kg, dry mass 1 kg
- waste cement, hydrated: -4.33e-7 kg; lognormal variance with pedigree 0.58, pedigree (1,1,5,1,1)
  (same comment as for iron (III) chloride, without water, in 40% solution state)
  production volume 0 kg
    (same comment as for waste plastic, mixture)
  properties: dry mass 1 kg, wet mass 1 kg
- iron sulfate: 4.33e-7 kg; lognormal variance with pedigree 1.8, pedigree (5,5,5,5,5)
  (same comment as for heat, central or small-scale, other than natural gas)
  properties: dry mass 1 kg, wet mass 1 kg
- chemical, inorganic: 1.45e-10 kg; lognormal variance with pedigree 1.27, pedigree (1,1,5,1,1)
  (same comment as for iron (III) chloride, without water, in 40% solution state)
  properties: wet mass 1 kg, carbon content, fossil 0.003, dry mass 1 kg
  note on carbon content, fossil: This dataset is an unweighted average of 20 inorganic substances (listed in Tab 88.1, ecoinvent v2.2 report 8, part II), being part of the top100 chemicals included in this database. The C-content has also been calculated as an unweighted average of the C content of the substances composing this dataset.
- ammonia, liquid: 5.2e-8 kg; lognormal variance with pedigree 0.73, pedigree (1,1,5,1,1)
  (same comment as for iron (III) chloride, without water, in 40% solution state)
  properties: dry mass 1 kg, wet mass 1 kg
- process-specific burdens, sanitary landfill: 1 kg; lognormal variance with pedigree 0.04, pedigree (1,1,5,1,1)
  demands per kilogram waste. uncertainty is heeded in the module;activityLink introduced to establish a direct link to the corresponding regional supply of this product
- process-specific burdens, residual material landfill: 4.33e-7 kg; lognormal variance with pedigree 0.58, pedigree (1,1,5,1,1)
  (same comment as for process-specific burdens, slag landfill)
- heat, district or industrial, natural gas: 5.1219e-5 MJ; lognormal variance with pedigree 0.9, pedigree (5,5,5,5,5)
  (same comment as for iron (III) chloride, without water, in 40% solution state)
- electricity, low voltage: 0.000348 kWh; lognormal variance with pedigree 0.5, pedigree (5,5,5,5,5)
  (same comment as for heat, central or small-scale, other than natural gas)
- aluminium sulfate, powder: 1.17e-7 kg; lognormal variance with pedigree 1.8, pedigree (5,5,5,5,5)
  (same comment as for heat, central or small-scale, other than natural gas)
  properties: dry mass 1 kg, wet mass 1 kg
- municipal waste incineration facility: 2.57e-14 unit; lognormal variance with pedigree 0.74, pedigree (1,1,5,1,1)
  Burden from incineration of sludge from wastewater treatment of the short-term leachate (0-100a).
  Burden from incineration of sludge from wastewater treatment of the short-term leachate (0-100a).
- chemical, organic: 1.51e-9 kg; lognormal variance with pedigree 1.8, pedigree (1,1,5,1,1)
  (same comment as for iron (III) chloride, without water, in 40% solution state)
  properties: dry mass 1 kg, wet mass 1 kg, carbon content, fossil 0.628
  note on carbon content, fossil: This dataset is an unweighted average of 20 organic substances (listed in Tab 88.1, ecoinvent v2.2 report 8, part II), being part of the top100 chemicals included in this database. The C-content has also been calculated as an unweighted average of the C content of the substances composing this dataset.
- cement, unspecified: 1.73e-7 kg; lognormal variance with pedigree 0.58, pedigree (1,1,5,1,1)
  (same comment as for iron (III) chloride, without water, in 40% solution state)
  properties: wet mass 1 kg, dry mass 1 kg
- sewer grid, 5E9l/year, 110 km: 5.45e-10 km; lognormal variance with pedigree 0.2106, pedigree (5,5,5,5,5)
  (same comment as for heat, central or small-scale, other than natural gas)
- titanium dioxide: 1.49e-9 kg; lognormal variance with pedigree 0.99, pedigree (1,1,5,1,1)
  (same comment as for iron (III) chloride, without water, in 40% solution state)
  properties: wet mass 1 kg, dry mass 1 kg
- sodium hydroxide, without water, in 50% solution state: 2.73e-9 kg; lognormal variance with pedigree 0.59, pedigree (1,1,5,1,1)
  (same comment as for iron (III) chloride, without water, in 40% solution state)
  properties: wet mass 1 kg, dry mass 1 kg
- hydrochloric acid, without water, in 30% solution state: 8.69e-11 kg; lognormal variance with pedigree 1.27, pedigree (1,1,5,1,1)
  (same comment as for iron (III) chloride, without water, in 40% solution state)
  properties: wet mass 1 kg, dry mass 1 kg

## Emissions to nature
- Cadmium [air, non-urban air or from high stacks]: 3.53e-12 kg; lognormal variance with pedigree 3, pedigree (1,1,5,1,1)
  burden from direct release or incineration of landfill biogas. Uncertainty calculated from unertainty of the waste composition of this waste, uncertainty in waste decomposition and short-term leaching in sanitary landfill
- Copper, ion [water, ground-, long-term]: 4.15e-6 kg; lognormal variance with pedigree 1.42, pedigree (1,1,5,1,1)
  Emissions from long-term leachate (>100a) directly from MSW landfill and indirectly via incineration of treatement sludge from leachate treatement. Uncertainty calculated depending on waste input and uncertainty of long-term transfer coefficents in landfill.
- Nitrite [water, ground-, long-term]: 2.11e-5 kg; lognormal variance with pedigree 0.7, pedigree (1,1,5,1,1)
  (same comment as for Copper, ion)
- Boron [air, urban air close to ground]: 1.26e-8 kg; lognormal variance with pedigree 1.65, pedigree (1,1,5,1,1)
  Emissions from short-term leachate treatment and incineration of resulting sludge. Uncertainty calculated depending on waste input and uncertainty of transfer coefficents in landfill, wastewater treatment and incineration model.
- Arsenic, ion [water, ground-, long-term]: 4.21e-7 kg; lognormal variance with pedigree 1.72, pedigree (1,1,5,1,1)
  (same comment as for Copper, ion)
- Mercury [air, non-urban air or from high stacks]: 1.31e-10 kg; lognormal variance with pedigree 2.52, pedigree (1,1,5,1,1)
  (same comment as for Cadmium)
- Nickel, ion [water, ground-, long-term]: 5.55e-7 kg; lognormal variance with pedigree 1.68, pedigree (1,1,5,1,1)
  (same comment as for Copper, ion)
- Cobalt [water, surface water]: 2.12e-10 kg; lognormal variance with pedigree 2.41, pedigree (1,1,5,1,1)
  (same comment as for Boron)
- Mercury [water, ground-, long-term]: 3.19e-7 kg; lognormal variance with pedigree 1.75, pedigree (1,1,5,1,1)
  (same comment as for Copper, ion)
- Copper, ion [water, surface water]: 7.9e-11 kg; lognormal variance with pedigree 2.42, pedigree (1,1,5,1,1)
  (same comment as for Boron)
- Fluoride [water, surface water]: 2.33e-8 kg; lognormal variance with pedigree 1.85, pedigree (1,1,5,1,1)
  Emissions from short-term leachate treatment. Uncertainty calculated depending on waste input and uncertainty of transfer coefficents in landfill and wastewater treatment.
- Zinc [air, urban air close to ground]: 1.43e-13 kg; lognormal variance with pedigree 2, pedigree (1,1,5,1,1)
  (same comment as for Boron)
- Manganese [water, surface water]: 4.63e-7 kg; lognormal variance with pedigree 1.39, pedigree (1,1,5,1,1)
  (same comment as for Boron)
- Iron [air, non-urban air or from high stacks]: 7.97e-13 kg; lognormal variance with pedigree 3.18, pedigree (1,1,5,1,1)
  (same comment as for Cadmium)
- COD, Chemical Oxygen Demand [water, surface water]: 0.000111 kg; lognormal variance with pedigree 0.83, pedigree (1,1,5,1,1)
  (same comment as for Boron)
- Nitrogen, organic bound [water, ground-, long-term]: 0.000633 kg; lognormal variance with pedigree 0.7, pedigree (1,1,5,1,1)
  (same comment as for Copper, ion)
- Hydrogen fluoride [air, non-urban air or from high stacks]: 1.26e-7 kg; lognormal variance with pedigree 1.64, pedigree (1,1,5,1,1)
  (same comment as for Cadmium)
- Nickel [air, urban air close to ground]: 0 kg; pedigree (1,1,1,1,1)
  (same comment as for Boron)
- Lead [air, non-urban air or from high stacks]: 8.21e-13 kg; lognormal variance with pedigree 3.18, pedigree (1,1,5,1,1)
  (same comment as for Cadmium)
- DOC, Dissolved Organic Carbon [water, surface water]: 2.69e-5 kg; lognormal variance with pedigree 0.83, pedigree (1,1,5,1,1)
  (same comment as for Boron)
- Particulates, < 2.5 um [air, non-urban air or from high stacks]: 2.87e-7 kg; lognormal variance with pedigree 0.69, pedigree (1,1,5,1,1)
  (same comment as for Cadmium)
- Cadmium, ion [water, surface water]: 2.69e-10 kg; lognormal variance with pedigree 2.34, pedigree (1,1,5,1,1)
  (same comment as for Boron)
- DOC, Dissolved Organic Carbon [water, ground-, long-term]: 0.101 kg; lognormal variance with pedigree 0.53, pedigree (1,1,5,1,1)
  (same comment as for Copper, ion)
- Chloride [water, surface water]: 1.29e-5 kg; lognormal variance with pedigree 1.01, pedigree (1,1,5,1,1)
  (same comment as for Fluoride)
- Manganese [air, urban air close to ground]: 2.45e-15 kg; lognormal variance with pedigree 1.53, pedigree (1,1,5,1,1)
  (same comment as for Boron)
- TOC, Total Organic Carbon [water, ground-, long-term]: 0.101 kg; lognormal variance with pedigree 0.53, pedigree (1,1,5,1,1)
  (same comment as for Copper, ion)
- Carbon dioxide, non-fossil [air, urban air close to ground]: 0.000503 kg; lognormal variance with pedigree 0.83, pedigree (1,1,5,1,1)
  (same comment as for Boron)
- Magnesium [air, urban air close to ground]: 2.47e-10 kg; lognormal variance with pedigree 1.32, pedigree (1,1,5,1,1)
  (same comment as for Boron)
- Phosphate [water, ground-, long-term]: 2.26e-6 kg; lognormal variance with pedigree 7.23, pedigree (1,1,5,1,1)
  (same comment as for Copper, ion)
- Potassium, ion [water, ground-, long-term]: 6.47e-5 kg; lognormal variance with pedigree 1.06, pedigree (1,1,5,1,1)
  (same comment as for Copper, ion)
- Aluminium [water, ground-, long-term]: 6.34e-6 kg; lognormal variance with pedigree 1.36, pedigree (1,1,5,1,1)
  (same comment as for Copper, ion)
- Calcium [air, non-urban air or from high stacks]: 6.39e-11 kg; lognormal variance with pedigree 2.62, pedigree (1,1,5,1,1)
  (same comment as for Cadmium)
- Potassium, ion [water, surface water]: 7.17e-7 kg; lognormal variance with pedigree 1.41, pedigree (1,1,5,1,1)
  (same comment as for Fluoride)
- Mercury [air, urban air close to ground]: 0 kg; pedigree (1,1,1,1,1)
  (same comment as for Boron)
- Ammonium, ion [water, surface water]: 1.79e-5 kg; lognormal variance with pedigree 0.67, pedigree (1,1,5,1,1)
  (same comment as for Boron)
- Cadmium, ion [water, ground-, long-term]: 2e-7 kg; lognormal variance with pedigree 1.82, pedigree (1,1,5,1,1)
  (same comment as for Copper, ion)
- Calcium, ion [water, surface water]: 2.31e-7 kg; lognormal variance with pedigree 1.53, pedigree (1,1,5,1,1)
  (same comment as for Boron)
- Nickel, ion [water, surface water]: 2.94e-10 kg; lognormal variance with pedigree 2.36, pedigree (1,1,5,1,1)
  (same comment as for Boron)
- Copper [air, non-urban air or from high stacks]: 8.71e-14 kg; lognormal variance with pedigree 3.47, pedigree (1,1,5,1,1)
  (same comment as for Cadmium)
- Arsenic [air, urban air close to ground]: 3.2e-13 kg; lognormal variance with pedigree 2.29, pedigree (1,1,5,1,1)
  (same comment as for Boron)
- BOD5, Biological Oxygen Demand [water, surface water]: 3.48e-5 kg; lognormal variance with pedigree 0.83, pedigree (1,1,5,1,1)
  (same comment as for Boron)
- Potassium [air, non-urban air or from high stacks]: 1.79e-10 kg; lognormal variance with pedigree 2.49, pedigree (1,1,5,1,1)
  (same comment as for Cadmium)
- Nitrogen [water, surface water]: 4.86e-7 kg; lognormal variance with pedigree 0.62, pedigree (1,1,5,1,1)
  (same comment as for Boron)
- Iron [air, urban air close to ground]: 1.22e-11 kg; lognormal variance with pedigree 1.71, pedigree (1,1,5,1,1)
  (same comment as for Boron)
- Calcium [air, urban air close to ground]: 4.18e-11 kg; lognormal variance with pedigree 1.56, pedigree (1,1,5,1,1)
  (same comment as for Boron)
- Mercury [water, surface water]: 1.04e-10 kg; lognormal variance with pedigree 2.41, pedigree (1,1,5,1,1)
  (same comment as for Boron)
- COD, Chemical Oxygen Demand [water, ground-, long-term]: 0.111 kg; lognormal variance with pedigree 0.53, pedigree (1,1,5,1,1)
  (same comment as for Copper, ion)
- Lead [water, surface water]: 2.71e-10 kg; lognormal variance with pedigree 2.15, pedigree (1,1,5,1,1)
  (same comment as for Boron)
- Cobalt [air, non-urban air or from high stacks]: 1.05e-13 kg; lognormal variance with pedigree 3.5, pedigree (1,1,5,1,1)
  (same comment as for Cadmium)
- Ammonium, ion [water, ground-, long-term]: 0.000387 kg; lognormal variance with pedigree 0.7, pedigree (1,1,5,1,1)
  (same comment as for Copper, ion)
- Nitrate [water, ground-, long-term]: 4.08e-5 kg; lognormal variance with pedigree 0.7, pedigree (1,1,5,1,1)
  (same comment as for Copper, ion)
- Boron [water, ground-, long-term]: 1.97e-6 kg; lognormal variance with pedigree 1.46, pedigree (1,1,5,1,1)
  (same comment as for Copper, ion)
- TOC, Total Organic Carbon [water, surface water]: 2.8e-5 kg; lognormal variance with pedigree 0.83, pedigree (1,1,5,1,1)
  (same comment as for Boron)
- Cobalt [water, ground-, long-term]: 8.65e-8 kg; lognormal variance with pedigree 1.95, pedigree (1,1,5,1,1)
  (same comment as for Copper, ion)
- Molybdenum [water, surface water]: 7.77e-10 kg; lognormal variance with pedigree 2.23, pedigree (1,1,5,1,1)
  (same comment as for Boron)
- Aluminium [air, non-urban air or from high stacks]: 1.19e-12 kg; lognormal variance with pedigree 3.14, pedigree (1,1,5,1,1)
  (same comment as for Cadmium)
- Iron, ion [water, surface water]: 1.74e-9 kg; lognormal variance with pedigree 2, pedigree (1,1,5,1,1)
  (same comment as for Boron)
- Chromium VI [water, surface water]: 5.89e-11 kg; lognormal variance with pedigree 2.55, pedigree (1,1,5,1,1)
  (same comment as for Boron)
- Nitrate [water, surface water]: 6.53e-5 kg; lognormal variance with pedigree 0.6, pedigree (1,1,5,1,1)
  (same comment as for Boron)
- Chloride [water, ground-, long-term]: 0.000318 kg; lognormal variance with pedigree 0.84, pedigree (1,1,5,1,1)
  (same comment as for Copper, ion)
- Nickel [air, non-urban air or from high stacks]: 1.21e-13 kg; lognormal variance with pedigree 3.44, pedigree (1,1,5,1,1)
  (same comment as for Cadmium)
- Phosphate [water, surface water]: 9.86e-8 kg; lognormal variance with pedigree 1.66, pedigree (1,1,5,1,1)
  (same comment as for Boron)
- Manganese [air, non-urban air or from high stacks]: 2.28e-10 kg; lognormal variance with pedigree 2.46, pedigree (1,1,5,1,1)
  (same comment as for Cadmium)
- Methane, non-fossil [air, non-urban air or from high stacks]: 0.00231 kg; lognormal variance with pedigree 0.43, pedigree (1,1,5,1,1)
  (same comment as for Cadmium)
- Copper [air, urban air close to ground]: 1.67e-15 kg; lognormal variance with pedigree 2.49, pedigree (1,1,5,1,1)
  (same comment as for Boron)
- Carbon dioxide, non-fossil [air, non-urban air or from high stacks]: 0.0151 kg; lognormal variance with pedigree 0.39, pedigree (1,1,5,1,1)
  (same comment as for Cadmium)
- Molybdenum [air, urban air close to ground]: 1.29e-12 kg; lognormal variance with pedigree 2.26, pedigree (1,1,5,1,1)
  (same comment as for Boron)
- Chromium, ion [water, surface water]: 1.77e-13 kg; lognormal variance with pedigree 2.58, pedigree (1,1,5,1,1)
  (same comment as for Boron)
- Calcium, ion [water, ground-, long-term]: 0.000131 kg; lognormal variance with pedigree 0.97, pedigree (1,1,5,1,1)
  (same comment as for Copper, ion)
- Carbon monoxide, non-fossil [air, urban air close to ground]: 3.23e-7 kg; lognormal variance with pedigree 0.89, pedigree (1,1,5,1,1)
  (same comment as for Boron)
- Phosphorus [air, urban air close to ground]: 5.8e-11 kg; lognormal variance with pedigree 1.7, pedigree (1,1,5,1,1)
  (same comment as for Boron)
- Methane, non-fossil [air, urban air close to ground]: 9.86e-7 kg; lognormal variance with pedigree 0.88, pedigree (1,1,5,1,1)
  (same comment as for Boron)
- Cadmium [air, urban air close to ground]: 1.45e-14 kg; lognormal variance with pedigree 2.4, pedigree (1,1,5,1,1)
  (same comment as for Boron)
- Nitrogen oxides [air, non-urban air or from high stacks]: 9.54e-9 kg; lognormal variance with pedigree 1.28, pedigree (1,1,5,1,1)
  (same comment as for Cadmium)
- Hydrogen sulfide [water, ground-, long-term]: 9.08e-6 kg; lognormal variance with pedigree 0.97, pedigree (1,1,5,1,1)
  (same comment as for Copper, ion)
- Zinc [air, non-urban air or from high stacks]: 2.81e-12 kg; lognormal variance with pedigree 3.03, pedigree (1,1,5,1,1)
  (same comment as for Cadmium)
- Arsenic [air, non-urban air or from high stacks]: 1.59e-11 kg; lognormal variance with pedigree 2.8, pedigree (1,1,5,1,1)
  (same comment as for Cadmium)
- Sulfur dioxide [air, non-urban air or from high stacks]: 2.46e-7 kg; lognormal variance with pedigree 1.62, pedigree (1,1,5,1,1)
  (same comment as for Cadmium)
- Sulfate [water, ground-, long-term]: 0.000348 kg; lognormal variance with pedigree 0.97, pedigree (1,1,5,1,1)
  (same comment as for Copper, ion)
- Chromium VI [water, ground-, long-term]: 2.99e-9 kg; lognormal variance with pedigree 8.95, pedigree (1,1,5,1,1)
  (same comment as for Copper, ion)
- Cobalt [air, urban air close to ground]: 0 kg; pedigree (1,1,1,1,1)
  (same comment as for Boron)
- Zinc, ion [water, ground-, long-term]: 1.47e-5 kg; lognormal variance with pedigree 1.24, pedigree (1,1,5,1,1)
  (same comment as for Copper, ion)
- Manganese [water, ground-, long-term]: 5.14e-5 kg; lognormal variance with pedigree 1.07, pedigree (1,1,5,1,1)
  (same comment as for Copper, ion)
- Ammonia [air, urban air close to ground]: 3.3e-8 kg; lognormal variance with pedigree 0.65, pedigree (1,1,5,1,1)
  (same comment as for Boron)
- Sodium, ion [water, surface water]: 8.73e-7 kg; lognormal variance with pedigree 1.42, pedigree (1,1,5,1,1)
  (same comment as for Fluoride)
- Magnesium [air, non-urban air or from high stacks]: 4.57e-10 kg; lognormal variance with pedigree 2.36, pedigree (1,1,5,1,1)
  (same comment as for Cadmium)
- Lead [air, urban air close to ground]: 8.15e-14 kg; lognormal variance with pedigree 2.21, pedigree (1,1,5,1,1)
  (same comment as for Boron)
- Boron [water, surface water]: 1.25e-7 kg; lognormal variance with pedigree 1.63, pedigree (1,1,5,1,1)
  (same comment as for Boron)
- Magnesium [water, ground-, long-term]: 0.000196 kg; lognormal variance with pedigree 0.91, pedigree (1,1,5,1,1)
  (same comment as for Copper, ion)
- Sulfate [water, surface water]: 2.51e-6 kg; lognormal variance with pedigree 1.19, pedigree (1,1,5,1,1)
  (same comment as for Fluoride)
- NMVOC, non-methane volatile organic compounds, unspecified origin [air, non-urban air or from high stacks]: 1.62e-8 kg; lognormal variance with pedigree 0.43, pedigree (1,1,5,1,1)
  (same comment as for Cadmium)
- Hydrogen chloride [air, non-urban air or from high stacks]: 1.8e-7 kg; lognormal variance with pedigree 1.58, pedigree (1,1,5,1,1)
  (same comment as for Cadmium)
- Arsenic, ion [water, surface water]: 1e-9 kg; lognormal variance with pedigree 2.25, pedigree (1,1,5,1,1)
  (same comment as for Boron)
- Aluminium [water, surface water]: 2.87e-10 kg; lognormal variance with pedigree 2.06, pedigree (1,1,5,1,1)
  (same comment as for Boron)
- Chromium [air, urban air close to ground]: 0 kg; pedigree (1,1,1,1,1)
  (same comment as for Boron)
- Sodium [air, non-urban air or from high stacks]: 2.18e-10 kg; lognormal variance with pedigree 2.46, pedigree (1,1,5,1,1)
  (same comment as for Cadmium)
- NMVOC, non-methane volatile organic compounds, unspecified origin [air, urban air close to ground]: 4.48e-9 kg; lognormal variance with pedigree 0.99, pedigree (1,1,5,1,1)
  (same comment as for Boron)
- Cyanide [air, urban air close to ground]: 9.28e-10 kg; lognormal variance with pedigree 0.75, pedigree (1,1,5,1,1)
  (same comment as for Boron)
- Carbon monoxide, non-fossil [air, non-urban air or from high stacks]: 8.55e-7 kg; lognormal variance with pedigree 1.03, pedigree (1,1,5,1,1)
  (same comment as for Cadmium)
- Nitrogen oxides [air, urban air close to ground]: 3.23e-7 kg; lognormal variance with pedigree 0.63, pedigree (1,1,5,1,1)
  (same comment as for Boron)
- Magnesium [water, surface water]: 1.65e-6 kg; lognormal variance with pedigree 1.29, pedigree (1,1,5,1,1)
  (same comment as for Boron)
- Iron, ion [water, ground-, long-term]: 1.25e-6 kg; lognormal variance with pedigree 2.8, pedigree (1,1,5,1,1)
  (same comment as for Copper, ion)
- Molybdenum [air, non-urban air or from high stacks]: 3.28e-13 kg; lognormal variance with pedigree 3.31, pedigree (1,1,5,1,1)
  (same comment as for Cadmium)
- Zinc, ion [water, surface water]: 3.91e-9 kg; lognormal variance with pedigree 1.93, pedigree (1,1,5,1,1)
  (same comment as for Boron)
- Dinitrogen monoxide [air, urban air close to ground]: 9.1e-8 kg; lognormal variance with pedigree 0.58, pedigree (1,1,5,1,1)
  (same comment as for Boron)
- Aluminium [air, urban air close to ground]: 3.59e-11 kg; lognormal variance with pedigree 1.4, pedigree (1,1,5,1,1)
  (same comment as for Boron)
- Sodium, ion [water, ground-, long-term]: 1.32e-5 kg; lognormal variance with pedigree 1.26, pedigree (1,1,5,1,1)
  (same comment as for Copper, ion)
- Molybdenum [water, ground-, long-term]: 3.28e-7 kg; lognormal variance with pedigree 1.85, pedigree (1,1,5,1,1)
  (same comment as for Copper, ion)
- Nitrite [water, surface water]: 3.76e-7 kg; lognormal variance with pedigree 0.92, pedigree (1,1,5,1,1)
  (same comment as for Boron)
- Fluoride [water, ground-, long-term]: 2.1e-5 kg; lognormal variance with pedigree 1.21, pedigree (1,1,5,1,1)
  (same comment as for Copper, ion)
- Lead [water, ground-, long-term]: 2.79e-5 kg; lognormal variance with pedigree 1.17, pedigree (1,1,5,1,1)
  (same comment as for Copper, ion)
- Chromium [air, non-urban air or from high stacks]: 2.81e-14 kg; lognormal variance with pedigree 3.62, pedigree (1,1,5,1,1)
  (same comment as for Cadmium)
- BOD5, Biological Oxygen Demand [water, ground-, long-term]: 0.0262 kg; lognormal variance with pedigree 0.53, pedigree (1,1,5,1,1)
  (same comment as for Copper, ion)

## Sampling procedure
Landfill model based on observed leachate concentrations in literature. Extrapolated to 60'000 years heeding chemical characteristics. Initial waste composition from various literature sources.

## Extrapolations
This dataset has been extrapolated from year 2000 to the year of the calculation (2019). The uncertainty has been adjusted accordingly.

## Review by Niels Jungbluth 2003-07-21
Passed. Calculation for standard deviation 95 of, i.e., infrastructure,
land occupation, transport services or other services can differ from
standard Pedigree approach used in this project and figures obtained by
this procedure.
