# diammonium phosphate production

Dataset: EcoSpold 2, unit process
Geography: RER
Time period: 1999-01-01 to 2019-12-31
Technology level: current
Classification: ISIC rev.4 ecoinvent: 2012:Manufacture of fertilizers and nitrogen compounds
Classification: EcoSpold01Categories: agricultural means of production/mineral fertiliser
Synonyms: DAP
Tags: ConvertedDataset
Scenario: Business-as-Usual
System model: Allocation at the point of substitution
Generated by: Angelika Heil
Published in: Nemecek, T. 2007
Database: ecoinvent
isCopyrightProtected: true
accessRestrictedTo: 1

## General comment
Refers to 1 kg N, resp. 1 kg P2O5 in diammonium phosphate with a N-content of 18.0% and a P2O5-content of 46.0%. The multioutput-process 'diammonium phosphate, at regional storehouse' delivers the co-products 'diammonium phosphate, as N, at regional storehouse' and 'diammonium phosphate, as P2O5, at regional storehouse'. Allocation factors are based on the energy requirements of the respective nutrients for the production processes: 60% for 'diammonium phosphate, as N, at regional storehouse' and 40% for 'diammonium phosphate, as P2O5, at regional storehouse'' (exceptions see report). The allocated inventories must always be used simultaneously.
[This dataset was already contained in the ecoinvent database version 2. It was not individually updated during the transfer to ecoinvent version 3. Life Cycle Impact Assessment results may still have changed, as they are affected by changes in the supply chain, i.e. in other datasets. This dataset was generated following the ecoinvent quality guidelines for version 2. It may have been subject to central changes described in the ecoinvent version 3 change report (http://www.ecoinvent.org/database/ecoinvent-version-3/reports-of-changes/), and the results of the central updates were reviewed extensively. The changes added e.g. consistent water flows and other information throughout the database. The documentation of this dataset can be found in the ecoinvent reports of version 2, which are still available via the ecoinvent website. The change report linked above covers all central changes that were made during the conversion process.]

## Included activities end
The unit process inventory takes into account the production of diammonium phosphate from ammonia and phosphoric acid. Transports of raw materials and intermediate products to the fertiliser plant as well as the transport of the fertiliser product from the factory to the regional department store were included. Production and waste treatment of catalysts, coating and packaging of the final fertiliser products were not included.

## Geography
According to the reference of this inventory, the European average is derived from mean values of several fertiliser plants within Europe. The production of raw materials and/or intermediates outside Europe was taken into account by considering the production technology in the respective country and the relative import shares.

## Technology
Production inventory was derived from detailed literature studies and specifications from the manufacturer, relevant for the European production. Transport specifications of the fertiliser product to the regional department store, which were not included in the reference used for this inventory, were complemented by data given in Patyk & Reinhardt (1997).

## Time period
Year when the principal reference used for this inventory was published.

## Reference product
- phosphate fertiliser, as P2O5: 1 kg; CPC 3462: Mineral or chemical fertilizers, phosphatic; By-product classification allocatable product
  EcoSpold01Location=RER
  production volume 1.56406e9 kg; = 1283000000+281057075
    This is a placeholder value that does not reflect real-world production volumes. This dataset does not currently require a real-world production volume to work in the database framework, and no actual data were collected yet.This has no negative effect on the results of the ecoinvent database.
    281057075 kg is an additional production volume which is needed by other activities (through the activity links) present in the database.
    1283000000 kg is the amount of fertilizer reported by IFA (IFA production and trade statistics http://www.fertilizer.org/ifa/Home-Page/STATISTICS/Production-and-trade)
    The real production volume of this activity will be added in the future releases of the database.
  property price 0.241 EUR2005
    Temporary price data. Calculated as 90% of purchasers price based on: 2004 prices are calculated on basis of Import/Export data (tonnes and US$) from UN Trade Statistics Database (http://data.un.org/Browse.aspx?d=ComTrade, accessed 7/7-2010). N, P2O5, or K2O content (http://www.fertilizer.org/ifa/Home-Page/STATISTICS/Conversions-factors)
  property carbon content 0
    carbon content on a dry matter basis (reserved; not for manual entry)
  property true value 0.11086
    allocation property applied in "true value" allocation // value calculated from revenue
  properties: dry mass 1 kg, wet mass 1 kg, carbon content, non-fossil 0, water in wet mass 0 kg, water content 0, carbon content, fossil 0, carbon allocation 0 kg

## By-products
- nitrogen fertiliser, as N: 0 kg; CPC 3461: Mineral or chemical fertilizers, nitrogenous; By-product classification allocatable product
  EcoSpold01Location=RER
  production volume 5.40938e8 kg; = 38894760+502043478.3
    This is a placeholder value that does not reflect real-world production volumes. This dataset does not currently require a real-world production volume to work in the database framework, and no actual data were collected yet.This has no negative effect on the results of the ecoinvent database.
    38894760 kg is an additional production volume which is needed by other activities (through the activity links) present in the database.
    The real production volume of this activity will be added in the future releases of the database.
  property price 0.473 EUR2005
    (same comment as for phosphate fertiliser, as P2O5)
  property carbon content 0
    carbon content on a dry matter basis (reserved; not for manual entry)
  property true value 0.08514
    allocation property applied in "true value" allocation // value calculated from revenue
  properties: dry mass 1 kg, water in wet mass 0 kg, water content 0, wet mass 1 kg, carbon content, fossil 0, carbon content, non-fossil 0, carbon allocation 0 kg

## Inputs from technosphere
- heat, district or industrial, natural gas: 0.356582 MJ; lognormal variance with pedigree 0.040625, pedigree (2,1,5,2,1)
  EcoSpold01Location=RER
- chemical factory, organics: 4.91837e-10 unit; lognormal variance with pedigree 0.340625, pedigree (2,1,5,2,1)
  activityLink introduced to establish a direct link to the corresponding regional supply of this product
  EcoSpold01Location=RER
- ammonia, liquid: 0.27051 kg; lognormal variance with pedigree 0.040625, pedigree (2,1,5,2,1)
  EcoSpold01Location=RER
  properties: wet mass 1 kg, dry mass 1 kg
- electricity, medium voltage: 0.0409454 kWh; lognormal variance with pedigree 0.040625, pedigree (2,1,5,2,1)
  EcoSpold01Location=UCTE
- phosphoric acid, fertiliser grade, without water, in 70% solution state: 0.78202 kg; lognormal variance with pedigree 0.040625, pedigree (2,1,5,2,1)
  EcoSpold01Location=MA
  properties: dry mass 1 kg, wet mass 1 kg

## Emissions to nature
- Particulates, > 10 um [air, urban air close to ground]: 0.000245918 kg; lognormal variance with pedigree 0.1093, pedigree (2,3,5,3,3)
- Phosphate [water, surface water]: 3.0125e-5 kg; lognormal variance with pedigree 0.1093, pedigree (2,3,5,3,3)
- Mercury [water, surface water]: 2.37311e-6 kg; lognormal variance with pedigree 0.7093, pedigree (2,3,5,3,3)
- Arsenic, ion [water, surface water]: 2.48378e-6 kg; lognormal variance with pedigree 0.7093, pedigree (2,3,5,3,3)
- Nickel, ion [water, surface water]: 9.61541e-6 kg; lognormal variance with pedigree 0.7093, pedigree (2,3,5,3,3)
- Ammonia [air, urban air close to ground]: 0.000265592 kg; lognormal variance with pedigree 0.1093, pedigree (2,3,5,3,3)
- Zinc, ion [water, surface water]: 1.47551e-5 kg; lognormal variance with pedigree 0.7093, pedigree (2,3,5,3,3)
- Copper, ion [water, surface water]: 1.24189e-5 kg; lognormal variance with pedigree 0.7093, pedigree (2,3,5,3,3)
- Particulates, > 2.5 um, and < 10um [air, urban air close to ground]: 0.000122959 kg; lognormal variance with pedigree 0.1793, pedigree (2,3,5,3,3)
- Cadmium, ion [water, surface water]: 2.48378e-6 kg; lognormal variance with pedigree 0.7093, pedigree (2,3,5,3,3)
- Particulates, < 2.5 um [air, urban air close to ground]: 0.000245918 kg; lognormal variance with pedigree 0.3693, pedigree (2,3,5,3,3)
- Chromium, ion [water, surface water]: 1.24189e-5 kg; lognormal variance with pedigree 0.7093, pedigree (2,3,5,3,3)
- Lead [water, surface water]: 1.07466e-5 kg; lognormal variance with pedigree 0.7093, pedigree (2,3,5,3,3)

## Sampling procedure
Values given in the reference originate from manufacturers and/or other data sources which in turn refer to the real situation and hence are largely secured. However, the emissions of N and P into the water may be somewhat uncertain. When no information on the speciation of N- and P-emissions was given in the reference, the most likely speciation based on expert's opinion is presented.

## Review by Maggie Osses 2003-09-22
Passed.
