# sugar refinery construction

Dataset: EcoSpold 2, unit process
Geography: GLO
Time period: 2004-01-01 to 2019-12-31
Technology level: current
Classification: EcoSpold01Categories: food industry/processing
Classification: ISIC rev.4 ecoinvent: 4290:Construction of other civil engineering projects
Tags: ConvertedDataset
Scenario: Business-as-Usual
System model: Allocation at the point of substitution
Generated by: Edgard Gnansounou
Published in: Jungbluth N. 2007
Database: ecoinvent
isCopyrightProtected: true
accessRestrictedTo: 1

## General comment
Sugar refinery with a production capacity of 200 kt sugar per year (production period of 100-180 days/year, depending on the feedstock). Life time is taken as 50 years. Equivalent feed capacities vary from 1’300 kt/yr for sugar beets to 1’650 kt/yr for sugarcane.
[This dataset was already contained in the ecoinvent database version 2. It was not individually updated during the transfer to ecoinvent version 3. Life Cycle Impact Assessment results may still have changed, as they are affected by changes in the supply chain, i.e. in other datasets. This dataset was generated following the ecoinvent quality guidelines for version 2. It may have been subject to central changes described in the ecoinvent version 3 change report (http://www.ecoinvent.org/database/ecoinvent-version-3/reports-of-changes/), and the results of the central updates were reviewed extensively. The changes added e.g. consistent water flows and other information throughout the database. The documentation of this dataset can be found in the ecoinvent reports of version 2, which are still available via the ecoinvent website. The change report linked above covers all central changes that were made during the conversion process.]

## Included activities end
This process includes land use and occupation, buildings and facilities of a typical sugar refinery in the global context. Energy use for construction and related emissions and/or waste effluents are not included.

## Geography
Global context. Applicable to any sugar refinery in the world.

## Technology
Technology is of a standard sugar refinery, including washing of the feedstock, juice extraction, purification and crystallisation. Juice extraction is performed by diffusion.

## Reference product
- sugar refinery: 1 unit; By-product classification allocatable product; CPC 53269: Other constructions for manufacturing
  production volume 1 unit
    World production of sugar was 130 Mt in 2000
    Dummy value to be replaced by measured, estimated or calculated value
  property price 3.80176e7 EUR2005
    Convert from EU 27 price to the world by currency exchange rate.
  property true value 3.80176e7
    allocation property applied in "true value" allocation // value calculated from revenue

## By-products
- heat, for reuse in municipal waste incineration only: 0 MJ; CPC 17300: Steam and hot water; By-product classification allocatable product; pedigree (1,1,1,1,1)
  Net electricity generated from this waste and used in internal MSWI plant energy redistribution.
  Uncertainty: uncertainty is calculated from uncertainties in waste composition and uncertainties in energy efficiency and the uncertainty in internal energy demand
  production volume 26.0562 MJ
  property exergy 0.1842 MJ; name E_th_prod_MSWI_exergy
    This exergy property is based on the exergy content of the product.
  property price 0.0106 EUR2005; name E_th_prod_MSWI_price_EUR2005
    Average European district heat price from Ecoheatcool and Euroheat 2005-2006, Ecoheat Work package 1: The European heat market. Final report. 10.6 EUR/GJ i s the price of district heat. http://www.solarthermalworld.org/files/Ecoheatcool%20WP1%20Web.pdf?download
  property true value relation 0.1842; name E_th_prod_MSWI_true_value_relation
    property to calculate "true value" from
  property true value 0.160063
    allocation property applied in "true value" allocation // value calculated from true value relation
- electricity, for reuse in municipal waste incineration only: 0 kWh; CPC 17100: Electrical energy; By-product classification allocatable product; pedigree (1,1,1,1,1)
  (same comment as for heat, for reuse in municipal waste incineration only)
  production volume 3.66942 kWh
  property true value relation 3.6; name E_el_prod_MSWI_true_value_relation
    property to calculate "true value" from
  property price 0.1 EUR2005; name E_el_prod_MSWI_price_EUR2005
    Estimated to be the same price as in case of electricity, medium voltage.
  property exergy 3.6 MJ; name E_el_prod_MSWI_exergy
    This exergy property is based on the exergy content of the product.
  property true value 0.440545
    (same comment as for heat, for reuse in municipal waste incineration only)

## Inputs from technosphere
- steel, chromium steel 18/8, hot rolled: 161110 kg; lognormal variance with pedigree 0.11, pedigree (4,4,4,5,4)
  Adapted from the dataset 'ethanol fermentation plant'
  Uncertainty: A
  properties: wet mass 1 kg, dry mass 1 kg, carbon content, fossil 0.0008
  note on carbon content, fossil: Stainless steel model is the grade 304 steel (18/8 stainless, 18% chromium 8% nickel; max. 0.08% C)
- diesel, burned in building machine: 135560 MJ; lognormal variance with pedigree 0.11, pedigree (4,4,4,5,4)
  Adapted from the dataset 'ethanol fermentation plant'
  Uncertainty: A
- steel, unalloyed: 438890 kg; lognormal variance with pedigree 0.11, pedigree (4,4,4,5,4)
  Adapted from the dataset 'ethanol fermentation plant'
  Uncertainty: A
  properties: dry mass 1 kg, carbon content, fossil 0.0025, wet mass 1 kg
  note on carbon content, fossil: Unalloyed steels or carbon steels are those in which the level of an individual element in no case reaches or exceeds the limiting concentration given in Tab. 3.1 ecoinvent v2.2 report 10_partII. Assumed to have a C content of 0.25%
- steel, low-alloyed, hot rolled: 185560 kg; lognormal variance with pedigree 0.11, pedigree (4,4,4,5,4)
  Adapted from the dataset 'ethanol fermentation plant'
  Uncertainty: A
  properties: dry mass 1 kg, carbon content, fossil 0.005, wet mass 1 kg
  note on carbon content, fossil: Low alloyed steel composition given in Tab. 3.2 ecoinvent v2.2 report 10_partII. Steel assumed to have a C content of 0.5%
- waste concrete, not reinforced: 0 kg; pedigree (1,1,1,1,1)
  Adapted from the dataset 'ethanol fermentation plant'
  Uncertainty: A
  production volume 0 kg
    Calculated from the production volume of sugar refinery in proportion to the respective output amounts.
  properties: wet mass 1 kg, dry mass 1 kg
- electricity, medium voltage: 16444 kWh; lognormal variance with pedigree 0.11, pedigree (4,4,4,5,4)
  Adapted from the dataset 'ethanol fermentation plant'
  Uncertainty: A
- nickel, 99.5%: 35556 kg; lognormal variance with pedigree 0.11, pedigree (4,4,4,5,4)
  Adapted from the dataset 'ethanol fermentation plant'
  Uncertainty: A
  properties: dry mass 1 kg, wet mass 1 kg
- copper: 40000 kg; lognormal variance with pedigree 0.11, pedigree (4,4,4,5,4)
  Adapted from the dataset 'ethanol fermentation plant'
  Uncertainty: A
  properties: wet mass 1 kg, dry mass 1 kg
- zinc: 95556 kg; lognormal variance with pedigree 0.11, pedigree (4,4,4,5,4)
  Adapted from the dataset 'ethanol fermentation plant'
  Uncertainty: A
  properties: dry mass 1 kg, wet mass 1 kg
- concrete, normal: 13789 m3; lognormal variance with pedigree 0.11, pedigree (4,4,4,5,4)
  Adapted from the dataset 'ethanol fermentation plant'
  Uncertainty: A
  properties: wet mass 2380 kg, dry mass 2190 kg, water content 0.086758
- waste concrete, not reinforced: -1.98484e6, -21030.9, -2.83271e7 kg (3 entries); lognormal variance with pedigree 0.11, pedigree (4,4,4,5,4)
  Adapted from the dataset 'ethanol fermentation plant'
  Uncertainty: A
  production volume 3.0333e7 kg

## Inputs from nature
- Transformation, from unspecified [natural resource, land]: 41667 m2; lognormal variance with pedigree 0.23, pedigree (4,4,4,5,4)
  Adapted from the dataset 'ethanol fermentation plant'
  Uncertainty: A
- Occupation, industrial area [natural resource, land]: 2.08333e6 m2*year; lognormal variance with pedigree 0.15, pedigree (4,4,4,5,4)
  Adapted from the dataset 'ethanol fermentation plant'
  Uncertainty: A
- Occupation, construction site [natural resource, land]: 208330 m2*year; lognormal variance with pedigree 0.15, pedigree (4,4,4,5,4)
  Adapted from the dataset 'ethanol fermentation plant'
  Uncertainty: A
- Transformation, to industrial area [natural resource, land]: 41667 m2; lognormal variance with pedigree 0.23, pedigree (4,4,4,5,4)
  Adapted from the dataset 'ethanol fermentation plant'
  Uncertainty: A

## Sampling procedure
Data was adapted from the ethanol fermentation plant dataset.

## Review by Niels Jungbluth 2006-07-12
Passed.
none
