# heat and power co-generation, wood chips, 6667 kW, state-of-the-art 2014, label-certified

Dataset: EcoSpold 2, unit process
Geography: CH
Time period: 2010-01-01 to 2019-12-31
Technology level: modern
Classification: ISIC rev.4 ecoinvent: 3530:Steam and air conditioning supply
Tags: wood power; with true value; certified electricity
Scenario: Business-as-Usual
System model: Allocation at the point of substitution
Generated by: Christian Bauer
Published in: Bauer, C. 2007
Database: ecoinvent
isCopyrightProtected: true
accessRestrictedTo: 1

## General comment
This dataset represents the production of heat and certified electricity with wood chips in a state-of-the-art (as of 2014) co-generation plant with a capacity of 6667 kW (referring to fuel input) in Switzerland and was used as approximation for this dataset valid for a global average (uncertainties adjusted accordingly). The technology corresponds to a modern unit to be installed in 2014 in Switzerland, which is equipped with an electrostatic precipitator for particulate matter (PM) emission reduction and an SNCR device for reduction of NOx emissions. It is assumed that the plant is operated mainly producing heat, i.e. following the heat demand. Heat is therefore considered as the main product and therefore the reference product, whereas electricity is a by-product. Electricity is produced with an organic rankine cycle (ORC) steam generator.
Wood chips are burned in a boiler at a temperature of 800-1300 °C under excess air conditions and turned into carbon dioxide and water. Energy is set free in form of heat. Burning takes place with the following steps:
1. Drying
2. degradation of the wood into carbon and gases
3. degradation of the carbon into gases
4. oxidation of the gases
These phases overlap. The produced heat can be used directly or for steam production in order to generate electricity with a turbine.
Emissions vary with quality of the combustion (temperatur, mixing of the combustion gases and the added fresh air, retention time of gases in the combustor), filter technologies and with the efficiency of the plant. Emission data in this dataset are taken from measurements and literature as well as from communication with experts.
CO2 emissions were calculated out of the carbon content of the wood used as combustible. Carbon emitted in carbon monoxide was subtracted from the result.
Key emissions factors for CO, NOx, CH4, NMVOC and particles were updated according to latest data.
All other emission factors (per MJ fuel input) correspond to the 1000 kW boiler fuelled with wood chips from forest. Other exchanges correspond to the LCI data for the 6400 kW co-generation unit in ecoinvent v2.2.
Good J., Nussbaumer T., Bühler R., Jenni A. (1996) Erfolgskontrolle des SNCRVerfahren
zur Entstickung von Holzfeuerungen. Schlussbericht des BEWProjektes
53894. Zürich, Schweiz.

## Included activities start
From wood chips ready to be burned in cogeneration unit (for heat and power production).

## Included activities end
This activity ends with heat and electricity produced.

This dataset includes the infrastructure, the wood input, the emissions to air and the disposal of the ashes. Also included are substances needed for operation: lubricating oil, organic chemicals, sodium chloride, chlorine and decarbonized water.

## Geography
Inventory represents Swiss data for label-certified electricity.

## Technology
Electric efficiency: 0.15; Thermal efficiency: 0.45;
Total efficiency: 0.6

## Parameters
- thermal efficiency: 0.45 dimensionless; name efficiency_thermal
  Thermal efficiency of the cogeration system, corresponding to annual operation including warm-up and cool-down
- electrical efficiency: 0.15 dimensionless; name efficiency_electrical
  Electric efficiency of the cogeration system, corresponding to annual operation including warm-up and cool-down

## Reference product
- heat, district or industrial, other than natural gas: 1 MJ; name heat_out; = 1*efficiency_thermal; source Thomas Nussbaumer 2014; CPC 17300: Steam and hot water; By-product classification allocatable product
  Thermal efficiency referring to the LHV of the fuel input
  production volume 3.78e8 MJ; name apv_heat; = apv_electricity * (heat_out/electricity_out)
    Calculation/rough estimation. The annual production of heat is calculated based on the production of grid-connected electricity produced with wood. This does not take into account that there might be plants not producing electricity at all or not producing grid-connected electricity or that the efficiencies might be different than those mentioned in the technology comment.
  property true value relation 0.169678; name heat_true_value_relation
    property to calculate 'true value' from
  property exergy 0.169678 MJ; name heat_exergy
    allocation factor for electricity (=1) vs. heat, where heat is calculated as the termodynamic mean temperature Tm = (Tfeed-Treturn)/ln(Tfeed/Treturn), relative to the application temperature (Tu, typically = 293 K), i.e. (Tm-Tu)/Tm
  property price 0.0106 EUR2005; name heat_price_EUR2005
    Average European district heat price from Ecoheatcool and Euroheat 2005-2006, Ecoheat Work package 1: The European heat market. Final report. 10.6 EUR/GJ i s the price of district heat. http://www.solarthermalworld.org/files/Ecoheatcool%20WP1%20Web.pdf?download
  property corresponding fuel use, propane, furnace >100kW 0 MJ; name fuel_use
    Lower heating value of the fuel input related to the heat/electricity output, taken directly from ecoinvent v3.0 dataset 'heat production, natural gas, at industrial furnace >100kW, GLO 2000'.
  property true value 0.0030286; name heat_out_true_value
    allocation property applied in "true value" allocation // value calculated from true value relation

## By-products
- electricity, high voltage, label-certified: 0 kWh; name electricity_out; = 1*efficiency_electrical/3.6; source Thomas Nussbaumer 2014; CPC 17100: Electrical energy; By-product classification allocatable product
  Electricl efficiency referring to the LHV of the fuel input
  production volume 3.5e7 kWh; name apv_electricity
    Literature value/statistics. Net production of grid-connected certified electricity in 2011 with this technology in Switzerland.
  property true value relation 3.6; name electricity_true_value_relation
    property to calculate 'true value' from
  property exergy 3.6 MJ; name electricity_exergy
    (same comment as for heat, district or industrial, other than natural gas)
  property price 0.101 EUR2005; name electricity_price_EUR2005
    Temporary price data. Calculated as 90% of purchasers price based on: 94% of the average price (to account for a 6% loss in transformation and transmission) for electricity for industrial consumersin 2005 (excluded taxes). From IEA. In addition, regarding label-certified electricity, the Swiss government has a market instrument for renewable energy which is calculated as the difference between the market price and the production price. This was started in 2009 and is 0.45 Rp/kWh. Therefore, the production price of label certified energy is assumed to be the supplyer price plus the 0.45Rp/kWh (http://www.bfe.admin.ch/themen/00612/02073/index.html?lang=de).The unit conversion from CH to EUR is based on the ecoinvent unit conversion file (1 CHF2005 = 0.644 EUR2005). As an approximation, this is also used for global electricity production
  property true value 0.00594971; name electricity_out_true_value
    (same comment as for heat, district or industrial, other than natural gas)
- electricity, for reuse in municipal waste incineration only: 0 kWh; CPC 17100: Electrical energy; By-product classification allocatable product; pedigree (1,1,1,1,1)
  Net electricity generated from this waste and used in internal MSWI plant energy redistribution.
  Uncertainty: uncertainty is calculated from uncertainties in waste composition and uncertainties in energy efficiency and the uncertainty in internal energy demand
  production volume 482.417 kWh
  property exergy 3.6 MJ; name E_el_prod_MSWI_exergy
    This exergy property is based on the exergy content of the product.
  property true value relation 3.6; name E_el_prod_MSWI_true_value_relation
    property to calculate "true value" from
  property price 0.1 EUR2005; name E_el_prod_MSWI_price_EUR2005
    Estimated to be the same price as in case of electricity, medium voltage.
  property true value 1.82238e-7
    (same comment as for heat, district or industrial, other than natural gas)
- iron scrap, sorted, pressed: 0 kg; By-product classification Recyclable; CPC 39310: Slag, dross, scalings and other waste from the manufacture of iron or steel; pedigree (1,1,1,1,1)
  Iron scrap recovered from this waste.
  Uncertainty: uncertainty calculated from uncertainty in waste composition, uncertainty of share of recyclable metal, uncertainty of transfer coefficient to bottom ash, uncertainty of the efficiency of scrap removal in MSWI plant.
  production volume 12.0289 kg
  property price 0.175 EUR2005
    Temporary price data. Calculated as 90% of purchasers price based on: 2005 import and export prices (total trades (USD) divided by total weight (kg) in biggest economies of the world: EU27, USA, Brasil, China, India, Japan and Russia) from UN Commodity Trade Statistics Database (http://data.un.org/Explorer.aspxDatabase [Accessed 2011.06.20]). Commodity: Waste or scrap, of cast iron
  property carbon content 0
    carbon content on a dry matter basis (reserved; not for manual entry)
  property true value 5.56894e-9
    allocation property applied in "true value" allocation // value calculated from revenue
  properties: carbon content, fossil 0, dry mass 1 kg, carbon content, non-fossil 0, water in wet mass 0 kg, wet mass 1 kg, water content 0, carbon allocation 0 kg
- heat, for reuse in municipal waste incineration only: 0 MJ; CPC 17300: Steam and hot water; By-product classification allocatable product; pedigree (1,1,1,1,1)
  Net useful heat generated from this waste and used in internal MSWI plant energy redistribution.
  Uncertainty: uncertainty is calculated from uncertainties in waste composition and uncertainties in energy efficiency and the uncertainty in internal energy demand
  production volume 3550.19 MJ
  property exergy 0.1842 MJ; name E_th_prod_MSWI_exergy
    This exergy property is based on the exergy content of the product.
  property true value relation 0.1842; name E_th_prod_MSWI_true_value_relation
    property to calculate "true value" from
  property price 0.0106 EUR2005; name E_th_prod_MSWI_price_EUR2005
    (same comment as for heat, district or industrial, other than natural gas)
  property true value 6.86206e-8
    (same comment as for heat, district or industrial, other than natural gas)
- iron scrap, unsorted: 0 kg; source European Aluminium Association 2008; CPC 39310: Slag, dross, scalings and other waste from the manufacture of iron or steel; By-product classification Recyclable; pedigree (1,1,1,1,1)
  production volume 0.00169679 kg
  property price 0.149 EUR2005; name ironScrapAmount_price_EUR2005
    Temporary price data. Calculated as 90% of purchasers price based on: estimated at 85% of sorted scrap
  property carbon content 0
    carbon content on a dry matter basis (reserved; not for manual entry)
  property true value 6.6884e-13
    allocation property applied in "true value" allocation // value calculated from revenue
  properties: water in wet mass 0 kg, water content 0, carbon content, fossil 0, carbon content, non-fossil 0, dry mass 1 kg, wet mass 1 kg, carbon allocation 0 kg
- aluminium oxide, non-metallurgical: 0 kg; source European Aluminium Association 2008; CPC 41432: Alumina (aluminium oxide), except artificial corundum; By-product classification allocatable product; CAS 1344-28-1; pedigree (1,1,1,1,1)
  production volume 0.106773 kg
  property carbon content, non-fossil 0; name C_content_non_fossil
  property price 0.28 EUR2005; name Al2O3Amount_price_EUR2005
    From UN trade database. http://data.un.org/ Import data from the largest economies of the world are used (Brazil, India, USA, China, Japan and EU-27).
  property dry mass 1 kg; name DM
  property water content 0; name water_content
  property wet mass 1 kg; name WM
  property water in wet mass 0 kg; name WWM
  property carbon content, fossil 0; name C_content_fossil
  property carbon content 0
    carbon content on a dry matter basis (reserved; not for manual entry)
  property true value 7.90908e-11
    allocation property applied in "true value" allocation // value calculated from revenue
  properties: carbon allocation 0 kg
- aluminium, cast alloy: 0 kg; source European Aluminium Association 2008; By-product classification allocatable product; CPC 41431: Unwrought aluminium; pedigree (1,1,1,1,1)
  EcoSpold01Location=RER
  production volume 0.998087 kg
  property price 1.3 EUR2005; name castAlloyAmount_price_EUR2005
    Temporary price data. Calculated as 90% of purchasers price based on: Source: London Metal Exchange, Aluminium alloy price for 2005
  property carbon content 0
    carbon content on a dry matter basis (reserved; not for manual entry)
  property true value 3.43257e-9
    allocation property applied in "true value" allocation // value calculated from revenue
  properties: water in wet mass 0 kg, carbon content, non-fossil 0, water content 0, dry mass 1 kg, carbon content, fossil 0, wet mass 1 kg, carbon allocation 0 kg
- aluminium, wrought alloy: 0 kg; source European Aluminium Association 2008; By-product classification allocatable product; CPC 4153: Semi-finished products of aluminium or aluminium alloys; pedigree (1,1,1,1,1)
  production volume 0.436943 kg
  property price 1.44 EUR2005; name secondaryAluminiumOutput_price_EUR2005
    Estimated based on literature values and expert judgement. Aluminium ccast alloys are about 90% of the price of aluminium wrought alloys.
  property carbon content 0
    carbon content on a dry matter basis (reserved; not for manual entry)
  property true value 1.66455e-9
    allocation property applied in "true value" allocation // value calculated from revenue
  properties: wet mass 1 kg, water content 0, carbon content, fossil 0, water in wet mass 0 kg, carbon content, non-fossil 0, dry mass 1 kg, carbon allocation 0 kg
- copper: 0 kg; source Rentz O. 1999; By-product classification allocatable product; CPC 41413: Refined copper and copper alloys, unwrought; master alloys of copper
  Literature value. Copper uses: Before end-use copper is manufactured into semi fabricated products, such as shapes and ingots (known as 'semis'). These manufacturing processes are subdivided into hot working, cold working and, if necessary, process annealing. Few of the semis are ready for use as such. They more typically travel to first-stage manufacturers, who make metal rods, wire, and casting, and then to component manufacturers who produce such things as motors, valves, and insulated cables The components in turn are incorporated by final-stage manufacturers into a variety of finished products - automobiles, commercial buildings, residential housing, and so forth. These uses account for about 79% of the world-wide consumption of copper.
  production volume 0.115844 kg
  property price 5.52 EUR2005
    Literature value (http://www.economist.com/news/business/21576714-mining-industry-has-enriched-chile-its-future-precarious-copper-solution). Average price between 20015 and 2013.
  property carbon content 0
    carbon content on a dry matter basis (reserved; not for manual entry)
  property true value 1.6917e-9
    allocation property applied in "true value" allocation // value calculated from revenue
  properties: dry mass 1 kg, water in wet mass 0 kg, wet mass 1 kg, carbon content, non-fossil 0, water content 0, carbon content, fossil 0, carbon allocation 0 kg
- zinc concentrate: 0 kg; CPC 14290: Other non-ferrous metal ores and concentrates (other than uranium or thorium ores and concentrates); By-product classification allocatable product
  Calculated value from the knowledge of the properties of both products.
  production volume 0.294164 kg
  property price 0.38 EUR2005; name ByP_price_EUR2005
    Temporary price data. Calculated as 90% of purchasers price based on: Zinc content in concentrate 53%. Concentrate price per kg Zn 86.5% of refined Zn price (13.5% treatment charges according to CHR Metals Limited 2005: Dynamic cost curves. http://www.minecost.com/dynamic.pdf). 2004 zinc price from USGS (2007) Mineral commodity summaries 2007. <http://minerals.usgs.gov/minerals/pubs/mcs/2007/mcs2007.pdf> [Accessed 25 May 2010]
  property zinc content 0.53; name zinc_C_zinc_concentrate
    Zinc content on a dry matter basis. Value taken from teh "zinc mine operation" /GLO dataset.
  property dry mass 1 kg; name DM_zinc_concentrate
  property carbon content 0
    carbon content on a dry matter basis (reserved; not for manual entry)
  property true value 2.95721e-10
    allocation property applied in "true value" allocation // value calculated from revenue
  properties: wet mass 1 kg, water content 0, carbon content, non-fossil 0, carbon content, fossil 0, water in wet mass 0 kg, carbon allocation 0 kg

## Inputs from technosphere
- municipal solid waste: -2.45864e-6 kg; name municipal_waste; source Bauer, C. 2007
  literature
  production volume 1239.84 kg; = apv_heat*municipal_waste
    Calculated from the production volume of heat, district or industrial, other than natural gas in proportion to the respective output amounts.
  property price 0 EUR2005; name municipal_waste_price_EUR2005
  properties: wet mass 1 kg, carbon content, non-fossil 0.261655, dry mass 0.771 kg, water content 0.297017, carbon content, fossil 0.171549
  note on carbon content, non-fossil: MSW composition in tab 4.1, ecoinvent v2.2 report 13_I. C content referred to 1 kg DM
- wastewater, average: -5.89924e-7 m3; name sewage; = ((water_decarbonised/1000) )*-1
  general assumption
  Amount was scaled to the amount of reference product.
  production volume 297.486 m3; = apv_heat*sewage
    (same comment as for municipal solid waste)
  property price 0 EUR2005; name sewage_price_EUR2005
  properties: wet mass 1000 kg, water content 2882.2, dry mass 0.346837 kg, carbon content, non-fossil 0.194039
  note on carbon content, non-fossil: 0.0673 kg TOC/m3 (Tab A.17, ecoinvent v2.2 report 13_I). TOC was considered as Total Carbon.
- waste mineral oil: -2.45864e-6 kg; name waste_oil; = ((lubricating_oil) )*-1
  literature
  production volume 1239.84 kg; = apv_heat*waste_oil
    (same comment as for municipal solid waste)
  property price 0 EUR2005; name waste_oil_price_EUR2005
  properties: wet mass 1 kg, carbon content, fossil 0.864444, dry mass 0.9 kg, water content 0.111111
  note on carbon content, fossil: Tab A.6, ecoinvent v2.2 report 13_I. C content has been calculated after data in the tables, and then referred to 1 kg DM
- wood ash mixture, pure: -0.000396531 kg; name wood_ash; source Bauer, C. 2007
  literature
  production volume 199962 kg; = apv_heat*wood_ash
    (same comment as for municipal solid waste)
  property price 0 EUR2005; name wood_ash_price_EUR2005
  properties: dry mass 1 kg, carbon content, non-fossil 0.012, wet mass 1 kg
- sodium chloride, powder: 3.0733e-6 kg; source Bauer, C. 2007
  literature
  properties: wet mass 1 kg, dry mass 1 kg
- chemical, organic: 4.38508e-6 kg; source Bauer, C. 2007
  literature
  properties: carbon content, fossil 0.628, dry mass 1 kg, wet mass 1 kg
  note on carbon content, fossil: This dataset is an unweighted average of 20 organic substances (listed in Tab 88.1, ecoinvent v2.2 report 8, part II), being part of the top100 chemicals included in this database. The C-content has also been calculated as an unweighted average of the C content of the substances composing this dataset.
- water, decarbonised: 0.000589924 kg; name water_decarbonised; source Bauer, C. 2007
  literature
  properties: wet mass 1 kg
- chlorine, liquid: 2.45864e-7 kg; source Bauer, C. 2007
  literature
  properties: dry mass 1 kg, wet mass 1 kg
- ammonia, liquid: 6.14661e-9 kg; source Bauer, C. 2007
  literature
  properties: wet mass 1 kg, dry mass 1 kg
- lubricating oil: 2.45864e-6 kg; name lubricating_oil; source Bauer, C. 2007
  literature
  properties: dry mass 1 kg, wet mass 1 kg, carbon content, fossil 0.75
  note on carbon content, fossil: Lubricating oil is produced from diesel. C-content/dry mass of fats and oils considered 75%, from: ecoinvent v2.2 report, n 15a, pg 40
- wood chips, wet, measured as dry mass: 0.0396607 kg; = 1/18.9
  Calculated value.
  LHV of wood chips: 18.9 MJ/kg (dry mass)
  properties: carbon content, non-fossil 0.494, water content 1.1, wet mass 2.1 kg, dry mass 1 kg
- dust collector, electrostatic precipitator, for industrial use: 3.9039e-10 unit; = 1/(4000*6667*20*3.6)
  calculated value, assuming 4000h/a operation time, 20a lifetime, 6667kW (fuel input) capacity
- furnace, wood chips, with silo, 5000kW: 3.9039e-10 unit; = 1/(4000*6667*20*3.6)
  (same comment as for dust collector, electrostatic precipitator, for industrial use)
- heat and power co-generation unit, organic Rankine cycle, 1000kW electrical: 3.9039e-10 unit; = 1/(4000*6667*20*3.6)
  (same comment as for dust collector, electrostatic precipitator, for industrial use)
- NOx retained, by selective catalytic reduction: 5.99669e-5 kg; source Thomas Nussbaumer 2014
  expert estimation (see source)
  properties: dry mass 1 kg, wet mass 1 kg

## Emissions to nature
- Magnesium [air, urban air close to ground]: 2.69851e-7 kg; source Bauer, C. 2007
  literature
- Benzene [air, urban air close to ground]: 6.82124e-7 kg; source Bauer, C. 2007
  literature
- Formaldehyde [air, urban air close to ground]: 9.74462e-8 kg; source Bauer, C. 2007
  literature
- Chlorine [air, urban air close to ground]: 1.34926e-7 kg; source Bauer, C. 2007
  literature
- Carbon dioxide, non-fossil [air, urban air close to ground]: 0.0719603 kg; source Bauer, C. 2007
  literature
- Particulates, < 2.5 um [air, urban air close to ground]: 3.74793e-6 kg; source Thomas Nussbaumer 2014
  expert estimation (see source)
- Toluene [air, urban air close to ground]: 2.24876e-7 kg; source Bauer, C. 2007
  literature
- Fluorine [air, urban air close to ground]: 3.74793e-8 kg; source Bauer, C. 2007
  literature
- m-Xylene [air, urban air close to ground]: 8.99504e-8 kg; source Bauer, C. 2007
  literature
- Methane, non-fossil [air, urban air close to ground]: 8.99504e-7 kg; source Thomas Nussbaumer 2014
  expert estimation (see source)
- Dinitrogen monoxide [air, urban air close to ground]: 1.72405e-6 kg; source Bauer, C. 2007
  literature
- Potassium [air, urban air close to ground]: 1.75403e-5 kg; source Bauer, C. 2007
  literature
- Ammonia [air, urban air close to ground]: 1.2743e-5 kg; source Bauer, C. 2007
  literature
- Benzene, hexachloro- [air, urban air close to ground]: 5.39702e-15 kg; source Bauer, C. 2007
  literature
- Sulfur dioxide [air, urban air close to ground]: 1.87397e-6 kg; source Bauer, C. 2007
  literature
- Phosphorus [air, urban air close to ground]: 2.24876e-7 kg; source Bauer, C. 2007
  literature
- Dioxins, measured as 2,3,7,8-tetrachlorodibenzo-p-dioxin [air, urban air close to ground]: 2.32372e-14 kg; source Bauer, C. 2007
  literature
- PAH, polycyclic aromatic hydrocarbons [air, urban air close to ground]: 8.32041e-9 kg; source Bauer, C. 2007
  literature
- Cadmium [air, urban air close to ground]: 5.2471e-10 kg; source Bauer, C. 2007
  literature
- Benzo(a)pyrene [air, urban air close to ground]: 3.74793e-10 kg; source Bauer, C. 2007
  literature
- Benzene, ethyl- [air, urban air close to ground]: 2.24876e-8 kg; source Bauer, C. 2007
  literature
- Nickel [air, urban air close to ground]: 4.49752e-9 kg; source Bauer, C. 2007
  literature
- Calcium [air, urban air close to ground]: 4.38508e-6 kg; source Bauer, C. 2007
  literature
- Lead [air, urban air close to ground]: 1.87397e-8 kg; source Bauer, C. 2007
  literature
- Hydrocarbons, aliphatic, unsaturated [air, urban air close to ground]: 2.32372e-6 kg; source Bauer, C. 2007
  literature
- Hydrocarbons, aliphatic, alkanes, unspecified [air, urban air close to ground]: 6.82124e-7 kg; source Bauer, C. 2007
  literature
- Carbon monoxide, non-fossil [air, urban air close to ground]: 7.49586e-5 kg; source Thomas Nussbaumer 2014
  expert estimation (see source)
- Water [air, non-urban air or from high stacks]: 4.36259e-5 m3
  calculation based on water balance
- Mercury [air, urban air close to ground]: 2.24876e-10 kg; source Bauer, C. 2007
  literature
- Phenol, pentachloro- [air, urban air close to ground]: 6.07165e-12 kg; source Bauer, C. 2007
  literature
- Chromium [air, urban air close to ground]: 2.96836e-9 kg; source Bauer, C. 2007
  literature
- Zinc [air, urban air close to ground]: 2.24876e-7 kg; source Bauer, C. 2007
  literature
- Chromium VI [air, urban air close to ground]: 2.99835e-11 kg; source Bauer, C. 2007
  literature
- Manganese [air, urban air close to ground]: 1.2743e-7 kg; source Bauer, C. 2007
  literature
- Nitrogen oxides [air, urban air close to ground]: 5.99669e-5 kg; source Thomas Nussbaumer 2014
  expert estimation (see source)
- Sodium [air, urban air close to ground]: 9.74462e-7 kg; source Bauer, C. 2007
  literature
- Copper [air, urban air close to ground]: 1.64909e-8 kg; source Bauer, C. 2007
  literature
- Bromine [air, urban air close to ground]: 4.49752e-8 kg; source Bauer, C. 2007
  literature
- Acetaldehyde [air, urban air close to ground]: 4.57248e-8 kg; source Bauer, C. 2007
  literature
- NMVOC, non-methane volatile organic compounds, unspecified origin [air, urban air close to ground]: 2.09884e-6 kg; source Thomas Nussbaumer 2014
  expert estimation (see source)
- Arsenic [air, urban air close to ground]: 7.49586e-10 kg; source Bauer, C. 2007
  literature

## Sampling procedure
literature, expert judgement, extrapolation
