# solar collector system installation, evacuated tube collector, one-family house, combined system

Dataset: EcoSpold 2, unit process
Geography: CH
Time period: 2002-01-01 to 2019-12-31
Technology level: current
Classification: EcoSpold01Categories: solar collector systems/systems
Classification: ISIC rev.4 ecoinvent: 4322a: Installation of solar collector systems
Tags: ConvertedDataset
Scenario: Business-as-Usual
System model: Allocation at the point of substitution
Generated by: Niels Jungbluth
Published in: Jungbluth, N. 2007
Database: ecoinvent
isCopyrightProtected: true
accessRestrictedTo: 1

## General comment
Solar system with an evacuated tube collector for hot water and auxiliary heating.
[This dataset was already contained in the ecoinvent database version 2. It was not individually updated during the transfer to ecoinvent version 3. Life Cycle Impact Assessment results may still have changed, as they are affected by changes in the supply chain, i.e. in other datasets. This dataset was generated following the ecoinvent quality guidelines for version 2. It may have been subject to central changes described in the ecoinvent version 3 change report (http://www.ecoinvent.org/database/ecoinvent-version-3/reports-of-changes/), and the results of the central updates were reviewed extensively. The changes added e.g. consistent water flows and other information throughout the database. The documentation of this dataset can be found in the ecoinvent reports of version 2, which are still available via the ecoinvent website. The change report linked above covers all central changes that were made during the conversion process.]

## Included activities end
Production and disposal of a complete solar system (excluding auxiliary heating). Including different components, heat exchange fluid, installation copper pipes, transports of parts to CH, delivery with a van and montage on the roof.

## Geography
Solar collector system operated in CH.

## Technology
Solar collector system for room heating and hot water installed on the roof of a house.

## Time period
Material data have been investigated for a collector produced in 2002. Data for energy uses during production have been investigated for 2001.

## Parameters
- fraction, water, completely softened, to air: 0.15; name fraction_WCS_to_air; = fraction_PW_to_air; lognormal variance with pedigree 0.092025, pedigree (4,4,3,2,4)
  Calculated value. See comment in the other parametres present in this dataset. Water, completely softened is considered to be always used as process water, thus process water fractions to air are applied to all water, completely softened input flows to calculate the amount of water consumed in the processes.
- fraction, process water, to air: 0.15 dimensionless; name fraction_PW_to_air; lognormal variance with pedigree 0.092025, pedigree (4,4,3,2,4)
  Literature value. In case when no industry/process specific data are available, default evaporation fraction value is used. This value is 15% and is based on literature (Statistics Canada, 2007 & Shaffer, K.H., 2008, Consumptive water use in the Great Lakes Basin, USGS & Shiklomanov, 2003, World Water Resources at the Beginning of the 21st Century) and has been approved by an expert.

## Reference product
- solar collector system, with evacuated tube collector, one-family house, combined system: 1 unit; By-product classification allocatable product; CPC 54631: Heating equipment installation services
  production volume 0.0336675 unit
    This is a placeholder value that does not reflect real-world production volumes. This dataset does not currently require a real-world production volume to work in the database framework, and no actual data were collected yet. This has no negative effect on the results of the ecoinvent database. The placeholder value of this activity was scaled according to the nominal GDP of 2005 (source: United Nations, http://data.un.org/Glossary.aspx?q=GDP+%28current+US%24%29, accessed 20130726) to reflect an appropriate share of the global production volume, which is also a placeholder value.
  property price 13239.3 EUR2005
    Calculated based on inputs: The price of the product has been calculated as a sum of the values of the material and energy inputs for this product. This value is therefore a rough estimation. It may underestimate the real price since there are additional expenses when producing any product. These expences can include for example labour costs, treatment of waste materials and profit for the producer. Please consider carefully whether this level of data quality is acceptable for your application.
  property true value 13239.3
    allocation property applied in "true value" allocation // value calculated from revenue

## By-products
- electricity, for reuse in municipal waste incineration only: 0 kWh; CPC 17100: Electrical energy; By-product classification allocatable product; pedigree (1,1,1,1,1)
  Net electricity generated from this waste and used in internal MSWI plant energy redistribution.
  Uncertainty: uncertainty is calculated from uncertainties in waste composition and uncertainties in energy efficiency and the uncertainty in internal energy demand
  production volume 0.00238203 kWh
  property exergy 3.6 MJ; name E_el_prod_MSWI_exergy
    This exergy property is based on the exergy content of the product.
  property true value relation 3.6; name E_el_prod_MSWI_true_value_relation
    property to calculate "true value" from
  property price 0.1 EUR2005; name E_el_prod_MSWI_price_EUR2005
    Estimated to be the same price as in case of electricity, medium voltage.
  property true value 0.000306047
    allocation property applied in "true value" allocation // value calculated from true value relation
- heat, for reuse in municipal waste incineration only: 0 MJ; CPC 17300: Steam and hot water; By-product classification allocatable product; pedigree (1,1,1,1,1)
  Net useful heat generated from this waste and used in internal MSWI plant energy redistribution.
  Uncertainty: uncertainty is calculated from uncertainties in waste composition and uncertainties in energy efficiency and the uncertainty in internal energy demand
  production volume 0.0168515 MJ
  property true value relation 0.1842; name E_th_prod_MSWI_true_value_relation
    property to calculate "true value" from
  property exergy 0.1842 MJ; name E_th_prod_MSWI_exergy
    This exergy property is based on the exergy content of the product.
  property price 0.0106 EUR2005; name E_th_prod_MSWI_price_EUR2005
    Average European district heat price from Ecoheatcool and Euroheat 2005-2006, Ecoheat Work package 1: The European heat market. Final report. 10.6 EUR/GJ i s the price of district heat. http://www.solarthermalworld.org/files/Ecoheatcool%20WP1%20Web.pdf?download
  property true value 0.000110781
    (same comment as for electricity, for reuse in municipal waste incineration only)
- zinc concentrate: 0 kg; CPC 14290: Other non-ferrous metal ores and concentrates (other than uranium or thorium ores and concentrates); By-product classification allocatable product
  Calculated value from the knowledge of the properties of both products.
  production volume 5.97723e-7 kg
  property price 0.38 EUR2005; name ByP_price_EUR2005
    Temporary price data. Calculated as 90% of purchasers price based on: Zinc content in concentrate 53%. Concentrate price per kg Zn 86.5% of refined Zn price (13.5% treatment charges according to CHR Metals Limited 2005: Dynamic cost curves. http://www.minecost.com/dynamic.pdf). 2004 zinc price from USGS (2007) Mineral commodity summaries 2007. <http://minerals.usgs.gov/minerals/pubs/mcs/2007/mcs2007.pdf> [Accessed 25 May 2010]
  property zinc content 0.53; name zinc_C_zinc_concentrate
    Zinc content on a dry matter basis. Value taken from teh "zinc mine operation" /GLO dataset.
  property dry mass 1 kg; name DM_zinc_concentrate
  property carbon content 0
    carbon content on a dry matter basis (reserved; not for manual entry)
  property true value 2.27135e-7
    allocation property applied in "true value" allocation // value calculated from revenue
  properties: wet mass 1 kg, water content 0, carbon content, non-fossil 0, carbon content, fossil 0, water in wet mass 0 kg, carbon allocation 0 kg

## Inputs from technosphere
- copper: 16 kg; lognormal variance with pedigree 0.06, pedigree (3,5,5,1,1)
  Plant data, warm water pipes
  Plant data, warm water pipes
  properties: wet mass 1 kg, dry mass 1 kg
- expansion vessel, 25l: 1 unit; lognormal variance with pedigree 0.06, pedigree (3,5,5,1,1)
  Estimation
  This exchange has an activity link directly to the producing activity because the product is primarily consumed in the same geographical area where it is produced.
- drawing of pipe, steel: 16 kg; lognormal variance with pedigree 0.068, pedigree (3,5,5,1,3)
  Estimation for copper pipes
  Estimation for copper pipes
- evacuated tube collector: 10.5 m2; lognormal variance with pedigree 0.06, pedigree (3,5,5,1,1)
  Estimation
  Estimation
- heat carrier liquid, 40% C3H8O2: -0.0984 m3; lognormal variance with pedigree 0.06, pedigree (3,5,5,1,1)
  Estimation
  Estimation
  production volume 0.0984 m3
    Calculated from the production volume of solar collector system, with evacuated tube collector, one-family house, combined system in proportion to the respective output amounts.
  properties: water content 157.387, carbon content, fossil 3, wet mass 1000 kg, price 1.08656 EUR2005, dry mass 6.31366 kg
  note on carbon content, fossil: The composition of the product was used to estimate its carbon content: 40% (w/v) C3H8O2.
- tube insulation, elastomere: 5.2 kg; lognormal variance with pedigree 0.06, pedigree (3,5,5,1,1)
  Plant data
  Plant data
  properties: wet mass 1 kg, carbon content, fossil 0.837817, dry mass 1 kg
  note on carbon content, fossil: The main raw material (93%) is synthetic rubber (Ethylene propylene diene monomer (EPDM)), that is used together with PVC (ecoinvent v2.2 report 7_XV), C2H3Cl
- water, completely softened: 57 kg; name water_softened_input; lognormal variance with pedigree 0.06, pedigree (3,5,5,1,1)
  Plant data, exchange after 10a life time
  Plant data, exchange after 10a life time
  properties: wet mass 1 kg
- pump, 40W: 3.12 unit; lognormal variance with pedigree 0.06, pedigree (3,5,5,1,1)
  Estimation, extrapolation for life time of 10a
  This exchange has an activity link directly to the producing activity because the product is primarily consumed in the same geographical area where it is produced.
- heat storage, 2000l: 0.87 unit; lognormal variance with pedigree 0.06, pedigree (3,5,5,1,1)
  Extrapolated by weight
  This exchange has an activity link directly to the producing activity because the product is primarily consumed in the same geographical area where it is produced.
- propylene glycol, liquid: 41.4 kg; lognormal variance with pedigree 0.06, pedigree (3,5,5,1,1)
  Plant data, exchange after 10a life time
  Plant data, exchange after 10a life time
  properties: wet mass 1 kg, dry mass 1 kg, carbon content, fossil 0.473684

## Emissions to nature
- Water [air, unspecified]: 0.00855 m3; name water_to_air_unspecified; = (water_softened_input/1000*fraction_WCS_to_air); lognormal variance with pedigree 0.0807, pedigree (2,2,5,1,1)
  Calculated value based on literature values and expert opinion. See comments in the parametres' comment field.
  property fraction, origin: salt water 0; name fraction_origin_salt_water
  property fraction, origin: unspecified 0; name fraction_origin_unspecified
  property fraction, origin: fresh water 1; name fraction_origin_fresh_water
- Water [water, unspecified]: 0.04845 m3; name water_to_water_unspecified; = (water_softened_input/1000)*(1-fraction_WCS_to_air); lognormal variance with pedigree 0.0807, pedigree (2,2,5,1,1)
  (same comment as for Water)
  property carbon content, non-fossil 0; name C_content_non_fossil
  property water in wet mass 1000 kg; name WWM
  property wet mass 1000 kg; name WM
  property carbon content, fossil 0; name C_content_fossil
  property dry mass 0 kg; name DM
  property fraction, origin: fresh water 1; name fraction_origin_fresh_water_Ww
  property fraction, origin: salt water 0; name fraction_origin_salt_water_Ww
  property fraction, origin: unspecified 0; name fraction_origin_unspecified_Ww

## Sampling procedure
Own simulation.

## Review by Sebastiano Meier 2003-06-16
Passed.
