# treatment of waste plastic, mixture, sanitary landfill

Dataset: EcoSpold 2, unit process
Geography: CH
Time period: 1994-01-01 to 2019-12-31
Technology level: current
Classification: EcoSpold01Categories: waste management/sanitary landfill
Classification: ISIC rev.4 ecoinvent: 3821:Treatment and disposal of non-hazardous waste
Tags: ConvertedDataset; Treatment
Scenario: Business-as-Usual
System model: Allocation at the point of substitution
Generated by: Gabor Doka (obsolete)
Published in: Doka G. 2007
Database: ecoinvent
isCopyrightProtected: true
accessRestrictedTo: 1

## General comment
Inventoried waste contains 100% Mixed various plastics; .
waste composition (wet, in ppm): upper heating value 34.05 MJ/kg; lower heating value 30.79 MJ/kg; H2O 153000; O 73717; H 105910; C 633590; S 1406.7; N 6112; P n.a.; B n.a.; Cl 18131; Br 65.319; F 13.717; I n.a.; Ag n.a.; As 1.7729; Ba 174.03; Cd 75.786; Co 29.478; Cr 38.132; Cu 296.41; Hg 0.79234; Mn 74.574; Mo n.a.; Ni 19.222; Pb 435.81; Sb 40.093; Se 1.9596; Sn 24.453; V 268.88; Zn 521.69; Be 0.46656; Sc n.a.; Sr 82.582; Ti 933.13; Tl 0.37325; W n.a.; Si n.a.; Fe 3476.5; Ca n.a.; Al 186.63; K n.a.; Mg n.a.; Na 1367.5;
Share of carbon in waste that is biogenic 0%.
Overall degradability of waste during 100 years: 1%.
[This dataset was already contained in the ecoinvent database version 2. It was not individually updated during the transfer to ecoinvent version 3. Life Cycle Impact Assessment results may still have changed, as they are affected by changes in the supply chain, i.e. in other datasets. This dataset was generated following the ecoinvent quality guidelines for version 2. It may have been subject to central changes described in the ecoinvent version 3 change report (http://www.ecoinvent.org/database/ecoinvent-version-3/reports-of-changes/), and the results of the central updates were reviewed extensively. The changes added e.g. consistent water flows and other information throughout the database. The documentation of this dataset can be found in the ecoinvent reports of version 2, which are still available via the ecoinvent website. The change report linked above covers all central changes that were made during the conversion process.]

## Included activities end
Waste-specific short-term emissions to air via landfill gas incineration and landfill leachate. Burdens from treatment of short-term leachate (0-100a) in wastewater treatment plant (including WWTP sludge disposal in municipal incinerator). Long-term emissions from landfill to groundwater (after base lining failure).

## Geography
Technology encountered in Switzerland in 2000. Landfill includes base seal, leachate collection system, treatment of leachate in municipal wastewater treatment plant.

## Technology
Swiss municipal sanitary landfill for biogenic or untreated municipal waste ('reactive organic landfill'). Landfill gas and leachate collection system. Recultivation and monitoring for 150 years after closure.

## Reference product
- waste plastic, mixture: -1 kg; CPC 39270: Waste, parings and scrap of plastics; By-product classification Waste
  production volume 0 kg
    estimated proportion; source: ecoinvent v2; value to be replaced by value to be calculated from the demand for this treatment activity
  property carbon content, fossil 0.747344
    C content in 1 kg DM was calculated using data in Tab A.2, ecoinvent v2.2 report 13_I
  property price 0 EUR2005
    Waste products are assigned a price of zero as they are assumed to require further treatment.
  property carbon content 0.747344
    carbon content on a dry matter basis (reserved; not for manual entry)
  properties: wet mass 1 kg, water in wet mass 0.153 kg, water content 0.180638, dry mass 0.847 kg, carbon content, non-fossil 0, carbon allocation 0.633 kg

## By-products
- electricity, for reuse in municipal waste incineration only: 0 kWh; CPC 17100: Electrical energy; By-product classification allocatable product; pedigree (1,1,1,1,1)
  Net electricity generated from this waste and used in internal MSWI plant energy redistribution.
  Uncertainty: uncertainty is calculated from uncertainties in waste composition and uncertainties in energy efficiency and the uncertainty in internal energy demand
  property exergy 3.6 MJ; name E_el_prod_MSWI_exergy
  property true value relation 3.6; name E_el_prod_MSWI_true_value_relation
  property price 0.1 EUR2005; name E_el_prod_MSWI_price_EUR2005
- heat, for reuse in municipal waste incineration only: 0 MJ; CPC 17300: Steam and hot water; By-product classification allocatable product; pedigree (1,1,1,1,1)
  Net useful heat generated from this waste and used in internal MSWI plant energy redistribution.
  Uncertainty: uncertainty is calculated from uncertainties in waste composition and uncertainties in energy efficiency and the uncertainty in internal energy demand
  property true value relation 0.1842; name E_th_prod_MSWI_true_value_relation
  property exergy 0.1842 MJ; name E_th_prod_MSWI_exergy
  property price 0.0106 EUR2005; name E_th_prod_MSWI_price_EUR2005
- zinc concentrate: 0 kg; CPC 14290: Other non-ferrous metal ores and concentrates (other than uranium or thorium ores and concentrates); By-product classification allocatable product
  Calculated value from the knowledge of the properties of both products.
  property price 0.38 EUR2005; name ByP_price_EUR2005
    Temporary price data. Calculated as 90% of purchasers price based on: Zinc content in concentrate 53%. Concentrate price per kg Zn 86.5% of refined Zn price (13.5% treatment charges according to CHR Metals Limited 2005: Dynamic cost curves. http://www.minecost.com/dynamic.pdf). 2004 zinc price from USGS (2007) Mineral commodity summaries 2007. <http://minerals.usgs.gov/minerals/pubs/mcs/2007/mcs2007.pdf> [Accessed 25 May 2010]
  property zinc content 0.53; name zinc_C_zinc_concentrate
    Zinc content on a dry matter basis. Value taken from teh "zinc mine operation" /GLO dataset.
  property dry mass 1 kg; name DM_zinc_concentrate
  property carbon content 0
    carbon content on a dry matter basis (reserved; not for manual entry)
  properties: wet mass 1 kg, water content 0, carbon content, non-fossil 0, carbon content, fossil 0, water in wet mass 0 kg, carbon allocation 0 kg

## Inputs from technosphere
- municipal waste incineration facility: 3.07e-14 unit; lognormal variance with pedigree 0.66, pedigree (1,1,5,1,1)
  Burden from incineration of sludge from wastewater treatment of the short-term leachate (0-100a).
  Burden from incineration of sludge from wastewater treatment of the short-term leachate (0-100a).
- hydrochloric acid, without water, in 30% solution state: 1.73e-10 kg; lognormal variance with pedigree 0.88, pedigree (1,1,5,1,1)
  burden from incineration of sludge from wastewater treatment of the short-term leachate (0-100a). uncertainty is calculated from uncertainties in waste composition and transfer coefficients in incinerator and uncertainty of waste decomposition and short-term leaching in sanitary landfill
  properties: wet mass 1 kg, dry mass 1 kg
- chemical, inorganic: 2.88e-10 kg; lognormal variance with pedigree 0.88, pedigree (1,1,5,1,1)
  (same comment as for hydrochloric acid, without water, in 30% solution state)
  properties: wet mass 1 kg, dry mass 1 kg, carbon content, fossil 0.003
  note on carbon content, fossil: This dataset is an unweighted average of 20 inorganic substances (listed in Tab 88.1, ecoinvent v2.2 report 8, part II), being part of the top100 chemicals included in this database. The C-content has also been calculated as an unweighted average of the C content of the substances composing this dataset.
- residual material landfill: 1.81e-15 unit; lognormal variance with pedigree 0.45, pedigree (1,1,5,1,1)
  (same comment as for hydrochloric acid, without water, in 30% solution state)
- heat, for reuse in municipal waste incineration only: 0.000103 MJ; name E_th_prod_MSWI; lognormal variance with pedigree 0.66, pedigree (1,1,5,1,1)
  (same comment as for hydrochloric acid, without water, in 30% solution state)
- sewer grid, 5E9l/year, 110 km: 5.45e-10 km; lognormal variance with pedigree 0.2106, pedigree (5,5,5,5,5)
  burden from wastewater treatment of the short-term leachate (0-100a). Uncertainty calculated from unertainty of the waste composition of this waste, uncertainty in waste decomposition and short-term leaching in sanitary landfill
- electricity, for reuse in municipal waste incineration only: 1.77e-5 kWh; name E_el_prod_MSWI; lognormal variance with pedigree 1.03, pedigree (1,1,5,1,1)
  (same comment as for hydrochloric acid, without water, in 30% solution state)
- process-specific burdens, slag landfill: 3.89e-6 kg; lognormal variance with pedigree 0.56, pedigree (1,1,5,1,1)
  burden from incineration of sludge from wastewater treatment of the short-term leachate (0-100a). uncertainty is calculated from uncertainties in waste composition and transfer coefficients in incinerator and uncertainty of waste decomposition and short-term leaching in sanitary landfill;activityLink introduced to establish a direct link to the corresponding regional supply of this product
- waste cement, hydrated: -8.69e-7 kg; lognormal variance with pedigree 0.46, pedigree (1,1,5,1,1)
  (same comment as for hydrochloric acid, without water, in 30% solution state)
  production volume 0 kg
    Calculated from the production volume of waste plastic, mixture, 15.3% water in proportion to the respective output amounts.
  properties: dry mass 1 kg, wet mass 1 kg
- slag landfill: 6.92e-15 unit; lognormal variance with pedigree 0.56, pedigree (1,1,5,1,1)
  (same comment as for hydrochloric acid, without water, in 30% solution state)
- waste plastic, mixture: -3.88e-5 kg; lognormal variance with pedigree 0.2106, pedigree (5,5,5,5,5)
  (same comment as for sewer grid, 5E9l/year, 110 km)
  properties: wet mass 1 kg, water content 0.180638, dry mass 0.847 kg, carbon content, fossil 0.747344
  note on carbon content, fossil: C content in 1 kg DM was calculated using data in Tab A.2, ecoinvent v2.2 report 13_I
- titanium dioxide: 6.15e-9 kg; lognormal variance with pedigree 0.84, pedigree (1,1,5,1,1)
  (same comment as for hydrochloric acid, without water, in 30% solution state)
  properties: dry mass 1 kg, wet mass 1 kg
- waste graphical paper: -3.88e-5 kg; lognormal variance with pedigree 0.2106, pedigree (5,5,5,5,5)
  (same comment as for sewer grid, 5E9l/year, 110 km)
  production volume 0 kg
    (same comment as for waste cement, hydrated)
  properties: carbon content, non-fossil 0.454955, dry mass 0.888 kg, wet mass 1 kg, water content 0.126126
- process-specific burdens, residual material landfill: 8.69e-7 kg; lognormal variance with pedigree 0.45, pedigree (1,1,5,1,1)
  (same comment as for process-specific burdens, slag landfill)
- electricity, low voltage: 0.000897 kWh; lognormal variance with pedigree 0.49, pedigree (5,5,5,5,5)
  (same comment as for sewer grid, 5E9l/year, 110 km)
- ammonia, liquid: 2.15e-7 kg; lognormal variance with pedigree 0.59, pedigree (1,1,5,1,1)
  (same comment as for hydrochloric acid, without water, in 30% solution state)
  properties: dry mass 1 kg, wet mass 1 kg
- cement, unspecified: 3.48e-7 kg; lognormal variance with pedigree 0.46, pedigree (1,1,5,1,1)
  (same comment as for hydrochloric acid, without water, in 30% solution state)
  properties: wet mass 1 kg, dry mass 1 kg
- process-specific burdens, sanitary landfill: 1 kg; lognormal variance with pedigree 0.04, pedigree (1,1,5,1,1)
  demands per kilogram waste. uncertainty is heeded in the module;activityLink introduced to establish a direct link to the corresponding regional supply of this product
- chemical, organic: 2.05e-7 kg; lognormal variance with pedigree 1.63, pedigree (1,1,5,1,1)
  (same comment as for hydrochloric acid, without water, in 30% solution state)
  properties: dry mass 1 kg, wet mass 1 kg, carbon content, fossil 0.628
  note on carbon content, fossil: This dataset is an unweighted average of 20 organic substances (listed in Tab 88.1, ecoinvent v2.2 report 8, part II), being part of the top100 chemicals included in this database. The C-content has also been calculated as an unweighted average of the C content of the substances composing this dataset.
- chromium oxide, flakes: 1.25e-10 kg; lognormal variance with pedigree 0.96, pedigree (5,5,5,5,5)
  burden from incineration of sludge from wastewater treatment of the short-term leachate (0-100a). Proxy for vanadium pentoxide V2O5 in SCR catalyst, uncertainty calculated from uncertainty in average DeNOx input, uncertainty in the share of thermal NOx, uncertainty of nitrogen content in average municipal waste and the unertainty in nitrogen content in *this* waste and uncertainty of waste decomposition and short-term leaching in sanitary landfill
  properties: dry mass 1 kg, wet mass 1 kg
- heat, central or small-scale, other than natural gas: 4.3334e-5 MJ; lognormal variance with pedigree 0.23, pedigree (5,5,5,5,5)
  (same comment as for sewer grid, 5E9l/year, 110 km)
- heat, district or industrial, natural gas: 7.8618e-5 MJ; lognormal variance with pedigree 0.23, pedigree (5,5,5,5,5)
  (same comment as for hydrochloric acid, without water, in 30% solution state)
- sodium hydroxide, without water, in 50% solution state: 1.07e-8 kg; lognormal variance with pedigree 0.51, pedigree (1,1,5,1,1)
  (same comment as for hydrochloric acid, without water, in 30% solution state)
  properties: dry mass 1 kg, wet mass 1 kg
- quicklime, milled, packed: 1.93e-9 kg; lognormal variance with pedigree 0.51, pedigree (1,1,5,1,1)
  (same comment as for hydrochloric acid, without water, in 30% solution state)
  properties: dry mass 0.99 kg, wet mass 1 kg, water content 0.010101
- wastewater treatment facility, capacity 5E9l/year: 1.42e-11 unit; lognormal variance with pedigree 0.2106, pedigree (5,5,5,5,5)
  (same comment as for sewer grid, 5E9l/year, 110 km)
- iron (III) chloride, without water, in 40% solution state: 4.88e-8 kg; lognormal variance with pedigree 0.94, pedigree (1,1,5,1,1)
  (same comment as for hydrochloric acid, without water, in 30% solution state)
  properties: wet mass 1 kg, dry mass 1 kg
- process-specific burdens, municipal waste incineration: 0.000123 kg; lognormal variance with pedigree 0.66, pedigree (1,1,5,1,1)
  Burden from incineration of sludge from wastewater treatment of the short-term leachate (0-100a).
  Burden from incineration of sludge from wastewater treatment of the short-term leachate (0-100a).;activityLink introduced to establish a direct link to the corresponding regional supply of this product
- sanitary landfill facility: 5.56e-10 unit; lognormal variance with pedigree 0.04, pedigree (1,1,5,1,1)
  demands per kilogram waste. uncertainty is heeded in the module
  This exchange has an activity link directly to the producing activity because the product is primarily consumed in the same geographical area where it is produced.

## Emissions to nature
- Lead [water, ground-, long-term]: 0.000436 kg; lognormal variance with pedigree 0.81, pedigree (1,1,5,1,1)
  Emissions from long-term leachate (>100a) directly from MSW landfill and indirectly via incineration of treatement sludge from leachate treatement. Uncertainty calculated depending on waste input and uncertainty of long-term transfer coefficents in landfill.
- Chloride [water, surface water]: 0.000457 kg; lognormal variance with pedigree 0.6, pedigree (1,1,5,1,1)
  Emissions from short-term leachate treatment. Uncertainty calculated depending on waste input and uncertainty of transfer coefficents in landfill and wastewater treatment.
- Antimony [water, surface water]: 2.87e-8 kg; lognormal variance with pedigree 1.77, pedigree (1,1,5,1,1)
  Emissions from short-term leachate treatment and incineration of resulting sludge. Uncertainty calculated depending on waste input and uncertainty of transfer coefficents in landfill, wastewater treatment and incineration model.
- Iron, ion [water, ground-, long-term]: 0.000244 kg; lognormal variance with pedigree 2.31, pedigree (1,1,5,1,1)
  (same comment as for Lead)
- Thallium [water, surface water]: 1.1e-10 kg; lognormal variance with pedigree 2.46, pedigree (1,1,5,1,1)
  (same comment as for Antimony)
- Ammonium, ion [water, ground-, long-term]: 0.00243 kg; lognormal variance with pedigree 0.47, pedigree (1,1,5,1,1)
  (same comment as for Lead)
- BOD5, Biological Oxygen Demand [water, surface water]: 3.66e-5 kg; lognormal variance with pedigree 0.87, pedigree (1,1,5,1,1)
  (same comment as for Antimony)
- Nitrate [water, surface water]: 0.000269 kg; lognormal variance with pedigree 0.47, pedigree (1,1,5,1,1)
  (same comment as for Antimony)
- Sodium [air, non-urban air or from high stacks]: 1.41e-8 kg; lognormal variance with pedigree 1.91, pedigree (1,1,5,1,1)
  burden from direct release or incineration of landfill biogas. Uncertainty calculated from unertainty of the waste composition of this waste, uncertainty in waste decomposition and short-term leaching in sanitary landfill
- Thallium [water, ground-, long-term]: 3.73e-7 kg; lognormal variance with pedigree 1.73, pedigree (1,1,5,1,1)
  (same comment as for Lead)
- Aluminium [water, surface water]: 5.6e-9 kg; lognormal variance with pedigree 1.66, pedigree (1,1,5,1,1)
  (same comment as for Antimony)
- TOC, Total Organic Carbon [water, surface water]: 2.94e-5 kg; lognormal variance with pedigree 0.86, pedigree (1,1,5,1,1)
  (same comment as for Antimony)
- Aluminium [air, urban air close to ground]: 1.37e-10 kg; lognormal variance with pedigree 1.7, pedigree (1,1,5,1,1)
  (same comment as for Antimony)
- Tin [air, urban air close to ground]: 1.11e-12 kg; lognormal variance with pedigree 2.25, pedigree (1,1,5,1,1)
  (same comment as for Antimony)
- Aluminium [air, non-urban air or from high stacks]: 2.33e-11 kg; lognormal variance with pedigree 2.74, pedigree (1,1,5,1,1)
  (same comment as for Sodium)
- Zinc, ion [water, ground-, long-term]: 0.000431 kg; lognormal variance with pedigree 0.79, pedigree (1,1,5,1,1)
  (same comment as for Lead)
- Methane, fossil [air, urban air close to ground]: 1.04e-6 kg; lognormal variance with pedigree 0.91, pedigree (1,1,5,1,1)
  (same comment as for Antimony)
- Arsenic, ion [water, surface water]: 2.81e-9 kg; lognormal variance with pedigree 2.11, pedigree (1,1,5,1,1)
  (same comment as for Antimony)
- Selenium [air, non-urban air or from high stacks]: 5.17e-13 kg; lognormal variance with pedigree 3.25, pedigree (1,1,5,1,1)
  (same comment as for Sodium)
- Manganese [water, ground-, long-term]: 7.25e-5 kg; lognormal variance with pedigree 1.03, pedigree (1,1,5,1,1)
  (same comment as for Lead)
- Arsenic [air, non-urban air or from high stacks]: 4.46e-11 kg; lognormal variance with pedigree 2.67, pedigree (1,1,5,1,1)
  (same comment as for Sodium)
- Manganese [air, urban air close to ground]: 2.29e-15 kg; lognormal variance with pedigree 1.53, pedigree (1,1,5,1,1)
  (same comment as for Antimony)
- Selenium [water, ground-, long-term]: 5.53e-7 kg; lognormal variance with pedigree 1.92, pedigree (1,1,5,1,1)
  (same comment as for Lead)
- Iron [air, urban air close to ground]: 7.85e-12 kg; lognormal variance with pedigree 1.51, pedigree (1,1,5,1,1)
  (same comment as for Antimony)
- Strontium [air, non-urban air or from high stacks]: 1.2e-11 kg; lognormal variance with pedigree 2.83, pedigree (1,1,5,1,1)
  (same comment as for Sodium)
- NMVOC, non-methane volatile organic compounds, unspecified origin [air, non-urban air or from high stacks]: 1.7e-8 kg; lognormal variance with pedigree 0.46, pedigree (1,1,5,1,1)
  (same comment as for Sodium)
- DOC, Dissolved Organic Carbon [water, surface water]: 2.83e-5 kg; lognormal variance with pedigree 0.87, pedigree (1,1,5,1,1)
  (same comment as for Antimony)
- Tin, ion [water, ground-, long-term]: 2.45e-5 kg; lognormal variance with pedigree 1.19, pedigree (1,1,5,1,1)
  (same comment as for Lead)
- Nitrate [water, ground-, long-term]: 0.000256 kg; lognormal variance with pedigree 0.47, pedigree (1,1,5,1,1)
  (same comment as for Lead)
- Ammonium, ion [water, surface water]: 7.39e-5 kg; lognormal variance with pedigree 0.53, pedigree (1,1,5,1,1)
  (same comment as for Antimony)
- Mercury [air, non-urban air or from high stacks]: 2.17e-10 kg; lognormal variance with pedigree 2.46, pedigree (1,1,5,1,1)
  (same comment as for Sodium)
- Titanium [air, non-urban air or from high stacks]: 1.17e-10 kg; lognormal variance with pedigree 2.53, pedigree (1,1,5,1,1)
  (same comment as for Sodium)
- Beryllium [air, non-urban air or from high stacks]: 6.78e-14 kg; lognormal variance with pedigree 3.51, pedigree (1,1,5,1,1)
  (same comment as for Sodium)
- Ammonia [air, urban air close to ground]: 1.36e-7 kg; lognormal variance with pedigree 0.51, pedigree (1,1,5,1,1)
  (same comment as for Antimony)
- Vanadium [air, urban air close to ground]: 1.4e-11 kg; lognormal variance with pedigree 1.57, pedigree (1,1,5,1,1)
  (same comment as for Antimony)
- Cobalt [water, surface water]: 4.81e-8 kg; lognormal variance with pedigree 1.66, pedigree (1,1,5,1,1)
  (same comment as for Antimony)
- Lead [air, urban air close to ground]: 8.49e-13 kg; lognormal variance with pedigree 1.89, pedigree (1,1,5,1,1)
  (same comment as for Antimony)
- Barium [air, urban air close to ground]: 1.87e-9 kg; lognormal variance with pedigree 1.32, pedigree (1,1,5,1,1)
  (same comment as for Antimony)
- Chromium, ion [water, surface water]: 6.82e-12 kg; lognormal variance with pedigree 2.1, pedigree (1,1,5,1,1)
  (same comment as for Antimony)
- Cobalt [air, non-urban air or from high stacks]: 2.37e-11 kg; lognormal variance with pedigree 2.76, pedigree (1,1,5,1,1)
  (same comment as for Sodium)
- Chromium VI [water, surface water]: 2.28e-9 kg; lognormal variance with pedigree 2.07, pedigree (1,1,5,1,1)
  (same comment as for Antimony)
- Titanium, ion [water, surface water]: 2.37e-7 kg; lognormal variance with pedigree 1.46, pedigree (1,1,5,1,1)
  (same comment as for Antimony)
- Nickel, ion [water, ground-, long-term]: 1.92e-5 kg; lognormal variance with pedigree 1.22, pedigree (1,1,5,1,1)
  (same comment as for Lead)
- Vanadium, ion [water, ground-, long-term]: 7.82e-5 kg; lognormal variance with pedigree 1.25, pedigree (1,1,5,1,1)
  (same comment as for Lead)
- COD, Chemical Oxygen Demand [water, ground-, long-term]: 0.176 kg; lognormal variance with pedigree 0.51, pedigree (1,1,5,1,1)
  (same comment as for Lead)
- Tin [air, non-urban air or from high stacks]: 3.6e-13 kg; lognormal variance with pedigree 3.28, pedigree (1,1,5,1,1)
  (same comment as for Sodium)
- Barium [air, non-urban air or from high stacks]: 4.98e-10 kg; lognormal variance with pedigree 2.35, pedigree (1,1,5,1,1)
  (same comment as for Sodium)
- DOC, Dissolved Organic Carbon [water, ground-, long-term]: 0.161 kg; lognormal variance with pedigree 0.51, pedigree (1,1,5,1,1)
  (same comment as for Lead)
- Chromium [air, non-urban air or from high stacks]: 1.09e-12 kg; lognormal variance with pedigree 3.14, pedigree (1,1,5,1,1)
  (same comment as for Sodium)
- Lead [water, surface water]: 2.82e-9 kg; lognormal variance with pedigree 1.84, pedigree (1,1,5,1,1)
  (same comment as for Antimony)
- Beryllium [air, urban air close to ground]: 1.34e-13 kg; lognormal variance with pedigree 2.47, pedigree (1,1,5,1,1)
  (same comment as for Antimony)
- Thallium [air, non-urban air or from high stacks]: 5.42e-14 kg; lognormal variance with pedigree 3.54, pedigree (1,1,5,1,1)
  (same comment as for Sodium)
- Sulfate [water, ground-, long-term]: 0.00391 kg; lognormal variance with pedigree 0.65, pedigree (1,1,5,1,1)
  (same comment as for Lead)
- Vanadium, ion [water, surface water]: 1.44e-7 kg; lognormal variance with pedigree 1.52, pedigree (1,1,5,1,1)
  (same comment as for Antimony)
- Aluminium [water, ground-, long-term]: 0.000187 kg; lognormal variance with pedigree 0.92, pedigree (1,1,5,1,1)
  (same comment as for Lead)
- Fluoride [water, ground-, long-term]: 1.37e-5 kg; lognormal variance with pedigree 1.27, pedigree (1,1,5,1,1)
  (same comment as for Lead)
- Zinc [air, non-urban air or from high stacks]: 5.49e-11 kg; lognormal variance with pedigree 2.63, pedigree (1,1,5,1,1)
  (same comment as for Sodium)
- Sulfate [water, surface water]: 1.6e-5 kg; lognormal variance with pedigree 1.14, pedigree (1,1,5,1,1)
  (same comment as for Chloride)
- Arsenic, ion [water, ground-, long-term]: 1.77e-6 kg; lognormal variance with pedigree 1.53, pedigree (1,1,5,1,1)
  (same comment as for Lead)
- Mercury [water, ground-, long-term]: 7.92e-7 kg; lognormal variance with pedigree 1.63, pedigree (1,1,5,1,1)
  (same comment as for Lead)
- Copper [air, non-urban air or from high stacks]: 4.15e-12 kg; lognormal variance with pedigree 2.95, pedigree (1,1,5,1,1)
  (same comment as for Sodium)
- Manganese [air, non-urban air or from high stacks]: 2.14e-10 kg; lognormal variance with pedigree 2.46, pedigree (1,1,5,1,1)
  (same comment as for Sodium)
- Particulates, < 2.5 um [air, non-urban air or from high stacks]: 3.02e-7 kg; lognormal variance with pedigree 0.72, pedigree (1,1,5,1,1)
  (same comment as for Sodium)
- Manganese [water, surface water]: 4.33e-7 kg; lognormal variance with pedigree 1.39, pedigree (1,1,5,1,1)
  (same comment as for Antimony)
- Zinc, ion [water, surface water]: 7.64e-8 kg; lognormal variance with pedigree 1.53, pedigree (1,1,5,1,1)
  (same comment as for Antimony)
- Nitrogen [water, surface water]: 2e-6 kg; lognormal variance with pedigree 0.48, pedigree (1,1,5,1,1)
  (same comment as for Antimony)
- Bromine [air, non-urban air or from high stacks]: 2.31e-8 kg; lognormal variance with pedigree 1.85, pedigree (1,1,5,1,1)
  (same comment as for Sodium)
- Beryllium [water, surface water]: 1.38e-10 kg; lognormal variance with pedigree 2.44, pedigree (1,1,5,1,1)
  (same comment as for Antimony)
- Carbon monoxide, fossil [air, urban air close to ground]: 3.43e-7 kg; lognormal variance with pedigree 0.92, pedigree (1,1,5,1,1)
  (same comment as for Antimony)
- Tin, ion [water, surface water]: 6.03e-10 kg; lognormal variance with pedigree 2.22, pedigree (1,1,5,1,1)
  (same comment as for Antimony)
- Thallium [air, urban air close to ground]: 1.07e-13 kg; lognormal variance with pedigree 2.5, pedigree (1,1,5,1,1)
  (same comment as for Antimony)
- NMVOC, non-methane volatile organic compounds, unspecified origin [air, urban air close to ground]: 4.71e-9 kg; lognormal variance with pedigree 1.03, pedigree (1,1,5,1,1)
  (same comment as for Antimony)
- Sodium, ion [water, ground-, long-term]: 0.00131 kg; lognormal variance with pedigree 0.66, pedigree (1,1,5,1,1)
  (same comment as for Lead)
- Nitrogen, organic bound [water, ground-, long-term]: 0.00397 kg; lognormal variance with pedigree 0.47, pedigree (1,1,5,1,1)
  (same comment as for Lead)
- Barium [water, surface water]: 1.2e-7 kg; lognormal variance with pedigree 1.3, pedigree (1,1,5,1,1)
  (same comment as for Antimony)
- Titanium [air, urban air close to ground]: 2.3e-10 kg; lognormal variance with pedigree 1.49, pedigree (1,1,5,1,1)
  (same comment as for Antimony)
- Cobalt [water, ground-, long-term]: 2.94e-5 kg; lognormal variance with pedigree 1.16, pedigree (1,1,5,1,1)
  (same comment as for Lead)
- Chromium [air, urban air close to ground]: 0 kg; pedigree (1,1,1,1,1)
  (same comment as for Antimony)
- Nickel [air, non-urban air or from high stacks]: 2.79e-12 kg; lognormal variance with pedigree 3.03, pedigree (1,1,5,1,1)
  (same comment as for Sodium)
- Mercury [water, surface water]: 1.72e-10 kg; lognormal variance with pedigree 2.34, pedigree (1,1,5,1,1)
  (same comment as for Antimony)
- Antimony [air, urban air close to ground]: 2.08e-12 kg; lognormal variance with pedigree 2.41, pedigree (1,1,5,1,1)
  (same comment as for Antimony)
- Vanadium [air, non-urban air or from high stacks]: 7.09e-11 kg; lognormal variance with pedigree 2.6, pedigree (1,1,5,1,1)
  (same comment as for Sodium)
- Cadmium, ion [water, ground-, long-term]: 7.57e-5 kg; lognormal variance with pedigree 1.04, pedigree (1,1,5,1,1)
  (same comment as for Lead)
- Mercury [air, urban air close to ground]: 0 kg; pedigree (1,1,1,1,1)
  (same comment as for Antimony)
- Carbon dioxide, fossil [air, non-urban air or from high stacks]: 0.0159 kg; lognormal variance with pedigree 0.42, pedigree (1,1,5,1,1)
  (same comment as for Sodium)
- Barium [water, ground-, long-term]: 0.000174 kg; lognormal variance with pedigree 0.91, pedigree (1,1,5,1,1)
  (same comment as for Lead)
- Hydrogen chloride [air, non-urban air or from high stacks]: 6.58e-6 kg; lognormal variance with pedigree 1.13, pedigree (1,1,5,1,1)
  (same comment as for Sodium)
- Copper, ion [water, ground-, long-term]: 0.000296 kg; lognormal variance with pedigree 0.86, pedigree (1,1,5,1,1)
  (same comment as for Lead)
- Copper, ion [water, surface water]: 3.77e-9 kg; lognormal variance with pedigree 1.91, pedigree (1,1,5,1,1)
  (same comment as for Antimony)
- Antimony [water, ground-, long-term]: 4.03e-6 kg; lognormal variance with pedigree 2.44, pedigree (1,1,5,1,1)
  (same comment as for Lead)
- Bromine [water, surface water]: 1.64e-6 kg; lognormal variance with pedigree 1.32, pedigree (1,1,5,1,1)
  (same comment as for Chloride)
- Bromine [water, ground-, long-term]: 6.37e-5 kg; lognormal variance with pedigree 1.06, pedigree (1,1,5,1,1)
  (same comment as for Lead)
- Chromium VI [water, ground-, long-term]: 1.73e-7 kg; lognormal variance with pedigree 8.41, pedigree (1,1,5,1,1)
  (same comment as for Lead)
- Sodium, ion [water, surface water]: 5.66e-5 kg; lognormal variance with pedigree 0.86, pedigree (1,1,5,1,1)
  (same comment as for Chloride)
- Chloride [water, ground-, long-term]: 0.0177 kg; lognormal variance with pedigree 0.34, pedigree (1,1,5,1,1)
  (same comment as for Lead)
- Cyanide [air, urban air close to ground]: 3.83e-9 kg; lognormal variance with pedigree 0.61, pedigree (1,1,5,1,1)
  (same comment as for Antimony)
- Strontium [air, urban air close to ground]: 2.36e-12 kg; lognormal variance with pedigree 1.8, pedigree (1,1,5,1,1)
  (same comment as for Antimony)
- Cadmium, ion [water, surface water]: 6.77e-8 kg; lognormal variance with pedigree 1.61, pedigree (1,1,5,1,1)
  (same comment as for Antimony)
- Nickel [air, urban air close to ground]: 0 kg; pedigree (1,1,1,1,1)
  (same comment as for Antimony)
- Titanium, ion [water, ground-, long-term]: 0.000933 kg; lognormal variance with pedigree 0.71, pedigree (1,1,5,1,1)
  (same comment as for Lead)
- Iron, ion [water, surface water]: 2.42e-7 kg; lognormal variance with pedigree 1.46, pedigree (1,1,5,1,1)
  (same comment as for Antimony)
- Copper [air, urban air close to ground]: 7.94e-14 kg; lognormal variance with pedigree 1.98, pedigree (1,1,5,1,1)
  (same comment as for Antimony)
- Selenium [air, urban air close to ground]: 0 kg; pedigree (1,1,1,1,1)
  (same comment as for Antimony)
- Methane, fossil [air, non-urban air or from high stacks]: 0.00243 kg; lognormal variance with pedigree 0.46, pedigree (1,1,5,1,1)
  (same comment as for Sodium)
- TOC, Total Organic Carbon [water, ground-, long-term]: 0.161 kg; lognormal variance with pedigree 0.51, pedigree (1,1,5,1,1)
  (same comment as for Lead)
- Sulfur dioxide [air, non-urban air or from high stacks]: 1.84e-6 kg; lognormal variance with pedigree 1.36, pedigree (1,1,5,1,1)
  (same comment as for Sodium)
- Lead [air, non-urban air or from high stacks]: 8.56e-12 kg; lognormal variance with pedigree 2.86, pedigree (1,1,5,1,1)
  (same comment as for Sodium)
- BOD5, Biological Oxygen Demand [water, ground-, long-term]: 0.0416 kg; lognormal variance with pedigree 0.51, pedigree (1,1,5,1,1)
  (same comment as for Lead)
- Fluoride [water, surface water]: 1.01e-8 kg; lognormal variance with pedigree 1.96, pedigree (1,1,5,1,1)
  (same comment as for Chloride)
- Nitrite [water, surface water]: 1.55e-6 kg; lognormal variance with pedigree 0.73, pedigree (1,1,5,1,1)
  (same comment as for Antimony)
- Strontium [water, ground-, long-term]: 8.26e-5 kg; lognormal variance with pedigree 1.03, pedigree (1,1,5,1,1)
  (same comment as for Lead)
- Nickel, ion [water, surface water]: 6.78e-9 kg; lognormal variance with pedigree 1.94, pedigree (1,1,5,1,1)
  (same comment as for Antimony)
- Carbon dioxide, fossil [air, urban air close to ground]: 0.00053 kg; lognormal variance with pedigree 0.86, pedigree (1,1,5,1,1)
  (same comment as for Antimony)
- Hydrogen sulfide [water, ground-, long-term]: 0.000102 kg; lognormal variance with pedigree 0.65, pedigree (1,1,5,1,1)
  (same comment as for Lead)
- Selenium [water, surface water]: 1.38e-9 kg; lognormal variance with pedigree 2.17, pedigree (1,1,5,1,1)
  (same comment as for Antimony)
- Nitrite [water, ground-, long-term]: 0.000132 kg; lognormal variance with pedigree 0.47, pedigree (1,1,5,1,1)
  (same comment as for Lead)
- Dinitrogen monoxide [air, urban air close to ground]: 3.76e-7 kg; lognormal variance with pedigree 0.45, pedigree (1,1,5,1,1)
  (same comment as for Antimony)
- Hydrogen fluoride [air, non-urban air or from high stacks]: 5.47e-8 kg; lognormal variance with pedigree 1.75, pedigree (1,1,5,1,1)
  (same comment as for Sodium)
- Nitrogen oxides [air, urban air close to ground]: 1.33e-6 kg; lognormal variance with pedigree 0.5, pedigree (1,1,5,1,1)
  (same comment as for Antimony)
- Beryllium [water, ground-, long-term]: 4.66e-7 kg; lognormal variance with pedigree 1.7, pedigree (1,1,5,1,1)
  (same comment as for Lead)
- Zinc [air, urban air close to ground]: 2.79e-12 kg; lognormal variance with pedigree 1.6, pedigree (1,1,5,1,1)
  (same comment as for Antimony)
- Nitrogen oxides [air, non-urban air or from high stacks]: 3.94e-8 kg; lognormal variance with pedigree 1.1, pedigree (1,1,5,1,1)
  (same comment as for Sodium)
- Carbon monoxide, fossil [air, non-urban air or from high stacks]: 8.99e-7 kg; lognormal variance with pedigree 1.06, pedigree (1,1,5,1,1)
  (same comment as for Sodium)
- Strontium [water, surface water]: 2.44e-8 kg; lognormal variance with pedigree 1.75, pedigree (1,1,5,1,1)
  (same comment as for Antimony)
- COD, Chemical Oxygen Demand [water, surface water]: 0.000116 kg; lognormal variance with pedigree 0.86, pedigree (1,1,5,1,1)
  (same comment as for Antimony)
- Antimony [air, non-urban air or from high stacks]: 1.06e-11 kg; lognormal variance with pedigree 2.86, pedigree (1,1,5,1,1)
  (same comment as for Sodium)
- Iron [air, non-urban air or from high stacks]: 1.19e-10 kg; lognormal variance with pedigree 2.52, pedigree (1,1,5,1,1)
  (same comment as for Sodium)
- Cobalt [air, urban air close to ground]: 1.48e-15 kg; lognormal variance with pedigree 1.79, pedigree (1,1,5,1,1)
  (same comment as for Antimony)
- Cadmium [air, urban air close to ground]: 3.65e-12 kg; lognormal variance with pedigree 1.67, pedigree (1,1,5,1,1)
  (same comment as for Antimony)
- Arsenic [air, urban air close to ground]: 8.96e-13 kg; lognormal variance with pedigree 2.15, pedigree (1,1,5,1,1)
  (same comment as for Antimony)
- Cadmium [air, non-urban air or from high stacks]: 8.89e-10 kg; lognormal variance with pedigree 2.28, pedigree (1,1,5,1,1)
  (same comment as for Sodium)

## Sampling procedure
Landfill model based on observed leachate concentrations in literature. Extrapolated to 60'000 years heeding chemical characteristics. Initial waste composition from various literature sources.

## Extrapolations
This dataset has been extrapolated from year 2000 to the year of the calculation (2019). The uncertainty has been adjusted accordingly.

## Review by Niels Jungbluth 2003-07-21
Passed. Calculation for standard deviation 95 of, i.e., infrastructure,
land occupation, transport services or other services can differ from
standard Pedigree approach used in this project and figures obtained by
this procedure.

## Review by Emilia Moreno Ruiz 2012-11-30
Legacy link converted in Activity link
