# copper production, blister-copper

Dataset: EcoSpold 2, unit process
Geography: RoW
Time period: 1994-01-01 to 2019-12-31
Technology level: current
Classification: ISIC rev.4 ecoinvent: 2420:Manufacture of basic precious and other non-ferrous metals
Classification: EcoSpold01Categories: metals/extraction
Scenario: Business-as-Usual
System model: Allocation at the point of substitution
Share of production covered: 94 %
Generated by: [System]
Published in: Althaus H.-J. 2000
Database: ecoinvent
isCopyrightProtected: true
accessRestrictedTo: 1

## General comment
The product "blister copper" is a intermediary product from primary copper production used uniquely in the secondary copper production where apart from copper scrap 10% of the feed consists of blister copper, i. e. raw copper after converting with a average Cu content of 98%.

## Included activities end
The module includes the same steps as the primary copper production without the refining.

## Geography
This module is valid for the whole corresponding region. Some agents used like lime or sodium cyanide originate from data sets valid for Switzerland or Europe.

## Technology
The ore is pre-treated and reduced according to the country specific mix of process alternatives: reverberatory furnace 6.2%; flash smelting furnaces 76%; other 17.8%. An overall abatement for sulphur dioxide of 95% was estimated.

## Parameters
- fraction, process water, to air: 0.15 dimensionless; name fraction_PW_to_air; lognormal variance with pedigree 0.092025, pedigree (4,4,3,2,4)

## Reference product
- copper, blister-copper: 1 kg; name blister_copper_amount; CPC 41412: Unrefined copper; copper anodes for electrolytic refining; By-product classification allocatable product
  EcoSpold01Location=RER
  production volume 1.32337e10 kg; name blister_copper_PV
    Literature value (USGS 2017). Represents the world smelter production for the primary production of copper in 2015.
    Reference:
    U.S. Geological Survey (USGS) (2017) 2015 Minerals Yearbook, Copper [Advance Release]. https://minerals.usgs.gov/minerals/pubs/commodity/copper/myb1-2015-coppe.pdf
  property price 2.39 EUR2005
    From UNdata http://data.un.org/Data.aspx?q=unrefined+copper&d=ComTrade&f=_l1Code%3a75%3bcmdCode%3a740200 and determined as unrefined copper; copper anode before refining because blister copper is 99% pure copper before refining process based on http://www.citycollegiate.com/dblock4.htm.
  property carbon content 0
    carbon content on a dry matter basis (reserved; not for manual entry)
  property true value 2.39; name blister_copper_amount_true_value
    allocation property applied in "true value" allocation // value calculated from revenue
  properties: carbon content, non-fossil 0, wet mass 1 kg, carbon content, fossil 0, water in wet mass 0 kg, water content 0, dry mass 1 kg, carbon allocation 0 kg

## By-products
- heat, for reuse in municipal waste incineration only: 0 MJ; CPC 17300: Steam and hot water; By-product classification allocatable product; pedigree (1,1,1,1,1)
  Net electricity generated from this waste and used in internal MSWI plant energy redistribution.
  Uncertainty: uncertainty is calculated from uncertainties in waste composition and uncertainties in energy efficiency and the uncertainty in internal energy demand
  production volume 4.82384e6 MJ
  property exergy 0.1842 MJ; name E_th_prod_MSWI_exergy
    This exergy property is based on the exergy content of the product.
  property price 0.0106 EUR2005; name E_th_prod_MSWI_price_EUR2005
    Average European district heat price from Ecoheatcool and Euroheat 2005-2006, Ecoheat Work package 1: The European heat market. Final report. 10.6 EUR/GJ i s the price of district heat. http://www.solarthermalworld.org/files/Ecoheatcool%20WP1%20Web.pdf?download
  property true value relation 0.1842; name E_th_prod_MSWI_true_value_relation
    property to calculate "true value" from
  property true value 2.40319e-6
    allocation property applied in "true value" allocation // value calculated from true value relation
- electricity, for reuse in municipal waste incineration only: 0 kWh; CPC 17100: Electrical energy; By-product classification allocatable product; pedigree (1,1,1,1,1)
  (same comment as for heat, for reuse in municipal waste incineration only)
  production volume 669976 kWh
  property price 0.1 EUR2005; name E_el_prod_MSWI_price_EUR2005
    Estimated to be the same price as in case of electricity, medium voltage.
  property exergy 3.6 MJ; name E_el_prod_MSWI_exergy
    This exergy property is based on the exergy content of the product.
  property true value relation 3.6; name E_el_prod_MSWI_true_value_relation
    property to calculate "true value" from
  property true value 6.52329e-6
    (same comment as for heat, for reuse in municipal waste incineration only)

## Inputs from technosphere
- silica sand: 0.734997 kg; lognormal variance with pedigree 0.1121, pedigree (5,2,5,5,1)
  EcoSpold01Location=DE
  properties: wet mass 1 kg, water content 0.010101, dry mass 0.99 kg
- electricity, high voltage: 0 kWh; pedigree (1,1,1,1,1)
  EcoSpold01Location=UCTE
- heat, district or industrial, natural gas: 0 MJ; pedigree (1,1,1,1,1)
  EcoSpold01Location=RER
- lime, packed: 0.244999 kg; lognormal variance with pedigree 0.1121, pedigree (5,2,5,5,1)
  EcoSpold01Location=CH
  properties: dry mass 0.998 kg, water content 0.00200401, carbon content, fossil 0.117492, wet mass 1 kg
  note on carbon content, fossil: Table 3.1, ecoinvent v2.2 report 7, part VII, pg 3. MW CaCO3=100, MW MgCO3=84
- heat, district or industrial, other than natural gas: 0 MJ; pedigree (1,1,1,1,1)
  EcoSpold01Location=RER
- non-ferrous metal smelter: 1.12e-11 unit; lognormal variance with pedigree 0.3621, pedigree (3,2,5,5,3)
  EcoSpold01Location=GLO
- oxygen, liquid: 0.293999 kg; lognormal variance with pedigree 0.0427, pedigree (2,2,5,5,1)
  EcoSpold01Location=RER
  properties: wet mass 1 kg, dry mass 1 kg
- electricity, high voltage: 0.139999 kWh; lognormal variance with pedigree 0.0427, pedigree (2,2,5,5,1)
  Modelled value. The electricity is provided by hydropower.
- wastewater, unpolluted: -0.00567998 m3; name wastewater; lognormal variance with pedigree 0.0427, pedigree (2,2,5,5,1)
  EcoSpold01Location=CH
  production volume 7.51674e7 m3; = wastewater / blister_copper_amount * blister_copper_PV
    Calculated from the production volume of copper, blister-copper in proportion to the respective output amounts.
  property price 0 EUR2005; name wastewater_price_EUR2005
  properties: dry mass 0.337476 kg, carbon content, non-fossil 0.00178991, carbon content, fossil 0.00178991, water content 2962.17, wet mass 1000 kg
  note on carbon content, fossil: Assumed to be like in tap water. Bicarbonate content is 2.93 mol/m3. CO2 content is 0.1 mol/m3 (ecoinvent v2.2 report 8, Tab 93.1).
- copper slag: -0.905997 kg; name copper_slag
  production volume 1.19897e10 kg; = copper_slag / blister_copper_amount * blister_copper_PV
    (same comment as for wastewater, unpolluted)
  property price 0 EUR2005; name copper_slag_price_EUR2005
  properties: sodium content 0.008, zinc content 0.00606, potassium content 0.0317, aluminium content 0.0267, dry mass 1 kg, iron content 0.379, silicon content 0.155, wet mass 1 kg, tungsten content 0.23999, calcium content 0.00713, copper content 0.00807, magnesium content 0.00485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
- anode, for metal electrolysis: 0.000979996 kg; lognormal variance with pedigree 0.23, pedigree (5,5,5,5,4)
  EcoSpold01Location=RER
  properties: carbon content, fossil 0.865971, dry mass 1 kg, wet mass 1 kg
  note on carbon content, fossil: The main component of the anode is carbon, coming from bitumen and petroleum coke (ecoinvent v2.2 report 10). The C content in those components of the anode has been taken into account to calculate the anode final C content.
- copper concentrate, sulfide ore: 4.05998 kg; lognormal variance with pedigree 0.0427, pedigree (2,2,5,5,1)
  EcoSpold01Location=RER
  The copper concentrate is supplied by the global copper mine operation.
  properties: wet mass 1 kg, dry mass 1 kg
- electricity, high voltage: 0.00120866, 0.000220102, 0.00375954, 0.0541245, 0.00871734, 0.0252695 kWh (6 entries); lognormal variance with pedigree 0.0427, pedigree (2,2,5,5,1)
  EcoSpold01Location=UCTE
- heat, district or industrial, natural gas: 0.0222907, 1.2602 MJ (2 entries); lognormal variance with pedigree 0.0427, pedigree (2,2,5,5,1)
  EcoSpold01Location=RER
- heat, district or industrial, other than natural gas: 0.00189009, 4.21609 MJ (2 entries); lognormal variance with pedigree 0.0427, pedigree (2,2,5,5,1)
  EcoSpold01Location=RER

## Inputs from nature
- Water, river [natural resource, in water]: 0.00567998 m3; name water_river_input; source Krauss U. 1999; lognormal variance with pedigree 0.0427, pedigree (2,2,5,5,1)
  Modelled, based on ISIC 2420 - pdf, on the dedicated talk page of ecoinvent (www.ecoinvent.org/documentation).
  See part "Regarding pyro-metallurgical copper production".
  Modelled, based on ISIC 2420 - pdf, on the dedicated talk page of ecoinvent (www.ecoinvent.org/documentation).
  See part "Regarding pyro-metallurgical copper production".

## Emissions to nature
- Water [air, unspecified]: 0.000851997 m3; name water_to_air_unspecified; lognormal variance with pedigree 0.0827, pedigree (2,2,5,5,1)
  Calculated value based on literature values and expert opinion. See comments in the parametres' comment field.
  property fraction, origin: salt water 0; name fraction_origin_salt_water
  property fraction, origin: fresh water 1; name fraction_origin_fresh_water
  property fraction, origin: unspecified 0; name fraction_origin_unspecified
- Particulates, < 2.5 um [air, non-urban air or from high stacks]: 4.97998e-10 kg; lognormal variance with pedigree 0.3621, pedigree (3,2,5,5,3)
- Cadmium, ion [water, surface water]: 1.54999e-8 kg; lognormal variance with pedigree 1.372, pedigree (1,1,5,5,1)
  reported values
- Cadmium [air, non-urban air or from high stacks]: 6.36998e-6 kg; lognormal variance with pedigree 0.7121, pedigree (3,2,5,5,3)
- Mercury [water, surface water]: 1.61999e-9 kg; lognormal variance with pedigree 1.372, pedigree (1,1,5,5,1)
  reported values
- Manganese [air, non-urban air or from high stacks]: 1.46999e-5 kg; lognormal variance with pedigree 0.7121, pedigree (3,2,5,5,3)
- Vanadium [air, non-urban air or from high stacks]: 3.67999e-7 kg; lognormal variance with pedigree 0.7121, pedigree (3,2,5,5,3)
- Lead [water, surface water]: 9.07997e-8 kg; lognormal variance with pedigree 1.372, pedigree (1,1,5,5,1)
  reported values
- Chromium, ion [water, surface water]: 1.61999e-7 kg; lognormal variance with pedigree 1.372, pedigree (1,1,5,5,1)
  reported values
- Arsenic, ion [water, surface water]: 1.06e-7 kg; lognormal variance with pedigree 1.372, pedigree (1,1,5,5,1)
  reported values
- Nickel [air, non-urban air or from high stacks]: 5.38998e-5 kg; lognormal variance with pedigree 0.7121, pedigree (3,2,5,5,3)
- Copper, ion [water, surface water]: 2.98999e-7 kg; lognormal variance with pedigree 1.372, pedigree (1,1,5,5,1)
  reported values
- Carbon monoxide, fossil [air, non-urban air or from high stacks]: 2.93999e-8 kg; lognormal variance with pedigree 0.7121, pedigree (3,2,5,5,3)
- Dioxins, measured as 2,3,7,8-tetrachlorodibenzo-p-dioxin [air, non-urban air or from high stacks]: 9.79996e-15 kg; lognormal variance with pedigree 0.3621, pedigree (3,2,5,5,3)
- Zinc [air, non-urban air or from high stacks]: 0.000146999 kg; lognormal variance with pedigree 0.7121, pedigree (3,2,5,5,3)
- Arsenic [air, non-urban air or from high stacks]: 3.17999e-5 kg; lognormal variance with pedigree 0.7121, pedigree (3,2,5,5,3)
- Particulates, > 10 um [air, non-urban air or from high stacks]: 9.95996e-8 kg; lognormal variance with pedigree 0.0921, pedigree (3,2,5,5,3)
- Tin, ion [water, surface water]: 1.61999e-7 kg; lognormal variance with pedigree 1.372, pedigree (1,1,5,5,1)
  reported values
- Lead [air, non-urban air or from high stacks]: 0.000146999 kg; lognormal variance with pedigree 0.7121, pedigree (3,2,5,5,3)
- Carbon dioxide, fossil [air, non-urban air or from high stacks]: 0.108 kg; lognormal variance with pedigree 0.182, pedigree (5,4,5,5,3)
- NMVOC, non-methane volatile organic compounds, unspecified origin [air, non-urban air or from high stacks]: 1.46999e-8 kg; lognormal variance with pedigree 0.1021, pedigree (3,2,5,5,3)
- Antimony [air, non-urban air or from high stacks]: 5.38998e-6 kg; lognormal variance with pedigree 0.7121, pedigree (3,2,5,5,3)
- Particulates, > 2.5 um, and < 10um [air, non-urban air or from high stacks]: 2.97999e-7 kg; lognormal variance with pedigree 0.0721, pedigree (3,2,5,5,3)
- Selenium [air, non-urban air or from high stacks]: 5.38998e-6 kg; lognormal variance with pedigree 0.7121, pedigree (3,2,5,5,3)
- Copper [air, non-urban air or from high stacks]: 0.000244999 kg; lognormal variance with pedigree 0.7121, pedigree (3,2,5,5,3)
- Chromium [air, non-urban air or from high stacks]: 4.89998e-8 kg; lognormal variance with pedigree 0.7121, pedigree (3,2,5,5,3)
- Mercury [air, non-urban air or from high stacks]: 9.79996e-8 kg; lognormal variance with pedigree 0.7121, pedigree (3,2,5,5,3)
- Tin [air, non-urban air or from high stacks]: 6.11998e-6 kg; lognormal variance with pedigree 0.7121, pedigree (3,2,5,5,3)
- Sulfur dioxide [air, non-urban air or from high stacks]: 0.0349999 kg; lognormal variance with pedigree 0.142, pedigree (5,4,5,5,3)
- Zinc, ion [water, surface water]: 4.80998e-7 kg; lognormal variance with pedigree 1.372, pedigree (1,1,5,5,1)
  reported values
- Nickel, ion [water, surface water]: 1.21e-7 kg; lognormal variance with pedigree 1.372, pedigree (1,1,5,5,1)
  reported values

## Sampling procedure
literature

## Extrapolations
see Geography and Technology This dataset has been copied from an original dataset covering the geography RER. The uncertainty has been adjusted accordingly.

## Review by Bo Weidema 2012-10-01
replaced input of "electricity, high voltage, hydro, run-of-river" with "electricity, high voltage" with a direct activity link to "electricity production, high voltage, hydro, run-of-river".

## Review by Roland Hischier 2003-08-06
Passed.

## Review by Nawshad Haque 2017-12-22
Comments are addressed
