# agricultural trailer production

Dataset: EcoSpold 2, unit process
Geography: RoW
Time period: 1995-01-01 to 2019-12-31
Technology level: current
Classification: EcoSpold01Categories: agricultural means of production/machinery
Classification: ISIC rev.4 ecoinvent: 2821:Manufacture of agricultural and forestry machinery
Tags: ConvertedDataset
Scenario: Business-as-Usual
System model: Allocation at the point of substitution
Generated by: Albert Zimmermann
Published in: Nemecek, T. 2007
Database: ecoinvent
isCopyrightProtected: true
accessRestrictedTo: 1

## General comment
Representatives of this class are for example: tyre trailer. Calculations base on tyre trailers of 1500 kg weight, 1200 hours useful life and 0.22 repair factor. For exact results, module should only be used if lifetime and repair factor of the balanced machinery are within a narrow range of the values the module is based on. The functional unit is 1kg trailer during its lifetime.
[This dataset was already contained in the ecoinvent database version 2. It was not individually updated during the transfer to ecoinvent version 3. Life Cycle Impact Assessment results may still have changed, as they are affected by changes in the supply chain, i.e. in other datasets. This dataset was generated following the ecoinvent quality guidelines for version 2. It may have been subject to central changes described in the ecoinvent version 3 change report (http://www.ecoinvent.org/database/ecoinvent-version-3/reports-of-changes/), and the results of the central updates were reviewed extensively. The changes added e.g. consistent water flows and other information throughout the database. The documentation of this dataset can be found in the ecoinvent reports of version 2, which are still available via the ecoinvent website. The change report linked above covers all central changes that were made during the conversion process.]

## Included activities end
The inventory takes into account the use of resources and the amount of emissions during the production, the maintenance and repair and the disposal of agricultural trailers. Not taken into account were the impacts caused by fuel consumption during operation-time of the trailing machinery. No data was available about buildings needed for manufacture and maintenance of the machinery. The routes needed for transport from manufacturer place to the farm and from here to disposal place of the waste, are balanced in the utilised transport modules.

## Geography
The inventories apply to the production in Western Europe and transportation to Switzerland.

## Technology
Values are based and adapted on a different technology (lorries-manufacture).

## Time period
Considered references range from start- to end-date

## Reference product
- agricultural trailer: 1 kg; CPC 441: Agricultural or forestry machinery and parts thereof; By-product classification allocatable product
  EcoSpold01Location=CH
  production volume 8.9757e8 kg
    Estimated at 5% of all new agricultural equipment, which is estimated to 18 E9 kg annually on the basis of "Investments in main groups of machinery, and equipment 1997 – 2005", http://www.sjv.se/webdav/files/SJV/Amnesomraden/Statistik%2C%20fakta/Jordbrukets%20ekonomi/Statistikrapport/20063/20063.pdf assuming the same price per kg for all equipment, and annual new tractors being 1/12 of all 26.6 million tractors (Source: World Development Indicators retrieved from World Bank Data Catalogue AG.AGR.TRAC.NO http://data.worldbank.org/data-catalog accessed 2011-04-05) at 3000 kg/tractor.
  property price 2.86 EUR2005
    Calculated value based on data from United Nations Commodity Trade Statistics Database (comtrade.un.org). UN comtrade category: 8716 Trailers and non-mechanically propelled vehicle nes. Using exchange rate of 1EURO = 1.209 USD.
  property true value 2.86
    allocation property applied in "true value" allocation // value calculated from revenue

## By-products
- heat, for reuse in municipal waste incineration only: 0 MJ; CPC 17300: Steam and hot water; By-product classification allocatable product; pedigree (1,1,1,1,1)
  Net electricity generated from this waste and used in internal MSWI plant energy redistribution.
  Uncertainty: uncertainty is calculated from uncertainties in waste composition and uncertainties in energy efficiency and the uncertainty in internal energy demand
  production volume 6.82744e6 MJ
  property exergy 0.1842 MJ; name E_th_prod_MSWI_exergy
    This exergy property is based on the exergy content of the product.
  property price 0.0106 EUR2005; name E_th_prod_MSWI_price_EUR2005
    Average European district heat price from Ecoheatcool and Euroheat 2005-2006, Ecoheat Work package 1: The European heat market. Final report. 10.6 EUR/GJ i s the price of district heat. http://www.solarthermalworld.org/files/Ecoheatcool%20WP1%20Web.pdf?download
  property true value relation 0.1842; name E_th_prod_MSWI_true_value_relation
    property to calculate "true value" from
  property true value 3.72518e-5
    allocation property applied in "true value" allocation // value calculated from true value relation
- electricity, for reuse in municipal waste incineration only: 0 kWh; CPC 17100: Electrical energy; By-product classification allocatable product; pedigree (1,1,1,1,1)
  (same comment as for heat, for reuse in municipal waste incineration only)
  production volume 971235 kWh
  property price 0.1 EUR2005; name E_el_prod_MSWI_price_EUR2005
    Estimated to be the same price as in case of electricity, medium voltage.
  property exergy 3.6 MJ; name E_el_prod_MSWI_exergy
    This exergy property is based on the exergy content of the product.
  property true value relation 3.6; name E_el_prod_MSWI_true_value_relation
    property to calculate "true value" from
  property true value 0.000103568
    (same comment as for heat, for reuse in municipal waste incineration only)

## Inputs from technosphere
- heat, district or industrial, other than natural gas: 0 MJ; pedigree (1,1,1,1,1)
  EcoSpold01Location=RER
- brass: 0.0059997 kg; lognormal variance with pedigree 0.0601, pedigree (4,2,5,5,1)
  EcoSpold01Location=CH
  properties: wet mass 1 kg, dry mass 1 kg
- heat, central or small-scale, other than natural gas: 0 MJ; pedigree (1,1,1,1,1)
  EcoSpold01Location=CH
- steel, chromium steel 18/8, hot rolled: 0.0219989 kg; lognormal variance with pedigree 0.0601, pedigree (4,2,5,5,1)
  EcoSpold01Location=RER
  properties: wet mass 1 kg, carbon content, fossil 0.0008, dry mass 1 kg
  note on carbon content, fossil: Stainless steel model is the grade 304 steel (18/8 stainless, 18% chromium 8% nickel; max. 0.08% C)
- steel, low-alloyed, hot rolled: 0.0329984 kg; lognormal variance with pedigree 0.0601, pedigree (4,2,5,5,1)
  EcoSpold01Location=RER
  properties: wet mass 1 kg, carbon content, fossil 0.005, dry mass 1 kg
  note on carbon content, fossil: Low alloyed steel composition given in Tab. 3.2 ecoinvent v2.2 report 10_partII. Steel assumed to have a C content of 0.5%
- heat, district or industrial, natural gas: 0 MJ; pedigree (1,1,1,1,1)
  EcoSpold01Location=RER
- steel, unalloyed: 0.774962 kg; lognormal variance with pedigree 0.0601, pedigree (4,2,5,5,1)
  EcoSpold01Location=RER
  properties: carbon content, fossil 0.0025, dry mass 1 kg, wet mass 1 kg
  note on carbon content, fossil: Unalloyed steels or carbon steels are those in which the level of an individual element in no case reaches or exceeds the limiting concentration given in Tab. 3.1 ecoinvent v2.2 report 10_partII. Assumed to have a C content of 0.25%
- aluminium, wrought alloy: 0.20999 kg; lognormal variance with pedigree 0.0601, pedigree (4,2,5,5,1)
  EcoSpold01Location=RER
  properties: wet mass 1 kg, dry mass 1 kg
- waste plastic, mixture: 0 kg; pedigree (1,1,1,1,1)
  EcoSpold01Location=CH
  production volume 0 kg
    Calculated from the production volume of agricultural trailer in proportion to the respective output amounts.
  properties: water content 0.180638, dry mass 0.847 kg, wet mass 1 kg, carbon content, fossil 0.747344
  note on carbon content, fossil: C content in 1 kg DM was calculated using data in Tab A.2, ecoinvent v2.2 report 13_I
- alkyd paint, white, without solvent, in 60% solution state: 0.0059997 kg; lognormal variance with pedigree 0.0601, pedigree (4,2,5,5,1)
  EcoSpold01Location=RER
  properties: carbon content, non-fossil 0.199629, carbon content, fossil 0.140367, wet mass 1 kg, dry mass 1 kg
  note on carbon content, non-fossil: C content was calculated as an addition of C content in the raw materials.
- synthetic rubber: 0.0839959 kg; lognormal variance with pedigree 0.0601, pedigree (4,2,5,5,1)
  EcoSpold01Location=RER
  properties: dry mass 1 kg, carbon content, fossil 0.871949, wet mass 1 kg
  note on carbon content, fossil: EPDM (Ethylene-propene-diene terpolymer) rubber is a terpolymer of ethylene, propene, and a diene with the residual unsaturated portion of the diene in the side chain (ecoinvent v2.2 report 7-part XX & Ullmann). Chemical formula (deduced from Evidences of Solvent-Induced Miscibility in Polychloroprene-co-Ethylene-Propene Diene Terpolymer Blends, Dubey et al., Journal of Applied Polymer Science, 2009, 111:1884–1891): C20H35
- electricity, medium voltage: 0 kWh; pedigree (1,1,1,1,1)
  EcoSpold01Location=CH
- heat, district or industrial, other than natural gas: 0.000244389, 0.0145857, 0.545142 MJ (3 entries); lognormal variance with pedigree 0.064, pedigree (3,4,5,5,3)
  EcoSpold01Location=RER
- heat, central or small-scale, other than natural gas: 0.0475547, 3.32688 MJ (2 entries); lognormal variance with pedigree 0.064, pedigree (3,4,5,5,3)
  EcoSpold01Location=CH
- heat, district or industrial, natural gas: 0.0484907, 1.10489, 2.74142 MJ (3 entries); lognormal variance with pedigree 0.064, pedigree (3,4,5,5,3)
  EcoSpold01Location=RER
- waste plastic, mixture: -0.000975543, -6.5182e-5, -4.92961e-6, -2.69225e-5, -1.08764e-5, -2.55654e-5, -0.000831208, -0.00682934 kg (8 entries); lognormal variance with pedigree 0.07, pedigree (4,4,5,5,3)
  EcoSpold01Location=CH
  production volume 7.87169e6 kg
- electricity, medium voltage: 0.0169671, 0.0030873, 0.0712638, 0.242543, 0.0523559, 0.759105, 0.108642, 0.355956 kWh (8 entries); lognormal variance with pedigree 0.064, pedigree (3,4,5,5,3)
  EcoSpold01Location=CH

## Emissions to nature
- NMVOC, non-methane volatile organic compounds, unspecified origin [air, urban air close to ground]: 0.00547973 kg; lognormal variance with pedigree 0.104, pedigree (3,4,5,5,3)
- Carbon dioxide, fossil [air, non-urban air or from high stacks]: 5.9997e-6 kg; lognormal variance with pedigree 0.064, pedigree (3,4,5,5,3)

## Sampling procedure
Values given in the reference originate mainly from studies about lorry production in Europe as examined and adapted by Zimmermann (2002) and experts estimations.

## Extrapolations
Data are extrapolated, examined and adapted from lorry production in Europe. This dataset has been copied from an original dataset covering the geography CH. The uncertainty has been adjusted accordingly.

## Review by Roland Hischier 2003-08-06
Passed.
