# treatment of waste polyethylene terephthalate, unsanitary landfill, hyperarid infiltration class (-250mm)

Dataset: EcoSpold 2, unit process
Geography: GLO
Time period: 2006-01-01 to 2019-12-31
Technology level: current
Classification: ISIC rev.4 ecoinvent: 3821:Treatment and disposal of non-hazardous waste
Synonyms: municipal waste landfill
Scenario: Business-as-Usual
System model: Allocation at the point of substitution
Share of production covered: 1 %
Generated by: Avraam Symeonidis
Database: ecoinvent
isCopyrightProtected: true
accessRestrictedTo: 1

## General comment
This dataset represents the activity of waste disposal of waste polyethylene terephtalate in a unsanitary landfill. Recommended use of this dataset: For PET, which goes to disposal as part of managed communal waste mixture. Larger amounts of clean, *already separated* PET could go to recycling, depending on country-specific situation. // Waste composition (wet, in ppm): upper heating value 23.13 MJ/kg; lower heating value 22.95 MJ/kg; H2O 2000; O 368750; H 63380; C 553640; S 147.87; N 6456.8; P n.a.; B n.a.; Cl 788.62; Br 69.004; F 11.829; I n.a.; Ag n.a.; As 1.873; Ba 49.289; Cd 3.2531; Co 31.052; Cr 5.4218; Cu 11.829; Hg 0.08872; Mn 17.744; Mo n.a.; Ni 3.9431; Pb 5.5203; Sb 159.2; Se 2.0701; Sn 0.98577; V 1281.5; Zn 68.676; Be 0.49289; Sc n.a.; Sr 87.241; Ti 985.77; Tl 0.39431; W n.a.; Si n.a.; Fe 98.577; Ca 295.73; Al 197.15; K n.a.; Mg n.a.; Na 1444.7; . // Share of carbon in waste that is biogenic 0%. Share of metals in waste not oxidised and bulk-recyclable (exclude very small or thin parts) Iron: 0%; Alu: 0%; Copper: 0%. Overall degradability of waste during 100 years: 1%.

## Included activities start
from final waste deposition (without transports to the site)

## Included activities end
Waste-specific short-term emissions to air via landfill gas and landfill leachate. Waste-specific long-term emissions from landfill.

## Geography
Given name of landfill location is 'infiltration class 1 hyperarid (2018)'. Landfill site with mean annual temperature (MAT) of 8 degC, mean annual precipitation (MAP) of 350 mm/year, and net infiltration of -250 mm/year. Negative infiltration means that leachate flow is reversed and flows upward to the surface, where water is evaporated and dissolved solids become solid evaporites.
Climate adjustments result in an alpha t (temperature) for permafrost areas of 0.999. Total climate adjustments with alpha pt of 0.999.

## Technology
This is an inventory for an unsanitary, sub-controlled landfill for municipal solid waste. Ultimate average landfill height is 15 meters. Operation phase duration is 25 years.Percentage of landfill gas directly emitted is 100w%.
Leachate of the landfill is not treated. Leachate flow is upward to the surface due to net negative infiltration. No leachate treatment can be performed. Based on average waste composition and climate data the end of carbonate phase is estimated to be reached 6681 years after waste deposition. Arid conditions at this location prompt formation of evaporites from landfill contents which are partially eroded by wind. It is assumed that 10% of these evaporites are eroded by wind and airborne. Initial decay in the first 100 years of this waste results in a wind erosion rate corresponding to 15.61 g/m2.year and long-term decay corresponds to wind erosion of 25.26 g/m2.year.

## Reference product
- waste polyethylene terephthalate: -1 kg; By-product classification Waste; CPC 39270: Waste, parings and scrap of plastics; CAS 25038-59-9; pedigree (1,1,1,1,1)
  main reference product of this activity (supply of disposal service).
  Uncertainty: Uncertainty is not adjusted, as this is the refence product
  production volume 1 kg
    The amount of the annual production volume is a placeholder value. The contribution of this technology to the different local markets can be found in the markets themselves.
  property price 0 EUR2005
    Waste products are assigned a price of zero as they are assumed to require further treatment.
  property carbon content 0.55475
    carbon content on a dry matter basis (reserved; not for manual entry)
  properties: sodium content 0.0014475, dry mass 0.998 kg, zinc content 6.8813e-5, beryllium content 4.9387e-7, vanadium content 0.0012841, tin content 9.8775e-7, thallium content 3.951e-7, antimony content 0.00015952, selenium content 2.0743e-6, water in wet mass 0.002 kg, iron content 9.8775e-5, titanium content 0.00098775, strontium content 8.7416e-5, calcium content 0.00029632, aluminium content 0.00019755, water content 0.002004, carbon content, fossil 0.55475, wet mass 1 kg, lead content 5.5314e-6, arsenic content 1.8767e-6, cadmium content 3.2596e-6, heating value, net 22.947 MJ, hydrogen content 0.063507, mercury content 8.8897e-8, fluorine content 1.1853e-5, nickel content 3.951e-6, nitrogen content 0.0064698, chlorine content 0.0007902, oxygen content 0.36949, barium content 4.9387e-5, chromium content 5.4326e-6, manganese content 1.7779e-5, copper content 1.1853e-5, heating value, gross 23.126 MJ, sulfur content 0.00014816, bromine content 6.9142e-5, cobalt content 3.1114e-5, carbon allocation 0.55364 kg

## Inputs from technosphere
- excavation, skid-steer loader: 0.00031708 m3; lognormal variance with pedigree 0.082256, pedigree (1,1,3,1,1)
  application of daily cover.
  Uncertainty: Uncertainty calculated from uncertainty in base parameters.
- diesel, burned in building machine: 0.046738 MJ; lognormal variance with pedigree 0.082256, pedigree (1,1,3,1,1)
  for waste distribution and compaction.
  Uncertainty: Uncertainty calculated from uncertainty in base parameters.

## Emissions to nature
- Selenium [air, low population density, long-term]: 7.7521e-8 kg; lognormal variance with pedigree 0.43098, pedigree (1,1,3,1,1)
  burden from windblown long-term leachate evaporite in arid climates.
  Uncertainty: Uncertainty calculated from unertainty of the waste composition of this waste, uncertainty in waste decomposition and short-term leaching in landfill
- Nitrogen oxides [air, non-urban air or from high stacks]: 8.8447e-8 kg; lognormal variance with pedigree 0.26606, pedigree (1,1,3,1,1)
  burden from direct release or incineration of landfill biogas.
  Uncertainty: Uncertainty calculated from unertainty of the waste composition of this waste, uncertainty in waste decomposition and short-term leaching in landfill
- Cobalt [soil, industrial]: 2.7947e-5 kg; lognormal variance with pedigree 0.28003, pedigree (1,1,3,1,1)
  burden from leachate evaporite in arid climates deposited on landflill surface.
  Uncertainty: Uncertainty calculated from unertainty of the waste composition of this waste, uncertainty in waste decomposition and short-term leaching in landfill
- Tin [air, low population density, long-term]: 9.8572e-8 kg; lognormal variance with pedigree 0.39482, pedigree (1,1,3,1,1)
  (same comment as for Selenium)
- Sulfur dioxide [air, non-urban air or from high stacks]: 1.9273e-7 kg; lognormal variance with pedigree 0.40664, pedigree (1,1,3,1,1)
  (same comment as for Nitrogen oxides)
- Cadmium [soil, industrial]: 2.9277e-6 kg; lognormal variance with pedigree 0.35504, pedigree (1,1,3,1,1)
  (same comment as for Cobalt)
- Lead [air, low population density, long-term]: 5.52e-7 kg; lognormal variance with pedigree 0.33857, pedigree (1,1,3,1,1)
  (same comment as for Selenium)
- Sulfate [air, non-urban air or from high stacks]: 1.6499e-7 kg; lognormal variance with pedigree 0.35081, pedigree (1,1,3,1,1)
  burden from windblown leachate evaporite in arid climates.
  Uncertainty: Uncertainty calculated from unertainty of the waste composition of this waste, uncertainty in waste decomposition and short-term leaching in landfill
- Bromine [soil, industrial]: 6.2082e-5 kg; lognormal variance with pedigree 0.24596, pedigree (1,1,3,1,1)
  (same comment as for Cobalt)
- Antimony [air, low population density, long-term]: 2.214e-6 kg; lognormal variance with pedigree 0.47023, pedigree (1,1,3,1,1)
  (same comment as for Selenium)
- Particulates, > 2.5 um, and < 10um [air, non-urban air or from high stacks]: 3.1217e-5 kg; lognormal variance with pedigree 0.16691, pedigree (1,1,3,1,1)
  burden from direct release or incineration of landfill biogas; or windblown leachate evaporite in arid climates.
  Uncertainty: Uncertainty calculated from unertainty of the waste composition of this waste, uncertainty in waste decomposition and short-term leaching in landfill
- Arsenic [soil, industrial]: 1.6856e-6 kg; lognormal variance with pedigree 0.37304, pedigree (1,1,3,1,1)
  (same comment as for Cobalt)
- Nickel [air, low population density, long-term]: 3.9408e-7 kg; lognormal variance with pedigree 0.34962, pedigree (1,1,3,1,1)
  (same comment as for Selenium)
- Particulates, > 10 um [air, non-urban air or from high stacks]: 5.2028e-5 kg; lognormal variance with pedigree 0.14716, pedigree (1,1,3,1,1)
  (same comment as for Particulates, > 2.5 um, and < 10um)
- Barium [soil, industrial]: 4.436e-5 kg; lognormal variance with pedigree 0.26167, pedigree (1,1,3,1,1)
  (same comment as for Cobalt)
- Copper [air, low population density, long-term]: 1.1829e-6 kg; lognormal variance with pedigree 0.31342, pedigree (1,1,3,1,1)
  (same comment as for Selenium)
- Particulates, < 2.5 um [air, non-urban air or from high stacks]: 2.0811e-5 kg; lognormal variance with pedigree 0.21232, pedigree (1,1,3,1,1)
  (same comment as for Particulates, > 2.5 um, and < 10um)
- Fluoride [soil, industrial]: 1.0606e-5 kg; lognormal variance with pedigree 0.31305, pedigree (1,1,3,1,1)
  (same comment as for Cobalt)
- Mercury [air, low population density, long-term]: 8.8635e-9 kg; lognormal variance with pedigree 0.48245, pedigree (1,1,3,1,1)
  (same comment as for Selenium)
- Carbon dioxide, fossil [air, non-urban air or from high stacks]: 0.0086709 kg; lognormal variance with pedigree 0.097511, pedigree (1,1,3,1,1)
  (same comment as for Nitrogen oxides)
- Chloride [soil, industrial]: 0.00070951 kg; lognormal variance with pedigree 0.16725, pedigree (1,1,3,1,1)
  (same comment as for Cobalt)
- Manganese [air, low population density, long-term]: 1.7541e-6 kg; lognormal variance with pedigree 0.3, pedigree (1,1,3,1,1)
  (same comment as for Selenium)
- Occupation, dump site [natural resource, land]: 0.0023333 m2*year; lognormal variance with pedigree 0.082256, pedigree (1,1,3,1,1)
  for landfill operation phase and spontaneous renaturation.
  Uncertainty: Uncertainty calculated from uncertainty in base parameters.
- Nitrogen [soil, industrial]: 0.0058018 kg; lognormal variance with pedigree 0.10269, pedigree (1,1,3,1,1)
  (same comment as for Cobalt)
- Cobalt [air, low population density, long-term]: 3.0952e-6 kg; lognormal variance with pedigree 0.28142, pedigree (1,1,3,1,1)
  (same comment as for Selenium)
- Methane, fossil [air, non-urban air or from high stacks]: 0.004005 kg; lognormal variance with pedigree 0.10764, pedigree (1,1,3,1,1)
  (same comment as for Nitrogen oxides)
- Sulfur [soil, industrial]: 0.00013299 kg; lognormal variance with pedigree 0.22809, pedigree (1,1,3,1,1)
  (same comment as for Cobalt)
- Chromium [air, low population density, long-term]: 3.4797e-9 kg; lognormal variance with pedigree 1.9322, pedigree (1,1,3,1,1)
  (same comment as for Selenium)
- Heat, waste [water, ground-, long-term]: 22.895 MJ; lognormal variance with pedigree 0.014651, pedigree (1,1,3,1,1)
  burden from long-term decomposition of waste (>100a).
  Uncertainty: Uncertainty calculated from unertainty of the waste composition of this waste, uncertainty in waste decomposition and short-term leaching in landfill
- Arsenic [air, low population density, long-term]: 1.8696e-7 kg; lognormal variance with pedigree 0.37397, pedigree (1,1,3,1,1)
  (same comment as for Selenium)
- Carbon [soil, industrial]: 0.49344 kg; lognormal variance with pedigree 0.0045838, pedigree (1,1,3,1,1)
  (same comment as for Cobalt)
- Cadmium [air, low population density, long-term]: 3.2473e-7 kg; lognormal variance with pedigree 0.35593, pedigree (1,1,3,1,1)
  (same comment as for Selenium)
- Heat, waste [soil, industrial]: 0.14134 MJ; lognormal variance with pedigree 0.081737, pedigree (1,1,3,1,1)
  burden from short-term decomposition of waste (0-100a).
  Uncertainty: Uncertainty calculated from unertainty of the waste composition of this waste, uncertainty in waste decomposition and short-term leaching in landfill
- Barium [air, low population density, long-term]: 4.8725e-6 kg; lognormal variance with pedigree 0.26606, pedigree (1,1,3,1,1)
  (same comment as for Selenium)
- Aluminium [air, non-urban air or from high stacks]: 9.8678e-9 kg; lognormal variance with pedigree 0.40409, pedigree (1,1,3,1,1)
  (same comment as for Particulates, > 2.5 um, and < 10um)
- Hydrogen chloride [air, low population density, long-term]: 7.6851e-5 kg; lognormal variance with pedigree 0.17418, pedigree (1,1,3,1,1)
  (same comment as for Selenium)
- Sodium [air, non-urban air or from high stacks]: 5.986e-6 kg; lognormal variance with pedigree 0.20466, pedigree (1,1,3,1,1)
  (same comment as for Particulates, > 2.5 um, and < 10um)
- Hydrogen fluoride [air, low population density, long-term]: 1.1776e-6 kg; lognormal variance with pedigree 0.31342, pedigree (1,1,3,1,1)
  (same comment as for Selenium)
- Iron [air, non-urban air or from high stacks]: 1.3557e-9 kg; lognormal variance with pedigree 0.46962, pedigree (1,1,3,1,1)
  (same comment as for Particulates, > 2.5 um, and < 10um)
- Bromine [air, low population density, long-term]: 6.7244e-6 kg; lognormal variance with pedigree 0.25487, pedigree (1,1,3,1,1)
  (same comment as for Selenium)
- Calcium [air, non-urban air or from high stacks]: 3.8556e-8 kg; lognormal variance with pedigree 0.35958, pedigree (1,1,3,1,1)
  (same comment as for Particulates, > 2.5 um, and < 10um)
- Nitrate [air, low population density, long-term]: 0.0027881 kg; lognormal variance with pedigree 0.10713, pedigree (1,1,3,1,1)
  (same comment as for Selenium)
- Titanium [air, non-urban air or from high stacks]: 4.9339e-8 kg; lognormal variance with pedigree 0.35113, pedigree (1,1,3,1,1)
  (same comment as for Particulates, > 2.5 um, and < 10um)
- Sulfate [air, low population density, long-term]: 4.4166e-5 kg; lognormal variance with pedigree 0.2295, pedigree (1,1,3,1,1)
  (same comment as for Selenium)
- Beryllium [air, non-urban air or from high stacks]: 2.8692e-11 kg; lognormal variance with pedigree 0.59616, pedigree (1,1,3,1,1)
  (same comment as for Particulates, > 2.5 um, and < 10um)
- Particulates, > 10 um [air, low population density, long-term]: 0.050443 kg; lognormal variance with pedigree 0.058544, pedigree (1,1,3,1,1)
  (same comment as for Selenium)
- Strontium [air, non-urban air or from high stacks]: 5.0784e-9 kg; lognormal variance with pedigree 0.42623, pedigree (1,1,3,1,1)
  (same comment as for Particulates, > 2.5 um, and < 10um)
- Particulates, > 2.5 um, and < 10um [air, low population density, long-term]: 0.030266 kg; lognormal variance with pedigree 0.078298, pedigree (1,1,3,1,1)
  (same comment as for Selenium)
- Thallium [air, non-urban air or from high stacks]: 2.2953e-11 kg; lognormal variance with pedigree 0.60332, pedigree (1,1,3,1,1)
  (same comment as for Particulates, > 2.5 um, and < 10um)
- Particulates, < 2.5 um [air, low population density, long-term]: 0.020177 kg; lognormal variance with pedigree 0.1237, pedigree (1,1,3,1,1)
  (same comment as for Selenium)
- Vanadium [air, non-urban air or from high stacks]: 1.3531e-7 kg; lognormal variance with pedigree 0.31834, pedigree (1,1,3,1,1)
  (same comment as for Particulates, > 2.5 um, and < 10um)
- Aluminium [soil, industrial]: 0.00017744 kg; lognormal variance with pedigree 0.21973, pedigree (1,1,3,1,1)
  (same comment as for Cobalt)
- Zinc [air, non-urban air or from high stacks]: 3.2566e-9 kg; lognormal variance with pedigree 0.44106, pedigree (1,1,3,1,1)
  (same comment as for Particulates, > 2.5 um, and < 10um)
- Sodium [soil, industrial]: 0.0013002 kg; lognormal variance with pedigree 0.14448, pedigree (1,1,3,1,1)
  (same comment as for Cobalt)
- Selenium [air, non-urban air or from high stacks]: 2.1858e-10 kg; lognormal variance with pedigree 0.53036, pedigree (1,1,3,1,1)
  (same comment as for Particulates, > 2.5 um, and < 10um)
- Iron [soil, industrial]: 8.872e-5 kg; lognormal variance with pedigree 0.24292, pedigree (1,1,3,1,1)
  (same comment as for Cobalt)
- Antimony [air, non-urban air or from high stacks]: 1.681e-8 kg; lognormal variance with pedigree 0.3869, pedigree (1,1,3,1,1)
  (same comment as for Particulates, > 2.5 um, and < 10um)
- Calcium [soil, industrial]: 0.00026616 kg; lognormal variance with pedigree 0.20599, pedigree (1,1,3,1,1)
  (same comment as for Cobalt)
- Tin [air, non-urban air or from high stacks]: 5.8162e-12 kg; lognormal variance with pedigree 0.6493, pedigree (1,1,3,1,1)
  (same comment as for Particulates, > 2.5 um, and < 10um)
- Thallium [soil, industrial]: 3.5488e-7 kg; lognormal variance with pedigree 0.424, pedigree (1,1,3,1,1)
  (same comment as for Cobalt)
- Nickel [air, non-urban air or from high stacks]: 2.2953e-10 kg; lognormal variance with pedigree 0.52867, pedigree (1,1,3,1,1)
  (same comment as for Particulates, > 2.5 um, and < 10um)
- Strontium [soil, industrial]: 7.8517e-5 kg; lognormal variance with pedigree 0.24679, pedigree (1,1,3,1,1)
  (same comment as for Cobalt)
- Lead [air, non-urban air or from high stacks]: 3.2595e-11 kg; lognormal variance with pedigree 0.59251, pedigree (1,1,3,1,1)
  (same comment as for Particulates, > 2.5 um, and < 10um)
- Beryllium [soil, industrial]: 4.436e-7 kg; lognormal variance with pedigree 0.41684, pedigree (1,1,3,1,1)
  (same comment as for Cobalt)
- Manganese [air, non-urban air or from high stacks]: 2.0348e-8 kg; lognormal variance with pedigree 0.38548, pedigree (1,1,3,1,1)
  (same comment as for Particulates, > 2.5 um, and < 10um)
- Titanium [soil, industrial]: 0.0008872 kg; lognormal variance with pedigree 0.16669, pedigree (1,1,3,1,1)
  (same comment as for Cobalt)
- Chromium [air, non-urban air or from high stacks]: 6.1879e-11 kg; lognormal variance with pedigree 0.57185, pedigree (1,1,3,1,1)
  (same comment as for Particulates, > 2.5 um, and < 10um)
- Vanadium [soil, industrial]: 0.00044631 kg; lognormal variance with pedigree 0.21401, pedigree (1,1,3,1,1)
  (same comment as for Cobalt)
- Sodium [air, low population density, long-term]: 0.00013849 kg; lognormal variance with pedigree 0.15449, pedigree (1,1,3,1,1)
  (same comment as for Selenium)
- Mercury [air, non-urban air or from high stacks]: 3.0349e-11 kg; lognormal variance with pedigree 0.60147, pedigree (1,1,3,1,1)
  (same comment as for Particulates, > 2.5 um, and < 10um)
- Zinc [soil, industrial]: 6.1808e-5 kg; lognormal variance with pedigree 0.25479, pedigree (1,1,3,1,1)
  (same comment as for Cobalt)
- Iron [air, low population density, long-term]: 9.8564e-6 kg; lognormal variance with pedigree 0.24298, pedigree (1,1,3,1,1)
  (same comment as for Selenium)
- Copper [air, non-urban air or from high stacks]: 5.8021e-11 kg; lognormal variance with pedigree 0.57384, pedigree (1,1,3,1,1)
  (same comment as for Particulates, > 2.5 um, and < 10um)
- Antimony [soil, industrial]: 2.0077e-5 kg; lognormal variance with pedigree 0.46753, pedigree (1,1,3,1,1)
  (same comment as for Cobalt)
- Calcium [air, low population density, long-term]: 2.9535e-5 kg; lognormal variance with pedigree 0.20649, pedigree (1,1,3,1,1)
  (same comment as for Selenium)
- Cadmium [air, non-urban air or from high stacks]: 6.0982e-10 kg; lognormal variance with pedigree 0.46689, pedigree (1,1,3,1,1)
  (same comment as for Particulates, > 2.5 um, and < 10um)
- Selenium [soil, industrial]: 6.9965e-7 kg; lognormal variance with pedigree 0.42957, pedigree (1,1,3,1,1)
  (same comment as for Cobalt)
- Aluminium [air, low population density, long-term]: 1.9706e-5 kg; lognormal variance with pedigree 0.21994, pedigree (1,1,3,1,1)
  (same comment as for Selenium)
- Cobalt [air, non-urban air or from high stacks]: 9.9934e-9 kg; lognormal variance with pedigree 0.40564, pedigree (1,1,3,1,1)
  (same comment as for Particulates, > 2.5 um, and < 10um)
- Tin [soil, industrial]: 8.872e-7 kg; lognormal variance with pedigree 0.39478, pedigree (1,1,3,1,1)
  (same comment as for Cobalt)
- Titanium [air, low population density, long-term]: 9.8528e-5 kg; lognormal variance with pedigree 0.16687, pedigree (1,1,3,1,1)
  (same comment as for Selenium)
- Hydrogen fluoride [air, non-urban air or from high stacks]: 4.7963e-8 kg; lognormal variance with pedigree 0.42603, pedigree (1,1,3,1,1)
  (same comment as for Particulates, > 2.5 um, and < 10um)
- Nickel [soil, industrial]: 3.5488e-6 kg; lognormal variance with pedigree 0.34931, pedigree (1,1,3,1,1)
  (same comment as for Cobalt)
- Thallium [air, low population density, long-term]: 3.9408e-8 kg; lognormal variance with pedigree 0.42434, pedigree (1,1,3,1,1)
  (same comment as for Selenium)
- Bromine [air, non-urban air or from high stacks]: 1.9789e-7 kg; lognormal variance with pedigree 0.27257, pedigree (1,1,3,1,1)
  (same comment as for Particulates, > 2.5 um, and < 10um)
- Lead [soil, industrial]: 4.9683e-6 kg; lognormal variance with pedigree 0.33853, pedigree (1,1,3,1,1)
  (same comment as for Cobalt)
- Strontium [air, low population density, long-term]: 8.719e-6 kg; lognormal variance with pedigree 0.24705, pedigree (1,1,3,1,1)
  (same comment as for Selenium)
- Arsenic [air, non-urban air or from high stacks]: 3.831e-10 kg; lognormal variance with pedigree 0.45874, pedigree (1,1,3,1,1)
  (same comment as for Particulates, > 2.5 um, and < 10um)
- Manganese [soil, industrial]: 1.5969e-5 kg; lognormal variance with pedigree 0.29531, pedigree (1,1,3,1,1)
  (same comment as for Cobalt)
- Zinc [air, low population density, long-term]: 6.8643e-6 kg; lognormal variance with pedigree 0.25501, pedigree (1,1,3,1,1)
  (same comment as for Selenium)
- Barium [air, non-urban air or from high stacks]: 5.6522e-8 kg; lognormal variance with pedigree 0.3516, pedigree (1,1,3,1,1)
  (same comment as for Particulates, > 2.5 um, and < 10um)
- Copper [soil, industrial]: 1.0646e-5 kg; lognormal variance with pedigree 0.31339, pedigree (1,1,3,1,1)
  (same comment as for Cobalt)
- Beryllium [air, low population density, long-term]: 4.926e-8 kg; lognormal variance with pedigree 0.41718, pedigree (1,1,3,1,1)
  (same comment as for Selenium)
- Nitrate [air, non-urban air or from high stacks]: 6.6739e-5 kg; lognormal variance with pedigree 0.17383, pedigree (1,1,3,1,1)
  (same comment as for Sulfate)
- Chromium [soil, industrial]: 3.1873e-8 kg; lognormal variance with pedigree 1.9316, pedigree (1,1,3,1,1)
  (same comment as for Cobalt)
- Vanadium [air, low population density, long-term]: 4.9455e-5 kg; lognormal variance with pedigree 0.21497, pedigree (1,1,3,1,1)
  (same comment as for Selenium)
- Hydrogen chloride [air, non-urban air or from high stacks]: 2.2694e-6 kg; lognormal variance with pedigree 0.1995, pedigree (1,1,3,1,1)
  (same comment as for Particulates, > 2.5 um, and < 10um)
- Mercury [soil, industrial]: 7.9826e-8 kg; lognormal variance with pedigree 0.48204, pedigree (1,1,3,1,1)
  (same comment as for Cobalt)

## Extrapolations
This dataset has been extrapolated from year 2012 to the year of the calculation (2019). The uncertainty has been adjusted accordingly.
