# glazing production, double, U<1.1 W/m2K

Dataset: EcoSpold 2, unit process
Geography: RoW
Time period: 1996-01-01 to 2019-12-31
Technology level: current
Classification: ISIC rev.4 ecoinvent: 2310:Manufacture of glass and glass products
Classification: EcoSpold01Categories: building components/windows
Tags: ConvertedDataset
Scenario: Business-as-Usual
System model: Allocation at the point of substitution
Generated by: Martin Lehmann
Published in: Kellenberger D. 2007
Database: ecoinvent
isCopyrightProtected: true
accessRestrictedTo: 1

## General comment
This dataset describes the processes included in the production of 1.06m2 (corresponding to 1m2 visible area) double glazing (2-IV) with a U-value below 1.1 W/m2K. It can be applied for double glazing used in the building sector. 1 m2 visible glazing area has a final weight of 20 kg.
[This dataset was already contained in the ecoinvent database version 2. It was not individually updated during the transfer to ecoinvent version 3. Life Cycle Impact Assessment results may still have changed, as they are affected by changes in the supply chain, i.e. in other datasets. This dataset was generated following the ecoinvent quality guidelines for version 2. It may have been subject to central changes described in the ecoinvent version 3 change report (http://www.ecoinvent.org/database/ecoinvent-version-3/reports-of-changes/), and the results of the central updates were reviewed extensively. The changes added e.g. consistent water flows and other information throughout the database. The documentation of this dataset can be found in the ecoinvent reports of version 2, which are still available via the ecoinvent website. The change report linked above covers all central changes that were made during the conversion process.]

## Included activities end
Included in this dataset are the materials and production processes of 1.06m2 (corresponding to 1m2 visible area) double glazing (2-IV) with a U-value below 1.1 W/m2K including disposal of waste water and production wastes.

## Geography
Data estimated according to a European company.

## Technology
The technology represents average European production.

## Parameters
- fraction, process water, to air: 0.24 dimensionless; name fraction_PW_to_air; lognormal variance with pedigree 0.092025, pedigree (4,4,3,2,4)
- fraction, water, completely softened, to air: 0.24; name fraction_WCS_to_air; lognormal variance with pedigree 0.092025, pedigree (4,4,3,2,4)

## Reference product
- glazing, double, U<1.1 W/m2K: 1 m2; By-product classification allocatable product; CPC 37114: Glass in sheets, bent, edge-worked, engraved, drilled, enamelled or otherwise worked, but not framed, etc.
  EcoSpold01Location=RER
  production volume 2.67763 m2
    This is a placeholder value that does not reflect real-world production volumes. This dataset does not currently require a real-world production volume to work in the database framework, and no actual data were collected yet. This has no negative effect on the results of the ecoinvent database.
  property price 63.9513 EUR2005
    Calculated based on inputs: The price of the product has been calculated as a sum of the values of the material and energy inputs for this product. This value is therefore a rough estimation. It may underestimate the real price since there are additional expenses when producing any product. These expences can include for example labour costs, treatment of waste materials and profit for the producer. Please consider carefully whether this level of data quality is acceptable for your application.
  property carbon content, fossil 0.00359953
    Calculated as an addition of C content in the product, then referred to 1 kg DM.
  property carbon content 0.00359953
    carbon content on a dry matter basis (reserved; not for manual entry)
  property true value 63.9513
    allocation property applied in "true value" allocation // value calculated from revenue
  properties: water content 0, water in wet mass 0 kg, dry mass 21.2742 kg, carbon content, non-fossil 0, wet mass 21.2742 kg, carbon allocation 0.0765772 kg

## By-products
- heat, for reuse in municipal waste incineration only: 0 MJ; CPC 17300: Steam and hot water; By-product classification allocatable product; pedigree (1,1,1,1,1)
  Net electricity generated from this waste and used in internal MSWI plant energy redistribution.
  Uncertainty: uncertainty is calculated from uncertainties in waste composition and uncertainties in energy efficiency and the uncertainty in internal energy demand
  production volume 0.00721925 MJ
  property exergy 0.1842 MJ; name E_th_prod_MSWI_exergy
    This exergy property is based on the exergy content of the product.
  property price 0.0106 EUR2005; name E_th_prod_MSWI_price_EUR2005
    Average European district heat price from Ecoheatcool and Euroheat 2005-2006, Ecoheat Work package 1: The European heat market. Final report. 10.6 EUR/GJ i s the price of district heat. http://www.solarthermalworld.org/files/Ecoheatcool%20WP1%20Web.pdf?download
  property true value relation 0.1842; name E_th_prod_MSWI_true_value_relation
    property to calculate "true value" from
  property true value 2.10788e-5
    allocation property applied in "true value" allocation // value calculated from true value relation
- electricity, for reuse in municipal waste incineration only: 0 kWh; CPC 17100: Electrical energy; By-product classification allocatable product; pedigree (1,1,1,1,1)
  (same comment as for heat, for reuse in municipal waste incineration only)
  production volume 2.66431e-5 kWh
  property price 0.1 EUR2005; name E_el_prod_MSWI_price_EUR2005
    Estimated to be the same price as in case of electricity, medium voltage.
  property exergy 3.6 MJ; name E_el_prod_MSWI_exergy
    This exergy property is based on the exergy content of the product.
  property true value relation 3.6; name E_el_prod_MSWI_true_value_relation
    property to calculate "true value" from
  property true value 1.76626e-6
    (same comment as for heat, for reuse in municipal waste incineration only)

## Inputs from technosphere
- electricity, low voltage: 0 kWh; pedigree (1,1,1,1,1)
  EcoSpold01Location=UCTE
- argon, liquid: 0.024431 kg; lognormal variance with pedigree 0.0526, pedigree (1,3,5,5,1)
  EcoSpold01Location=RER
  properties: dry mass 1 kg, wet mass 1 kg
- sheet rolling, aluminium: 0.30323 kg; lognormal variance with pedigree 0.0526, pedigree (1,3,5,5,1)
  EcoSpold01Location=RER
- zeolite, powder: 1.3152 kg; lognormal variance with pedigree 0.2706, pedigree (4,3,5,5,5)
  EcoSpold01Location=RER
  properties: wet mass 1 kg, dry mass 1 kg
- wastewater, unpolluted: -0.0009964 m3; lognormal variance with pedigree 0.0526, pedigree (1,3,5,5,1)
  EcoSpold01Location=CH
  production volume 0.0029892 m3
    Calculated from the production volume of glazing, double, U<1.1 W/m2K in proportion to the respective output amounts.
  properties: carbon content, fossil 0.00178991, carbon content, non-fossil 0.00178991, water content 2962.17, dry mass 0.337476 kg, wet mass 1000 kg
  note on carbon content, fossil: Assumed to be like in tap water. Bicarbonate content is 2.93 mol/m3. CO2 content is 0.1 mol/m3 (ecoinvent v2.2 report 8, Tab 93.1).
- polybutadiene: 0.0093741 kg; lognormal variance with pedigree 0.0526, pedigree (1,3,5,5,1)
  EcoSpold01Location=RER
  properties: carbon content, fossil 0.857143, wet mass 1 kg, dry mass 1 kg
  note on carbon content, fossil: Monomer is 1,3-butadiene (C4H8) (ecoinvent v2.2 report 11_II). MW=56
- flat glass, coated: 9.6836 kg; lognormal variance with pedigree 0.0526, pedigree (1,3,5,5,1)
  EcoSpold01Location=RER
  properties: dry mass 1 kg, wet mass 1 kg
- water, completely softened: 0 kg; name water_softened_input; pedigree (1,1,1,1,1)
  EcoSpold01Location=RER
  properties: wet mass 1 kg
- waste glass: 0 kg; pedigree (1,1,1,1,1)
  EcoSpold01Location=CH
  production volume 0 kg
    (same comment as for wastewater, unpolluted)
  properties: dry mass 1 kg, wet mass 1 kg
- polysulfide, sealing compound: 0.43825 kg; lognormal variance with pedigree 0.1726, pedigree (1,3,5,5,1)
  EcoSpold01Location=RER
  properties: carbon content, fossil 0.1564, wet mass 1 kg, dry mass 1 kg
  note on carbon content, fossil: Calculated as the addition of C content in its components (ecoinvent v2 report_7)
- flat glass, uncoated: 9.6836 kg; lognormal variance with pedigree 0.0526, pedigree (1,3,5,5,1)
  EcoSpold01Location=RER
  properties: dry mass 1 kg, wet mass 1 kg
- aluminium, wrought alloy: 0.30323 kg; lognormal variance with pedigree 0.0526, pedigree (1,3,5,5,1)
  EcoSpold01Location=RER
  properties: wet mass 1 kg, dry mass 1 kg
- electricity, low voltage: 0.0425974, 0.00747105, 0.122854, 1.85791, 0.306243, 0.872323 kWh (6 entries); lognormal variance with pedigree 0.0532, pedigree (2,3,5,5,1)
  EcoSpold01Location=UCTE
- water, completely softened: 0.426557, 0.569842 kg (2 entries); lognormal variance with pedigree 0.0526, pedigree (1,3,5,5,1)
  EcoSpold01Location=RER
- waste glass: -0.128156, -0.0118118, -0.000267971, -0.00110203, -0.00167349, -0.00493116, -1.20776 kg (7 entries); lognormal variance with pedigree 0.0526, pedigree (1,3,5,5,1)
  EcoSpold01Location=CH
  production volume 4.0671 kg

## Emissions to nature
- Water [air, unspecified]: 0.000239136 m3; name water_to_air_unspecified; lognormal variance with pedigree 0.0827, pedigree (2,2,5,5,1)
  Calculated value based on literature values and expert opinion. See comments in the parametres' comment field.
  property fraction, origin: salt water 0; name fraction_origin_salt_water
  property fraction, origin: fresh water 1; name fraction_origin_fresh_water
  property fraction, origin: unspecified 0; name fraction_origin_unspecified

## Sampling procedure
Company documentation, calculations based on geometry

## Extrapolations
see Geography This dataset has been copied from an original dataset covering the geography RER. The uncertainty has been adjusted accordingly.

## Review by Rolf Frischknecht 2009-01-22
passed
