# maintenance, intermodal shipping container, 40-foot, high-cube

Dataset: EcoSpold 2, unit process
Geography: GLO
Time period: 2010-01-01 to 2019-12-31
Technology level: current
Classification: EcoSpold01Categories: transport systems/train
Classification: ISIC rev.4 ecoinvent: 3315:Repair of transport equipment, except motor vehicles
Scenario: Business-as-Usual
System model: Allocation at the point of substitution
Generated by: Tereza Levova
Database: ecoinvent
isCopyrightProtected: true
accessRestrictedTo: 1

## General comment
This dataset describe materials needed for the maintenance of intermodal shipping container during its lifetime.
The data on container maintenance are scarce and vary a lot. The data in this dataset are calculated based on estimates or estimated, thus the uncertainty is rather high.
The container's lifetime is quite short. Once the structural strength cannot be ensured anymore the container is being disposed of. That is why the amounts of materials for the maintenance are not very high. Even though the container cannot fulfil its original purpose anymore (since its strength cannot be guaranteed) it is usually generally in good condition. That is why there are many projects which try to come up with a way of reusing the old shipping containers.
The amount of maintenance might vary depending on what kind of cargo is being transported and how often is the container being used.

## Included activities start
The activity starts with different materials and services needed for the maintenance of the container enter the activity.

## Parameters
- density: 7800 kg/m3; name density_corrugated_steel_wall; lognormal variance with pedigree 0.0032, pedigree (3,3,1,1,1)
  Estimated. The density of steel, low-alloyed used for the corrugated steel walls of the container.
- fraction, process water, to air: 0.15 dimensionless; name fraction_PW_to_air; lognormal variance with pedigree 0.0166, pedigree (4,5,1,1,1)
  Estimated.
- lifetime: 15 year; name lifetime_container; lognormal variance with pedigree 0.0006, pedigree (1,1,1,1,1)
  Industrial data.
- thickness of metal sheet_01: 1.4 mm; name thickness_walls; lognormal variance with pedigree 0.0026, pedigree (1,4,1,1,1)
  Industrial data.

## Reference product
- maintenance, intermodal shipping container, 40-foot, high-cube: 1 unit; By-product classification allocatable product; CPC 87149: Maintenance and repair services of other transport equipment
  production volume 5.4285e6 unit; = (32.9*1000000*0.33)/2
    Calculated value.
    32.9 million TEU (Twenty-foot Equivalent unit) is the capacity of shipping containers in the world (World Shipping Council, http://www.worldshipping.org/about-the-industry/containers/global-container-fleet, accessed 20141014).
    Out of that 33% is 40-food, high-cube containers (Containerization International Market Analysis, World Container Census 2008, http://people.hofstra.edu/geotrans/eng/ch3en/conc3en/containerfleet.html, accessed 20141014).
    One 40-food, high-cube container has a capacity of 2 TEU.
  property price 170.861 EUR2005
    Calculated based on inputs: The price of the product has been calculated as a sum of the values of the material and energy inputs for this product. This value is therefore a rough estimation. It may underestimate the real price since there are additional expenses when producing any product. These expences can include for example labour costs, treatment of waste materials and profit for the producer. Please consider carefully whether this level of data quality is acceptable for your application.
  property true value 170.861
    allocation property applied in "true value" allocation // value calculated from revenue

## By-products
- wood chips, from post-consumer wood, measured as dry mass: 0 kg; By-product classification allocatable product; CPC 3928: Sawdust and wood waste and scrap
  EcoSpold01Location=CH
  production volume 5.07186e8 kg
    Production of waste urban and demolition wood in CH in 2003 is 0.2 million m3.
    year 2003 values
    Calculated from the production volume of waste wood, 40% water on dry mass basis in proportion to the respective output amounts.
  property price 0.107 EUR2005
    Expert judgement (Urs Luginbühl, Swiss Sawmilling industry, personal communication in June 2014). Wood chips from softwood should have a price of 0.101 EUR/kg. Woodchips from hardwood should have a price of 0.112 EUR/kg. Average of these two values is used. Cross-reference; FAOSTAT database; http://faostat.fao.org/site/626/DesktopDefault.aspx?PageID=626#ancor; Average import/export prices of EU for 'chips and particles'. Price: 48.76 Euro/m3. The density of the wood chips is 650 kg/m3. The price is recalculated accordingly.
  property carbon content, non-fossil 0.494
    C content of dry mass is 0.494 kgC/kg dry wood (ecoinvent v2.2 report 6_IX & ecoinvent v2.2 report 9).
  property carbon content 0.494
    carbon content on a dry matter basis (reserved; not for manual entry)
  property true value 9.99704
    allocation property applied in "true value" allocation // value calculated from revenue
  properties: carbon content, fossil 0, water in wet mass 0.4 kg, dry mass 1 kg, wet mass 1.4 kg, water content 0.4, carbon allocation 0.494 kg
- heat, for reuse in municipal waste incineration only: 0 MJ; CPC 17300: Steam and hot water; By-product classification allocatable product; pedigree (1,1,1,1,1)
  Net electricity generated from this waste and used in internal MSWI plant energy redistribution.
  Uncertainty: uncertainty is calculated from uncertainties in waste composition and uncertainties in energy efficiency and the uncertainty in internal energy demand
  production volume 6.17417e8 MJ
  property exergy 0.1842 MJ; name E_th_prod_MSWI_exergy
    This exergy property is based on the exergy content of the product.
  property price 0.0106 EUR2005; name E_th_prod_MSWI_price_EUR2005
    Average European district heat price from Ecoheatcool and Euroheat 2005-2006, Ecoheat Work package 1: The European heat market. Final report. 10.6 EUR/GJ i s the price of district heat. http://www.solarthermalworld.org/files/Ecoheatcool%20WP1%20Web.pdf?download
  property true value relation 0.1842; name E_th_prod_MSWI_true_value_relation
    property to calculate "true value" from
  property true value 0.25078
    allocation property applied in "true value" allocation // value calculated from true value relation
- electricity, for reuse in municipal waste incineration only: 0 kWh; CPC 17100: Electrical energy; By-product classification allocatable product; pedigree (1,1,1,1,1)
  (same comment as for heat, for reuse in municipal waste incineration only)
  production volume 8.76077e7 kWh
  property true value relation 3.6; name E_el_prod_MSWI_true_value_relation
    property to calculate "true value" from
  property price 0.1 EUR2005; name E_el_prod_MSWI_price_EUR2005
    Estimated to be the same price as in case of electricity, medium voltage.
  property exergy 3.6 MJ; name E_el_prod_MSWI_exergy
    This exergy property is based on the exergy content of the product.
  property true value 0.694296
    (same comment as for heat, for reuse in municipal waste incineration only)
- zinc concentrate: 0 kg; CPC 14290: Other non-ferrous metal ores and concentrates (other than uranium or thorium ores and concentrates); By-product classification allocatable product
  Calculated value from the knowledge of the properties of both products.
  production volume 39282.1 kg
  property price 0.38 EUR2005; name ByP_price_EUR2005
    Temporary price data. Calculated as 90% of purchasers price based on: Zinc content in concentrate 53%. Concentrate price per kg Zn 86.5% of refined Zn price (13.5% treatment charges according to CHR Metals Limited 2005: Dynamic cost curves. http://www.minecost.com/dynamic.pdf). 2004 zinc price from USGS (2007) Mineral commodity summaries 2007. <http://minerals.usgs.gov/minerals/pubs/mcs/2007/mcs2007.pdf> [Accessed 25 May 2010]
  property zinc content 0.53; name zinc_C_zinc_concentrate
    Zinc content on a dry matter basis. Value taken from teh "zinc mine operation" /GLO dataset.
  property dry mass 1 kg; name DM_zinc_concentrate
  property carbon content 0
    carbon content on a dry matter basis (reserved; not for manual entry)
  property true value 5.64275e-5
    allocation property applied in "true value" allocation // value calculated from revenue
  properties: wet mass 1 kg, water content 0, carbon content, non-fossil 0, carbon content, fossil 0, water in wet mass 0 kg, carbon allocation 0 kg
- iron scrap, sorted, pressed: 0 kg; By-product classification Recyclable; CPC 39310: Slag, dross, scalings and other waste from the manufacture of iron or steel; pedigree (1,1,1,1,1)
  Iron scrap recovered from this waste.
  production volume 1.97439e7 kg
  property price 0.175 EUR2005
    Temporary price data. Calculated as 90% of purchasers price based on: 2005 import and export prices (total trades (USD) divided by total weight (kg) in biggest economies of the world: EU27, USA, Brasil, China, India, Japan and Russia) from UN Commodity Trade Statistics Database (http://data.un.org/Explorer.aspxDatabase [Accessed 2011.06.20]). Commodity: Waste or scrap, of cast iron
  property carbon content 0
    carbon content on a dry matter basis (reserved; not for manual entry)
  property true value 0.00429454
    allocation property applied in "true value" allocation // value calculated from revenue
  properties: water content 0, water in wet mass 0 kg, carbon content, fossil 0, dry mass 1 kg, carbon content, non-fossil 0, wet mass 1 kg, carbon allocation 0 kg

## Inputs from technosphere
- lubricating oil: 0 kg; name oil_in; pedigree (1,1,1,1,1)
  Estimated value.
  It is estimated, that the hinges of the container are being treated with oil (1kg) twice a year.
  properties: carbon content, fossil 0.75, dry mass 1 kg, wet mass 1 kg
  note on carbon content, fossil: Lubricating oil is produced from diesel. C-content/dry mass of fats and oils considered 75%, from: ecoinvent v2.2 report, n 15a, pg 40
- synthetic rubber: 5.53234 kg; name rubber_in; lognormal variance with pedigree 0.0186, pedigree (4,5,3,1,1)
  Estimated value.
  It is estimated, that the rubber used for the seal gasket is exchanged at least once during the lifetime of the container.
  properties: dry mass 1 kg, wet mass 1 kg, carbon content, fossil 0.871949
  note on carbon content, fossil: EPDM (Ethylene-propene-diene terpolymer) rubber is a terpolymer of ethylene, propene, and a diene with the residual unsaturated portion of the diene in the side chain (ecoinvent v2.2 report 7-part XX & Ullmann). Chemical formula (deduced from Evidences of Solvent-Induced Miscibility in Polychloroprene-co-Ethylene-Propene Diene Terpolymer Blends, Dubey et al., Journal of Applied Polymer Science, 2009, 111:1884–1891): C20H35
- waste wood, post-consumer: -87.8049 kg; = ( plywood_in* Ref('3a0af1d6-04c3-41c6-a3da-92c4f61e0eaa', '793cda0d-85d3-4741-bab0-5d59f84f1a16'))*-1; lognormal variance with pedigree 0.0026, pedigree (1,1,3,1,1)
  Calculated value.
  production volume 5.07186e8 kg; = Ref('ad20b468-e133-4c4d-a5a4-8ced89e4bad9', 'ProductionVolume') * ((Ref('2d4a9cd6-b2a5-4ebe-b1b8-6886ec8623f0')*-1) / Ref('ad20b468-e133-4c4d-a5a4-8ced89e4bad9'))
    Calculated from production volume of reference product using the relative outputs.
  properties: price 0.079 EUR2005, water content 0.4, wet mass 1.4 kg, dry mass 1 kg, carbon content, non-fossil 0.494
- plywood, for outdoor use: 0 m3; name plywood_in; pedigree (1,1,1,1,1)
  Estimated value.
  It is estimated, that 20% of the plywood used for floor of the container is exchanged during the lifetime of the container.
  properties: carbon content, fossil 0.0439893, water content 0.0601214, carbon content, non-fossil 0.424285, dry mass 589.555 kg, wet mass 625 kg
- scrap steel: 0 kg; name steel_out; pedigree (1,1,1,1,1)
  Calculated value.
  production volume 0 kg
    Calculated from production volume of reference product using the relative outputs.
  property price 0 EUR2005; name steel_out_price_EUR2005
  properties: dry mass 1 kg, wet mass 1 kg
- building, hall: 0.00306131 m2; = 1/(( lifetime_building*365)/(12.192*2.438*2)); lognormal variance with pedigree 0.318, pedigree (4,5,3,1,1)
  Calculated value based on estimates.
  1m2 of hall is available every day for 50 years
  1 container occupies the area of its based for the period of 2 days once a year for maintenance
  property lifetime 50 year; name lifetime_building
- steel, low-alloyed, hot rolled: 30.7875 kg; name steel_in; = 3*(thickness_walls/1000)*density_corrugated_steel_wall; lognormal variance with pedigree 0.0186, pedigree (4,5,3,1,1)
  Estimated value.
  It is estimated, that approximately 3m2 of corrugated steel with a thickness of 1.4mm is being used during the lifetime of a container to fix small cracks.
  properties: wet mass 1 kg, dry mass 1 kg, carbon content, fossil 0.005
  note on carbon content, fossil: Low alloyed steel composition given in Tab. 3.2 ecoinvent v2.2 report 10_partII. Steel assumed to have a C content of 0.5%
- wastewater, unpolluted: 0 m3; pedigree (1,1,1,1,1)
  Calculated value.
  production volume 0 m3
    Calculated from production volume of reference product using the relative outputs.
  properties: carbon content, non-fossil 0.00178991, dry mass 0.337476 kg, carbon content, fossil 0.00178991, water content 2962.17, wet mass 1000 kg
  note on carbon content, fossil: Assumed to be like in tap water. Bicarbonate content is 2.93 mol/m3. CO2 content is 0.1 mol/m3 (ecoinvent v2.2 report 8, Tab 93.1).
- metal working, average for steel product manufacturing: 30.7875 kg; = steel_in; lognormal variance with pedigree 0.0186, pedigree (4,5,3,1,1)
  Calculated value.
- tap water: 6343.59 kg; name tap_water_in; = 3*150* lifetime_container; lognormal variance with pedigree 0.0186, pedigree (4,5,3,1,1)
  Estimated value.
  It is estimated, that the container is being cleaned 3 times a year using 150 litres of water.
  properties: dry mass 0.000337476 kg, wet mass 1 kg, water content 2962.17, carbon content, fossil 0.00178991
  note on carbon content, fossil: Bicarbonate content is 2.93 mol/m3. CO2 content is 0.1 mol/m3 (ecoinvent v2.2 report 8, Tab 93.1).
- waste mineral oil: 0 kg; name oil_out; pedigree (1,1,1,1,1)
  production volume 0 kg
    Calculated from production volume of reference product using the relative outputs.
  property price 0 EUR2005; name oil_out_price_EUR2005
  properties: water content 0.111111, dry mass 0.9 kg, carbon content, fossil 0.864444, wet mass 1 kg
  note on carbon content, fossil: Tab A.6, ecoinvent v2.2 report 13_I. C content has been calculated after data in the tables, and then referred to 1 kg DM
- waste rubber, unspecified: 0 kg; pedigree (1,1,1,1,1)
  Calculated value.
  production volume 0 kg
    Calculated from production volume of reference product using the relative outputs.
  properties: dry mass 1 kg, wet mass 1 kg, carbon content, fossil 0.853
- lubricating oil: 4.90562, 23.2881 kg (2 entries); lognormal variance with pedigree 0.0186, pedigree (4,5,3,1,1)
  (same comment as for lubricating oil)
- plywood, for outdoor use: 0.0149197, 0.134015 m3 (2 entries); lognormal variance with pedigree 0.0038, pedigree (2,3,3,1,1)
  (same comment as for plywood, for outdoor use)
- scrap steel: -7.49662, -0.0094776, -23.2814 kg (3 entries); lognormal variance with pedigree 0.0186, pedigree (4,5,3,1,1)
  Calculated value.
  production volume 1.77838e8 kg
- wastewater, unpolluted: -0.0431364, -5.34891 m3 (2 entries); lognormal variance with pedigree 0.0186, pedigree (4,5,3,1,1)
  Calculated value.
  production volume 3.1146e7 m3
- waste mineral oil: -6.34613, -0.146843, -18.8814 kg (3 entries); lognormal variance with pedigree 0.0186, pedigree (4,5,3,1,1)
  production volume 1.4657e8 kg
- waste rubber, unspecified: -2.7093, -0.113736, -2.7093 kg (3 entries); lognormal variance with pedigree 0.0186, pedigree (4,5,3,1,1)
  Calculated value.
  production volume 3.19564e7 kg

## Emissions to nature
- Oils, unspecified [soil, unspecified]: 2.81937 kg; name oil_into_soil; = oil_in*0.1; lognormal variance with pedigree 0.0186, pedigree (4,5,3,1,1)
  Estimated value.
- Water [air, unspecified]: 0.951538 m3; name water_to_air; = (tap_water_in* fraction_PW_to_air)/1000; lognormal variance with pedigree 0.0186, pedigree (4,5,3,1,1)
  Calculated value.
