# natural gas, high pressure, import from NL

Dataset: EcoSpold 2, unit process
Geography: PL
Time period: 2012-01-01 to 2019-12-31
Technology level: current
Classification: ISIC rev.4 ecoinvent: 3520:Manufacture of gas; distribution of gaseous fuels through mains
Scenario: Business-as-Usual
System model: Allocation at the point of substitution
Share of production covered: 100 %
Generated by: Mireille Faist Emmenegger
Published in: Faist Emmenegger, Mireille 2015
Database: ecoinvent
isCopyrightProtected: true
accessRestrictedTo: 1

## General comment
This dataset describes the transport needed for the export of Dutch natural gas to Poland (expressed in tkm). It takes into account the parts of on- (71.6%) and offshore (28.4%) production. Gas losses and emissions during seasonal storage are included. An average distance of 400 km is estimated for the export. For offshore gas 100 km offshore pipeline are added.
Characteristics are based on the ecoinvent report v2 'Erdgas' from 2007: HV; 38.41 MJ/m-3; density, 0.82 kg/m-3, 0.67 kg CH4/m-3, 0.008 kg CO2/m-3

## Included activities start
Export natural gas field

## Included activities end
Distribution market of country

## Geography
The average weighted export distance is based on the trade movements 2012.

## Technology
The distance to the different countries is based on rough estimates.

## Reference product
- natural gas, high pressure: 1 m3; source BP 2014; CPC 12020: Natural gas, liquefied or in the gaseous state; By-product classification allocatable product
  production volume 5.81538e7 m3
    m3 imported in 2012 from NL to PL according to BP Statistical Review of World Energy, June 2014. The share of import to the category 'other Europe' is 3.86% from Netherlands, 38.4% from Norway, 0.008% from United Kingdom, 48.2% from Russian Federation, 9.6% from Algeria based on the import mix to 'other Europe' as described by BP 2014. Scaled form BP standard heating value (37.8MJ/m3) to LHV of ecoinvent v3 (39MJ/m3).
    Refrence(s): BP (2014). Statistical Review of World Energy, June 2014. Retrieved online from http://www.bp.com/content/dam/bp/excel/energy-economics/statistical-review-2015/bp-statistical-review-of-world-energy-2015-workbook.xlsx, 30 August, 2017
  properties: price 0.166 EUR2005, dry mass 0.84 kg, carbon content, non-fossil 0, wet mass 0.84 kg, carbon content, fossil 0.602381, water in wet mass 0 kg, heating value, gross 0 MJ, water content 0, carbon content 0.602381, carbon allocation 0.506 kg

## Inputs from technosphere
- natural gas, high pressure: 0 m3; source Faist Emmenegger, M. 2007; pedigree (1,1,1,1,1)
  incl. storage losses
  Uncertainty: a
  properties: dry mass 0.84 kg, wet mass 0.84 kg, carbon content, fossil 0.602381
  note on carbon content, fossil: An average C content of 0.506 kg C/ m3 has been assumed (this average has been calculated using data in Tab 3.5, ecoinvent v2.2 report 6_V
- transport, pipeline, long distance, natural gas: 0.316 metric ton*km; = 400*0.79/1000; lognormal variance with pedigree 0.1226, pedigree (2,1,3,1,1)
  Average weighted distance is estimated based on export statistics and multiplied by the density of natural gas.
  Uncertainty: A
- natural gas, high pressure: 0 m3; source Faist Emmenegger, M. 2007; pedigree (1,1,1,1,1)
  incl. storage losses
  Uncertainty: a
  properties: wet mass 0.84 kg, carbon content, fossil 0.602381, dry mass 0.84 kg
- transport, pipeline, offshore, long distance, natural gas: 0.023288 metric ton*km; = 100*0.82/1000*0.284
  Average weighted distance is estimated based on export statistics and multiplied by the density (0.82) of natural gas and the share of offshore gas (0.284).
- natural gas, burned in gas motor, for storage: 0.0524 MJ; source Faist Emmenegger, M. 2007; lognormal variance with pedigree 0.0281, pedigree (4,1,3,3,3)
  Data from german industrial expert for 2001, standard technology
  Uncertainty: D
- natural gas, high pressure: 0.284028 m3; source Faist Emmenegger, M. 2007; lognormal variance with pedigree 0.0201, pedigree (4,1,3,3,1)
  incl. storage losses
  Uncertainty: a
- natural gas, high pressure: 0.716072 m3; source Faist Emmenegger, M. 2007; lognormal variance with pedigree 0.0201, pedigree (4,1,3,3,1)
  incl. storage losses
  Uncertainty: a

## Emissions to nature
All rows: source Faist Emmenegger, M. 2007
- Mercury [air, non-urban air or from high stacks]: 1e-12 kg; lognormal variance with pedigree 0.0426, pedigree (2,1,3,1,1)
  calculated based on average losses for storage (0.01%) and dutch gas composition
  Uncertainty: c
- Ethane [air, non-urban air or from high stacks]: 2.3e-6 kg; lognormal variance with pedigree 0.1226, pedigree (2,1,3,1,1)
  (same comment as for Mercury)
- Carbon dioxide, fossil [air, non-urban air or from high stacks]: 8e-7 kg; lognormal variance with pedigree 0.0026, pedigree (2,1,3,1,1)
  (same comment as for Mercury)
- Propane [air, non-urban air or from high stacks]: 3e-7 kg; lognormal variance with pedigree 0.1226, pedigree (2,1,3,1,1)
  (same comment as for Mercury)
- Butane [air, non-urban air or from high stacks]: 1e-7 kg; lognormal variance with pedigree 0.1226, pedigree (2,1,3,1,1)
  (same comment as for Mercury)
- Methane, fossil [air, non-urban air or from high stacks]: 6.71e-5 kg; lognormal variance with pedigree 0.1226, pedigree (2,1,3,1,1)
  (same comment as for Mercury)

## Sampling procedure
statistics

## Extrapolations
This dataset has been extrapolated from year 2012 to the year of the calculation (2019). The uncertainty has been adjusted accordingly.
