# container production, for collection of post-consumer waste plastic for recycling

Dataset: EcoSpold 2, unit process
Geography: CH
Time period: 2010-01-01 to 2019-12-31
Technology level: current
Classification: ISIC rev.4 ecoinvent: 2220:Manufacture of plastics products
Scenario: Business-as-Usual
System model: Allocation at the point of substitution
Generated by: Thomas Kägi
Published in: Kägi T. 2017
Database: ecoinvent
isCopyrightProtected: true
accessRestrictedTo: 1

## General comment
The functional unit of this activity is the production of a container, with the unit defined based on the typical material requirements for the collection of 1 kg of post-consumer waste plastic for recycling. The underlying data was obtained from PET Recycling Schweiz and this inventory represents the average material requirements over different types of single-way and reusable container types/systems. The inventory only represents a rough estmation of the manufacturing process.

## Included activities start
Activity starts with the production of the container for the collection of post-consumer waste plastic packaging material intended for recycling.

## Included activities end
This activity ends with the waste material generated by the container at the end of service. Neither losses during production, use and disposal nor infrastructure requirements have been included due to lack of data.

## Allocation
no allocation involved

## Reference product
- container, for collection of post-consumer waste plastic for recycling: 1 unit; name RP_amount; CPC 36990: Articles of plastics n.e.c.; By-product classification allocatable product
  The unit of the container is here defined based on the typical material requirements for the collection of 1 kg of post-consumer waste plastic for recycling.
  production volume 6.17983e7 unit; name RP_PV
    Estimated as sum of production volumes for treatment of unsorted waste PE and PET for recycling.
  property price 0.028 EUR2005
    Based on estimate for main materials and material processing amounting to 0.04 CHF per kg of collected PE/PET in Switzerland.
  property true value 0.028; name RP_amount_true_value
    allocation property applied in "true value" allocation // value calculated from revenue

## By-products
- iron scrap, unsorted: 0 kg; = steel_lowAll_amount+steel_sheet_amount*15.637; CPC 39310: Slag, dross, scalings and other waste from the manufacture of iron or steel; By-product classification Recyclable; pedigree (1,1,1,1,1)
  Generation of by-product/waste derived based on requirement for input material(s)
  production volume 180376 kg; = ABS((steel_lowAll_amount+steel_sheet_amount*15.637)/RP_amount*RP_PV)
    Estimated as sum of production volumes for treatment of unsorted waste PE and PET for recycling; production volume of by-products/waste scaled according to relationship with reference product
  property price 0.149 EUR2005
    Temporary price data. Calculated as 90% of purchasers price based on: estimated at 85% of sorted scrap
  property carbon content 0
    carbon content on a dry matter basis (reserved; not for manual entry)
  property true value 0.000434899
    allocation property applied in "true value" allocation // value calculated from revenue
  properties: water content 0, dry mass 1 kg, carbon content, non-fossil 0, water in wet mass 0 kg, wet mass 1 kg, carbon content, fossil 0, carbon allocation 0 kg
- heat, for reuse in municipal waste incineration only: 0 MJ; CPC 17300: Steam and hot water; By-product classification allocatable product; pedigree (1,1,1,1,1)
  Net useful heat generated from this waste and used in internal MSWI plant energy redistribution.
  Uncertainty: uncertainty is calculated from uncertainties in waste composition and uncertainties in energy efficiency and the uncertainty in internal energy demand
  production volume 1.14281e7 MJ
  property true value relation 0.1842; name E_th_prod_MSWI_true_value_relation
    property to calculate "true value" from
  property exergy 0.1842 MJ; name E_th_prod_MSWI_exergy
    This exergy property is based on the exergy content of the product.
  property price 0.0106 EUR2005; name E_th_prod_MSWI_price_EUR2005
    Average European district heat price from Ecoheatcool and Euroheat 2005-2006, Ecoheat Work package 1: The European heat market. Final report. 10.6 EUR/GJ i s the price of district heat. http://www.solarthermalworld.org/files/Ecoheatcool%20WP1%20Web.pdf?download
  property true value 0.00121171
    allocation property applied in "true value" allocation // value calculated from true value relation
- electricity, for reuse in municipal waste incineration only: 0 kWh; CPC 17100: Electrical energy; By-product classification allocatable product; pedigree (1,1,1,1,1)
  Net electricity generated from this waste and used in internal MSWI plant energy redistribution.
  Uncertainty: uncertainty is calculated from uncertainties in waste composition and uncertainties in energy efficiency and the uncertainty in internal energy demand
  production volume 1.64845e6 kWh
  property exergy 3.6 MJ; name E_el_prod_MSWI_exergy
    This exergy property is based on the exergy content of the product.
  property true value relation 3.6; name E_el_prod_MSWI_true_value_relation
    property to calculate "true value" from
  property price 0.1 EUR2005; name E_el_prod_MSWI_price_EUR2005
    Estimated to be the same price as in case of electricity, medium voltage.
  property true value 0.00341597
    (same comment as for heat, for reuse in municipal waste incineration only)
- zinc concentrate: 0 kg; CPC 14290: Other non-ferrous metal ores and concentrates (other than uranium or thorium ores and concentrates); By-product classification allocatable product
  Calculated value from the knowledge of the properties of both products.
  production volume 109.403 kg
  property price 0.38 EUR2005; name ByP_price_EUR2005
    Temporary price data. Calculated as 90% of purchasers price based on: Zinc content in concentrate 53%. Concentrate price per kg Zn 86.5% of refined Zn price (13.5% treatment charges according to CHR Metals Limited 2005: Dynamic cost curves. http://www.minecost.com/dynamic.pdf). 2004 zinc price from USGS (2007) Mineral commodity summaries 2007. <http://minerals.usgs.gov/minerals/pubs/mcs/2007/mcs2007.pdf> [Accessed 25 May 2010]
  property zinc content 0.53; name zinc_C_zinc_concentrate
    Zinc content on a dry matter basis. Value taken from teh "zinc mine operation" /GLO dataset.
  property dry mass 1 kg; name DM_zinc_concentrate
  property carbon content 0
    carbon content on a dry matter basis (reserved; not for manual entry)
  property true value 6.72725e-7
    allocation property applied in "true value" allocation // value calculated from revenue
  properties: wet mass 1 kg, water content 0, carbon content, non-fossil 0, carbon content, fossil 0, water in wet mass 0 kg, carbon allocation 0 kg
- waste paperboard, sorted: 0 kg; CPC 39240: Waste and scrap of paper or paperboard; By-product classification Recyclable; pedigree (1,1,1,1,1)
  It is assumed that 86.3% (wet weight) of waste paperboard, unsorted is segregated to waste paperboard, sorted. Waste paper, sorted is later used in recycling industry where maximum 79% of it, is transformed into new paperboard.
  production volume 23466.1 kg
  property price 0.0436 EUR2005; name ByP_waste_paperboard_sorted_price_EUR200
    Estimated value; three different sources were used to determine the price for waste paperboard, sorted. 35 AUD/tonne (http://larimer.org/solidwaste/charts/Current.htm, accessed 20130328), 70 GBP/tonne (http://www.letsrecycle.com/prices/waste%20paper, accessed 20130328) and 20 USD/tonne (http://www.oxpaperboard.com/1/post/2013/03/ox-paperboard-announces-price-adjustment-to-uncoated-recycled-paperboard.html, accessed 20130328).
  property water content 0.243781; = WWM_waste_paperboard_sorted/ DM_waste_paperboard_sorted
  property water in wet mass 0.196 kg; name WWM_waste_paperboard_sorted; = WM_waste_paperboard_sorted- DM_waste_paperboard_sorted
  property dry mass 0.804 kg; name DM_waste_paperboard_sorted
  property wet mass 1 kg; name WM_waste_paperboard_sorted
  property carbon content 0.483259
    carbon content on a dry matter basis (reserved; not for manual entry)
  property true value 1.65558e-5
    allocation property applied in "true value" allocation // value calculated from revenue
  properties: carbon content, non-fossil 0.483259, carbon content, fossil 0, carbon allocation 0.38854 kg

## Inputs from technosphere
- polyethylene, low density, granulate: 0.0141017 kg; name LDPE_amount; lognormal variance with pedigree 0.0086, pedigree (1,1,4,1,1)
  properties: dry mass 1 kg, carbon content, fossil 0.857143, wet mass 1 kg
- waste polypropylene: -0.000460462 kg; = (PP_amount)*-1; lognormal variance with pedigree 0.0086, pedigree (1,1,4,1,1)
  Generation of by-product/waste derived based on requirement for input material(s)
  production volume 33618.3 kg; = ABS(PP_amount/RP_amount*RP_PV)
    (same comment as for iron scrap, unsorted)
  properties: water content 0.189061, carbon content, fossil 0.825208, dry mass 0.841 kg, wet mass 1 kg
- polypropylene, granulate: 0.000460462 kg; name PP_amount; lognormal variance with pedigree 0.0086, pedigree (1,1,4,1,1)
  properties: carbon content, fossil 0.857143, dry mass 1 kg, wet mass 1 kg
- electricity, low voltage: 0.00312336 kWh; lognormal variance with pedigree 0.0086, pedigree (1,1,4,1,1)
- steel, low-alloyed: 0.00183085 kg; name steel_lowAll_amount; lognormal variance with pedigree 0.0086, pedigree (1,1,4,1,1)
  properties: dry mass 1 kg, carbon content, fossil 0.005, wet mass 1 kg
- corrugated board box: 0.000372433 kg; name CBB_amount; lognormal variance with pedigree 0.0086, pedigree (1,1,4,1,1)
  properties: carbon content, fossil 0.00365437, wet mass 1 kg, water content 0.0582011, dry mass 0.945 kg, carbon content, non-fossil 0.450248
- tin plated chromium steel sheet, 2 mm: 4.09112e-5 m2; name steel_sheet_amount; lognormal variance with pedigree 0.041225, pedigree (1,1,5,2,2)
  properties: dry mass 15.6365 kg, wet mass 15.6365 kg
- extrusion, plastic film: 0.0147346 kg; lognormal variance with pedigree 0.0086, pedigree (1,1,4,1,1)
  activityLink introduced to establish a direct link to the corresponding regional supply of this product
- fleece, polyethylene: 4.23219e-9 kg; name fleecePE_amount; lognormal variance with pedigree 0.0086, pedigree (1,1,4,1,1)
  properties: wet mass 1 kg, dry mass 1 kg, carbon content, fossil 0.857143
- wire drawing, steel: 0.00183085 kg; lognormal variance with pedigree 0.0086, pedigree (1,1,4,1,1)
  (same comment as for extrusion, plastic film)
- injection moulding: 0.000332103 kg; lognormal variance with pedigree 0.0086, pedigree (1,1,4,1,1)
  (same comment as for extrusion, plastic film)
- waste paperboard, unsorted: -0.000372433 kg; = (CBB_amount)*-1; lognormal variance with pedigree 0.0086, pedigree (1,1,4,1,1)
  Generation of by-product/waste derived based on requirement for input material(s)
  production volume 27191.3 kg; = ABS(CBB_amount/RP_amount*RP_PV)
    (same comment as for iron scrap, unsorted)
  properties: price 0.03924 EUR2005, wet mass 1 kg, carbon content, non-fossil 0.483259, water content 0.243781, dry mass 0.804 kg
  note on carbon content, non-fossil: C content was calculated for 1 kg DM, using data in Tab A.3, ecoinvent v2.2 report 13_I.
- polyethylene, high density, granulate: 0.000330111 kg; name HDPE_amount; lognormal variance with pedigree 0.0086, pedigree (1,1,4,1,1)
  properties: wet mass 1 kg, carbon content, fossil 0.857143, dry mass 1 kg
  note on carbon content, fossil: Polyethylene is formed out of a huge amount of ethylene monomers (C2H4) (ecoinvent v2.2 report 11_II). MW=28 g/mol
- waste polyethylene: -0.0144318 kg; = (fleecePE_amount+HDPE_amount+LDPE_amount)*-1; lognormal variance with pedigree 0.0086, pedigree (1,1,4,1,1)
  Generation of by-product/waste derived based on requirement for input material(s)
  production volume 1.05366e6 kg; = ABS((fleecePE_amount+HDPE_amount+LDPE_amount)/RP_amount*RP_PV)
    (same comment as for iron scrap, unsorted)
  properties: wet mass 1 kg, water content 0.00401606, dry mass 0.996 kg, carbon content, fossil 0.825301
  note on carbon content, fossil: C content in 1 kg DM was calculated using data in Tab A.1, ecoinvent v2.2 report 13_I

## Sampling procedure
Uncertainty estimation according to the pedigree matrix

## Review by Ivan Muñoz Ortiz 2017-08-10
The container production data sets have been discussed with ecoinvent offline. No further comments at this point. No comments either on market data sets.
