# mine construction, gold

Dataset: EcoSpold 2, unit process
Geography: US
Time period: 2003-01-01 to 2019-12-31
Technology level: current
Classification: ISIC rev.4 ecoinvent: 4290:Construction of other civil engineering projects
Classification: EcoSpold01Categories: metals/extraction
Tags: ConvertedDataset
Scenario: Business-as-Usual
System model: Allocation at the point of substitution
Generated by: Matthias Tuchschmid (obsolete)
Published in: Classen M. 2009
Database: ecoinvent
isCopyrightProtected: true
accessRestrictedTo: 1

## General comment
This dataset describes the production of 1 unit of gold mine infrastructure. It includes land use and buildings and machinery consumption, as in open pit and underground mining. Data corresponds to US mines Bald Mountain, Cortez, Golden Sunlight, Goldstrike, Round Mountain, Nevada and Golden Giant, all of which produce only gold, and are either underground mines or open pits.
[This dataset was already contained in the ecoinvent database version 2. It was not individually updated during the transfer to ecoinvent version 3. Life Cycle Impact Assessment results may still have changed, as they are affected by changes in the supply chain, i.e. in other datasets. This dataset was generated following the ecoinvent quality guidelines for version 2. It may have been subject to central changes described in the ecoinvent version 3 change report (http://www.ecoinvent.org/database/ecoinvent-version-3/reports-of-changes/), and the results of the central updates were reviewed extensively. The changes added e.g. consistent water flows and other information throughout the database. The documentation of this dataset can be found in the ecoinvent reports of version 2, which are still available via the ecoinvent website. The change report linked above covers all central changes that were made during the conversion process.]

## Included activities start
From unoccupied land foreseen for a gold mine.

## Included activities end
This activity ends with the transformation of occupied land, in time.

The dataset includes land transformation and occupation during the different stages of the mine, as well as the consumption of buildings and machinery for open pit and underground mining.

## Geography
Land use of US-mine, other inputs based on rough assumptions.

## Technology
The mine is foreseen to have a lifetime of 50 years.

## Time period
Period of public environmental report

## Reference product
- mine infrastructure, gold: 1 unit; CPC 53261: Mining constructions; By-product classification allocatable product
  EcoSpold01Location=US
  production volume 0.0279245 unit
    351.6 Mill. t ore
    Calculated from the requirement per kg gold in the gold production dataset
  property price 3.74084e7 EUR2005
    Calculated based on inputs: The price of the product has been calculated as a sum of the values of the material and energy inputs for this product. This value is therefore a rough estimation. It may underestimate the real price since there are additional expenses when producing any product. These expences can include for example labour costs, treatment of waste materials and profit for the producer. Please consider carefully whether this level of data quality is acceptable for your application.

## Inputs from technosphere
- building, hall: 15000 m2; source Classen M. 2009; lognormal variance with pedigree 0.318, pedigree (4,5,5,5,5)
  Estimation: As of this exchange, mine construction process represents that of a mix of open pit mining and underground mining. Mine construction process is therefore assumed to be equivalent to a mix of the processes depicted in the ecoinvent generic datasets (v2) "non-ferrous metal, mine, surface" and "non-ferrous metal, mine, underground", in Part XIV of cited source.
  EcoSpold01Location=CH
  Uncertainty: Rough estimates
- industrial machine, heavy, unspecified: 650000 kg; source Classen M. 2009; lognormal variance with pedigree 0.318, pedigree (4,5,5,5,5)
  Estimation: As of this exchange, mine construction process represents that of a mix of open pit mining and underground mining. Mine construction process is therefore assumed to be equivalent to a mix of the processes depicted in the ecoinvent generic datasets (v2) "non-ferrous metal, mine, surface" and "non-ferrous metal, mine, underground", in Part XIV of cited source.
  EcoSpold01Location=RER
  Uncertainty: Rough estimates
- building, multi-storey: 275000 m3; source Classen M. 2009; lognormal variance with pedigree 0.318, pedigree (4,5,5,5,5)
  (same comment as for industrial machine, heavy, unspecified)
- conveyor belt: 6000 m; source Classen M. 2009; lognormal variance with pedigree 0.318, pedigree (4,5,5,5,5)
  EcoSpold01Location=RER
  Estimation: As of this exchange, mine construction process represents that of a mix of open pit mining and underground mining. Mine construction process is therefore assumed to be equivalent to a mix of the processes depicted in the ecoinvent generic datasets (v2) "non-ferrous metal, mine, surface" and "non-ferrous metal, mine, underground", in Part XIV of cited source.
  Uncertainty: Rough estimates

## Inputs from nature
All rows: source Barrick  2006
- Transformation, from mineral extraction site [natural resource, land]: 8.1862e8 m2; lognormal variance with pedigree 0.1606, pedigree (1,3,5,1,1)
  Literature value.
  Uncertainty: Environmental report, Newmont 2005
- Occupation, mineral extraction site [natural resource, land]: 3.5204e10 m2*year; lognormal variance with pedigree 0.0806, pedigree (1,3,5,1,1)
  Calculated value: The entire area of the mine is not in active use at one time; "disturbed area in active use" values reported in literature are assumed to be the average share of the mine area in use along 50 years of operation.
  The ammount reported in this dataset was obtained as follows:
  1. Total disturbed area in active use (along 50 years) was obtained by adding corresponding values for all mines considered in the country (see sources). This amount equals 7.04E08 m2.
  2. The occupation of the mine was then calculated as:
  Ocupation, mineral extraction site = (Total disturbed area in active use) * 50 years = 7.04E08 m2 * 50 years = 3.52E10 m2y
  Further references:
  Newmont (2005b) Now & Beyond: Sustainability Reports. Newmont Mining Corporation. Retrieved from
  <http://www.newmont.com/en/social/reporting/index.asp>
  Uncertainty: Environmental report, Newmont 2005
- Transformation, to heterogeneous, agricultural [natural resource, land]: 3.5458e7 m2; lognormal variance with pedigree 0.1606, pedigree (1,3,5,1,1)
  Estimation: "Transformation, to heterogeneous, agricultural" stands for the area that is revegetated (see sources).
  Calculated value: The ammount reported in this dataset was obtained by
  adding corresponding values for all mines considered in the country (see source). This amount equals 3.55E07 m2.
  Further references:
  Newmont (2005b) Now & Beyond: Sustainability Reports. Newmont Mining Corporation. Retrieved from
  <http://www.newmont.com/en/social/reporting/index.asp>
  Uncertainty: Environmental report, Newmont 2005
- Transformation, from unspecified [natural resource, land]: 8.1862e8 m2; lognormal variance with pedigree 0.1606, pedigree (1,3,5,1,1)
  Estimation: "Transformation, from unspecified" stands for the area disturbed during lifetime of mine.
  Calculated value: The ammount reported in this dataset was obtained by
  adding corresponding values for all mines considered in the country (see sources). This amount equals 8.19EE08 m2.
  Further references:
  Newmont (2005b) Now & Beyond: Sustainability Reports. Newmont Mining Corporation. Retrieved from
  <http://www.newmont.com/en/social/reporting/index.asp>
  Uncertainty: Environmental report, Newmont 2005
- Transformation, to unspecified [natural resource, land]: 7.8316e8 m2; lognormal variance with pedigree 0.1606, pedigree (1,3,5,1,1)
  Calculated value: The ammount reported in this dataset was obtained by
  adding corresponding values for all mines considered in the country (see sources).
  Further references:
  Newmont (2005b) Now & Beyond: Sustainability Reports. Newmont Mining Corporation. Retrieved from
  <http://www.newmont.com/en/social/reporting/index.asp>
  Uncertainty: Environmental report, Newmont 2005
- Transformation, to mineral extraction site [natural resource, land]: 8.1862e8 m2; lognormal variance with pedigree 0.1606, pedigree (1,3,5,1,1)
  Estimation: "Transformation, to mineral extraction site" stands for the area disturbed during lifetime of mine.
  Calculated value: The ammount reported in this dataset was obtained by
  adding corresponding values for all mines considered in the country (see sources). This amount equals 8.19E08 m2.
  Further references:
  Newmont (2005b) Now & Beyond: Sustainability Reports. Newmont Mining Corporation. Retrieved from
  <http://www.newmont.com/en/social/reporting/index.asp>
  Uncertainty: Environmental report, Newmont 2005

## Sampling procedure
environmental report

## Extrapolations
This dataset has been extrapolated from year 2006 to the year of the calculation (2019). The uncertainty has been adjusted accordingly.

## Review by Roberto Dones 2007-09-20
passed
none

## Review by Roland Hischier 2011-09-19
Transfer of documentation done.
