# solar collector system installation, evacuated tube collector, one-family house, combined system

Dataset: EcoSpold 2, unit process
Geography: RoW
Time period: 2002-01-01 to 2019-12-31
Technology level: current
Classification: ISIC rev.4 ecoinvent: 4322a: Installation of solar collector systems
Classification: EcoSpold01Categories: solar collector systems/systems
Tags: ConvertedDataset
Scenario: Business-as-Usual
System model: Allocation at the point of substitution
Generated by: Niels Jungbluth
Published in: Jungbluth, N. 2007
Database: ecoinvent
isCopyrightProtected: true
accessRestrictedTo: 1

## General comment
Solar system with an evacuated tube collector for hot water and auxiliary heating.
[This dataset was already contained in the ecoinvent database version 2. It was not individually updated during the transfer to ecoinvent version 3. Life Cycle Impact Assessment results may still have changed, as they are affected by changes in the supply chain, i.e. in other datasets. This dataset was generated following the ecoinvent quality guidelines for version 2. It may have been subject to central changes described in the ecoinvent version 3 change report (http://www.ecoinvent.org/database/ecoinvent-version-3/reports-of-changes/), and the results of the central updates were reviewed extensively. The changes added e.g. consistent water flows and other information throughout the database. The documentation of this dataset can be found in the ecoinvent reports of version 2, which are still available via the ecoinvent website. The change report linked above covers all central changes that were made during the conversion process.]

## Included activities end
Production and disposal of a complete solar system (excluding auxiliary heating). Including different components, heat exchange fluid, installation copper pipes, transports of parts to CH, delivery with a van and montage on the roof.

## Geography
Solar collector system operated in CH.

## Technology
Solar collector system for room heating and hot water installed on the roof of a house.

## Time period
Material data have been investigated for a collector produced in 2002. Data for energy uses during production have been investigated for 2001.

## Parameters
- fraction, process water, to air: 0.15 dimensionless; name fraction_PW_to_air; lognormal variance with pedigree 0.092025, pedigree (4,4,3,2,4)
- fraction, water, completely softened, to air: 0.15; name fraction_WCS_to_air; lognormal variance with pedigree 0.092025, pedigree (4,4,3,2,4)

## Reference product
- solar collector system, with evacuated tube collector, one-family house, combined system: 1 unit; By-product classification allocatable product; CPC 54631: Heating equipment installation services
  EcoSpold01Location=CH
  production volume 3.96633 unit
    This is a placeholder value that does not reflect real-world production volumes. This dataset does not currently require a real-world production volume to work in the database framework, and no actual data were collected yet. This has no negative effect on the results of the ecoinvent database.
  property price 13239.3 EUR2005
    Calculated based on inputs: The price of the product has been calculated as a sum of the values of the material and energy inputs for this product. This value is therefore a rough estimation. It may underestimate the real price since there are additional expenses when producing any product. These expences can include for example labour costs, treatment of waste materials and profit for the producer. Please consider carefully whether this level of data quality is acceptable for your application.
  property true value 13239.3
    allocation property applied in "true value" allocation // value calculated from revenue

## By-products
- heat, for reuse in municipal waste incineration only: 0 MJ; CPC 17300: Steam and hot water; By-product classification allocatable product; pedigree (1,1,1,1,1)
  Net electricity generated from this waste and used in internal MSWI plant energy redistribution.
  Uncertainty: uncertainty is calculated from uncertainties in waste composition and uncertainties in energy efficiency and the uncertainty in internal energy demand
  production volume 0.00458921 MJ
  property exergy 0.1842 MJ; name E_th_prod_MSWI_exergy
    This exergy property is based on the exergy content of the product.
  property price 0.0106 EUR2005; name E_th_prod_MSWI_price_EUR2005
    Average European district heat price from Ecoheatcool and Euroheat 2005-2006, Ecoheat Work package 1: The European heat market. Final report. 10.6 EUR/GJ i s the price of district heat. http://www.solarthermalworld.org/files/Ecoheatcool%20WP1%20Web.pdf?download
  property true value relation 0.1842; name E_th_prod_MSWI_true_value_relation
    property to calculate "true value" from
  property true value 1.00624e-5
    allocation property applied in "true value" allocation // value calculated from true value relation
- electricity, for reuse in municipal waste incineration only: 0 kWh; CPC 17100: Electrical energy; By-product classification allocatable product; pedigree (1,1,1,1,1)
  (same comment as for heat, for reuse in municipal waste incineration only)
  production volume 0.000646334 kWh
  property true value relation 3.6; name E_el_prod_MSWI_true_value_relation
    property to calculate "true value" from
  property price 0.1 EUR2005; name E_el_prod_MSWI_price_EUR2005
    Estimated to be the same price as in case of electricity, medium voltage.
  property exergy 3.6 MJ; name E_el_prod_MSWI_exergy
    This exergy property is based on the exergy content of the product.
  property true value 2.76972e-5
    (same comment as for heat, for reuse in municipal waste incineration only)

## Inputs from technosphere
- pump, 40W: 3.12 unit; lognormal variance with pedigree 0.062, pedigree (3,5,5,5,1)
  Estimation, extrapolation for life time of 10a
  EcoSpold01Location=CH
  Uncertainty: Estimation, extrapolation for life time of 10a
- heat storage, 2000l: 0.87 unit; lognormal variance with pedigree 0.062, pedigree (3,5,5,5,1)
  Extrapolated by weight
  EcoSpold01Location=CH
  Uncertainty: Extrapolated by weight
- expansion vessel, 25l: 1 unit; lognormal variance with pedigree 0.062, pedigree (3,5,5,5,1)
  EcoSpold01Location=CH
  Estimation
  Uncertainty: Estimation
- propylene glycol, liquid: 41.4 kg; lognormal variance with pedigree 0.062, pedigree (3,5,5,5,1)
  EcoSpold01Location=RER
  Plant data, exchange after 10a life time
  Uncertainty: Plant data, exchange after 10a life time
  properties: carbon content, fossil 0.473684, wet mass 1 kg, dry mass 1 kg
- tube insulation, elastomere: 5.2 kg; lognormal variance with pedigree 0.062, pedigree (3,5,5,5,1)
  EcoSpold01Location=DE
  Plant data
  Uncertainty: Plant data
  properties: wet mass 1 kg, carbon content, fossil 0.837817, dry mass 1 kg
  note on carbon content, fossil: The main raw material (93%) is synthetic rubber (Ethylene propylene diene monomer (EPDM)), that is used together with PVC (ecoinvent v2.2 report 7_XV), C2H3Cl
- drawing of pipe, steel: 16 kg; lognormal variance with pedigree 0.07, pedigree (3,5,5,5,3)
  EcoSpold01Location=RER
  Estimation for copper pipes
  Uncertainty: Estimation for copper pipes
- heat carrier liquid, 40% C3H8O2: -0.0984 m3; lognormal variance with pedigree 0.062, pedigree (3,5,5,5,1)
  EcoSpold01Location=CH
  Estimation
  Uncertainty: Estimation
  production volume 0.2952 m3
    Calculated from the production volume of solar collector system, with evacuated tube collector, one-family house, combined system in proportion to the respective output amounts.
  properties: carbon content, fossil 3, dry mass 6.31366 kg, wet mass 1000 kg, price 1.08656 EUR2005, water content 157.387
  note on carbon content, fossil: The composition of the product was used to estimate its carbon content: 40% (w/v) C3H8O2.
- copper: 16 kg; lognormal variance with pedigree 0.062, pedigree (3,5,5,5,1)
  Plant data, warm water pipes
  EcoSpold01Location=RER
  Uncertainty: Plant data, warm water pipes
  properties: dry mass 1 kg, wet mass 1 kg
- water, completely softened: 0 kg; name water_softened_input; pedigree (1,1,1,1,1)
  (same comment as for propylene glycol, liquid)
  properties: wet mass 1 kg
- evacuated tube collector: 10.5 m2; lognormal variance with pedigree 0.062, pedigree (3,5,5,5,1)
  EcoSpold01Location=GB
  Estimation
  Uncertainty: Estimation
- water, completely softened: 24.4016, 32.5984 kg (2 entries); lognormal variance with pedigree 0.062, pedigree (3,5,5,5,1)
  (same comment as for propylene glycol, liquid)

## Emissions to nature
- Water [water, unspecified]: 0.04845 m3; name water_to_water_unspecified; lognormal variance with pedigree 0.0827, pedigree (2,2,5,5,1)
  Calculated value based on literature values and expert opinion. See comments in the parametres' comment field.
  property fraction, origin: unspecified 0; name fraction_origin_unspecified_Ww
  property fraction, origin: fresh water 1; name fraction_origin_fresh_water_Ww
  property water in wet mass 1000 kg; name WWM
  property carbon content, non-fossil 0; name C_content_non_fossil
  property dry mass 0 kg; name DM
  property wet mass 1000 kg; name WM
  property carbon content, fossil 0; name C_content_fossil
  property fraction, origin: salt water 0; name fraction_origin_salt_water_Ww
- Water [air, unspecified]: 0.00855 m3; name water_to_air_unspecified; lognormal variance with pedigree 0.0827, pedigree (2,2,5,5,1)
  (same comment as for Water)
  property fraction, origin: salt water 0; name fraction_origin_salt_water
  property fraction, origin: fresh water 1; name fraction_origin_fresh_water
  property fraction, origin: unspecified 0; name fraction_origin_unspecified

## Sampling procedure
Own simulation.

## Extrapolations
none This dataset has been copied from an original dataset covering the geography CH. The uncertainty has been adjusted accordingly.

## Review by Sebastiano Meier 2003-06-16
Passed.
