# technical wood drying facility construction

Dataset: EcoSpold 2, unit process
Geography: RER
Time period: 2002-01-01 to 2019-12-31
Technology level: current
Classification: ISIC rev.4 ecoinvent: 4290:Construction of other civil engineering projects
Synonyms: kiln; Trocknungskammer
Tags: ConvertedDataset; Swiss brush-up completed
Scenario: Business-as-Usual
System model: Allocation at the point of substitution
Generated by: Frank Werner
Published in: Werner F. 2007
Database: ecoinvent
isCopyrightProtected: true
accessRestrictedTo: 1

## General comment
The service life is assumed to be 50 years. The kiln has a capacity of 30 m3 wood per charge. Drying time depends on wood type and in- and output moisture content. This data must only be used to consider the infrastructure needed for kiln drying wood if this is not relevant.
[This dataset was already contained in the ecoinvent database version 2. It was not individually updated during the transfer to ecoinvent version 3. Life Cycle Impact Assessment results may still have changed, as they are affected by changes in the supply chain, i.e. in other datasets. This dataset was generated following the ecoinvent quality guidelines for version 2. It may have been subject to central changes described in the ecoinvent version 3 change report (http://www.ecoinvent.org/database/ecoinvent-version-3/reports-of-changes/), and the results of the central updates were reviewed extensively. The changes added e.g. consistent water flows and other information throughout the database. The documentation of this dataset can be found in the ecoinvent reports of version 2, which are still available via the ecoinvent website. The change report linked above covers all central changes that were made during the conversion process.]

## Included activities end
The land area and the materials and their transports needed for building and disposal of a kiln with a per charge loading capacity of 30 m3 wood (under bark) are included. Not included is the land used for storage etc.

## Geography
Estimate is so rough that the Geograhpy is not relevant.

## Technology
Medium sized kiln of polystyren foam insulated aluminium panels, located with sawmill

## Reference product
- technical wood drying facility: 1 unit; By-product classification allocatable product; CPC 53269: Other constructions for manufacturing
  production volume 1.32237 unit
    This is a placeholder value that does not reflect real-world production volumes. This dataset does not currently require a real-world production volume to work in the database framework, and no actual data were collected yet. This has no negative effect on the results of the ecoinvent database. The placeholder value of this activity was scaled according to the nominal GDP of 2005 (source: United Nations, http://data.un.org/Glossary.aspx?q=GDP+%28current+US%24%29, accessed 20130726) to reflect an appropriate share of the global production volume, which is also a placeholder value.
  property price 48006 EUR2005
    Convert from EU 27 price to the world by currency exchange rate.
  property true value 48006
    allocation property applied in "true value" allocation // value calculated from revenue

## By-products
- electricity, for reuse in municipal waste incineration only: 0 kWh; CPC 17100: Electrical energy; By-product classification allocatable product; pedigree (1,1,1,1,1)
  Net electricity generated from this waste and used in internal MSWI plant energy redistribution.
  Uncertainty: uncertainty is calculated from uncertainties in waste composition and uncertainties in energy efficiency and the uncertainty in internal energy demand
  production volume 1019.35 kWh
  property exergy 3.6 MJ; name E_el_prod_MSWI_exergy
    This exergy property is based on the exergy content of the product.
  property true value relation 3.6; name E_el_prod_MSWI_true_value_relation
    property to calculate "true value" from
  property price 0.1 EUR2005; name E_el_prod_MSWI_price_EUR2005
    Estimated to be the same price as in case of electricity, medium voltage.
  property true value 65.2843
    allocation property applied in "true value" allocation // value calculated from true value relation
- heat, for reuse in municipal waste incineration only: 0 MJ; CPC 17300: Steam and hot water; By-product classification allocatable product; pedigree (1,1,1,1,1)
  (same comment as for electricity, for reuse in municipal waste incineration only)
  production volume 7104.74 MJ
  property exergy 0.1842 MJ; name E_th_prod_MSWI_exergy
    This exergy property is based on the exergy content of the product.
  property true value relation 0.1842; name E_th_prod_MSWI_true_value_relation
    property to calculate "true value" from
  property price 0.0106 EUR2005; name E_th_prod_MSWI_price_EUR2005
    Average European district heat price from Ecoheatcool and Euroheat 2005-2006, Ecoheat Work package 1: The European heat market. Final report. 10.6 EUR/GJ i s the price of district heat. http://www.solarthermalworld.org/files/Ecoheatcool%20WP1%20Web.pdf?download
  property true value 23.2985
    (same comment as for electricity, for reuse in municipal waste incineration only)
- zinc concentrate: 0 kg; CPC 14290: Other non-ferrous metal ores and concentrates (other than uranium or thorium ores and concentrates); By-product classification allocatable product
  Calculated value from the knowledge of the properties of both products.
  production volume 0.0729885 kg
  property price 0.38 EUR2005; name ByP_price_EUR2005
    Temporary price data. Calculated as 90% of purchasers price based on: Zinc content in concentrate 53%. Concentrate price per kg Zn 86.5% of refined Zn price (13.5% treatment charges according to CHR Metals Limited 2005: Dynamic cost curves. http://www.minecost.com/dynamic.pdf). 2004 zinc price from USGS (2007) Mineral commodity summaries 2007. <http://minerals.usgs.gov/minerals/pubs/mcs/2007/mcs2007.pdf> [Accessed 25 May 2010]
  property zinc content 0.53; name zinc_C_zinc_concentrate
    Zinc content on a dry matter basis. Value taken from teh "zinc mine operation" /GLO dataset.
  property dry mass 1 kg; name DM_zinc_concentrate
  property carbon content 0
    carbon content on a dry matter basis (reserved; not for manual entry)
  property true value 0.000808027
    allocation property applied in "true value" allocation // value calculated from revenue
  properties: wet mass 1 kg, water content 0, carbon content, non-fossil 0, carbon content, fossil 0, water in wet mass 0 kg, carbon allocation 0 kg
- iron scrap, sorted, pressed: 0 kg; By-product classification Recyclable; CPC 39310: Slag, dross, scalings and other waste from the manufacture of iron or steel; pedigree (1,1,1,1,1)
  Iron scrap recovered from this waste.
  production volume 3.46437 kg
  property price 0.175 EUR2005
    Temporary price data. Calculated as 90% of purchasers price based on: 2005 import and export prices (total trades (USD) divided by total weight (kg) in biggest economies of the world: EU27, USA, Brasil, China, India, Japan and Russia) from UN Commodity Trade Statistics Database (http://data.un.org/Explorer.aspxDatabase [Accessed 2011.06.20]). Commodity: Waste or scrap, of cast iron
  property carbon content 0
    carbon content on a dry matter basis (reserved; not for manual entry)
  property true value 0.0499293
    allocation property applied in "true value" allocation // value calculated from revenue
  properties: water content 0, water in wet mass 0 kg, carbon content, fossil 0, dry mass 1 kg, carbon content, non-fossil 0, wet mass 1 kg, carbon allocation 0 kg

## Inputs from technosphere
- waste polystyrene isolation, flame-retardant: 0 kg; pedigree (1,1,1,1,1)
  production volume 0 kg
    Calculated from the production volume of technical wood drying facility in proportion to the respective output amounts.
  properties: SAM_activityLink_1_scaling_factor -1, dry mass 0.998012 kg, SAM_activityLink_1 875, carbon content, fossil 0.918145, water content 0.00199232, wet mass 1 kg
  note on SAM_activityLink_1_scaling_factor: to be used only in special submissions in coordination with ecoinvent and the Swiss FOEN
  note on carbon content, fossil: Polystyrene isolation (EPS) is flame-retarded with hexa-bromo-cyclo-dodecan (C12H18Br6) and contains 0.67 w% bromine (ecoinvent v2.2 report 13_I, pg 39). The rest is polystyrene: (C8H8)n.
- concrete, normal: 4.49171 m3; lognormal variance with pedigree 0.0831, pedigree (3,5,5,3,3)
  properties: water content 0.086758, dry mass 2190 kg, wet mass 2380 kg
- sheet rolling, aluminium: 638.821 kg; lognormal variance with pedigree 0.0831, pedigree (3,5,5,3,3)
  Activity link used to reflect the reality of the local market
  properties: SAM_activityLink_1_scaling_factor 1, SAM_activityLink_1 4036
- waste reinforced concrete: 0 kg; pedigree (1,1,1,1,1)
  production volume 0 kg
    (same comment as for waste polystyrene isolation, flame-retardant)
  properties: water content 0.00585407, SAM_activityLink_9_scaling_factor 0.0610101, SAM_activityLink_9 4433, SAM_activityLink_8_scaling_factor 0.0220202, SAM_activityLink_1_scaling_factor -1, SAM_activityLink_1 883, wet mass 1 kg, SAM_activityLink_8 4417, dry mass 0.99418 kg
  note on SAM_activityLink_9_scaling_factor: Scaling factor = amount of transport in corresponding KBOB dataset/amount of this input from technosphere. Source for transport distance: Life Cycle Inventories of Wood as Fuel and Construction Material/2007/Werner F. To be used only in special submissions in coordination with ecoinvent and the Swiss FOEN
  note on SAM_activityLink_9: This link has been introduced to model transport specifically for the SAM model; to be used only in special submissions in coordination with ecoinvent and the Swiss FOEN.
- aluminium, wrought alloy: 638.821 kg; lognormal variance with pedigree 0.0831, pedigree (3,5,5,3,3)
  properties: wet mass 1 kg, SAM_activityLink_1_scaling_factor 1, SAM_activityLink_1 163, dry mass 1 kg
- polystyrene foam slab: 450.169 kg; lognormal variance with pedigree 0.0831, pedigree (3,5,5,3,3)
  properties: SAM_activityLink_1 3551, wet mass 1 kg, SAM_activityLink_1_scaling_factor 1, carbon content, fossil 0.859091, dry mass 1 kg
  note on carbon content, fossil: XPS consists in 91% of polystyrene, 7% of blowing agent and the re-maining 2% are flame retardants (bromine compounds) and other additives (ecoinvent v2.2 report 7, part XIV, pg69). The chemical formula of polystyrene is (C8H8)n. Here, the blowing agent is CO2.
- waste polystyrene isolation, flame-retardant: -437.054, -13.1149 kg (2 entries); lognormal variance with pedigree 0.0662, pedigree (2,3,5,1,1)
  production volume 451 kg
- waste reinforced concrete: -9778.15, -103.607 kg (2 entries); lognormal variance with pedigree 0.0662, pedigree (2,3,5,1,1)
  production volume 9900 kg

## Inputs from nature
- Transformation, to industrial area [natural resource, land]: 14.9724 m2; lognormal variance with pedigree 0.4081, pedigree (3,5,5,3,3)
- Occupation, industrial area [natural resource, land]: 748.618 m2*year; lognormal variance with pedigree 0.2581, pedigree (3,5,5,3,3)
- Transformation, from unspecified [natural resource, land]: 14.9724 m2; lognormal variance with pedigree 0.4081, pedigree (3,5,5,3,3)

## Sampling procedure
estimation
