# tap water production, direct filtration treatment

Dataset: EcoSpold 2, unit process
Geography: CH
Time period: 2012-01-01 to 2019-12-31
Technology level: current
Classification: EcoSpold01Categories: water supply/production
Classification: ISIC rev.4 ecoinvent: 3600:Water collection, treatment and supply
Synonyms: potable water
Scenario: Business-as-Usual
System model: Allocation at the point of substitution
Generated by: Tereza Levova
Database: ecoinvent
isCopyrightProtected: true
accessRestrictedTo: 1

## General comment
This dataset is created as a child of global dataset with edited production volume for this geography.

This dataset represents production of 1 kg of tap water under pressure at facility gate, ready for distribution in network. It represents average operation of direct filtration treatment for production of tap water. Direct filtration treatment includes sand filtration and disinfection. Inventory was constructed from reported chemicals, energy inputs and wastes from 2 distinct direct filtration plants located in Québec covering nearly 100% of total production of tap water from this technology.
[This dataset is meant to replace the following datasets:
- tap water production and supply, CH, 2000 - 2000]

## Included activities start
From the intake pumping of raw surface water into the water treatment plant.

## Included activities end
This dataset ends with the production of tap water, at facility gate, under pressure. It includes energy for intake pumping, treatment system, lighting and heating of the building as well as the energy of the pump pressurizing water to the beginning of the network. It includes all chemicals and material added to the water during treatment and, when needed, ultraviolent lamps for replacement. It excludes energy for pumping stations and water losses within the network which is included in the tap water market. Emissions to the environment occurring during the treatment and during the distribution were not considered as they are assumed negligible. Main substance in water that would be released in the environment are assumed to be considered in wastewater processes.

## Geography
Extrapolated from data from two plants in Quebec (Canada).The uncertainty was adjusted accordingly.

## Time period
Time of publication.

## Parameters
- unit conversion, days in a year: 365.25 d/year; name days_per_year; lognormal variance with pedigree 0.0006, pedigree (1,1,1,1,1)
  Conversion factor.

## Reference product
- tap water: 1 kg; name tapwater; CPC 18000: Natural water; By-product classification allocatable product; CAS 7732-18-5
  production volume 3.19e11 kg; name PV_tapwater; = 1E12*0.319
    Calculated based on estimates and literature values.
    1E9 m3/year is the amount of tap water produced in Switzerland yearly (http://www.svgw.ch/fileadmin/resources/svgw/web/Shop-Boutique/download/09_W-Informationsmaterial/SVGW_Shop_TWI-12_d.pdf , accessed 20140527).
    40% is the share of tap water produced without any treatment
    28% is the share of tap water produced with multi-stage (conventional) treatment
    32% is the share of tap water produced with single-stage (direct filtration) treatment
  property price 0.000397 EUR2005
    Converted from EU price by using Purchasing Power Parities (0.8458 in 2003 and 0.8426 in 2004)
  property carbon content 0.0017899
    carbon content on a dry matter basis (reserved; not for manual entry)
  property true value 0.000397; name tapwater_true_value
    allocation property applied in "true value" allocation // value calculated from revenue
  properties: carbon content, non-fossil 0, carbon content, fossil 0.0017899, wet mass 1 kg, water in wet mass 0.99966 kg, dry mass 0.00034 kg, water content 2940.18, carbon allocation 6.08566e-7 kg

## By-products
- electricity, for reuse in municipal waste incineration only: 0 kWh; CPC 17100: Electrical energy; By-product classification allocatable product; pedigree (1,1,1,1,1)
  Net electricity generated from this waste and used in internal MSWI plant energy redistribution.
  Uncertainty: uncertainty is calculated from uncertainties in waste composition and uncertainties in energy efficiency and the uncertainty in internal energy demand
  production volume 99508.5 kWh
  property exergy 3.6 MJ; name E_el_prod_MSWI_exergy
    This exergy property is based on the exergy content of the product.
  property true value relation 3.6; name E_el_prod_MSWI_true_value_relation
    property to calculate "true value" from
  property price 0.1 EUR2005; name E_el_prod_MSWI_price_EUR2005
    Estimated to be the same price as in case of electricity, medium voltage.
  property true value 4.00789e-8
    allocation property applied in "true value" allocation // value calculated from true value relation
- heat, for reuse in municipal waste incineration only: 0 MJ; CPC 17300: Steam and hot water; By-product classification allocatable product; pedigree (1,1,1,1,1)
  Net useful heat generated from this waste and used in internal MSWI plant energy redistribution.
  Uncertainty: uncertainty is calculated from uncertainties in waste composition and uncertainties in energy efficiency and the uncertainty in internal energy demand
  production volume 704009 MJ
  property true value relation 0.1842; name E_th_prod_MSWI_true_value_relation
    property to calculate "true value" from
  property exergy 0.1842 MJ; name E_th_prod_MSWI_exergy
    This exergy property is based on the exergy content of the product.
  property price 0.0106 EUR2005; name E_th_prod_MSWI_price_EUR2005
    Average European district heat price from Ecoheatcool and Euroheat 2005-2006, Ecoheat Work package 1: The European heat market. Final report. 10.6 EUR/GJ i s the price of district heat. http://www.solarthermalworld.org/files/Ecoheatcool%20WP1%20Web.pdf?download
  property true value 1.45084e-8
    (same comment as for electricity, for reuse in municipal waste incineration only)
- zinc concentrate: 0 kg; CPC 14290: Other non-ferrous metal ores and concentrates (other than uranium or thorium ores and concentrates); By-product classification allocatable product
  Calculated value from the knowledge of the properties of both products.
  production volume 17.613 kg
  property price 0.38 EUR2005; name ByP_price_EUR2005
    Temporary price data. Calculated as 90% of purchasers price based on: Zinc content in concentrate 53%. Concentrate price per kg Zn 86.5% of refined Zn price (13.5% treatment charges according to CHR Metals Limited 2005: Dynamic cost curves. http://www.minecost.com/dynamic.pdf). 2004 zinc price from USGS (2007) Mineral commodity summaries 2007. <http://minerals.usgs.gov/minerals/pubs/mcs/2007/mcs2007.pdf> [Accessed 25 May 2010]
  property zinc content 0.53; name zinc_C_zinc_concentrate
    Zinc content on a dry matter basis. Value taken from teh "zinc mine operation" /GLO dataset.
  property dry mass 1 kg; name DM_zinc_concentrate
  property carbon content 0
    carbon content on a dry matter basis (reserved; not for manual entry)
  property true value 2.09811e-11
    allocation property applied in "true value" allocation // value calculated from revenue
  properties: wet mass 1 kg, water content 0, carbon content, non-fossil 0, carbon content, fossil 0, water in wet mass 0 kg, carbon allocation 0 kg

## Inputs from technosphere
- wastewater, unpolluted: -1.28443e-5 m3; name ww; lognormal variance with pedigree 0.0053, pedigree (2,2,3,5,1)
  Measured value. Average amount of wastewater produced during treatment.
  EcoSpold01Location=CH
  production volume 4.09791e6 m3; = PV_tapwater*(ww/tapwater)
    Calculated from the production volume of tap water, at user in proportion to the respective output amounts.
  property price 0 EUR2005; name ww_price_EUR2005
  properties: carbon content, non-fossil 0.00178991, wet mass 1000 kg, dry mass 0.337476 kg, carbon content, fossil 0.00178991, water content 2962.17
  note on carbon content, fossil: Assumed to be like in tap water. Bicarbonate content is 2.93 mol/m3. CO2 content is 0.1 mol/m3 (ecoinvent v2.2 report 8, Tab 93.1).
- water works, capacity 1.1E10l/year: 1.52082e-12 unit; = 1/(Q_av* days_per_year*lifetime*UnitConversion(1, 'm3', 'l')); lognormal variance with pedigree 0.002, pedigree (1,1,3,1,1)
  Calculated value. Amount of water works construction attributed to the production of 1kg of tap water. Value is based on assumed lifetime production of water treatment plant and an assumed typical medium-sized plant of 30,000 m3/day.
  Uncertainty: Calculated variable. Uncertainty will be determined from propagation of uncertainty factors of underlying variables.
  property lifetime 60 year; name lifetime
  property plant average daily flow rate 30000 m3/d; name Q_av
  note on lifetime: Estimated Value. Expected lifetime of water works as defined in the construction process.
  note on plant average daily flow rate: Fixed values, Flow rate of a conventional water purification plant for a medium-size facility as defined in the water works process.
- heat, district or industrial, natural gas: 1.16028e-6 MJ; = fuel_input*heating_value*fuel_use; lognormal variance with pedigree 0.002, pedigree (1,1,3,1,1)
  Calculated value.
  Uncertainty: Calculated variable. Uncertainty will be determined from propagation of uncertainty factors of underlying variables.
  property Corresponding fuel use 1.11 MJ; name fuel_use
  property fuel input in physical units, m3 2.88e-8 m3; name fuel_input
  property lower heating value 36.3 MJ/Nm3; name heating_value
  note on Corresponding fuel use: Lower heating value of the fuel input related to the heat/electricity output
  note on fuel input in physical units, m3: Measured value. Average natural gas consumption in surveyed plants for this technology type. Note than only 1 of the 2 plants reported using natural gas. Plants not reporting natural gas were attributed an input value of 0 during the calculation of the weighted average.
- electricity, medium voltage: 0.000285961 kWh; lognormal variance with pedigree 0.0053, pedigree (2,2,3,5,1)
  Measured value. Average electricity consumption for entire process including pumping for water intake and pumping for distribution at the plant gate. All plants (2) reported electricity use.
  EcoSpold01Location=UCTE
- diesel, burned in building machine: 6.63979e-6 MJ; = diesel_use*density_diesel*NHV; lognormal variance with pedigree 0.002, pedigree (1,1,3,1,1)
  (same comment as for heat, district or industrial, natural gas)
  property fuel input in physical units, L 1.83e-7 l; name diesel_use
  property heating value, net 43.2 MJ; name NHV
  property density 0.84 kg/l; name density_diesel
  note on fuel input in physical units, L: Measured value. Diesel volume consumed in a year. Exclusively used for routine runs of emergy generators. Diesel use was available for one plant only, but extrapolated for both.
  note on heating value, net: Literature. net (lower) heating (calorific) value for diesel in MJ/kg
- chlorine, liquid: 3.20848e-6 kg; lognormal variance with pedigree 0.0053, pedigree (2,2,3,5,1)
  Measured value. Average use of chlorine(dry basis), delivered in liquid state, for disinfection in surveyed direct filtration treatment plants. Note the 2 plants reported using this substance.
  properties: dry mass 1 kg, wet mass 1 kg

## Inputs from nature
- Water, river [natural resource, in water]: 0.00101271 m3; name waterIn_R; lognormal variance with pedigree 0.0053, pedigree (2,2,3,5,1)
  Calculated value.
  The shares between technologies and water sources are calculated based on literature data (http://www.svgw.ch/fileadmin/resources/svgw/web/Shop-Boutique/download/09_W-Informationsmaterial/SVGW_Shop_TWI-12_d.pdf ) and estimates.
  40% of water used for production of tap water in Switzerland comes from surface waters (other than lake)
  20% of water used for production of tap water in Switzerland comes from lake water
  40% of water used for production of tap water in Switzerland comes from ground water
  28% of tap water is treated by conventional treatment
  32% of tap water is treated by direct filtration
  40% of tap water is nit treated or the treatment is very basic
  0.0326 kg is the amount of water lost during the process

## Sampling procedure
Based on data collected from two direct filtration treatment plants in Quebec (Canada). See corresponding Quebec dataset for more information. Note that percent representativeness is not supplied because technology-specific global production volumes is too uncertain. Should this information become available, the representativeness can be calculated by dividing the sum of the water treated by the Quebec plants that served as a basis for the Global dataset by the technology-specific global production volume. (5.73E11 kg/a)

## Extrapolations
From two direct filtration tap water production facilities in Quebec (Canada) to global average of same technology. The uncertainty has been changed accordingly.
