# acetaldehyde production

Dataset: EcoSpold 2, unit process
Geography: RER
Time period: 1995-01-01 to 2020-12-31
Technology level: current
Classification: ISIC rev.4 ecoinvent: 2011:Manufacture of basic chemicals
Synonyms: Acetic aldehyde; Aldehyde; 75-07-0; Ethyl aldehyde; Ethanal; Acetaldehyde
Scenario: Business-as-Usual
System model: Allocation at the point of substitution
Generated by: Maggie Osses
Published in: Althaus H.-J. 2007
Database: ecoinvent
isCopyrightProtected: true
accessRestrictedTo: 1

## General comment
This dataset represents the production of 1 kg of acetaldehyde by means of direct oxidation of ethylene (Wacker process), which is the most widely used method for producing acetaldehyde. Acetaldehyde is a colorless liquid with a pungent, suffocating odor that is slightly fruity when diluted. Acetaldehyde is used in the manufacturing of acetic acid, acetic anhydride, acetate esters, pyrine and pyridine bases, peracetic acid, 1,3-butylene glycol, and others.
This dataset is based on literature data. All numbers in the source used (von Däniken et al. 1995) are taken from the manufacturing of ethylene oxide, as an approximation. The water exchanges are based on data from a large chemical plant (Gendorf 2016).
References:
Gendorf (2016) Umwelterklärung 2015, Werk Gendorf Industriepark, www.gendorf.de.
Eckert, M., Fleischmann, G., Jira, R., Bolt, H. M. and Golka, K. 2006. Acetaldehyde. Ullmann's Encyclopedia of Industrial Chemistry.
Althaus H.-J., Chudacoff M., Hischier R., Jungbluth N., Osses M. and Primas A. (2007) Life Cycle Inventories of Chemicals. Final report ecoinvent data v2.0 No. 8. Swiss Centre for Life Cycle Inventories, Dübendorf, CH.
von Däniken A. and Chudacoff M. (1995) Vergleichende ökologische Bewertung von Anstrichstoffen im Baubereich - Band 2: Daten. Buwal Schriftenreihe Umwelt Nr. 232. BUWAL, Bern.

## Included activities start
The activity starts when the raw materials enter the process.

## Included activities end
This activity includes the oxidation of ethylene, the consumption of energy, as well as the generation of solid wastes and emissions into air and water. The infrastructure is estimated based on data from a large chemical plant. No by-product is generated in the process. Consumption of auxiliaries is not included due to lack of data.

## Geography
The data in this dataset are not geography-specific. Some values are based on data from a large chemical factory located in Germany. These are assumed to be valid for this geography.

## Technology
Ethylene is the most important starting material for the production of acetaldehyde and most of the present capacity works by its direct oxidation (Wacker process). One- and two-stage versions of the process are on stream. In the one-stage method, an ethylene-oxygen mixture reacts with the catalyst solution. In the two-stage process the reaction is carried out with ethylene and then with oxygen in two separate reactors. The catalyst solution is alternately reduced and oxidized. At the same time the degree of oxidation of the catalyst changes alternately. Air is used instead of pure oxygen for the catalyst oxidation.
References:
Eckert, M., Fleischmann, G., Jira, R., Bolt, H. M. and Golka, K. 2006. Acetaldehyde. Ullmann's Encyclopedia of Industrial Chemistry.
Althaus H.-J., Chudacoff M., Hischier R., Jungbluth N., Osses M. and Primas A. (2007) Life Cycle Inventories of Chemicals. Final report ecoinvent data v2.0 No. 8. Swiss Centre for Life Cycle Inventories, Dübendorf, CH.

## Time period
The literature refers to data from the 1990s. Some values are based on data published by the Gendorf factory that were collected between 2011 and 2015. The time period has been adjusted accordingly. For more details, see the comments of the exchanges.

## Reference product
- acetaldehyde: 1 kg; name RP; By-product classification allocatable product; CPC 34170: Ethers, alcohol peroxides, ether peroxides, epoxides, acetals and hemiacetals, and their halogenated, sulphona[…]; CAS 75-07-0
  Acetaldehyde is a colorless liquid with a pungent, suffocating odor that is slightly fruity when diluted. Acetaldehyde is used in the manufacturing of acetic acid, acetic anhydride, acetate esters, pyrine and pyridine bases, peracetic acid, 1,3-butylene glycol, and others.
  production volume 1.33284e8 kg; name RP_PV
    Estimated value. The European production volume is extrapolated from the global production volume based on reports from Cefic (European Chemical Industry Council), and the American Chemistry Council.
    According to Cefic (2016) the Global sales of chemicals in the year 2015 was 3 534 billion euros. The reported share of sales per regions are: EU28 14.7%; Other Europe (Switzerland, Norway, Turkey, Russia and Ukraine) 2.7%; NAFTA (US, Canada and Mexico) 16.5%; Latin America 3.8%; China 39.9%; Japan 3.9%; Republic of Korea 3.2%; India 2.2%; Rest of Asia 11.9%; Rest of the World 1.3%. Cefic also reports the US total sales, 518.7 billion euros of the global 3 534 billion euros (14.7%). The same share is reported from the American Chemistry Council (2016), according to this source the USA sales account for 15% of global sales for the year 2016.
    According to 'Ullmann's encyclopedia of industrial chemistry' the global world consumption is 766 000 000 kg for the year 2003. Since no data were found for the European production this value was scaled accordingly.
    Reference(s):
    Cefic 2016. Facts and figures 2016 of the European chemical industry. Accessible at: http://www.cefic.org/Facts-and-Figures/Chemicals-Industry-Profile/
    American Chemistry Council 2016. Outlook: U.S. Chemical Industry Continues to Outpace Industrial Output; Accounts for More Than One-Half of Construction Spending by Manufacturing Sector. Accessible at: https://www.americanchemistry.com/Media/PressReleasesTranscripts/ACC-news-releases/US-Chemical-Industry-Continues-to-Outpace-Industrial-Output.html
    Eckert, M., Fleischmann, G., Jira, R., Bolt, H. M. and Golka, K. 2006. Acetaldehyde. Ullmann's Encyclopedia of Industrial Chemistry.
  property carbon content 0.545296
    carbon content on a dry matter basis (reserved; not for manual entry)
  property true value 0.81; name RP_true_value
    allocation property applied in "true value" allocation // value calculated from revenue
  properties: water in wet mass 0 kg, wet mass 1 kg, price 0.81 EUR2005, carbon content, fossil 0.545296, water content 0, carbon content, non-fossil 0, dry mass 1 kg, carbon allocation 0.545296 kg

## By-products
- heat, for reuse in municipal waste incineration only: 0 MJ; CPC 17300: Steam and hot water; By-product classification allocatable product; pedigree (1,1,1,1,1)
  Net electricity generated from this waste and used in internal MSWI plant energy redistribution.
  Uncertainty: uncertainty is calculated from uncertainties in waste composition and uncertainties in energy efficiency and the uncertainty in internal energy demand
  production volume 81.3106 MJ
  property exergy 0.1842 MJ; name E_th_prod_MSWI_exergy
    This exergy property is based on the exergy content of the product.
  property price 0.0106 EUR2005; name E_th_prod_MSWI_price_EUR2005
    Average European district heat price from Ecoheatcool and Euroheat 2005-2006, Ecoheat Work package 1: The European heat market. Final report. 10.6 EUR/GJ i s the price of district heat. http://www.solarthermalworld.org/files/Ecoheatcool%20WP1%20Web.pdf?download
  property true value relation 0.1842; name E_th_prod_MSWI_true_value_relation
    property to calculate "true value" from
  property true value 1.16811e-9
    allocation property applied in "true value" allocation // value calculated from true value relation
- electricity, for reuse in municipal waste incineration only: 0 kWh; CPC 17100: Electrical energy; By-product classification allocatable product; pedigree (1,1,1,1,1)
  (same comment as for heat, for reuse in municipal waste incineration only)
  production volume 11.4329 kWh
  property true value relation 3.6; name E_el_prod_MSWI_true_value_relation
    property to calculate "true value" from
  property price 0.1 EUR2005; name E_el_prod_MSWI_price_EUR2005
    Estimated to be the same price as in case of electricity, medium voltage.
  property exergy 3.6 MJ; name E_el_prod_MSWI_exergy
    This exergy property is based on the exergy content of the product.
  property true value 3.17451e-9
    (same comment as for heat, for reuse in municipal waste incineration only)
- zinc concentrate: 0 kg; CPC 14290: Other non-ferrous metal ores and concentrates (other than uranium or thorium ores and concentrates); By-product classification allocatable product
  Calculated value from the knowledge of the properties of both products.
  production volume 0.00154673 kg
  property price 0.38 EUR2005; name ByP_price_EUR2005
    Temporary price data. Calculated as 90% of purchasers price based on: Zinc content in concentrate 53%. Concentrate price per kg Zn 86.5% of refined Zn price (13.5% treatment charges according to CHR Metals Limited 2005: Dynamic cost curves. http://www.minecost.com/dynamic.pdf). 2004 zinc price from USGS (2007) Mineral commodity summaries 2007. <http://minerals.usgs.gov/minerals/pubs/mcs/2007/mcs2007.pdf> [Accessed 25 May 2010]
  property zinc content 0.53; name zinc_C_zinc_concentrate
    Zinc content on a dry matter basis. Value taken from teh "zinc mine operation" /GLO dataset.
  property dry mass 1 kg; name DM_zinc_concentrate
  property carbon content 0
    carbon content on a dry matter basis (reserved; not for manual entry)
  property true value 4.30488e-13
    allocation property applied in "true value" allocation // value calculated from revenue
  properties: wet mass 1 kg, water content 0, carbon content, non-fossil 0, carbon content, fossil 0, water in wet mass 0 kg, carbon allocation 0 kg

## Inputs from technosphere
- heat, district or industrial, other than natural gas: 1.791 MJ; lognormal variance with pedigree 0.0321, pedigree (3,5,3,3,1)
  Data from survey in literature (von Däniken et al. 1995).
- tap water: 0.026 kg; lognormal variance with pedigree 0.009825, pedigree (2,3,1,2,3)
  Calculated based on literature data published by the industry. This value is a 5-year average of data (2011 - 2015) published by the Gendorf factory (Gendorf, 2016, Umwelterklärung, www.gendorf.de), (Gendorf, 2015, Umwelterklärung, www.gendorf.de), (Gendorf, 2014, Umwelterklärung, www.gendorf.de). The amount of tap water per kg of chemical substance produced is calculated using literature data published by the Gendorf factory based in Germany, which produces a wide range of chemical substances. The factory produced 1657400 tonnes of chemical substances in the year 2015 (Gendorf, 2016, Umwelterklärung, www.gendorf.de) and 740000 tonnes of intermediate products. The amount of tap water consumed in the year 2015 was 55100 tonnes (Gendorf, 2016, Umwelterklärung, www.gendorf.de). The resulting amount of tap water is 0.023 kg/kg of chemical product produced. The 5-year average (2011 - 2015, weighted by production volume) is 0.026 kg/kg.
  properties: carbon content, fossil 0.00178991, dry mass 0.000337476 kg, wet mass 1 kg, water content 2962.17
  note on carbon content, fossil: Bicarbonate content is 2.93 mol/m3. CO2 content is 0.1 mol/m3 (ecoinvent v2.2 report 8, Tab 93.1).
- wastewater, average: 0 m3; name BP_wastewater_average; pedigree (1,1,1,1,1)
  Calculated based on literature data published by the industry. This value is a 5-year average of data (2011 - 2015) published by the Gendorf factory (Gendorf, 2016, Umwelterklärung, www.gendorf.de), (Gendorf, 2015, Umwelterklärung, www.gendorf.de), (Gendorf, 2014, Umwelterklärung, www.gendorf.de). The amount of wastewater (which is later on treated in the municipal WWTP) per kg of chemical substance produced is calculated using literature data published by the Gendorf factory based in Germany, which produces a wide range of chemical substances. The factory produced 1657400 tonnes of chemical substances in the year 2015 (Gendorf, 2016, Umwelterklärung, www.gendorf.de) and 740000 tonnes of intermediate products. The amount of wastewater which is later on treated in the municipal WWTP in the year 2015 was 1200 tonnes (Gendorf, 2016, Umwelterklärung, www.gendorf.de). The resulting amount of wastewater is 2.7E-06 m3/kg of chemical product produced.
  production volume 0 m3
    Calculated from the production volume of acetaldehyde in proportion to the respective output amounts.
  property price 0 EUR2005; name BP_wastewater_average_price_EUR2005
  properties: wet mass 1000 kg, carbon content, non-fossil 0.194039, water content 2882.2, dry mass 0.346837 kg
  note on carbon content, non-fossil: 0.0673 kg TOC/m3 (Tab A.17, ecoinvent v2.2 report 13_I). TOC was considered as Total Carbon.
- electricity, medium voltage: 0.1 kWh; lognormal variance with pedigree 0.1786, pedigree (4,5,5,5,5)
  Estimated value based on expert judgement.
- oxygen, liquid: 0.382 kg; lognormal variance with pedigree 0.1786, pedigree (4,5,5,5,5)
  Calculated based on stoechiometry: 1 mole of O2 reacts with 2 moles of ethylene.
  properties: dry mass 1 kg, wet mass 1 kg
- municipal solid waste: -0.0121 kg; name BP_municipal_solid_waste; lognormal variance with pedigree 0.0321, pedigree (3,5,3,3,1)
  Estimation.
  production volume 1.61274e6 kg; = RP_PV*BP_municipal_solid_waste/ABS(RP)
    (same comment as for wastewater, average)
  properties: carbon content, non-fossil 0.261655, carbon content, fossil 0.171549, wet mass 1 kg, water content 0.297017, dry mass 0.771 kg
  note on carbon content, non-fossil: MSW composition in tab 4.1, ecoinvent v2.2 report 13_I. C content referred to 1 kg DM
- ethylene, average: 0.67 kg; lognormal variance with pedigree 0.0321, pedigree (3,5,3,3,1)
  Data from survey in literature (von Däniken et al. 1995).
  properties: wet mass 1 kg, dry mass 1 kg, carbon content, fossil 0.857143
- heat, district or industrial, natural gas: 1.672 MJ; lognormal variance with pedigree 0.0321, pedigree (3,5,3,3,1)
  Data from survey in literature (von Däniken et al. 1995).
- chemical factory, organics: 4e-10 unit; lognormal variance with pedigree 0.309225, pedigree (2,3,1,2,3)
  Calculated based on literature data published by the industry. For this activity, no information was readily available concerning infrastructure and land-use. Therefore, the infrastructure is estimated based on data from two chemical factories, the BASF site of Ludwigshafen and the chemical factory in Gendorf (which are both located in Germany), which produce a wide range of chemical substances. Based on this data, the following assumptions are made: the built area amounts to about 4.2 ha, the plant has an average output of 50'000 t/a and a lifespan of fifty years. The estimated infrastructure amount is therefore 4.00 E-10 units per kg of produced chemical.
  References:
  Althaus H.-J., Chudacoff M., Hischier R., Jungbluth N., Osses M. and Primas A. (2007) Life Cycle Inventories of Chemicals. ecoinvent report No. 8, v2.0. EMPA Dübendorf, Swiss Centre for Life Cycle Inventories, Dübendorf, CH.
  Gendorf (2000) Umwelterklärung 2000, Werk Gendorf. Werk Gendorf, Burgkirchen.
- wastewater, average: -2.43642e-6, -2.63575e-7 m3 (2 entries); lognormal variance with pedigree 0.009825, pedigree (2,3,1,2,3)
  (same comment as for wastewater, average)
  production volume 359.867 m3

## Inputs from nature
- Water, well, in ground [natural resource, in water]: 0.00083 m3; lognormal variance with pedigree 0.009825, pedigree (2,3,1,2,3)
  Calculated based on literature data published by the industry. This value is a 5-year average of data (2011 - 2015) published by the Gendorf factory (Gendorf, 2016, Umwelterklärung, www.gendorf.de), (Gendorf, 2015, Umwelterklärung, www.gendorf.de), (Gendorf, 2014, Umwelterklärung, www.gendorf.de). The amount of groundwater and surface water (river) extracted per kg of chemical substance produced is calculated using literature data published by the Gendorf factory based in Germany, which produces a wide range of chemical substances. The factory produced 1657400 tonnes of chemical substances in the year 2015 (Gendorf, 2016, Umwelterklärung, www.gendorf.de) and 740000 tonnes of intermediate products. The amount of groundwater and surface water (river) extracted in the year 2015 was 19950000 tonnes and 21488100 tonnes respectively (Gendorf, 2016, Umwelterklärung, www.gendorf.de).
- Water, river [natural resource, in water]: 0.00086 m3; lognormal variance with pedigree 0.009825, pedigree (2,3,1,2,3)
  (same comment as for Water, well, in ground)
- Water, cooling, unspecified natural origin [natural resource, in water]: 0.0164 m3; lognormal variance with pedigree 0.009825, pedigree (2,3,1,2,3)
  Calculated based on literature data published by the industry. This value is a 5-year average of data (2011 - 2015) published by the Gendorf factory (Gendorf, 2016, Umwelterklärung, www.gendorf.de), (Gendorf, 2015, Umwelterklärung, www.gendorf.de), (Gendorf, 2014, Umwelterklärung, www.gendorf.de). The amount of water for cooling extracted per kg of chemical substance produced is calculated using literature data published by the Gendorf factory based in Germany, which produces a wide range of chemical substances. The factory produced 1657400 tonnes of chemical substances in the year 2015 (Gendorf, 2016, Umwelterklärung, www.gendorf.de) and 740000 tonnes of intermediate products. The reported amounts of water extracted as groundwater and surface water (river) are assumed to be used entirely for cooling purposes.

## Emissions to nature
- BOD5, Biological Oxygen Demand [water, surface water]: 0.0016 kg; lognormal variance with pedigree 0.0721, pedigree (3,5,3,3,1)
  Data from survey in literature (von Däniken et al. 1995).
- Hydrocarbons, unspecified [water, surface water]: 5e-5 kg; lognormal variance with pedigree 0.0721, pedigree (3,5,3,3,1)
  Data from survey in literature (von Däniken et al. 1995).
- TOC, Total Organic Carbon [water, surface water]: 0.001 kg; lognormal variance with pedigree 0.0721, pedigree (3,5,3,3,1)
  Calculated by default as TOC (gC) = COD/2.7 (COD measured in g O2). Should more correctly be calculated from the carbon content of the specified emissions to water.
- Hydrocarbons, aliphatic, alkanes, unspecified [air, urban air close to ground]: 0.0109 kg; lognormal variance with pedigree 0.1521, pedigree (3,5,3,3,1)
  Data from survey in literature (von Däniken et al. 1995).
- Suspended solids, unspecified [water, surface water]: 1.4e-5 kg; lognormal variance with pedigree 0.0721, pedigree (3,5,3,3,1)
  Data from survey in literature (von Däniken et al. 1995).
- DOC, Dissolved Organic Carbon [water, surface water]: 0.001 kg; lognormal variance with pedigree 0.0721, pedigree (3,5,3,3,1)
  Calculated as equal to TOC.
- Sulfur dioxide [air, urban air close to ground]: 1e-6 kg; lognormal variance with pedigree 0.0321, pedigree (3,5,3,3,1)
  Data from survey in literature (von Däniken et al. 1995).
- COD, Chemical Oxygen Demand [water, surface water]: 0.0027 kg; lognormal variance with pedigree 0.0721, pedigree (3,5,3,3,1)
  Data from survey in literature (von Däniken et al. 1995).
- Particulates, > 2.5 um, and < 10um [air, urban air close to ground]: 1e-6 kg; lognormal variance with pedigree 0.1521, pedigree (3,5,3,3,1)
  Data from survey in literature (von Däniken et al. 1995).
- Dissolved solids [water, surface water]: 0.00011 kg; lognormal variance with pedigree 0.0721, pedigree (3,5,3,3,1)
  Data from survey in literature (von Däniken et al. 1995).
- Particulates, > 10 um [air, urban air close to ground]: 1e-6 kg; lognormal variance with pedigree 0.0721, pedigree (3,5,3,3,1)
  Data from survey in literature (von Däniken et al. 1995).
- Chromium, ion [water, surface water]: 1.4e-5 kg; lognormal variance with pedigree 0.6621, pedigree (3,5,3,3,1)
  Data from survey in literature (von Däniken et al. 1995).
- Particulates, < 2.5 um [air, urban air close to ground]: 1e-6 kg; lognormal variance with pedigree 0.3321, pedigree (3,5,3,3,1)
  Data from survey in literature (von Däniken et al. 1995).
- Water [water, unspecified]: 0.0167 m3; lognormal variance with pedigree 0.009825, pedigree (2,3,1,2,3)
  Calculated based on literature data published by the industry (Gendorf, 2016, Umwelterklärung, www.gendorf.de). The amount of water released back to the environment consists of the amount of process water treated in the internal WWTP and then released back to the environment and the amount of cooling water released back to the environment.
- Carbon monoxide, fossil [air, urban air close to ground]: 4e-5 kg; lognormal variance with pedigree 0.1521, pedigree (3,5,3,3,1)
  Data from survey in literature (von Däniken et al. 1995).
- Nitrogen oxides [air, urban air close to ground]: 0.00024 kg; lognormal variance with pedigree 0.0321, pedigree (3,5,3,3,1)
  Data from survey in literature (von Däniken et al. 1995).
- Water [air, unspecified]: 0.0014 m3; lognormal variance with pedigree 0.009825, pedigree (2,3,1,2,3)
  Calculated to ensure the water balance. In general, in the case of recirculating cooling systems, 77% of the water input evaporates to air. In case of once-through cooling systems, 4% of the water input evaporates to air. The process water has in the chemical industry an average evaporation rate of 20.5%. In the specific case of the Gendorf factory, the calculated evaporation rate based on the data published is 6.3%. This matches the qualitative information, that the majority of the cooling systems in Gendorf are once-through and that the amount of cooling water used is significantly higher than the amount of process water used (Gendorf, 2016, Umwelterklärung, www.gendorf.de).

## Sampling procedure
Data based on literature as well as industrial data. Some values are calculated based on data from a large chemical factory located in Germany. For more details, see the comments of the exchanges.

## Extrapolations
The literature source used is based on numbers taken from the manufacture of ethylene oxide, as an approximation.

## Review by Gregor Wernet 2017-08-04
This dataset was additionally reviewed in a separate review process by Eric Johnson of Atlantic Consulting as well as Emilia Moreno Ruiz and Gregor Wernet of ecoinvent.
