# glued laminated timber production, for outdoor use

Dataset: EcoSpold 2, unit process
Geography: RER
Time period: 1986-01-01 to 2019-12-31
Technology level: current
Classification: ISIC rev.4 ecoinvent: 1621:Manufacture of veneer sheets and wood-based panels
Classification: EcoSpold01Categories: wooden materials/extraction
Tags: ConvertedDataset
Scenario: Business-as-Usual
System model: Allocation at the point of substitution
Generated by: Hans-Jörg Althaus
Published in: Werner F. 2007
Database: ecoinvent
isCopyrightProtected: true
accessRestrictedTo: 1

## General comment
This dataset represents the production of one m3 glued laminated timber for outdoor use. The input of wood is assumed to be naturally dried sawn softwood, more specifically spruce.

The production takes place at a wooden board factory for organic bonded board; the dataset reflects a German production site, which is assumed representative for Europe. The figures origin from mainly calculations and literature values.

Data for glued laminated timber are estimated based on data for production of three layered laminated board. The overall quality of the data for glued laminated timber (represented by three layered laminated board) is good for such a wide class of products. Data quality, however, is not sufficient to allow for comparing with other wood boards.
[Dataset to be replaced by 'glued laminated timber production, for outdoor use, CH, 1986 - 2002']
[Dataset to be replaced by 'glued laminated timber production, for outdoor use, Europe without Switzerland, 1986 - 2002']

## Included activities start
From reception of sawn softwood and glue (melanin-formaldehyde resin) at the factory gate.

## Included activities end
This activity ends with glued laminated timber at the factory gate. The dataset includes the inputs to the production processes, transports of those inputs and the process emissions as far as they are available. The dataset does not include infrastructure.

## Geography
Data for Germany used for central Europe

## Technology
Estimate for glued laminated timber is based on data for three layered laminated board.

In the 1990s a special glue type for bonding laminates was developed based on using melamine-resorcinol-formaldehyde resins. These bondings are highly resistant to boiling water and give a pale glue line.

Laminated wood is made mostly from spruce, which is the easiest wood to process and fulfils the specific requirements of strength and durability. The three-layered laminated board made of spruce is produced in a large wood processing company in the Canton of Fribourg, Switzerland: out of rough sawn timber (u=70%) 22 mm lamellas are sawn, which are technically dried, planed, finger-jointed, glued with PVAc-adhesive at their ends to “never-ending” lamellas and finally glued to a bloc. This block is sawn to boards, which are planed. The spruce is mainly coming from the area around Fribourg. The thermal energy for the drying of the lamellas is mainly produced by industrial residual wood (8% of wood input). Lamellar boards are sawed from round wood trunks. The boards are pre-dried to ca. 10% residual moisture, graded, and then bonded in automatic plants to form continuous boards with dovetail joints. The moisture in the boards to be glued should be 2 3% below the expected equilibrium moisture level. Variations in the moisture content of the different boards should be not greater than 2%. The broad sides of these joined boards are planed until smooth and uniformly coated with adhesive. Constructing the beams, particular attention is paid to the positions of the annual rings in the cross section of the boards. The rifts (vertical) and the flats (horizontal) should be distributed regularly (Werner et al., 1997).
Reference:
Werner F., Richter K., Bosshart S. and Frischknecht R. (1997) Ökologischer Vergleich von Innenbauteilen am Bsp. von Zargen aus Massivholz, Holzwerkstoff und Stahl. EMPA/ETH-Forschungsbericht, Dübendorf, Zürich.

## Reference product
- glued laminated timber, for outdoor use: 0 m3; CPC 3141: Plywood consisting solely of sheets of wood, except of bamboo; By-product classification allocatable product
  Reference product. Glued laminated timber of naturally dried softwood. The laminated timber is produced at a wooden board factory in Germany by processes representative for European average. The reference product is ready for delivery at the wooden board factory. The timber is intended for outdoor use, e.g. as basis for timber-concrete composite structures providing increased load bearing capacities.
  EcoSpold01Location=RER
  production volume 460000 m3
    Unknown
    Assuming 20% of glulam production (2.3 million cubic metres according to http://www.europanels.org/Folders/euro%20fact_2%20Woodworking.pdf) are for outdoor use
  property carbon content, non-fossil 0.478422
    The laminated timber is composed of wood and glue. The weight of the wood is assumed to be the DM minus 12 kg glue. C content of wood is 0.494 kgC/kg dry wood (ecoinvent v2.2 report 9)
  property price 298 EUR2005
    Temporary price data. Calculated as 90% of purchasers price based on: Price for plywood applied (from 2004 World Import/Export (USD/cubicmeter) from FaoStat http://faostat.fao.org/site/626/default.aspx#ancor, accessed 14th June 2010)
  property carbon content, fossil 0.00982967
    C content of 12 kg Melamine formaldehyde resin (C4H6N6O) used for glueing
  property carbon content 0.488251
    carbon content on a dry matter basis (reserved; not for manual entry)
  property true value 298
    allocation property applied in "true value" allocation // value calculated from revenue
  properties: water in wet mass 49.469 kg, dry mass 380.531 kg, water content 0.13, wet mass 430 kg, carbon allocation 185.795 kg
- wood chips, dry, measured as dry mass: 1 kg; CPC 31230: Wood in chips or particles; By-product classification allocatable product
  Calculated Value. Since the fuel for the furnace is included in the input, the corresponding amount inventoried with the energy module is subtracted. Since the volume of the chips is bulked, it is higher than the difference of input and output volume.
  production volume 6.5343e7 kg; = Ref('986d22f6-bd1b-436d-9d23-60518bd8a096', 'ProductionVolume') * (Ref('754261d9-0466-4410-8e28-6d00177a837b') / Ref('986d22f6-bd1b-436d-9d23-60518bd8a096'))
    Calculated from production volume of reference product using the relative outputs.
  property price 0.107 EUR2005
    Expert judgement (Urs Luginbühl, Swiss Sawmilling industry, personal communication in June 2014). Wood chips from softwood should have a price of 0.101 EUR/kg. Woodchips from hardwood should have a price of 0.112 EUR/kg. Average of these two values is used. Cross-reference; FAOSTAT database; http://faostat.fao.org/site/626/DesktopDefault.aspx?PageID=626#ancor; Average import/export prices of EU for 'chips and particles'. Price: 48.76 Euro/m3. The density of the wood chips is 650 kg/m3. The price is recalculated accordingly.
  property carbon content, non-fossil 0.494
    C content of dry mass is 0.494 kgC/kg dry wood (ecoinvent v2.2 report 9).
  property carbon content 0.494
    carbon content on a dry matter basis (reserved; not for manual entry)
  property true value 15.1994
    allocation property applied in "true value" allocation // value calculated from revenue
  properties: carbon content, fossil 0, water in wet mass 0.4 kg, wet mass 1.4 kg, water content 0.4, dry mass 1 kg, carbon allocation 0.494 kg

## By-products
- residual wood, dry: 0 m3; CPC 39283: Non-agglomerated wood waste and scrap; By-product classification allocatable product
  Stoichiometric Calculation. Calculated by balance of dry wood mass. The remaining residual wood (0.344 m3) is used for heating purposes and technical drying.
  EcoSpold01Location=RER
  production volume 25438 m3; = Ref('4a0a55bf-9f80-48f7-9ab5-398ab64e8bcd')/ Ref('986d22f6-bd1b-436d-9d23-60518bd8a096')* Ref('986d22f6-bd1b-436d-9d23-60518bd8a096', 'ProductionVolume')
    Calculated from the relationship to the production volume of the reference product.
  property carbon content, non-fossil 0.494
    C content of dry mass is 0.494 kgC/kg dry wood (ecoinvent v2.2 report 9)
  property price 26.9 EUR2005
    Temporary price data. Calculated as 90% of purchasers price based on: 2004 prices for World Import/Export (USD/cubicmeter) from FaoStat (http://faostat.fao.org/site/626/default.aspx#ancor, [accessed 10th June 2010]) Commodity: 'Chips and Particles' assuming this is for air-dry chips (10% water on a dry matter basis at 650 kg/m3) and no price difference for water content (i.e. assuming air-drying).
  property carbon content 0.494
    carbon content on a dry matter basis (reserved; not for manual entry)
  property true value 1.48757
    allocation property applied in "true value" allocation // value calculated from revenue
  properties: dry mass 450 kg, carbon content, fossil 0, wet mass 495 kg, water content 0.1, water in wet mass 45 kg, carbon allocation 222.3 kg

## Inputs from technosphere
- wooden board factory, organic bonded boards: 1.13227e-11 unit; lognormal variance with pedigree 0.4461, pedigree (4,5,5,3,4)
  EcoSpold01Location=RER
  Estimation.
- heat, central or small-scale, other than natural gas: 0.749473 MJ
  Literature Value. The fuels utilized are light fuel oil AND residual softwood wood chips. Regarding the residual softwood wood chips: Data per MJ energy carrier input (90 % efficiency) contains emissions, waste and electricity consumption; this module is used for wood residues generated internally that are used for internal energy generation. Hence, no additional wood input is required.
- diesel, burned in building machine: 0.0114247 MJ; source Frühwald A. 1996; lognormal variance with pedigree 0.1621, pedigree (1,4,5,3,1)
  EcoSpold01Location=GLO
  Literature Value. Regarding internal transports.
- melamine formaldehyde resin: 0.00408025 kg; source Frühwald A. 1996; lognormal variance with pedigree 0.0421, pedigree (1,4,5,3,1)
  EcoSpold01Location=RER
  Literature Value. Regarding consumption of adhesives. Without impregnation and surface treatment.
  properties: dry mass 1 kg, wet mass 1 kg, carbon content, fossil 0.311708
  note on carbon content, fossil: Chemical formula of the melamine formaldehide monomer was assumed to be C4H6N6O
- electricity, medium voltage: 0.0438626 kWh; lognormal variance with pedigree 0.0421, pedigree (1,4,5,3,1)
  Literature Value.
  EcoSpold01Location=UCTE
- sawnwood, board, softwood, raw, dried (u=20%): 0.000465828 m3; source Ressel 1986; lognormal variance with pedigree 0.0421, pedigree (1,4,5,3,1)
  Estimation. Calculated from literature value of yield.
  With the introduction of new wood products in ecoinvent version 3.1, the input of this exchange was change from generic sawnwood to an input of boards specifically.
  property water content 0.2; name water_content
  property dry mass 387.2 kg; name basic_d_wood
  properties: wet mass 464.64 kg, carbon content, non-fossil 0.494

## Emissions to nature
- Formaldehyde [air, unspecified]: 4.08025e-6 kg; source Nimz H. 1997; lognormal variance with pedigree 0.408, pedigree (4,5,5,5,5)
  Literature Value. 0.1 mass-% emissions.

## Sampling procedure
Literature

## Extrapolations
see Geography and Technology

## Review by Roberto Dones 2007-11-13
passed

## Review by Roland Hischier 2011-12-01
Transfer of documentation done.
