# treatment of wastewater from grass refinery, capacity 5E9l/year

Dataset: EcoSpold 2, unit process
Geography: CH
Time period: 1994-01-01 to 2019-12-31
Technology level: current
Classification: EcoSpold01Categories: waste management/wastewater treatment
Classification: ISIC rev.4 ecoinvent: 3700:Sewerage
Tags: ConvertedDataset; Treatment
Scenario: Business-as-Usual
System model: Allocation at the point of substitution
Share of production covered: 1 %
Generated by: Michael Spielmann (obsolete)
Published in: Jungbluth N. 2007
Database: ecoinvent
isCopyrightProtected: true
accessRestrictedTo: 1

## General comment
Wastewater purified in a medium size municipal wastewater treatment plant (capacity class 3), with an average capacity size of 24900 per-captia-equivalents PCE.
Wastewater contains (in kg/m3): TOC: 25.4 (GSD=122.5%);
[This dataset was already contained in the ecoinvent database version 2. It was not individually updated during the transfer to ecoinvent version 3. Life Cycle Impact Assessment results may still have changed, as they are affected by changes in the supply chain, i.e. in other datasets. This dataset was generated following the ecoinvent quality guidelines for version 2. It may have been subject to central changes described in the ecoinvent version 3 change report (http://www.ecoinvent.org/database/ecoinvent-version-3/reports-of-changes/), and the results of the central updates were reviewed extensively. The changes added e.g. consistent water flows and other information throughout the database. The documentation of this dataset can be found in the ecoinvent reports of version 2, which are still available via the ecoinvent website. The change report linked above covers all central changes that were made during the conversion process.]

## Included activities end
Infrastructure materials for municipal wastewater treatment plant, transports, dismantling. Land use burdens.

## Geography
Specific to the technology mix encountered in Switzerland in 2000. Well applicable to modern treatment practices in Europe, North America or Japan.

## Technology
Three stage wastewater treatment (mechanical, biological, chemical) including sludge digestion (fermentation) according to the average technology in Switzerland

## Parameters
- fraction, process water, to air: 0.1 dimensionless; name fraction_PW_to_air; lognormal variance with pedigree 0.092025, pedigree (4,4,3,2,4)
  Literature value (Statistics Canada, 2007 & Shaffer, K.H., 2008, Consumptive water use in the Great Lakes Basin, USGS) (Vionnet, S., Quantis Water Database - Technical Report, 2012).

## Reference product
- wastewater from grass refinery: -1 m3; By-product classification Waste; CPC 39920: Sewage sludge
  production volume 0.0336675 m3
    This is a placeholder value that does not reflect real-world production volumes. This dataset does not currently require a real-world production volume to work in the database framework, and no actual data were collected yet. This has no negative effect on the results of the ecoinvent database. The placeholder value of this activity was scaled according to the nominal GDP of 2005 (source: United Nations, http://data.un.org/Glossary.aspx?q=GDP+%28current+US%24%29, accessed 20130726) to reflect an appropriate share of the global production volume, which is also a placeholder value.
  property price 0 EUR2005
    Waste products are assigned a price of zero as they are assumed to require further treatment.
  property carbon content, non-fossil 1
    TOC is 25.4 kg/m3 (ecoinvent v2.2 report 17, pg 221). TOC was considered as Total Carbon.
  property carbon content 1
    carbon content on a dry matter basis (reserved; not for manual entry)
  properties: carbon content, fossil 0, wet mass 1000 kg, water in wet mass 974.6 kg, water content 38.3701, dry mass 25.4 kg, carbon allocation 25.4 kg

## By-products
- electricity, for reuse in municipal waste incineration only: 0 kWh; CPC 17100: Electrical energy; By-product classification allocatable product; pedigree (1,1,1,1,1)
  Net electricity generated from this waste and used in internal MSWI plant energy redistribution.
  Uncertainty: uncertainty is calculated from uncertainties in waste composition and uncertainties in energy efficiency and the uncertainty in internal energy demand
  property exergy 3.6 MJ; name E_el_prod_MSWI_exergy
    This exergy property is based on the exergy content of the product.
  property true value relation 3.6; name E_el_prod_MSWI_true_value_relation
    property to calculate "true value" from
  property price 0.1 EUR2005; name E_el_prod_MSWI_price_EUR2005
    Estimated to be the same price as in case of electricity, medium voltage.
- heat, for reuse in municipal waste incineration only: 0 MJ; CPC 17300: Steam and hot water; By-product classification allocatable product; pedigree (1,1,1,1,1)
  Net useful heat generated from this waste and used in internal MSWI plant energy redistribution.
  Uncertainty: uncertainty is calculated from uncertainties in waste composition and uncertainties in energy efficiency and the uncertainty in internal energy demand
  property true value relation 0.1842; name E_th_prod_MSWI_true_value_relation
    property to calculate "true value" from
  property exergy 0.1842 MJ; name E_th_prod_MSWI_exergy
    This exergy property is based on the exergy content of the product.
  property price 0.0106 EUR2005; name E_th_prod_MSWI_price_EUR2005
    Average European district heat price from Ecoheatcool and Euroheat 2005-2006, Ecoheat Work package 1: The European heat market. Final report. 10.6 EUR/GJ i s the price of district heat. http://www.solarthermalworld.org/files/Ecoheatcool%20WP1%20Web.pdf?download
- zinc concentrate: 0 kg; CPC 14290: Other non-ferrous metal ores and concentrates (other than uranium or thorium ores and concentrates); By-product classification allocatable product
  Calculated value from the knowledge of the properties of both products.
  property price 0.38 EUR2005; name ByP_price_EUR2005
    Temporary price data. Calculated as 90% of purchasers price based on: Zinc content in concentrate 53%. Concentrate price per kg Zn 86.5% of refined Zn price (13.5% treatment charges according to CHR Metals Limited 2005: Dynamic cost curves. http://www.minecost.com/dynamic.pdf). 2004 zinc price from USGS (2007) Mineral commodity summaries 2007. <http://minerals.usgs.gov/minerals/pubs/mcs/2007/mcs2007.pdf> [Accessed 25 May 2010]
  property zinc content 0.53; name zinc_C_zinc_concentrate
    Zinc content on a dry matter basis. Value taken from teh "zinc mine operation" /GLO dataset.
  property dry mass 1 kg; name DM_zinc_concentrate
  property carbon content 0
    carbon content on a dry matter basis (reserved; not for manual entry)
  properties: wet mass 1 kg, water content 0, carbon content, non-fossil 0, carbon content, fossil 0, water in wet mass 0 kg, carbon allocation 0 kg

## Inputs from technosphere
- liquid manure spreading, by vacuum tanker: 0.074219 m3; lognormal variance with pedigree 0.04, pedigree (1,1,5,1,1)
  burden from sludge spreading. Uncertainty calculated from wastewater composition and treatment model
  This exchange has an activity link directly to the producing activity because the product is primarily consumed in the same geographical area where it is produced.
- process-specific burdens, residual material landfill: 0.011965 kg; lognormal variance with pedigree 0.07, pedigree (1,1,5,1,1)
  burden from sludge incineration. Uncertainty calculated from wastewater composition and treatment model;activityLink introduced to establish a direct link to the corresponding regional supply of this product
- electricity, high voltage: 2.2573 kWh; lognormal variance with pedigree 0.48, pedigree (1,1,5,1,1)
  burden from sludge incineration. Uncertainty calculated from wastewater composition and treatment model
- slag landfill: 4.6091e-11 unit; lognormal variance with pedigree 0.07, pedigree (1,1,5,1,1)
  (same comment as for electricity, high voltage)
- waste graphical paper: -0.0155 kg; lognormal variance with pedigree 0.04, pedigree (1,1,5,1,1)
  direct wastewater treatment plant burden. Uncertainty calculated from wastewater composition and treatment model
  production volume 0.000521847 kg; = (Ref('0401b723-4cc8-4309-9044-a1f09bf51dda')*-1)* Ref('432285f7-7f44-442b-94e9-5115135d6f2f', 'ProductionVolume')/ABS( Ref('432285f7-7f44-442b-94e9-5115135d6f2f'))
    Calculated from the production volume of sewage from grass refinery in proportion to the respective output amounts.
  properties: wet mass 1 kg, dry mass 0.888 kg, water content 0.126126, carbon content, non-fossil 0.454955
- cement, unspecified: 0.0047859 kg; lognormal variance with pedigree 0.08, pedigree (1,1,5,1,1)
  (same comment as for electricity, high voltage)
  properties: dry mass 1 kg, wet mass 1 kg
- process-specific burdens, municipal waste incineration: 15.701 kg; lognormal variance with pedigree 0.04, pedigree (1,1,5,1,1)
  (same comment as for process-specific burdens, residual material landfill)
- waste plastic, mixture: -0.0155 kg; lognormal variance with pedigree 0.04, pedigree (1,1,5,1,1)
  (same comment as for waste graphical paper)
  production volume 0.000521847 kg; = (Ref('d093f7f6-e7c8-4fe1-97ec-589d2c513240')*-1)* Ref('432285f7-7f44-442b-94e9-5115135d6f2f', 'ProductionVolume')/ABS( Ref('432285f7-7f44-442b-94e9-5115135d6f2f'))
    (same comment as for waste graphical paper)
  properties: carbon content, fossil 0.747344, water content 0.180638, dry mass 0.847 kg, wet mass 1 kg
  note on carbon content, fossil: C content in 1 kg DM was calculated using data in Tab A.2, ecoinvent v2.2 report 13_I
- hydrochloric acid, without water, in 30% solution state: 1.3373e-7 kg; lognormal variance with pedigree 0.09, pedigree (1,1,5,1,1)
  (same comment as for electricity, high voltage)
  properties: dry mass 1 kg, wet mass 1 kg
- sewer grid, 5E9l/year, 110 km: 2.1782e-7 km; lognormal variance with pedigree 0.04, pedigree (1,1,5,1,1)
  uncertainty heeded in exchanges of the module
- waste cement, hydrated: -0.011965 kg; lognormal variance with pedigree 0.08, pedigree (1,1,5,1,1)
  (same comment as for electricity, high voltage)
  production volume 0.000402832 kg; = (Ref('6ba0ab6a-c54b-4410-8a6e-71aa50e76f0c')*-1)* Ref('432285f7-7f44-442b-94e9-5115135d6f2f', 'ProductionVolume')/ABS( Ref('432285f7-7f44-442b-94e9-5115135d6f2f'))
    (same comment as for waste graphical paper)
  properties: wet mass 1 kg, dry mass 1 kg
- wastewater treatment facility, capacity 5E9l/year: 5.6882e-9 unit; lognormal variance with pedigree 0.04, pedigree (1,1,5,1,1)
  uncertainty heeded in exchanges of the module
- process-specific burdens, slag landfill: 0.025926 kg; lognormal variance with pedigree 0.07, pedigree (1,1,5,1,1)
  (same comment as for process-specific burdens, residual material landfill)
- heat, district or industrial, other than natural gas: 13.168 MJ; lognormal variance with pedigree 0.04, pedigree (1,1,5,1,1)
  (same comment as for electricity, high voltage)
- municipal waste incineration facility: 3.9252e-9 unit; lognormal variance with pedigree 0.04, pedigree (1,1,5,1,1)
  (same comment as for electricity, high voltage)
- residual material landfill: 2.4927e-11 unit; lognormal variance with pedigree 0.07, pedigree (1,1,5,1,1)
  (same comment as for electricity, high voltage)
- chemical, inorganic: 2.2289e-7 kg; lognormal variance with pedigree 0.09, pedigree (1,1,5,1,1)
  (same comment as for electricity, high voltage)
  properties: wet mass 1 kg, dry mass 1 kg, carbon content, fossil 0.003
  note on carbon content, fossil: This dataset is an unweighted average of 20 inorganic substances (listed in Tab 88.1, ecoinvent v2.2 report 8, part II), being part of the top100 chemicals included in this database. The C-content has also been calculated as an unweighted average of the C content of the substances composing this dataset.
- electricity, low voltage: 29.356 kWh; lognormal variance with pedigree 0.07, pedigree (1,1,5,1,1)
  (same comment as for waste graphical paper)

## Emissions to nature
- BOD5, Biological Oxygen Demand [water, surface water]: 3.7332 kg; lognormal variance with pedigree 0.05, pedigree (1,1,5,1,1)
  sewer overload discharge plus direct wastewater treatment plant emission plus emission from sludge incineration. Uncertainty calculated from wastewater composition and treatment model
- Carbon monoxide, fossil [air, urban air close to ground]: 0.05988 kg; lognormal variance with pedigree 0.12, pedigree (1,1,5,1,1)
  emission from sludge incineration. Uncertainty calculated from wastewater composition and treatment model
- COD, Chemical Oxygen Demand [water, surface water]: 11.368 kg; lognormal variance with pedigree 0.04, pedigree (1,1,5,1,1)
  (same comment as for BOD5, Biological Oxygen Demand)
- Water [air, unspecified]: 0.1 m3; name water_to_air_unspecified; lognormal variance with pedigree 0.0807, pedigree (2,2,5,1,1)
  Calculated value based on water balance.
  property fraction, origin: salt water 0; name fraction_origin_salt_water
  property fraction, origin: fresh water 0; name fraction_origin_fresh_water
  property fraction, origin: unspecified 1; name fraction_origin_unspecified
- BOD5, Biological Oxygen Demand [water, ground-, long-term]: 0.027995 kg; lognormal variance with pedigree 0.07, pedigree (1,1,5,1,1)
  (same comment as for Carbon monoxide, fossil)
- Methane, fossil [air, urban air close to ground]: 0.18948 kg; lognormal variance with pedigree 0.1, pedigree (1,1,5,1,1)
  (same comment as for Carbon monoxide, fossil)
- Water [water, unspecified]: 0.9 m3; name water_to_water_unspecified; lognormal variance with pedigree 0.0807, pedigree (2,2,5,1,1)
  Calculated value based on water balance.
  property fraction, origin: fresh water 1; name fraction_origin_fresh_water_Ww
  property dry mass 0 kg; name DM
  property wet mass 1000 kg; name WM
  property carbon content, fossil 0; name C_content_fossil
  property carbon content, non-fossil 0; name C_content_non_fossil
  property fraction, origin: unspecified 0; name fraction_origin_unspecified_Ww
  property fraction, origin: salt water 0; name fraction_origin_salt_water_Ww
  property water in wet mass 1000 kg; name WWM
- DOC, Dissolved Organic Carbon [water, surface water]: 2.8449 kg; lognormal variance with pedigree 0.04, pedigree (1,1,5,1,1)
  (same comment as for BOD5, Biological Oxygen Demand)
- DOC, Dissolved Organic Carbon [water, ground-, long-term]: 0.033867 kg; lognormal variance with pedigree 0.07, pedigree (1,1,5,1,1)
  (same comment as for Carbon monoxide, fossil)
- TOC, Total Organic Carbon [water, surface water]: 3.0457 kg; lognormal variance with pedigree 0.04, pedigree (1,1,5,1,1)
  (same comment as for BOD5, Biological Oxygen Demand)
- Carbon dioxide, fossil [air, urban air close to ground]: 70.727 kg; lognormal variance with pedigree 0.05, pedigree (1,1,5,1,1)
  (same comment as for Carbon monoxide, fossil)
- Carbon [soil, agricultural]: 3.0578 kg; lognormal variance with pedigree 0.06, pedigree (1,1,5,1,1)
  emission from sludge spreading. Uncertainty calculated from wastewater composition and treatment model
- TOC, Total Organic Carbon [water, ground-, long-term]: 0.033867 kg; lognormal variance with pedigree 0.07, pedigree (1,1,5,1,1)
  (same comment as for Carbon monoxide, fossil)
- NMVOC, non-methane volatile organic compounds, unspecified origin [air, urban air close to ground]: 0.000861 kg; lognormal variance with pedigree 0.21, pedigree (1,1,5,1,1)
  direct digester gas emission. Uncertainty calculated from wastewater composition and treatment model
- COD, Chemical Oxygen Demand [water, ground-, long-term]: 0.085588 kg; lognormal variance with pedigree 0.07, pedigree (1,1,5,1,1)
  (same comment as for Carbon monoxide, fossil)

## Sampling procedure
literature

## Extrapolations
This dataset has been extrapolated from year 2000 to the year of the calculation (2019). The uncertainty has been adjusted accordingly.

## Review by Niels Jungbluth 2009-02-07
passed.
none
