# phosphate rock beneficiation, dry

Dataset: EcoSpold 2, unit process
Geography: RoW
Time period: 1986-01-01 to 2019-12-31
Technology level: current
Classification: EcoSpold01Categories: chemicals/inorganics
Classification: ISIC rev.4 ecoinvent: 0891:Mining of chemical and fertilizer minerals
Tags: ConvertedDataset
Scenario: Business-as-Usual
System model: Allocation at the point of substitution
Generated by: Alex Primas
Published in: Althaus H.-J. 2007
Database: ecoinvent
isCopyrightProtected: true
accessRestrictedTo: 1

## General comment
Large uncertainties exist for data on particle emissions from transfer and storage. Also data of emissions to water and soil are uncertain due to missing data of uncontrolled run off and water use which were estimated. Energy consumption data related to mass of rock moved.
[This dataset was already contained in the ecoinvent database version 2. It was not individually updated during the transfer to ecoinvent version 3. Life Cycle Impact Assessment results may still have changed, as they are affected by changes in the supply chain, i.e. in other datasets. This dataset was generated following the ecoinvent quality guidelines for version 2. It may have been subject to central changes described in the ecoinvent version 3 change report (http://www.ecoinvent.org/database/ecoinvent-version-3/reports-of-changes/), and the results of the central updates were reviewed extensively. The changes added e.g. consistent water flows and other information throughout the database. The documentation of this dataset can be found in the ecoinvent reports of version 2, which are still available via the ecoinvent website. The change report linked above covers all central changes that were made during the conversion process.]

## Included activities end
Mining process, transport to beneficiation plant, dry processing including crushing, screening or washing and flotation.Drying orcalcination of washed rock included. Land use for mining and reclamation.

## Geography
Assumption for production in Morocco based mainly on data from Florida. Some data from Moroccan mines. Various processes with location RER used.

## Technology
U.S. technology for dry rock or dried wet rock processing. Average technology mix modelled. No specific age of technology modelled

## Time period
Time of literature publication. Measurements took place partly before this period.

## Parameters
- fraction, process water, to air: 0.34 dimensionless; name fraction_PW_to_air; lognormal variance with pedigree 0.092025, pedigree (4,4,3,2,4)

## Reference product
- phosphate rock, as P2O5, beneficiated, dry: 1 kg; CPC 34629: Other phosphatic fertilizers, n.e.c.; By-product classification allocatable product; CAS 65996-94-3
  Uncertainty not applicable for output
  EcoSpold01Location=MA
  production volume 2.41685e10 kg
    Source: IFA production and trade statistics http://www.fertilizer.org/ifa/Home-Page/STATISTICS/Production-and-trade divided evenly between wet and dry product
  property price 0.049 EUR2005
    Calculated value based on data from United Nations Commodity Trade Statistics Database (comtrade.un.org). UN comtrade category: 251010 Natural calcium phosphates, unground. Year 2005. Using exchange rate of 1EURO = 1.209 USD. Average of price of import into 5 main markets (EU, US, JP, IN and CN).
  property carbon content 0
    carbon content on a dry matter basis (reserved; not for manual entry)
  properties: carbon content, fossil 0, water content 0, wet mass 1 kg, water in wet mass 0 kg, carbon content, non-fossil 0, dry mass 1 kg, carbon allocation 0 kg

## Inputs from technosphere
- light fuel oil: 0 kg; pedigree (1,1,1,1,1)
  EcoSpold01Location=RER
  Average data from U.S study, Location RER
  Uncertainty: Average data from U.S study, Location RER
  properties: carbon content, fossil 0.862, wet mass 1 kg, dry mass 1 kg
- palm oil, crude: 0.0026 kg; lognormal variance with pedigree 0.2646, pedigree (3,3,5,5,5)
  Average data from U.S study; proxy used
  EcoSpold01Location=MY
  Uncertainty: Average data from U.S study; proxy used
  properties: wet mass 1 kg, dry mass 1 kg, carbon content, non-fossil 0.752881
  note on carbon content, non-fossil: C49H97O6. Palm oil (tab 17.4, ecoinvent v2.2 report 17-part 17)
- heat, district or industrial, other than natural gas: 0 MJ; pedigree (1,1,1,1,1)
  EcoSpold01Location=RER
  2,3,3,5,4,3; Technology-mix estimated, Location RER
- electricity, medium voltage: 0 kWh; pedigree (1,1,1,1,1)
  61% of world production 1994, European mix
  EcoSpold01Location=UCTE
  Uncertainty: 61% of world production 1994, European mix
- soda ash, light, crystalline, heptahydrate: 0.0026 kg; lognormal variance with pedigree 0.1246, pedigree (3,3,5,5,4)
  (same comment as for light fuel oil)
  properties: wet mass 1 kg, carbon content, fossil 0.0517241, dry mass 1 kg
- heat, district or industrial, natural gas: 0 MJ; pedigree (1,1,1,1,1)
  Technology-mix estimated, Location RER
  EcoSpold01Location=RER
  Uncertainty: Technology-mix estimated, Location RER
- ethylenediamine: 0.001 kg; lognormal variance with pedigree 0.2646, pedigree (3,3,5,5,5)
  Average data from U.S study; proxy used
  EcoSpold01Location=RER
  Uncertainty: Average data from U.S study; proxy used
  properties: carbon content, fossil 0.5, dry mass 1 kg, wet mass 1 kg
- sodium silicate, spray powder, 80%: 0.0008 kg; lognormal variance with pedigree 0.1246, pedigree (3,3,5,5,4)
  Average data from U.S study, Location RER
  EcoSpold01Location=RER
  Uncertainty: Average data from U.S study, Location RER
  properties: wet mass 1 kg, dry mass 1 kg
- mine infrastructure, phosphate rock: 3.03e-11 unit; lognormal variance with pedigree 0.448, pedigree (4,5,5,5,4)
  EcoSpold01Location=MA
  Estimated with weak data from 2 sites
  Uncertainty: Estimated with weak data from 2 sites
- sulfuric acid: 0.0039 kg; lognormal variance with pedigree 0.1246, pedigree (3,3,5,5,4)
  (same comment as for light fuel oil)
  properties: dry mass 1 kg, wet mass 1 kg
- diesel, burned in building machine: 0.103 MJ; lognormal variance with pedigree 0.0612, pedigree (2,3,5,5,3)
  EcoSpold01Location=GLO
  61% of world production 1994
  Uncertainty: 61% of world production 1994
- light fuel oil: 0.000496442, 7.15949e-5, 0.00100194, 6.64874e-5, 9.63378e-5, 0.0021672 kg (6 entries); lognormal variance with pedigree 0.1246, pedigree (3,3,5,5,4)
  (same comment as for light fuel oil)
- heat, district or industrial, other than natural gas: 0.00930454, 0.557695 MJ (2 entries); lognormal variance with pedigree 0.092, pedigree (1,1,5,5,1)
  EcoSpold01Location=RER
  2,3,3,5,4,3; Technology-mix estimated, Location RER
- electricity, medium voltage: 6.58884e-5, 0.00157946, 9.01982e-6, 2.89388e-5, 5.93703e-5, 5.43579e-6, 5.07684e-5, 3.26509e-5, 0.000419367, 0.00125888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 kWh (36 entries); lognormal variance with pedigree 0.1232, pedigree (2,3,5,5,4)
  (same comment as for electricity, medium voltage)
- heat, district or industrial, natural gas: 0.0238194, 0.543181 MJ (2 entries); lognormal variance with pedigree 0.1232, pedigree (2,3,5,5,4)
  (same comment as for heat, district or industrial, natural gas)

## Inputs from nature
- Water, well, in ground [natural resource, in water]: 0.0038 m3; name water_well_in_ground_input; lognormal variance with pedigree 0.148, pedigree (4,5,5,5,4)
  Estimated from data of U.S. mines
  Uncertainty: Estimated from data of U.S. mines
- Phosphorus, in ground [natural resource, in ground]: 0.47 kg; lognormal variance with pedigree 0.0421, pedigree (1,2,5,5,1)
  18% P in apatite; 12% in ore; Data of year 1999 / 2000 from Morocco used
  Uncertainty: Data of year 1999 / 2000 from Morocco used
- Occupation, construction site [natural resource, land]: 0.0011 m2*year; lognormal variance with pedigree 0.218, pedigree (4,5,5,5,4)
  Estimated from data of U.S. mines
  Uncertainty: Estimated from data of U.S. mines
- Fluorine, in ground [natural resource, in ground]: 0.118 kg; lognormal variance with pedigree 0.0546, pedigree (3,3,5,5,1)
  4.5% F in apatite; 3% F in ore; Data for process loss estimated
  Uncertainty: Data for process loss estimated
- Transformation, from mineral extraction site [natural resource, land]: 0.00072 m2; lognormal variance with pedigree 0.298, pedigree (4,5,5,5,4)
  Estimated from data of U.S. mines
  Uncertainty: Estimated from data of U.S. mines
- Transformation, from pasture, man made [natural resource, land]: 0.00072 m2; lognormal variance with pedigree 0.298, pedigree (4,5,5,5,4)
  Estimated from data of U.S. mines
  Uncertainty: Estimated from data of U.S. mines
- Occupation, mineral extraction site [natural resource, land]: 0.0144 m2*year; lognormal variance with pedigree 0.218, pedigree (4,5,5,5,4)
  Estimated from data of U.S. mines
  Uncertainty: Estimated from data of U.S. mines
- Transformation, to mineral extraction site [natural resource, land]: 0.00072 m2; lognormal variance with pedigree 0.298, pedigree (4,5,5,5,4)
  Estimated from data of U.S. mines
  Uncertainty: Estimated from data of U.S. mines
- Transformation, to pasture, man made [natural resource, land]: 0.00072 m2; lognormal variance with pedigree 0.298, pedigree (4,5,5,5,4)
  Estimated from data of U.S. mines
  Uncertainty: Estimated from data of U.S. mines

## Emissions to nature
- DOC, Dissolved Organic Carbon [water, surface water]: 1.86e-7 kg; lognormal variance with pedigree 0.188, pedigree (4,5,5,5,4)
  Calculated from measured data
  Uncertainty: Calculated from measured data
- Carbon dioxide, fossil [air, non-urban air or from high stacks]: 0.0243 kg; lognormal variance with pedigree 0.0546, pedigree (2,4,5,5,1)
  Data from 1 mine in Morocco
  Uncertainty: Data from 1 mine in Morocco
- BOD5, Biological Oxygen Demand [water, surface water]: 0.000252 kg; lognormal variance with pedigree 0.188, pedigree (4,5,5,5,4)
  Calculated from measured data
  Uncertainty: Calculated from measured data
- Nitrogen [water, surface water]: 1.32e-5 kg; lognormal variance with pedigree 0.176, pedigree (3,4,5,5,4)
  Data from 1 U.S. mine (1990) and estimates
  Uncertainty: Data from 1 U.S. mine (1990) and estimates
- Thorium-230 [air, non-urban air or from high stacks]: 0.0047 kBq; lognormal variance with pedigree 0.426, pedigree (4,5,5,5,3)
  Calculated from dust emissions
  Uncertainty: Calculated from dust emissions
- Particulates, > 2.5 um, and < 10um [air, non-urban air or from high stacks]: 0.00092 kg; lognormal variance with pedigree 0.23, pedigree (3,5,5,5,3)
  U.S. data from 1970 and data of coal mining
  Uncertainty: U.S. data from 1970 and data of coal mining
- COD, Chemical Oxygen Demand [water, surface water]: 0.000252 kg; lognormal variance with pedigree 0.188, pedigree (4,5,5,5,4)
  Calculated from measured data
  Uncertainty: Calculated from measured data
- Particulates, > 10 um [air, non-urban air or from high stacks]: 0.00176 kg; lognormal variance with pedigree 0.15, pedigree (3,5,5,5,3)
  (same comment as for Particulates, > 2.5 um, and < 10um)
- Uranium-234 [air, non-urban air or from high stacks]: 0.0047 kBq; lognormal variance with pedigree 0.426, pedigree (4,5,5,5,3)
  Calculated from dust emissions
  Uncertainty: Calculated from dust emissions
- Polonium-210 [air, non-urban air or from high stacks]: 0.00282 kBq; lognormal variance with pedigree 0.426, pedigree (4,5,5,5,3)
  Calculated from dust emissions
  Uncertainty: Calculated from dust emissions
- Water [water, unspecified]: 0.002508 m3; name water_to_water_unspecified; lognormal variance with pedigree 0.0827, pedigree (2,2,5,5,1)
  Calculated value based on literature values and expert opinion. See comments in the parametres' comment field.
  property fraction, origin: unspecified 0; name fraction_origin_unspecified_Ww
  property fraction, origin: salt water 0; name fraction_origin_salt_water_Ww
  property fraction, origin: fresh water 1; name fraction_origin_fresh_water_Ww
  property carbon content, fossil 0; name C_content_fossil
  property carbon content, non-fossil 0; name C_content_non_fossil
  property wet mass 1000 kg; name WM
  property water in wet mass 1000 kg; name WWM
  property dry mass 0 kg; name DM
- Uranium-238 [air, non-urban air or from high stacks]: 0.0047 kBq; lognormal variance with pedigree 0.426, pedigree (4,5,5,5,3)
  Calculated from dust emissions
  Uncertainty: Calculated from dust emissions
- Water [air, unspecified]: 0.001292 m3; name water_to_air_unspecified; lognormal variance with pedigree 0.0827, pedigree (2,2,5,5,1)
  (same comment as for Water)
  property fraction, origin: salt water 0; name fraction_origin_salt_water
  property fraction, origin: fresh water 1; name fraction_origin_fresh_water
  property fraction, origin: unspecified 0; name fraction_origin_unspecified
- Radium-226 [air, non-urban air or from high stacks]: 0.00501 kBq; lognormal variance with pedigree 0.426, pedigree (4,5,5,5,3)
  Calculated from dust emissions
  Uncertainty: Calculated from dust emissions
- Lead-210 [air, non-urban air or from high stacks]: 0.00282 kBq; lognormal variance with pedigree 0.426, pedigree (4,5,5,5,3)
  Calculated from dust emissions
  Uncertainty: Calculated from dust emissions
- Suspended solids, unspecified [water, surface water]: 8.47e-5 kg; lognormal variance with pedigree 0.176, pedigree (3,4,5,5,4)
  (same comment as for Nitrogen)
- Oils, unspecified [soil, industrial]: 0.00193 kg; lognormal variance with pedigree 0.39, pedigree (5,5,5,5,5)
  Estimation from data of chemical demand
  Uncertainty: Estimation from data of chemical demand
- Thorium-232 [air, non-urban air or from high stacks]: 5e-5 kBq; lognormal variance with pedigree 0.426, pedigree (4,5,5,5,3)
  Calculated from dust emissions
  Uncertainty: Calculated from dust emissions
- Particulates, < 2.5 um [air, non-urban air or from high stacks]: 0.00046 kg; lognormal variance with pedigree 0.42, pedigree (3,5,5,5,3)
  (same comment as for Particulates, > 2.5 um, and < 10um)
- TOC, Total Organic Carbon [water, surface water]: 6.78e-5 kg; lognormal variance with pedigree 0.188, pedigree (4,5,5,5,4)
  Calculated from measured data
  Uncertainty: Calculated from measured data
- Fluoride [water, surface water]: 1.69e-5 kg; lognormal variance with pedigree 0.176, pedigree (3,4,5,5,4)
  (same comment as for Nitrogen)
- Hydrogen fluoride [air, non-urban air or from high stacks]: 1.18e-5 kg; lognormal variance with pedigree 0.2126, pedigree (2,4,5,5,3)
  U.S. data from 1973
  Uncertainty: U.S. data from 1973
- Radioactive species, alpha emitters [water, surface water]: 0.00164 kBq; lognormal variance with pedigree 0.436, pedigree (3,4,5,5,4)
  (same comment as for Nitrogen)
- Toluene [water, surface water]: 2.03e-7 kg; lognormal variance with pedigree 0.436, pedigree (3,4,5,5,4)
  (same comment as for Nitrogen)
- Sulfate [water, surface water]: 0.00112 kg; lognormal variance with pedigree 0.176, pedigree (3,4,5,5,4)
  (same comment as for Nitrogen)
- Phosphorus [water, surface water]: 3.39e-5 kg; lognormal variance with pedigree 0.176, pedigree (3,4,5,5,4)
  (same comment as for Nitrogen)

## Sampling procedure
Data for emissions and land use based on various studies from Florida. Energy data based on a world-wide survey and some assumptions. Further data from Moroccan studies, literature and estimations.

## Extrapolations
Extrapolation and transformation from U.S. data with help of specific informations from literature on Moroccan mines. No extrapolation for energy data. This dataset has been copied from an original dataset covering the geography MA. The uncertainty has been adjusted accordingly.

## Review by Roland Hischier 2003-08-26
Passed.
