# heat and power co-generation, wood chips, 6667 kW, state-of-the-art 2014

Dataset: EcoSpold 2, unit process
Geography: IN-TN
Time period: 2010-01-01 to 2019-12-31
Technology level: modern
Classification: ISIC rev.4 ecoinvent: 3530:Steam and air conditioning supply
Tags: with true value; consequential version only; marginal; wood power
Scenario: Business-as-Usual
System model: Allocation at the point of substitution
Generated by: Christian Bauer
Published in: Bauer, C. 2007
Database: ecoinvent
isCopyrightProtected: true
accessRestrictedTo: 1

## General comment
This technology currently does not contribute to power generation in this country. However, it is supposed to contribute to expansion/replacement of power generation capacity between today and 2030; therefore, electricity is the reference product. This dataset represents the production of heat and electricity with wood chips in a state-of-the-art (as of 2014) co-generation plant with a capacity of 6667 kW (referring to fuel input) in Switzerland and was used as approximation for this dataset valid for a global average (uncertainties adjusted accordingly). The technology corresponds to a modern unit to be installed in 2014 in Switzerland, which is equipped with an electrostatic precipitator for particulate matter (PM) emission reduction and an SNCR device for reduction of NOx emissions. Electricity is produced with an organic rankine cycle (ORC) steam generator.
Wood chips are burned in a boiler at a temperature of 800-1300 °C under excess air conditions and turned into carbon dioxide and water. Energy is set free in form of heat. Burning takes place with the following steps:
1. Drying
2. degradation of the wood into carbon and gases
3. degradation of the carbon into gases
4. oxidation of the gases
These phases overlap. The produced heat can be used directly or for steam production in order to generate electricity with a turbine.
Emissions vary with quality of the combustion (temperatur, mixing of the combustion gases and the added fresh air, retention time of gases in the combustor), filter technologies and with the efficiency of the plant. Emission data in this dataset are taken from measurements and literature as well as from communication with experts.
CO2 emissions were calculated out of the carbon content of the wood used as combustible. Carbon emitted in carbon monoxide was subtracted from the result.
Key emissions factors for CO, NOx, CH4, NMVOC and particles were updated according to latest data.
All other emission factors (per MJ fuel input) correspond to the 1000 kW boiler fuelled with wood chips from forest. Other exchanges correspond to the LCI data for the 6400 kW co-generation unit in ecoinvent v2.2.
Good J., Nussbaumer T., Bühler R., Jenni A. (1996) Erfolgskontrolle des SNCRVerfahren
zur Entstickung von Holzfeuerungen. Schlussbericht des BEWProjektes
53894. Zürich, Schweiz.

## Included activities start
From wood chips ready to be burned in cogeneration unit (for heat and power production).

## Included activities end
This activity ends with heat and electricity produced.

This dataset includes the infrastructure, the wood input, the emissions to air and the disposal of the ashes. Also included are substances needed for operation: lubricating oil, organic chemicals, sodium chloride, chlorine and decarbonized water.

## Geography
extrapolated from Swiss data

## Technology
Electric efficiency: 0.15; Thermal efficiency: 0.45;
Total efficiency: 0.6

## Time period
Current APV=0. However, this technology is supposed to contribute to capacity expansion/replacement between today and 2030.

## Parameters
- electrical efficiency: 0.15 dimensionless; name efficiency_electrical
  Electric efficiency of the cogeration system, corresponding to annual operation including warm-up and cool-down
  nan
- thermal efficiency: 0.45 dimensionless; name efficiency_thermal
  Thermal efficiency of the cogeration system, corresponding to annual operation including warm-up and cool-down
  nan

## Reference product
- heat, district or industrial, other than natural gas: 1 MJ; name heat_out; = 1*efficiency_thermal; source Thomas Nussbaumer 2014; CPC 17300: Steam and hot water; By-product classification allocatable product
  Thermal efficiency referring to the LHV of the fuel input
  production volume 1 MJ
    This production volume will be ignored by the manual market generation.
  property exergy 0.169678 MJ; name heat_out_exergy
    allocation factor for electricity (=1) vs. heat, where heat is calculated as the termodynamic mean temperature Tm = (Tfeed-Treturn)/ln(Tfeed/Treturn), relative to the application temperature (Tu, typically = 293 K), i.e. (Tm-Tu)/Tm
  property true value relation 0.169678; name heat_out_true_value_relation
    property to calculate 'true value' from
  property price 0.0106 EUR2005; name heat_out_price_EUR2005
    Average European district heat price from Ecoheatcool and Euroheat 2005-2006, Ecoheat Work package 1: The European heat market. Final report. 10.6 EUR/GJ i s the price of district heat. http://www.solarthermalworld.org/files/Ecoheatcool%20WP1%20Web.pdf?download
  property corresponding fuel use, propane, furnace >100kW 1.05263 MJ; = 1/0.95
    Lower heating value of the fuel input related to the heat/electricity output, taken directly from ecoinvent v3.0 dataset 'heat production, natural gas, at industrial furnace >100kW, GLO 2000'.
  property true value 0.00298222; name heat_out_true_value
    allocation property applied in "true value" allocation // value calculated from true value relation

## By-products
- electricity, high voltage: 0 kWh; name electricity_out; = 1*efficiency_electrical/3.6; CPC 17100: Electrical energy; By-product classification allocatable product
  Electric efficiency referring to the LHV of the fuel input
  production volume 1 kWh
    This production volume will be ignored by the manual market generation.
  property true value relation 3.6; name electricity_out_true_value_relation
    property to calculate 'true value' from
  property price 0.0977 EUR2005; name electricity_out_price_EUR2005
    Temporary price data. Calculated as 90% of purchasers price based on: 94% of the average price (to account for a 6% loss in transformation and transmission) for electricity for industrial consumersin 2005 (excluded taxes). From IEA.
  property exergy 3.6 MJ; name electricity_out_exergy
    (same comment as for heat, district or industrial, other than natural gas)
  property true value 0.00585861; name electricity_out_true_value
    (same comment as for heat, district or industrial, other than natural gas)
- heat, for reuse in municipal waste incineration only: 0 MJ; CPC 17300: Steam and hot water; By-product classification allocatable product; pedigree (1,1,1,1,1)
  Net electricity generated from this waste and used in internal MSWI plant energy redistribution.
  Uncertainty: uncertainty is calculated from uncertainties in waste composition and uncertainties in energy efficiency and the uncertainty in internal energy demand
  production volume 0.0548309 MJ
  property exergy 0.1842 MJ; name E_th_prod_MSWI_exergy
    This exergy property is based on the exergy content of the product.
  property price 0.0106 EUR2005; name E_th_prod_MSWI_price_EUR2005
    (same comment as for heat, district or industrial, other than natural gas)
  property true value relation 0.1842; name E_th_prod_MSWI_true_value_relation
    property to calculate "true value" from
  property true value 3.74507e-10
    (same comment as for heat, district or industrial, other than natural gas)
- electricity, for reuse in municipal waste incineration only: 0 kWh; CPC 17100: Electrical energy; By-product classification allocatable product; pedigree (1,1,1,1,1)
  (same comment as for heat, for reuse in municipal waste incineration only)
  production volume 0.00758391 kWh
  property price 0.1 EUR2005; name E_el_prod_MSWI_price_EUR2005
    Estimated to be the same price as in case of electricity, medium voltage.
  property exergy 3.6 MJ; name E_el_prod_MSWI_exergy
    This exergy property is based on the exergy content of the product.
  property true value relation 3.6; name E_el_prod_MSWI_true_value_relation
    property to calculate "true value" from
  property true value 1.01552e-9
    (same comment as for heat, district or industrial, other than natural gas)

## Inputs from technosphere
- heat and power co-generation unit, organic Rankine cycle, 1000kW electrical: 3.90401e-10 unit; = 1/(4000*6667*20*3.6)
  calculated value, assuming 4000h/a operation time, 20a lifetime, 6667kW (fuel input) capacity
- sodium chloride, powder: 3.07339e-6 kg; source Bauer, C. 2007
  literature
  properties: dry mass 1 kg, wet mass 1 kg
- lubricating oil: 2.45871e-6 kg; name lubricating_oil; source Bauer, C. 2007
  literature
  properties: dry mass 1 kg, wet mass 1 kg, carbon content, fossil 0.75
  note on carbon content, fossil: Lubricating oil is produced from diesel. C-content/dry mass of fats and oils considered 75%, from: ecoinvent v2.2 report, n 15a, pg 40
- chemical, organic: 4.38521e-6 kg; source Bauer, C. 2007
  literature
  properties: dry mass 1 kg, wet mass 1 kg, carbon content, fossil 0.628
  note on carbon content, fossil: This dataset is an unweighted average of 20 organic substances (listed in Tab 88.1, ecoinvent v2.2 report 8, part II), being part of the top100 chemicals included in this database. The C-content has also been calculated as an unweighted average of the C content of the substances composing this dataset.
- water, decarbonised: 0.000589942 kg; name water_decarbonised; source Bauer, C. 2007
  literature
  properties: wet mass 1 kg
- municipal solid waste: -2.45871e-6 kg; name municipal_waste; source Bauer, C. 2007
  literature
  production volume 1 kg
    This production volume will be ignored by the manual market generation.
  property price 0 EUR2005; name municipal_waste_price_EUR2005
  properties: dry mass 0.771 kg, carbon content, fossil 0.171549, carbon content, non-fossil 0.261655, water content 0.297017, wet mass 1 kg
  note on carbon content, fossil: MSW composition in tab 4.1, ecoinvent v2.2 report 13_I. C content referred to 1 kg DM
- wood ash mixture, pure: -0.000396543 kg; name wood_ash; source Bauer, C. 2007
  literature
  production volume 1 kg
    This production volume will be ignored by the manual market generation.
  property price 0 EUR2005; name wood_ash_price_EUR2005
  properties: wet mass 1 kg, carbon content, non-fossil 0.012, dry mass 1 kg
- waste mineral oil: -2.45871e-6 kg; name waste_oil; = ((lubricating_oil))*-1
  literature
  production volume 1 kg
    This production volume will be ignored by the manual market generation.
  property price 0 EUR2005; name waste_oil_price_EUR2005
  properties: water content 0.111111, carbon content, fossil 0.864444, wet mass 1 kg, dry mass 0.9 kg
  note on carbon content, fossil: Tab A.6, ecoinvent v2.2 report 13_I. C content has been calculated after data in the tables, and then referred to 1 kg DM
- wastewater, average: -5.89942e-7 m3; name sewage; = ((water_decarbonised/1000))*-1; source Bauer, C. 2007
  literature
  production volume 1 m3
    This production volume will be ignored by the manual market generation.
  property price 0 EUR2005; name sewage_price_EUR2005
  properties: carbon content, non-fossil 0.194039, water content 2882.2, wet mass 1000 kg, dry mass 0.346837 kg
  note on carbon content, non-fossil: 0.0673 kg TOC/m3 (Tab A.17, ecoinvent v2.2 report 13_I). TOC was considered as Total Carbon.
- ammonia, liquid: 6.14679e-9 kg; source Bauer, C. 2007
  literature
  properties: wet mass 1 kg, dry mass 1 kg
- dust collector, electrostatic precipitator, for industrial use: 3.90401e-10 unit; = 1/(4000*6667*20*3.6)
  (same comment as for heat and power co-generation unit, organic Rankine cycle, 1000kW elect)
- NOx retained, by selective catalytic reduction: 5.99687e-5 kg; source Thomas Nussbaumer 2014
  expert estimation (see source)
  properties: dry mass 1 kg, wet mass 1 kg
- chlorine, liquid: 2.45871e-7 kg; source Bauer, C. 2007
  literature
  properties: wet mass 1 kg, dry mass 1 kg
- wood chips, wet, measured as dry mass: 0.0396618 kg; = 1/18.9
  Calculated value.
  LHV of wood chips: 18.9 MJ/kg (dry mass)
  properties: wet mass 2.1 kg, dry mass 1 kg, water content 1.1, carbon content, non-fossil 0.494
- furnace, wood chips, with silo, 5000kW: 3.90401e-10 unit; = 1/(4000*6667*20*3.6)
  (same comment as for heat and power co-generation unit, organic Rankine cycle, 1000kW elect)

## Emissions to nature
- Benzene [air, urban air close to ground]: 6.82143e-7 kg; source Bauer, C. 2007
  literature
- Calcium [air, urban air close to ground]: 4.38521e-6 kg; source Bauer, C. 2007
  literature
- Formaldehyde [air, urban air close to ground]: 9.74491e-8 kg; source Bauer, C. 2007
  literature
- Carbon monoxide, non-fossil [air, urban air close to ground]: 7.49608e-5 kg; source Thomas Nussbaumer 2014
  expert estimation (see source)
- Manganese [air, urban air close to ground]: 1.27433e-7 kg; source Bauer, C. 2007
  literature
- Phosphorus [air, urban air close to ground]: 2.24882e-7 kg; source Bauer, C. 2007
  literature
- Copper [air, urban air close to ground]: 1.64914e-8 kg; source Bauer, C. 2007
  literature
- Chromium VI [air, urban air close to ground]: 2.99843e-11 kg; source Bauer, C. 2007
  literature
- m-Xylene [air, urban air close to ground]: 8.9953e-8 kg; source Bauer, C. 2007
  literature
- Water [air, non-urban air or from high stacks]: 4.36272e-5 m3
  calculation based on water balance
- Sulfur dioxide [air, urban air close to ground]: 1.87402e-6 kg; source Bauer, C. 2007
  literature
- Cadmium [air, urban air close to ground]: 5.24726e-10 kg; source Bauer, C. 2007
  literature
- Lead [air, urban air close to ground]: 1.87402e-8 kg; source Bauer, C. 2007
  literature
- Benzene, ethyl- [air, urban air close to ground]: 2.24882e-8 kg; source Bauer, C. 2007
  literature
- Toluene [air, urban air close to ground]: 2.24882e-7 kg; source Bauer, C. 2007
  literature
- Sodium [air, urban air close to ground]: 9.74491e-7 kg; source Bauer, C. 2007
  literature
- Nickel [air, urban air close to ground]: 4.49765e-9 kg; source Bauer, C. 2007
  literature
- Arsenic [air, urban air close to ground]: 7.49608e-10 kg; source Bauer, C. 2007
  literature
- Benzene, hexachloro- [air, urban air close to ground]: 5.39718e-15 kg; source Bauer, C. 2007
  literature
- Ammonia [air, urban air close to ground]: 1.27433e-5 kg; source Bauer, C. 2007
  literature
- Dinitrogen monoxide [air, urban air close to ground]: 1.7241e-6 kg; source Bauer, C. 2007
  literature
- Carbon dioxide, non-fossil [air, urban air close to ground]: 0.0719624 kg; source Bauer, C. 2007
  literature
- Benzo(a)pyrene [air, urban air close to ground]: 3.74804e-10 kg; source Bauer, C. 2007
  literature
- Chromium [air, urban air close to ground]: 2.96845e-9 kg; source Bauer, C. 2007
  literature
- Acetaldehyde [air, urban air close to ground]: 4.57261e-8 kg; source Bauer, C. 2007
  literature
- Zinc [air, urban air close to ground]: 2.24882e-7 kg; source Bauer, C. 2007
  literature
- Dioxins, measured as 2,3,7,8-tetrachlorodibenzo-p-dioxin [air, urban air close to ground]: 2.32379e-14 kg; source Bauer, C. 2007
  literature
- Bromine [air, urban air close to ground]: 4.49765e-8 kg; source Bauer, C. 2007
  literature
- Potassium [air, urban air close to ground]: 1.75408e-5 kg; source Bauer, C. 2007
  literature
- Mercury [air, urban air close to ground]: 2.24882e-10 kg; source Bauer, C. 2007
  literature
- Nitrogen oxides [air, urban air close to ground]: 5.99687e-5 kg; source Thomas Nussbaumer 2014
  expert estimation (see source)
- Hydrocarbons, aliphatic, unsaturated [air, urban air close to ground]: 2.32379e-6 kg; source Bauer, C. 2007
  literature
- Hydrocarbons, aliphatic, alkanes, unspecified [air, urban air close to ground]: 6.82143e-7 kg; source Bauer, C. 2007
  literature
- PAH, polycyclic aromatic hydrocarbons [air, urban air close to ground]: 8.32065e-9 kg; source Bauer, C. 2007
  literature
- Particulates, < 2.5 um [air, urban air close to ground]: 3.74804e-6 kg; source Thomas Nussbaumer 2014
  expert estimation (see source)
- Fluorine [air, urban air close to ground]: 3.74804e-8 kg; source Bauer, C. 2007
  literature
- Magnesium [air, urban air close to ground]: 2.69859e-7 kg; source Bauer, C. 2007
  literature
- Chlorine [air, urban air close to ground]: 1.34929e-7 kg; source Bauer, C. 2007
  literature
- Phenol, pentachloro- [air, urban air close to ground]: 6.07183e-12 kg; source Bauer, C. 2007
  literature
- NMVOC, non-methane volatile organic compounds, unspecified origin [air, urban air close to ground]: 2.0989e-6 kg; source Thomas Nussbaumer 2014
  expert estimation (see source)
- Methane, non-fossil [air, urban air close to ground]: 8.9953e-7 kg; source Thomas Nussbaumer 2014
  expert estimation (see source)

## Sampling procedure
literature, expert judgement, extrapolation

## Extrapolations
This dataset has been copied from a dataset valid for Switzerland (CH) without adjustment of any emission data. Uncertainty has been adjusted accordingly.
