# sheet rolling, aluminium

Dataset: EcoSpold 2, unit process
Geography: RER
Time period: 2000-01-01 to 2019-12-31
Technology level: current
Classification: ISIC rev.4 ecoinvent: 2420:Manufacture of basic precious and other non-ferrous metals
Classification: EcoSpold01Categories: metals/processing
Synonyms: section bar rolling; profile rolling
Tags: ConvertedDataset
Scenario: Business-as-Usual
System model: Allocation at the point of substitution
Share of production covered: 71 %
Generated by: Silvio Blaser
Published in: Werner F. 2007
Database: ecoinvent
isCopyrightProtected: true
accessRestrictedTo: 1

## General comment
Aluminium ingots of 500-700 mm thickness and up to 25 tonnes weight, are rolled, first hot, then cold, to a final sheet thickness ranging from 0.2 to 6 mm. The module can be applied also for section bar rolling of aluminium.
[This dataset was already contained in the ecoinvent database version 2. It was not individually updated during the transfer to ecoinvent version 3. Life Cycle Impact Assessment results may still have changed, as they are affected by changes in the supply chain, i.e. in other datasets. This dataset was generated following the ecoinvent quality guidelines for version 2. It may have been subject to central changes described in the ecoinvent version 3 change report (http://www.ecoinvent.org/database/ecoinvent-version-3/reports-of-changes/), and the results of the central updates were reviewed extensively. The changes added e.g. consistent water flows and other information throughout the database. The documentation of this dataset can be found in the ecoinvent reports of version 2, which are still available via the ecoinvent website. The change report linked above covers all central changes that were made during the conversion process.]

## Included activities end
All the process steps, which can be attributed to semi-fabrication (sawing, scalping, hot rolling, cold rolling, solution heat treatment, finishing and packaging), are included. Does not include the material beeing rolled, only the amount of scrap lost in waste is balanced as primary aluminium input. Includes the transport of the materials to the plant, but does not include the transport of the product to the customer.

## Geography
Data-set is representive for European Union

## Technology
Avarage technique for European Union. The infrastructure was assumed to be the same as for rolling steel.

## Parameters
- fraction, cooling water, once-through system, to air: 0.004; name fraction_CW_OT_to_air; lognormal variance with pedigree 0.0413, pedigree (2,3,1,3,1)
  Calculated based on literature value (Scown, C.D., 2011, Water Footprint of U.S. Transportation Fuels and supplying information of the article) (Vionnet, S., Quantis Water Database - Technical Report, 2012).
- fraction, cooling water, cooling pond system, to air: 0.032; name fraction_CW_CP_to_air; lognormal variance with pedigree 0.0413, pedigree (2,3,1,3,1)
  (same comment as for fraction, cooling water, once-through system, to air)
- fraction, process water, to air: 0.2 dimensionless; name fraction_PW_to_air; lognormal variance with pedigree 0.092025, pedigree (4,4,3,2,4)
  Literature value (Statistics Canada, 2007 & Shaffer, K.H., 2008, Consumptive water use in the Great Lakes Basin, USGS) (Vionnet, S., Quantis Water Database - Technical Report, 2012).
- fraction, cooling water, recirculating system, to air: 0.771; name fraction_CW_R_to_air; lognormal variance with pedigree 0.0413, pedigree (2,3,1,3,1)
  (same comment as for fraction, cooling water, once-through system, to air)
- fraction, cooling water, to air: 0.3875; name fraction_CW_to_air; = (0.5*fraction_CW_OT_to_air)+(0.5*fraction_CW_R_to_air); lognormal variance with pedigree 0.092025, pedigree (4,4,3,2,4)
  Calculated value based on literature value (see comments of the other parametres present in this dataset) and expert opinion. In the case when no industry/literature data are available about the type of cooling or directly fraction, cooling water, to air specific for the process a default assumption is applied. It is assumed that the once-through cooling system is used in 50% of all cases and recirculating system is used in another 50% of all cases.

## Reference product
- sheet rolling, aluminium: 1 kg; CPC 4153: Semi-finished products of aluminium or aluminium alloys; By-product classification allocatable product
  EcoSpold01Location=RER
  production volume 5.775e9 kg
    No data available
    55% of gross aluminium production is estimated to be sheet and foil (Davis J R. 1993. Aluminum and aluminum alloys. ASM International).
  property price 0.112756 EUR2005
    Calculated based on inputs: The price of the product has been calculated as a sum of the values of the material and energy inputs for this product. This value is therefore a rough estimation. It may underestimate the real price since there are additional expenses when producing any product. These expences can include for example labour costs, treatment of waste materials and profit for the producer. Please consider carefully whether this level of data quality is acceptable for your application.
  property true value 0.112756
    allocation property applied in "true value" allocation // value calculated from revenue

## By-products
All rows: pedigree (1,1,1,1,1)
- iron scrap, unsorted: 0 kg; source European Aluminium Association 2008; CPC 39310: Slag, dross, scalings and other waste from the manufacture of iron or steel; By-product classification Recyclable
  production volume 36529 kg
  property price 0.149 EUR2005; name ironScrapAmount_price_EUR2005
    Temporary price data. Calculated as 90% of purchasers price based on: estimated at 85% of sorted scrap
  property carbon content 0
    carbon content on a dry matter basis (reserved; not for manual entry)
  property true value 4.7124e-7
    allocation property applied in "true value" allocation // value calculated from revenue
  properties: water in wet mass 0 kg, water content 0, carbon content, fossil 0, carbon content, non-fossil 0, dry mass 1 kg, wet mass 1 kg, carbon allocation 0 kg
- aluminium oxide, non-metallurgical: 0 kg; source European Aluminium Association 2008; CPC 41432: Alumina (aluminium oxide), except artificial corundum; By-product classification allocatable product; CAS 1344-28-1
  production volume 2.29863e6 kg
  property carbon content, non-fossil 0; name C_content_non_fossil
  property price 0.28 EUR2005; name Al2O3Amount_price_EUR2005
    From UN trade database. http://data.un.org/ Import data from the largest economies of the world are used (Brazil, India, USA, China, Japan and EU-27).
  property dry mass 1 kg; name DM
  property water content 0; name water_content
  property wet mass 1 kg; name WM
  property water in wet mass 0 kg; name WWM
  property carbon content, fossil 0; name C_content_fossil
  property carbon content 0
    carbon content on a dry matter basis (reserved; not for manual entry)
  property true value 5.57244e-5
    allocation property applied in "true value" allocation // value calculated from revenue
  properties: carbon allocation 0 kg
- aluminium, cast alloy: 0 kg; source European Aluminium Association 2008; By-product classification allocatable product; CPC 41431: Unwrought aluminium
  EcoSpold01Location=RER
  production volume 2.14871e7 kg
  property price 1.3 EUR2005; name castAlloyAmount_price_EUR2005
    Temporary price data. Calculated as 90% of purchasers price based on: Source: London Metal Exchange, Aluminium alloy price for 2005
  property carbon content 0
    carbon content on a dry matter basis (reserved; not for manual entry)
  property true value 0.00241846
    allocation property applied in "true value" allocation // value calculated from revenue
  properties: water in wet mass 0 kg, carbon content, non-fossil 0, water content 0, dry mass 1 kg, carbon content, fossil 0, wet mass 1 kg, carbon allocation 0 kg
- heat, for reuse in municipal waste incineration only: 0 MJ; CPC 17300: Steam and hot water; By-product classification allocatable product
  Net electricity generated from this waste and used in internal MSWI plant energy redistribution.
  Uncertainty: uncertainty is calculated from uncertainties in waste composition and uncertainties in energy efficiency and the uncertainty in internal energy demand
  production volume 5.73974e6 MJ
  property exergy 0.1842 MJ; name E_th_prod_MSWI_exergy
    This exergy property is based on the exergy content of the product.
  property true value relation 0.1842; name E_th_prod_MSWI_true_value_relation
    property to calculate "true value" from
  property price 0.0106 EUR2005; name E_th_prod_MSWI_price_EUR2005
    Average European district heat price from Ecoheatcool and Euroheat 2005-2006, Ecoheat Work package 1: The European heat market. Final report. 10.6 EUR/GJ i s the price of district heat. http://www.solarthermalworld.org/files/Ecoheatcool%20WP1%20Web.pdf?download
  property true value 3.25657e-6
    allocation property applied in "true value" allocation // value calculated from true value relation
- electricity, for reuse in municipal waste incineration only: 0 kWh; CPC 17100: Electrical energy; By-product classification allocatable product
  (same comment as for heat, for reuse in municipal waste incineration only)
  production volume 827362 kWh
  property exergy 3.6 MJ; name E_el_prod_MSWI_exergy
    This exergy property is based on the exergy content of the product.
  property true value relation 3.6; name E_el_prod_MSWI_true_value_relation
    property to calculate "true value" from
  property price 0.1 EUR2005; name E_el_prod_MSWI_price_EUR2005
    Estimated to be the same price as in case of electricity, medium voltage.
  property true value 9.17438e-6
    (same comment as for heat, for reuse in municipal waste incineration only)
- aluminium, wrought alloy: 0 kg; source European Aluminium Association 2008; By-product classification allocatable product; CPC 4153: Semi-finished products of aluminium or aluminium alloys
  production volume 9.40665e6 kg
  property price 1.44 EUR2005; name secondaryAluminiumOutput_price_EUR2005
  properties: wet mass 1 kg, water content 0, carbon content, fossil 0, water in wet mass 0 kg, carbon content, non-fossil 0, dry mass 1 kg, carbon content 0, carbon allocation 0 kg, true value 0.00117278

## Inputs from technosphere
- heat, district or industrial, natural gas: 1.8393 MJ; lognormal variance with pedigree 0.0401, pedigree (1,2,5,1,1)
  EcoSpold01Location=RER
- corrugated board box: 9.68562e-5 kg; lognormal variance with pedigree 0.0401, pedigree (1,2,5,1,1)
  EcoSpold01Location=RER
  properties: water content 0.0582011, carbon content, non-fossil 0.450248, dry mass 0.945 kg, carbon content, fossil 0.00365437, wet mass 1 kg
  note on carbon content, non-fossil: C content was calculated as an addition of C content in the raw materials.
- rolling mill: 4.57161e-9 unit; lognormal variance with pedigree 0.4561, pedigree (4,5,5,3,4)
  EcoSpold01Location=RER
  activityLink introduced to establish a direct link to the corresponding regional supply of this product
- sheet rolling, steel: 0.000484281 kg; lognormal variance with pedigree 0.0401, pedigree (1,2,5,1,1)
  activityLink introduced to establish a direct link to the corresponding regional supply of this product
  EcoSpold01Location=RER
- scrap aluminium: 0 kg; pedigree (1,1,1,1,1)
  EcoSpold01Location=CH
  production volume 0 kg
    Calculated from the production volume of sheet rolling, aluminium in proportion to the respective output amounts.
  properties: wet mass 1 kg, dry mass 1 kg
- sawnwood, softwood, raw, dried (u=20%): 1.79184e-7 m3; lognormal variance with pedigree 0.0401, pedigree (1,2,5,1,1)
  EcoSpold01Location=RER
  properties: water content 0.2, dry mass 450 kg, carbon content, non-fossil 0.494, wet mass 540 kg
  note on carbon content, non-fossil: C content of dry mass is 0.494 kgC/kg dry wood (ecoinvent v2.2 report 9)
- hazardous waste, for underground deposit: -0.0046491 kg; lognormal variance with pedigree 0.0401, pedigree (1,2,5,1,1)
  EcoSpold01Location=DE
  production volume 2.772e7 kg
    (same comment as for scrap aluminium)
  properties: wet mass 1 kg, dry mass 1 kg, carbon content, fossil 0.554667
  note on carbon content, fossil: Tab A.6, ecoinvent v2.2 report 13_I, average hazardous waste composition was used, and referred to 0% water mass. No waste-specific emission are currently inventoried for underground deposits. Accordingly, no waste composition must be specified. For generic, average waste to underground deposit deposition in a 200 liter steel drum without cement solidification is assumed (ecoinvent v2.2 report 13_I).
- waste mineral oil: 0 kg; pedigree (1,1,1,1,1)
  EcoSpold01Location=CH
  production volume 0 kg
    (same comment as for scrap aluminium)
  properties: dry mass 0.9 kg, water content 0.111111, carbon content, fossil 0.864444, wet mass 1 kg
  note on carbon content, fossil: Tab A.6, ecoinvent v2.2 report 13_I. C content has been calculated after data in the tables, and then referred to 1 kg DM
- packaging film, low density polyethylene: 0.000387425 kg; lognormal variance with pedigree 0.0401, pedigree (1,2,5,1,1)
  EcoSpold01Location=RER
  properties: carbon content, fossil 0.857143, wet mass 1 kg, dry mass 1 kg
  note on carbon content, fossil: Polyethylene is formed out of a huge amount of ethylene monomers (C2H4) (ecoinvent v2.2 report 11_II). MW=28 g/mol
- aluminium, wrought alloy: 0.0116227 kg; lognormal variance with pedigree 0.0401, pedigree (1,2,5,1,1)
  EcoSpold01Location=RER
  properties: wet mass 1 kg, dry mass 1 kg
- heat, district or industrial, other than natural gas: 0.0133419 MJ; lognormal variance with pedigree 0.0401, pedigree (1,2,5,1,1)
  EcoSpold01Location=RER
- steel, unalloyed: 0.000484281 kg; lognormal variance with pedigree 0.0401, pedigree (1,2,5,1,1)
  EcoSpold01Location=RER
  properties: carbon content, fossil 0.0025, dry mass 1 kg, wet mass 1 kg
  note on carbon content, fossil: Unalloyed steels or carbon steels are those in which the level of an individual element in no case reaches or exceeds the limiting concentration given in Tab. 3.1 ecoinvent v2.2 report 10_partII. Assumed to have a C content of 0.25%
- lubricating oil: 0.00368054 kg; lognormal variance with pedigree 0.0401, pedigree (1,2,5,1,1)
  EcoSpold01Location=RER
  properties: carbon content, fossil 0.75, wet mass 1 kg, dry mass 1 kg
  note on carbon content, fossil: Lubricating oil is produced from diesel. C-content/dry mass of fats and oils considered 75%, from: ecoinvent v2.2 report, n 15a, pg 40
- electricity, medium voltage: 0.529804 kWh; lognormal variance with pedigree 0.0401, pedigree (1,2,5,1,1)
  EcoSpold01Location=UCTE
- municipal solid waste: -0.00629565 kg; lognormal variance with pedigree 0.0401, pedigree (1,2,5,1,1)
  EcoSpold01Location=CH
  production volume 3.75375e7 kg
    (same comment as for scrap aluminium)
  properties: wet mass 1 kg, carbon content, fossil 0.171549, water content 0.297017, carbon content, non-fossil 0.261655, dry mass 0.771 kg
  note on carbon content, fossil: MSW composition in tab 4.1, ecoinvent v2.2 report 13_I. C content referred to 1 kg DM
- scrap aluminium: -0.00834491, -0.000391524 kg (2 entries); lognormal variance with pedigree 0.0407, pedigree (2,2,5,1,1)
  EcoSpold01Location=CH
  production volume 5.20905e7 kg
- waste mineral oil: -0.00217731, -5.03808e-5 kg (2 entries); lognormal variance with pedigree 0.0401, pedigree (1,2,5,1,1)
  EcoSpold01Location=CH
  production volume 1.32825e7 kg

## Inputs from nature
- Water, cooling, unspecified natural origin [natural resource, in water]: 0 m3; name water_cooling_UNO_input; source EAA - European Aluminium Association 2008; pedigree (2,2,5,1,1)
  Calculated based on literature, (Vionnet, S., Quantis Water Database - Technical Report, 2012). It includes the processes: hot rolling, acid pickling, cold rolling and finishing. The process ends when finished, rolled metal sheets leaves the plant. It is assumed that water use is reported as a sum and that 100% is used as process water (material conditioning = water comes into contact with the product).
- Water, unspecified natural origin [natural resource, in water]: 0.00571452 m3; name water_UNO_input; source EAA - European Aluminium Association 2008; lognormal variance with pedigree 0.052625, pedigree (3,3,5,2,1)
  Calculated based on literature, (Vionnet, S., Quantis Water Database - Technical Report, 2012). It includes the processes: hot rolling, acid pickling, cold rolling and finishing. It is assumed that water use is reported as a sum and that 100% is used as process water (material conditioning = water comes into contact with the product).
  property carbon content, non-fossil 0; name C_content_non_fossil
  property dry mass 0.1101 kg; name DM
  property carbon content, fossil 0.0104329; name C_content_fossil
  property water content 9081.65; name water_content
  property wet mass 1000 kg; name WM
  property water in wet mass 999.89 kg; name WWM

## Emissions to nature
- COD, Chemical Oxygen Demand [water, unspecified]: 7.65164e-5 kg; lognormal variance with pedigree 0.0801, pedigree (1,2,5,1,1)
- DOC, Dissolved Organic Carbon [water, unspecified]: 2.51826e-5 kg; lognormal variance with pedigree 0.42, pedigree (5,5,5,5,5)
- Water [air, unspecified]: 0.0011429 m3; name water_to_air_unspecified; = (water_cooling_UNO_input*fraction_CW_to_air)+(water_UNO_input*fraction_PW_to_air); lognormal variance with pedigree 0.0807, pedigree (2,2,5,1,1)
  Calculated value based on literature values and expert opinion. See comments in the parametres' comment field.
  property fraction, origin: fresh water 0; name fraction_origin_fresh_water
  property fraction, origin: unspecified 1; name fraction_origin_unspecified
  property fraction, origin: salt water 0; name fraction_origin_salt_water
- BOD5, Biological Oxygen Demand [water, unspecified]: 7.65164e-5 kg; lognormal variance with pedigree 0.42, pedigree (5,5,5,5,5)
- NMVOC, non-methane volatile organic compounds, unspecified origin [air, unspecified]: 0.000426167 kg; lognormal variance with pedigree 0.1601, pedigree (1,2,5,1,1)
- Water [water, unspecified]: 0.00457161 m3; name water_to_water_unspecified; = water_cooling_UNO_input*(1-fraction_CW_to_air)+water_UNO_input*(1-fraction_PW_to_air); lognormal variance with pedigree 0.0807, pedigree (2,2,5,1,1)
  (same comment as for Water)
  property fraction, origin: salt water 0; name fraction_origin_salt_water_Ww
  property fraction, origin: fresh water 0; name fraction_origin_fresh_water_Ww
  property fraction, origin: unspecified 1; name fraction_origin_unspecified_Ww
- TOC, Total Organic Carbon [water, unspecified]: 2.51826e-5 kg; lognormal variance with pedigree 0.42, pedigree (5,5,5,5,5)

## Sampling procedure
Literature, estimation for transport and infrastructure

## Extrapolations
see technology and sampling procedure

## Review by Roland Hischier 2003-06-17
Passed.
