# treatment of slaughterhouse waste, rendering

Dataset: EcoSpold 2, unit process
Geography: CH
Time period: 1999-01-01 to 2019-12-31
Technology level: current
Classification: ISIC rev.4 ecoinvent: 1010:Processing and preserving of meat
Classification: EcoSpold01Categories: agricultural production/animal production
Synonyms: rendering
Scenario: Business-as-Usual
System model: Allocation at the point of substitution
Share of production covered: 50 %
Generated by: Thomas Nemecek
Published in: Nemecek, T. 2007
Database: ecoinvent
isCopyrightProtected: true
accessRestrictedTo: 1

## General comment
This dataset represents a rendering plan, treating slaughterhouse waste to tallow and meat and bone meal. The original dataset was physically allocated to the tallow. Since the process of meat and bone meal production is nearly the same as the production of tallow (all steps are common except the milling of the meal), the original allocated inventory was adjusted to the total amount of product output.

## Included activities start
From reception of slaughterhouse waste at the factory gate.

## Included activities end
This activity ends with the produced tallow and meat and bone meal. An important emission from rendering is foul odour, which is not quantified in this datset. No indications of other relevant air emissions were found, so no air emissions were added. There were no data available on waste generation.

## Geography
Values refer to the situation in Switzerland.

## Technology
Refers to a typical technology for tallow processing in Switzerland. The tallow-production process is described as follows: The animal carcasses and abattoir wastes are crushed in a grinder, then sterilised by steam. They are then dried using steam as a heat source, and finally defatted, a process in which the fat is separated from the greaves. The fat is clarified, while the greaves are milled into meat- and bone meal. The processing paths of tallow and of meat- and bone meal are very similar, diverging only in the final step (milling). The minimum requirements for sterilisation are a temperature of 133 °C and a pressure of 3 bar for 20 minutes (Nottrodt 2001).
References
Kleinhanss W., Uhlmann F. & Haxsen G. (2000) Folgenabschätzung alternativer Entsorgungsverfahren für Tierkörper und Schlachtabfälle bei einem Verwendungsverbot zur Futtermittelherstellung, 13p. Retrieved on July 11, 2002 from http://www.bal.fal.de/download/Fe_tmverbot.pdf.
Nottrodt A. (2001) Technische Anforderungen und allgemeine Empfehlungen für die Entsorgung von Tiermehl und Tierfett in Verbrennungsanlagen - Bericht erstellt im Auftrag des Bundesministeriums für Umwelt, Naturschutz und Reaktorsicherheit, 63p. Retrieved on July 11, 2002 from http://www.bmu.de/download/dateien/leitf.pdf.

## Time period
Based on data from the year 1999.

## Parameters
- fraction, tap water, to air: 0.9; name fraction_TW_to_air; = fraction_PW_to_air; lognormal variance with pedigree 0.092025, pedigree (4,4,3,2,4)
  Calculated value. See comment in the other parametres present in this dataset. Tap water is considered to be always used as process water, thus process water fractions to air are applied to all tap water input flows to calculate the amount of water consumed in the processes.
- fraction, process water, to air: 0.9 dimensionless; name fraction_PW_to_air; lognormal variance with pedigree 0.092025, pedigree (4,4,3,2,4)
  Literature value (Statistics Canada, 2007 & Shaffer, K.H., 2008, Consumptive water use in the Great Lakes Basin, USGS) (Vionnet, S., Quantis Water Database - Technical Report, 2012).

## Reference product
- slaughterhouse waste: 0 kg; name slaughterhouse_waste; = -(0.975*tallow+0.96*meat_and_bone_meal)/0.4; source H. Soltermann 2002; CPC 39110: Raw offal, inedible (including pigs' bristles, horse hair, animal guts, bird skins, feathers, bones and ivory); By-product classification Waste
  Estimation. The collected data refer to the total production of meat meal, bone meal and tallow in the rendering plant.The total production figures were divided by the total output of the plant, since the processing of meat- and bone meal on the one hand and tallow on the other are to a large extent the same. The inventory for tallow can therefore also be used for meat- and bone meal. Assuming 40% dry matter and 40% extractable fat in dry matter of slaughterhouse waste.
  production volume 0 kg; = ABS(PV_tallow*slaughterhouse_waste/tallow)
    Calculated from the production volume of tallow in proportion to the respective input/output amounts.
  property price 0 EUR2005
    Waste products are assigned a price of zero as they are assumed to require further treatment.
  property carbon content 0.75
    carbon content on a dry matter basis (reserved; not for manual entry)
  properties: carbon content, fossil 0, water in wet mass 0.6 kg, dry mass 0.4 kg, wet mass 1 kg, water content 1.5, carbon content, non-fossil 0.75, carbon allocation 0.3 kg
- meat and bone meal: 1 kg; By-product classification allocatable product; CPC 39110: Raw offal, inedible (including pigs' bristles, horse hair, animal guts, bird skins, feathers, bones and ivory); pedigree (1,1,1,1,1)
  Estimation. The collected data refer to the total production of meat meal, bone meal and tallow in the rendering plant. Assuming 40% dry matter and 40% extractable fat in dry matter of slaughterhouse waste, therefore 60% dry matter meat and bone meal. Calculation adjusts the percentages to wet mass.
  production volume 2.54463e7 kg

## By-products
All rows: By-product classification allocatable product
- meat and bone meal: 0 kg; name meat_and_bone_meal; = tallow*0.6*0.96/(0.4*0.975); CPC 39110: Raw offal, inedible (including pigs' bristles, horse hair, animal guts, bird skins, feathers, bones and ivory); pedigree (1,1,1,1,1)
  (same comment as for meat and bone meal)
  production volume 0 kg; = ABS(PV_tallow*meat_and_bone_meal/tallow)
    (same comment as for slaughterhouse waste)
  property water content 0.0416667; name meat_and_bone_meal_water_content
  property heating value, net 21.45 MJ; name meat_and_bone_meal_Net_Heat_Value
    net (lower) heating (calorific) value
  property dry mass 0.96 kg; name meat_and_bone_meal_DM
  property carbon content, non-fossil 0.521; name meat_and_bone_mea_C_content_non_fossil_0
    Boesch & Hellweg 2010, 2010, Boesch, M.E., Hellweg, S., Identifying Improvement Potentials in Cement Production with Life Cycle Assessment, Environmental Science & Technology, 44, 23, 9143-9149, 1 - Article, Supporting information is available via http://pubs.acs.org
  property wet mass 1 kg; name meat_and_bone_meal_WM
  property carbon content, fossil 0; name meat_and_bone_meal_C_content_fossil
    fossil carbon content on a dry matter basis
  property water in wet mass 0.04 kg; name meat_and_bone_meal_WWM
  property price 0.337692 EUR2005; name meat_and_bone_meal_price_EUR2005
    Estimated value. This price is averaged from 3 different suppliers available in the commercial webstore of alibaba. The price refers to both bulk and commercial quantity purchase. All websites were retrieved on the 1st of July 2019. THe exchange rate used is from 2010 when 1 USD - 0.827 EUR.
    Sources:
    https://www.alibaba.com/product-detail/meat-bone-meal_1841184435.html?spm=a2700.7724838.2017115.1.26e211e6vhiVZz&s=p
    https://www.alibaba.com/product-detail/High-Quality-Meat-And-Bone-Meal_60839924812.html?spm=a2700.7724838.2017115.21.26e211e6vhiVZz&s=p
    https://www.alibaba.com/product-detail/Meat-bone-meal_60807517082.html?spm=a2700.7724838.2017115.32.26e211e6vhiVZz
  property carbon content 0.521
    carbon content on a dry matter basis (reserved; not for manual entry)
  properties: carbon allocation 0.50016 kg
- glycerine: 0 kg; CPC 34570: Glycerol; CAS 56-81-5; pedigree (1,1,1,1,1)
  Calculated value. Based on stoichiometry, Anneken et al. (2006) report the chemical reaction to be:
  Triglyceride + 3 H2O -> 3 fatty acid + glycerol
  property price 0.792 EUR2005; name BP_glycerine_price_EUR2005
    Temporary price data. Calculated as 90% of purchasers price based on: 2004 import and export prices (total trades (USD) divided by total weight (kg) in EU27, USA, China, Japan and India) from UN data - Glycerol (glycerine), nes including synthetic glycerol (http://data.un.org/Data.aspx?q=glycerine&d=ComTrade&f=_l1Code%3a16%3bcmdCode%3a152090; accessed 1 July 10)
  property carbon content 0.391304
    carbon content on a dry matter basis (reserved; not for manual entry)
  properties: water in wet mass 0 kg, dry mass 1 kg, water content 0, wet mass 1 kg, carbon content, fossil 0, carbon content, non-fossil 0.391304, carbon allocation 0.391304 kg
- stearic acid: 0 kg; CPC 34140: Carboxylic acids and their anhydrides, halides, peroxides and peroxyacids and their halogenated, sulphonated, […]
  Stearic acid is a fatty acid with C18. Fatty acids are present in nature in fats and oils. Stearic acid is present in a weight concertation between 1 to 7 % in common vegetable oils (cotton seed, peanut, coconut, linseed, palm kernel, olive, rape-seed, castor, soybean, sunflower and palm). Stearic acid is found in very high concentration, 15 to 30% in beef tallow (Anneken et al. 2006).
  Anneken et al. (2006) lists the following industries as the main application of fatty acids: soaps; detergents; cosmetics; textile; coatings and inks; rubber and tyres; candles and waxes; plastics; paper and leather; lubricants; emulsifiers; food (Anneken et al. 2006).
  Reference(s):
  Anneken et al. (2006) Fatty Acids. Ullmann's Encyclopedia of Industrial Chemistry. Volume 14, pp. 73-116. Wiley-VCH, Weinheim.
  property price 1.075 EUR2005; name RP_price_EUR2005
    Literature data. ICIS Chemical Business reported in 2012:"Tallow stearic acids also rose from fourth quarter levels, settling at €1,000-1,150/tonne FD NWE as of January 18 - an increase of €40/tonne on the low side and €50/tonne on the high side.". Source retrieved from: https://www.icis.com/resources/news/2012/01/30/9527505/oleochemicals-eu-stearic-acid-price-rises-on-higher-feedstock-costs/, accessed 17th August 2017
  property carbon content 0.760563
    carbon content on a dry matter basis (reserved; not for manual entry)
  properties: wet mass 1 kg, carbon content, fossil 0, dry mass 1 kg, water content 0, carbon content, non-fossil 0.760563, water in wet mass 0 kg, carbon allocation 0.760563 kg
- heat, for reuse in municipal waste incineration only: 0 MJ; CPC 17300: Steam and hot water; pedigree (1,1,1,1,1)
  Net electricity generated from this waste and used in internal MSWI plant energy redistribution.
  Uncertainty: uncertainty is calculated from uncertainties in waste composition and uncertainties in energy efficiency and the uncertainty in internal energy demand
  property exergy 0.1842 MJ; name E_th_prod_MSWI_exergy
    This exergy property is based on the exergy content of the product.
  property price 0.0106 EUR2005; name E_th_prod_MSWI_price_EUR2005
    Average European district heat price from Ecoheatcool and Euroheat 2005-2006, Ecoheat Work package 1: The European heat market. Final report. 10.6 EUR/GJ i s the price of district heat. http://www.solarthermalworld.org/files/Ecoheatcool%20WP1%20Web.pdf?download
  property true value relation 0.1842; name E_th_prod_MSWI_true_value_relation
    property to calculate "true value" from
- electricity, for reuse in municipal waste incineration only: 0 kWh; CPC 17100: Electrical energy; pedigree (1,1,1,1,1)
  (same comment as for heat, for reuse in municipal waste incineration only)
  property true value relation 3.6; name E_el_prod_MSWI_true_value_relation
    property to calculate "true value" from
  property price 0.1 EUR2005; name E_el_prod_MSWI_price_EUR2005
    Estimated to be the same price as in case of electricity, medium voltage.
  property exergy 3.6 MJ; name E_el_prod_MSWI_exergy
    This exergy property is based on the exergy content of the product.
- zinc concentrate: 0 kg; CPC 14290: Other non-ferrous metal ores and concentrates (other than uranium or thorium ores and concentrates)
  Calculated value from the knowledge of the properties of both products.
  property price 0.38 EUR2005; name ByP_price_EUR2005
    Temporary price data. Calculated as 90% of purchasers price based on: Zinc content in concentrate 53%. Concentrate price per kg Zn 86.5% of refined Zn price (13.5% treatment charges according to CHR Metals Limited 2005: Dynamic cost curves. http://www.minecost.com/dynamic.pdf). 2004 zinc price from USGS (2007) Mineral commodity summaries 2007. <http://minerals.usgs.gov/minerals/pubs/mcs/2007/mcs2007.pdf> [Accessed 25 May 2010]
  property zinc content 0.53; name zinc_C_zinc_concentrate
    Zinc content on a dry matter basis. Value taken from teh "zinc mine operation" /GLO dataset.
  property dry mass 1 kg; name DM_zinc_concentrate
  property carbon content 0
    carbon content on a dry matter basis (reserved; not for manual entry)
  properties: wet mass 1 kg, water content 0, carbon content, non-fossil 0, carbon content, fossil 0, water in wet mass 0 kg, carbon allocation 0 kg
- esterquat: 0 kg; CPC 353: Soap, cleaning preparations, perfumes and toilet preparations
  EcoSpold01Location=RER
  Esterquat (tetraakyl ammnioum salts) are one of the most important cationic tensides. The positive electrical charge of the hydrophilic moiety gives the cationic tensides properties that open up applications that are unsuitable or barely suitable for anionic or nonionic tensides. The cationic fabric softeners, for example, attach well to textiles thanks to their affinity for fibres. They give the washed textiles a soft feel and thus improve their wearability. Important applications for these cationic tensides are as microbicides, herbicides, inhibitors of corrosion or of oxidation and so on. In the detergents industry, esterquat is mainly used as intermediate for the production of fabric softeners.
  property carbon content, non-fossil 0.518779
    Esterquats are produced by esterification with triethanolamine and quaternication with DMS (ecoinvent v2.2 report 12-part 4). An average esterquat (Ester Quats: the novel class of cationic fabric softeners, Mishra, S. et al., 2007, Journal of Oleo Science, 56:269-276) can be resumed in the formula C41H82NO5. C6 of this molecule come from TEA, and C1 from DMS, so are fossile. The rest C34, are biogenic, coming from the fatty acid. The esterquat is in an Isopropanol solution (15% isopropanol). Isopropanol is C3H8O, and C3 have a fossile origin.
  property carbon content, fossil 0.196746
    Esterquats are produced by esterification with triethanolamine and quaternication with DMS (ecoinvent v2.2 report 12-part 4). An average esterquat (Ester Quats: the novel class of cationic fabric softeners, Mishra, S. et al., 2007, Journal of Oleo Science, 56:269-276) can be resumed in the formula C41H82NO5. C6 of this molecule come from TEA, and C1 from DMS, so are fossile. The rest C34, are biogenic, coming from the fatty acid. The esterquat is in an 15% Isopropanol solution. Isopropanol is C3H8O, and C3 have a fossile origin.
  property price 2.16 EUR2005
    Temporary price data. Calculated as 90% of purchasers price based on: 2005 import and export prices (total trades (USD) divided by total weight (kg) in biggest economies of the world: EU27, USA, Brasil, China, India, Japan and Russia) from UN Commodity Trade Statistics Database (http://data.un.org/Explorer.aspxDatabase [Accessed 2011.06.20]). Commodity: Quarternary ammonium salts and hydroxides, nes
  property carbon content 0.715525
    carbon content on a dry matter basis (reserved; not for manual entry)
  properties: dry mass 1 kg, water in wet mass 0 kg, wet mass 1 kg, water content 0, carbon allocation 0.715525 kg

## Inputs from technosphere
- heat, district or industrial, natural gas: 0 MJ; = 8.39*(tallow+meat_and_bone_meal); source H. Soltermann 2002; pedigree (1,1,1,1,1)
  EcoSpold01Location=RER
  Estimation. The data were compared to a study from Denmark (COWI 2000) and were found to be quite similar. The use of heating energy given by COWI (2000) is 6.3 MJ per kg tallow, which is slightly lower than the value for the Lyss plant (8.4 MJ/kg). According to COWI (2000), fuel oil is used as the heat source, while the Lyss plant uses natural gas.
  Further References:
  COWI Consulting Engineers and Planners AS, Denmark (2000) Cleaner production assessment in meat processing. Report prepared for United Nations Environment Programme Division of Technology, Industry and Economics and Danish Environmental protection agency, 367p. Retrieved on July 12, 2002 from <http://www.agrifood-forum.net/publications/guide/index.htm>.
- wastewater, average: 0 m3; name wastewater; = 0.0073*(tallow+meat_and_bone_meal); source H. Soltermann 2002; pedigree (1,1,1,1,1)
  Estimation. Data on wastewater production was available for the Lyss plant. The rendering process produces large quantities of wastewater with high nitrogen content and high BOD values. The wastewater is treated in the plant (sterilisation). Since no detailed data were available on the quality of the wastewater produced, the module "sewage, average" was used as a proxy for the wastewater treatment.
  EcoSpold01Location=CH
  production volume 0 m3; = ABS(PV_tallow*wastewater/tallow)
    (same comment as for slaughterhouse waste)
  property price 0 EUR2005; name wastewater_price_EUR2005
  properties: carbon content, non-fossil 0.194039, wet mass 1000 kg, water content 2882.2, dry mass 0.346837 kg
  note on carbon content, non-fossil: 0.0673 kg TOC/m3 (Tab A.17, ecoinvent v2.2 report 13_I). TOC was considered as Total Carbon.
- tallow, unrefined: 0 kg; name tallow; source H. Soltermann 2002; pedigree (1,1,1,1,1)
  EcoSpold01Location=CH
  production volume 0 kg; name PV_tallow; = 10236000000*441E6/262E9
    All rendered animal fats (http://www.worldrenderers.org/). Calculated in proportion to meat production in Switzerland relative to global production of meat (441E6/262E9 kg FAOSTAT)
  property price 0.411 EUR2005; name tallow_price_EUR2005
  properties: water content 0.025641, wet mass 1 kg, dry mass 0.975 kg, carbon content, non-fossil 0.75
  note on carbon content, non-fossil: Carbon content in fats of dry mass is considered to be 75% (from "Evolutionary and Biochemical Aspects", A.D. Kay and T. Vrede (in Global Ecology, 2010, Elsevier B.V., S.E. Jørgensen Ed.))
- tap water: 0 kg; name tap_water_input; = 5.34*(tallow+meat_and_bone_meal); source H. Soltermann 2002; pedigree (1,1,1,1,1)
  EcoSpold01Location=RER
  Estimation. Data on freshwater use was available for the Lyss plant.
  Estimation. Data on freshwater use was available for the Lyss plant.
  properties: carbon content, fossil 0.00178991, water content 2962.17, dry mass 0.000337476 kg, wet mass 1 kg
  note on carbon content, fossil: Bicarbonate content is 2.93 mol/m3. CO2 content is 0.1 mol/m3 (ecoinvent v2.2 report 8, Tab 93.1).
- building, multi-storey: 0 m3; = 1.9E-05*(tallow+meat_and_bone_meal); pedigree (1,1,1,1,1)
  Estimation. The use of building infrastructure was estimated from aerial photographs: 3000 m2 is occupied by the buildings (estimated height of 10 m, inventoried as “building, multi-storey”), and the total area is 11,000 m2, which was inventoried as “Occupation, industrial area”. The estimated lifetime of the plant was 50 years, and the occupation as construction site was assumed to be 2 years.
  EcoSpold01Location=RER
- electricity, low voltage: 0 kWh; = 0.175*(tallow+meat_and_bone_meal); source H. Soltermann 2002; pedigree (1,1,1,1,1)
  EcoSpold01Location=CH
  Estimation. Electricity consumption is the same in both cases, Lyss plant and COWI (2000), 0.18 kWh/kg tallow. The data were therefore judged to be sufficiently reliable.
  Further References:
  COWI Consulting Engineers and Planners AS, Denmark (2000) Cleaner production assessment in meat processing. Report prepared for United Nations Environment Programme Division of Technology, Industry and Economics and Danish Environmental protection agency, 367p. Retrieved on July 12, 2002 from <http://www.agrifood-forum.net/publications/guide/index.htm>.
- soybean meal: 0.0105942, 0.0105942 kg (2 suppliers, which the file names only by identifier); sum of these 0.0211884 kg; source OCO Technologies 2010; lognormal variance with pedigree 0.008, pedigree (1,1,4,1,1)
  soymeal
  Uncertainty: Calculated variable. Uncertainty will be determined from propagation of uncertainty factors of underlying variables. Uncertainty of actual relation between variables not accounted at this time, although this could be included in a future update.
- sodium chloride, powder: 0.00060609 kg; source OCO Technologies 2010; lognormal variance with pedigree 0.008, pedigree (1,1,4,1,1)
  Sodium chloride supplementation in diet
  Uncertainty: Calculated variable. Uncertainty will be determined from propagation of uncertainty factors of underlying variables. Uncertainty of actual relation between variables not accounted at this time, although this could be included in a future update.
- operation, housing system, pig, fully-slatted floor, per pig place: 0.000319315, 0.000319315 unit (2 suppliers, which the file names only by identifier); sum of these 0.00063863 unit; lognormal variance with pedigree 0.008, pedigree (1,1,4,1,1)
  Since the functional unit of the housing process is 1 fattening pig place during one year, a conversion is made using the following livestock unit (LU) data: 5 fattening pigs are worth 1 LU; 25 piglets are worth 1 LU; 4 sows (including the unweaned piglets) are worth 1 LU (source: http://www.mrchr.qc.ca/documents/amenagementautres/annexes.pdf). Hence, equivalencies are: 1 piglet is worth 5/25 fattening pig place, and 1 sow is worth 5/4 fattening pig place.
  Uncertainty: Calculated variable. Uncertainty will be determined from propagation of uncertainty factors of underlying variables. Uncertainty of actual relation between variables not accounted at this time, although this could be included in a future update.
- limestone, crushed, washed: 0.000845999, 0.000845999 kg (2 suppliers, which the file names only by identifier); sum of these 0.001692 kg; source OCO Technologies 2010; lognormal variance with pedigree 0.008, pedigree (1,1,4,1,1)
  calcium supplementation in diet
  Uncertainty: Calculated variable. Uncertainty will be determined from propagation of uncertainty factors of underlying variables. Uncertainty of actual relation between variables not accounted at this time, although this could be included in a future update.
- rape meal: 0.00960198 kg; source OCO Technologies 2010; lognormal variance with pedigree 0.008, pedigree (1,1,4,1,1)
  Canola meal
  Uncertainty: Calculated variable. Uncertainty will be determined from propagation of uncertainty factors of underlying variables. Uncertainty of actual relation between variables not accounted at this time, although this could be included in a future update.
- barley grain, feed: 0.0135644 kg; source OCO Technologies 2010; lognormal variance with pedigree 0.008, pedigree (1,1,4,1,1)
  It is assumed that the amount of barley grains is an amount of ground grains.
  Uncertainty: Calculated variable. Uncertainty will be determined from propagation of uncertainty factors of underlying variables. Uncertainty of actual relation between variables not accounted at this time, although this could be included in a future update.
- whey: 0.000325192 kg; source OCO Technologies 2010; lognormal variance with pedigree 0.008, pedigree (1,1,4,1,1)
  No information is available about any pre-treatment of the whey, i.e. whether raw whey, whey liquor, or whey fitrate (or a mix of these forms) is used in practice as ingredient of the diet.
  Uncertainty: Calculated variable. Uncertainty will be determined from propagation of uncertainty factors of underlying variables. Uncertainty of actual relation between variables not accounted at this time, although this could be included in a future update.
- maize grain, feed: 0.0452687 kg; source OCO Technologies 2010; lognormal variance with pedigree 0.008, pedigree (1,1,4,1,1)
  It is assumed that the amount of maize grains is an amount of ground grains.
  Uncertainty: Calculated variable. Uncertainty will be determined from propagation of uncertainty factors of underlying variables. Uncertainty of actual relation between variables not accounted at this time, although this could be included in a future update.
- chemical, organic: 0.000412198 kg; source OCO Technologies 2010; lognormal variance with pedigree 0.008, pedigree (1,1,4,1,1)
  Lysine, Methionine and Threonine (aminoacids), and choline chloride supplementation in the diet.
  Uncertainty: Calculated variable. Uncertainty will be determined from propagation of uncertainty factors of underlying variables. Uncertainty of actual relation between variables not accounted at this time, although this could be included in a future update.
- wheat grain, feed: 0.00329471 kg; source OCO Technologies 2010; lognormal variance with pedigree 0.008, pedigree (1,1,4,1,1)
  Ground wheat grain used as a proxy for wheat shorts.
  Uncertainty: Calculated variable. Uncertainty will be determined from propagation of uncertainty factors of underlying variables. Uncertainty of actual relation between variables not accounted at this time, although this could be included in a future update.
- oat grain: 0.00821805 kg; source OCO Technologies 2010; lognormal variance with pedigree 0.008, pedigree (1,1,4,1,1)
  Oat and oat groat feed
  Uncertainty: Calculated variable. Uncertainty will be determined from propagation of uncertainty factors of underlying variables. Uncertainty of actual relation between variables not accounted at this time, although this could be included in a future update.
- soybean, feed: 0.0044294 kg; source OCO Technologies 2010; lognormal variance with pedigree 0.128, pedigree (1,1,4,1,5)
  Soybean, feed (i.e. ground whole soybeans) used as proxy for roasted soybean. Since the primary data for roasted soybeans input (parameter data) is given for roasted soybeans at about 4% moisture while soybean, feed is at 14% moisture, the calculated amount is corrected accordingly.
  Uncertainty: Calculated variable. Uncertainty will be determined from propagation of uncertainty factors of underlying variables. Uncertainty of actual relation between variables not accounted at this time, although this could be included in a future update.
- slaughterhouse waste: -0.00328783 kg; lognormal variance with pedigree 0.008, pedigree (1,1,4,1,1)
  This flow is for dead animals which are sent to the rendering market.
  Explanation of formula:
  "DeathRatePig/(1-DeathRatePig)*(AN_LW_FPig+AN_LW_Piglet)/2/AN_LW_FPig": dead pigs (kg LW/kg LW finished pig). An average weight between reared piglet (entering the fattening) and fat pig is assumed.
  "piglet_per_finished_pig": Piglet to breed in nursery (kg LW piglet/kg LW finished pig).
  "(Piglet_nursery-PigletToFinishing)/PigletRemainNursery": dead piglets (kg LW/kg LW piglet).
  "sow_gest_and_lactation*DeathRateSow/Piglet_nursery/AN_LW_Piglet*AN_LW_Sow": dead sows (kg LW/kg LW piglet)
  Uncertainty: Calculated variable. Uncertainty will be determined from propagation of uncertainty factors of underlying variables. Uncertainty of actual relation between variables not accounted at this time, although this could be included in a future update.
  production volume 5.07191e7 kg
- liquid manure storage and processing facility: 0.00053243 m3; lognormal variance with pedigree 0.008, pedigree (1,1,4,1,1)
  This exchange is used as a proxy for the storage of slurry in an open-pit. Explanation of formula: see the exchange 'manure, liquid, swine'.
  Uncertainty: Calculated variable. Uncertainty will be determined from propagation of uncertainty factors of underlying variables. Uncertainty of actual relation between variables not accounted at this time, although this could be included in a future update.
- oat grain: 0.00821805 kg; lognormal variance with pedigree 0.008, pedigree (1,1,4,1,1)
  (same comment as for oat grain)
- soybean, feed: 0.0044294 kg; lognormal variance with pedigree 0.128, pedigree (1,1,4,1,5)
  (same comment as for soybean, feed)
- wheat grain, feed: 0.00329471 kg; lognormal variance with pedigree 0.008, pedigree (1,1,4,1,1)
  (same comment as for wheat grain, feed)
- barley grain, feed: 0.0135644 kg; lognormal variance with pedigree 0.008, pedigree (1,1,4,1,1)
  (same comment as for barley grain, feed)
- maize grain, feed: 0.000529892, 0.0447388 kg (2 suppliers, which the file names only by identifier); sum of these 0.0452687 kg; lognormal variance with pedigree 0.008, pedigree (1,1,4,1,1)
  (same comment as for maize grain, feed)

## Inputs from nature
- Transformation, to industrial area [natural resource, land]: 0 m2; = 6.98E-06*(tallow+meat_and_bone_meal); pedigree (1,1,1,1,1)
  Estimation. The use of building infrastructure was estimated from aerial photographs: 3000 m2 is occupied by the buildings (estimated height of 10 m, inventoried as “building, multi-storey”), and the total area is 11,000 m2, which was inventoried as “Occupation, industrial area”. The estimated lifetime of the plant was 50 years, and the occupation as construction site was assumed to be 2 years.
- Occupation, construction site [natural resource, land]: 0 m2*year; = 1.4E-05*(tallow+meat_and_bone_meal); pedigree (1,1,1,1,1)
  (same comment as for Transformation, to industrial area)
- Occupation, industrial area [natural resource, land]: 0 m2*year; = 0.000349*(tallow+meat_and_bone_meal); pedigree (1,1,1,1,1)
  (same comment as for Transformation, to industrial area)
- Transformation, from unspecified [natural resource, land]: 0 m2; = 6.98E-06*(tallow+meat_and_bone_meal); pedigree (1,1,1,1,1)
  (same comment as for Transformation, to industrial area)

## Emissions to nature
- Water [air, unspecified]: 0 m3; name water_to_air_unspecified; = (tap_water_input/1000*fraction_TW_to_air); pedigree (1,1,1,1,1)
  Calculated value based on literature values and expert opinion. See comments in the parametres' comment field.
  property fraction, origin: salt water 0; name fraction_origin_salt_water
  property fraction, origin: unspecified 0; name fraction_origin_unspecified
  property fraction, origin: fresh water 1; name fraction_origin_fresh_water
- Particulates, < 2.5 um [air, non-urban air or from high stacks]: 0.000112616 kg; lognormal variance with pedigree 0.008, pedigree (1,1,4,1,1)
  Dust emission from housing (litter, soil,etc.). Explanation of formula: see Ammonia emission.
  Uncertainty: Calculated variable. Uncertainty will be determined from propagation of uncertainty factors of underlying variables. Uncertainty of actual relation between variables not accounted at this time, although this could be included in a future update.
- Methane, non-fossil [air, non-urban air or from high stacks]: 0.00324383 kg; lognormal variance with pedigree 0.008, pedigree (1,1,4,1,1)
  Housing emission and manure storage emission. Explanation of formula: see Ammonia emission.
  Uncertainty: Calculated variable. Uncertainty will be determined from propagation of uncertainty factors of underlying variables. Uncertainty of actual relation between variables not accounted at this time, although this could be included in a future update.
- Particulates, > 10 um [air, non-urban air or from high stacks]: 0.00108236 kg; lognormal variance with pedigree 0.008, pedigree (1,1,4,1,1)
  (same comment as for Particulates, < 2.5 um)
- Carbon dioxide, non-fossil [air, non-urban air or from high stacks]: 0.00016901 kg; lognormal variance with pedigree 0.008, pedigree (1,1,4,1,1)
  Housing emission of biogenic CO2 from animal respiration (for 96%) and dejections (for 4%). Explanation of formula: see Ammonia emission.
  Uncertainty: Calculated variable. Uncertainty will be determined from propagation of uncertainty factors of underlying variables. Uncertainty of actual relation between variables not accounted at this time, although this could be included in a future update.
- Ammonia [air, non-urban air or from high stacks]: 0.00148881 kg; lognormal variance with pedigree 0.008, pedigree (1,1,4,1,1)
  Housing emission and manure storage emission. Explanation of formula:
  Emission rate per animal category, e.g. "Bldg_Pig_NH3", is in kg NH3/head.day.
  The emission rate is multiplied by the number of days a single animal is on the farm during a year (e.g. the factor "365/ Annual_pig_rotation").
  Hence:
  "Bldg_Pig_NH3*(365/ Annual_pig_rotation)* average_population_pigs_finishing/AN_LW_FPig": NH3 emitted in housing by pigs in finishing (kg NH3/kg LW finished pig).
  "piglet_per_finished_pig": this gives the amount of piglet to breed in nursery (kg LW piglet/kg LW finished pig).
  "(Bldg_Piglet_NH3*(365/ Annual_piglet_rotation)* Average_population_piglets_nursering/AN_LW_Piglet": NH3 emitted in housing by piglets in nursery (kg NH3/kg LW piglet).
  "Bldg_Sow_NH3*(365/ Annual_sow_rotation)* sow_per_kg_piglet_produced": NH3 emitted in housing by sows (kg NH3/kg LW piglet).
  For manure storage emission: emitted NH3 is calculated from the final N content of manure (net after storage) taken from exchange properties and using an emission factor which is to be applied to the N content before storage.
  Uncertainty: Calculated variable. Uncertainty will be determined from propagation of uncertainty factors of underlying variables. Uncertainty of actual relation between variables not accounted at this time, although this could be included in a future update.
- Particulates, > 2.5 um, and < 10um [air, non-urban air or from high stacks]: 0.000116046 kg; lognormal variance with pedigree 0.008, pedigree (1,1,4,1,1)
  (same comment as for Particulates, < 2.5 um)
- Hydrogen sulfide [air, non-urban air or from high stacks]: 0.00343679 kg; lognormal variance with pedigree 0.008, pedigree (1,1,4,1,1)
  Housing emission. Explanation of formula: see Ammonia emission.
  Uncertainty: Calculated variable. Uncertainty will be determined from propagation of uncertainty factors of underlying variables. Uncertainty of actual relation between variables not accounted at this time, although this could be included in a future update.
- Dinitrogen monoxide [air, non-urban air or from high stacks]: 1.51199e-5 kg; lognormal variance with pedigree 0.008, pedigree (1,1,4,1,1)
  Housing emission (indirect) from slurry decomposition and indirect N2O from NH3 volatilization from liquid manure storage (IPCC 2006 emission factor of 0.01 kg N2O-N/kg NH3-N is used). There is no direct N2O emission considered from manure management since open-pit storage without crust formation does not lead to direct N2O (IPCC, 2006; OCO Technologies, 2010). Explanation of formula: see Ammonia emission.
  Uncertainty: Calculated variable. Uncertainty will be determined from propagation of uncertainty factors of underlying variables. Uncertainty of actual relation between variables not accounted at this time, although this could be included in a future update.

## Sampling procedure
Data come from one rendering plant in Switzerland.

## Extrapolations
assumed representative of Swiss conditions

## Review by Emilia Moreno Ruiz 2014-06-12
AL to old activity "market for tap water, at user" corrected

## Review by Emilia Moreno Ruiz 2012-03-29
trainee DS, ok, Diego Lima Medeiros

## Review by Emilia Moreno Ruiz 2012-12-27
adding of meat and meal bone by-product

## Review by Maggie Osses 2003-06-03
Passed.
