# treatment of residue from TiO2 production, sulfate process, residual material landfill

Dataset: EcoSpold 2, unit process
Geography: CH
Time period: 1994-01-01 to 2019-12-31
Technology level: current
Classification: ISIC rev.4 ecoinvent: 3822:Treatment and disposal of hazardous waste
Classification: EcoSpold01Categories: waste management/residual material landfill
Synonyms: digester residues from titanium dioxide production; inorganic residue from titanium dioxide production with the sulfate process
Tags: ConvertedDataset; Treatment
Scenario: Business-as-Usual
System model: Allocation at the point of substitution
Generated by: Gabor Doka (obsolete)
Published in: Doka G. 2007
Database: ecoinvent
isCopyrightProtected: true
accessRestrictedTo: 1

## General comment
Inventoried waste contains 100% residue from TiO2 production (sulfate process); .
waste composition (wet, in ppm): H2O 296000; O 319600; H n.a.; C n.a.; S 28600; N n.a.; P n.a.; B 7.1933; Cl n.a.; Br n.a.; F n.a.; I n.a.; Ag 0.714; As 0.62521; Ba 149.04; Cd 11.748; Co 1.3453; Cr n.a.; Cu n.a.; Hg n.a.; Mn n.a.; Mo n.a.; Ni n.a.; Pb n.a.; Sb n.a.; Se n.a.; Sn n.a.; V n.a.; Zn n.a.; Be n.a.; Sc n.a.; Sr n.a.; Ti 140000; Tl n.a.; W n.a.; Si 128100; Fe 18400; Ca 21400; Al 17700; K n.a.; Mg 30000; Na n.a.;
Share of carbon in waste that is biogenic 60.4%.
Additional solidification with 0.4 kg of cement.
[This dataset was already contained in the ecoinvent database version 2. It was not individually updated during the transfer to ecoinvent version 3. Life Cycle Impact Assessment results may still have changed, as they are affected by changes in the supply chain, i.e. in other datasets. This dataset was generated following the ecoinvent quality guidelines for version 2. It may have been subject to central changes described in the ecoinvent version 3 change report (http://www.ecoinvent.org/database/ecoinvent-version-3/reports-of-changes/), and the results of the central updates were reviewed extensively. The changes added e.g. consistent water flows and other information throughout the database. The documentation of this dataset can be found in the ecoinvent reports of version 2, which are still available via the ecoinvent website. The change report linked above covers all central changes that were made during the conversion process.]

## Included activities end
Waste-specific short-term emissions to water from leachate. Long-term emissions from landfill to ground water. Expenditures for solidificalion with cement (user-specified option)

## Geography
Technology encountered in Switzerland in 2000. Landfill includes base seal and leachate collection system.

## Technology
Swiss residual material landfill for polluted, inorganic waste. With base seal and leachate collection system. Recultivation after closure.

## Time period
Waste composition as given in literature reference, theoretical data or other source. Transfer coefficients from prospective model.

## Reference product
- residue from TiO2 production, sulfate process: -1 kg; CPC 39367: Waste and scrap of tungsten, molybdenum, tantalum, magnesium, cobalt, cadmium, titanium, zirconium, beryllium […]; By-product classification Waste
  EcoSpold01Location=CH
  production volume 0.0336675 kg
    This is a placeholder value that does not reflect real-world production volumes. This dataset does not currently require a real-world production volume to work in the database framework, and no actual data were collected yet. This has no negative effect on the results of the ecoinvent database. The placeholder value of this activity was scaled according to the nominal GDP of 2005 (source: United Nations, http://data.un.org/Glossary.aspx?q=GDP+%28current+US%24%29, accessed 20130726) to reflect an appropriate share of the global production volume, which is also a placeholder value.
  property price 0 EUR2005
    Waste products are assigned a price of zero as they are assumed to require further treatment.
  property carbon content 0
    carbon content on a dry matter basis (reserved; not for manual entry)
  properties: dry mass 0.7 kg, carbon content, non-fossil 0, water in wet mass 0.3 kg, wet mass 1 kg, carbon content, fossil 0, water content 0.428571, carbon allocation 0 kg

## Inputs from technosphere
- process-specific burdens, residual material landfill: 1 kg; lognormal variance with pedigree 0.04, pedigree (1,1,5,1,1)
  EcoSpold01Location=CH
  demands per kilogram waste. uncertainty is heeded in the module;activityLink introduced to establish a direct link to the corresponding regional supply of this product
- cement, unspecified: 0.4 kg; lognormal variance with pedigree 0.05, pedigree (1,1,5,1,1)
  Cement for solidification of residual material waste. Uncertainty in mass from solidification recipe.
  EcoSpold01Location=CH
  properties: dry mass 1 kg, wet mass 1 kg
- waste cement, hydrated: -1 kg; lognormal variance with pedigree 0.05, pedigree (1,1,5,1,1)
  Hydrated cement for solidification of residual material waste. Uncertainty in mass from solidification recipe.
  EcoSpold01Location=CH
  production volume 1 kg
    Calculated from the production volume of residue from TiO2 production, sulfate process, 30% water in proportion to the respective output amounts.
  properties: wet mass 1 kg, dry mass 1 kg
- residual material landfill: 2.08e-9 unit; lognormal variance with pedigree 0.04, pedigree (1,1,5,1,1)
  demands per kilogram waste. uncertainty is heeded in the module
  EcoSpold01Location=CH

## Emissions to nature
- Aluminium [water, surface water]: 8.77e-6 kg; lognormal variance with pedigree 1.08, pedigree (1,1,5,1,1)
  uncertainty is calculated from uncertainties in waste composition and transfer coefficients in residual landfill
- Barium [water, surface water]: 2.06e-9 kg; lognormal variance with pedigree 2.17, pedigree (1,1,5,1,1)
  (same comment as for Aluminium)
- Titanium, ion [water, surface water]: 6.94e-5 kg; lognormal variance with pedigree 0.88, pedigree (1,1,5,1,1)
  (same comment as for Aluminium)
- Magnesium [water, surface water]: 5.69e-6 kg; lognormal variance with pedigree 1.15, pedigree (1,1,5,1,1)
  (same comment as for Aluminium)
- Arsenic, ion [water, ground-, long-term]: 0 kg; pedigree (1,1,1,1,1)
  uncertainty is calculated from uncertainties in waste composition and transfer coefficients in incinerator and landfills.
- Cadmium, ion [water, ground-, long-term]: 7.98e-8 kg; lognormal variance with pedigree 7.51, pedigree (1,1,5,1,1)
  (same comment as for Arsenic, ion)
- Silicon [water, surface water]: 0.000288 kg; lognormal variance with pedigree 0.69, pedigree (1,1,5,1,1)
  (same comment as for Aluminium)
- Calcium, ion [water, ground-, long-term]: 0.00193 kg; lognormal variance with pedigree 1.76, pedigree (1,1,5,1,1)
  (same comment as for Arsenic, ion)
- Boron [water, ground-, long-term]: 7.07e-6 kg; lognormal variance with pedigree 1.35, pedigree (1,1,5,1,1)
  (same comment as for Arsenic, ion)
- Boron [water, surface water]: 5.64e-8 kg; lognormal variance with pedigree 1.74, pedigree (1,1,5,1,1)
  (same comment as for Aluminium)
- Sulfate [water, surface water]: 0.00921 kg; lognormal variance with pedigree 0.4, pedigree (1,1,5,1,1)
  (same comment as for Aluminium)
- Iron, ion [water, ground-, long-term]: 9.22e-5 kg; lognormal variance with pedigree 7.35, pedigree (1,1,5,1,1)
  (same comment as for Arsenic, ion)
- Iron, ion [water, surface water]: 1.54e-7 kg; lognormal variance with pedigree 1.61, pedigree (1,1,5,1,1)
  (same comment as for Aluminium)
- Sulfate [water, ground-, long-term]: 0.0766 kg; lognormal variance with pedigree 0.29, pedigree (1,1,5,1,1)
  (same comment as for Arsenic, ion)
- Cadmium, ion [water, surface water]: 1.33e-10 kg; lognormal variance with pedigree 2.53, pedigree (1,1,5,1,1)
  (same comment as for Aluminium)
- Cobalt [water, surface water]: 3.84e-10 kg; lognormal variance with pedigree 2.39, pedigree (1,1,5,1,1)
  (same comment as for Aluminium)
- Titanium, ion [water, ground-, long-term]: 0.0416 kg; lognormal variance with pedigree 0.5, pedigree (1,1,5,1,1)
  (same comment as for Arsenic, ion)
- Silver, ion [water, ground-, long-term]: 2.75e-8 kg; lognormal variance with pedigree 4.3, pedigree (1,1,5,1,1)
  (same comment as for Arsenic, ion)
- Silicon [water, ground-, long-term]: 0.128 kg; lognormal variance with pedigree 0.14, pedigree (1,1,5,1,1)
  (same comment as for Arsenic, ion)
- Silver, ion [water, surface water]: 4.59e-11 kg; lognormal variance with pedigree 2.67, pedigree (1,1,5,1,1)
  (same comment as for Aluminium)
- Arsenic, ion [water, surface water]: 6.25e-7 kg; lognormal variance with pedigree 1.67, pedigree (1,1,5,1,1)
  (same comment as for Aluminium)
- Calcium, ion [water, surface water]: 3.23e-6 kg; lognormal variance with pedigree 1.22, pedigree (1,1,5,1,1)
  (same comment as for Aluminium)
- Aluminium [water, ground-, long-term]: 0.00525 kg; lognormal variance with pedigree 0.71, pedigree (1,1,5,1,1)
  (same comment as for Arsenic, ion)
- Cobalt [water, ground-, long-term]: 2.3e-7 kg; lognormal variance with pedigree 2.35, pedigree (1,1,5,1,1)
  (same comment as for Arsenic, ion)
- Barium [water, ground-, long-term]: 1.23e-6 kg; lognormal variance with pedigree 6.69, pedigree (1,1,5,1,1)
  (same comment as for Arsenic, ion)
- Magnesium [water, ground-, long-term]: 0.00341 kg; lognormal variance with pedigree 1.47, pedigree (1,1,5,1,1)
  (same comment as for Arsenic, ion)

## Sampling procedure
Landfill model based on observed leachate concentrations in literature. Extrapolated to 60'000 years heeding chemical characteristics. Initial waste composition from various literature sources.

## Extrapolations
This dataset has been extrapolated from year 2000 to the year of the calculation (2019). The uncertainty has been adjusted accordingly.

## Review by Niels Jungbluth 2003-07-15
Passed. Calculation for standard deviation 95 of, i.e., infrastructure,
land occupation, transport services or other services can differ from
standard Pedigree approach used in this project and figures obtained by
this procedure.
