# rare earth concentrate production, 70% REO, from bastnäsite

Dataset: EcoSpold 2, unit process
Geography: RoW
Time period: 2000-01-01 to 2019-12-31
Technology level: current
Classification: ISIC rev.4 ecoinvent: 0729:Mining of other non-ferrous metal ores
Classification: EcoSpold01Categories: chemicals/inorganics
Tags: ConvertedDataset
Scenario: Business-as-Usual
System model: Allocation at the point of substitution
Share of production covered: 45 %
Generated by: Alex Primas
Published in: Althaus H.-J. 2004
Database: ecoinvent
isCopyrightProtected: true
accessRestrictedTo: 1

## General comment
In- and outputs are calculated from bastnasite ore composition mined in China. Infrastructure and land use approximated with iron ore mining. Some inputs of auxiliary materials are calculated according to stoechiometry. Rough estimation for energy consumption, wastes and emissions.
[This dataset was already contained in the ecoinvent database version 2. It was not individually updated during the transfer to ecoinvent version 3. Life Cycle Impact Assessment results may still have changed, as they are affected by changes in the supply chain, i.e. in other datasets. This dataset was generated following the ecoinvent quality guidelines for version 2. It may have been subject to central changes described in the ecoinvent version 3 change report (http://www.ecoinvent.org/database/ecoinvent-version-3/reports-of-changes/), and the results of the central updates were reviewed extensively. The changes added e.g. consistent water flows and other information throughout the database. The documentation of this dataset can be found in the ecoinvent reports of version 2, which are still available via the ecoinvent website. The change report linked above covers all central changes that were made during the conversion process.]

## Included activities end
The process includes material and energy input, emissions and land use for the mining and concentration of a bastnasite ore with a rare earth oxide concentration of 6%. Transport and infrastructure are estimated.

## Geography
Production in China considered. Process applicable for other regions if a similar ore type is used.

## Technology
Mineral concentration by froth flotation to rare earth concentrate product with 70% rare earth oxide (REO). Leaching of concentrate with HCL included but no calcination.
Composition of product:
SrO 1.0%, CaO 1.0%, BaO 1.0%, F 8.0%, SiO2 0.4%, Fe2O3 0.5%, P2O5 1.0%, MgO 0.4%, ThO2 0.1%, CO2 20.0%, -O = F2: -3.4%

## Parameters
- fraction, process water, to air: 0.205 dimensionless; name fraction_PW_to_air; lognormal variance with pedigree 0.092025, pedigree (4,4,3,2,4)

## Reference product
- rare earth concentrate, 70% REO, from bastnäsite: 1 kg; By-product classification allocatable product; CPC 34290: Compounds of rare earth metals, of yttrium or of scandium
  EcoSpold01Location=CN
  production volume 2.35714e6 kg
    Total rare earth produced in the world in 2005 was 122 000 ton REO eq (Table 6 in http://minerals.usgs.gov/minerals/pubs/commodity/rare_earths/myb1-2007-raree.xls). Rare-earth production in China accounts then for 98% of the world’s production, so we have kept the same assumptions for calculating global production volumes than for calculating chinese production volumes.
  property price 4.08 EUR2005
    Literature value (USGS, http://minerals.usgs.gov/minerals/pubs/commodity/rare_earths/mcs-2008-raree.pdf, accessed 20160222).
  property carbon content, fossil 0
    ecoinvent v2.2 report n 8, part II, pg 607, Tab 70.2 and 70.3 for detailled composition
  property carbon content, non-fossil 0
    ecoinvent v2.2 report n 8, part II, pg 607, Tab 70.2 and 70.3 for detailled composition
  property carbon content 0
    carbon content on a dry matter basis (reserved; not for manual entry)
  properties: water in wet mass 0 kg, water content 0, wet mass 1 kg, dry mass 1 kg, carbon allocation 0 kg

## Inputs from technosphere
- recultivation, iron mine: 1.45e-5 m2; lognormal variance with pedigree 0.096, pedigree (4,5,5,5,3)
  Data from iron mining used as proxy
  EcoSpold01Location=GLO
  Uncertainty: data from iron mining used as proxy
- steam, in chemical industry: 1.8 kg; lognormal variance with pedigree 0.148, pedigree (4,5,5,5,4)
  Estimation based on similar process
  EcoSpold01Location=RER
  Uncertainty: estimation based on similar process
  properties: wet mass 1 kg
- electricity, medium voltage: 0 kWh; pedigree (1,1,1,1,1)
  EcoSpold01Location=CN
  Estimation based on phoshpare mining
  Uncertainty: estimation based on phoshpare mining
- soda ash, light, crystalline, heptahydrate: 0.058 kg; lognormal variance with pedigree 0.1012, pedigree (2,3,5,5,3)
  EcoSpold01Location=RER
  Data for similar process
  Uncertainty: data for similar process
  properties: dry mass 1 kg, carbon content, fossil 0.0517241, wet mass 1 kg
- heat, district or industrial, other than natural gas: 0 MJ; pedigree (1,1,1,1,1)
  EcoSpold01Location=RER
  Estimation based on phoshpare mining
  Uncertainty: estimation based on phoshpare mining
- sodium sulfate, anhydrite: 0.058 kg; lognormal variance with pedigree 0.1012, pedigree (2,3,5,5,3)
  Data for similar process
  EcoSpold01Location=RER
  Uncertainty: data for similar process
  properties: dry mass 1 kg, wet mass 1 kg
- hydrochloric acid, without water, in 30% solution state: 0.62 kg; lognormal variance with pedigree 0.278, pedigree (4,5,5,5,5)
  EcoSpold01Location=RER
  Calculated value
  Uncertainty: calculated value
  properties: dry mass 1 kg, wet mass 1 kg
- diesel, burned in building machine: 0.1 MJ; lognormal variance with pedigree 0.148, pedigree (4,5,5,5,4)
  EcoSpold01Location=GLO
  Estimation based on phoshpare mining
  Uncertainty: estimation based on phoshpare mining
- blasting: 0.0018 kg; lognormal variance with pedigree 0.086, pedigree (4,5,5,5,3)
  Data from iron mining used as proxy
  EcoSpold01Location=RER
  Uncertainty: data from iron mining used as proxy
- fatty acid: 0.019 kg; lognormal variance with pedigree 0.1012, pedigree (2,3,5,5,3)
  EcoSpold01Location=RER
  Data for similar process
  Uncertainty: data for similar process
  properties: carbon content, non-fossil 0.75, wet mass 1 kg, dry mass 1 kg
  note on carbon content, non-fossil: C-content/dry mass of fats and oils considered 75%, from: ecoinvent v2.2 report, n 15a, pg 40
- mine infrastructure, iron: 5.7e-12 unit; lognormal variance with pedigree 0.396, pedigree (4,5,5,5,3)
  EcoSpold01Location=GLO
  Data from iron mining used as proxy
  Uncertainty: data from iron mining used as proxy
- electricity, medium voltage: 0.00287828, 0.000523725, 0.0120891, 0.00888159, 0.0418133, 0.01843, 0.060384 kWh (7 entries); lognormal variance with pedigree 0.148, pedigree (4,5,5,5,4)
  (same comment as for electricity, medium voltage)
- heat, district or industrial, other than natural gas: 0.0174604, 1.04654 MJ (2 entries); lognormal variance with pedigree 0.148, pedigree (4,5,5,5,4)
  (same comment as for heat, district or industrial, other than natural gas)

## Inputs from nature
- Occupation, mineral extraction site [natural resource, land]: 0.00341 m2*year; lognormal variance with pedigree 0.136, pedigree (4,5,5,5,3)
  Data from iron mining used as proxy
  Uncertainty: data from iron mining used as proxy
- Lanthanum, in ground [natural resource, in ground]: 0.14 kg; lognormal variance with pedigree 0.0427, pedigree (2,2,5,5,1)
  7.2% La in bastnasite; 0.72% La in ore; Calculated from ore composition
  Uncertainty: calculated from ore composition
- Water, unspecified natural origin [natural resource, in water]: 0.0034 m3; name water_UNO_input; lognormal variance with pedigree 0.148, pedigree (4,5,5,5,4)
  Estimation based on similar mining operations
  Uncertainty: estimation based on similar mining operations
- Neodymium, in ground [natural resource, in ground]: 0.077 kg; lognormal variance with pedigree 0.0427, pedigree (2,2,5,5,1)
  4% Nd in bastnasite; 0.4% Nd in ore; Calculated from ore composition
  Uncertainty: calculated from ore composition
- Gadolinium, in ground [natural resource, in ground]: 0.00292 kg; lognormal variance with pedigree 0.0427, pedigree (2,2,5,5,1)
  0.15% Gd in bastnasite; 150 ppm Gd in ore; Calculated from ore composition
  Uncertainty: calculated from ore composition
- Samarium, in ground [natural resource, in ground]: 0.00583 kg; lognormal variance with pedigree 0.0427, pedigree (2,2,5,5,1)
  0.3% Sm in bastnasite; 300 ppm Sm in ore; Calculated from ore composition
  Uncertainty: calculated from ore composition
- Transformation, from unspecified [natural resource, land]: 1.45e-5 m2; lognormal variance with pedigree 0.216, pedigree (4,5,5,5,3)
  Data from iron mining used as proxy
  Uncertainty: data from iron mining used as proxy
- Transformation, to mineral extraction site [natural resource, land]: 1.45e-5 m2; lognormal variance with pedigree 0.216, pedigree (4,5,5,5,3)
  Data from iron mining used as proxy
  Uncertainty: data from iron mining used as proxy
- Cerium, in ground [natural resource, in ground]: 0.467 kg; lognormal variance with pedigree 0.0427, pedigree (2,2,5,5,1)
  24% Ce in bastnasite; 2.4% Ce in ore; Calculated from ore composition
  Uncertainty: calculated from ore composition
- Praseodymium, in ground [natural resource, in ground]: 0.00817 kg; lognormal variance with pedigree 0.0427, pedigree (2,2,5,5,1)
  Calculated from ore composition
  Uncertainty: calculated from ore composition
- Europium, in ground [natural resource, in ground]: 0.00117 kg; lognormal variance with pedigree 0.0427, pedigree (2,2,5,5,1)
  600 ppm Eu in bastnasite; 60 ppm Eu in ore; Calculated from ore composition
  Uncertainty: calculated from ore composition

## Emissions to nature
- DOC, Dissolved Organic Carbon [water, ground-]: 2.31e-7 kg; lognormal variance with pedigree 0.188, pedigree (4,5,5,5,4)
  Calculated as equal to TOC.
  Uncertainty: data only from one source and based on estimates
- TOC, Total Organic Carbon [water, ground-]: 2.31e-7 kg; lognormal variance with pedigree 0.188, pedigree (4,5,5,5,4)
  Data only from one source and based on estimates
  Uncertainty: data only from one source and based on estimates
- Uranium-238 [air, non-urban air or from high stacks]: 0.000134 kBq; lognormal variance with pedigree 0.426, pedigree (4,5,5,5,3)
  Estimated from dust emissions
  Uncertainty: estimated from dust emissions
- Lead [water, ground-]: 5.2602e-5 kg; lognormal variance with pedigree 0.798, pedigree (4,5,5,5,4)
  (same comment as for TOC, Total Organic Carbon)
- Water [water, unspecified]: 0.002703 m3; name water_to_water_unspecified; lognormal variance with pedigree 0.0827, pedigree (2,2,5,5,1)
  Calculated value based on literature values and expert opinion. See comments in the parametres' comment field.
  property fraction, origin: salt water 0; name fraction_origin_salt_water_Ww
  property fraction, origin: unspecified 1; name fraction_origin_unspecified_Ww
  property fraction, origin: fresh water 0; name fraction_origin_fresh_water_Ww
  property dry mass 0 kg; name DM
  property water in wet mass 1000 kg; name WWM
  property carbon content, fossil 0; name C_content_fossil
  property wet mass 1000 kg; name WM
  property carbon content, non-fossil 0; name C_content_non_fossil
- Chromium, ion [water, ground-]: 5.25e-5 kg; lognormal variance with pedigree 0.448, pedigree (4,5,5,5,4)
  (same comment as for TOC, Total Organic Carbon)
- Water [air, unspecified]: 0.000697 m3; name water_to_air_unspecified; lognormal variance with pedigree 0.0827, pedigree (2,2,5,5,1)
  (same comment as for Water)
  property fraction, origin: unspecified 1; name fraction_origin_unspecified
  property fraction, origin: salt water 0; name fraction_origin_salt_water
  property fraction, origin: fresh water 0; name fraction_origin_fresh_water
- Radium-226 [water, ground-]: 0.000385 kBq; lognormal variance with pedigree 0.478, pedigree (4,5,5,5,4)
  Estimation, high uncertainty
  Uncertainty: estimation, high uncertainty
- Thorium-232 [air, non-urban air or from high stacks]: 0.0506 kBq; lognormal variance with pedigree 0.426, pedigree (4,5,5,5,3)
  Estimated from dust emissions
  Uncertainty: estimated from dust emissions
- Particulates, > 2.5 um, and < 10um [air, non-urban air or from high stacks]: 0.009 kg; lognormal variance with pedigree 0.206, pedigree (4,5,5,5,3)
  Data from iron- and bauxite mining used as proxy
  Uncertainty: data from iron- and bauxite mining used as proxy
- Manganese [water, ground-]: 1.4e-5 kg; lognormal variance with pedigree 0.798, pedigree (4,5,5,5,4)
  (same comment as for TOC, Total Organic Carbon)
- Particulates, < 2.5 um [air, non-urban air or from high stacks]: 0.001 kg; lognormal variance with pedigree 0.386, pedigree (4,5,5,5,3)
  (same comment as for Particulates, > 2.5 um, and < 10um)
- Radium-226 [air, non-urban air or from high stacks]: 0.01 kBq; lognormal variance with pedigree 0.426, pedigree (4,5,5,5,3)
  Estimated from dust emissions
  Uncertainty: estimated from dust emissions
- COD, Chemical Oxygen Demand [water, ground-]: 6.237e-7 kg; lognormal variance with pedigree 0.188, pedigree (4,5,5,5,4)
  Calculated as COD (g O2) = 2.7*TOC (gC).
  Uncertainty: data only from one source and based on estimates
- BOD5, Biological Oxygen Demand [water, ground-]: 1.2474e-6 kg; lognormal variance with pedigree 0.188, pedigree (4,5,5,5,4)
  Calculated as 0.5*COD.
  Uncertainty: data only from one source and based on estimates
- Aluminium [water, ground-]: 0.00014 kg; lognormal variance with pedigree 0.798, pedigree (4,5,5,5,4)
  (same comment as for TOC, Total Organic Carbon)
- Iron, ion [water, ground-]: 2.7272e-8 kg; lognormal variance with pedigree 0.798, pedigree (4,5,5,5,4)
  (same comment as for TOC, Total Organic Carbon)
- Uranium-238 [water, ground-]: 5.159e-6 kBq; lognormal variance with pedigree 0.478, pedigree (4,5,5,5,4)
  Estimation, high uncertainty
  Uncertainty: estimation, high uncertainty
- Thorium-232 [water, ground-]: 0.0019481 kBq; lognormal variance with pedigree 0.478, pedigree (4,5,5,5,4)
  Estimation, high uncertainty
  Uncertainty: estimation, high uncertainty
- Particulates, > 10 um [air, non-urban air or from high stacks]: 0.01 kg; lognormal variance with pedigree 0.126, pedigree (4,5,5,5,3)
  (same comment as for Particulates, > 2.5 um, and < 10um)
- Suspended solids, unspecified [water, ground-]: 0.00077 kg; lognormal variance with pedigree 0.188, pedigree (4,5,5,5,4)
  (same comment as for TOC, Total Organic Carbon)

## Sampling procedure
based on literature

## Extrapolations
none This dataset has been copied from an original dataset covering the geography CN. The uncertainty has been adjusted accordingly.

## Review by Rolf Frischknecht 2007-08-16
passed
none
