# electricity, high voltage, for Swiss Federal Railways, production mix

Dataset: EcoSpold 2, unit process, production mix
Geography: CH
Time period: 2011-01-01 to 2019-12-31
Scenario: Business-as-Usual
System model: Allocation at the point of substitution
Generated by: [System]
Database: ecoinvent
isCopyrightProtected: false
accessRestrictedTo: 1

## Technology
Average technology used to transmit and distribute electricity. Includes underground and overhead lines. Electricity production according to related technology datasets.

Definition of the voltage levels:
- High voltage level above 24 kV (large scale industry)
- Medium voltage level between 1 kV and 24 kV (medium to small scale industry, service sector
and public buildings)
- Low voltage level below 1 kV (Households)

## Reference product
- electricity, high voltage, for Swiss Federal Railways: 1 kWh; CPC 17100: Electrical energy; By-product classification allocatable product
  production volume 1.88415e9 kWh
  property price 0.0977 EUR2005
    Estimated to be the same as generic "electricity, high voltage".

## Inputs from technosphere
- electricity, high voltage, for Swiss Federal Railways: 1 kWh
  properties: price 0.0977 EUR2005

## Extrapolations
This dataset has been extrapolated from year 2015 to the year of the calculation (2019). The uncertainty has been adjusted accordingly.
