# packaging glass production, green, without cullet

Dataset: EcoSpold 2, unit process
Geography: GLO
Time period: 2000-01-01 to 2019-12-31
Technology level: current
Classification: EcoSpold01Categories: glass/packaging
Classification: ISIC rev.4 ecoinvent: 2310:Manufacture of glass and glass products
Scenario: Business-as-Usual
System model: Allocation at the point of substitution
Generated by: Bo Weidema
Published in: Hischier R. 2007
Database: ecoinvent
isCopyrightProtected: true
accessRestrictedTo: 1

## General comment
Most packaging glass is produced with cullet input. This datasets represents a marginal additional production without cullet.

## Included activities start
From the reception of precursors silica sand, soda, unsorted glass cullets, limestone, dolomite, feldspar, and chemicals inorganics at the factory gate.

## Included activities end
This activity ends with the production of 1 kg of green packaging glass. The dataset includes material and energy inputs, water consumption, emissions to air and water, waste production and infrastructure.

## Technology
Mix of present used technologies in Europe

## Parameters
- emission factor methane from light fuel oil: 1e-6; name EF_CH4_light; lognormal variance with pedigree 1.0832, pedigree (2,1,1,5,2)
  Emission factor (kg/MJ fuel) corresponding to that used in datasets for combustion in industrial furnaces/boilers.
- emission factor benzo(a)pyrene from oil: 3e-11; name EF_benzo_oil; lognormal variance with pedigree 1.0832, pedigree (2,1,1,5,2)
  (same comment as for emission factor methane from light fuel oil)
- emission factor benzene from oil: 2e-8; name EF_benzene_oil; lognormal variance with pedigree 1.0832, pedigree (2,1,1,5,2)
  (same comment as for emission factor methane from light fuel oil)
- emission factor formaldehyde from oil: 4.7e-7; name EF_formaldehyde_oil; lognormal variance with pedigree 1.0832, pedigree (2,1,1,5,2)
  (same comment as for emission factor methane from light fuel oil)
- emission factor dioxins from oil: 4.7e-16; name EF_dioxin_oil; lognormal variance with pedigree 1.0832, pedigree (2,1,1,5,2)
  (same comment as for emission factor methane from light fuel oil)
- emission factor N2O from oil: 7e-7; name EF_N2O_oil; lognormal variance with pedigree 1.0832, pedigree (2,1,1,5,2)
  (same comment as for emission factor methane from light fuel oil)
- emission factor CO from oil: 7e-6; name EF_CO_oil; lognormal variance with pedigree 1.0832, pedigree (2,1,1,5,2)
  (same comment as for emission factor methane from light fuel oil)
- emission factor dioxins from gas: 3e-17; name EF_dioxin_gas; lognormal variance with pedigree 1.0832, pedigree (2,1,1,5,2)
  (same comment as for emission factor methane from light fuel oil)
- energy saving factor: 0.25; name energy_saving_factor; triangular min 0.2, mostLikely 0.25, max 0.3, pedigree (2,1,1,5,1)
  Reduction of energy requirement per % cullet (EU commission 2012: Best Available Techniques (BAT) Reference Document for the Manufacture of Glass)
- emission factor benzene: 4e-7 dimensionless; name EF_benzene_gas; lognormal variance with pedigree 1.0832, pedigree (2,1,1,5,2)
  (same comment as for emission factor methane from light fuel oil)
- CaO in cullet: 0.105 kg; name CaO_in_glass; triangular min 0.09, mostLikely 0.105, max 0.12, pedigree (2,1,1,5,2)
  Average CaO content in container glass (EU commission 2012: Best Available Techniques (BAT) Reference Document for the Manufacture of Glass)
- emission factor formaldehyde from gas: 1e-7; name EF_formaldehyde_gas; lognormal variance with pedigree 1.0832, pedigree (2,1,1,5,2)
  (same comment as for emission factor methane from light fuel oil)
- cullet input, kg per kg output: 0.57; name cullet_fraction; lognormal variance with pedigree 0.0148, pedigree (2,4,2,5,1)
  Cullet input in original dataset
- fraction, process water, to air: 0.15 dimensionless; name fraction_PW_to_air; lognormal variance with pedigree 0.092025, pedigree (4,4,3,2,4)
  Literature value. In case when no industry/process specific data are available, default evaporation fraction value is used. This value is 15% and is based on literature (Statistics Canada, 2007 & Shaffer, K.H., 2008, Consumptive water use in the Great Lakes Basin, USGS & Shiklomanov, 2003, World Water Resources at the Beginning of the 21st Century) and has been approved by an expert.
- original gas input: 0.0915385 m3; name gas_original; lognormal variance with pedigree 0.0201, pedigree (1,2,1,5,3)
  natural gas use per kg glass in original dataset
  Uncertainty: average value from EU-IPPC report
- emission factor N2O from gas: 1e-7; name EF_N2O_gas; lognormal variance with pedigree 1.0832, pedigree (2,1,1,5,2)
  (same comment as for emission factor methane from light fuel oil)
- fraction, tap water, to air: 0.15; name fraction_TW_to_air; = fraction_PW_to_air; lognormal variance with pedigree 0.092025, pedigree (4,4,3,2,4)
  Calculated value. See comment in the other parametres present in this dataset. Tap water is considered to be always used as process water, thus process water fractions to air are applied to all tap water input flows to calculate the amount of water consumed in the processes.
- emission factor methane from gas: 2e-6; name EF_CH4_gas; lognormal variance with pedigree 1.0832, pedigree (2,1,1,5,2)
  (same comment as for emission factor methane from light fuel oil)
- emission factor methane from heavy fuel oil: 4.2e-6; name EF_CH4_heavy; lognormal variance with pedigree 1.0832, pedigree (2,1,1,5,2)
  (same comment as for emission factor methane from light fuel oil)
- emission factor CO from gas: 2.2e-6; name EF_CO_gas; lognormal variance with pedigree 1.0832, pedigree (2,1,1,5,2)
  (same comment as for emission factor methane from light fuel oil)
- Na2O in cullet: 0.13 kg; name Na2O_in_glass; triangular min 0.12, mostLikely 0.13, max 0.14, pedigree (2,1,1,5,2)
  Average Na2O content in container glass (EU commission 2012: Best Available Techniques (BAT) Reference Document for the Manufacture of Glass)
- original cullet input, kg per kg raw material input: 0.53; name cullet_original; lognormal variance with pedigree 0.0148, pedigree (2,4,2,5,1)
  65%
- emission factor benzo(a)pyrene from gas: 1e-11; name EF_benzo_gas; lognormal variance with pedigree 1.0832, pedigree (2,1,1,5,2)
  (same comment as for emission factor methane from light fuel oil)
- electricity input: 0.244 kWh; name electricity_original; lognormal variance with pedigree 0.0201, pedigree (1,2,1,5,3)
  electricity use per kg glass in original dataset
  Uncertainty: average value from EU-IPPC report

## Reference product
- packaging glass, green: 1 kg; CPC 37191: Bottles, jars, phials and other containers, of glass, of a kind used for the conveyance or packing of goods, e[…]; By-product classification allocatable product
  production volume 19800 kg; name PV_glass
    Estimated value; to be 1/1000000 of the production volume of packaging glass production, green produced from glass cullets.
  property price 0.326547 EUR2005
    Calculated based on inputs: The price of the product has been calculated as a sum of the values of the material and energy inputs for this product. This value is therefore a rough estimation. It may underestimate the real price since there are additional expenses when producing any product. These expences can include for example labour costs, treatment of waste materials and profit for the producer. Please consider carefully whether this level of data quality is acceptable for your application.
  property carbon content, non-fossil 0; name C_content_non_fossil
  property wet mass 1 kg; name WM
  property carbon content, fossil 0; name C_content_fossil
  property water content 0; name water_content
  property water in wet mass 0 kg; name WWM
  property dry mass 1 kg; name DM
  property carbon content 0
    carbon content on a dry matter basis (reserved; not for manual entry)
  property true value 0.326547
    allocation property applied in "true value" allocation // value calculated from revenue
  properties: carbon allocation 0 kg

## By-products
- electricity, for reuse in municipal waste incineration only: 0 kWh; CPC 17100: Electrical energy; By-product classification allocatable product; pedigree (1,1,1,1,1)
  Net electricity generated from this waste and used in internal MSWI plant energy redistribution.
  Uncertainty: uncertainty is calculated from uncertainties in waste composition and uncertainties in energy efficiency and the uncertainty in internal energy demand
  production volume 2.97832 kWh
  property exergy 3.6 MJ; name E_el_prod_MSWI_exergy
    This exergy property is based on the exergy content of the product.
  property true value relation 3.6; name E_el_prod_MSWI_true_value_relation
    property to calculate "true value" from
  property price 0.1 EUR2005; name E_el_prod_MSWI_price_EUR2005
    Estimated to be the same price as in case of electricity, medium voltage.
  property true value 1.80817e-5
    allocation property applied in "true value" allocation // value calculated from true value relation
- heat, for reuse in municipal waste incineration only: 0 MJ; CPC 17300: Steam and hot water; By-product classification allocatable product; pedigree (1,1,1,1,1)
  Net useful heat generated from this waste and used in internal MSWI plant energy redistribution.
  Uncertainty: uncertainty is calculated from uncertainties in waste composition and uncertainties in energy efficiency and the uncertainty in internal energy demand
  production volume 21.9405 MJ
  property true value relation 0.1842; name E_th_prod_MSWI_true_value_relation
    property to calculate "true value" from
  property exergy 0.1842 MJ; name E_th_prod_MSWI_exergy
    This exergy property is based on the exergy content of the product.
  property price 0.0106 EUR2005; name E_th_prod_MSWI_price_EUR2005
    Average European district heat price from Ecoheatcool and Euroheat 2005-2006, Ecoheat Work package 1: The European heat market. Final report. 10.6 EUR/GJ i s the price of district heat. http://www.solarthermalworld.org/files/Ecoheatcool%20WP1%20Web.pdf?download
  property true value 6.81425e-6
    (same comment as for electricity, for reuse in municipal waste incineration only)
- zinc concentrate: 0 kg; CPC 14290: Other non-ferrous metal ores and concentrates (other than uranium or thorium ores and concentrates); By-product classification allocatable product
  Calculated value from the knowledge of the properties of both products.
  production volume 1.78697e-6 kg
  property price 0.38 EUR2005; name ByP_price_EUR2005
    Temporary price data. Calculated as 90% of purchasers price based on: Zinc content in concentrate 53%. Concentrate price per kg Zn 86.5% of refined Zn price (13.5% treatment charges according to CHR Metals Limited 2005: Dynamic cost curves. http://www.minecost.com/dynamic.pdf). 2004 zinc price from USGS (2007) Mineral commodity summaries 2007. <http://minerals.usgs.gov/minerals/pubs/mcs/2007/mcs2007.pdf> [Accessed 25 May 2010]
  property zinc content 0.53; name zinc_C_zinc_concentrate
    Zinc content on a dry matter basis. Value taken from teh "zinc mine operation" /GLO dataset.
  property dry mass 1 kg; name DM_zinc_concentrate
  property carbon content 0
    carbon content on a dry matter basis (reserved; not for manual entry)
  property true value 3.42954e-11
    allocation property applied in "true value" allocation // value calculated from revenue
  properties: wet mass 1 kg, water content 0, carbon content, non-fossil 0, carbon content, fossil 0, water in wet mass 0 kg, carbon allocation 0 kg
- iron scrap, sorted, pressed: 0 kg; By-product classification Recyclable; CPC 39310: Slag, dross, scalings and other waste from the manufacture of iron or steel; pedigree (1,1,1,1,1)
  metallic iron scrap removed from ash reamains and recycled.
  Uncertainty: uncertainty is calculated from uncertainties in waste composition and transfer coefficients to soild residues
  production volume 0.360504 kg
  property price 0.175 EUR2005
    Temporary price data. Calculated as 90% of purchasers price based on: 2005 import and export prices (total trades (USD) divided by total weight (kg) in biggest economies of the world: EU27, USA, Brasil, China, India, Japan and Russia) from UN Commodity Trade Statistics Database (http://data.un.org/Explorer.aspxDatabase [Accessed 2011.06.20]). Commodity: Waste or scrap, of cast iron
  property carbon content 0
    carbon content on a dry matter basis (reserved; not for manual entry)
  property true value 2.72992e-6
    allocation property applied in "true value" allocation // value calculated from revenue
  properties: carbon content, non-fossil 0, wet mass 1 kg, dry mass 1 kg, water content 0, carbon content, fossil 0, water in wet mass 0 kg, carbon allocation 0 kg
- copper: 0 kg; source Rentz O. 1999; By-product classification allocatable product; CPC 41413: Refined copper and copper alloys, unwrought; master alloys of copper
  Literature value. Copper uses: Before end-use copper is manufactured into semi fabricated products, such as shapes and ingots (known as 'semis'). These manufacturing processes are subdivided into hot working, cold working and, if necessary, process annealing. Few of the semis are ready for use as such. They more typically travel to first-stage manufacturers, who make metal rods, wire, and casting, and then to component manufacturers who produce such things as motors, valves, and insulated cables The components in turn are incorporated by final-stage manufacturers into a variety of finished products - automobiles, commercial buildings, residential housing, and so forth. These uses account for about 79% of the world-wide consumption of copper.
  production volume 0.0116166 kg
  property price 5.52 EUR2005
    Literature value (http://www.economist.com/news/business/21576714-mining-industry-has-enriched-chile-its-future-precarious-copper-solution). Average price between 20015 and 2013.
  property carbon content 0
    carbon content on a dry matter basis (reserved; not for manual entry)
  property true value 2.74088e-6
    allocation property applied in "true value" allocation // value calculated from revenue
  properties: dry mass 1 kg, water in wet mass 0 kg, wet mass 1 kg, carbon content, non-fossil 0, water content 0, carbon content, fossil 0, carbon allocation 0 kg
- iron scrap, unsorted: 0 kg; source European Aluminium Association 2008; CPC 39310: Slag, dross, scalings and other waste from the manufacture of iron or steel; By-product classification Recyclable; pedigree (1,1,1,1,1)
  production volume 9.53747e-6 kg
  property price 0.149 EUR2005; name ironScrapAmount_price_EUR2005
    Temporary price data. Calculated as 90% of purchasers price based on: estimated at 85% of sorted scrap
  property carbon content 0
    carbon content on a dry matter basis (reserved; not for manual entry)
  property true value 6.6128e-11
    allocation property applied in "true value" allocation // value calculated from revenue
  properties: water in wet mass 0 kg, water content 0, carbon content, fossil 0, carbon content, non-fossil 0, dry mass 1 kg, wet mass 1 kg, carbon allocation 0 kg
- aluminium oxide, non-metallurgical: 0 kg; source European Aluminium Association 2008; CPC 41432: Alumina (aluminium oxide), except artificial corundum; By-product classification allocatable product; CAS 1344-28-1; pedigree (1,1,1,1,1)
  production volume 0.000600157 kg
  property carbon content, non-fossil 0; name C_content_non_fossil
  property price 0.28 EUR2005; name Al2O3Amount_price_EUR2005
    From UN trade database. http://data.un.org/ Import data from the largest economies of the world are used (Brazil, India, USA, China, Japan and EU-27).
  property dry mass 1 kg; name DM
  property water content 0; name water_content
  property wet mass 1 kg; name WM
  property water in wet mass 0 kg; name WWM
  property carbon content, fossil 0; name C_content_fossil
  property carbon content 0
    carbon content on a dry matter basis (reserved; not for manual entry)
  property true value 7.81968e-9
    allocation property applied in "true value" allocation // value calculated from revenue
  properties: carbon allocation 0 kg
- aluminium, cast alloy: 0 kg; source European Aluminium Association 2008; By-product classification allocatable product; CPC 41431: Unwrought aluminium; pedigree (1,1,1,1,1)
  EcoSpold01Location=RER
  production volume 0.00561014 kg
  property price 1.3 EUR2005; name castAlloyAmount_price_EUR2005
    Temporary price data. Calculated as 90% of purchasers price based on: Source: London Metal Exchange, Aluminium alloy price for 2005
  property carbon content 0
    carbon content on a dry matter basis (reserved; not for manual entry)
  property true value 3.39377e-7
    allocation property applied in "true value" allocation // value calculated from revenue
  properties: water in wet mass 0 kg, carbon content, non-fossil 0, water content 0, dry mass 1 kg, carbon content, fossil 0, wet mass 1 kg, carbon allocation 0 kg
- aluminium, wrought alloy: 0 kg; source European Aluminium Association 2008; By-product classification allocatable product; CPC 4153: Semi-finished products of aluminium or aluminium alloys; pedigree (1,1,1,1,1)
  production volume 0.00245601 kg
  property price 1.44 EUR2005; name secondaryAluminiumOutput_price_EUR2005
    Estimated based on literature values and expert judgement. Aluminium ccast alloys are about 90% of the price of aluminium wrought alloys.
  property carbon content 0
    carbon content on a dry matter basis (reserved; not for manual entry)
  property true value 1.64573e-7
    allocation property applied in "true value" allocation // value calculated from revenue
  properties: wet mass 1 kg, water content 0, carbon content, fossil 0, water in wet mass 0 kg, carbon content, non-fossil 0, dry mass 1 kg, carbon allocation 0 kg

## Inputs from technosphere
- refractory, fireclay, packed: 0.0142986 kg; name clay; lognormal variance with pedigree 0.0601, pedigree (1,2,5,5,3)
  EcoSpold01Location=DE
  Estimation: it includes all minor raw materials. The total amount for european production is from literature source.
  Uncertainty: average value from EU-IPPC report
  properties: dry mass 1 kg, wet mass 1 kg
- portachrom: 0.000999905 kg; lognormal variance with pedigree 0.0526, pedigree (1,3,5,5,1)
  Data from 1 Vetropack site
  EcoSpold01Location=RER
  properties: wet mass 1 kg, dry mass 1 kg
- light fuel oil: 0 kg; name light_fuel; pedigree (1,1,1,1,1)
  Estimation: reported total amount of energy required per glass melted from literature source. Average european mix of 50% fuel oil and 50% natural gas estimated based on literature source. Light fuel oil and heavy fuel oil at equal parts. Oil mainly used for curing and has therefore not been increased relative to the dataset with cullet input.
  EcoSpold01Location=RER
  Uncertainty: average value from EU-IPPC report
  property carbon content, fossil 0.862; name C_in_light_fuel
  properties: dry mass 1 kg, wet mass 1 kg
- lime: 0 kg; pedigree (1,1,1,1,1)
  EcoSpold01Location=CH
  Calculated value to give - together with dolomite input - a CaO content of 10.5% in the glass.
  properties: carbon content, fossil 0.120005, dry mass 1 kg, wet mass 1 kg
- wastewater from glass production: -0.00175983 m3; lognormal variance with pedigree 0.0601, pedigree (1,2,5,5,3)
  average value from EU-IPPC report
  EcoSpold01Location=CH
  Uncertainty: average value from EU-IPPC report
  production volume 34.848 m3; = PV_glass*0.00176
    Calculated from the production volume of packaging glass, green in proportion to the respective output amounts.
  properties: dry mass 1.09356 kg, wet mass 1000 kg, carbon content, fossil 0.0455242, water content 913.443
  note on carbon content, fossil: COD= 0.115 kg/m3 (Tab A.18, ecoinvent v2.2 report 13_I). COD was converted to TOC, using conversion factors in Tab 4.10 (ecoinvent v2.2 report 13_IV). TOC was considered as Total Carbon.
- lubricating oil: 0 kg; pedigree (1,1,1,1,1)
  EcoSpold01Location=RER
  data from a German study (UBA)
  Uncertainty: data from a German study (UBA)
  properties: wet mass 1 kg, dry mass 1 kg, carbon content, fossil 0.75
  note on carbon content, fossil: Lubricating oil is produced from diesel. C-content/dry mass of fats and oils considered 75%, from: ecoinvent v2.2 report, n 15a, pg 40
- diesel: 0.00176983 kg; lognormal variance with pedigree 0.0526, pedigree (1,3,5,5,1)
  Literature value.
  EcoSpold01Location=RER
  properties: wet mass 1 kg, dry mass 1 kg, carbon content, fossil 0.865
  note on carbon content, fossil: C-content of diesel is 86.5% (ecoinvent v2.2 report 6_IV, Tab 3.14)
- solid unbleached board: 0.0192982 kg; lognormal variance with pedigree 0.054, pedigree (1,4,5,5,1)
  Literature value: average european value from literature source.
  EcoSpold01Location=RER
  properties: water content 0.0582011, wet mass 1 kg, dry mass 0.945 kg, carbon content, fossil 0.0207076, carbon content, non-fossil 0.353395
  note on carbon content, fossil: Fossil C content was calculated after fossil C contents of chemicals used in the production of board (Tab 11.25 ecoinvent v2.2 report 11_III, part 11)
  note on carbon content, non-fossil: Biogenic C content was calculated after biogenic C contents of chemicals used in the production of board (Tab 11.25 ecoinvent v2.2 report 11_III, part 11). The cellulose content in 1 kg of paper (on a wet mas basis) was estimated as (1-chemical content), C content of cellulose was considered 0.44 kgC/kg dry mass (ecoinvent v2.2 report, n 15a, pg 40)
- graphite: 1.24988e-6 kg; lognormal variance with pedigree 0.0421, pedigree (1,2,5,5,1)
  EcoSpold01Location=RER
  Literature value.
  Uncertainty: data from a German study (UBA)
  properties: wet mass 1 kg, carbon content, fossil 1, dry mass 1 kg
- municipal solid waste: 0 kg; name waste; pedigree (1,1,1,1,1)
  EcoSpold01Location=CH
  average value from EU-IPPC report
  Uncertainty: average value from EU-IPPC report
  production volume 0 kg
    (same comment as for wastewater from glass production)
  properties: dry mass 0.771 kg, carbon content, non-fossil 0.261655, water content 0.297017, wet mass 1 kg, carbon content, fossil 0.171549
  note on carbon content, non-fossil: MSW composition in tab 4.1, ecoinvent v2.2 report 13_I. C content referred to 1 kg DM
- natural gas, high pressure: 0.10551 m3; name gas; = gas_original/(1-energy_saving_factor*cullet_original); lognormal variance with pedigree 0.0601, pedigree (1,2,5,5,3)
  Calculated from original natural gas input and cullet fraction and the reduction in energy requirement per % cullet (EU commission 2012: Best Available Techniques (BAT) Reference Document for the Manufacture of Glass)
  EcoSpold01Location=RER
  property carbon content, fossil 0.602381; name C_in_gas
  properties: heating value, gross 39 MJ, wet mass 0.84 kg, dry mass 0.84 kg
  note on carbon content, fossil: An average C content of 0.506 kg C/ m3 has been assumed (this average has been calculated using data in Tab 3.5, ecoinvent v2.2 report 6_V
- polyethylene, high density, granulate: 0.0128988 kg; lognormal variance with pedigree 0.054, pedigree (1,4,5,5,1)
  Literature value: average european value from literature source.
  EcoSpold01Location=RER
  properties: wet mass 1 kg, carbon content, fossil 0.857143, dry mass 1 kg
  note on carbon content, fossil: Polyethylene is formed out of a huge amount of ethylene monomers (C2H4) (ecoinvent v2.2 report 11_II). MW=28 g/mol
- feldspar: 0.0161985 kg; lognormal variance with pedigree 0.0601, pedigree (1,2,5,5,3)
  EcoSpold01Location=RER
  Literature value.
  properties: wet mass 1 kg, dry mass 1 kg
- chemical, inorganic: 0.0219979 kg; name chemicals; lognormal variance with pedigree 0.0601, pedigree (1,2,5,5,3)
  average value from EU-IPPC report
  EcoSpold01Location=GLO
  Uncertainty: average value from EU-IPPC report
  properties: carbon content, fossil 0.003, dry mass 1 kg, wet mass 1 kg
  note on carbon content, fossil: This dataset is an unweighted average of 20 inorganic substances (listed in Tab 88.1, ecoinvent v2.2 report 8, part II), being part of the top100 chemicals included in this database. The C-content has also been calculated as an unweighted average of the C content of the substances composing this dataset.
- tap water: 0.0999905 kg; name tap_water_input; lognormal variance with pedigree 0.0906, pedigree (5,3,5,1,1)
  EcoSpold01Location=RER
  Order of magnitude estimate
  properties: water content 2962.17, wet mass 1 kg, carbon content, fossil 0.00178991, dry mass 0.000337476 kg
  note on carbon content, fossil: Bicarbonate content is 2.93 mol/m3. CO2 content is 0.1 mol/m3 (ecoinvent v2.2 report 8, Tab 93.1).
- dolomite: 0 kg; pedigree (1,1,1,1,1)
  Same value as for packaging glass with cullet input
  EcoSpold01Location=RER
  properties: carbon content, fossil 0.130435, wet mass 1 kg, dry mass 1 kg
- heavy fuel oil: 0 kg; name heavy_fuel; pedigree (1,1,1,1,1)
  (same comment as for light fuel oil)
  property carbon content, fossil 0.849; name C_in_heavy_fuel
  properties: wet mass 1 kg, dry mass 1 kg
- soda ash, light, crystalline, heptahydrate: 0.222237 kg; name soda; = Na2O_in_glass*106/62; lognormal variance with pedigree 0.0601, pedigree (1,2,5,5,3)
  Estimated value to ensure a Na2O content of 13% in the glass, assuming the same content in the cullet.
  EcoSpold01Location=RER
  properties: wet mass 1 kg, carbon content, fossil 0.0517241, dry mass 1 kg
- lime, hydrated, loose weight: 0 kg; pedigree (1,1,1,1,1)
  Order of magnitude estimate
  EcoSpold01Location=CH
  Uncertainty: data from 1 Vetropack site
  properties: dry mass 0.997 kg, wet mass 1 kg, water content 0.00300903
- silica sand: 0.694479 kg; = 1-soda*62/106-lime*56/100-dolomite*127/215-feldspar-chemicals-clay+(waste*-1)-portachrom; lognormal variance with pedigree 0.0601, pedigree (1,2,5,5,3)
  calculated as residual from the mass balance
  EcoSpold01Location=DE
  properties: water content 0.010101, wet mass 1 kg, dry mass 0.99 kg
- EUR-flat pallet: 0.000786926 unit; lognormal variance with pedigree 0.054, pedigree (1,4,5,5,1)
  Literature value: average european value from literature value
  EcoSpold01Location=RER
  properties: water content 0.2, carbon content, fossil 0.0311351, dry mass 18.3333 kg, wet mass 22 kg, carbon content, non-fossil 0.58833
  note on carbon content, fossil: C content in components of the pallet (ecoinvent v2.2 report 7_part XVIII)
- electricity, medium voltage: 0.281241 kWh; = electricity_original/(1-energy_saving_factor*cullet_original); lognormal variance with pedigree 0.0601, pedigree (1,2,5,5,3)
  EcoSpold01Location=UCTE
  Calculated from original electricity input and cullet fraction and the reduction in energy requirement per % cullet (EU commission 2012: Best Available Techniques (BAT) Reference Document for the Manufacture of Glass)
  Uncertainty: average value from EU-IPPC report
- packaging glass factory: 1.24988e-10 unit; lognormal variance with pedigree 0.494, pedigree (5,4,5,5,4)
  EcoSpold01Location=RER
  Estimation: infrastructure represents an average packaging glass factory in Europe.
  Uncertainty: own estimation
- light fuel oil: 0.00648815, 0.000214341, 0.0029996, 0.000288416, 0.00148625, 0.00019905, 0.0302202 kg (7 entries); lognormal variance with pedigree 0.0601, pedigree (1,2,5,5,3)
  (same comment as for light fuel oil)
  properties: dry mass 1 kg, wet mass 1 kg, carbon content, fossil 0.862
- lime: 0.012391, 0.143466 kg (2 entries); lognormal variance with pedigree 0.0601, pedigree (1,2,5,5,3)
  (same comment as for lime)
- lubricating oil: 4.14073e-6, 1.9657e-5 kg (2 entries); lognormal variance with pedigree 0.0421, pedigree (1,2,5,5,1)
  (same comment as for lubricating oil)
- municipal solid waste: -0.000420906, -2.57985e-6, -1.80528e-6, -7.16451e-6, -0.00506702 kg (5 entries); lognormal variance with pedigree 0.0601, pedigree (1,2,5,5,3)
  (same comment as for municipal solid waste)
  production volume 108.9 kg
- dolomite: 0.0224782, 0.0455154 kg (2 entries); lognormal variance with pedigree 0.0601, pedigree (1,2,5,5,3)
  Same value as for packaging glass with cullet input
  EcoSpold01Location=RER
- heavy fuel oil: 0.00666697, 0.000467615, 0.00138431, 0.000349319, 0.00179498, 0.000272299, 0.0323604 kg (7 entries); lognormal variance with pedigree 0.0601, pedigree (1,2,5,5,3)
  (same comment as for light fuel oil)
  properties: wet mass 1 kg, dry mass 1 kg, carbon content, fossil 0.849
- lime, hydrated, loose weight: 8.4162e-6, 0.000991489 kg (2 entries); lognormal variance with pedigree 0.0526, pedigree (1,3,5,5,1)
  Order of magnitude estimate
  EcoSpold01Location=CH
  Uncertainty: data from 1 Vetropack site

## Inputs from nature
- Water, unspecified natural origin [natural resource, in water]: 0.00197981 m3; name water_UNO_input; lognormal variance with pedigree 0.0601, pedigree (1,2,5,5,3)
  average value from EU-IPPC report
  Uncertainty: average value from EU-IPPC report

## Emissions to nature
- Manganese [air, urban air close to ground]: 6.73936e-8 kg; lognormal variance with pedigree 0.704, pedigree (1,4,5,5,1)
  Literature value: average european value from literature source.
- DOC, Dissolved Organic Carbon [water, surface water]: 9.99905e-6 kg; lognormal variance with pedigree 0.0926, pedigree (1,3,5,5,1)
  Order of magnitude estimate
- Carbon monoxide, fossil [air, urban air close to ground]: 3.40327e-5 kg; = EF_CO_gas*39*gas+EF_CO_oil*(41.2*heavy_fuel+42.6*light_fuel); lognormal variance with pedigree 0.6921, pedigree (1,2,5,5,1)
  Calculated from fuel input and emission factors in kg/MJ (lower heating value for gas, heavy fuel oil and light fuel oil, 39 MJ/m3, 41.2 MJ/kg and 42.6 MJ/kg, respectively)
- Particulates, > 2.5 um, and < 10um [air, urban air close to ground]: 1.29988e-5 kg; lognormal variance with pedigree 0.1901, pedigree (1,2,5,5,3)
  Calculated value: total amount based on literature value (EU Commission, 2000). Distribution of particulate mater was calculated according to the ratio for the paricle distribution of combustion processes present in the literature source assuming a mix of 32% secondary and 68% primary abatment technology.
  Uncertainty: total from EU-IPPC report, split up according to US-EPA
- Nitrogen oxides [air, urban air close to ground]: 0.0020998 kg; lognormal variance with pedigree 0.1101, pedigree (1,2,5,5,3)
  Literature value: average european value from literature source. It includes a mix of 32% secondary and 68% primary abatment technology.
  Uncertainty: average value from EU-IPPC report
- Nickel [air, urban air close to ground]: 6.73936e-8 kg; lognormal variance with pedigree 0.704, pedigree (1,4,5,5,1)
  Literature value: average european value from literature source.
- Zinc, ion [water, surface water]: 9.99905e-9 kg; lognormal variance with pedigree 0.7026, pedigree (1,3,5,5,1)
  Order of magnitude estimate
- Formaldehyde [air, urban air close to ground]: 2.08871e-6 kg; = EF_formaldehyde_gas*39*gas+EF_formaldehyde_oil*(41.2*heavy_fuel+42.6*light_fuel); lognormal variance with pedigree 0.1621, pedigree (1,2,5,5,1)
  (same comment as for Carbon monoxide, fossil)
- Sulfur dioxide [air, urban air close to ground]: 0.00343967 kg; lognormal variance with pedigree 0.0601, pedigree (1,2,5,5,3)
  (same comment as for Nitrogen oxides)
- Ammonia [air, urban air close to ground]: 2.61975e-8 kg; lognormal variance with pedigree 0.0821, pedigree (1,2,5,5,1)
  data from a German study (UBA)
  Uncertainty: data from a German study (UBA)
- Selenium [air, urban air close to ground]: 7.32931e-6 kg; lognormal variance with pedigree 0.704, pedigree (1,4,5,5,1)
  Literature value: average european value from literature source.
- Lead [air, urban air close to ground]: 7.71927e-7 kg; lognormal variance with pedigree 0.704, pedigree (1,4,5,5,1)
  Literature value: average european value from literature source.
- BOD5, Biological Oxygen Demand [water, surface water]: 9.99905e-6 kg; lognormal variance with pedigree 0.0926, pedigree (1,3,5,5,1)
  Order of magnitude estimate
  Uncertainty: data from 1 Vetropack site
- Hydrocarbons, aliphatic, alkanes, unspecified [air, urban air close to ground]: 1.18989e-5 kg; lognormal variance with pedigree 0.0821, pedigree (1,2,5,5,1)
  data from a German study (UBA)
  Uncertainty: data from a German study (UBA)
- COD, Chemical Oxygen Demand [water, surface water]: 9.99905e-6 kg; lognormal variance with pedigree 0.0926, pedigree (1,3,5,5,1)
  Order of magnitude estimate
  Uncertainty: data from 1 Vetropack site
- Dioxins, measured as 2,3,7,8-tetrachlorodibenzo-p-dioxin [air, urban air close to ground]: 1.80067e-15 kg; = EF_dioxin_gas*39*gas+EF_dioxin_oil*(41.2*heavy_fuel+42.6*light_fuel); lognormal variance with pedigree 0.0821, pedigree (1,2,5,5,1)
  (same comment as for Carbon monoxide, fossil)
- Dinitrogen monoxide [air, urban air close to ground]: 2.90948e-6 kg; = EF_N2O_gas*39*gas+EF_N2O_oil*(41.2*heavy_fuel+42.6*light_fuel); lognormal variance with pedigree 0.0821, pedigree (1,2,5,5,1)
  (same comment as for Carbon monoxide, fossil)
- Methane, fossil [air, urban air close to ground]: 1.75065e-5 kg; = EF_CH4_gas*39*gas+EF_CH4_heavy*41.2*heavy_fuel+EF_CH4_light*42.6*light_fuel; lognormal variance with pedigree 0.0821, pedigree (1,2,5,5,1)
  (same comment as for Carbon monoxide, fossil)
- Nitrite [water, surface water]: 9.99905e-8 kg; lognormal variance with pedigree 0.0926, pedigree (1,3,5,5,1)
  Order of magnitude estimate
- Chromium [air, urban air close to ground]: 6.73936e-8 kg; lognormal variance with pedigree 0.704, pedigree (1,4,5,5,1)
  Literature value: average european value from literature source.
- Hydrogen chloride [air, urban air close to ground]: 4.96953e-5 kg; lognormal variance with pedigree 0.1101, pedigree (1,2,5,5,3)
  (same comment as for Nitrogen oxides)
- Cadmium [air, urban air close to ground]: 6.73936e-8 kg; lognormal variance with pedigree 0.704, pedigree (1,4,5,5,1)
  Literature value: average european value from literature source.
- Arsenic [air, urban air close to ground]: 6.73936e-8 kg; lognormal variance with pedigree 0.704, pedigree (1,4,5,5,1)
  Literature value: average european value from literature source.
- Copper, ion [water, surface water]: 9.99905e-10 kg; lognormal variance with pedigree 0.7026, pedigree (1,3,5,5,1)
  Order of magnitude estimate
  Uncertainty: data from 1 Vetropack site
- NMVOC, non-methane volatile organic compounds, unspecified origin [air, urban air close to ground]: 4.41958e-6 kg; lognormal variance with pedigree 0.0821, pedigree (1,2,5,5,1)
  data from a German study (UBA)
  Uncertainty: data from a German study (UBA)
- Particulates, < 2.5 um [air, urban air close to ground]: 0.000251976 kg; lognormal variance with pedigree 0.3701, pedigree (1,2,5,5,3)
  (same comment as for Particulates, > 2.5 um, and < 10um)
- Particulates, > 10 um [air, urban air close to ground]: 1.59985e-5 kg; lognormal variance with pedigree 0.1101, pedigree (1,2,5,5,3)
  (same comment as for Particulates, > 2.5 um, and < 10um)
- Benzo(a)pyrene [air, urban air close to ground]: 1.48206e-10 kg; = EF_benzo_gas*39*gas+EF_benzo_oil*(41.2*heavy_fuel+42.6*light_fuel); lognormal variance with pedigree 0.1621, pedigree (1,2,5,5,1)
  (same comment as for Carbon monoxide, fossil)
- Suspended solids, unspecified [water, surface water]: 9.99905e-7 kg; lognormal variance with pedigree 0.1306, pedigree (5,3,5,1,1)
  Order of magnitude estimate
- Water [water, unspecified]: 7.99924e-6 m3; name water_to_water_unspecified; = (tap_water_input/1000)*(1-fraction_TW_to_air)+water_UNO_input*(1-fraction_PW_to_air)-0.00176; lognormal variance with pedigree 0.130025, pedigree (4,4,5,2,4)
  Calculated value based on literature values and expert opinion. See comments in the parametres' comment field.
  property fraction, origin: salt water 0; name fraction_origin_salt_water_Ww
  property fraction, origin: fresh water 0.0480769; name fraction_origin_fresh_water_Ww
  property fraction, origin: unspecified 0.951923; name fraction_origin_unspecified_Ww
- AOX, Adsorbable Organic Halogen as Cl [water, surface water]: 9.99905e-8 kg; lognormal variance with pedigree 0.1306, pedigree (5,3,5,1,1)
  Order of magnitude estimate
- Copper [air, urban air close to ground]: 6.73936e-8 kg; lognormal variance with pedigree 0.704, pedigree (1,4,5,5,1)
  Literature value: average european value from literature source.
- Water [air, unspecified]: 0.00031197 m3; name water_to_air_unspecified; = (tap_water_input/1000)*fraction_TW_to_air+water_UNO_input*fraction_PW_to_air; lognormal variance with pedigree 0.130025, pedigree (4,4,5,2,4)
  (same comment as for Water)
  property fraction, origin: fresh water 0.0480769; name fraction_origin_fresh_water
  property fraction, origin: salt water 0; name fraction_origin_salt_water
  property fraction, origin: unspecified 0.951923; name fraction_origin_unspecified
- Carbon dioxide, fossil [air, urban air close to ground]: 0.688899 kg; = (gas* C_in_gas+heavy_fuel* C_in_heavy_fuel+light_fuel* C_in_light_fuel)*44/12+soda*44/106+lime*44/100+dolomite*88/215; lognormal variance with pedigree 0.0601, pedigree (1,2,5,5,3)
  Calculated from carbon in fuels and raw materials
- Cobalt [air, urban air close to ground]: 6.73936e-8 kg; lognormal variance with pedigree 0.704, pedigree (1,4,5,5,1)
  Literature value: average european value from literature source.
- Oils, unspecified [water, surface water]: 9.99905e-7 kg; lognormal variance with pedigree 0.0926, pedigree (1,3,5,5,1)
  Order of magnitude estimate
- Benzene [air, urban air close to ground]: 1.71733e-6 kg; = EF_benzene_gas*39*gas+EF_benzene_oil*(41.2*heavy_fuel+42.6*light_fuel); lognormal variance with pedigree 0.1621, pedigree (1,2,5,5,1)
  (same comment as for Carbon monoxide, fossil)
- Hydrogen fluoride [air, urban air close to ground]: 1.79983e-5 kg; lognormal variance with pedigree 0.1101, pedigree (1,2,5,5,3)
  (same comment as for Nitrogen oxides)
- TOC, Total Organic Carbon [water, surface water]: 9.99905e-6 kg; lognormal variance with pedigree 0.0926, pedigree (1,3,5,5,1)
  Calculated by default as TOC (gC) = COD/2.7 (COD measured in g O2). Should more correctly be calculated from the carbon content of the specified emissions to water.
- Antimony [air, urban air close to ground]: 6.73936e-8 kg; lognormal variance with pedigree 0.704, pedigree (1,4,5,5,1)
  Literature value: average european value from literature source.
- Sulfate [water, surface water]: 9.99905e-7 kg; lognormal variance with pedigree 0.0926, pedigree (1,3,5,5,1)
  Order of magnitude estimate
