# battery cell production, Li-ion

Dataset: EcoSpold 2, unit process
Geography: CN
Time period: 2009-01-01 to 2019-12-31
Technology level: current
Classification: ISIC rev.4 ecoinvent: 2720:Manufacture of batteries and accumulators
Classification: EcoSpold01Categories: electronics/component
Tags: ConvertedDataset
Scenario: Business-as-Usual
System model: Allocation at the point of substitution
Generated by: Dominic Notter
Published in: Hischier, R. 2009
Database: ecoinvent
isCopyrightProtected: true
accessRestrictedTo: 1

## General comment
The dataset can be used as a cathode for a lithium-ion battery. Data are based on patents. For infrastructure, the ecoinvent dataset "chemical plant, organics" is accounted. Transportation efforts are based on ecoinvent standard estimates.
[This dataset was already contained in the ecoinvent database version 2. It was not individually updated during the transfer to ecoinvent version 3. Life Cycle Impact Assessment results may still have changed, as they are affected by changes in the supply chain, i.e. in other datasets. This dataset was generated following the ecoinvent quality guidelines for version 2. It may have been subject to central changes described in the ecoinvent version 3 change report (http://www.ecoinvent.org/database/ecoinvent-version-3/reports-of-changes/), and the results of the central updates were reviewed extensively. The changes added e.g. consistent water flows and other information throughout the database. The documentation of this dataset can be found in the ecoinvent reports of version 2, which are still available via the ecoinvent website. The change report linked above covers all central changes that were made during the conversion process.]

## Included activities end
This dataset incudes the production of a single cell for a lithium ion battery. Cathode, anode and a seperator are calendared. An aluminium electrode tab is added. The singel cells are filled with electrolyte (LiPF6 in ethylencarbonate) in an inert atmosphere and packed up in a polyethylene envelope. For infrastructure, the ecoinvent dataset "chemical plant, organics" is accounted. Transportation efforts are based on ecoinvent standard estimates.

## Geography
Some European datasets are used for global processes.

## Technology
This dataset includes a method of producing a lithium ion single cell. Lithium ion move from the cathode (LiMn2O4) into the electrolyte (LiPF6 in ethylenecarbonate) through the micropores of the sepeartor into the anode (lithium ion intercalation). During the charging phase. During the discharge of the battery the Li+-ions move back into the cathode.

## Reference product
- battery cell, Li-ion: 1 kg; CPC 46410: Primary cells and primary batteries; By-product classification allocatable product; CAS 7719-12-2
  EcoSpold01Location=CN
  production volume 0.197488 kg
    This is a placeholder value that does not reflect real-world production volumes. This dataset does not currently require a real-world production volume to work in the database framework, and no actual data were collected yet. This has no negative effect on the results of the ecoinvent database. The placeholder value of this activity was scaled according to the nominal GDP of 2005 (source: United Nations, http://data.un.org/Glossary.aspx?q=GDP+%28current+US%24%29, accessed 20130726) to reflect an appropriate share of the global production volume, which is also a placeholder value.
  property price 10 EUR2005
    Calculated value based on data from United Nations Commodity Trade Statistics Database (comtrade.un.org). UN comtrade category: 8506 Primary cells and primary bateries. Using exchange rate of 1EURO = 1.209 USD. Average of price of import into 4 main markets (EU, US, JP, and CH).
  property carbon content, fossil 0.380721
    C content calculated as the addition of the C contents in the final product components
  property carbon content 0.380721
    carbon content on a dry matter basis (reserved; not for manual entry)
  property true value 10
    allocation property applied in "true value" allocation // value calculated from revenue
  properties: dry mass 1 kg, wet mass 1 kg, water content 0, carbon content, non-fossil 0, water in wet mass 0 kg, carbon allocation 0.380721 kg

## By-products
- cobalt: 0 kg; CPC 41601: Tungsten, molybdenum, tantalum, magnesium, cobalt, cadmium, titanium, zirconium, beryllium, gallium, hafnium, […]; By-product classification allocatable product
  EcoSpold01Location=GLO
  production volume 0.013965 kg
  property price 39.7 EUR2005
    Temporary price data. Calculated as 90% of purchasers price based on: Cobalt in USGS (2007) Mineral commodity summaries 2007. <http://minerals.usgs.gov/minerals/pubs/mcs/2007/mcs2007.pdf>
  property carbon content 0
    carbon content on a dry matter basis (reserved; not for manual entry)
  property true value 0.554411
    allocation property applied in "true value" allocation // value calculated from revenue
  properties: dry mass 1 kg, water content 0, water in wet mass 0 kg, carbon content, non-fossil 0, wet mass 1 kg, carbon content, fossil 0, carbon allocation 0 kg
- iron scrap, unsorted: 0 kg; CPC 39310: Slag, dross, scalings and other waste from the manufacture of iron or steel; By-product classification Recyclable
  This flow substitutes the original byproduct "iron and steel, from used Li-ion battery pyrometallurgical process". Following an update in the production process of Li-battery, the byproduct of steel corresponds to reinforcing steel.
  production volume 0.0114299 kg
  property price 0.149 EUR2005
    Temporary price data. Calculated as 90% of purchasers price based on: estimated at 85% of sorted scrap
  property carbon content 0
    carbon content on a dry matter basis (reserved; not for manual entry)
  property true value 0.00170306
    allocation property applied in "true value" allocation // value calculated from revenue
  properties: carbon content, fossil 0, wet mass 1 kg, water in wet mass 0 kg, carbon content, non-fossil 0, water content 0, dry mass 1 kg, carbon allocation 0 kg
- lithium carbonate: 0 kg; CPC 34240: Phosphates of triammonium; salts and peroxysalts of inorganic acids and metals n.e.c.; By-product classification allocatable product; CAS 554-13-2
  EcoSpold01Location=GLO
  production volume 0.0051975 kg
  property price 6.75 EUR2005
    For lithium, there is no exchange trading, no terminal storage market and only an extremely limited spot market (Reuters, 2016). The lithium price is negotiated bilateral and based on customer specifications with price information rarely publicly documented (European Lithium, 2017). Roskill Information Services estimate the price for technical grade lithium carbonate in 2017 between 6900 and 7800 USD per tonne, with a price premium of 500 USD for battery grade lithium (European Lithium, 2017). USGS estimates the price for lithium carbonate, battery grade, to be 7400USD in 2016 (USGS, 2017). Here an average price of 7500 USD per tonne lithium carbonate is assumed, average exchange rate 1 USD = 0.9 EUR in 2017 (Oanda, 2017). Resulting in a price for lithium carbonate of 6.75EUR/kg.
    Reference(s):
    European Lithium. 2017. Lithium Market. Online source: http://europeanlithium.com/lithium/lithium-market/, accessed 10 October 2017.
    Reuters. 2016. What price lithium, the metal of the future? Andy Home. Online source: https://www.reuters.com/article/us-lithium-batteries-ahome/what-price-lithium-the-metal-of-the-future-andy-home-idUSKCN0YS19D, accessed 10 October 2017.
    Oanda. 2017. https://www.oanda.com/lang/de/currency/average, accessed 10 October 2017.
    USGS. 2017. Lithium. Commodity Overview. Online https://minerals.usgs.gov/minerals/pubs/commodity/lithium/mcs-2017-lithi.pdf, accessed 10 October, 2017.
  property carbon content 0.16255
    carbon content on a dry matter basis (reserved; not for manual entry)
  property true value 0.0350831
    allocation property applied in "true value" allocation // value calculated from revenue
  properties: dry mass 1 kg, carbon content, non-fossil 0, water in wet mass 0 kg, carbon content, fossil 0.16255, water content 0, wet mass 1 kg, carbon allocation 0.16255 kg
- sulfuric acid: 0 kg; source Althaus H.-J. 2004; CPC 34231: Chemical elements n.e.c.; inorganic acids except phosphoric, nitric and sulphonitric; inorganic oxygen compoun[…]; By-product classification allocatable product; pedigree (1,1,1,1,1)
  production volume 0.00669375 kg
  property price 0.031 EUR2005
    Temporary price data. Calculated as 90% of purchasers price based on: 2004 Import/Export data (total trades (USD) divided by total weight (kg) in EU27, USA, China, Japan and India) from UN Commodity Trade Statistics Database (http://data.un.org/Explorer.aspxDatabase [Accessed 2 July 2010]). Commodity: 'Sulphuric acid, oleum'
  property carbon content 0
    carbon content on a dry matter basis (reserved; not for manual entry)
  property true value 0.000207506
    allocation property applied in "true value" allocation // value calculated from revenue
  properties: carbon content, non-fossil 0, dry mass 1 kg, carbon content, fossil 0, wet mass 1 kg, water content 0, water in wet mass 0 kg, carbon allocation 0 kg
- copper: 0 kg; By-product classification allocatable product; CPC 41413: Refined copper and copper alloys, unwrought; master alloys of copper; pedigree (1,1,1,1,1)
  Calculated value. Based on Li-ioin battery composition and hydrometallurgical treatment process outputs. The efficiency of Cu, Al and Manganese recovery is estimated 70% based on the estimations of the original process for Cu recovery.
  production volume 0.00191045 kg
  property price 5.52 EUR2005; name copper_bp_price_EUR2005
    Literature value (http://www.economist.com/news/business/21576714-mining-industry-has-enriched-chile-its-future-precarious-copper-solution). Average price between 20015 and 2013.
  property carbon content 0
    carbon content on a dry matter basis (reserved; not for manual entry)
  property true value 0.0105457
    allocation property applied in "true value" allocation // value calculated from revenue
  properties: carbon content, non-fossil 0, water in wet mass 0 kg, wet mass 1 kg, water content 0, dry mass 1 kg, carbon content, fossil 0, carbon allocation 0 kg
- manganese: 0 kg; CPC 41603: Bismuth, antimony, manganese, chromium and articles thereof; including waste and scrap of bismuth or manganese; By-product classification allocatable product; pedigree (1,1,1,1,1)
  (same comment as for copper)
  production volume 0.000341775 kg
  property price 1.24 EUR2005; name manganese_bp_price_EUR2005
    Literature value (USGS,http://minerals.usgs.gov/minerals/pubs/commodity/manganese/myb1-2009-manga.pdf, accessed 20160222). The price for manganese ore (48% manganese) is reported to be 6.61 USD/metric ton unit (MTU) = 10kg. The resulting price is (1/0.48*0.661=) 1.38 USD. Cross reference; in 2005 manganese was traded on the markets for 1.5 USD/kg (http://www.infomine.com/investment/metal-prices/manganese/all/, accessed 20160704).
  property carbon content 0
    carbon content on a dry matter basis (reserved; not for manual entry)
  property true value 0.000423801
    allocation property applied in "true value" allocation // value calculated from revenue
  properties: dry mass 1 kg, water in wet mass 0 kg, carbon content, fossil 0, wet mass 1 kg, carbon content, non-fossil 0, water content 0, carbon allocation 0 kg
- aluminium oxide, non-metallurgical: 0 kg; source European Aluminium Association 2008; CPC 41432: Alumina (aluminium oxide), except artificial corundum; By-product classification allocatable product; CAS 1344-28-1; pedigree (1,1,1,1,1)
  production volume 2.27104e-5 kg
  property carbon content, non-fossil 0; name C_content_non_fossil
  property price 0.28 EUR2005; name Al2O3Amount_price_EUR2005
    From UN trade database. http://data.un.org/ Import data from the largest economies of the world are used (Brazil, India, USA, China, Japan and EU-27).
  property dry mass 1 kg; name DM
  property water content 0; name water_content
  property wet mass 1 kg; name WM
  property water in wet mass 0 kg; name WWM
  property carbon content, fossil 0; name C_content_fossil
  property carbon content 0
    carbon content on a dry matter basis (reserved; not for manual entry)
  property true value 6.35892e-6
    allocation property applied in "true value" allocation // value calculated from revenue
  properties: carbon allocation 0 kg
- aluminium, cast alloy: 0 kg; source European Aluminium Association 2008; By-product classification allocatable product; CPC 41431: Unwrought aluminium; pedigree (1,1,1,1,1)
  EcoSpold01Location=RER
  production volume 0.000212292 kg
  property price 1.3 EUR2005; name castAlloyAmount_price_EUR2005
    Temporary price data. Calculated as 90% of purchasers price based on: Source: London Metal Exchange, Aluminium alloy price for 2005
  property carbon content 0
    carbon content on a dry matter basis (reserved; not for manual entry)
  property true value 0.00027598
    allocation property applied in "true value" allocation // value calculated from revenue
  properties: water in wet mass 0 kg, carbon content, non-fossil 0, water content 0, dry mass 1 kg, carbon content, fossil 0, wet mass 1 kg, carbon allocation 0 kg
- heat, for reuse in municipal waste incineration only: 0 MJ; CPC 17300: Steam and hot water; By-product classification allocatable product; pedigree (1,1,1,1,1)
  Net electricity generated from this waste and used in internal MSWI plant energy redistribution.
  Uncertainty: uncertainty is calculated from uncertainties in waste composition and uncertainties in energy efficiency and the uncertainty in internal energy demand
  production volume 0.00524993 MJ
  property exergy 0.1842 MJ; name E_th_prod_MSWI_exergy
    This exergy property is based on the exergy content of the product.
  property true value relation 0.1842; name E_th_prod_MSWI_true_value_relation
    property to calculate "true value" from
  property price 0.0106 EUR2005; name E_th_prod_MSWI_price_EUR2005
    Average European district heat price from Ecoheatcool and Euroheat 2005-2006, Ecoheat Work package 1: The European heat market. Final report. 10.6 EUR/GJ i s the price of district heat. http://www.solarthermalworld.org/files/Ecoheatcool%20WP1%20Web.pdf?download
  property true value 3.44951e-5
    allocation property applied in "true value" allocation // value calculated from true value relation
- electricity, for reuse in municipal waste incineration only: 0 kWh; CPC 17100: Electrical energy; By-product classification allocatable product; pedigree (1,1,1,1,1)
  (same comment as for heat, for reuse in municipal waste incineration only)
  production volume 0.000744464 kWh
  property exergy 3.6 MJ; name E_el_prod_MSWI_exergy
    This exergy property is based on the exergy content of the product.
  property true value relation 3.6; name E_el_prod_MSWI_true_value_relation
    property to calculate "true value" from
  property price 0.1 EUR2005; name E_el_prod_MSWI_price_EUR2005
    Estimated to be the same price as in case of electricity, medium voltage.
  property true value 9.56006e-5
    (same comment as for heat, for reuse in municipal waste incineration only)
- aluminium, wrought alloy: 0 kg; source European Aluminium Association 2008; By-product classification allocatable product; CPC 4153: Semi-finished products of aluminium or aluminium alloys; pedigree (1,1,1,1,1)
  production volume 9.29374e-5 kg
  property price 1.44 EUR2005; name secondaryAluminiumOutput_price_EUR2005
  properties: wet mass 1 kg, water content 0, carbon content, fossil 0, water in wet mass 0 kg, carbon content, non-fossil 0, dry mass 1 kg, carbon content 0, carbon allocation 0 kg, true value 0.00013383
- zinc concentrate: 0 kg; CPC 14290: Other non-ferrous metal ores and concentrates (other than uranium or thorium ores and concentrates); By-product classification allocatable product
  Calculated value from the knowledge of the properties of both products.
  production volume 1.90625e-10 kg
  property price 0.38 EUR2005; name ByP_price_EUR2005
    Temporary price data. Calculated as 90% of purchasers price based on: Zinc content in concentrate 53%. Concentrate price per kg Zn 86.5% of refined Zn price (13.5% treatment charges according to CHR Metals Limited 2005: Dynamic cost curves. http://www.minecost.com/dynamic.pdf). 2004 zinc price from USGS (2007) Mineral commodity summaries 2007. <http://minerals.usgs.gov/minerals/pubs/mcs/2007/mcs2007.pdf> [Accessed 25 May 2010]
  property zinc content 0.53; name zinc_C_zinc_concentrate
    Zinc content on a dry matter basis. Value taken from teh "zinc mine operation" /GLO dataset.
  property dry mass 1 kg; name DM_zinc_concentrate
  property carbon content 0
    carbon content on a dry matter basis (reserved; not for manual entry)
  property true value 7.24375e-11
    allocation property applied in "true value" allocation // value calculated from revenue
  properties: wet mass 1 kg, water content 0, carbon content, non-fossil 0, carbon content, fossil 0, water in wet mass 0 kg, carbon allocation 0 kg
- iron scrap, sorted, pressed: 0 kg; By-product classification Recyclable; CPC 39310: Slag, dross, scalings and other waste from the manufacture of iron or steel; pedigree (1,1,1,1,1)
  metallic iron scrap removed from ash reamains and recycled.
  Uncertainty: uncertainty is calculated from uncertainties in waste composition and transfer coefficients to soild residues
  production volume 1.16471e-9 kg
  property price 0.175 EUR2005
    Temporary price data. Calculated as 90% of purchasers price based on: 2005 import and export prices (total trades (USD) divided by total weight (kg) in biggest economies of the world: EU27, USA, Brasil, China, India, Japan and Russia) from UN Commodity Trade Statistics Database (http://data.un.org/Explorer.aspxDatabase [Accessed 2011.06.20]). Commodity: Waste or scrap, of cast iron
  property carbon content 0
    carbon content on a dry matter basis (reserved; not for manual entry)
  property true value 2.03824e-10
    allocation property applied in "true value" allocation // value calculated from revenue
  properties: carbon content, non-fossil 0, wet mass 1 kg, dry mass 1 kg, water content 0, carbon content, fossil 0, water in wet mass 0 kg, carbon allocation 0 kg
- manganese dioxide: 0 kg; CPC 34220: Zinc oxide; zinc peroxide; chromium oxides and hydroxides; manganese oxides; iron oxides and hydroxides; earth[…]; By-product classification allocatable product
  EcoSpold01Location=GLO
  production volume 0.0002625 kg
  property price 1.04 EUR2005
    Calculated value based on data from United Nations Commodity Trade Statistics Database (comtrade.un.org). UN comtrade category: 282010 Managanese dioxide. Prices from the year 2005. Using exchange rate of 1EURO = 1.209 USD. Average of price of import into 5 main markets (EU, US, JP, IN and CN).
  property carbon content 0
    carbon content on a dry matter basis (reserved; not for manual entry)
  property true value 0.000273
    allocation property applied in "true value" allocation // value calculated from revenue
  properties: water in wet mass 0 kg, wet mass 1 kg, dry mass 1 kg, carbon content, fossil 0, water content 0, carbon content, non-fossil 0, carbon allocation 0 kg

## Inputs from technosphere
- chemical factory, organics: 3.77245e-10 unit; lognormal variance with pedigree 0.4461, pedigree (5,5,5,3,3)
  EcoSpold01Location=RER
- nitrogen, liquid: 0.00943112 kg; lognormal variance with pedigree 0.0381, pedigree (4,4,4,3,1)
  EcoSpold01Location=RER
  properties: wet mass 1 kg, dry mass 1 kg
- battery separator: 0.0506027 kg; lognormal variance with pedigree 0.0207, pedigree (2,4,4,3,1)
  EcoSpold01Location=CN
  properties: carbon content, fossil 0.603377, dry mass 1 kg, wet mass 1 kg
  note on carbon content, fossil: C content calculated as the addition of the C contents in the final product components
- aluminium, wrought alloy: 0.0155472 kg; lognormal variance with pedigree 0.0207, pedigree (2,4,4,3,1)
  EcoSpold01Location=RER
  properties: dry mass 1 kg, wet mass 1 kg
- ethylene carbonate: 0.150492 kg; lognormal variance with pedigree 0.0207, pedigree (2,4,4,3,1)
  EcoSpold01Location=CN
  properties: dry mass 1 kg, carbon content, fossil 0.409173, wet mass 1 kg
- lithium hexafluorophosphate: 0.017954 kg; lognormal variance with pedigree 0.0207, pedigree (2,4,4,3,1)
  EcoSpold01Location=CN
  properties: wet mass 1 kg, dry mass 1 kg
- extrusion, plastic film: 0.0691207 kg; lognormal variance with pedigree 0.0207, pedigree (2,4,4,3,1)
  EcoSpold01Location=RER
- anode, graphite, for lithium-ion battery: 0.378282 kg; lognormal variance with pedigree 0.0207, pedigree (2,4,4,3,1)
  EcoSpold01Location=CN
  properties: carbon content, fossil 0.523764, dry mass 1 kg, wet mass 1 kg
- used Li-ion battery: -0.0495134 kg; lognormal variance with pedigree 0.0901, pedigree (5,4,4,3,1)
  EcoSpold01Location=GLO
  production volume 0.0525 kg
    Calculated from the production volume of battery cell, Li-ion in proportion to the respective output amounts.
  properties: carbon content, fossil 0.328011, wet mass 1 kg, dry mass 1 kg
- polyethylene, low density, granulate: 0.0691207 kg; lognormal variance with pedigree 0.0207, pedigree (2,4,4,3,1)
  EcoSpold01Location=RER
  properties: dry mass 1 kg, carbon content, fossil 0.857143, wet mass 1 kg
  note on carbon content, fossil: Polyethylene is formed out of a huge amount of ethylene monomers (C2H4) (ecoinvent v2.2 report 11_II). MW=28 g/mol
- sheet rolling, aluminium: 0.0155472 kg; lognormal variance with pedigree 0.3207, pedigree (2,4,4,3,1)
  EcoSpold01Location=RER
- heat, district or industrial, natural gas: 0.061523 MJ; lognormal variance with pedigree 0.0381, pedigree (4,4,4,3,1)
  EcoSpold01Location=RER
- electricity, medium voltage: 0.0995926 kWh; lognormal variance with pedigree 0.048, pedigree (1,1,4,1,1)
  composite
  EcoSpold01Location=CN
- cathode, LiMn2O4, for lithium-ion battery: 0.308266 kg; lognormal variance with pedigree 0.0207, pedigree (2,4,4,3,1)
  EcoSpold01Location=CN
  properties: carbon content, fossil 0.0310613, wet mass 1 kg, dry mass 1 kg

## Sampling procedure
measurements, patent, ecoinvent

## Extrapolations
see Geography

## Review by Christian Bauer 2010-02-08
passed
