# heat pump production, brine-water, 10kW

Dataset: EcoSpold 2, unit process
Geography: RoW
Time period: 1990-01-01 to 2019-12-31
Technology level: current
Classification: EcoSpold01Categories: heat pumps/production of components
Classification: ISIC rev.4 ecoinvent: 2819:Manufacture of other general-purpose machinery
Tags: ConvertedDataset
Scenario: Business-as-Usual
System model: Allocation at the point of substitution
Share of production covered: 0 %
Generated by: Thomas Heck
Published in: Heck, T. 2007
Database: ecoinvent
isCopyrightProtected: true
accessRestrictedTo: 1

## General comment
Average infrastructure of a 10 kW brain-water heat pump.
[This dataset was already contained in the ecoinvent database version 2. It was not individually updated during the transfer to ecoinvent version 3. Life Cycle Impact Assessment results may still have changed, as they are affected by changes in the supply chain, i.e. in other datasets. This dataset was generated following the ecoinvent quality guidelines for version 2. It may have been subject to central changes described in the ecoinvent version 3 change report (http://www.ecoinvent.org/database/ecoinvent-version-3/reports-of-changes/), and the results of the central updates were reviewed extensively. The changes added e.g. consistent water flows and other information throughout the database. The documentation of this dataset can be found in the ecoinvent reports of version 2, which are still available via the ecoinvent website. The change report linked above covers all central changes that were made during the conversion process.]

## Included activities end
The module includes the most important materials used for production. It includes also the transport of these materials, energy and water needed for production. It includes emissions of refrigerant (R134a) during production and scrapping. It does not include emissions during operation. It does not include the borehole heat exchanger. A buffer heat storage is not included.

## Geography
Could be used for European conditions.

## Technology
Brine-water heat pump, 10kW output. Refrigerant R134a.

## Parameters
- fraction, process water, to air: 0.15 dimensionless; name fraction_PW_to_air; lognormal variance with pedigree 0.092025, pedigree (4,4,3,2,4)

## Reference product
- heat pump, brine-water, 10kW: 1 unit; CPC 43913: Refrigerating and freezing equipment and heat pumps, except household type equipment; By-product classification allocatable product
  EcoSpold01Location=CH
  production volume 3.96633 unit
    This is a placeholder value that does not reflect real-world production volumes. This dataset does not currently require a real-world production volume to work in the database framework, and no actual data were collected yet. This has no negative effect on the results of the ecoinvent database.
  property price 523 EUR2005
    EU27 I/O database-68 Electronic machinery (4.02 EURO2003/kg dry soilds) in the 'EU & DK Input Output Database' (available in SimaPro); 131 kg
  property true value 523
    allocation property applied in "true value" allocation // value calculated from revenue

## By-products
- heat, for reuse in municipal waste incineration only: 0 MJ; CPC 17300: Steam and hot water; By-product classification allocatable product; pedigree (1,1,1,1,1)
  Net electricity generated from this waste and used in internal MSWI plant energy redistribution.
  Uncertainty: uncertainty is calculated from uncertainties in waste composition and uncertainties in energy efficiency and the uncertainty in internal energy demand
  production volume 28.6223 MJ
  property exergy 0.1842 MJ; name E_th_prod_MSWI_exergy
    This exergy property is based on the exergy content of the product.
  property price 0.0106 EUR2005; name E_th_prod_MSWI_price_EUR2005
    Average European district heat price from Ecoheatcool and Euroheat 2005-2006, Ecoheat Work package 1: The European heat market. Final report. 10.6 EUR/GJ i s the price of district heat. http://www.solarthermalworld.org/files/Ecoheatcool%20WP1%20Web.pdf?download
  property true value relation 0.1842; name E_th_prod_MSWI_true_value_relation
    property to calculate "true value" from
  property true value 0.046724
    allocation property applied in "true value" allocation // value calculated from true value relation
- electricity, for reuse in municipal waste incineration only: 0 kWh; CPC 17100: Electrical energy; By-product classification allocatable product; pedigree (1,1,1,1,1)
  (same comment as for heat, for reuse in municipal waste incineration only)
  production volume 4.07165 kWh
  property price 0.1 EUR2005; name E_el_prod_MSWI_price_EUR2005
    Estimated to be the same price as in case of electricity, medium voltage.
  property exergy 3.6 MJ; name E_el_prod_MSWI_exergy
    This exergy property is based on the exergy content of the product.
  property true value relation 3.6; name E_el_prod_MSWI_true_value_relation
    property to calculate "true value" from
  property true value 0.129903
    (same comment as for heat, for reuse in municipal waste incineration only)

## Inputs from technosphere
- heat, district or industrial, natural gas: 0 MJ; pedigree (1,1,1,1,1)
  Basic uncertainty:1.05
  EcoSpold01Location=RER
- waste plastic, mixture: 0 kg; pedigree (1,1,1,1,1)
  EcoSpold01Location=CH
  Basic uncertainty:2
  production volume 0 kg
    Calculated from the production volume of heat pump, brine-water, 10kW in proportion to the respective output amounts.
  properties: water content 0.180638, wet mass 1 kg, carbon content, fossil 0.747344, dry mass 0.847 kg
  note on carbon content, fossil: C content in 1 kg DM was calculated using data in Tab A.2, ecoinvent v2.2 report 13_I
- steel, low-alloyed, hot rolled: 19.9932 kg; lognormal variance with pedigree 0.188, pedigree (4,5,5,5,1)
  EcoSpold01Location=RER
  Basic uncertainty:2
  properties: dry mass 1 kg, carbon content, fossil 0.005, wet mass 1 kg
  note on carbon content, fossil: Low alloyed steel composition given in Tab. 3.2 ecoinvent v2.2 report 10_partII. Steel assumed to have a C content of 0.5%
- copper: 21.9926 kg; lognormal variance with pedigree 0.188, pedigree (4,5,5,5,1)
  Basic uncertainty:2
  EcoSpold01Location=RER
  properties: wet mass 1 kg, dry mass 1 kg
- reinforcing steel: 74.9747 kg; lognormal variance with pedigree 0.188, pedigree (4,5,5,5,1)
  Basic uncertainty:2
  EcoSpold01Location=RER
  properties: dry mass 1 kg, wet mass 1 kg, carbon content, fossil 0.004
- refrigerant R134a: 3.08896 kg; lognormal variance with pedigree 0.112, pedigree (1,1,5,5,1)
  EcoSpold01Location=RER
  estimated from range of values
  properties: wet mass 1 kg, dry mass 1 kg, carbon content, fossil 0.235294
- tube insulation, elastomere: 9.99662 kg; lognormal variance with pedigree 0.188, pedigree (4,5,5,5,1)
  EcoSpold01Location=DE
  Basic uncertainty:2
  properties: carbon content, fossil 0.837817, dry mass 1 kg, wet mass 1 kg
  note on carbon content, fossil: The main raw material (93%) is synthetic rubber (Ethylene propylene diene monomer (EPDM)), that is used together with PVC (ecoinvent v2.2 report 7_XV), C2H3Cl
- electricity, medium voltage: 0 kWh; pedigree (1,1,1,1,1)
  EcoSpold01Location=CH
  Basic uncertainty:1.05
- lubricating oil: 1.69943 kg; lognormal variance with pedigree 0.1246, pedigree (3,3,5,5,4)
  Basic uncertainty:1.05
  EcoSpold01Location=RER
  properties: carbon content, fossil 0.75, dry mass 1 kg, wet mass 1 kg
  note on carbon content, fossil: Lubricating oil is produced from diesel. C-content/dry mass of fats and oils considered 75%, from: ecoinvent v2.2 report, n 15a, pg 40
- polyvinylchloride, bulk polymerised: 0.999662 kg; lognormal variance with pedigree 0.188, pedigree (4,5,5,5,1)
  EcoSpold01Location=RER
  Basic uncertainty:2
  properties: carbon content, fossil 0.387097, dry mass 1 kg, wet mass 1 kg
  note on carbon content, fossil: Monomer is vynyl chloride, C2H3Cl (ecoinvent v2.2 report 11_II). MW=62 g/mol
- heat, district or industrial, natural gas: 16.553, 377.172, 935.826 MJ (3 entries); lognormal variance with pedigree 0.1246, pedigree (3,3,5,5,4)
  Basic uncertainty:1.05
  EcoSpold01Location=RER
- waste plastic, mixture: -1.22325, -0.0817327, -0.00618131, -0.0337585, -0.0136381, -0.0320569, -1.04226, -8.56341 kg (8 entries); lognormal variance with pedigree 0.188, pedigree (4,5,5,5,1)
  EcoSpold01Location=CH
  Basic uncertainty:2
  production volume 33 kg
- electricity, medium voltage: 1.47497, 0.268383, 6.19506, 21.0846, 4.55137, 65.9901, 9.44444, 30.9438 kWh (8 entries); lognormal variance with pedigree 0.1246, pedigree (3,3,5,5,4)
  EcoSpold01Location=CH
  Basic uncertainty:1.05

## Inputs from nature
- Water, unspecified natural origin [natural resource, in water]: 0.707761 m3; name water_UNO_input; source Frischknecht R. 1999; lognormal variance with pedigree 0.188, pedigree (4,5,5,5,1)
  Literature value. In Frischknecht 5,4 kg of water is used to produce one kg of compressor or engine. In this dataset this value is used for the production of a heat pump unit.
  Literature value. In Frischknecht 5,4 kg of water is used to produce one kg of compressor or engine. In this dataset this value is used for the production of a heat pump unit.

## Emissions to nature
- Water [water, unspecified]: 0.601597 m3; name water_to_water_unspecified; lognormal variance with pedigree 0.0827, pedigree (2,2,5,5,1)
  Calculated value based on literature values and expert opinion. See comments in the parametres' comment field.
  property fraction, origin: salt water 0; name fraction_origin_salt_water_Ww
  property fraction, origin: unspecified 1; name fraction_origin_unspecified_Ww
  property fraction, origin: fresh water 0; name fraction_origin_fresh_water_Ww
  property carbon content, non-fossil 0; name C_content_non_fossil
  property wet mass 1000 kg; name WM
  property carbon content, fossil 0; name C_content_fossil
  property dry mass 0 kg; name DM
  property water in wet mass 1000 kg; name WWM
- Water [air, unspecified]: 0.106164 m3; name water_to_air_unspecified; lognormal variance with pedigree 0.0827, pedigree (2,2,5,5,1)
  (same comment as for Water)
  property fraction, origin: fresh water 0; name fraction_origin_fresh_water
  property fraction, origin: salt water 0; name fraction_origin_salt_water
  property fraction, origin: unspecified 1; name fraction_origin_unspecified
- Ethane, 1,1,1,2-tetrafluoro-, HFC-134a [air, urban air close to ground]: 0.689767 kg
  estimate based on literature values

## Sampling procedure
Literature, manufacturer information

## Extrapolations
none This dataset has been copied from an original dataset covering the geography CH. The uncertainty has been adjusted accordingly.

## Review by Gerald Rebitzer (obsolete) 2004-06-09
prepared
