# treatment of waste sealing sheet, polyvinylchloride, municipal incineration

Dataset: EcoSpold 2, unit process
Geography: CH
Time period: 1994-01-01 to 2019-12-31
Technology level: outdated
Classification: EcoSpold01Categories: waste management/municipal incineration
Classification: ISIC rev.4 ecoinvent: 3821:Treatment and disposal of non-hazardous waste
Synonyms: PVC
Tags: Treatment; ConvertedDataset
Scenario: Business-as-Usual
System model: Allocation at the point of substitution
Generated by: Gabor Doka (obsolete)
Published in: Doka G. 2007
Database: ecoinvent
isCopyrightProtected: true
accessRestrictedTo: 1

## General comment
Inventoried waste contains 1.7% Glass; 53.9% PVC sealing sheet; 11% Filler (lime); 33.4% plastiziser; .
waste composition (wet, in ppm): upper heating value 23.26 MJ/kg; lower heating value 22.53 MJ/kg; H2O 1387.9; O 124680; H 61320; C 490710; S 1000; N 553.8; P n.a.; B n.a.; Cl 249040; Br 38.689; F 8.1246; I n.a.; Ag n.a.; As 1.2205; Ba 103.08; Cd 1.4498; Co 17.46; Cr 28.23; Cu 14.921; Hg 0.47261; Mn 44.17; Mo n.a.; Ni 11.754; Pb 14601; Sb 23.748; Se 1.1607; Sn 205.09; V 159.26; Zn 33.914; Be 0.27635; Sc n.a.; Sr 48.914; Ti 552.7; Tl 0.22108; W n.a.; Si 6104.5; Fe 2059.2; Ca 45238; Al 110.54; K n.a.; Mg n.a.; Na 1906;
Share of carbon in waste that is biogenic 0%.
Share of iron in waste that is metallic/recyclable 0%.
Net energy produced in MSWI: 2.41MJ/kg waste electric energy and 4.92MJ/kg waste thermal energy
Allocation of energy production: no substitution or expansion. Total burden allocated to waste disposal function of MSWI.
One kg of this waste produces 0.1203 kg of slag and 0.02316 kg of residues, which are landfilled. Additional solidification with 0.009262 kg of cement.
[This dataset was already contained in the ecoinvent database version 2. It was not individually updated during the transfer to ecoinvent version 3. Life Cycle Impact Assessment results may still have changed, as they are affected by changes in the supply chain, i.e. in other datasets. This dataset was generated following the ecoinvent quality guidelines for version 2. It may have been subject to central changes described in the ecoinvent version 3 change report (http://www.ecoinvent.org/database/ecoinvent-version-3/reports-of-changes/), and the results of the central updates were reviewed extensively. The changes added e.g. consistent water flows and other information throughout the database. The documentation of this dataset can be found in the ecoinvent reports of version 2, which are still available via the ecoinvent website. The change report linked above covers all central changes that were made during the conversion process.]

## Included activities end
waste-specific air and water emisions from incineration, auxiliary material consumption for flue gas cleaning. Short-term emissions to river water and long-term emisisons to ground water from slag compartment (from bottom slag) and residual material landfill (from solidified fly ashes and scrubber slugde). Process energy demands for MSWI.

## Geography
Specific to the technology mix encountered in Switzerland in 2000. Well applicable to modern incineration practices in Europe, North America or Japan.

## Technology
replaced by newer incineration technology with fly ash extraction. Average Swiss MSWI plants in 2000 with electrostatic precipitator for fly ash (ESP), wet flue gas scrubber and 29.4% SNCR , 32.2% SCR-high dust , 24.6% SCR-low dust -DeNOx facilities and 13.8% without Denox (by burnt waste, according to Swiss average). Share of waste incinerated in plants with magnetic scrap separation from slag : 50%. Gross electric efficiency technology mix 12.997% and Gross thermal efficiency technology mix 25.57%

## Time period
Waste composition as given in literature reference, theoretical data or other source. Transfer coefficients for modern Swiss MSWI. Emission speciation based on early 90ies data.

## Reference product
- waste sealing sheet, polyvinylchloride: -1 kg; By-product classification Waste; CPC 39270: Waste, parings and scrap of plastics; CAS 9002-86-2
  EcoSpold01Location=CH
  production volume 0 kg
    outdated. Replaced by newer incineration technology with fly ash extraction.
  property price 0 EUR2005
    Waste products are assigned a price of zero as they are assumed to require further treatment.
  property carbon content, fossil 0.435136
    C content in 1 kg DM was calculated using data in Tab A.5, ecoinvent v2.2 report 13_I
  property carbon content 0.435136
    carbon content on a dry matter basis (reserved; not for manual entry)
  properties: water content 0.0166734, wet mass 1 kg, water in wet mass 0.0164 kg, dry mass 0.9836 kg, carbon content, non-fossil 0, carbon allocation 0.428 kg

## Inputs from technosphere
- slag landfill: 2.14e-10 unit; lognormal variance with pedigree 0.08, pedigree (1,1,5,1,1)
  uncertainty is calculated from uncertainties in waste composition and transfer coefficients in incinerator
  EcoSpold01Location=CH
- municipal waste incineration facility: 2.5e-10 unit; lognormal variance with pedigree 0.04, pedigree (1,1,5,1,1)
  demands per kilogram waste. uncertainty is heeded in the module
  EcoSpold01Location=CH
- quicklime, milled, packed: 0.0429 kg; lognormal variance with pedigree 0.1, pedigree (1,1,5,1,1)
  EcoSpold01Location=CH
  uncertainty calculated from uncertainty in average auxiliary material input, and the unertainty of the waste composition of this waste
  properties: water content 0.010101, dry mass 0.99 kg, wet mass 1 kg
- sodium hydroxide, without water, in 50% solution state: 0.243 kg; lognormal variance with pedigree 0.1, pedigree (1,1,5,1,1)
  EcoSpold01Location=RER
  uncertainty calculated from uncertainty in average auxiliary material input, and the unertainty of the waste composition of this waste
  properties: dry mass 1 kg, wet mass 1 kg
- chromium oxide, flakes: 1.63e-8 kg; lognormal variance with pedigree 2.4, pedigree (1,1,5,1,1)
  EcoSpold01Location=RER
  Proxy for vanadium pentoxide V2O5 in SCR catalyst, uncertainty calculated from uncertainty in average DeNOx input, uncertainty in the share of thermal NOx, uncertainty of nitrogen content in average municipal waste and the unertainty in nitrogen content in *this* waste.
  properties: dry mass 1 kg, wet mass 1 kg
- chemical, organic: 6.78e-6 kg; lognormal variance with pedigree 1.34, pedigree (1,1,5,1,1)
  Proxy for TMT15. uncertainty calculated from uncertainty in average auxiliary material input, and the unertainty of the waste composition of this waste
  EcoSpold01Location=GLO
  properties: wet mass 1 kg, carbon content, fossil 0.628, dry mass 1 kg
  note on carbon content, fossil: This dataset is an unweighted average of 20 organic substances (listed in Tab 88.1, ecoinvent v2.2 report 8, part II), being part of the top100 chemicals included in this database. The C-content has also been calculated as an unweighted average of the C content of the substances composing this dataset.
- ammonia, liquid: 2.79e-5 kg; lognormal variance with pedigree 1.69, pedigree (1,1,5,1,1)
  uncertainty calculated from uncertainty in average DeNOx input, uncertainty in the share of thermal NOx, uncertainty of nitrogen content in average municipal waste and the unertainty in nitrogen content in *this* waste.
  EcoSpold01Location=CH
  properties: wet mass 1 kg, dry mass 1 kg
- chemical, inorganic: 0.000729 kg; lognormal variance with pedigree 0.1, pedigree (1,1,5,1,1)
  Proxy for Polyelectrolyte. uncertainty calculated from uncertainty in average auxiliary material input, and the unertainty of the waste composition of this waste
  EcoSpold01Location=GLO
  properties: dry mass 1 kg, carbon content, fossil 0.003, wet mass 1 kg
  note on carbon content, fossil: This dataset is an unweighted average of 20 inorganic substances (listed in Tab 88.1, ecoinvent v2.2 report 8, part II), being part of the top100 chemicals included in this database. The C-content has also been calculated as an unweighted average of the C content of the substances composing this dataset.
- process-specific burdens, slag landfill: 0.12 kg; lognormal variance with pedigree 0.08, pedigree (1,1,5,1,1)
  EcoSpold01Location=CH
  uncertainty is calculated from uncertainties in waste composition and transfer coefficients in incinerator;activityLink introduced to establish a direct link to the corresponding regional supply of this product
- process-specific burdens, municipal waste incineration: 1 kg; lognormal variance with pedigree 0.04, pedigree (1,1,5,1,1)
  EcoSpold01Location=CH
  demands per kilogram waste. uncertainty is heeded in the module;activityLink introduced to establish a direct link to the corresponding regional supply of this product
- heat, district or industrial, natural gas: 0.002448 MJ; lognormal variance with pedigree 1.69, pedigree (1,1,5,1,1)
  uncertainty calculated from uncertainty in average DeNOx input, uncertainty in the share of thermal NOx, uncertainty of nitrogen content in average municipal waste and the unertainty in nitrogen content in *this* waste.
  EcoSpold01Location=RER
- iron (III) chloride, without water, in 40% solution state: 0.000735 kg; lognormal variance with pedigree 0.36, pedigree (1,1,5,1,1)
  (same comment as for quicklime, milled, packed)
  properties: dry mass 1 kg, wet mass 1 kg
- hydrochloric acid, without water, in 30% solution state: 0.000437 kg; lognormal variance with pedigree 0.1, pedigree (1,1,5,1,1)
  uncertainty calculated from uncertainty in average auxiliary material input, and the unertainty of the waste composition of this waste
  EcoSpold01Location=RER
  properties: wet mass 1 kg, dry mass 1 kg
- titanium dioxide: 8e-7 kg; lognormal variance with pedigree 2.4, pedigree (1,1,5,1,1)
  (same comment as for heat, district or industrial, natural gas)
  properties: dry mass 1 kg, wet mass 1 kg
- cement, unspecified: 0.00926 kg; lognormal variance with pedigree 0.16, pedigree (1,1,5,1,1)
  Cement for solidification of landfilled residual material. Uncertainty calculated from unertainty of the waste composition of this waste, of transfer coefficients in the incinerator and of the solidification recipe.
  EcoSpold01Location=CH
  properties: dry mass 1 kg, wet mass 1 kg
- process-specific burdens, residual material landfill: 0.0232 kg; lognormal variance with pedigree 0.15, pedigree (1,1,5,1,1)
  uncertainty is calculated from uncertainties in waste composition and transfer coefficients in incinerator;activityLink introduced to establish a direct link to the corresponding regional supply of this product
  EcoSpold01Location=CH
- waste cement, hydrated: -0.0232 kg; lognormal variance with pedigree 0.16, pedigree (1,1,5,1,1)
  EcoSpold01Location=CH
  Hydrated cement for solidification of landfilled residual material. Uncertainty calculated from unertainty of the waste composition of this waste and transfer coefficients in the incinerator and of the solidification recipe.
  production volume 0 kg; = ABS((Ref('0b626a66-f84e-40ef-9745-6db6272d1acf')*-1)/ Ref('9d4ed2d2-9d38-426d-a55e-be8aad6e62fe')* Ref('9d4ed2d2-9d38-426d-a55e-be8aad6e62fe', 'ProductionVolume'))
    Calculated from the production volume of waste sealing sheet, polyvinylchloride, 1.64% water in proportion to the respective output amounts.
  properties: wet mass 1 kg, dry mass 1 kg
- residual material landfill: 4.82e-11 unit; lognormal variance with pedigree 0.15, pedigree (1,1,5,1,1)
  (same comment as for slag landfill)

## Emissions to nature
- Fluoride [water, ground-, long-term]: 7.25e-6 kg; lognormal variance with pedigree 0.93, pedigree (1,1,5,1,1)
  Long-term emissions from landfilling of incineration residues. uncertainty is calculated from uncertainties in waste composition and transfer coefficients in incinerator and landfills.
- Manganese [water, ground-, long-term]: 3.8e-5 kg; lognormal variance with pedigree 1.2, pedigree (1,1,5,1,1)
  (same comment as for Fluoride)
- Cadmium, ion [water, ground-, long-term]: 2.1e-8 kg; lognormal variance with pedigree 7.21, pedigree (1,1,5,1,1)
  (same comment as for Fluoride)
- Dinitrogen monoxide [air, urban air close to ground]: 2.34e-6 kg; lognormal variance with pedigree 1.8, pedigree (1,1,5,1,1)
  uncertainty calculated from uncertainty in average N-emissions, uncertainty in the share of thermal NOx, uncertainty of nitrogen content in average municipal waste and the unertainty in nitrogen content in *this* waste.
- TOC, Total Organic Carbon [water, ground-, long-term]: 0.0178 kg; lognormal variance with pedigree 0.06, pedigree (1,1,5,1,1)
  (same comment as for Fluoride)
- Barium [air, urban air close to ground]: 1.03e-7 kg; lognormal variance with pedigree 1.02, pedigree (1,1,5,1,1)
  uncertainty is calculated from uncertainties in waste composition and transfer coefficients in incinerator
- Iron, ion [water, surface water]: 7.05e-7 kg; lognormal variance with pedigree 0.6, pedigree (1,1,5,1,1)
  uncertainty is calculated from uncertainties in waste composition and transfer coefficients in incinerator and landfills
- Barium [water, ground-, long-term]: 9.15e-5 kg; lognormal variance with pedigree 1.04, pedigree (1,1,5,1,1)
  (same comment as for Fluoride)
- Chromium, ion [water, surface water]: 7.2e-8 kg; lognormal variance with pedigree 1.18, pedigree (1,1,5,1,1)
  (same comment as for Iron, ion)
- Cobalt [water, ground-, long-term]: 1.53e-5 kg; lognormal variance with pedigree 1.18, pedigree (1,1,5,1,1)
  (same comment as for Fluoride)
- Chloride [water, surface water]: 0.243 kg; lognormal variance with pedigree 0.08, pedigree (1,1,5,1,1)
  (same comment as for Iron, ion)
- COD, Chemical Oxygen Demand [water, ground-, long-term]: 0.0451 kg; lognormal variance with pedigree 0.06, pedigree (1,1,5,1,1)
  (same comment as for Fluoride)
- TOC, Total Organic Carbon [water, surface water]: 3.68e-5 kg; lognormal variance with pedigree 0.5, pedigree (1,1,5,1,1)
  (same comment as for Iron, ion)
- Lead [water, surface water]: 4.07e-7 kg; lognormal variance with pedigree 0.61, pedigree (1,1,5,1,1)
  (same comment as for Iron, ion)
- Tin, ion [water, ground-, long-term]: 0.000103 kg; lognormal variance with pedigree 1.29, pedigree (1,1,5,1,1)
  (same comment as for Fluoride)
- Copper [air, urban air close to ground]: 1.09e-10 kg; lognormal variance with pedigree 1.31, pedigree (1,1,5,1,1)
  (same comment as for Barium)
- Sulfur dioxide [air, urban air close to ground]: 4.26e-6 kg; lognormal variance with pedigree 0.71, pedigree (1,1,5,1,1)
  (same comment as for Barium)
- Mercury [air, urban air close to ground]: 1.62e-14 kg; lognormal variance with pedigree 1.81, pedigree (1,1,5,1,1)
  (same comment as for Barium)
- Barium [water, surface water]: 1.42e-8 kg; lognormal variance with pedigree 1.87, pedigree (1,1,5,1,1)
  (same comment as for Iron, ion)
- Tin, ion [water, surface water]: 7.61e-9 kg; lognormal variance with pedigree 1.08, pedigree (1,1,5,1,1)
  (same comment as for Iron, ion)
- Hydrogen chloride [air, urban air close to ground]: 2.76e-6 kg; lognormal variance with pedigree 0.14, pedigree (1,1,5,1,1)
  (same comment as for Barium)
- Sodium [air, urban air close to ground]: 7.62e-6 kg; lognormal variance with pedigree 0.63, pedigree (1,1,5,1,1)
  (same comment as for Barium)
- Copper, ion [water, ground-, long-term]: 1.21e-5 kg; lognormal variance with pedigree 1.22, pedigree (1,1,5,1,1)
  (same comment as for Fluoride)
- Beryllium [air, urban air close to ground]: 2.76e-10 kg; lognormal variance with pedigree 1.79, pedigree (1,1,5,1,1)
  (same comment as for Barium)
- BOD5, Biological Oxygen Demand [water, ground-, long-term]: 0.0147 kg; lognormal variance with pedigree 0.06, pedigree (1,1,5,1,1)
  (same comment as for Fluoride)
- Nitrate [water, ground-, long-term]: 1.99e-5 kg; lognormal variance with pedigree 0.79, pedigree (1,1,5,1,1)
  (same comment as for Fluoride)
- Copper, ion [water, surface water]: 6.05e-10 kg; lognormal variance with pedigree 1.86, pedigree (1,1,5,1,1)
  (same comment as for Iron, ion)
- Sodium, ion [water, surface water]: 0.000309 kg; lognormal variance with pedigree 0.43, pedigree (1,1,5,1,1)
  (same comment as for Iron, ion)
- Antimony [air, urban air close to ground]: 9.24e-14 kg; lognormal variance with pedigree 1.32, pedigree (1,1,5,1,1)
  (same comment as for Barium)
- Chromium [air, urban air close to ground]: 1.67e-12 kg; lognormal variance with pedigree 1.27, pedigree (1,1,5,1,1)
  (same comment as for Barium)
- Hydrogen fluoride [air, urban air close to ground]: 4.28e-9 kg; lognormal variance with pedigree 1.36, pedigree (1,1,5,1,1)
  (same comment as for Barium)
- Arsenic, ion [water, surface water]: 4.74e-7 kg; lognormal variance with pedigree 1.34, pedigree (1,1,5,1,1)
  (same comment as for Iron, ion)
- Selenium [water, ground-, long-term]: 7.8e-7 kg; lognormal variance with pedigree 1.09, pedigree (1,1,5,1,1)
  (same comment as for Fluoride)
- Sulfate [water, surface water]: 0.000486 kg; lognormal variance with pedigree 0.34, pedigree (1,1,5,1,1)
  (same comment as for Iron, ion)
- Titanium, ion [water, ground-, long-term]: 0.000166 kg; lognormal variance with pedigree 1.14, pedigree (1,1,5,1,1)
  (same comment as for Fluoride)
- Thallium [water, surface water]: 1.35e-10 kg; lognormal variance with pedigree 1.97, pedigree (1,1,5,1,1)
  (same comment as for Iron, ion)
- Beryllium [water, surface water]: 1.72e-10 kg; lognormal variance with pedigree 2.01, pedigree (1,1,5,1,1)
  (same comment as for Iron, ion)
- Zinc [air, urban air close to ground]: 5.12e-10 kg; lognormal variance with pedigree 1.2, pedigree (1,1,5,1,1)
  (same comment as for Barium)
- Zinc, ion [water, ground-, long-term]: 3.08e-6 kg; lognormal variance with pedigree 4.72, pedigree (1,1,5,1,1)
  (same comment as for Fluoride)
- Nickel, ion [water, ground-, long-term]: 1.1e-5 kg; lognormal variance with pedigree 1.24, pedigree (1,1,5,1,1)
  (same comment as for Fluoride)
- Vanadium, ion [water, ground-, long-term]: 2.73e-5 kg; lognormal variance with pedigree 1.67, pedigree (1,1,5,1,1)
  (same comment as for Fluoride)
- COD, Chemical Oxygen Demand [water, surface water]: 9.19e-5 kg; lognormal variance with pedigree 0.51, pedigree (1,1,5,1,1)
  (same comment as for Iron, ion)
- Bromine [air, urban air close to ground]: 1.16e-7 kg; lognormal variance with pedigree 1.14, pedigree (1,1,5,1,1)
  (same comment as for Barium)
- Manganese [water, surface water]: 2.47e-9 kg; lognormal variance with pedigree 1.87, pedigree (1,1,5,1,1)
  (same comment as for Iron, ion)
- Chloride [water, ground-, long-term]: 0.00588 kg; lognormal variance with pedigree 0.07, pedigree (1,1,5,1,1)
  (same comment as for Fluoride)
- Nickel, ion [water, surface water]: 7.37e-9 kg; lognormal variance with pedigree 1.86, pedigree (1,1,5,1,1)
  (same comment as for Iron, ion)
- Silicon [water, surface water]: 2.25e-7 kg; lognormal variance with pedigree 1.55, pedigree (1,1,5,1,1)
  (same comment as for Iron, ion)
- Sodium, ion [water, ground-, long-term]: 0.00159 kg; lognormal variance with pedigree 0.52, pedigree (1,1,5,1,1)
  (same comment as for Fluoride)
- Cyanide [air, urban air close to ground]: 4.98e-7 kg; lognormal variance with pedigree 1.8, pedigree (1,1,5,1,1)
  (same comment as for Dinitrogen monoxide)
- Zinc, ion [water, surface water]: 5.84e-9 kg; lognormal variance with pedigree 0.99, pedigree (1,1,5,1,1)
  (same comment as for Iron, ion)
- Titanium, ion [water, surface water]: 2.66e-9 kg; lognormal variance with pedigree 2.13, pedigree (1,1,5,1,1)
  (same comment as for Iron, ion)
- Fluoride [water, surface water]: 6.25e-7 kg; lognormal variance with pedigree 0.97, pedigree (1,1,5,1,1)
  (same comment as for Iron, ion)
- Ammonia [air, urban air close to ground]: 4.39e-7 kg; lognormal variance with pedigree 1.8, pedigree (1,1,5,1,1)
  (same comment as for Dinitrogen monoxide)
- Bromine [water, ground-, long-term]: 6.77e-6 kg; lognormal variance with pedigree 1.13, pedigree (1,1,5,1,1)
  (same comment as for Fluoride)
- Methane, fossil [air, urban air close to ground]: 6.38e-6 kg; lognormal variance with pedigree 0.091225, pedigree (2,3,5,2,1)
  Confidential data from 5 plants in Switzerland and Germany
  Uncertainty: & basic uncertainty of 1.5; confidential data from 5 plants in Switzerland and Germany
- Manganese [air, urban air close to ground]: 2.41e-13 kg; lognormal variance with pedigree 1.23, pedigree (1,1,5,1,1)
  (same comment as for Barium)
- Nickel [air, urban air close to ground]: 4.91e-13 kg; lognormal variance with pedigree 1.39, pedigree (1,1,5,1,1)
  (same comment as for Barium)
- Cadmium, ion [water, surface water]: 6.58e-10 kg; lognormal variance with pedigree 1.51, pedigree (1,1,5,1,1)
  (same comment as for Iron, ion)
- Cadmium [air, urban air close to ground]: 7.95e-11 kg; lognormal variance with pedigree 1.6, pedigree (1,1,5,1,1)
  (same comment as for Barium)
- Mercury [water, ground-, long-term]: 2.76e-8 kg; lognormal variance with pedigree 3.36, pedigree (1,1,5,1,1)
  (same comment as for Fluoride)
- Carbon dioxide, fossil [air, urban air close to ground]: 1.73 kg; lognormal variance with pedigree 0.05, pedigree (1,1,5,1,1)
  (same comment as for Barium)
- Strontium [air, urban air close to ground]: 4.89e-9 kg; lognormal variance with pedigree 1.13, pedigree (1,1,5,1,1)
  (same comment as for Barium)
- Lead [air, urban air close to ground]: 5.42e-7 kg; lognormal variance with pedigree 0.41, pedigree (1,1,5,1,1)
  (same comment as for Barium)
- DOC, Dissolved Organic Carbon [water, ground-, long-term]: 0.0178 kg; lognormal variance with pedigree 0.06, pedigree (1,1,5,1,1)
  (same comment as for Fluoride)
- Thallium [air, urban air close to ground]: 2.21e-10 kg; lognormal variance with pedigree 1.82, pedigree (1,1,5,1,1)
  (same comment as for Barium)
- Calcium, ion [water, ground-, long-term]: 0.045 kg; lognormal variance with pedigree 0.24, pedigree (1,1,5,1,1)
  (same comment as for Fluoride)
- Titanium [air, urban air close to ground]: 5.53e-7 kg; lognormal variance with pedigree 0.79, pedigree (1,1,5,1,1)
  (same comment as for Barium)
- Arsenic, ion [water, ground-, long-term]: 7.47e-7 kg; lognormal variance with pedigree 1.58, pedigree (1,1,5,1,1)
  (same comment as for Fluoride)
- Selenium [air, urban air close to ground]: 5.84e-15 kg; lognormal variance with pedigree 1.71, pedigree (1,1,5,1,1)
  (same comment as for Barium)
- Selenium [water, surface water]: 3.78e-7 kg; lognormal variance with pedigree 1.27, pedigree (1,1,5,1,1)
  (same comment as for Iron, ion)
- Aluminium [water, surface water]: 9.2e-9 kg; lognormal variance with pedigree 1.26, pedigree (1,1,5,1,1)
  (same comment as for Iron, ion)
- Strontium [water, ground-, long-term]: 4.88e-5 kg; lognormal variance with pedigree 1.1, pedigree (1,1,5,1,1)
  (same comment as for Fluoride)
- Bromine [water, surface water]: 3.19e-5 kg; lognormal variance with pedigree 0.95, pedigree (1,1,5,1,1)
  (same comment as for Iron, ion)
- Cobalt [air, urban air close to ground]: 5.54e-13 kg; lognormal variance with pedigree 1.33, pedigree (1,1,5,1,1)
  (same comment as for Barium)
- BOD5, Biological Oxygen Demand [water, surface water]: 3.75e-5 kg; lognormal variance with pedigree 0.39, pedigree (1,1,5,1,1)
  (same comment as for Iron, ion)
- Cobalt [water, surface water]: 2.99e-9 kg; lognormal variance with pedigree 1.68, pedigree (1,1,5,1,1)
  (same comment as for Iron, ion)
- Nitrogen oxides [air, urban air close to ground]: 1.76e-5 kg; lognormal variance with pedigree 1.8, pedigree (1,1,5,1,1)
  (same comment as for Dinitrogen monoxide)
- Chromium VI [water, ground-, long-term]: 2.43e-6 kg; lognormal variance with pedigree 1.76, pedigree (1,1,5,1,1)
  (same comment as for Fluoride)
- Nitrate [water, surface water]: 7.08e-6 kg; lognormal variance with pedigree 0.56, pedigree (1,1,5,1,1)
  (same comment as for Iron, ion)
- Vanadium, ion [water, surface water]: 1.07e-7 kg; lognormal variance with pedigree 1.15, pedigree (1,1,5,1,1)
  (same comment as for Iron, ion)
- Antimony [water, ground-, long-term]: 1.52e-5 kg; lognormal variance with pedigree 0.98, pedigree (1,1,5,1,1)
  (same comment as for Fluoride)
- DOC, Dissolved Organic Carbon [water, surface water]: 3.68e-5 kg; lognormal variance with pedigree 0.5, pedigree (1,1,5,1,1)
  (same comment as for Iron, ion)
- Iron [air, urban air close to ground]: 6.87e-8 kg; lognormal variance with pedigree 0.65, pedigree (1,1,5,1,1)
  (same comment as for Barium)
- Aluminium [water, ground-, long-term]: 8.18e-5 kg; lognormal variance with pedigree 0.93, pedigree (1,1,5,1,1)
  (same comment as for Fluoride)
- Arsenic [air, urban air close to ground]: 1.07e-14 kg; lognormal variance with pedigree 1.7, pedigree (1,1,5,1,1)
  (same comment as for Barium)
- Strontium [water, surface water]: 3.08e-8 kg; lognormal variance with pedigree 1.81, pedigree (1,1,5,1,1)
  (same comment as for Iron, ion)
- Mercury [water, surface water]: 5.11e-9 kg; lognormal variance with pedigree 1.64, pedigree (1,1,5,1,1)
  (same comment as for Iron, ion)
- Tin [air, urban air close to ground]: 2.72e-7 kg; lognormal variance with pedigree 0.92, pedigree (1,1,5,1,1)
  (same comment as for Barium)
- Lead [water, ground-, long-term]: 0.00104 kg; lognormal variance with pedigree 6.51, pedigree (1,1,5,1,1)
  (same comment as for Fluoride)
- Beryllium [water, ground-, long-term]: 2.23e-7 kg; lognormal variance with pedigree 1.55, pedigree (1,1,5,1,1)
  (same comment as for Fluoride)
- Carbon monoxide, fossil [air, urban air close to ground]: 0.000223 kg; lognormal variance with pedigree 0.690625, pedigree (1,3,5,2,1)
  Literature data from switzerland and germany adapted to plant age distribution in switzerland
  Uncertainty: & basic uncertainty of 5; literature data from switzerland and germany adapted to plant age distribution in switzerland
- Thallium [water, ground-, long-term]: 1.29e-7 kg; lognormal variance with pedigree 1.37, pedigree (1,1,5,1,1)
  (same comment as for Fluoride)
- Aluminium [air, urban air close to ground]: 1.73e-7 kg; lognormal variance with pedigree 1, pedigree (1,1,5,1,1)
  (same comment as for Barium)
- Sulfate [water, ground-, long-term]: 0.00251 kg; lognormal variance with pedigree 0.41, pedigree (1,1,5,1,1)
  (same comment as for Fluoride)
- Iron, ion [water, ground-, long-term]: 0.000965 kg; lognormal variance with pedigree 1.37, pedigree (1,1,5,1,1)
  (same comment as for Fluoride)
- Antimony [water, surface water]: 8.24e-6 kg; lognormal variance with pedigree 1.01, pedigree (1,1,5,1,1)
  (same comment as for Iron, ion)
- Silicon [water, ground-, long-term]: 5.22e-5 kg; lognormal variance with pedigree 6.13, pedigree (1,1,5,1,1)
  (same comment as for Fluoride)
- Vanadium [air, urban air close to ground]: 1.59e-8 kg; lognormal variance with pedigree 0.98, pedigree (1,1,5,1,1)
  (same comment as for Barium)
- Chromium VI [water, surface water]: 7.36e-7 kg; lognormal variance with pedigree 1.11, pedigree (1,1,5,1,1)
  (same comment as for Iron, ion)
- Calcium, ion [water, surface water]: 0.000197 kg; lognormal variance with pedigree 0.7, pedigree (1,1,5,1,1)
  (same comment as for Iron, ion)

## Sampling procedure
waste-specific calculation based on literature data

## Extrapolations
This dataset has been extrapolated from year 2000 to the year of the calculation (2019). The uncertainty has been adjusted accordingly.

## Review by Niels Jungbluth 2003-07-15
Passed. Calculation for standard deviation 95 of, i.e., infrastructure,
land occupation, transport services or other services can differ from
standard Pedigree approach used in this project and figures obtained by
this procedure.
