# maintenance, tanker, for liquid goods other than petroleum and liquefied natural gas

Dataset: EcoSpold 2, unit process
Geography: GLO
Time period: 2007-01-01 to 2019-12-31
Technology level: current
Classification: ISIC rev.4 ecoinvent: 3315:Repair of transport equipment, except motor vehicles
Classification: EcoSpold01Categories: transport systems/ship
Scenario: Business-as-Usual
System model: Allocation at the point of substitution
Generated by: Philippa Notten
Published in: Notten, P.J. 2018
Database: ecoinvent
isCopyrightProtected: true
accessRestrictedTo: 1

## General comment
The dataset represents the maintenance of one tanker for liquid goods other than petroleum and liquefied natural gas with a load capacity (DWT) of 72,000 tonnes.
It is assumed that the ship undergoes two full maintenance regimes (stripping and repainting of all surfaces) and four smaller maintenance regimes (stripping and repainting of the hull) during an assumed 25 year lifetime (Demirel et al., 2013 and Hayman et al., N.d.). The dataset includes the quantity of paint used, emissions of volatiles, and emissions of paint to land and water from stripping and application. The dataset also includes the material and energy required for sandblasting, and emissions of particulates. A 10% replacement of steel over the ship's lifetime is assumed from Johnson & Fet (1998).
References:
Demirel, Y., Khorasanchi, M., Turan, O. and Incecik, A. (2013) On the importance of antifouling coatings regarding ship resistance and powering, Low Carbon Shipping Conference, London, UK.
Hayman, B., Dogliani, M., Kvale, I. and Fet, A. (n.d.) Technologies for reduced environmental impact from ships - Ship building, maintenance and dismantling aspects, TRESHIP Thematic Network: Brussels, Belgium
Johnsen, T. and Fet, A. (1998) Screening Life Cycle Assessment of M/V Color Festival, The Research Council of Norway: Oslo, Norway.

## Included activities start
Maintenance of ship, starting with receiving/obtaining the material inputs required.

## Included activities end
The activity ends with the maintenance of one ship. The dataset includes material consumption (paint, steel and sand), energy consumption (diesel for sandblasting) and emissions from painting (volatiles and paint) and particulates (sandblasting). The dataset does not include the consumption of liquids and oils (e.g. lubricants, refigerants etc.).

## Geography
Data represents global conditions.

## Technology
Sand blasting is the most common medium of abrasive blastive for commercial ships (OECD, 2009).

## Reference product
- iron scrap, unsorted: 1 kg; name waste_iron; CPC 39310: Slag, dross, scalings and other waste from the manufacture of iron or steel; By-product classification Recyclable; pedigree (1,1,1,1,1)
  Estimated waste associated with steel replacement over lifetime. Based on: Ship lightweight mass calculated from IHSF data, Papanikolaou (2014) and Anink & Krikke (2011). 85% of ship mass estimated to be steel ( Jain et al., 2016). 10% replacement of steel during lifetime estimated by Johnson & Fet (1998). Material wastage estimated by Papanikolaou (2014).
  production volume 3.98204e7 kg; = (waste_iron/1*PV)
    Calculated from production volume of reference product using the relative outputs.
  property price 0.149 EUR2005; name waste_iron_price_EUR2005
    Temporary price data. Calculated as 90% of purchasers price based on: estimated at 85% of sorted scrap
  property carbon content 0
    carbon content on a dry matter basis (reserved; not for manual entry)
  property true value 29227.8; name waste_iron_true_value
    allocation property applied in "true value" allocation // value calculated from revenue
  properties: wet mass 1 kg, carbon content, non-fossil 0, dry mass 1 kg, carbon content, fossil 0, water in wet mass 0 kg, water content 0, carbon allocation 0 kg
- maintenance, tanker for liquid goods other than petroleum and liquefied natural gas: 0 unit; By-product classification allocatable product; CPC 87149: Maintenance and repair services of other transport equipment
  production volume 203 unit; name PV
    Estimated value based on annual total tonne.kms of tankers for liquid goods other than petroleum and LNG (calculated from IMO, 2015) and the tonne.km performance (lifetime tonne.kms) of an average tanker for liquid goods other than petroleum and LNG. Lifetime tonne-kilometres derived from annual transport tonne.kms per ship type (calculated from IMO (2015)) and a ship lifetime of 25 years (Demirel et al., 2013; Hayman et al., n.d.). Reference: IMO (2015) Third IMO Greenhouse Gas Study 2014. International Maritime Organization, London; Demirel, Y., Khorasanchi, M., Turan, O. and Incecik, A. (2013) On the importance of antifouling coatings regarding ship resistance and powering, Low Carbon Shipping Conference, London, UK.; Hayman, B., Dogliani, M., Kvale, I. and Fet, A. (n.d.) Technologies for reduced environmental impact from ships - Ship building, maintenance and dismantling aspects, TRESHIP Thematic Network: Brussels, Belgium.
  property price 2.83456e6 EUR2005
    Calculated based on inputs: The price of the product has been calculated as a sum of the values of the material and energy inputs for this product. This value is therefore a rough estimation. It may underestimate the real price since there are additional expenses when producing any product. These expences can include for example labour costs, treatment of waste materials and profit for the producer. Please consider carefully whether this level of data quality is acceptable for your application.
  property true value 2.83456e6
    allocation property applied in "true value" allocation // value calculated from revenue

## By-products
- heat, for reuse in municipal waste incineration only: 0 MJ; CPC 17300: Steam and hot water; By-product classification allocatable product; pedigree (1,1,1,1,1)
  Net electricity generated from this waste and used in internal MSWI plant energy redistribution.
  production volume 1.47735e8 MJ
  property true value relation 0.1842; name E_th_prod_MSWI_true_value_relation
    property to calculate 'true value' from
  property exergy 0.1842 MJ; name E_th_prod_MSWI_exergy
    This exergy property is based on the exergy content of the product.
  property price 0.0106 EUR2005; name E_th_prod_MSWI_price_EUR2005
    Average European district heat price from Ecoheatcool and Euroheat 2005-2006, Ecoheat Work package 1: The European heat market. Final report. 10.6 EUR/GJ i s the price of district heat. http://www.solarthermalworld.org/files/Ecoheatcool%20WP1%20Web.pdf?download
  property true value 1655.82
    allocation property applied in "true value" allocation // value calculated from true value relation
- electricity, for reuse in municipal waste incineration only: 0 kWh; CPC 17100: Electrical energy; By-product classification allocatable product; pedigree (1,1,1,1,1)
  (same comment as for heat, for reuse in municipal waste incineration only)
  production volume 1.98647e7 kWh
  property price 0.1 EUR2005; name E_el_prod_MSWI_price_EUR2005
    Estimated to be the same price as in case of electricity, medium voltage.
  property exergy 3.6 MJ; name E_el_prod_MSWI_exergy
    This exergy property is based on the exergy content of the product.
  property true value relation 3.6; name E_el_prod_MSWI_true_value_relation
    property to calculate 'true value' from
  property true value 4349.55
    (same comment as for heat, for reuse in municipal waste incineration only)
- zinc concentrate: 0 kg; CPC 14290: Other non-ferrous metal ores and concentrates (other than uranium or thorium ores and concentrates); By-product classification allocatable product
  Calculated value from the knowledge of the properties of both products.
  production volume 2781.69 kg
  property price 0.38 EUR2005; name ByP_price_EUR2005
    Temporary price data. Calculated as 90% of purchasers price based on: Zinc content in concentrate 53%. Concentrate price per kg Zn 86.5% of refined Zn price (13.5% treatment charges according to CHR Metals Limited 2005: Dynamic cost curves. http://www.minecost.com/dynamic.pdf). 2004 zinc price from USGS (2007) Mineral commodity summaries 2007. <http://minerals.usgs.gov/minerals/pubs/mcs/2007/mcs2007.pdf> [Accessed 25 May 2010]
  property zinc content 0.53; name zinc_C_zinc_concentrate
    Zinc content on a dry matter basis. Value taken from teh "zinc mine operation" /GLO dataset.
  property dry mass 1 kg; name DM_zinc_concentrate
  property carbon content 0
    carbon content on a dry matter basis (reserved; not for manual entry)
  property true value 0.00103911
    allocation property applied in "true value" allocation // value calculated from revenue
  properties: wet mass 1 kg, water content 0, carbon content, non-fossil 0, carbon content, fossil 0, water in wet mass 0 kg, carbon allocation 0 kg

## Inputs from technosphere
- waste foundry sand: -0.0247194 kg; name waste_sand; lognormal variance with pedigree 0.1292, pedigree (5,5,5,4,4)
  Based on: Ship lightweight mass calculated from IHSF data, Papanikolaou (2014) data and Anink & Krikke (2011) data. Sand usage during maintenance estimated by Johnson & Fet (1998) and the assumption that all sand not lost to the air or water goes to waste. It is assumed that the ship undergoes 2 full maintenance regimes (stripping and repainting of all surfaces) and 4 smaller (stripping and repainting of the hull) during its 25 year lifetime (Demirel et al. (2013); Hayman et al. (N.d.)). Sand blasting assumed as abrasive blasting is most common for commercial ships OECD (2009). Foundry waste sand used as proxy for sandblasting sand waste.
  production volume 9.66491e7 kg; = (waste_sand/1)*PV
    Calculated from production volume of reference product using the relative outputs.
  property price 0 EUR2005; name waste_sand_price_EUR2005
  properties: dry mass 0.965 kg, water content 0.0362694, carbon content, fossil 0.05, wet mass 1 kg
- waste paint: 0 kg; name waste_paint; pedigree (1,1,1,1,1)
  Waste paint from stripping and maintenance. Based on: Ship lightweight mass calculated from IHSF data, Papanikolaou (2014) and Anink & Krikke (2011). Paint usage data estimated by Kameyama et al. (n.d.), Harish & Sunil (2014) and Nicolae et al. (2014). Paint emission data from OECD (2009). It is assumed that the ship undergoes 2 full maintenance regimes (stripping and repainting of all surfaces) and 4 smaller (stripping and repainting of the hull) during its 25 year lifetime (Demirel et al. (2013); Hayman et al. (N.d.)).
  production volume 0 kg
    Calculated from production volume of reference product using the relative outputs.
  property price 0 EUR2005; name waste_paint_price_EUR2005
  properties: dry mass 1 kg, carbon content, fossil 0.65, wet mass 1 kg
- alkyd paint, white, without solvent, in 60% solution state: 0 kg; pedigree (1,1,1,1,1)
  EcoSpold01Location=RER
  Paint amount adjusted to be non-VOC content (asumed 45% VOC after OECD, 2009). Paint amount based on: Ship lightweight mass calculated from IHSF data, Papanikolaou (2014) and Anink & Krikke (2011). Paint usage data estimated by Kameyama et al. (n.d.), Harish & Sunil (2014) and Nicolae et al. (2014). It is assumed that the ship undergoes 2 full maintenance regimes (stripping and repainting of all surfaces) and 4 smaller (stripping and repainting of the hull) during its 25 year lifetime (Demirel et al. (2013); Hayman et al. (N.d.)).
  properties: carbon content, fossil 0.140367, dry mass 1 kg, wet mass 1 kg, carbon content, non-fossil 0.199629
  note on carbon content, fossil: C content was calculated as an addition of C content in the raw materials.
- sand: 0 kg; pedigree (1,1,1,1,1)
  Based on: Ship lightweight mass calculated from IHSF data, Papanikolaou (2014) and Anink & Krikke (2011). Sand usage during maintenance estimated by Johnson & Fet (1998). It is assumed that the ship undergoes 2 full maintenance regimes (stripping and repainting of all surfaces) and 4 smaller (stripping and repainting of the hull) during its 25 year lifetime (Demirel et al. (2013); Hayman et al. (N.d.)). Sand blasting assumed as abrasive blasting is most common for commercial ships OECD (2009).
  properties: wet mass 1 kg, dry mass 1 kg
- reinforcing steel: 0.0950567 kg; lognormal variance with pedigree 0.1292, pedigree (5,5,5,4,4)
  Steel replacement over lifetime, including estimated wastage percentage. Based on: Ship lightweight mass calculated from IHSF data, Papanikolaou (2014) and Anink & Krikke (2011). 85% of ship mass estimated to be steel ( Jain et al., 2016). 10% replacement of steel during lifetime estimated by Johnson & Fet (1998). Material wastage data estimated by Papanikolaou (2014).
  properties: carbon content, fossil 0.004, wet mass 1 kg, dry mass 1 kg
- diesel, burned in building machine: 0.00270663 MJ; lognormal variance with pedigree 0.1292, pedigree (5,5,5,4,4)
  Diesel for sandblasting (compressor) approximated by "diesel burned in building machine, GLO 2001" with 0.0234 kg diesel burnt per MJ produced. Mass of diesel based on: Ship lightweight mass calculated from IHSF data, Papanikolaou (2014) and Anink & Krikke (2011). Diesel usage during sand blasting estimated by Johnson & Fet (1998). It is assumed that the ship undergoes 2 full maintenance regimes (stripping and repainting of all surfaces) and 4 smaller (stripping and repainting of the hull) during its 25 year lifetime (Demirel et al. (2013); Hayman et al. (N.d.)). Sand blasting assumed as abrasive blasting is most common for commercial ships OECD (2009).
- waste paint: -0.00253314, -5.88929e-6, -0.0269728 kg (3 entries); lognormal variance with pedigree 0.1292, pedigree (5,5,5,4,4)
  (same comment as for waste paint)
  production volume 1.15387e8 kg
- alkyd paint, white, without solvent, in 60% solution state: 0.00495532, 0.0235235 kg (2 entries); lognormal variance with pedigree 0.1292, pedigree (5,5,5,4,4)
  (same comment as for alkyd paint, white, without solvent, in 60% solution state)
- sand: 2.163e-6, 0.00041664, 4.98853e-6, 0.0271132 kg (4 entries); lognormal variance with pedigree 0.1292, pedigree (5,5,5,4,4)
  (same comment as for sand)

## Emissions to nature
- Solids, inorganic [water, unspecified]: 0.0027537 kg; lognormal variance with pedigree 0.1686, pedigree (5,5,5,4,4)
  10% of sand used in blasting assumed to end up in water (after Johnsen & Fet (1998)). Amount of sand used in blasting based on: Ship lightweight mass calculated from IHSF data, Papanikolaou (2014) and Anink & Krikke (2011). Sand usage and loss to water during maintenance estimated by Johnson & Fet (1998). It is assumed that the ship undergoes 2 full maintenance regimes (stripping and repainting of all surfaces) and 4 smaller (stripping and repainting of the hull) during its 25 year lifetime (Demirel et al. (2013); Hayman et al. (N.d.)). Sand blasting assumed as abrasive blasting is most common for commercial ships OECD (2009). Inorganics solids to water used as a proxy for sand to water emissions.
- Hydrocarbons, unspecified [soil, unspecified]: 0.00165577 kg; lognormal variance with pedigree 0.1686, pedigree (5,5,5,4,4)
  Paint to land from stripping and repainting. Based on: Ship lightweight mass calculated from IHSF data, Papanikolaou (2014) and Anink & Krikke (2011). Paint usage data estimated by Kameyama et al. (n.d.), Harish & Sunil (2014) and Nicolae et al. (2014). Paint emission data from OECD (2009). It is assumed that the ship undergoes 2 full maintenance regimes (stripping and repainting of all surfaces) and 4 smaller (stripping and repainting of the hull) during its 25 year lifetime (Demirel et al. (2013); Hayman et al. (N.d.)). Unspecified hydrocarbons to land used as a proxy for paint emissions to land.
- Hydrocarbons, unspecified [water, unspecified]: 0.00165577 kg; lognormal variance with pedigree 0.4286, pedigree (5,5,5,4,4)
  Paint to water from stripping and repainting. Based on: Ship lightweight mass calculated from IHSF data, Papanikolaou (2014) and Anink & Krikke (2011). Paint usage data estimated by Kameyama et al. (n.d.), Harish & Sunil (2014) and Nicolae et al. (2014). Paint emission data from OECD (2009). It is assumed that the ship undergoes 2 full maintenance regimes (stripping and repainting of all surfaces) and 4 smaller (stripping and repainting of the hull) during its 25 year lifetime (Demirel et al. (2013); Hayman et al. (N.d.)). Unspecified hydrocarbons used as a proxy for paint emissions to ocean.
- NMVOC, non-methane volatile organic compounds, unspecified origin [air, non-urban air or from high stacks]: 0.0233009 kg; lognormal variance with pedigree 0.124, pedigree (1,1,3,5,1)
  Based on: Ship lightweight mass calculated from IHSF data, Papanikolaou (2014) and Anink & Krikke (2011). Paint usage data estimated by Kameyama et al. (n.d.), Harish & Sunil (2014) and Nicolae et al. (2014). VOC percentage of 45% from OECD (2009). It is assumed that the ship undergoes 2 full maintenance regimes (stripping and repainting of all surfaces) and 4 smaller (stripping and repainting of the hull) during its 25 year lifetime (Demirel et al. (2013); Hayman et al. (N.d.)).
- Particulates, > 2.5 um, and < 10um [air, non-urban air or from high stacks]: 1.51003e-5 kg; lognormal variance with pedigree 0.4286, pedigree (5,5,5,4,4)
  Particulates to air during sandblasting. Based on: Ship lightweight mass calculated from IHSF data, Papanikolaou (2014) and Anink & Krikke (2011). Sand usage and loss to air during maintenance estimated by Johnson & Fet (1998). Particulate size distribution from sand blasting from US EPA 1995. It is assumed that the ship undergoes 2 full maintenance regimes (stripping and repainting of all surfaces) and 4 smaller (stripping and repainting of the hull) during its 25 year lifetime (Demirel et al. (2013); Hayman et al. (N.d.)). Sand blasting assumed as abrasive blasting is most common for commercial ships OECD (2009).
- Particulates, > 10 um [air, non-urban air or from high stacks]: 4.72755e-5 kg; lognormal variance with pedigree 0.2486, pedigree (5,5,5,4,4)
  (same comment as for Particulates, > 2.5 um, and < 10um)
- Particulates, < 2.5 um [air, non-urban air or from high stacks]: 1.51003e-6 kg; lognormal variance with pedigree 0.4286, pedigree (5,5,5,4,4)
  (same comment as for Particulates, > 2.5 um, and < 10um)

## Sampling procedure
Literature studies.
