# ethyl tert-butyl ether production, from bioethanol

Dataset: EcoSpold 2, unit process
Geography: RER
Time period: 1998-01-01 to 2019-12-31
Technology level: current
Classification: ISIC rev.4 ecoinvent: 19a: Liquid and gaseous fuels from biomass
Classification: EcoSpold01Categories: biomass/fuels
Synonyms: 2-methyl-2-ethoxypropane; 2-ethoxy-2-methylpropane; ethyl tert-butyl ether; ethyl tert-butyl oxide; ethyl tertiary butyl ether; ethyl tertio butyl ether; ETBE; tert-butyl ethyl ether
Tags: ConvertedDataset
Scenario: Business-as-Usual
System model: Allocation at the point of substitution
Share of production covered: 0 %
Generated by: Edgard Gnansounou
Published in: Jungbluth N. 2007
Database: ecoinvent
isCopyrightProtected: true
accessRestrictedTo: 1

## General comment
Inventory refers to the production of 1 kg ETBE, at the oil refinery. ETBE can be incorporated at up to 15% vol. in gasoline, as an oxygenate, according to the current (2005) European Norms. Anhydrous bioethanol is produced from rye, in the RER context. Naphtha is used as a proxy dataset for isobutene. This process is applied in France and Spain and possibly in Germany. Fossil and biogenic carbon contents are respectively 45.4% and 25.4%, according to the respective shares of isobutene (53% wt.) and ethanol (47% wt.).
[This dataset was already contained in the ecoinvent database version 2. It was not individually updated during the transfer to ecoinvent version 3. Life Cycle Impact Assessment results may still have changed, as they are affected by changes in the supply chain, i.e. in other datasets. This dataset was generated following the ecoinvent quality guidelines for version 2. It may have been subject to central changes described in the ecoinvent version 3 change report (http://www.ecoinvent.org/database/ecoinvent-version-3/reports-of-changes/), and the results of the central updates were reviewed extensively. The changes added e.g. consistent water flows and other information throughout the database. The documentation of this dataset can be found in the ecoinvent reports of version 2, which are still available via the ecoinvent website. The change report linked above covers all central changes that were made during the conversion process.]

## Included activities end
This process includes the production of ethyl tert-butyl ether (ETBE), at the oil refinery. ETBE is the result of the reaction between 45.1% wt. anhydrous ethanol from biomass and 54.9% wt. isobutene (side-product of oil refineries).

## Geography
Mainly based on EU studies. ETBE is largely produced in France, Spain and possibly soon in Germany.

## Technology
Production of ETBE according to the IFP technology

## Time period
Data from 1998 to 2002, current technology

## Parameters
- fraction, tap water, to air: 0.15; name fraction_TW_to_air; = fraction_PW_to_air; lognormal variance with pedigree 0.092025, pedigree (4,4,3,2,4)
  Calculated value. See comment in the other parametres present in this dataset. Tap water is considered to be always used as process water, thus process water fractions to air are applied to all tap water input flows to calculate the amount of water consumed in the processes.
- fraction, process water, to air: 0.15 dimensionless; name fraction_PW_to_air; lognormal variance with pedigree 0.092025, pedigree (4,4,3,2,4)
  Literature value. In case when no industry/process specific data are available, default evaporation fraction value is used. This value is 15% and is based on literature (Statistics Canada, 2007 & Shaffer, K.H., 2008, Consumptive water use in the Great Lakes Basin, USGS & Shiklomanov, 2003, World Water Resources at the Beginning of the 21st Century) and has been approved by an expert.

## Reference product
- ethyl tert-butyl ether: 1 kg; By-product classification allocatable product; CPC 35491: Biodiesel; CAS 637-92-3
  EcoSpold01Location=RER
  production volume 1.32237 kg
    This is a placeholder value that does not reflect real-world production volumes. This dataset does not currently require a real-world production volume to work in the database framework, and no actual data were collected yet. This has no negative effect on the results of the ecoinvent database. The placeholder value of this activity was scaled according to the nominal GDP of 2005 (source: United Nations, http://data.un.org/Glossary.aspx?q=GDP+%28current+US%24%29, accessed 20130726) to reflect an appropriate share of the global production volume, which is also a placeholder value.
  property carbon content 0.699
    carbon content on a dry matter basis (reserved; not for manual entry)
  property true value 1.57
    allocation property applied in "true value" allocation // value calculated from revenue
  properties: price 1.57 EUR2005, water content 0, carbon content, fossil 0.454, dry mass 1 kg, wet mass 1 kg, carbon content, non-fossil 0.245, water in wet mass 0 kg, carbon allocation 0.699 kg

## By-products
- heat, for reuse in municipal waste incineration only: 0 MJ; CPC 17300: Steam and hot water; By-product classification allocatable product; pedigree (1,1,1,1,1)
  Net electricity generated from this waste and used in internal MSWI plant energy redistribution.
  Uncertainty: uncertainty is calculated from uncertainties in waste composition and uncertainties in energy efficiency and the uncertainty in internal energy demand
  production volume 0.000140087 MJ
  property exergy 0.1842 MJ; name E_th_prod_MSWI_exergy
    This exergy property is based on the exergy content of the product.
  property price 0.0106 EUR2005; name E_th_prod_MSWI_price_EUR2005
    Average European district heat price from Ecoheatcool and Euroheat 2005-2006, Ecoheat Work package 1: The European heat market. Final report. 10.6 EUR/GJ i s the price of district heat. http://www.solarthermalworld.org/files/Ecoheatcool%20WP1%20Web.pdf?download
  property true value relation 0.1842; name E_th_prod_MSWI_true_value_relation
    property to calculate "true value" from
  property true value 2.68234e-7
    allocation property applied in "true value" allocation // value calculated from true value relation
- electricity, for reuse in municipal waste incineration only: 0 kWh; CPC 17100: Electrical energy; By-product classification allocatable product; pedigree (1,1,1,1,1)
  (same comment as for heat, for reuse in municipal waste incineration only)
  production volume 1.96972e-5 kWh
  property true value relation 3.6; name E_el_prod_MSWI_true_value_relation
    property to calculate "true value" from
  property price 0.1 EUR2005; name E_el_prod_MSWI_price_EUR2005
    Estimated to be the same price as in case of electricity, medium voltage.
  property exergy 3.6 MJ; name E_el_prod_MSWI_exergy
    This exergy property is based on the exergy content of the product.
  property true value 7.28962e-7
    (same comment as for heat, for reuse in municipal waste incineration only)
- zinc concentrate: 0 kg; CPC 14290: Other non-ferrous metal ores and concentrates (other than uranium or thorium ores and concentrates); By-product classification allocatable product
  Calculated value from the knowledge of the properties of both products.
  production volume 2.6648e-9 kg
  property price 0.38 EUR2005; name ByP_price_EUR2005
    Temporary price data. Calculated as 90% of purchasers price based on: Zinc content in concentrate 53%. Concentrate price per kg Zn 86.5% of refined Zn price (13.5% treatment charges according to CHR Metals Limited 2005: Dynamic cost curves. http://www.minecost.com/dynamic.pdf). 2004 zinc price from USGS (2007) Mineral commodity summaries 2007. <http://minerals.usgs.gov/minerals/pubs/mcs/2007/mcs2007.pdf> [Accessed 25 May 2010]
  property zinc content 0.53; name zinc_C_zinc_concentrate
    Zinc content on a dry matter basis. Value taken from teh "zinc mine operation" /GLO dataset.
  property dry mass 1 kg; name DM_zinc_concentrate
  property carbon content 0
    carbon content on a dry matter basis (reserved; not for manual entry)
  property true value 9.88528e-11
    allocation property applied in "true value" allocation // value calculated from revenue
  properties: wet mass 1 kg, water content 0, carbon content, non-fossil 0, carbon content, fossil 0, water in wet mass 0 kg, carbon allocation 0 kg

## Inputs from technosphere
- heat, district or industrial, natural gas: 2.8687 MJ; lognormal variance with pedigree 0.0501, pedigree (1,2,5,1,1)
  Literature survey, ETBE synthesis chemical reaction, industrial data
  EcoSpold01Location=RER
  Uncertainty: Literature survey, ETBE synthesis chemical reaction, industrial data
- naphtha: 0.53 kg; lognormal variance with pedigree 0.0501, pedigree (1,2,5,1,1)
  Literature survey, ETBE synthesis chemical reaction (naphtha is used a a proxy dataset for isobutene)
  EcoSpold01Location=RER
  Uncertainty: Literature survey, ETBE synthesis chemical reaction (naphtha is used a a proxy dataset for isobutene)
  properties: dry mass 1 kg, carbon content, fossil 0.919743, wet mass 1 kg
  note on carbon content, fossil: C-content was calculated using data from Tab 3.20, ecoinvent v2.2 report 6_IV CO2 emmissions and High heating value.
- tap water: 0.62 kg; name tap_water_input; lognormal variance with pedigree 0.0501, pedigree (1,2,5,1,1)
  (same comment as for heat, district or industrial, natural gas)
  properties: carbon content, fossil 0.00178991, water content 2962.17, dry mass 0.000337476 kg, wet mass 1 kg
  note on carbon content, fossil: Bicarbonate content is 2.93 mol/m3. CO2 content is 0.1 mol/m3 (ecoinvent v2.2 report 8, Tab 93.1).
- petroleum refinery: 4.933e-11 unit; lognormal variance with pedigree 0.3501, pedigree (1,2,5,1,1)
  Calculations, according to production capacity of the refinery
  EcoSpold01Location=RER
  Uncertainty: Calculations, according to production capacity of the refinery
- wastewater, average: 0 m3; pedigree (1,1,1,1,1)
  Used water
  EcoSpold01Location=CH
  Uncertainty: Used water
  production volume 0 m3
    Calculated from the production volume of ethyl tert-butyl ether in proportion to the respective output amounts.
  properties: water content 2882.2, dry mass 0.346837 kg, carbon content, non-fossil 0.194039, wet mass 1000 kg
  note on carbon content, non-fossil: 0.0673 kg TOC/m3 (Tab A.17, ecoinvent v2.2 report 13_I). TOC was considered as Total Carbon.
- ethanol, without water, in 99.7% solution state, from fermentation: 0.47023 kg; lognormal variance with pedigree 0.0501, pedigree (1,2,5,1,1)
  EcoSpold01Location=RER
  Literature survey, ETBE synthesis chemical reaction (naphtha is used a a proxy dataset for isobutene)
  Uncertainty: Literature survey, ETBE synthesis chemical reaction (naphtha is used a a proxy dataset for isobutene)
  properties: dry mass 1 kg, carbon content, non-fossil 0.521739, wet mass 1 kg
- electricity, medium voltage: 0.023973 kWh; lognormal variance with pedigree 0.0501, pedigree (1,2,5,1,1)
  EcoSpold01Location=UCTE
  Literature survey, ETBE synthesis chemical reaction, industrial data
  Uncertainty: Literature survey, ETBE synthesis chemical reaction, industrial data
- wastewater, average: -0.000559475, -6.05247e-5 m3 (2 entries); lognormal variance with pedigree 0.0607, pedigree (2,4,5,3,3)
  Used water
  EcoSpold01Location=CH
  Uncertainty: Used water
  production volume 0.00062 m3

## Emissions to nature
- Ethanol [air, urban air close to ground]: 0.000235 kg; lognormal variance with pedigree 0.126, pedigree (4,5,5,5,3)
  Losses 0.05% according to product properties
  Uncertainty: Losses 0.05% according to product properties
- Water [air, unspecified]: 9.29999e-5 m3; name water_to_air_unspecified; = (tap_water_input/1000*fraction_TW_to_air); lognormal variance with pedigree 0.0807, pedigree (2,2,5,1,1)
  Calculated value based on literature values and expert opinion. See comments in the parametres' comment field.
  property fraction, origin: salt water 0; name fraction_origin_salt_water
  property fraction, origin: unspecified 0; name fraction_origin_unspecified
  property fraction, origin: fresh water 1; name fraction_origin_fresh_water

## Review by Niels Jungbluth 2006-07-12
Passed.
none
