# seed-cotton production, conventional

Dataset: EcoSpold 2, unit process
Geography: IN-GJ
Time period: 2015-11-12 to 2019-11-12
Technology level: current
Classification: ISIC rev.4 ecoinvent: 0116:Growing of fibre crops
Scenario: Business-as-Usual
System model: Allocation at the point of substitution
Generated by: Mireille Faist Emmenegger
Published in: Faist Emmenegger, M. 2018
Database: ecoinvent
isCopyrightProtected: true
accessRestrictedTo: 1

## General comment
This inventory dataset exclusively covers the field activity for the production of 1kg seed-cotton in the Gujarat state in India in 2016-17.
Total yield is 1'750 kg/ha. The production of seed cotton involved inputs of land tillage (ridge tillage), irrigation, seeds, mineral fertilizers (urea, ammonium phosphate), pesticides and compost.
Cotton requires 6 to 8 months to mature. Its time of sowing and harvesting differs in different parts of the country depending upon the climatic conditions. In Punjab and Haryana it is sown in April-May and is harvested in December-January that is before the winter frost can damage the crop. In the peninsular part of India, it is sown upto October and harvested between January and May because there is no danger of winter frost in these areas. Cotton quickly exhausts the fertility of soil, therefore, regular application of manures and fertilizers to the soils is very necessary.
The seed cotton activity culminates in the harvesting of seed cotton from the field. Since picking of cotton is not yet mechanized, and mostly done manually. Normally the picking season is spread over a period of about three months. Cotton plants demand water during the active growth phase and dry weather is need at the maturity as the cotton boll opens. About one-third of the total area under cotton cultivation is irrigated. In this dataset, the amount of irrigation needed is included and the irrigation process is covered in a different dataset. The activity for this dataset ends here right after the harvesting operation.

## Included activities start
The activity starts after the harvest of the previous crop and receipt of the inputs of seeds, mineral fertilizers, pesticides, and irrigation water at the field. Machinery and fixed overhead are excluded.

## Included activities end
The activity ends at the harvesting of seed-cotton in the field.

## Geography
The data has been collected from state of Gujarat in India

## Time period
The data were collected for 2015-2016 cropping season. The same cultivation practice has been practised over the last couple of decades with increased mechanization in tillage and irrigation. In the near future, the scope of changes in the current cultivation paradigm is low. It means that the dataset will remain valid for the next decade or so.

## Reference product
- seed-cotton: 1 kg; By-product classification allocatable product; CPC 01921: Cotton, whether or not ginned
  production volume 1.598e9 kg; = 94*100000*170
    ata estimate for 2015-16. Source: http://cotcorp.gov.in/current-cotton.aspx?pageid=4
  property price 0.411019 EUR2005
    Literature value. Price from FAOSTAT data Producer Prices - Annual (retrieved from: http://www.fao.org/faostat/en/#data/PP, accessed 15Feb2018). Data from 2005.
  property carbon content 0.475
    carbon content on a dry matter basis (reserved; not for manual entry)
  properties: dry mass 0.923 kg, carbon content, non-fossil 0.475, carbon content, fossil 0, water in wet mass 0.077 kg, water content 0.0834236, wet mass 1 kg, carbon allocation 0.438425 kg

## Inputs from technosphere
- tillage, harrowing, by rotary harrow: 0.00178882 ha; lognormal variance with pedigree 0.0034, pedigree (2,4,2,1,1)
  The data was collected for a hectare area through interview
- nitrogen fertiliser, as N: 0.0302857 kg; lognormal variance with pedigree 0.0034, pedigree (2,4,2,1,1)
  The data was collected for a hectare area through interview
  properties: dry mass 1 kg, wet mass 1 kg
- transport, tractor and trailer, agricultural: 0.117955 metric ton*km; lognormal variance with pedigree 0.1228, pedigree (2,4,2,1,1)
  The data was collected for a hectare area through interview
- pesticide, unspecified: 0.000411429 kg; lognormal variance with pedigree 0.0034, pedigree (2,4,2,1,1)
  Calculated Value. This value has been calculated by using the Ecoinvent LCI calculation tool for crop production.
  properties: carbon content, fossil 0.486978, wet mass 1 kg, dry mass 1 kg
- phosphate fertiliser, as P2O5: 0.0325714 kg; lognormal variance with pedigree 0.0034, pedigree (2,4,2,1,1)
  The data was collected for a hectare area through interview
  properties: dry mass 1 kg, wet mass 1 kg
- packaging, for pesticides: 0.000926857 kg; lognormal variance with pedigree 0.0514, pedigree (4,3,2,5,4)
  Total amount of active substance/s of pesticides needed for the production of seed-cotton is calculated to be circa 4.63E-04 kg. Pesticide/s used in this dataset is/are: 'cyclic N-compound', 'pesticide, unspecified'. The total amount of active substance/s is doubled in order to account for the packaging of the dilluted product of pesticide/s that is/are applied. Therefore, 9.27E-04 kg of packaging for pesticides is justified with this exchange.
  properties: carbon content, fossil 0.85714, wet mass 1 kg, price 0.0642 EUR2005, dry mass 1 kg
- cyclic N-compound: 5.2e-5 kg; lognormal variance with pedigree 0.0034, pedigree (2,4,2,1,1)
  properties: dry mass 1 kg, wet mass 1 kg, carbon content, fossil 0.641962
- urea, as N: 0.121143 kg; lognormal variance with pedigree 0.0034, pedigree (2,4,2,1,1)
  The data was collected for a hectare area through interview.
  properties: wet mass 1 kg, carbon content, fossil 0.2, dry mass 1 kg
- land use change, annual crop: 0.00017642 ha; lognormal variance with pedigree 0.0034, pedigree (2,4,2,1,1)
  (same comment as for pesticide, unspecified)
- packaging, for fertilisers: 0.368 kg; lognormal variance with pedigree 0.0514, pedigree (4,3,2,5,4)
  Total amount of active substance/s of fertilisers needed for the production of 'seed-cotton' is calculated to be circa 1.84E-01 kg. Fertiliser/s used in this dataset is/are: 'nitrogen fertiliser, as N', 'phosphate fertiliser, as P2O5', 'urea, as N'. The total amount of active substance/s is doubled in order to account for the packaging of the dilluted product of fertiliser/s that is/are applied. Therefore, 3.68E-01 kg of packaging for fertilisers is justified with this exchange.
  properties: dry mass 1 kg, wet mass 1 kg, carbon content, fossil 0.825301, price 0.0642 EUR2005
  note on carbon content, fossil: Considering a chemical formula (C2H4)n for polyethylene, carbon content-fossil is calculated to be 0.856286 kg of Carbon per kg of dry mass.
- compost: 2.17143 kg; lognormal variance with pedigree 0.0034, pedigree (2,4,2,1,1)
  The data was collected for a hectare area through interview
  property nitrogen content 0.014; name N_content
  property mercury content 1.2e-7; name Hg_content
  property zinc content 0.000184; name Zn_content
  property lead content 4.9e-5; name Pb_content
  property nickel content 1.63e-5; name Ni_content
  property potassium content 0.01; name K_content
  property phosphorus content 0.0035; name P_content
  property copper content 5.77e-5; name Cu_content
  property dry mass 0.5 kg; name DM
  property cadmium content 3.6e-7; name Cd_content
  property chromium content 2.23e-5; name Cr_content
  properties: carbon content, non-fossil 0.183645, water content 1, wet mass 1 kg
- cottonseed, for sowing: 0.000628571 kg; lognormal variance with pedigree 0.0034, pedigree (2,4,2,1,1)
  The data was collected for a hectare area through interview
  properties: wet mass 1 kg, carbon content, non-fossil 0.50932, water content 0.0638298, dry mass 0.94 kg
- irrigation: 14.9894 m3; lognormal variance with pedigree 0.0034, pedigree (2,4,2,1,1)
  The data was collected for a hectare area through interview.
  properties: wet mass 1000 kg, water content 9089.91, dry mass 0.11 kg

## Inputs from nature
- Transformation, to annual crop, irrigated [natural resource, land]: 5.71429 m2; lognormal variance with pedigree 0.0108, pedigree (2,4,2,1,1)
  (same comment as for pesticide, unspecified)
- Transformation, from annual crop, irrigated [natural resource, land]: 5.71429 m2; lognormal variance with pedigree 0.0108, pedigree (2,4,2,1,1)
  (same comment as for pesticide, unspecified)
- Occupation, annual crop, irrigated [natural resource, land]: 5.47619 m2*year; lognormal variance with pedigree 0.0048, pedigree (2,4,2,1,1)
  (same comment as for pesticide, unspecified)
- Carbon dioxide, in air [natural resource, in air]: 1.50049 kg; lognormal variance with pedigree 0.0034, pedigree (2,4,2,1,1)
  (same comment as for pesticide, unspecified)
- Energy, gross calorific value, in biomass [natural resource, biotic]: 17.3446 MJ; lognormal variance with pedigree 0.0034, pedigree (2,4,2,1,1)

## Emissions to nature
- Zinc, ion [water, surface water]: 6.50233e-5 kg; lognormal variance with pedigree 0.0928, pedigree (2,4,2,1,1)
  (same comment as for pesticide, unspecified)
- Lead [water, surface water]: 2.63036e-5 kg; lognormal variance with pedigree 0.0928, pedigree (2,4,2,1,1)
  (same comment as for pesticide, unspecified)
- Water [water, surface water]: 1.49894 m3; lognormal variance with pedigree 0.0034, pedigree (2,4,2,1,1)
  (same comment as for pesticide, unspecified)
- Zinc, ion [water, ground-]: 1.48517e-5 kg; lognormal variance with pedigree 0.0928, pedigree (2,4,2,1,1)
  (same comment as for pesticide, unspecified)
- Water [water, ground-]: 5.84585 m3; lognormal variance with pedigree 0.0034, pedigree (2,4,2,1,1)
  (same comment as for pesticide, unspecified)
- Phosphorus [water, surface water]: 0.00327749 kg; lognormal variance with pedigree 0.0428, pedigree (2,4,2,1,1)
  (same comment as for pesticide, unspecified)
- Carbon dioxide, fossil [air, non-urban air or from high stacks]: 0.190317 kg; lognormal variance with pedigree 0.0034, pedigree (2,4,2,1,1)
  (same comment as for pesticide, unspecified)
- Mercury [water, ground-]: 6.2916e-10 kg; lognormal variance with pedigree 0.0928, pedigree (2,4,2,1,1)
  (same comment as for pesticide, unspecified)
- Phosphate [water, surface water]: 0.000335716 kg; lognormal variance with pedigree 0.0428, pedigree (2,4,2,1,1)
  (same comment as for pesticide, unspecified)
- Ammonia [air, non-urban air or from high stacks]: 0.0283452 kg; lognormal variance with pedigree 0.0108, pedigree (2,4,2,1,1)
  (same comment as for pesticide, unspecified)
- Phosphate [water, ground-]: 0.000117537 kg; lognormal variance with pedigree 0.0428, pedigree (2,4,2,1,1)
  (same comment as for pesticide, unspecified)
- Dinitrogen monoxide [air, non-urban air or from high stacks]: 0.0056704 kg; lognormal variance with pedigree 0.0328, pedigree (2,4,2,1,1)
  (same comment as for pesticide, unspecified)
- Cadmium, ion [water, surface water]: 2.09111e-7 kg; lognormal variance with pedigree 0.0928, pedigree (2,4,2,1,1)
  (same comment as for pesticide, unspecified)
- Nitrogen oxides [air, non-urban air or from high stacks]: 0.010219 kg; lognormal variance with pedigree 0.0428, pedigree (2,4,2,1,1)
  (same comment as for pesticide, unspecified)
- Copper, ion [water, surface water]: 3.14959e-5 kg; lognormal variance with pedigree 0.0928, pedigree (2,4,2,1,1)
  (same comment as for pesticide, unspecified)
- Copper [soil, agricultural]: 3.22918e-5 kg; lognormal variance with pedigree 0.0428, pedigree (2,4,2,1,1)
  (same comment as for pesticide, unspecified)
- Cadmium, ion [water, ground-]: 1.49559e-8 kg; lognormal variance with pedigree 0.0928, pedigree (2,4,2,1,1)
  (same comment as for pesticide, unspecified)
- Chromium, ion [water, surface water]: 3.82623e-5 kg; lognormal variance with pedigree 0.0928, pedigree (2,4,2,1,1)
  (same comment as for pesticide, unspecified)
- Chromium [soil, agricultural]: 0.000370451 kg; lognormal variance with pedigree 0.0428, pedigree (2,4,2,1,1)
  (same comment as for pesticide, unspecified)
- Copper, ion [water, ground-]: 1.93658e-6 kg; lognormal variance with pedigree 0.0928, pedigree (2,4,2,1,1)
  (same comment as for pesticide, unspecified)
- Cadmium [soil, agricultural]: -6.44391e-8 kg
  (same comment as for pesticide, unspecified)
- Water [air, non-urban air or from high stacks]: 7.64458 m3; lognormal variance with pedigree 0.0034, pedigree (2,4,2,1,1)
  (same comment as for pesticide, unspecified)
- Chromium, ion [water, ground-]: 1.15549e-5 kg; lognormal variance with pedigree 0.0928, pedigree (2,4,2,1,1)
  (same comment as for pesticide, unspecified)
- Mercury [soil, agricultural]: 4.35488e-8 kg; lognormal variance with pedigree 0.0428, pedigree (2,4,2,1,1)
  (same comment as for pesticide, unspecified)
- Lead [water, ground-]: 2.77849e-7 kg; lognormal variance with pedigree 0.0928, pedigree (2,4,2,1,1)
  (same comment as for pesticide, unspecified)
- Nickel [soil, agricultural]: -1.32118e-5 kg
  (same comment as for pesticide, unspecified)
- Imidacloprid [soil, agricultural]: 5.2e-5 kg; lognormal variance with pedigree 0.0428, pedigree (2,4,2,1,1)
  (same comment as for pesticide, unspecified)
- Lead [soil, agricultural]: 2.03621e-5 kg; lognormal variance with pedigree 0.0428, pedigree (2,4,2,1,1)
  (same comment as for pesticide, unspecified)
- Zinc [soil, agricultural]: 7.86537e-5 kg; lognormal variance with pedigree 0.0358, pedigree (2,4,2,1,1)
  (same comment as for pesticide, unspecified)
- Nickel, ion [water, surface water]: 3.24273e-5 kg; lognormal variance with pedigree 0.0928, pedigree (2,4,2,1,1)
  (same comment as for pesticide, unspecified)
- Mercury [water, surface water]: 1.02912e-7 kg; lognormal variance with pedigree 0.0928, pedigree (2,4,2,1,1)
  (same comment as for pesticide, unspecified)
- Azadirachtin [soil, agricultural]: 0.000411429 kg; lognormal variance with pedigree 0.0108, pedigree (2,4,2,1,1)
  (same comment as for pesticide, unspecified)
- Nitrate [water, ground-]: 0.990774 kg; lognormal variance with pedigree 0.0108, pedigree (2,4,2,1,1)
  (same comment as for pesticide, unspecified)

## Sampling procedure
Primary data from farmers. Standardized questionnaires were developed and adapted to cotton-specific cultivation and post-harvest situation. The secondary data from literature and the primary data from surveys were compared and matched to obtain the highest data quality

## Extrapolations
This dataset has been extrapolated from year 2016 to the year of the calculation (2019). The uncertainty has been adjusted accordingly.
