# cottonseed production, for sowing, organic

Dataset: EcoSpold 2, unit process
Geography: IN-OR
Time period: 1997-01-01 to 2019-12-31
Technology level: current
Classification: ISIC rev.4 ecoinvent: 0164:Seed processing for propagation
Classification: EcoSpold01Categories: agricultural means of production/seed
Scenario: Business-as-Usual
System model: Allocation at the point of substitution
Share of production covered: 100 %
Generated by: Avraam Symeonidis
Database: ecoinvent
isCopyrightProtected: true
accessRestrictedTo: 1

## General comment
Inventory refers to the production of 1kg of cotton seed, organic meant to be used for sowing.

## Included activities start
Activity starts with the cotton seed arriving in the processing plant.

## Included activities end
Activity includes, treatment (pre-cleaning, cleaning, eventually drying, chemical dressing and bag filling), and storing of the seed in the processing centre. The activity ends with the cotto-seeds ready for transprotation.

## Reference product
- cottonseed, organic, for sowing: 1 kg; CPC 01431: Cottonseed, seed for planting; By-product classification allocatable product
  production volume 330000 kg; = 3.30E+05
    The production volume is calculated to be the amount consumed by relevant datasets in the database on an Indian scale.
  property price 0.151571 EUR2005
    Calculated based on inputs: The price of the product has been calculated as a sum of the values of the material and energy inputs for this product. This value is therefore a rough estimation. It may underestimate the real price since there are additional expenses when producing any product. These expences can include for example labour costs, treatment of waste materials and profit for the producer. Please consider carefully whether this level of data quality is acceptable for your application.
  property carbon content, non-fossil 0.475
    Biogenic carbon content of vegetation on a dry mass basis (47.5% DM) derived from FAOSTAT.
    Reference: http://www.fao.org/forestry/17111/en
  property carbon content 0.475
    carbon content on a dry matter basis (reserved; not for manual entry)
  properties: wet mass 1 kg, water content 0.0204082, carbon content, fossil 0, dry mass 0.98 kg, water in wet mass 0.02 kg, carbon allocation 0.4655 kg

## Inputs from technosphere
- diphenylether-compound: 0.0001 kg; lognormal variance with pedigree 0.0526, pedigree (2,1,5,5,1)
  See chapter 'Seed Production' in "01_crop production - yields & inputs US_v1.0.pdf" - pdf-document on the dedicated talk page of ecoinvent (www.ecoinvent.org/documentation)
  EcoSpold01Location=RER
  properties: dry mass 1 kg, carbon content, fossil 0.560061, wet mass 1 kg
  note on carbon content, fossil: C content of diphenylether-compounds was calculated after the C content of thepesticides aclonifen and diflufenican classified as diphenylether-compound in Tab 2.25 of Sutter 2010
- electricity, low voltage: 0.058 kWh; lognormal variance with pedigree 0.0426, pedigree (2,1,5,5,1)
  EcoSpold01Location=US
  See chapter 'Seed Production' in "01_crop production - yields & inputs US_v1.0.pdf" - pdf-document on the dedicated talk page of ecoinvent (www.ecoinvent.org/documentation)
- cottonseed, organic: 1 kg; lognormal variance with pedigree 0.0426, pedigree (2,1,5,5,1)
  See chapter 'Seed Production' in "01_crop production - yields & inputs US_v1.0.pdf" - pdf-document on the dedicated talk page of ecoinvent (www.ecoinvent.org/documentation)
  properties: water content 0.083424, carbon content, non-fossil 0.475, wet mass 1 kg, dry mass 0.923 kg
  note on carbon content, non-fossil: Biogenic carbon content of vegetation on a dry mass basis (47.5% DM) derived from FAOSTAT. Reference: http://www.fao.org/forestry/17111/en
- building, multi-storey: 2e-5 m3; lognormal variance with pedigree 0.0426, pedigree (2,1,5,5,1)
  EcoSpold01Location=RER
  See chapter 'Seed Production' in "01_crop production - yields & inputs US_v1.0.pdf" - pdf-document on the dedicated talk page of ecoinvent (www.ecoinvent.org/documentation)

## Inputs from nature
- Occupation, industrial area [natural resource, land]: 0.0002 m2*year; lognormal variance with pedigree 0.0826, pedigree (2,1,5,5,1)
  (same comment as for cottonseed, organic)
- Transformation, to industrial area [natural resource, land]: 4e-6 m2; lognormal variance with pedigree 0.1626, pedigree (2,1,5,5,1)
  (same comment as for cottonseed, organic)
- Occupation, construction site [natural resource, land]: 8e-6 m2*year; lognormal variance with pedigree 0.0826, pedigree (2,1,5,5,1)
  (same comment as for cottonseed, organic)
- Transformation, from unspecified [natural resource, land]: 4e-6 m2; lognormal variance with pedigree 0.1626, pedigree (2,1,5,5,1)
  (same comment as for cottonseed, organic)

## Extrapolations
This dataset has been extrapolated from year 2006 to the year of the calculation (2019). The uncertainty has been adjusted accordingly.
