# treatment of coal gas, in power plant

Dataset: EcoSpold 2, unit process
Geography: BE
Time period: 1990-01-01 to 2019-12-31
Technology level: current
Classification: ISIC rev.4 ecoinvent: 3510:Electric power generation, transmission and distribution
Classification: EcoSpold01Categories: natural gas/power plants
Synonyms: coke oven gas
Tags: fossil fuels; industrial gas power
Scenario: Business-as-Usual
System model: Allocation at the point of substitution
Generated by: Karin Treyer
Published in: Faist Emmenegger, M. 2007
Database: ecoinvent
isCopyrightProtected: true
accessRestrictedTo: 1

## General comment
Activity represents electricity production from coal gas treatment in power plants. Based on European data.
This dataset represents the treatment of coke oven gas (coal gas) in an unspecified gas power plant with high voltage electricity and heat as by-product in Belgium in 2012.
According to IEA (2008), coke oven gas is obtained as a by-product of solid fuel carbonisation and gasification operations carried out by coke producers and iron and steel plants not connected with gas works and municipal gas plants.
The efficiency calculations are based on IEA/OECD statistics (fuel inputs, electricity produced). No exergy correction could be made due to incomplete data (see ecoinvent report 'Erdgas' p. 128 for details).
Water is used for wet cooling and as feed water in the steam circuit. In this dataset, 100% wet cooling and no once-through cooling is assumed.
EMISSIONS:
Emission data have partly been overtaken from a dataset representing the production of electricity in a natural gas power plant. Data have partly been adapted to the different composition of natural gas and coal gas (see tab. 11.16 in ecoinvent report 'Erdgas').
Different sources served as basis for assumption of average emissions. Where possible, the most recent sources were taken into account, whereas older sources were taken in order to determine the remaining data gaps. The emissions have been fixed for the former UCTE region* and have been overtaken as such for all countries without value adaptation (adaptation of the uncertainty). See ecoinvent report 'Erdgas' given as main source for details (Tab. 11.15 and tab. 11.17). In the following a short overview:
- Emissions of NOx, CO, CO2, SO2, particles, N2O and CH4 are mainly taken from CORINAIR 2001, Rentz et al. 2002, and Swedish EPA 2000 (see tab. 11.17) and are basically valid for European countries.
- NOx emissions are a major challenge in natural gas power plants. With rising temperature, emissions also rise; band widths of NOx emissions in literature are correspondingly large. There are several methods to diminish these emissions.
- CO is a result of incomplete burning. For economic and technical reasons, plant combustion is optimized and CO emissions are low.
- CO2 and SO2 emissions are depending on the composition of the used fuel.
Coal gas can have very different sulfur contents and is washed out. Efficiency of sulfur removal is assumed to reach 90%.
- Organic compound emissions are estimated on the basis of EPA 1998.
- Particles are assumed to be smaller than 2.5 micro-m
Sources:
EMEP/CORINAIR 2001: Joint EMEP/CORINAIR Atmospheric Emission Inventory Guidebook, Third Edition. Copenhagen: European Environment Agency, 2001. http://reports.eea.eu.int/technical_report_2001_3/en.
Rentz O., Karl U., Peter H. (2002). Ermittlung und Evaluierung von Emissionsfaktoren für Feuerungsanlagen in Deutschland für die Jahre 1995, 2000 und 2010. Deutsch- Französisches Institut für Umweltforschung, Uni Karsruhe. Endbericht. Im Auftrag des Umweltbundesamtes. Forschungsbericht 299 43 142. Umweltbundesamt. Berlin.
Swedish EPA (2000) Emission Factors. Swedish Environmental Protection Agency.
IEA/OECD. 2008. Coal information 2008. International Energy Agency (IEA), Paris Cedex (FR)
*former UCTE: Union for the Coordination of the Transmission of Electricity, since 2009 replaced by ENTSO-E European Network of Transmission System Operators for Electricity.

## Included activities start
From the coal gas ready to be treated in a gas power plant and from the gas power plant ready to produce electricity.

## Included activities end
This treatment activity ends with 1MJ of coal gas treated in a power plant.

This dataset includes:
- the emissions from burning
- all operation and maintenance activities and materials of the power plants.
- Cooling: It is a assumed that all plants use wet cooling with a cooling tower. No cooling tower is included in this dataset (will be implemented in future versions)

This dataset doesn't include
- raw materials extraction, decommissioning and waste treatment as these activities are already included in the infrastructure datasets.
- transformation of the by-product electricity.

## Technology
A natural gas power plant with a capacity of 100 MW is taken as power plant infrastructure.

## Time period
The annual production volume is valid for the year 2012.

## Parameters
- electrical efficiency, country: 0.367 dimensionless; name efficiency_electrical_country; lognormal variance with pedigree 0.0167, pedigree (4,2,1,1,3)
  Literature value/calculated value. Net electrical efficiency based on the lower heating value (LHV).
  For all OECD countries, the IEA Energy statistics of OECD countries 2014 provides data for the year 2012 on fuel input (TJ, Net calorific value NCV) in CHP plants and electricity plants and gross electricity production (GWh) for each country. Together with the information on own use, the net electrical efficiency based on the NCV is calculated. From the statistics, electricity from coke oven gas is modelled in the dataset 'treatment of coal gas', while electricity from 'recovered gas (including blast furnace gas and other recovered gas) and gas works gas is modelled with the dataset 'treatment of blast furnace gas'.
  For all non-OECD countries, data from the IEA Energy statistics of non-OECD countries 2014 and the IEA electricity information have been used. The energy statistics source provides data on fuel input from coke oven gas (coal gas) as well as recovered gases and gas works gas (modelled as blast furnace gas). The electricity information provides information on total electricity production with 'gases' (=gas works gas, coke oven gas, blast furnace gas and other recovered gases). This electricity production is allocated to the coal gas and blast furnace gas dataset in ecoinvent based on the fuel input. It cannot be differentiated between electricity only and CHP plants as total values only are given.
  IEA. 2014. Electricity Information 2014. ISBN 978-92-64-21692-1. International Energy Agency (IEA), Paris Cedex (FR).
  IEA/OECD. 2014. Energy statistics of non-OECD countries 2014. International Energy Agency (IEA), Paris Cedex (FR).
  IEA/OECD. 2014. Energy statistics of OECD countries 2014. International Energy Agency (IEA), Paris Cedex (FR).
- electrical efficiency, global: 0.302 dimensionless; name efficiency_electrical_global; lognormal variance with pedigree 0.0167, pedigree (4,2,1,1,3)
  (same comment as for electrical efficiency, country)
- relation between the global and the country's efficiency: 0.822888 dimensionless; name relation_global_country; = efficiency_electrical_global/ efficiency_electrical_country; undefined min 1, max 1, standardDeviation95 0, pedigree (1,1,1,1,1)
  This factor brings the amounts of the exchanges in the global dataset into relation with the amounts in the country datasets.
- thermal efficiency: 0.145 dimensionless; name efficiency_thermal; lognormal variance with pedigree 0.0122, pedigree (2,3,1,5,3)
  Estimation. Value overtaken from the global dataset.
  Global value: Literature value/calculation for the thermal efficiency. IEA/OECD statistics provided data for OECD countries in total: Fuel input in CHP plants and the electricity and heat output. Not enough detailed data were available for non-OECD countries and/or the whole world, so that for this global dataset, the OECD value was overtaken. Data are for the category 'coal manufactured gases' including coke oven gas, blast furnace gas and oxygen steel furnace gas. Fuel input data in the statistics are expressed in gross calorific values. Net calorific values are calculated according to IEA/OECD p. I.7 by multiplying the gross heat content with a factor 0.9, taking therefore the lower factor for coke oven gas, corresponding to a worst case scenario (blast furnace gas and oxygen steel furnace gas have a gross to net ratio of 1).
  IEA/OECD. 2010. Electricity Information 2010. International Energy Agency (IEA), Paris Cedex (FR). Part IV. Detailed OECD Electricity And Heat Data.
  nan

## Reference product
- coal gas: 0 MJ; name coal_gas; source Faist Emmenegger, M. 2007; CPC 17200: Coal gas, water gas, producer gas and similar gases, other than petroleum gases and other gaseous hydrocarbons; By-product classification allocatable product
  production volume 0 MJ; name apv_coal_gas; = apv_electricity*3.6*(1/efficiency_electrical_country)
    Calculated value.
  property price 0.015 EUR2005; name coal_gas_price_EUR2005
    Temporary price data. Calculated as 90% of purchasers price based on: 2004 prices calculated from Import/Export data (total trades (USD) divided by total weight (kg) in EU27, USA, China, Japan and India) from UN Trade data statistics (http://data.un.org/Explorer.aspx, Accessed 6 July 2010). Data from UN trade are in mass unit. Density at 0.8 kg/m3 and calorific value (lower) of 20 MJ/m3 to convert from kg to MJ.
  property carbon content 0.288181
    carbon content on a dry matter basis (reserved; not for manual entry)
  properties: water content 0, carbon content, non-fossil 0, water in wet mass 0 kg, carbon content, fossil 0.288181, wet mass 0.0294737 kg, dry mass 0.0294737 kg, carbon allocation 0.00849374 kg
- heat, district or industrial, other than natural gas: 1 MJ; source IEA/OECD 2010, p. IV.13; CPC 17300: Steam and hot water; By-product classification allocatable product; pedigree (1,1,1,1,1)
  Calculated value
  production volume 2.27575e7 MJ

## By-products
- electricity, high voltage: 0 kWh; = coal_gas*efficiency_electrical_country*(-1)/3.6; source IEA/OECD 2010, p. II.8ff; CPC 17100: Electrical energy; By-product classification allocatable product; undefined min 0.0991667, max 0.0991667, standardDeviation95 0, pedigree (1,1,3,1,1)
  Calculated value. 1kWh = 3.6 MJ
  production volume 0 kWh; name apv_electricity
    Literature value/calculated value. Net electricity production in 2012.
    For all OECD countries, the IEA Energy statistics of OECD countries 2014 provides data for the year 2012 on gross electricity production (GWh) for each country. Together with the information on own use, the net electrical efficiency based on the NCV is calculated. From the statistics, electricity from coke oven gas is modelled in the dataset 'treatment of coal gas', while electricity from 'recovered gas (including blast furnace gas and other recovered gas) and gas works gas is modelled with the dataset 'treatment of blast furnace gas'.
    For all non-OECD countries, data from the IEA Energy statistics of non-OECD countries 2014 and the IEA electricity information have been used. The energy statistics source provides data on fuel input from coke oven gas (coal gas) as well as recovered gases and gas works gas (modelled as blast furnace gas). The electricity information provides information on total electricity production with 'gases' (=gas works gas, coke oven gas, blast furnace gas and other recovered gases). This electricity production is allocated to the coal gas and blast furnace gas dataset in ecoinvent based on the fuel input. It cannot be differentiated between electricity only and CHP plants as total values only are given.
    IEA. 2014. Electricity Information 2014. ISBN 978-92-64-21692-1. International Energy Agency (IEA), Paris Cedex (FR).
    IEA/OECD. 2014. Energy statistics of non-OECD countries 2014. International Energy Agency (IEA), Paris Cedex (FR).
    IEA/OECD. 2014. Energy statistics of OECD countries 2014. International Energy Agency (IEA), Paris Cedex (FR).
  property exergy 3.6 MJ
    This exergy property is based on the exergy content of the product.
  property price 0.0977 EUR2005
    Temporary price data. Calculated as 90% of purchasers price based on: 94% of the average price (to account for a 6% loss in transformation and transmission) for electricity for industrial consumersin 2005 (excluded taxes). From IEA.
  properties: true value relation 3.6
- heat, district or industrial, other than natural gas: 0 MJ; = coal_gas*efficiency_thermal*(-1); source IEA/OECD 2010, p. IV.13; CPC 17300: Steam and hot water; By-product classification allocatable product; undefined min 0.145, max 0.145, standardDeviation95 0, pedigree (1,1,3,1,1)
  Calculated value
  production volume 0 MJ; = apv_coal_gas* efficiency_thermal
    Calculated from production volume of reference product using the relative outputs.
  property exergy 0.1842 MJ
    This exergy property is based on the exergy content of the product.
  property price 0.0106 EUR2005
    Average European district heat price from Ecoheatcool and Euroheat 2005-2006, Ecoheat Work package 1: The European heat market. Final report. 10.6 EUR/GJ i s the price of district heat. http://www.solarthermalworld.org/files/Ecoheatcool%20WP1%20Web.pdf?download
  properties: true value relation 0.1842

## Inputs from technosphere
- gas power plant, 100MW electrical: 0 unit; source Faist Emmenegger, M. 2007; pedigree (1,1,1,1,1)
  Literature value/calculated value. Amount of power plant needed for burning 1MJ of coal gas.
- gas power plant, 100MW electrical: 0 unit; source Faist Emmenegger, M. 2007; uniform min 0, max 0, pedigree (1,1,3,1,1)
  (same comment as for gas power plant, 100MW electrical)
- water, completely softened: 0 kg; source Röder, A. 2007; pedigree (1,1,3,1,1)
  Literature value/assumption. Feed water for the steam circuit lost when burning 1MJ of coal gas. Röder et al. 2007, Tab. 9.65 and Tab. 9.66, p. 160f. Faist Emmenegger et al. 2007 state that there have been nearly no information on water use in coal gas power plants and therefore neglected the water use. For consistency reasons, here it is assumed a certain water use also for the treatment of coal gas.
  properties: wet mass 1 kg
- water, decarbonised: 0.00945062 kg; source Röder, A. 2007; pedigree (1,1,3,1,1)
  Literature value/calculated value. Cooling water, decarbonised, for the water lost in the cooling water circuit when burning 1 MJ of coal gas. Röder et al. 2007, Tab. 9.65 and Tab. 9.66, p. 160f. Faist Emmenegger et al. 2007 state that there have been nearly no information on water use in coal gas power plants and therefore neglected the water use. For consistency reasons, here it is assumed a certain water use also for the treatment of coal gas.
  properties: wet mass 1 kg
- coal gas: -0.0891005 MJ
  EcoSpold01Location=GLO
  production volume 3.04816e12 MJ
- phosphoric acid, fertiliser grade, without water, in 70% solution state: 2.97002e-6 kg; lognormal variance with pedigree 0.34, pedigree (1,1,5,1,1)
  own assumption
  EcoSpold01Location=GLO
- sodium hydroxide, without water, in 50% solution state: 4.14989e-5 kg; lognormal variance with pedigree 0.34, pedigree (1,1,5,1,1)
  EcoSpold01Location=RER
  own assumption
- coal tar: -0.000650962 kg
  EcoSpold01Location=GLO
  production volume 2.13665e10 kg
- iron sulfate: 1.48501e-6 kg; lognormal variance with pedigree 0.34, pedigree (1,1,5,1,1)
  EcoSpold01Location=RER
  own assumption
- hard coal coke factory: 3.45824e-13 unit; lognormal variance with pedigree 0.08, pedigree (1,1,5,1,1)
  own assumption
  EcoSpold01Location=RER
- hard coal: 0.00293345, 0.00180106, 0.0124908, 0.00176493, 0.000418804, 0.0026313, 0.00137415, 0.000765922, 0.00389235 kg (9 entries); lognormal variance with pedigree 0.04, pedigree (1,1,5,1,1)
  EcoSpold01Location=UCTE
  standard for ressources
- electricity, medium voltage: 4.40706e-7, 3.29308e-6, 1.07003e-5, 6.06222e-7, 3.80904e-6, 1.64333e-6, 1.49655e-6, 2.65467e-6, 1.54495e-6, 3.71518e-7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 kWh (46 entries); lognormal variance with pedigree 0.34, pedigree (1,1,5,1,1)
  own assumption
  EcoSpold01Location=UCTE
- water, decarbonised: 0.000570152, 0.00148353, 9.27769e-7, 0.00598344, 0.000294556, 0.000968555, 5.347e-5, 0.000761936, 0.00177486, 0.0111332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 kg (11 entries); lognormal variance with pedigree 0.34, pedigree (1,1,5,1,1)
  own assumption
  EcoSpold01Location=RER

## Inputs from nature
- Water, cooling, unspecified natural origin [natural resource, in water]: 0 m3; pedigree (1,1,3,1,1)
  Exchange present due to parent child relationship

## Emissions to nature
- Acetaldehyde [air, non-urban air or from high stacks]: 0 kg; source Faist Emmenegger, M. 2007, p. Tab. 11.19 p.138; pedigree (4,4,5,3,5)
  Literature value/calculated value. Value overtaken from the dataset of natural gas burned in a normal power plant (electricity production, natural gas, GLO 2008).
  Emissions when burning 1MJ of natural gas. Weighted average with electricity production data (Itten&Frischknecht 2012) and emission values of 11 countries
  (AT, BE, DE, ES, FR, GB, IT, JP, LU, NL, US) (Faist Emmenegger et al. 2007, JP and US in the appendix)
  Country emissions values estimate from range of values from different references. See Tab. 11.19, p. 138 in Faist Emmenegger et al. 2007.
  Source:
  Itten R. and Frischknecht R. (2012) Life Cycle Inventories of Electricity Mixes and Grid. ESU-services Ltd., Uster, Switzerland.
- Formaldehyde [air, non-urban air or from high stacks]: 0 kg; source Faist Emmenegger, M. 2007, p. Tab. 11.19 p.138; pedigree (4,4,5,3,5)
  (same comment as for Acetaldehyde)
- Carbon monoxide, fossil [air, non-urban air or from high stacks]: 0.000345824 kg; source Faist Emmenegger, M. 2007, p. Tab. 11.17 p. 135 / Tab. 16.10; pedigree (4,3,5,4,4)
  Literature value. Range of values from different references. CO is a result of incomplete burning. For economic and technical reasons, plant combustion is optimized and CO emissions are low.
- Carbon dioxide, fossil [air, non-urban air or from high stacks]: 0.00325481 kg; source Faist Emmenegger, M. 2007, p. Tab. 11.17 p. 135 / Tab. 16.10; pedigree (4,3,5,4,4)
  Literature value. Range of values from different references.
- Sulfur dioxide [air, non-urban air or from high stacks]: 3.2955e-5 kg; source Faist Emmenegger, M. 2007, p. Tab. 11.17 p. 135; pedigree (4,3,5,4,4)
  Literature value. Range of values from different references.
- Methane, fossil [air, non-urban air or from high stacks]: 5.3501e-5 kg; source Faist Emmenegger, M. 2007, p. Tab. 11.17 p. 135; pedigree (4,3,5,4,4)
  Literature value. Range of values from different references.
- Benzene [air, non-urban air or from high stacks]: 2.197e-5 kg; source Faist Emmenegger, M. 2007, p. Tab. 11.19 p.138; pedigree (4,4,5,3,5)
  (same comment as for Acetaldehyde)
- Ethane [air, non-urban air or from high stacks]: 5.81798e-6 kg; source Faist Emmenegger, M. 2007, p. Tab. 11.19 p.138; pedigree (4,4,5,3,5)
  (same comment as for Acetaldehyde)
- Propane [air, non-urban air or from high stacks]: 5.81798e-8 kg; source Faist Emmenegger, M. 2007, p. Tab. 11.19 p.138; pedigree (4,4,5,3,5)
  (same comment as for Acetaldehyde)
- Propionic acid [air, non-urban air or from high stacks]: 0 kg; source Faist Emmenegger, M. 2007, p. Tab. 11.19 p.138; pedigree (4,4,5,3,5)
  (same comment as for Acetaldehyde)
- Pentane [air, non-urban air or from high stacks]: 0 kg; source Faist Emmenegger, M. 2007, p. Tab. 11.19 p.138; pedigree (4,4,5,3,5)
  (same comment as for Acetaldehyde)
- Dinitrogen monoxide [air, non-urban air or from high stacks]: 0 kg; source Faist Emmenegger, M. 2007, p. Tab. 11.17 p. 135 / Tab. 16.10; pedigree (4,3,5,4,4)
  Literature value. Range of values from different references.
- Water [air, unspecified]: 1.26124e-5 m3; pedigree (1,1,3,1,1)
  Exchange present due to parent child relationship
- Dioxins, measured as 2,3,7,8-tetrachlorodibenzo-p-dioxin [air, non-urban air or from high stacks]: 0 kg; source Faist Emmenegger, M. 2007, p. Tab. 11.21, Tab. 16.10; pedigree (4,4,5,3,5)
  Literature value/calculated value. Value overtaken from the dataset of natural gas burned in a normal power plant (electricity production, natural gas, GLO 2008).
  Emissions when burning 1MJ of natural gas. Weighted average with electricity production data (Itten&Frischknecht 2012) and emission values of 11 countries
  (AT, BE, DE, ES, FR, GB, IT, JP, LU, NL, US) (Faist Emmenegger et al. 2007, JP and US in the appendix)
  Source:
  Itten R. and Frischknecht R. (2012) Life Cycle Inventories of Electricity Mixes and Grid. ESU-services Ltd., Uster, Switzerland.
- Water [water, unspecified]: 1.99357e-5 m3; pedigree (1,1,3,1,1)
  Exchange present due to parent child relationship
- Nitrogen oxides [air, non-urban air or from high stacks]: 1.72302e-5 kg; source Faist Emmenegger, M. 2007, p. Tab. 11.17 p. 135; pedigree (4,3,5,4,4)
  Literature value/estimation. Range of values from different references.
- Hexane [air, non-urban air or from high stacks]: 0 kg; source Faist Emmenegger, M. 2007, p. Tab. 11.19 p.138; pedigree (4,4,5,3,5)
  (same comment as for Acetaldehyde)
- PAH, polycyclic aromatic hydrocarbons [air, non-urban air or from high stacks]: 4.65845e-8 kg; source Faist Emmenegger, M. 2007, p. Tab. 11.19 p.138; pedigree (4,4,5,3,5)
  (same comment as for Acetaldehyde)
- Toluene [air, non-urban air or from high stacks]: 6.89613e-8 kg; source Faist Emmenegger, M. 2007, p. Tab. 11.19 p.138; pedigree (4,4,5,3,5)
  (same comment as for Acetaldehyde)
- Acetic acid [air, non-urban air or from high stacks]: 0 kg; source Faist Emmenegger, M. 2007, p. Tab. 11.19 p.138; pedigree (3,4,5,3,5)
  (same comment as for Acetaldehyde)
- Acenaphthene [air, non-urban air or from high stacks]: 0 kg; source Faist Emmenegger, M. 2007, p. Tab. 11.19 p.138; pedigree (4,4,5,3,5)
  (same comment as for Acetaldehyde)
- Butane [air, non-urban air or from high stacks]: 0 kg; source Faist Emmenegger, M. 2007, p. Tab. 11.19 p.138; pedigree (4,4,5,3,5)
  (same comment as for Acetaldehyde)
- Particulates, < 2.5 um [air, non-urban air or from high stacks]: 5.02462e-5 kg; source Faist Emmenegger, M. 2007, p. Tab. 11.17 p. 135; pedigree (4,3,5,4,4)
  Literature value. Range of values from different references.
- Benzo(a)pyrene [air, non-urban air or from high stacks]: 1.58876e-7 kg; source Faist Emmenegger, M. 2007, p. Tab. 11.19 p.138; pedigree (4,4,5,3,5)
  (same comment as for Acetaldehyde)
- Lead [air, non-urban air or from high stacks]: 6.1638e-10 kg; source Faist Emmenegger, M. 2007, p. Tab 16.10; pedigree (4,4,4,5,5)
  Literature value/calculated value. Value overtaken from the dataset of natural gas burned in a normal power plant (electricity production, natural gas, GLO 2008).
  Emissions when burning 1MJ of natural gas. Weighted average with electricity production data (Itten&Frischknecht 2012) and emission values of 11 countries
  (AT, BE, DE, ES, FR, GB, IT, JP, LU, NL, US) (Faist Emmenegger et al. 2007, JP and US in the appendix. Only the US dataset contains heavy metals emissions.)
  Source:
  Itten R. and Frischknecht R. (2012) Life Cycle Inventories of Electricity Mixes and Grid. ESU-services Ltd., Uster, Switzerland.
- Carbon disulfide [air, non-urban air or from high stacks]: 1.9e-8 kg; lognormal variance with pedigree 0.05, pedigree (1,1,5,1,1)
  own assumption
- Arsenic [air, non-urban air or from high stacks]: 4.00749e-10 kg; lognormal variance with pedigree 0.08, pedigree (1,1,5,1,1)
  own assumption
- Silver [air, non-urban air or from high stacks]: 2.64453e-12 kg; lognormal variance with pedigree 0.69, pedigree (1,1,5,1,1)
  own assumption
- Cyanide [air, non-urban air or from high stacks]: 6.67236e-8 kg; lognormal variance with pedigree 0.69, pedigree (1,1,5,1,1)
  own assumption
- Methane, chlorodifluoro-, HCFC-22 [air, non-urban air or from high stacks]: 6.65202e-8 kg; lognormal variance with pedigree 0.34, pedigree (1,1,5,1,1)
  own assumption
- Ethanol [air, non-urban air or from high stacks]: 8.68628e-10 kg; lognormal variance with pedigree 0.69, pedigree (1,1,5,1,1)
  own assumption
- Cadmium [air, non-urban air or from high stacks]: 6.04174e-12 kg; lognormal variance with pedigree 0.08, pedigree (1,1,5,1,1)
  own assumption
- Cobalt [air, non-urban air or from high stacks]: 5.53318e-11 kg; lognormal variance with pedigree 0.69, pedigree (1,1,5,1,1)
  own assumption
- Chromium [air, non-urban air or from high stacks]: 1.93051e-10 kg; lognormal variance with pedigree 0.69, pedigree (1,1,5,1,1)
  own assumption
- Acetone [air, non-urban air or from high stacks]: 8.60491e-7 kg; lognormal variance with pedigree 0.34, pedigree (1,1,5,1,1)
  own assumption
- NMVOC, non-methane volatile organic compounds, unspecified origin [air, non-urban air or from high stacks]: 0.000213597 kg; lognormal variance with pedigree 0.69, pedigree (1,1,5,1,1)
  own assumption
- PAH, polycyclic aromatic hydrocarbons [water, surface water]: 4.45502e-10 kg; lognormal variance with pedigree 0.34, pedigree (1,1,5,1,1)
  own assumption
- Sodium, ion [water, surface water]: 1.85728e-5 kg; lognormal variance with pedigree 0.34, pedigree (1,1,5,1,1)
  own assumption
- Phenol, pentachloro- [air, non-urban air or from high stacks]: 6.99785e-8 kg; lognormal variance with pedigree 0.34, pedigree (1,1,5,1,1)
  own assumption
- Ammonium, ion [water, surface water]: 3.70235e-7 kg; lognormal variance with pedigree 0.34, pedigree (1,1,5,1,1)
  own assumption
- Particulates, > 10 um [air, non-urban air or from high stacks]: 8.46251e-5 kg; lognormal variance with pedigree 0.34, pedigree (1,1,5,1,1)
  own assumption
- Copper [air, non-urban air or from high stacks]: 2.40042e-10 kg; lognormal variance with pedigree 0.69, pedigree (1,1,5,1,1)
  own assumption
- Zinc [air, non-urban air or from high stacks]: 1.22462e-9 kg; lognormal variance with pedigree 0.69, pedigree (1,1,5,1,1)
  own assumption
- Particulates, > 2.5 um, and < 10um [air, non-urban air or from high stacks]: 2.29871e-5 kg; lognormal variance with pedigree 0.34, pedigree (1,1,5,1,1)
  own assumption
- Thallium [air, non-urban air or from high stacks]: 3.09207e-11 kg; lognormal variance with pedigree 0.69, pedigree (1,1,5,1,1)
  own assumption
- Hydrogen sulfide [water, surface water]: 5.94003e-8 kg; lognormal variance with pedigree 0.34, pedigree (1,1,5,1,1)
  own assumption
- Manganese [air, non-urban air or from high stacks]: 3.35652e-10 kg; lognormal variance with pedigree 0.69, pedigree (1,1,5,1,1)
  own assumption
- Ammonia [air, non-urban air or from high stacks]: 1.247e-7 kg; lognormal variance with pedigree 1.37, pedigree (1,1,5,1,1)
  own assumption
- Chloride [water, surface water]: 2.88865e-5 kg; lognormal variance with pedigree 0.34, pedigree (1,1,5,1,1)
  own assumption
- Beryllium [air, non-urban air or from high stacks]: 7.30298e-12 kg; lognormal variance with pedigree 0.69, pedigree (1,1,5,1,1)
  own assumption
- Mercury [air, non-urban air or from high stacks]: 7.32333e-12 kg; lognormal variance with pedigree 0.34, pedigree (1,1,5,1,1)
  own assumption
- Barium [air, non-urban air or from high stacks]: 4.55674e-10 kg; lognormal variance with pedigree 0.69, pedigree (1,1,5,1,1)
  own assumption
- Solids, inorganic [water, surface water]: 1.63351e-5 kg; lognormal variance with pedigree 0.34, pedigree (1,1,5,1,1)
  own assumption
- Antimony [air, non-urban air or from high stacks]: 1.46263e-11 kg; lognormal variance with pedigree 0.69, pedigree (1,1,5,1,1)
  own assumption
- Styrene [air, non-urban air or from high stacks]: 8.91005e-10 kg; lognormal variance with pedigree 0.69, pedigree (1,1,5,1,1)
  own assumption
- Selenium [air, non-urban air or from high stacks]: 1.33651e-10 kg; lognormal variance with pedigree 0.69, pedigree (1,1,5,1,1)
  own assumption
- Acrolein [air, non-urban air or from high stacks]: 1.06188e-9 kg; lognormal variance with pedigree 0.34, pedigree (1,1,5,1,1)
  own assumption
- Methanol [air, non-urban air or from high stacks]: 8.68628e-8 kg; lognormal variance with pedigree 0.69, pedigree (1,1,5,1,1)
  own assumption
- Nickel [air, non-urban air or from high stacks]: 4.35331e-10 kg; lognormal variance with pedigree 0.69, pedigree (1,1,5,1,1)
  own assumption
- Phosphorus [air, non-urban air or from high stacks]: 9.35758e-10 kg; lognormal variance with pedigree 0.69, pedigree (1,1,5,1,1)
  own assumption

## Sampling procedure
Literature and statistics

## Extrapolations
Emission data partly taken over from natural gas power plants.
Emission data partly from old references.
A natural gas power plant is taken as infrastructure input.

## Review by Carl Vadenbo 2015-05-29
The update of the whole electricity sector for the ecoinvent v3.2 database consist of hundreds of datasets. All these datasets have passed through a streamlined review processes where the underlying modelling of production volumes, technology shares and efficiencies was reviewed in detail prior to the datasets being submitted to the database.
