# treatment of municipal solid waste, sanitary landfill

Dataset: EcoSpold 2, unit process
Geography: CH
Time period: 1994-01-01 to 2019-12-31
Technology level: current
Classification: ISIC rev.4 ecoinvent: 3821:Treatment and disposal of non-hazardous waste
Classification: EcoSpold01Categories: waste management/sanitary landfill
Tags: Treatment; ConvertedDataset
Scenario: Business-as-Usual
System model: Allocation at the point of substitution
Generated by: Gabor Doka (obsolete)
Published in: Doka G. 2007
Database: ecoinvent
isCopyrightProtected: true
accessRestrictedTo: 1

## General comment
Inventoried waste contains 21% paper; 8% Mixed cardbord; 15% plastics; 3% laminated materials; 2% laminated packaging, e.g. tetra bricks; 3% combined goods e.g. dipers; 3% glass; 2% textiles; 8% minerals; 9% natural products; 22% compostable material; 2.65% inert metals; 1% volatile metals; 0.0065% batteries; 0.34% electronic goods; .
waste composition (wet, in ppm): upper heating value 13.27 MJ/kg; lower heating value 11.74 MJ/kg; H2O 228830; O 257060; H 48250; C 334230; S 1119; N 3123.8; P 893.79; B 7.1933; Cl 6866.2; Br 13.552; F 56.358; I 0.0121; Ag 0.714; As 0.62521; Ba 149.04; Cd 11.748; Co 1.3453; Cr 315.21; Cu 1212.8; Hg 1.4424; Mn 259.36; Mo 1.9551; Ni 107.38; Pb 502.43; Sb 22.564; Se 0.31969; Sn 73.44; V 9.2147; Zn 1311.2; Be n.a.; Sc n.a.; Sr n.a.; Ti n.a.; Tl n.a.; W n.a.; Si 48510; Fe 29996; Ca 14062; Al 12420; K 2059.7; Mg 3377.7; Na 5143.9;
Share of carbon in waste that is biogenic 60.4%.
Overall degradability of waste during 100 years: 18.73%.
[This dataset was already contained in the ecoinvent database version 2. It was not individually updated during the transfer to ecoinvent version 3. Life Cycle Impact Assessment results may still have changed, as they are affected by changes in the supply chain, i.e. in other datasets. This dataset was generated following the ecoinvent quality guidelines for version 2. It may have been subject to central changes described in the ecoinvent version 3 change report (http://www.ecoinvent.org/database/ecoinvent-version-3/reports-of-changes/), and the results of the central updates were reviewed extensively. The changes added e.g. consistent water flows and other information throughout the database. The documentation of this dataset can be found in the ecoinvent reports of version 2, which are still available via the ecoinvent website. The change report linked above covers all central changes that were made during the conversion process.]

## Included activities end
Waste-specific short-term emissions to air via landfill gas incineration and landfill leachate. Burdens from treatment of short-term leachate (0-100a) in wastewater treatment plant (including WWTP sludge disposal in municipal incinerator). Long-term emissions from landfill to groundwater (after base lining failure).

## Geography
Technology encountered in Switzerland in 2000. Landfill includes base seal, leachate collection system, treatment of leachate in municipal wastewater treatment plant.

## Technology
Swiss municipal sanitary landfill for biogenic or untreated municipal waste ('reactive organic landfill'). Landfill gas and leachate collection system. Recultivation and monitoring for 150 years after closure.

## Reference product
- municipal solid waste: -1 kg; CPC 39910: Municipal waste; By-product classification Waste
  production volume 2.917e8 kg
    (year 2000) source: ecoinvent v2
  property price 0 EUR2005
    Waste products are assigned a price of zero as they are assumed to require further treatment.
  property carbon content, fossil 0.171549
    MSW composition in tab 4.1, ecoinvent v2.2 report 13_I. C content referred to 1 kg DM
  property carbon content, non-fossil 0.261655
    MSW composition in tab 4.1, ecoinvent v2.2 report 13_I. C content referred to 1 kg DM
  property carbon content 0.433204
    carbon content on a dry matter basis (reserved; not for manual entry)
  properties: wet mass 1 kg, dry mass 0.771 kg, water in wet mass 0.229 kg, water content 0.297017, carbon allocation 0.334 kg

## By-products
- electricity, for reuse in municipal waste incineration only: 0 kWh; CPC 17100: Electrical energy; By-product classification allocatable product; pedigree (1,1,1,1,1)
  Net electricity generated from this waste and used in internal MSWI plant energy redistribution.
  Uncertainty: uncertainty is calculated from uncertainties in waste composition and uncertainties in energy efficiency and the uncertainty in internal energy demand
  property exergy 3.6 MJ; name E_el_prod_MSWI_exergy
  property true value relation 3.6; name E_el_prod_MSWI_true_value_relation
  property price 0.1 EUR2005; name E_el_prod_MSWI_price_EUR2005
- heat, for reuse in municipal waste incineration only: 0 MJ; CPC 17300: Steam and hot water; By-product classification allocatable product; pedigree (1,1,1,1,1)
  Net useful heat generated from this waste and used in internal MSWI plant energy redistribution.
  Uncertainty: uncertainty is calculated from uncertainties in waste composition and uncertainties in energy efficiency and the uncertainty in internal energy demand
  property true value relation 0.1842; name E_th_prod_MSWI_true_value_relation
  property exergy 0.1842 MJ; name E_th_prod_MSWI_exergy
  property price 0.0106 EUR2005; name E_th_prod_MSWI_price_EUR2005
- zinc concentrate: 0 kg; CPC 14290: Other non-ferrous metal ores and concentrates (other than uranium or thorium ores and concentrates); By-product classification allocatable product
  Calculated value from the knowledge of the properties of both products.
  property price 0.38 EUR2005; name ByP_price_EUR2005
    Temporary price data. Calculated as 90% of purchasers price based on: Zinc content in concentrate 53%. Concentrate price per kg Zn 86.5% of refined Zn price (13.5% treatment charges according to CHR Metals Limited 2005: Dynamic cost curves. http://www.minecost.com/dynamic.pdf). 2004 zinc price from USGS (2007) Mineral commodity summaries 2007. <http://minerals.usgs.gov/minerals/pubs/mcs/2007/mcs2007.pdf> [Accessed 25 May 2010]
  property zinc content 0.53; name zinc_C_zinc_concentrate
    Zinc content on a dry matter basis. Value taken from teh "zinc mine operation" /GLO dataset.
  property dry mass 1 kg; name DM_zinc_concentrate
  property carbon content 0
    carbon content on a dry matter basis (reserved; not for manual entry)
  properties: wet mass 1 kg, water content 0, carbon content, non-fossil 0, carbon content, fossil 0, water in wet mass 0 kg, carbon allocation 0 kg

## Inputs from technosphere
- electricity, for reuse in municipal waste incineration only: 0.000333 kWh; name E_el_prod_MSWI; lognormal variance with pedigree 0.37, pedigree (1,1,5,1,1)
  burden from incineration of sludge from wastewater treatment of the short-term leachate (0-100a). uncertainty is calculated from uncertainties in waste composition and transfer coefficients in incinerator and uncertainty of waste decomposition and short-term leaching in sanitary landfill
- sewer grid, 5E9l/year, 110 km: 5.45e-10 km; lognormal variance with pedigree 0.2106, pedigree (5,5,5,5,5)
  burden from wastewater treatment of the short-term leachate (0-100a). Uncertainty calculated from unertainty of the waste composition of this waste, uncertainty in waste decomposition and short-term leaching in sanitary landfill
- heat, for reuse in municipal waste incineration only: 0.00194 MJ; name E_th_prod_MSWI; lognormal variance with pedigree 0.2, pedigree (1,1,5,1,1)
  (same comment as for electricity, for reuse in municipal waste incineration only)
- sodium hydroxide, without water, in 50% solution state: 1.32e-7 kg; lognormal variance with pedigree 0.34, pedigree (1,1,5,1,1)
  (same comment as for electricity, for reuse in municipal waste incineration only)
  properties: wet mass 1 kg, dry mass 1 kg
- waste plastic, mixture: -3.88e-5 kg; lognormal variance with pedigree 0.2106, pedigree (5,5,5,5,5)
  (same comment as for sewer grid, 5E9l/year, 110 km)
  production volume 11318 kg
    Calculated from the production volume of municipal solid waste, 22.9% water in proportion to the respective output amounts.
  properties: wet mass 1 kg, water content 0.180638, dry mass 0.847 kg, carbon content, fossil 0.747344
  note on carbon content, fossil: C content in 1 kg DM was calculated using data in Tab A.2, ecoinvent v2.2 report 13_I
- process-specific burdens, municipal waste incineration: 0.00232 kg; lognormal variance with pedigree 0.2, pedigree (1,1,5,1,1)
  Burden from incineration of sludge from wastewater treatment of the short-term leachate (0-100a).
  Burden from incineration of sludge from wastewater treatment of the short-term leachate (0-100a).;activityLink introduced to establish a direct link to the corresponding regional supply of this product
- waste cement, hydrated: -9.15e-5 kg; lognormal variance with pedigree 0.26, pedigree (1,1,5,1,1)
  (same comment as for electricity, for reuse in municipal waste incineration only)
  production volume 26690.5 kg
    (same comment as for waste plastic, mixture)
  properties: dry mass 1 kg, wet mass 1 kg
- municipal waste incineration facility: 5.8e-13 unit; lognormal variance with pedigree 0.2, pedigree (1,1,5,1,1)
  Burden from incineration of sludge from wastewater treatment of the short-term leachate (0-100a).
  Burden from incineration of sludge from wastewater treatment of the short-term leachate (0-100a).
- waste graphical paper: -3.88e-5 kg; lognormal variance with pedigree 0.2106, pedigree (5,5,5,5,5)
  (same comment as for sewer grid, 5E9l/year, 110 km)
  production volume 11318 kg
    (same comment as for waste plastic, mixture)
  properties: water content 0.126126, dry mass 0.888 kg, carbon content, non-fossil 0.454955, wet mass 1 kg
- residual material landfill: 1.91e-13 unit; lognormal variance with pedigree 0.26, pedigree (1,1,5,1,1)
  (same comment as for electricity, for reuse in municipal waste incineration only)
- iron (III) chloride, without water, in 40% solution state: 8.81e-5 kg; lognormal variance with pedigree 1.04, pedigree (1,1,5,1,1)
  (same comment as for electricity, for reuse in municipal waste incineration only)
  properties: dry mass 1 kg, wet mass 1 kg
- heat, district or industrial, natural gas: 0.00094224 MJ; lognormal variance with pedigree 0.35, pedigree (5,5,5,5,5)
  (same comment as for electricity, for reuse in municipal waste incineration only)
- wastewater treatment facility, capacity 5E9l/year: 1.42e-11 unit; lognormal variance with pedigree 0.2106, pedigree (5,5,5,5,5)
  (same comment as for sewer grid, 5E9l/year, 110 km)
- aluminium sulfate, powder: 1.74e-5 kg; lognormal variance with pedigree 1.16, pedigree (5,5,5,5,5)
  (same comment as for sewer grid, 5E9l/year, 110 km)
  properties: dry mass 1 kg, wet mass 1 kg
- slag landfill: 1.34e-12 unit; lognormal variance with pedigree 0.32, pedigree (1,1,5,1,1)
  (same comment as for electricity, for reuse in municipal waste incineration only)
- chemical, inorganic: 6.71e-9 kg; lognormal variance with pedigree 0.75, pedigree (1,1,5,1,1)
  (same comment as for electricity, for reuse in municipal waste incineration only)
  properties: carbon content, fossil 0.003, dry mass 1 kg, wet mass 1 kg
  note on carbon content, fossil: This dataset is an unweighted average of 20 inorganic substances (listed in Tab 88.1, ecoinvent v2.2 report 8, part II), being part of the top100 chemicals included in this database. The C-content has also been calculated as an unweighted average of the C content of the substances composing this dataset.
- hydrochloric acid, without water, in 30% solution state: 4.03e-9 kg; lognormal variance with pedigree 0.75, pedigree (1,1,5,1,1)
  (same comment as for electricity, for reuse in municipal waste incineration only)
  properties: wet mass 1 kg, dry mass 1 kg
- process-specific burdens, slag landfill: 0.000753 kg; lognormal variance with pedigree 0.32, pedigree (1,1,5,1,1)
  burden from incineration of sludge from wastewater treatment of the short-term leachate (0-100a). uncertainty is calculated from uncertainties in waste composition and transfer coefficients in incinerator and uncertainty of waste decomposition and short-term leaching in sanitary landfill;activityLink introduced to establish a direct link to the corresponding regional supply of this product
- iron sulfate: 6.43e-5 kg; lognormal variance with pedigree 1.16, pedigree (5,5,5,5,5)
  (same comment as for sewer grid, 5E9l/year, 110 km)
  properties: wet mass 1 kg, dry mass 1 kg
- chromium oxide, flakes: 1.29e-9 kg; lognormal variance with pedigree 0.83, pedigree (5,5,5,5,5)
  burden from incineration of sludge from wastewater treatment of the short-term leachate (0-100a). Proxy for vanadium pentoxide V2O5 in SCR catalyst, uncertainty calculated from uncertainty in average DeNOx input, uncertainty in the share of thermal NOx, uncertainty of nitrogen content in average municipal waste and the unertainty in nitrogen content in *this* waste and uncertainty of waste decomposition and short-term leaching in sanitary landfill
  properties: dry mass 1 kg, wet mass 1 kg
- titanium dioxide: 6.35e-8 kg; lognormal variance with pedigree 0.71, pedigree (1,1,5,1,1)
  (same comment as for electricity, for reuse in municipal waste incineration only)
  properties: dry mass 1 kg, wet mass 1 kg
- process-specific burdens, residual material landfill: 9.15e-5 kg; lognormal variance with pedigree 0.26, pedigree (1,1,5,1,1)
  (same comment as for process-specific burdens, slag landfill)
- sanitary landfill facility: 5.56e-10 unit; lognormal variance with pedigree 0.04, pedigree (1,1,5,1,1)
  demands per kilogram waste. uncertainty is heeded in the module
  This exchange has an activity link directly to the producing activity because the product is primarily consumed in the same geographical area where it is produced.
- heat, central or small-scale, other than natural gas: 0.00054238 MJ; lognormal variance with pedigree 0.35, pedigree (5,5,5,5,5)
  (same comment as for sewer grid, 5E9l/year, 110 km)
- quicklime, milled, packed: 2.39e-8 kg; lognormal variance with pedigree 0.34, pedigree (1,1,5,1,1)
  (same comment as for electricity, for reuse in municipal waste incineration only)
  properties: dry mass 0.99 kg, water content 0.010101, wet mass 1 kg
- process-specific burdens, sanitary landfill: 1 kg; lognormal variance with pedigree 0.04, pedigree (1,1,5,1,1)
  demands per kilogram waste. uncertainty is heeded in the module;activityLink introduced to establish a direct link to the corresponding regional supply of this product
- ammonia, liquid: 2.22e-6 kg; lognormal variance with pedigree 0.47, pedigree (1,1,5,1,1)
  (same comment as for electricity, for reuse in municipal waste incineration only)
  properties: wet mass 1 kg, dry mass 1 kg
- chemical, organic: 2.2e-7 kg; lognormal variance with pedigree 1.59, pedigree (1,1,5,1,1)
  (same comment as for electricity, for reuse in municipal waste incineration only)
  properties: carbon content, fossil 0.628, dry mass 1 kg, wet mass 1 kg
  note on carbon content, fossil: This dataset is an unweighted average of 20 organic substances (listed in Tab 88.1, ecoinvent v2.2 report 8, part II), being part of the top100 chemicals included in this database. The C-content has also been calculated as an unweighted average of the C content of the substances composing this dataset.
- electricity, low voltage: 0.00864 kWh; lognormal variance with pedigree 0.41, pedigree (5,5,5,5,5)
  (same comment as for sewer grid, 5E9l/year, 110 km)
- cement, unspecified: 3.66e-5 kg; lognormal variance with pedigree 0.26, pedigree (1,1,5,1,1)
  (same comment as for electricity, for reuse in municipal waste incineration only)
  properties: dry mass 1 kg, wet mass 1 kg

## Emissions to nature
- BOD5, Biological Oxygen Demand [water, surface water]: 0.000325 kg; lognormal variance with pedigree 0.53, pedigree (1,1,5,1,1)
  Emissions from short-term leachate treatment and incineration of resulting sludge. Uncertainty calculated depending on waste input and uncertainty of transfer coefficents in landfill, wastewater treatment and incineration model.
- Copper, ion [water, surface water]: 7.55e-8 kg; lognormal variance with pedigree 1.51, pedigree (1,1,5,1,1)
  (same comment as for BOD5, Biological Oxygen Demand)
- Aluminium [air, urban air close to ground]: 1.45e-7 kg; lognormal variance with pedigree 0.78, pedigree (1,1,5,1,1)
  (same comment as for BOD5, Biological Oxygen Demand)
- Vanadium, ion [water, surface water]: 9.27e-8 kg; lognormal variance with pedigree 1.6, pedigree (1,1,5,1,1)
  (same comment as for BOD5, Biological Oxygen Demand)
- Iron, ion [water, surface water]: 1.58e-5 kg; lognormal variance with pedigree 0.93, pedigree (1,1,5,1,1)
  (same comment as for BOD5, Biological Oxygen Demand)
- Vanadium [air, non-urban air or from high stacks]: 4.57e-11 kg; lognormal variance with pedigree 2.67, pedigree (1,1,5,1,1)
  burden from direct release or incineration of landfill biogas. Uncertainty calculated from unertainty of the waste composition of this waste, uncertainty in waste decomposition and short-term leaching in sanitary landfill
- Cadmium [air, urban air close to ground]: 3.81e-12 kg; lognormal variance with pedigree 1.68, pedigree (1,1,5,1,1)
  (same comment as for BOD5, Biological Oxygen Demand)
- Manganese [water, surface water]: 3.02e-6 kg; lognormal variance with pedigree 1.14, pedigree (1,1,5,1,1)
  (same comment as for BOD5, Biological Oxygen Demand)
- Mercury [air, urban air close to ground]: 5.07e-15 kg; lognormal variance with pedigree 2.18, pedigree (1,1,5,1,1)
  (same comment as for BOD5, Biological Oxygen Demand)
- Nickel, ion [water, ground-, long-term]: 0.000107 kg; lognormal variance with pedigree 0.99, pedigree (1,1,5,1,1)
  Emissions from long-term leachate (>100a) directly from MSW landfill and indirectly via incineration of treatement sludge from leachate treatement. Uncertainty calculated depending on waste input and uncertainty of long-term transfer coefficents in landfill.
- Antimony [air, non-urban air or from high stacks]: 3.23e-11 kg; lognormal variance with pedigree 2.71, pedigree (1,1,5,1,1)
  (same comment as for Vanadium)
- Lead [water, ground-, long-term]: 0.000502 kg; lognormal variance with pedigree 0.79, pedigree (1,1,5,1,1)
  (same comment as for Nickel, ion)
- Nickel [air, urban air close to ground]: 6.52e-15 kg; lognormal variance with pedigree 1.6, pedigree (1,1,5,1,1)
  (same comment as for BOD5, Biological Oxygen Demand)
- Carbon dioxide, fossil [air, non-urban air or from high stacks]: 0.00615 kg; lognormal variance with pedigree 0.16, pedigree (1,1,5,1,1)
  (same comment as for Vanadium)
- Carbon monoxide, non-fossil [air, urban air close to ground]: 3.17e-6 kg; lognormal variance with pedigree 0.49, pedigree (1,1,5,1,1)
  (same comment as for BOD5, Biological Oxygen Demand)
- Magnesium [air, non-urban air or from high stacks]: 1.02e-7 kg; lognormal variance with pedigree 1.65, pedigree (1,1,5,1,1)
  (same comment as for Vanadium)
- Chromium [air, non-urban air or from high stacks]: 8.43e-11 kg; lognormal variance with pedigree 2.58, pedigree (1,1,5,1,1)
  (same comment as for Vanadium)
- Zinc [air, urban air close to ground]: 2.59e-11 kg; lognormal variance with pedigree 1.31, pedigree (1,1,5,1,1)
  (same comment as for BOD5, Biological Oxygen Demand)
- Sulfur dioxide [air, non-urban air or from high stacks]: 2.74e-5 kg; lognormal variance with pedigree 1.02, pedigree (1,1,5,1,1)
  (same comment as for Vanadium)
- Sodium [air, non-urban air or from high stacks]: 2.63e-7 kg; lognormal variance with pedigree 1.53, pedigree (1,1,5,1,1)
  (same comment as for Vanadium)
- Tin, ion [water, ground-, long-term]: 7.34e-5 kg; lognormal variance with pedigree 1.04, pedigree (1,1,5,1,1)
  (same comment as for Nickel, ion)
- Boron [air, urban air close to ground]: 4.25e-7 kg; lognormal variance with pedigree 1.38, pedigree (1,1,5,1,1)
  (same comment as for BOD5, Biological Oxygen Demand)
- Selenium [water, surface water]: 4.07e-9 kg; lognormal variance with pedigree 2.05, pedigree (1,1,5,1,1)
  (same comment as for BOD5, Biological Oxygen Demand)
- Fluoride [water, surface water]: 1.07e-6 kg; lognormal variance with pedigree 1.37, pedigree (1,1,5,1,1)
  Emissions from short-term leachate treatment. Uncertainty calculated depending on waste input and uncertainty of transfer coefficents in landfill and wastewater treatment.
- Carbon dioxide, fossil [air, urban air close to ground]: 0.000205 kg; lognormal variance with pedigree 0.53, pedigree (1,1,5,1,1)
  (same comment as for BOD5, Biological Oxygen Demand)
- Vanadium [air, urban air close to ground]: 8.99e-12 kg; lognormal variance with pedigree 1.65, pedigree (1,1,5,1,1)
  (same comment as for BOD5, Biological Oxygen Demand)
- Cobalt [air, non-urban air or from high stacks]: 2.9e-11 kg; lognormal variance with pedigree 2.73, pedigree (1,1,5,1,1)
  (same comment as for Vanadium)
- Cobalt [air, urban air close to ground]: 1.82e-15 kg; lognormal variance with pedigree 1.83, pedigree (1,1,5,1,1)
  (same comment as for BOD5, Biological Oxygen Demand)
- Particulates, < 2.5 um [air, non-urban air or from high stacks]: 2.68e-6 kg; lognormal variance with pedigree 0.46, pedigree (1,1,5,1,1)
  (same comment as for Vanadium)
- Silicon [water, ground-, long-term]: 0.000941 kg; lognormal variance with pedigree 4.09, pedigree (1,1,5,1,1)
  (same comment as for Nickel, ion)
- Selenium [air, urban air close to ground]: 0 kg; pedigree (1,1,1,1,1)
  (same comment as for BOD5, Biological Oxygen Demand)
- Barium [water, surface water]: 6.6e-7 kg; lognormal variance with pedigree 1.12, pedigree (1,1,5,1,1)
  (same comment as for BOD5, Biological Oxygen Demand)
- Silicon [air, urban air close to ground]: 4.54e-7 kg; lognormal variance with pedigree 0.74, pedigree (1,1,5,1,1)
  (same comment as for BOD5, Biological Oxygen Demand)
- Silicon [water, surface water]: 1.25e-5 kg; lognormal variance with pedigree 0.72, pedigree (1,1,5,1,1)
  (same comment as for BOD5, Biological Oxygen Demand)
- Iodide [water, surface water]: 8.23e-9 kg; lognormal variance with pedigree 1.97, pedigree (1,1,5,1,1)
  (same comment as for Fluoride)
- Cyanide [air, urban air close to ground]: 3.95e-8 kg; lognormal variance with pedigree 0.49, pedigree (1,1,5,1,1)
  (same comment as for BOD5, Biological Oxygen Demand)
- Zinc, ion [water, ground-, long-term]: 0.00108 kg; lognormal variance with pedigree 0.67, pedigree (1,1,5,1,1)
  (same comment as for Nickel, ion)
- TOC, Total Organic Carbon [water, ground-, long-term]: 0.0713 kg; lognormal variance with pedigree 0.6, pedigree (1,1,5,1,1)
  (same comment as for Nickel, ion)
- Copper [air, urban air close to ground]: 1.59e-12 kg; lognormal variance with pedigree 1.58, pedigree (1,1,5,1,1)
  (same comment as for BOD5, Biological Oxygen Demand)
- Antimony [air, urban air close to ground]: 6.36e-12 kg; lognormal variance with pedigree 2.28, pedigree (1,1,5,1,1)
  (same comment as for BOD5, Biological Oxygen Demand)
- Magnesium [water, surface water]: 0.000369 kg; lognormal variance with pedigree 0.65, pedigree (1,1,5,1,1)
  (same comment as for BOD5, Biological Oxygen Demand)
- Antimony [water, ground-, long-term]: 2.29e-6 kg; lognormal variance with pedigree 2.5, pedigree (1,1,5,1,1)
  (same comment as for Nickel, ion)
- Aluminium [water, ground-, long-term]: 0.0124 kg; lognormal variance with pedigree 0.38, pedigree (1,1,5,1,1)
  (same comment as for Nickel, ion)
- Phosphate [water, surface water]: 1.46e-5 kg; lognormal variance with pedigree 1.03, pedigree (1,1,5,1,1)
  (same comment as for BOD5, Biological Oxygen Demand)
- Magnesium [air, urban air close to ground]: 5.52e-8 kg; lognormal variance with pedigree 0.68, pedigree (1,1,5,1,1)
  (same comment as for BOD5, Biological Oxygen Demand)
- Molybdenum [water, ground-, long-term]: 7.73e-7 kg; lognormal variance with pedigree 1.69, pedigree (1,1,5,1,1)
  (same comment as for Nickel, ion)
- Mercury [air, non-urban air or from high stacks]: 1.2e-9 kg; lognormal variance with pedigree 2.24, pedigree (1,1,5,1,1)
  (same comment as for Vanadium)
- Zinc [air, non-urban air or from high stacks]: 5.09e-10 kg; lognormal variance with pedigree 2.34, pedigree (1,1,5,1,1)
  (same comment as for Vanadium)
- Phosphorus [air, urban air close to ground]: 8.6e-9 kg; lognormal variance with pedigree 1.06, pedigree (1,1,5,1,1)
  (same comment as for BOD5, Biological Oxygen Demand)
- Bromine [water, ground-, long-term]: 1.18e-5 kg; lognormal variance with pedigree 1.27, pedigree (1,1,5,1,1)
  (same comment as for Nickel, ion)
- Nickel [air, non-urban air or from high stacks]: 9.6e-11 kg; lognormal variance with pedigree 2.57, pedigree (1,1,5,1,1)
  (same comment as for Vanadium)
- Methane, non-fossil [air, urban air close to ground]: 8.81e-6 kg; lognormal variance with pedigree 0.58, pedigree (1,1,5,1,1)
  (same comment as for BOD5, Biological Oxygen Demand)
- COD, Chemical Oxygen Demand [water, surface water]: 0.00103 kg; lognormal variance with pedigree 0.53, pedigree (1,1,5,1,1)
  (same comment as for BOD5, Biological Oxygen Demand)
- Arsenic, ion [water, ground-, long-term]: 5.98e-7 kg; lognormal variance with pedigree 1.65, pedigree (1,1,5,1,1)
  (same comment as for Nickel, ion)
- NMVOC, non-methane volatile organic compounds, unspecified origin [air, non-urban air or from high stacks]: 1.51e-7 kg; lognormal variance with pedigree 0.2, pedigree (1,1,5,1,1)
  (same comment as for Vanadium)
- Arsenic [air, urban air close to ground]: 8.46e-12 kg; lognormal variance with pedigree 1.9, pedigree (1,1,5,1,1)
  (same comment as for BOD5, Biological Oxygen Demand)
- Cobalt [water, surface water]: 5.9e-8 kg; lognormal variance with pedigree 1.7, pedigree (1,1,5,1,1)
  (same comment as for BOD5, Biological Oxygen Demand)
- Mercury [water, surface water]: 9.48e-10 kg; lognormal variance with pedigree 2.12, pedigree (1,1,5,1,1)
  (same comment as for BOD5, Biological Oxygen Demand)
- Cobalt [water, ground-, long-term]: 1.28e-6 kg; lognormal variance with pedigree 1.51, pedigree (1,1,5,1,1)
  (same comment as for Nickel, ion)
- Selenium [water, ground-, long-term]: 9.04e-8 kg; lognormal variance with pedigree 2.13, pedigree (1,1,5,1,1)
  (same comment as for Nickel, ion)
- Dinitrogen monoxide [air, urban air close to ground]: 3.88e-6 kg; lognormal variance with pedigree 0.34, pedigree (1,1,5,1,1)
  (same comment as for BOD5, Biological Oxygen Demand)
- Bromine [water, surface water]: 1.69e-6 kg; lognormal variance with pedigree 1.37, pedigree (1,1,5,1,1)
  (same comment as for Fluoride)
- Ammonium, ion [water, surface water]: 0.000763 kg; lognormal variance with pedigree 0.4, pedigree (1,1,5,1,1)
  (same comment as for BOD5, Biological Oxygen Demand)
- DOC, Dissolved Organic Carbon [water, surface water]: 0.000251 kg; lognormal variance with pedigree 0.53, pedigree (1,1,5,1,1)
  (same comment as for BOD5, Biological Oxygen Demand)
- Manganese [water, ground-, long-term]: 0.00025 kg; lognormal variance with pedigree 0.86, pedigree (1,1,5,1,1)
  (same comment as for Nickel, ion)
- Nitrate [water, ground-, long-term]: 6.8e-5 kg; lognormal variance with pedigree 0.54, pedigree (1,1,5,1,1)
  (same comment as for Nickel, ion)
- Nitrite [water, ground-, long-term]: 3.44e-5 kg; lognormal variance with pedigree 0.56, pedigree (1,1,5,1,1)
  (same comment as for Nickel, ion)
- Calcium, ion [water, ground-, long-term]: 0.0138 kg; lognormal variance with pedigree 0.37, pedigree (1,1,5,1,1)
  (same comment as for Nickel, ion)
- COD, Chemical Oxygen Demand [water, ground-, long-term]: 0.0779 kg; lognormal variance with pedigree 0.6, pedigree (1,1,5,1,1)
  (same comment as for Nickel, ion)
- Nitrogen oxides [air, urban air close to ground]: 1.37e-5 kg; lognormal variance with pedigree 0.38, pedigree (1,1,5,1,1)
  (same comment as for BOD5, Biological Oxygen Demand)
- Tin [air, urban air close to ground]: 1.05e-11 kg; lognormal variance with pedigree 1.95, pedigree (1,1,5,1,1)
  (same comment as for BOD5, Biological Oxygen Demand)
- Iodine [air, non-urban air or from high stacks]: 1.15e-10 kg; lognormal variance with pedigree 2.34, pedigree (1,1,5,1,1)
  (same comment as for Vanadium)
- Ammonia [air, urban air close to ground]: 1.41e-6 kg; lognormal variance with pedigree 0.39, pedigree (1,1,5,1,1)
  (same comment as for BOD5, Biological Oxygen Demand)
- Copper, ion [water, ground-, long-term]: 0.00121 kg; lognormal variance with pedigree 0.67, pedigree (1,1,5,1,1)
  (same comment as for Nickel, ion)
- Chromium, ion [water, surface water]: 5.29e-10 kg; lognormal variance with pedigree 1.53, pedigree (1,1,5,1,1)
  (same comment as for BOD5, Biological Oxygen Demand)
- Boron [water, surface water]: 4.2e-6 kg; lognormal variance with pedigree 1.35, pedigree (1,1,5,1,1)
  (same comment as for BOD5, Biological Oxygen Demand)
- Iron, ion [water, ground-, long-term]: 0.00213 kg; lognormal variance with pedigree 2.02, pedigree (1,1,5,1,1)
  (same comment as for Nickel, ion)
- Hydrogen chloride [air, non-urban air or from high stacks]: 1.79e-5 kg; lognormal variance with pedigree 0.99, pedigree (1,1,5,1,1)
  (same comment as for Vanadium)
- Tin [air, non-urban air or from high stacks]: 3.41e-12 kg; lognormal variance with pedigree 2.99, pedigree (1,1,5,1,1)
  (same comment as for Vanadium)
- Lead [air, non-urban air or from high stacks]: 5.62e-11 kg; lognormal variance with pedigree 2.62, pedigree (1,1,5,1,1)
  (same comment as for Vanadium)
- Nitrogen oxides [air, non-urban air or from high stacks]: 4.07e-7 kg; lognormal variance with pedigree 0.83, pedigree (1,1,5,1,1)
  (same comment as for Vanadium)
- Lead [water, surface water]: 1.85e-8 kg; lognormal variance with pedigree 1.58, pedigree (1,1,5,1,1)
  (same comment as for BOD5, Biological Oxygen Demand)
- Selenium [air, non-urban air or from high stacks]: 1.52e-12 kg; lognormal variance with pedigree 3.11, pedigree (1,1,5,1,1)
  (same comment as for Vanadium)
- Potassium [air, non-urban air or from high stacks]: 1.07e-7 kg; lognormal variance with pedigree 1.64, pedigree (1,1,5,1,1)
  (same comment as for Vanadium)
- Boron [water, ground-, long-term]: 2.34e-6 kg; lognormal variance with pedigree 1.38, pedigree (1,1,5,1,1)
  (same comment as for Nickel, ion)
- Aluminium [air, non-urban air or from high stacks]: 2.4e-8 kg; lognormal variance with pedigree 1.86, pedigree (1,1,5,1,1)
  (same comment as for Vanadium)
- NMVOC, non-methane volatile organic compounds, unspecified origin [air, urban air close to ground]: 4.18e-8 kg; lognormal variance with pedigree 0.69, pedigree (1,1,5,1,1)
  (same comment as for BOD5, Biological Oxygen Demand)
- Sulfate [water, ground-, long-term]: 0.00287 kg; lognormal variance with pedigree 0.68, pedigree (1,1,5,1,1)
  (same comment as for Nickel, ion)
- Methane, fossil [air, urban air close to ground]: 4.03e-7 kg; lognormal variance with pedigree 0.58, pedigree (1,1,5,1,1)
  (same comment as for BOD5, Biological Oxygen Demand)
- Cadmium [air, non-urban air or from high stacks]: 9.3e-10 kg; lognormal variance with pedigree 2.28, pedigree (1,1,5,1,1)
  (same comment as for Vanadium)
- Barium [air, urban air close to ground]: 1.03e-8 kg; lognormal variance with pedigree 1.14, pedigree (1,1,5,1,1)
  (same comment as for BOD5, Biological Oxygen Demand)
- Chromium VI [water, surface water]: 1.76e-7 kg; lognormal variance with pedigree 1.5, pedigree (1,1,5,1,1)
  (same comment as for BOD5, Biological Oxygen Demand)
- Chloride [water, ground-, long-term]: 0.00561 kg; lognormal variance with pedigree 0.46, pedigree (1,1,5,1,1)
  (same comment as for Nickel, ion)
- TOC, Total Organic Carbon [water, surface water]: 0.000261 kg; lognormal variance with pedigree 0.53, pedigree (1,1,5,1,1)
  (same comment as for BOD5, Biological Oxygen Demand)
- Cadmium, ion [water, ground-, long-term]: 1.16e-5 kg; lognormal variance with pedigree 1.29, pedigree (1,1,5,1,1)
  (same comment as for Nickel, ion)
- Carbon monoxide, fossil [air, non-urban air or from high stacks]: 3.49e-7 kg; lognormal variance with pedigree 0.8, pedigree (1,1,5,1,1)
  (same comment as for Vanadium)
- Arsenic [air, non-urban air or from high stacks]: 4.21e-10 kg; lognormal variance with pedigree 2.37, pedigree (1,1,5,1,1)
  (same comment as for Vanadium)
- Nitrate [water, surface water]: 0.00278 kg; lognormal variance with pedigree 0.36, pedigree (1,1,5,1,1)
  (same comment as for BOD5, Biological Oxygen Demand)
- Aluminium [water, surface water]: 5.76e-6 kg; lognormal variance with pedigree 0.79, pedigree (1,1,5,1,1)
  (same comment as for BOD5, Biological Oxygen Demand)
- Carbon dioxide, non-fossil [air, non-urban air or from high stacks]: 0.135 kg; lognormal variance with pedigree 0.16, pedigree (1,1,5,1,1)
  (same comment as for Vanadium)
- Carbon dioxide, non-fossil [air, urban air close to ground]: 0.0045 kg; lognormal variance with pedigree 0.53, pedigree (1,1,5,1,1)
  (same comment as for BOD5, Biological Oxygen Demand)
- DOC, Dissolved Organic Carbon [water, ground-, long-term]: 0.0713 kg; lognormal variance with pedigree 0.6, pedigree (1,1,5,1,1)
  (same comment as for Nickel, ion)
- Barium [air, non-urban air or from high stacks]: 2.74e-9 kg; lognormal variance with pedigree 2.13, pedigree (1,1,5,1,1)
  (same comment as for Vanadium)
- Antimony [water, surface water]: 8.76e-8 kg; lognormal variance with pedigree 1.63, pedigree (1,1,5,1,1)
  (same comment as for BOD5, Biological Oxygen Demand)
- Vanadium, ion [water, ground-, long-term]: 2.65e-6 kg; lognormal variance with pedigree 1.69, pedigree (1,1,5,1,1)
  (same comment as for Nickel, ion)
- Magnesium [water, ground-, long-term]: 0.00301 kg; lognormal variance with pedigree 0.53, pedigree (1,1,5,1,1)
  (same comment as for Nickel, ion)
- Lead [air, urban air close to ground]: 5.58e-12 kg; lognormal variance with pedigree 1.64, pedigree (1,1,5,1,1)
  (same comment as for BOD5, Biological Oxygen Demand)
- Molybdenum [water, surface water]: 3.33e-8 kg; lognormal variance with pedigree 1.77, pedigree (1,1,5,1,1)
  (same comment as for BOD5, Biological Oxygen Demand)
- Potassium, ion [water, ground-, long-term]: 0.00163 kg; lognormal variance with pedigree 0.61, pedigree (1,1,5,1,1)
  (same comment as for Nickel, ion)
- Copper [air, non-urban air or from high stacks]: 8.32e-11 kg; lognormal variance with pedigree 2.57, pedigree (1,1,5,1,1)
  (same comment as for Vanadium)
- Manganese [air, urban air close to ground]: 1.59e-14 kg; lognormal variance with pedigree 1.29, pedigree (1,1,5,1,1)
  (same comment as for BOD5, Biological Oxygen Demand)
- Molybdenum [air, non-urban air or from high stacks]: 1.41e-11 kg; lognormal variance with pedigree 2.83, pedigree (1,1,5,1,1)
  (same comment as for Vanadium)
- Hydrogen sulfide [water, ground-, long-term]: 7.48e-5 kg; lognormal variance with pedigree 0.68, pedigree (1,1,5,1,1)
  (same comment as for Nickel, ion)
- Phosphate [water, ground-, long-term]: 1.93e-5 kg; lognormal variance with pedigree 6.94, pedigree (1,1,5,1,1)
  (same comment as for Nickel, ion)
- Bromine [air, non-urban air or from high stacks]: 2.37e-8 kg; lognormal variance with pedigree 1.85, pedigree (1,1,5,1,1)
  (same comment as for Vanadium)
- Potassium, ion [water, surface water]: 0.000428 kg; lognormal variance with pedigree 0.67, pedigree (1,1,5,1,1)
  (same comment as for Fluoride)
- Fluoride [water, ground-, long-term]: 4.98e-5 kg; lognormal variance with pedigree 1.08, pedigree (1,1,5,1,1)
  (same comment as for Nickel, ion)
- Methane, fossil [air, non-urban air or from high stacks]: 0.000944 kg; lognormal variance with pedigree 0.2, pedigree (1,1,5,1,1)
  (same comment as for Vanadium)
- Methane, non-fossil [air, non-urban air or from high stacks]: 0.0206 kg; lognormal variance with pedigree 0.2, pedigree (1,1,5,1,1)
  (same comment as for Vanadium)
- Zinc, ion [water, surface water]: 7.09e-7 kg; lognormal variance with pedigree 1.24, pedigree (1,1,5,1,1)
  (same comment as for BOD5, Biological Oxygen Demand)
- Iodide [water, ground-, long-term]: 3.76e-9 kg; lognormal variance with pedigree 1.98, pedigree (1,1,5,1,1)
  (same comment as for Nickel, ion)
- Chromium [air, urban air close to ground]: 1.23e-14 kg; lognormal variance with pedigree 1.6, pedigree (1,1,5,1,1)
  (same comment as for BOD5, Biological Oxygen Demand)
- Nitrite [water, surface water]: 1.6e-5 kg; lognormal variance with pedigree 0.57, pedigree (1,1,5,1,1)
  (same comment as for BOD5, Biological Oxygen Demand)
- Calcium [air, urban air close to ground]: 5.13e-8 kg; lognormal variance with pedigree 0.67, pedigree (1,1,5,1,1)
  (same comment as for BOD5, Biological Oxygen Demand)
- Molybdenum [air, urban air close to ground]: 5.55e-11 kg; lognormal variance with pedigree 1.8, pedigree (1,1,5,1,1)
  (same comment as for BOD5, Biological Oxygen Demand)
- Hydrogen fluoride [air, non-urban air or from high stacks]: 5.82e-6 kg; lognormal variance with pedigree 1.2, pedigree (1,1,5,1,1)
  (same comment as for Vanadium)
- Nitrogen, organic bound [water, ground-, long-term]: 0.00103 kg; lognormal variance with pedigree 0.56, pedigree (1,1,5,1,1)
  (same comment as for Nickel, ion)
- Arsenic, ion [water, surface water]: 2.65e-8 kg; lognormal variance with pedigree 1.86, pedigree (1,1,5,1,1)
  (same comment as for BOD5, Biological Oxygen Demand)
- Barium [water, ground-, long-term]: 0.000147 kg; lognormal variance with pedigree 0.87, pedigree (1,1,5,1,1)
  (same comment as for Nickel, ion)
- Carbon monoxide, non-fossil [air, non-urban air or from high stacks]: 7.63e-6 kg; lognormal variance with pedigree 0.8, pedigree (1,1,5,1,1)
  (same comment as for Vanadium)
- Tin, ion [water, surface water]: 5.71e-9 kg; lognormal variance with pedigree 1.92, pedigree (1,1,5,1,1)
  (same comment as for BOD5, Biological Oxygen Demand)
- Calcium [air, non-urban air or from high stacks]: 7.84e-8 kg; lognormal variance with pedigree 1.7, pedigree (1,1,5,1,1)
  (same comment as for Vanadium)
- Mercury [water, ground-, long-term]: 1.44e-6 kg; lognormal variance with pedigree 1.56, pedigree (1,1,5,1,1)
  (same comment as for Nickel, ion)
- Cadmium, ion [water, surface water]: 7.08e-8 kg; lognormal variance with pedigree 1.63, pedigree (1,1,5,1,1)
  (same comment as for BOD5, Biological Oxygen Demand)
- Chloride [water, surface water]: 0.0013 kg; lognormal variance with pedigree 0.49, pedigree (1,1,5,1,1)
  (same comment as for Fluoride)
- Chromium VI [water, ground-, long-term]: 1.44e-6 kg; lognormal variance with pedigree 8.14, pedigree (1,1,5,1,1)
  (same comment as for Nickel, ion)
- Silver, ion [water, ground-, long-term]: 7.14e-7 kg; lognormal variance with pedigree 1.65, pedigree (1,1,5,1,1)
  (same comment as for Nickel, ion)
- Manganese [air, non-urban air or from high stacks]: 1.49e-9 kg; lognormal variance with pedigree 2.21, pedigree (1,1,5,1,1)
  (same comment as for Vanadium)
- Ammonium, ion [water, ground-, long-term]: 0.000631 kg; lognormal variance with pedigree 0.56, pedigree (1,1,5,1,1)
  (same comment as for Nickel, ion)
- Iron [air, urban air close to ground]: 2.31e-9 kg; lognormal variance with pedigree 0.84, pedigree (1,1,5,1,1)
  (same comment as for BOD5, Biological Oxygen Demand)
- Silicon [air, non-urban air or from high stacks]: 5.19e-8 kg; lognormal variance with pedigree 1.78, pedigree (1,1,5,1,1)
  (same comment as for Vanadium)
- Nickel, ion [water, surface water]: 2.33e-7 kg; lognormal variance with pedigree 1.49, pedigree (1,1,5,1,1)
  (same comment as for BOD5, Biological Oxygen Demand)
- Sulfate [water, surface water]: 0.000294 kg; lognormal variance with pedigree 0.65, pedigree (1,1,5,1,1)
  (same comment as for Fluoride)
- Calcium, ion [water, surface water]: 0.000283 kg; lognormal variance with pedigree 0.64, pedigree (1,1,5,1,1)
  (same comment as for BOD5, Biological Oxygen Demand)
- Sodium, ion [water, surface water]: 0.00105 kg; lognormal variance with pedigree 0.55, pedigree (1,1,5,1,1)
  (same comment as for Fluoride)
- Sodium, ion [water, ground-, long-term]: 0.00409 kg; lognormal variance with pedigree 0.49, pedigree (1,1,5,1,1)
  (same comment as for Nickel, ion)
- Iron [air, non-urban air or from high stacks]: 7.77e-9 kg; lognormal variance with pedigree 2.01, pedigree (1,1,5,1,1)
  (same comment as for Vanadium)
- Carbon monoxide, fossil [air, urban air close to ground]: 1.45e-7 kg; lognormal variance with pedigree 0.49, pedigree (1,1,5,1,1)
  (same comment as for BOD5, Biological Oxygen Demand)
- BOD5, Biological Oxygen Demand [water, ground-, long-term]: 0.0185 kg; lognormal variance with pedigree 0.6, pedigree (1,1,5,1,1)
  (same comment as for Nickel, ion)
- Nitrogen [water, surface water]: 2.07e-5 kg; lognormal variance with pedigree 0.37, pedigree (1,1,5,1,1)
  (same comment as for BOD5, Biological Oxygen Demand)

## Sampling procedure
Landfill model based on observed leachate concentrations in literature. Extrapolated to 60'000 years heeding chemical characteristics. Initial waste composition from various literature sources.

## Extrapolations
This dataset has been extrapolated from year 2000 to the year of the calculation (2019). The uncertainty has been adjusted accordingly.

## Review by Niels Jungbluth 2003-07-21
Passed. Calculation for standard deviation 95 of, i.e., infrastructure,
land occupation, transport services or other services can differ from
standard Pedigree approach used in this project and figures obtained by
this procedure.
