# treatment of biowaste, industrial composting

Dataset: EcoSpold 2, unit process
Geography: CH
Time period: 2011-01-01 to 2019-12-31
Technology level: current
Classification: EcoSpold01Categories: agricultural means of production/organic fertiliser
Classification: ISIC rev.4 ecoinvent: 3821:Treatment and disposal of non-hazardous waste
Scenario: Business-as-Usual
System model: Allocation at the point of substitution
Generated by: Mischa Zschokke-Gohl
Published in: Dinkel F. 2012
Database: ecoinvent
isCopyrightProtected: true
accessRestrictedTo: 1

## General comment
Biowaste in the current process is defined as follows:
Biodegradable garden and park waste, food and kitchen waste from households, restaurants, caterers and retail premises, comparable waste from food processing plants, it also includes forestry or agricultural residues and manure. It does not include sewage sludge, or other biodegradable waste such as natural textiles, paper or processed wood.
The composting treatment is a process of controlled decomposition and humification of biodegradable materials under managed conditions, which is aerobic and which allows the development of temperatures suitable for mesophilic and thermophilic bacteria as a result of biologically produced heat.
The relevant resulting emissions to air are summarised in the following table:
The resulting output "compost" inventory refers to 1 kg fresh weight of biogenic waste. The process modelled describes industrial composting. Compost is defined as humified solid particulate material that is the result of composting, which has been sanitised and stabilised, and which confers beneficial effects when it is added to soil It is used as growing media constituent, or used in another way in conjunction with plants.
The contents of compost are as follows:
The heavy metal contents of compost are presented in the following table:
Previous studies in the corresponding field showed that the evaluation of heavy metal emissions into soil with various single score methods such as Eco-Indicator 99 and ecological scarcity have a significant impact on the overall results. It is therefore advised to take special care when evaluating these systems, especially to avoid potential double counting.
The output compost uses a special property "humus equivalents" which depicts the amount of organic carbon, which would lead to a buildup of humus.
Different substrates have different capacities of organic matter to form humus (see following table)
The proposed method to account for humus C is based on the following methodology:
The organic carbon content of soil (Corg) is normally used to declare the amount of organic matter of soil. The content of humus is calculated from Corg, using the assumption that humus contains 58% carbon on average.
The amount of humus is therefore calculated out of Corg as follows:
humus content [%] or [mg g-1] = (Ctotal – Cinorg) / 0.58
If an allocation approach with substution is applied, the corresponding amounts of substitutes are calculated based on their capacity to build up humus. The conversion is based on the humus factors, which are listed in the next table:
More detailed descriptions and background information can be found in the corresponding report.
[This dataset is meant to replace the following datasets:
- treatment of biowaste, composting, CH, 1999 - 1999]

## Included activities end
Energy demand for operating a compost plant was included as well as process emissions, infrastructure of the compost plant and transports related to the collection of the biogenic waste. Values refer to compost with a water content of 50 % by weight.

## Geography
Values refer to the situation in Switzerland.

## Technology
Compost inventory refers to open plant compost production.
The process step-by-step, from shredding to products:
1. Reception and weighing (+ storage of feedstock)
2. Shredding (depending on structure of feedstock)
3. Anaerobic digestion (AD) and solid/liquid separation
4. Rotting process, turning over, aeration and watering
5. Post-processing and conditioning
The scheme for industrial composting as used here is presented the following figure:
To assure best practice and good quality of the resulting product, it is assumed that the treatment process adheres to the following procedure:

## Reference product
- biowaste: -1 kg; name Mass_biowaste; CPC 391: Wastes from food and tobacco industry; By-product classification Waste; pedigree (1,1,1,1,1)
  Dry mass of the compost is 50% of the wet mass, while the biowaste dry mass is 40% of the biowaste wet mass.
  production volume 8.26e8 kg; name biowaste_PV; = compost_annual_volume/Mass_compost
    Approx. 900\'000 tons of biowaste went into compost treatment in 2013 in Switzerland.
  property concentration, potassium 0 kg/kg; name Mass_biowaste_concentration_K
    potassium content on a fresh matter basis
  property concentration, cadmium 0 kg/kg; name Mass_biowaste_concentration_Cd
    cadmium content on a fresh matter basis
  property concentration, zinc 0 kg/kg; name Mass_biowaste_concentration_Zn
    zinc content on a fresh matter basis
  property concentration, nitrogen 0 kg/kg; name Mass_biowaste_concentration_N
    nitrogen content on a fresh matter basis
  property lead content 1.76e-5; name Mass_biowaste_Pb_content
    lead content on a dry matter basis
  property copper content 2.52e-5; name Mass_biowaste_Cu_content
    copper content on a dry matter basis
  property mercury content 6.6e-8; name Mass_biowaste_Hg_content
    mercury content on a dry matter basis
  property magnesium content 0.00347; name Mass_biowaste_Mg_content
    magnesium content on a dry matter basis
  property nickel content 1.06e-5; name Mass_biowaste_Ni_content
    nickel content on a dry matter basis
  property zinc content 7.94e-5; name Mass_biowaste_Zn_content
    zinc content on a dry matter basis
  property sulfur content 0.00126; name Mass_biowaste_S_content
    sulfur content on a dry matter basis
  property phosphorus content 0.00182; name Mass_biowaste_P_content
    phosphorus content on a dry matter basis
  property nitrogen content 0.009; name Mass_biowaste_N_content
    nitrogen content on a dry matter basis
  property cadmium content 1.91e-7; name Mass_biowaste_Cd_content
    cadmium content on a dry matter basis
  property potassium content 0.00658; name Mass_biowaste_K_content
    potassium content on a dry matter basis
  property water content 1.5; name Water_content_biowaste
  property dry mass 0.4 kg; name DM_biowaste
  property wet mass 1 kg; name WM_biowaste
  property calcium content 0.0333; name Mass_biowaste_Ca_content
    calcium content on a dry matter basis
  property concentration, copper 0 kg/kg; name Mass_biowaste_concentration_Cu
    copper content on a fresh matter basis
  property price 0 EUR2005
    Waste products are assigned a price of zero as they are assumed to require further treatment.
  property concentration, magnesium 0 kg/kg; name Mass_biowaste_concentration_Mg
    magnesium content on a fresh matter basis
  property concentration, calcium 0 kg/kg; name Mass_biowaste_concentration_Ca
    calcium content on a fresh matter basis
  property concentration, lead 0 kg/kg; name Mass_biowaste_concentration_Pb
    lead content on a fresh matter basis
  property concentration, nickel 0 kg/kg; name Mass_biowaste_concentration_Ni
    nickel content on a fresh matter basis
  property concentration, phosphorus 0 kg/kg; name Mass_biowaste_concentration_P
    phosphorus content on a fresh matter basis
  property concentration, sulfur 0 kg/kg; name Mass_biowaste_concentration_S
    sulfur content on a fresh matter basis
  property concentration, mercury 0 kg/kg; name Mass_biowaste_concentration_Hg
    mercury content on a fresh matter basis
  property carbon content 0.406
    carbon content on a dry matter basis (reserved; not for manual entry)
  properties: water in wet mass 0.6 kg, carbon content, fossil 0, carbon content, non-fossil 0.406, carbon allocation 0.1624 kg

## By-products
- compost: 0 kg; name Mass_compost; = ABS(Mass_biowaste/2); CPC 391: Wastes from food and tobacco industry; By-product classification allocatable product; pedigree (1,1,1,1,1)
  EcoSpold01Location=CH
  Biowaste is reduced in mass by a factor of 2 during composting
  production volume 0 kg; name compost_annual_volume
    413\'000 tons of compost produced in Switzerland in 2013.
    /report for BAFU by Umweko.
  property nitrogen content 0.0136364; name Mass_compost_N_content; = Mass_biowaste_N_content/0.5*( DM_biowaste / DM_compost)
    nitrogen content on a dry matter basis
  property water in wet mass 0.472 kg; name Water_in_wet_mass_compost; = 1- DM_compost
  property price 0.03 EUR2005
    Temporary price data. Calculated as 90% of purchasers price based on: Estimation done using the following sources: <http://www.wmaa.asn.au/uploads/documents/MarkWinser_1May2007.pdf>; <http://www.swlf.ait.ac.th/UpdData/International/Composting%20and%20anaerobic%20digestion_%20comparions%20for%20Europe%20and%20Asia.pdf>; <http://www.epa.gov/osw/conserve/rrr/composting/basic.htm>, accessed 2011.06.16
  property carbon content, non-fossil 0.1165
    calculation: dry matter 50%, organic matter 40% of dry matter, C content calculated from organic matter divided by 1.72. Relative to dry matter; relative to fresh matter: divided by 2 => 0.1156
  property dry mass 0.528 kg; name DM_compost
  property water content 0.893939; name Water_content_compost; = Water_in_wet_mass_compost/DM_compost
  property concentration, cadmium 0 kg/kg; name Mass_compost_concentration_Cd; = Mass_biowaste_concentration_Cd*2
    Biowaste mass is reduced by a factor of two during composting, therefore concentration is doubled
  property humus equivalent 0.061 kg
    Humus building fraction expressed in kg per kg product on a FM basis. Humus denotes the converted, primary biomass from plants or animals in the ground. More information can be found in the documentation of the composting itself: "treatment of biowaste, industrial composting".
  property concentration, copper 0 kg/kg; name Mass_compost_concentration_Cu; = Mass_biowaste_concentration_Cu*2
    (same comment as for compost)
  property concentration, calcium 0 kg/kg; name Mass_compost_Ca_concentration; = Mass_biowaste_concentration_Ca*2
    (same comment as for compost)
  property concentration, magnesium 0 kg/kg; name Mass_compost_Mg_concentration; = Mass_biowaste_concentration_Mg*2
    (same comment as for compost)
  property concentration, mercury 0 kg/kg; name Mass_compost_Hg_concentration; = Mass_biowaste_concentration_Hg*2
    (same comment as for compost)
  property concentration, lead 0 kg/kg; name Mass_compost_concentration_Pb; = Mass_biowaste_concentration_Pb*2
    (same comment as for compost)
  property concentration, nickel 0 kg/kg; name Mass_compost_Ni_concentration; = Mass_biowaste_concentration_Ni*2
    (same comment as for compost)
  property concentration, phosphorus 0 kg/kg; name Mass_compost_P_concentration; = Mass_biowaste_concentration_P*2
    (same comment as for compost)
  property concentration, sulfur 0 kg/kg; name Mass_compost_concentration_S; = Mass_biowaste_concentration_S*2
    (same comment as for compost)
  property concentration, potassium 0 kg/kg; name Mass_compost_K_concentration; = Mass_biowaste_concentration_K*2
    (same comment as for compost)
  property nickel content 1.60606e-5; name Mass_compost_Ni_content; = Mass_biowaste_Ni_content/0.5*( DM_biowaste / DM_compost)
    nickel content on a dry matter basis
  property concentration, nitrogen 0 kg/kg; = Mass_biowaste_concentration_N*2
    (same comment as for compost)
  property concentration, zinc 0 kg/kg; name Mass_compost_concentration_Zn; = Mass_biowaste_concentration_Zn*2
    (same comment as for compost)
  property lead content 2.66667e-5; name Mass_compost_Pb_content; = Mass_biowaste_Pb_content/0.5*( DM_biowaste / DM_compost)
    lead content on a dry matter basis
  property copper content 3.81818e-5; name Mass_compost_Cu_content; = Mass_biowaste_Cu_content/0.5*( DM_biowaste / DM_compost)
    copper content on a dry matter basis
  property cadmium content 2.89394e-7; name Mass_compost_Cd_content; = Mass_biowaste_Cd_content/0.5*( DM_biowaste / DM_compost)
    cadmium content on a dry matter basis
  property magnesium content 0.00525758; name Mass_compost_Mg_content; = Mass_biowaste_Mg_content/0.5*( DM_biowaste / DM_compost)
    magnesium content on a dry matter basis
  property zinc content 0.000120303; name Mass_compost_Zn_content; = Mass_biowaste_Zn_content/0.5*( DM_biowaste / DM_compost)
    zinc content on a dry matter basis
  property potassium content 0.0099697; name Mass_compost_K_content; = Mass_biowaste_K_content/0.5*( DM_biowaste / DM_compost)
    potassium content on a dry matter basis
  property sulfur content 0.00190909; name Mass_compost_S_content; = Mass_biowaste_S_content/0.5*( DM_biowaste / DM_compost)
    sulfur content on a dry matter basis
  property calcium content 0.0504545; name Mass_compost_Ca_content; = Mass_biowaste_Ca_content/0.5*( DM_biowaste / DM_compost)
    calcium content on a dry matter basis
  property mercury content 1e-7; name Mass_compost_Hg_content; = Mass_biowaste_Hg_content/0.5*( DM_biowaste / DM_compost)
    mercury content on a dry matter basis
  property phosphorus content 0.00275758; name Mass_compost_P_content; = Mass_biowaste_P_content/0.5*( DM_biowaste / DM_compost)
    phosphorus content on a dry matter basis
  property carbon content 0.1165
    carbon content on a dry matter basis (reserved; not for manual entry)
  properties: carbon content, fossil 0, wet mass 1 kg, carbon allocation 0.061512 kg
- electricity, for reuse in municipal waste incineration only: 0 kWh; CPC 17100: Electrical energy; By-product classification allocatable product; pedigree (1,1,1,1,1)
  Net electricity generated from this waste and used in internal MSWI plant energy redistribution.
  Uncertainty: uncertainty is calculated from uncertainties in waste composition and uncertainties in energy efficiency and the uncertainty in internal energy demand
  property exergy 3.6 MJ; name E_el_prod_MSWI_exergy
    This exergy property is based on the exergy content of the product.
  property true value relation 3.6; name E_el_prod_MSWI_true_value_relation
    property to calculate "true value" from
  property price 0.1 EUR2005; name E_el_prod_MSWI_price_EUR2005
    Estimated to be the same price as in case of electricity, medium voltage.
- iron scrap, sorted, pressed: 0 kg; By-product classification Recyclable; CPC 39310: Slag, dross, scalings and other waste from the manufacture of iron or steel; pedigree (1,1,1,1,1)
  Iron scrap recovered from this waste.
  Uncertainty: uncertainty calculated from uncertainty in waste composition, uncertainty of share of recyclable metal, uncertainty of transfer coefficient to bottom ash, uncertainty of the efficiency of scrap removal in MSWI plant.
  property price 0.175 EUR2005
    Temporary price data. Calculated as 90% of purchasers price based on: 2005 import and export prices (total trades (USD) divided by total weight (kg) in biggest economies of the world: EU27, USA, Brasil, China, India, Japan and Russia) from UN Commodity Trade Statistics Database (http://data.un.org/Explorer.aspxDatabase [Accessed 2011.06.20]). Commodity: Waste or scrap, of cast iron
  property carbon content 0
    carbon content on a dry matter basis (reserved; not for manual entry)
  properties: carbon content, fossil 0, dry mass 1 kg, carbon content, non-fossil 0, water in wet mass 0 kg, wet mass 1 kg, water content 0, carbon allocation 0 kg
- heat, for reuse in municipal waste incineration only: 0 MJ; CPC 17300: Steam and hot water; By-product classification allocatable product; pedigree (1,1,1,1,1)
  Net useful heat generated from this waste and used in internal MSWI plant energy redistribution.
  Uncertainty: uncertainty is calculated from uncertainties in waste composition and uncertainties in energy efficiency and the uncertainty in internal energy demand
  property exergy 0.1842 MJ; name E_th_prod_MSWI_exergy
    This exergy property is based on the exergy content of the product.
  property true value relation 0.1842; name E_th_prod_MSWI_true_value_relation
    property to calculate "true value" from
  property price 0.0106 EUR2005; name E_th_prod_MSWI_price_EUR2005
    Average European district heat price from Ecoheatcool and Euroheat 2005-2006, Ecoheat Work package 1: The European heat market. Final report. 10.6 EUR/GJ i s the price of district heat. http://www.solarthermalworld.org/files/Ecoheatcool%20WP1%20Web.pdf?download
- iron scrap, unsorted: 0 kg; source European Aluminium Association 2008; CPC 39310: Slag, dross, scalings and other waste from the manufacture of iron or steel; By-product classification Recyclable; pedigree (1,1,1,1,1)
  property price 0.149 EUR2005; name ironScrapAmount_price_EUR2005
    Temporary price data. Calculated as 90% of purchasers price based on: estimated at 85% of sorted scrap
  property carbon content 0
    carbon content on a dry matter basis (reserved; not for manual entry)
  properties: water in wet mass 0 kg, water content 0, carbon content, fossil 0, carbon content, non-fossil 0, dry mass 1 kg, wet mass 1 kg, carbon allocation 0 kg
- aluminium oxide, non-metallurgical: 0 kg; source European Aluminium Association 2008; CPC 41432: Alumina (aluminium oxide), except artificial corundum; By-product classification allocatable product; CAS 1344-28-1; pedigree (1,1,1,1,1)
  property carbon content, non-fossil 0; name C_content_non_fossil
  property price 0.28 EUR2005; name Al2O3Amount_price_EUR2005
    From UN trade database. http://data.un.org/ Import data from the largest economies of the world are used (Brazil, India, USA, China, Japan and EU-27).
  property dry mass 1 kg; name DM
  property water content 0; name water_content
  property wet mass 1 kg; name WM
  property water in wet mass 0 kg; name WWM
  property carbon content, fossil 0; name C_content_fossil
  property carbon content 0
    carbon content on a dry matter basis (reserved; not for manual entry)
  properties: carbon allocation 0 kg
- aluminium, cast alloy: 0 kg; source European Aluminium Association 2008; By-product classification allocatable product; CPC 41431: Unwrought aluminium; pedigree (1,1,1,1,1)
  EcoSpold01Location=RER
  property price 1.3 EUR2005; name castAlloyAmount_price_EUR2005
    Temporary price data. Calculated as 90% of purchasers price based on: Source: London Metal Exchange, Aluminium alloy price for 2005
  property carbon content 0
    carbon content on a dry matter basis (reserved; not for manual entry)
  properties: water in wet mass 0 kg, carbon content, non-fossil 0, water content 0, dry mass 1 kg, carbon content, fossil 0, wet mass 1 kg, carbon allocation 0 kg
- aluminium, wrought alloy: 0 kg; source European Aluminium Association 2008; By-product classification allocatable product; CPC 4153: Semi-finished products of aluminium or aluminium alloys; pedigree (1,1,1,1,1)
  property price 1.44 EUR2005; name secondaryAluminiumOutput_price_EUR2005
    Estimated based on literature values and expert judgement. Aluminium ccast alloys are about 90% of the price of aluminium wrought alloys.
  property carbon content 0
    carbon content on a dry matter basis (reserved; not for manual entry)
  properties: wet mass 1 kg, water content 0, carbon content, fossil 0, water in wet mass 0 kg, carbon content, non-fossil 0, dry mass 1 kg, carbon allocation 0 kg
- copper: 0 kg; source Rentz O. 1999; By-product classification allocatable product; CPC 41413: Refined copper and copper alloys, unwrought; master alloys of copper
  Literature value. Copper uses: Before end-use copper is manufactured into semi fabricated products, such as shapes and ingots (known as 'semis'). These manufacturing processes are subdivided into hot working, cold working and, if necessary, process annealing. Few of the semis are ready for use as such. They more typically travel to first-stage manufacturers, who make metal rods, wire, and casting, and then to component manufacturers who produce such things as motors, valves, and insulated cables The components in turn are incorporated by final-stage manufacturers into a variety of finished products - automobiles, commercial buildings, residential housing, and so forth. These uses account for about 79% of the world-wide consumption of copper.
  property price 5.52 EUR2005
    Literature value (http://www.economist.com/news/business/21576714-mining-industry-has-enriched-chile-its-future-precarious-copper-solution). Average price between 20015 and 2013.
  property carbon content 0
    carbon content on a dry matter basis (reserved; not for manual entry)
  properties: dry mass 1 kg, water in wet mass 0 kg, wet mass 1 kg, carbon content, non-fossil 0, water content 0, carbon content, fossil 0, carbon allocation 0 kg
- zinc concentrate: 0 kg; CPC 14290: Other non-ferrous metal ores and concentrates (other than uranium or thorium ores and concentrates); By-product classification allocatable product
  Calculated value from the knowledge of the properties of both products.
  property price 0.38 EUR2005; name ByP_price_EUR2005
    Temporary price data. Calculated as 90% of purchasers price based on: Zinc content in concentrate 53%. Concentrate price per kg Zn 86.5% of refined Zn price (13.5% treatment charges according to CHR Metals Limited 2005: Dynamic cost curves. http://www.minecost.com/dynamic.pdf). 2004 zinc price from USGS (2007) Mineral commodity summaries 2007. <http://minerals.usgs.gov/minerals/pubs/mcs/2007/mcs2007.pdf> [Accessed 25 May 2010]
  property zinc content 0.53; name zinc_C_zinc_concentrate
    Zinc content on a dry matter basis. Value taken from teh "zinc mine operation" /GLO dataset.
  property dry mass 1 kg; name DM_zinc_concentrate
  property carbon content 0
    carbon content on a dry matter basis (reserved; not for manual entry)
  properties: wet mass 1 kg, water content 0, carbon content, non-fossil 0, carbon content, fossil 0, water in wet mass 0 kg, carbon allocation 0 kg

## Inputs from technosphere
- composting facility, open: 0 unit; uniform min 0, max 0, pedigree (1,1,3,1,1)
  EcoSpold01Location=CH
- composting facility, open: 7.41e-9 unit; lognormal variance with pedigree 0.3132, pedigree (2,3,3,1,1)
  EcoSpold01Location=CH
  Infrastructure input of Swiss compositng facility, amount calculated based on lifetime capacity of the composting facility.
- municipal solid waste: -1.85e-5 kg; name MSW; lognormal variance with pedigree 0.0132, pedigree (2,3,3,1,1)
  EcoSpold01Location=CH
  Small fraction of "household waste" cannot be composted and is sorted out
  production volume 15281 kg; = biowaste_PV* MSW/ ABS(Mass_biowaste)
    Calculated from the production volume of biowaste in proportion to the respective output amounts.
  properties: dry mass 0.771 kg, carbon content, fossil 0.171549, wet mass 1 kg, carbon content, non-fossil 0.261655, water content 0.297017
  note on carbon content, fossil: MSW composition in tab 4.1, ecoinvent v2.2 report 13_I. C content referred to 1 kg DM
- wastewater, average: -0.000225 m3
  production volume 185850 m3; = ABS(Ref('e1e329c8-babd-4a48-8474-666deefe6020', 'ProductionVolume') * ((Ref('0c1e79b2-65c7-4fcd-95c1-2ae34b54e6a4')*-1) / Ref('e1e329c8-babd-4a48-8474-666deefe6020')))
    Calculated from production volume of reference product using the relative outputs.
  properties: water content 2882.2, dry mass 0.346837 kg, carbon content, non-fossil 0.194039, wet mass 1000 kg
  note on carbon content, non-fossil: 0.0673 kg TOC/m3 (Tab A.17, ecoinvent v2.2 report 13_I). TOC was considered as Total Carbon.
- electricity, low voltage: 0.0118 kWh; lognormal variance with pedigree 0.0132, pedigree (2,3,3,1,1)
  EcoSpold01Location=CH
  Own calculations
- machine operation, diesel, >= 74.57 kW, low load factor: 0.000352113 hour; = 1/2840; lognormal variance with pedigree 0.0166, pedigree (3,4,3,1,2)
  Diesel usage per ton: 2.5 l ==> approx 2.1 kg / t; operating hours per ton: approx. 0.35 h

## Emissions to nature
- Methane, non-fossil [air, urban air close to ground]: 0.001 kg; source Wagner, R. 2011; lognormal variance with pedigree 0.0232, pedigree (2,3,3,1,1)
- Water [air, unspecified]: 0.000125 m3
- Ammonia [air, urban air close to ground]: 0.0007 kg; source Wagner, R. 2011; lognormal variance with pedigree 0.0232, pedigree (2,3,3,1,1)
- Dinitrogen monoxide [air, urban air close to ground]: 2.5e-5 kg; source Wagner, R. 2011; lognormal variance with pedigree 0.0432, pedigree (2,3,3,1,1)
- Carbon dioxide, non-fossil [air, urban air close to ground]: 0.22 kg; source Wagner, R. 2011; lognormal variance with pedigree 0.0132, pedigree (2,3,3,1,1)
- Hydrogen sulfide [air, urban air close to ground]: 0.000526 kg; lognormal variance with pedigree 0.0532, pedigree (2,3,3,1,1)

## Sampling procedure
Data come from composting plants in Switzerland. The material contents for compost are based on mass spectrometry analyses.

## Extrapolations
This dataset has been extrapolated from year 2015 to the year of the calculation (2019). The uncertainty has been adjusted accordingly.

## Review by Gabor Doka 2016-03-07
Passed. It was not possible to construct a correct carbon balance, as the carbon content property of the compost exchange could not be changed. So although the author had pertinent and more accurate information, it was not possible to enter it. With this behaviour we will never be able to make carbon balances work in the DB.(unless we fill up the DB with unnecessary multiples of exchanges and markets for each slightly differening exchange from (or for) various processes).
Exchanges contain new "concentration" properties, which seem to want to fulfill the same function as the already established "content" properties. This duplication of functionality (from whomever it originated) seems not sensible to me. It was not possible to remove the concentration properties. but they were set to zero.
