# three layered laminated board production

Dataset: EcoSpold 2, unit process
Geography: RER
Time period: 1997-01-01 to 2019-12-31
Technology level: current
Classification: EcoSpold01Categories: wooden materials/extraction
Classification: ISIC rev.4 ecoinvent: 1621:Manufacture of veneer sheets and wood-based panels
Tags: ConvertedDataset
Scenario: Business-as-Usual
System model: Allocation at the point of substitution
Generated by: Hans-Jörg Althaus
Published in: Werner F. 2007
Database: ecoinvent
isCopyrightProtected: true
accessRestrictedTo: 1

## General comment
This dataset represents the production of one m3 three-layered laminated boards. The input of wood is assumed to be sawn timber spruce, i.e. a softwood.

The production takes place at a wooden board factory for organic bonded board; the data reflects a German production site from 1995, which is assumed to representative for Europe. The figures origin mainly from literature.
[Dataset to be replaced by 'three layered laminated board production, CH, 1997 - 2002']
[Dataset to be replaced by 'three layered laminated board production, Europe without Switzerland, 1997 - 2002']

## Included activities start
From reception of sawn softwood and PVAc adhesive at the factory gate.

## Included activities end
This activity ends with three-layered laminated boards at the factory gate. The dataset includes the inputs to the production processes and transports of those inputs. The dataset does not include process emission data (not available) and infrastructure.

## Geography
Data for Germany used for central Europe

## Technology
Technology reflects the a medium-sized German enterprise from 1995.

The three-layered laminated board is actually a special form of plywood featuring relatively thick layers. The three-layered laminated board made of spruce is produced in a large wood processing company in the Canton of Fribourg, Switzerland: out of rough sawn timber (u=70%) 22 mm lamellas are sawn, which are technically dried, planed, finger-jointed, glued with PVAc-adhesive at their ends to “never-ending” lamellas and finally glued to a bloc. This block is sawn to boards, which are planed. The spruce is mainly coming from the area around Fribourg. The thermal energy for the drying of the lamellas is mainly produced by industrial residual wood (8% of wood input) (Werner et al, 1997).
Reference:
Werner F., Richter K., Bosshart S. and Frischknecht R. (1997) Ökologischer Vergleich von Innenbauteilen am Bsp. von Zargen aus Massivholz, Holzwerkstoff und Stahl. EMPA/ETH-Forschungsbericht, Dübendorf, Zürich.

## Reference product
- wood chips, dry, measured as dry mass: 1 kg; CPC 31230: Wood in chips or particles; By-product classification allocatable product
  Calculated Value. Since the fuel for the furnace is included in the input, the corresponding amount inventoried with the energy module is subtracted. Since the volume of the chips is bulked, it is higher than the difference of input and output volume.
  production volume 3.62208e8 kg; = Ref('fcde7c2e-03ed-4b2b-9d39-d63a817fca22', 'ProductionVolume') * (Ref('c3e87055-df00-4467-8a55-01e7b38fdd8d') / Ref('fcde7c2e-03ed-4b2b-9d39-d63a817fca22'))
    Calculated from production volume of reference product using the relative outputs.
  property water content 0.4; name water_content
  property carbon content, non-fossil 0.494; name C_content_non_fossil
    C content of dry mass is 0.494 kgC/kg dry wood (ecoinvent v2.2 report 9).
  property wet mass 1.4 kg; name WM
  property dry mass 1 kg; name DM
  property price 0.107 EUR2005
    Expert judgement (Urs Luginbühl, Swiss Sawmilling industry, personal communication in June 2014). Wood chips from softwood should have a price of 0.101 EUR/kg. Woodchips from hardwood should have a price of 0.112 EUR/kg. Average of these two values is used. Cross-reference; FAOSTAT database; http://faostat.fao.org/site/626/DesktopDefault.aspx?PageID=626#ancor; Average import/export prices of EU for 'chips and particles'. Price: 48.76 Euro/m3. The density of the wood chips is 650 kg/m3. The price is recalculated accordingly.
  property water in wet mass 0.4 kg; name WWM
  property carbon content, fossil 0; name C_content_fossil
  property carbon content 0.494
    carbon content on a dry matter basis (reserved; not for manual entry)
  property true value 9.68905
    allocation property applied in "true value" allocation // value calculated from revenue
  properties: carbon allocation 0.494 kg
- three layered laminated board: 0 m3; CPC 3142: Other plywood, veneered panels and similar laminated wood, except of bamboo; By-product classification allocatable product
  Reference product. Three-layered laminated board produced at a wooden board factory in Germany by processes representative for European average. Softwood - spruce - from the area of Fribourg is used as input wood.The reference product is ready for delivery at the factory. A large number of materials can be produced with differing properties and areas of use. Used as basis for timber-concrete composite structures providing increased load bearing capacities and, if used within house-building, to give positive effects on sound insulation.
  EcoSpold01Location=RER
  production volume 4e6 m3
    Unknown
    Estimate
  property price 483.303 EUR2005
    Calculated based on inputs: The price of the product has been calculated as a sum of the values of the material and energy inputs for this product. This value is therefore a rough estimation. It may underestimate the real price since there are additional expenses when producing any product. These expences can include for example labour costs, treatment of waste materials and profit for the producer. Please consider carefully whether this level of data quality is acceptable for your application.
  property carbon content, non-fossil 0.483926
    The laminated timber is composed of wood and Vinyl Acetate. The weight of the wood is assumed to be the DM minus 7.76 kg Vinyl acetate. C content of wood is 0.494 kgC/kg dry wood (ecoinvent v2.2 report 9)
  property carbon content 0.495306
    carbon content on a dry matter basis (reserved; not for manual entry)
  property true value 483.303
    allocation property applied in "true value" allocation // value calculated from revenue
  properties: water in wet mass 49.469 kg, water content 0.13, wet mass 430 kg, carbon content, fossil 0.0113804, dry mass 380.531 kg, carbon allocation 188.479 kg

## By-products
- residual wood, dry: 0 m3; source Werner F. 1999; CPC 39283: Non-agglomerated wood waste and scrap; By-product classification allocatable product
  Literature Value.
  EcoSpold01Location=RER
  production volume 5.2e6 m3; = Ref('d55b74d8-9ff1-4be2-85cd-80e677c8e607')/ Ref('fcde7c2e-03ed-4b2b-9d39-d63a817fca22')* Ref('fcde7c2e-03ed-4b2b-9d39-d63a817fca22', 'ProductionVolume')
    Calculated from the relationship to the reference product and its production volume.
  property price 26.9 EUR2005
    Temporary price data. Calculated as 90% of purchasers price based on: 2004 prices for World Import/Export (USD/cubicmeter) from FaoStat (http://faostat.fao.org/site/626/default.aspx#ancor, [accessed 10th June 2010]) Commodity: 'Chips and Particles' assuming this is for air-dry chips (10% water on a dry matter basis at 650 kg/m3) and no price difference for water content (i.e. assuming air-drying).
  property carbon content, non-fossil 0.494
    C content of dry mass is 0.494 kgC/kg dry wood (ecoinvent v2.2 report 9)
  property carbon content 0.494
    carbon content on a dry matter basis (reserved; not for manual entry)
  property true value 34.97
    allocation property applied in "true value" allocation // value calculated from revenue
  properties: wet mass 540 kg, water in wet mass 90 kg, water content 0.2, carbon content, fossil 0, dry mass 450 kg, carbon allocation 222.3 kg

## Inputs from technosphere
- diesel, burned in building machine: 0.00364799 MJ; source Werner F. 1999; lognormal variance with pedigree 0.1627, pedigree (2,4,5,3,1)
  Literature Value.
  EcoSpold01Location=GLO
- lubricating oil: 8.51198e-7 kg; source Werner F. 1999; lognormal variance with pedigree 0.0427, pedigree (2,4,5,3,1)
  EcoSpold01Location=RER
  Literature Value.
  properties: carbon content, fossil 0.75, wet mass 1 kg, dry mass 1 kg
  note on carbon content, fossil: Lubricating oil is produced from diesel. C-content/dry mass of fats and oils considered 75%, from: ecoinvent v2.2 report, n 15a, pg 40
- vinyl acetate: 0.00162133 kg; source Werner F. 1999; lognormal variance with pedigree 0.0427, pedigree (2,4,5,3,1)
  EcoSpold01Location=RER
  Literature Value.
  properties: wet mass 1 kg, carbon content, fossil 0.55814, dry mass 1 kg
  note on carbon content, fossil: Vinyl acetate (CH3CO2CH=CH2) (ecoinvent v2.2 report 11_II), C4H6O2. MW=86 g/mol
- wooden board factory, organic bonded boards: 6.74879e-12 unit; lognormal variance with pedigree 0.4461, pedigree (4,5,5,3,4)
  Estimation.
  EcoSpold01Location=RER
- sawnwood, board, softwood, raw, dried (u=20%): 0.000506666 m3; lognormal variance with pedigree 0.0427, pedigree (2,4,5,3,1)
  Literature Value.
  With the update of wood products in ecoinvent v3.1, the generic input of sawnwood was updated to an input of boards specifically.
  properties: water content 0.2, wet mass 464.64 kg, carbon content, non-fossil 0.494, dry mass 387.2 kg
- electricity, medium voltage: 0.0393172 kWh; source Werner F. 1999; lognormal variance with pedigree 0.0427, pedigree (2,4,5,3,1)
  Literature Value.
  EcoSpold01Location=UCTE
- heat, central or small-scale, other than natural gas: 0.282517 MJ; lognormal variance with pedigree 0.0427, pedigree (2,4,5,3,1)
  Literature Value. 8 % of wood input.

## Sampling procedure
Literature

## Extrapolations
see Geography and Technology

## Review by Roberto Dones 2007-11-13
passed

## Review by Roland Hischier 2011-12-01
Transfer of documentation done.

## Review by Bo Weidema 2012-09-28
removed obsolete manual allocation correction for carbon
