# thermal storage system construction, solar thermal parabolic trough, 50 MW

Dataset: EcoSpold 2, unit process
Geography: ZA
Time period: 2010-01-01 to 2020-01-01
Technology level: current
Classification: ISIC rev.4 ecoinvent: 4220a: Construction of utility projects for electricity production, except for liquid fuels
Tags: Concentrated Solar Power; CSP
Scenario: Business-as-Usual
System model: Allocation at the point of substitution
Generated by: Karin Treyer
Published in: Telsnig, Thomas 2015
Database: ecoinvent
isCopyrightProtected: true
accessRestrictedTo: 1

## General comment
This activity represents the construction of a hot and cold two stage nitrate salt thermal storage system for a 50 MW solar thermal parabolic trough power plant. The main components in this activity are nitrogen pressure vessels, storage tanks, pumps, pipes, electrical wiring and insulation and finally concrete and paint works. The storage tanks are designed for 3-6 hour storage time. The heat storage capacity as calculated for the present CSP plant design amounts to 1100 MW.
This dataset is entirely based on the detailed life cycle inventory as presented in the dissertation report by
Telsnig, Thomas. 2015. Standortabhängige Analyse und Bewertung solarthermischer Kraftwerke am Beispiel Südafrikas. Forschungsbericht. Band 123. ISSN 0938-1228. Institut für Energiewirtschaft und Rationelle Energieanwendung, Universität Stuttgart, Germany.

## Included activities start
The activities start with preparation of the molten salt made of NaNO3 and KNO3 60% and 40% by weight mixture respectively. The thermal storage capacity is designed at 1100MWh for a 50MW parabolic trough limited storage case.

## Included activities end
The activity concludes with the decommissioning of the plant with the construction materials sent for recycling and disposal according to their treatment methods.

## Geography
The CSP plant represented in this dataset has been modelled specifically for South African conditions (see Telsnig 2015).

## Technology
Nitrogen storage vessel - Horizontal, cylindrical tank, ASTM A 516, Grade 70, carbon steel, 14 ft diameter,51ft long, 35 psig design pressure, 0.25 inch wall thickness, 27000 lb vessel mass
Cold storage tank - Vertical cylindrical tank, self supporting roof, atmospheric pressure 102 ft diameter x 46 ft height, ASTM A 516, Grade 70, carbon steel, 710000 lb approx. Weight.
Hot storage tank - Vertical cylindrical tank, self supporting roof, atmospheric pressure 104 ft diameter x 46 ft height, ASTM A 516, Grade 70, carbon steel, 750000 lb approx. Weight
Oil-to-salt Heat Exchangers - Straight shell, U-tube, 424000ft² heat transfer aera each, carbon steel shell, tubes tubessheet and channel 170000lb empty weight each
Nitrogen-to-air Heat Exchangers - Finned tube, forced draft heat exchanger, 50 ft² bare tube area, 650ft² finned tube area, 0.75 bhp electric fan
Cold Salt Pumps - Extended Shaft turbine pump, 2 stages, 14000gpm, 3705 lb/sec, 192ft total developed head, 1750 bhp motor variable speed drive
Hot Salt Pumps - Extended Shaft turbine pump, 2 stages, 14400gpm, 3705 lb/sec, 200ft total developed head, 1750 bhp motor variable speed drive
Spare Pump and motor (without variable speed drive) - Extended Shaft turbine pump, 2 stages, 14400gpm, 3705 lb/sec, 200ft total developed head, 1750 bhp motor
Piping: Carbon steel pipes of Grade B
Valves: Carbon steel valves

## Reference product
- used nitrate salts, for solar power application: 1 kg; = nitratesalts*0.85; CPC 3549: Other chemical products; By-product classification allocatable product; pedigree (1,1,1,1,1)
  Nitrate salt discharge at the end of the power plant lifetime. For a lack of available data, it was assumed that 15% of nitrate salts are lost during operation or discharge. This estimate is considered conservative. However, at the point of dataset creation the end of the lifetime of first generation CSP plants lies at least 30 years into the future. Therefore, the fate of nitrate salts used in these plants remains uncertain. It is currently assumed that they can be reused in future plants
  It is indicated by Bradshaw et al. (2002) that nitrate salts which cannot be recovered or reused need to be treated as hazardous waste.
  Reference(s):
  W. BRADSHAW, ROBERT & B. DAWSON, DANIEL & DE LA ROSA, WILFREDO & GILBERT, ROCKWELL & H. GOODS, STEVEN & Hale, Mary Jane & JACOBS, PETER & A. JONES, SCOTT & Kolb, Gregory & Pacheco, James & R. PRAIRIE, MICHAEL & E. REILLY, HUGH & Showalter, Steve & vant-hull, Lorin. (2002). Final Test and Evaluation Results from the Solar Two Project. 10.2172/793226.
  production volume 2.5159e7 kg; = Ref('d062b734-0604-4c79-bc10-1dcb1bd4f4cf', 'ProductionVolume') * (Ref('fa8a514c-5786-4186-847e-cfc29967423e') / Ref('d062b734-0604-4c79-bc10-1dcb1bd4f4cf'))
    Calculated from production volume of reference product using the relative outputs.
  property price 0.715 EUR2005
    Information from personal communication with SQM S.A. (https://www.sqm.com/en/): the average market price for nitrate salts used in solar power application in 2019 is approximately 800USD per metric tonne. See also SQM 2018 Results, http://s1.q4cdn.com/793210788/files/doc_presentations/2018/07/SQM-CorpPres_1Q18_long-final_12jul2018-update.pdf, accessed June 2019. Converted to EUR applying an exchange rate of 1.12 USD/EUR (as of June 2019).
  property true value 1.79887e7
    allocation property applied in "true value" allocation // value calculated from revenue
- thermal storage system, solar thermal parabolic trough, 50 MW: 0 unit; By-product classification allocatable product; CPC 54262: General construction services of power plants; pedigree (1,1,1,1,1)
  Reference product unit for thermal storage system for a 50MW solar thermal parabolic trough plant
  production volume 1 unit
    Assumption
  property capacity [MW] 1100 MW
    Thermal heat storage capacity as calculated for the present CSP plant design.
  property price 5.2e7 EUR2005
    Telsnig 2015: Investment cost for the thermal storage system of a 50MW CSP solar thermal parabolic trough plant in South Africa (EUR2010) with limited storage capacity (see Table 4-4 in Telsnig, 2015).
    Reference(s): Telsnig, Thomas. 2015. Standortabhängige Analyse und Bewertung solarthermischer Kraftwerke am Beispiel Südafrikas. Forschungsbericht. Band 123. ISSN 0938-1228. Institut für Energiewirtschaft und Rationelle Energieanwendung, Universität Stuttgart, Germany.
  property lifetime 30 year
    The economic lifetime of the plant is assumed to be 30 years.
  property true value 5.2e7
    allocation property applied in "true value" allocation // value calculated from revenue

## By-products
- copper: 0 kg; source Rentz O. 1999; By-product classification allocatable product; CPC 41413: Refined copper and copper alloys, unwrought; master alloys of copper
  Literature value. Copper uses: Before end-use copper is manufactured into semi fabricated products, such as shapes and ingots (known as 'semis'). These manufacturing processes are subdivided into hot working, cold working and, if necessary, process annealing. Few of the semis are ready for use as such. They more typically travel to first-stage manufacturers, who make metal rods, wire, and casting, and then to component manufacturers who produce such things as motors, valves, and insulated cables The components in turn are incorporated by final-stage manufacturers into a variety of finished products - automobiles, commercial buildings, residential housing, and so forth. These uses account for about 79% of the world-wide consumption of copper.
  production volume 2326.42 kg
  properties: dry mass 1 kg, water in wet mass 0 kg, wet mass 1 kg, carbon content, non-fossil 0, water content 0, price 5.52 EUR2005, carbon content, fossil 0, carbon content 0, carbon allocation 0 kg, true value 12841.8
- electricity, for reuse in municipal waste incineration only: 0 kWh; CPC 17100: Electrical energy; By-product classification allocatable product; pedigree (1,1,1,1,1)
  Net electricity generated from this waste and used in internal MSWI plant energy redistribution.
  Uncertainty: uncertainty is calculated from uncertainties in waste composition and uncertainties in energy efficiency and the uncertainty in internal energy demand
  production volume 71.1874 kWh
  property exergy 3.6 MJ; name E_el_prod_MSWI_exergy
    This exergy property is based on the exergy content of the product.
  property true value relation 3.6; name E_el_prod_MSWI_true_value_relation
    property to calculate "true value" from
  property price 0.1 EUR2005; name E_el_prod_MSWI_price_EUR2005
    Estimated to be the same price as in case of electricity, medium voltage.
  property true value 9.21814
    allocation property applied in "true value" allocation // value calculated from true value relation
- heat, for reuse in municipal waste incineration only: 0 MJ; CPC 17300: Steam and hot water; By-product classification allocatable product; pedigree (1,1,1,1,1)
  Net useful heat generated from this waste and used in internal MSWI plant energy redistribution.
  Uncertainty: uncertainty is calculated from uncertainties in waste composition and uncertainties in energy efficiency and the uncertainty in internal energy demand
  production volume 528.234 MJ
  property true value relation 0.1842; name E_th_prod_MSWI_true_value_relation
    property to calculate "true value" from
  property exergy 0.1842 MJ; name E_th_prod_MSWI_exergy
    This exergy property is based on the exergy content of the product.
  property price 0.0106 EUR2005; name E_th_prod_MSWI_price_EUR2005
    Average European district heat price from Ecoheatcool and Euroheat 2005-2006, Ecoheat Work package 1: The European heat market. Final report. 10.6 EUR/GJ i s the price of district heat. http://www.solarthermalworld.org/files/Ecoheatcool%20WP1%20Web.pdf?download
  property true value 3.49988
    (same comment as for electricity, for reuse in municipal waste incineration only)
- zinc concentrate: 0 kg; CPC 14290: Other non-ferrous metal ores and concentrates (other than uranium or thorium ores and concentrates); By-product classification allocatable product
  Calculated value from the knowledge of the properties of both products.
  production volume 1.84654e-6 kg
  property price 0.38 EUR2005; name ByP_price_EUR2005
    Temporary price data. Calculated as 90% of purchasers price based on: Zinc content in concentrate 53%. Concentrate price per kg Zn 86.5% of refined Zn price (13.5% treatment charges according to CHR Metals Limited 2005: Dynamic cost curves. http://www.minecost.com/dynamic.pdf). 2004 zinc price from USGS (2007) Mineral commodity summaries 2007. <http://minerals.usgs.gov/minerals/pubs/mcs/2007/mcs2007.pdf> [Accessed 25 May 2010]
  property zinc content 0.53; name zinc_C_zinc_concentrate
    Zinc content on a dry matter basis. Value taken from teh "zinc mine operation" /GLO dataset.
  property dry mass 1 kg; name DM_zinc_concentrate
  property carbon content 0
    carbon content on a dry matter basis (reserved; not for manual entry)
  property true value 7.01686e-7
    allocation property applied in "true value" allocation // value calculated from revenue
  properties: wet mass 1 kg, water content 0, carbon content, non-fossil 0, carbon content, fossil 0, water in wet mass 0 kg, carbon allocation 0 kg
- iron scrap, unsorted: 0 kg; source European Aluminium Association 2008; CPC 39310: Slag, dross, scalings and other waste from the manufacture of iron or steel; By-product classification Recyclable; pedigree (1,1,1,1,1)
  production volume 0.0175315 kg
  property price 0.149 EUR2005; name ironScrapAmount_price_EUR2005
    Temporary price data. Calculated as 90% of purchasers price based on: estimated at 85% of sorted scrap
  property carbon content 0
    carbon content on a dry matter basis (reserved; not for manual entry)
  property true value 0.0026122
    allocation property applied in "true value" allocation // value calculated from revenue
  properties: water in wet mass 0 kg, water content 0, carbon content, fossil 0, carbon content, non-fossil 0, dry mass 1 kg, wet mass 1 kg, carbon allocation 0 kg
- aluminium oxide, non-metallurgical: 0 kg; source European Aluminium Association 2008; CPC 41432: Alumina (aluminium oxide), except artificial corundum; By-product classification allocatable product; CAS 1344-28-1; pedigree (1,1,1,1,1)
  production volume 1.10319 kg
  property carbon content, non-fossil 0; name C_content_non_fossil
  property price 0.28 EUR2005; name Al2O3Amount_price_EUR2005
    From UN trade database. http://data.un.org/ Import data from the largest economies of the world are used (Brazil, India, USA, China, Japan and EU-27).
  property dry mass 1 kg; name DM
  property water content 0; name water_content
  property wet mass 1 kg; name WM
  property water in wet mass 0 kg; name WWM
  property carbon content, fossil 0; name C_content_fossil
  property carbon content 0
    carbon content on a dry matter basis (reserved; not for manual entry)
  property true value 0.308894
    allocation property applied in "true value" allocation // value calculated from revenue
  properties: carbon allocation 0 kg
- aluminium, cast alloy: 0 kg; source European Aluminium Association 2008; By-product classification allocatable product; CPC 41431: Unwrought aluminium; pedigree (1,1,1,1,1)
  EcoSpold01Location=RER
  production volume 10.3124 kg
  property price 1.3 EUR2005; name castAlloyAmount_price_EUR2005
    Temporary price data. Calculated as 90% of purchasers price based on: Source: London Metal Exchange, Aluminium alloy price for 2005
  property carbon content 0
    carbon content on a dry matter basis (reserved; not for manual entry)
  property true value 13.4061
    allocation property applied in "true value" allocation // value calculated from revenue
  properties: water in wet mass 0 kg, carbon content, non-fossil 0, water content 0, dry mass 1 kg, carbon content, fossil 0, wet mass 1 kg, carbon allocation 0 kg
- aluminium, wrought alloy: 0 kg; source European Aluminium Association 2008; By-product classification allocatable product; CPC 4153: Semi-finished products of aluminium or aluminium alloys; pedigree (1,1,1,1,1)
  production volume 4.51457 kg
  property price 1.44 EUR2005; name secondaryAluminiumOutput_price_EUR2005
  properties: wet mass 1 kg, water content 0, carbon content, fossil 0, water in wet mass 0 kg, carbon content, non-fossil 0, dry mass 1 kg, carbon content 0, carbon allocation 0 kg, true value 6.50098
- iron scrap, sorted, pressed: 0 kg; By-product classification Recyclable; CPC 39310: Slag, dross, scalings and other waste from the manufacture of iron or steel; pedigree (1,1,1,1,1)
  Iron scrap recovered from this waste.
  production volume 1267.01 kg
  property price 0.175 EUR2005
    Temporary price data. Calculated as 90% of purchasers price based on: 2005 import and export prices (total trades (USD) divided by total weight (kg) in biggest economies of the world: EU27, USA, Brasil, China, India, Japan and Russia) from UN Commodity Trade Statistics Database (http://data.un.org/Explorer.aspxDatabase [Accessed 2011.06.20]). Commodity: Waste or scrap, of cast iron
  property carbon content 0
    carbon content on a dry matter basis (reserved; not for manual entry)
  property true value 221.727
    allocation property applied in "true value" allocation // value calculated from revenue
  properties: water content 0, water in wet mass 0 kg, carbon content, fossil 0, dry mass 1 kg, carbon content, non-fossil 0, wet mass 1 kg, carbon allocation 0 kg

## Inputs from technosphere
- waste glass: -0.00124318 kg; = ((foamglass+glassfibre))*-1; lognormal variance with pedigree 0.0137, pedigree (4,4,3,3,2)
  Disposal of the waste glass
  production volume 121713 kg; = Ref('d062b734-0604-4c79-bc10-1dcb1bd4f4cf', 'ProductionVolume') * ((Ref('276f06d7-4bb5-4db3-9634-2064ca7c26e8')*-1) / Ref('d062b734-0604-4c79-bc10-1dcb1bd4f4cf'))
    Calculated from production volume of reference product using the relative outputs.
  properties: dry mass 1 kg, wet mass 1 kg
- scrap copper: -0.000100414 kg; = (copper)*-1; lognormal variance with pedigree 0.0137, pedigree (4,4,3,3,2)
  Disposal of scrap copper
  production volume 9831 kg; = Ref('d062b734-0604-4c79-bc10-1dcb1bd4f4cf', 'ProductionVolume') * ((Ref('982ecc96-caf6-463b-a177-5968b4ea5021')*-1) / Ref('d062b734-0604-4c79-bc10-1dcb1bd4f4cf'))
    Calculated from production volume of reference product using the relative outputs.
  properties: dry mass 1 kg, wet mass 1 kg
- waste reinforcement steel: -0.0180735 kg; = ((steel+castiron+lowsteel+chromesteel+ironnickelchromealloy)*0.65)*-1
  All steel types are assumed to be treated as reinforcing steel due to lack of other appropriate datasets in ecoinvent.
  For the time period 2003-2012, average steel recycling rate in South Africa amounted to 35% fo the total steel mass according to Telsnig 2015. The remaining steel is assumed to be sent to final disposal.
  production volume 1.76947e6 kg; = Ref('d062b734-0604-4c79-bc10-1dcb1bd4f4cf', 'ProductionVolume') * ((Ref('5d1cc213-ac45-492c-bbc4-fca8185621a8')*-1) / Ref('d062b734-0604-4c79-bc10-1dcb1bd4f4cf'))
    Calculated from production volume of reference product using the relative outputs.
  properties: dry mass 1 kg, wet mass 1 kg
- sheet rolling, steel: 2.93143e-6 kg; lognormal variance with pedigree 0.0137, pedigree (4,4,3,3,2)
  Process done to create tubes. 0.01 represents the ratio of low-alloyed steel used for sheet rolling from the total amount of low-alloyed steel available
- waste polystyrene: -8.17122e-8 kg; = (polystyrene)*-1; lognormal variance with pedigree 0.0137, pedigree (4,4,3,3,2)
  Disposal of polymer material
  production volume 8 kg; = Ref('d062b734-0604-4c79-bc10-1dcb1bd4f4cf', 'ProductionVolume') * ((Ref('18ebe009-c282-4261-a46f-4796575a0974')*-1) / Ref('d062b734-0604-4c79-bc10-1dcb1bd4f4cf'))
    Calculated from production volume of reference product using the relative outputs.
  properties: water content 0.00200401, wet mass 1 kg, dry mass 0.998 kg, carbon content, fossil 0.922579
- tap water: 0.00107694 kg; name water; lognormal variance with pedigree 0.0137, pedigree (4,4,3,3,2)
  Used in the manufacturing process of pumps
  properties: dry mass 0.000337476 kg, water content 2962.17, wet mass 1 kg, carbon content, fossil 0.00178991
  note on carbon content, fossil: Bicarbonate content is 2.93 mol/m3. CO2 content is 0.1 mol/m3 (ecoinvent v2.2 report 8, Tab 93.1).
- synthetic rubber: 3.06421e-8 kg; name rubber; lognormal variance with pedigree 0.0137, pedigree (4,4,3,3,2)
  Material composition of pumps, compressors etc
  properties: dry mass 1 kg, wet mass 1 kg, carbon content, fossil 0.871949
  note on carbon content, fossil: EPDM (Ethylene-propene-diene terpolymer) rubber is a terpolymer of ethylene, propene, and a diene with the residual unsaturated portion of the diene in the side chain (ecoinvent v2.2 report 7-part XX & Ullmann). Chemical formula (deduced from Evidences of Solvent-Induced Miscibility in Polychloroprene-co-Ethylene-Propene Diene Terpolymer Blends, Dubey et al., Journal of Applied Polymer Science, 2009, 111:1884–1891): C20H35
- alkyd paint, white, without solvent, in 60% solution state: 1.22977e-5 kg; name paint; lognormal variance with pedigree 0.0137, pedigree (4,4,3,3,2)
  Used to prevent rust and paint the outer regions of iron nd steel rods especially structural steel components
  properties: wet mass 1 kg, carbon content, non-fossil 0.199629, carbon content, fossil 0.140367, dry mass 1 kg
  note on carbon content, non-fossil: C content was calculated as an addition of C content in the raw materials.
- nitrate salts, for solar power application: 0.302323 kg; name nitratesalts; lognormal variance with pedigree 0.0137, pedigree (4,4,3,3,2)
  Used as molten salt with 60% (by weight) contribution of technical grade sodium nitrate, and 40% (by weight) technical grade potassium nitrate.
- cast iron: 0.000305777 kg; name castiron; lognormal variance with pedigree 0.0137, pedigree (4,4,3,3,2)
  Used in pumps, compressors and valves
  properties: wet mass 1 kg, dry mass 1 kg, carbon content, fossil 0.04
  note on carbon content, fossil: Cast iron is made by remelting pig iron in small furnaces (e.g. cupola furnaces or electric arc furnaces) and poured into moulds to make castings. It usually contains 2% to 6% carbon (ecoinvent v2.2 report 10_partII). An average content of 4% was considered
- expanded perlite: 0.00570833 kg; name expandedperilite; lognormal variance with pedigree 0.0137, pedigree (4,4,3,3,2)
  Used as an insulation material
  properties: wet mass 1 kg, dry mass 1 kg
- aluminium, wrought alloy: 5.10701e-7 kg; name aluminiumcast; lognormal variance with pedigree 0.0137, pedigree (4,4,3,3,2)
  Used in coatings of connector tubes
  properties: wet mass 1 kg, dry mass 1 kg
- waste rubber, unspecified: -3.06421e-8 kg; = (rubber)*-1; lognormal variance with pedigree 0.0137, pedigree (4,4,3,3,2)
  Disposal of waste rubber
  production volume 3 kg; = Ref('d062b734-0604-4c79-bc10-1dcb1bd4f4cf', 'ProductionVolume') * ((Ref('8f3e9bee-524a-4207-bafe-46e3f425a944')*-1) / Ref('d062b734-0604-4c79-bc10-1dcb1bd4f4cf'))
    Calculated from production volume of reference product using the relative outputs.
  properties: wet mass 1 kg, carbon content, fossil 0.853, dry mass 1 kg
- steel, chromium steel 18/8, hot rolled: 0.000585723 kg; name chromesteel; lognormal variance with pedigree 0.0137, pedigree (4,4,3,3,2)
  Used in the 2 stage nitrogen compressor and cold, hot salt, spare pumps as an integral material on them
  properties: wet mass 1 kg, carbon content, fossil 0.0008, dry mass 1 kg
  note on carbon content, fossil: Stainless steel model is the grade 304 steel (18/8 stainless, 18% chromium 8% nickel; max. 0.08% C)
- wire drawing, copper: 0.000100414 kg; = copper; lognormal variance with pedigree 0.0137, pedigree (4,4,3,3,2)
  Copper used in field wiring, ground networks etc
- transformer, high voltage use: 0.000177612 kg; lognormal variance with pedigree 0.0137, pedigree (4,4,3,3,2)
  Transformer setup including substations and primary power distribution sources. Since the transformer data are already accounted for in ecoinvent. The end of life is neglected.
  properties: wet mass 1 kg, dry mass 1 kg, carbon content, fossil 0.262798
- copper: 0.000100414 kg; lognormal variance with pedigree 0.0137, pedigree (4,4,3,3,2)
  Copper supplied for field wiring
  properties: dry mass 1 kg, wet mass 1 kg
- injection moulding: 8.17122e-8 kg; lognormal variance with pedigree 0.0137, pedigree (4,4,3,3,2)
  Process to obtain polystyrene
- sand: 0.000959781 kg; lognormal variance with pedigree 0.0137, pedigree (4,4,3,3,2)
  Sand (tank foundation) end of life is neglected
  properties: wet mass 1 kg, dry mass 1 kg
- reinforcing steel: 0.0261988 kg; name steel; lognormal variance with pedigree 0.0137, pedigree (4,4,3,3,2)
  Used in construction of the 2 storage tanks hot and cold, heat exhanger, pumps etc
  properties: carbon content, fossil 0.004, dry mass 1 kg, wet mass 1 kg
- polystyrene, high impact: 8.17122e-8 kg; name polystyrene; lognormal variance with pedigree 0.0137, pedigree (4,4,3,3,2)
  Used as adsobers. Polystyrene materials have high temperature range resistance.
  properties: wet mass 1 kg, dry mass 1 kg, carbon content, fossil 0.923077
- refractory, basic, packed: 0.00417989 kg; name refractory; lognormal variance with pedigree 0.0137, pedigree (4,4,3,3,2)
  Refractory brick, with mortar (tank perimeter foundation)
  properties: dry mass 1 kg, wet mass 1 kg
- waste reinforcement steel: -0.00973186 kg; = ((steel+castiron+lowsteel+chromesteel+ironnickelchromealloy)*0.35)*-1
  (same comment as for waste reinforcement steel)
  production volume 952794 kg; = Ref('d062b734-0604-4c79-bc10-1dcb1bd4f4cf', 'ProductionVolume') * ((Ref('65bcf88e-06bb-4b08-93c6-fb47fd7fac29')*-1) / Ref('d062b734-0604-4c79-bc10-1dcb1bd4f4cf'))
    Calculated from production volume of reference product using the relative outputs.
  properties: wet mass 1 kg, dry mass 1 kg
- wastewater, average: -1.07694e-6 m3; = (water/1000)*-1; lognormal variance with pedigree 0.0137, pedigree (4,4,3,3,2)
  Wastewater from manufacturing process of the pumps. As the composition of this water is not known, average wastewater is chosen as first assumption.
  production volume 105.437 m3; = Ref('d062b734-0604-4c79-bc10-1dcb1bd4f4cf', 'ProductionVolume') * ((Ref('6e47eea6-ab78-4bc1-89ae-a090b843016d')*-1) / Ref('d062b734-0604-4c79-bc10-1dcb1bd4f4cf'))
    Calculated from production volume of reference product using the relative outputs.
  properties: carbon content, non-fossil 0.194039, water content 2882.2, dry mass 0.346837 kg, wet mass 1000 kg
  note on carbon content, non-fossil: 0.0673 kg TOC/m3 (Tab A.17, ecoinvent v2.2 report 13_I). TOC was considered as Total Carbon.
- stone wool: 0.00142915 kg; name mwool; lognormal variance with pedigree 0.0137, pedigree (4,4,3,3,2)
  properties: dry mass 1 kg, carbon content, fossil 0.015401, wet mass 1 kg
  note on carbon content, fossil: The chemical composition of the glass fibres used in the rock wool production is similar to the composition of naturally cooled volcano basalt and has a composition listed in Tab. 3.1 and 3.2 in ecoinvent v2.2 report 16, part XIV. Rock wool contains: a minimum of 96% mineral fibres,between 0.5 and 3.0 weight percent of phenolic resin depending on the specific product characteristics, and about 0.2 percent mineral oil (ecoinvent v2.2 report 16, part XIV). An average composition of 1.8% phenolic resin, 0.2% mineral oil, and 98% mineral fibres has been assumed and used to calculate C content of the rock wool
- foam glass: 0.00124309 kg; name foamglass; lognormal variance with pedigree 0.0137, pedigree (4,4,3,3,2)
  Used in insulation of tank foundation
  properties: wet mass 1 kg, dry mass 1 kg
- sheet rolling, chromium steel: 5.20915e-7 kg; lognormal variance with pedigree 0.0137, pedigree (4,4,3,3,2)
  Process done to create tubes. 0.0008 represents the ratio of chrome steel used for sheet rolling from the total amount of chrome steel available.
- hazardous waste, for incineration: -0.0453485 kg; = (nitratesalts*0.15)*-1; lognormal variance with pedigree 0.0137, pedigree (4,4,3,3,2)
  (same comment as for used nitrate salts, for solar power application)
  production volume 4.43982e6 kg; = Ref('d062b734-0604-4c79-bc10-1dcb1bd4f4cf', 'ProductionVolume') * ((Ref('53e83c66-8712-4498-86fd-5604574f67d0')*-1) / Ref('d062b734-0604-4c79-bc10-1dcb1bd4f4cf'))
    Calculated from production volume of reference product using the relative outputs.
  properties: wet mass 1 kg, water content 0.333333, carbon content, fossil 0.554667, dry mass 0.75 kg
  note on carbon content, fossil: Tab A.6, ecoinvent v2.2 report 13_I. C content has been calculated after data in the tables, and then referred to 1 kg DM
- silicone product: 7.33163e-5 kg; lognormal variance with pedigree 0.0137, pedigree (4,4,3,3,2)
  Used in pumps to prevent leakage
  properties: dry mass 1 kg, wet mass 1 kg, carbon content, fossil 0.324324
- iron-nickel-chromium alloy: 0.000426466 kg; name ironnickelchromealloy; lognormal variance with pedigree 0.0137, pedigree (4,4,3,3,2)
  Different dimensions of pipes and spare cables that are used by several major components
  properties: wet mass 1 kg, dry mass 1 kg
- concrete, normal: 1.77111e-5 m3; name concrete; lognormal variance with pedigree 0.0137, pedigree (4,4,3,3,2)
  Construction and foundation of the plants
  properties: water content 0.086758, dry mass 2190 kg, wet mass 2380 kg
- extrusion, plastic pipes: 1.83852e-7 kg; lognormal variance with pedigree 0.0137, pedigree (4,4,3,3,2)
  Process done to create plastic pipes from polymer materials
- waste mineral wool: -0.00142915 kg; = (mwool)*-1; lognormal variance with pedigree 0.0137, pedigree (4,4,3,3,2)
  Rock wool used in instrumentation aspect send for final disposal
  production volume 139920 kg; = Ref('d062b734-0604-4c79-bc10-1dcb1bd4f4cf', 'ProductionVolume') * ((Ref('452aec05-3690-4001-8e51-97ab8e1b4659')*-1) / Ref('d062b734-0604-4c79-bc10-1dcb1bd4f4cf'))
    Calculated from production volume of reference product using the relative outputs.
  properties: wet mass 1 kg, dry mass 1 kg
- excavation, hydraulic digger: 4.15404e-5 m3; lognormal variance with pedigree 0.0137, pedigree (4,4,3,3,2)
  Used in excavation and backfill compaction
- diesel, burned in diesel-electric generating set, 18.5kW: 0.115857 MJ; lognormal variance with pedigree 0.0133, pedigree (3,4,4,3,2)
  Used to melt the salt before it is sent to thermal storage tank
- steel, low-alloyed: 0.000288577 kg; name lowsteel; lognormal variance with pedigree 0.0137, pedigree (4,4,3,3,2)
  Material composition of pumps, compressors etc
  properties: carbon content, fossil 0.005, wet mass 1 kg, dry mass 1 kg
- polyethylene, high density, granulate: 1.83852e-7 kg; name polyethylene; lognormal variance with pedigree 0.0137, pedigree (4,4,3,3,2)
  Polymer material used for making high density plastic pipes. Added separately. Not found in the original data
  properties: carbon content, fossil 0.857143, wet mass 1 kg, dry mass 1 kg
  note on carbon content, fossil: Polyethylene is formed out of a huge amount of ethylene monomers (C2H4) (ecoinvent v2.2 report 11_II). MW=28 g/mol
- welding, arc, steel: 1.03162e-5 m; lognormal variance with pedigree 0.0137, pedigree (4,4,3,3,2)
  Steel subjected to arc welding
- sheet rolling, aluminium: 5.10701e-7 kg; lognormal variance with pedigree 0.0137, pedigree (4,4,3,3,2)
  Aluminium used in tubes
- waste polyethylene: -1.83852e-7 kg; = (polyethylene)*-1; lognormal variance with pedigree 0.0137, pedigree (4,4,3,3,2)
  Disposal of polyethylene
  production volume 18 kg; = Ref('d062b734-0604-4c79-bc10-1dcb1bd4f4cf', 'ProductionVolume') * ((Ref('fe48960d-131b-40ce-8c50-6c6cc98023d1')*-1) / Ref('d062b734-0604-4c79-bc10-1dcb1bd4f4cf'))
    Calculated from production volume of reference product using the relative outputs.
  properties: wet mass 1 kg, carbon content, fossil 0.825301, dry mass 0.996 kg, water content 0.00401606
  note on carbon content, fossil: C content in 1 kg DM was calculated using data in Tab A.1, ecoinvent v2.2 report 13_I
- tin plated chromium steel sheet, 2 mm: 1.0214e-6 m2; lognormal variance with pedigree 0.0137, pedigree (4,4,3,3,2)
  Used in deck plate for structural steel components
  properties: wet mass 15.6365 kg, dry mass 15.6365 kg
- waste paint: -1.22977e-5 kg; = (paint)*-1; lognormal variance with pedigree 0.0137, pedigree (4,4,3,3,2)
  Disposal of waste paint
  production volume 1204 kg; = Ref('d062b734-0604-4c79-bc10-1dcb1bd4f4cf', 'ProductionVolume') * ((Ref('ca646a04-3cc0-47bc-9947-73c0a63486c1')*-1) / Ref('d062b734-0604-4c79-bc10-1dcb1bd4f4cf'))
    Calculated from production volume of reference product using the relative outputs.
  properties: dry mass 1 kg, wet mass 1 kg, carbon content, fossil 0.65
- drawing of pipe, steel: 0.00226484 kg; lognormal variance with pedigree 0.0137, pedigree (4,4,3,3,2)
  Process done to draw pipes made of steel. The value 0.08 is the mass ratio of the amount of steel used for drawing pipes versus the total amount of reinforced steel present in the system.
- waste concrete: -0.0488527 kg; = ((concrete*2200)+refractory+expandedperilite)*-1; lognormal variance with pedigree 0.0137, pedigree (4,4,3,3,2)
  Disposal of concrete. The density is assumed to be 2200kg/m3.
  production volume 4.7829e6 kg; = Ref('d062b734-0604-4c79-bc10-1dcb1bd4f4cf', 'ProductionVolume') * ((Ref('39a2deb0-dfe3-44a2-8c14-cc7ea1a677aa')*-1) / Ref('d062b734-0604-4c79-bc10-1dcb1bd4f4cf'))
    Calculated from production volume of reference product using the relative outputs.
  properties: dry mass 0.5 kg, wet mass 1 kg, water content 1
- glass fibre: 9.19262e-8 kg; name glassfibre; lognormal variance with pedigree 0.0137, pedigree (4,4,3,3,2)
  Used in laying down of fiber optic cables
  properties: wet mass 1 kg, dry mass 1 kg
- particle board, cement bonded: 1.0214e-8 m3; lognormal variance with pedigree 0.0137, pedigree (4,4,3,3,2)
  Used in pumps to ensure no leaks occur
  properties: wet mass 1200 kg, dry mass 1176.78 kg, carbon content, non-fossil 0.139276, carbon content, fossil 0.0240148, water content 0.0197355
- scrap aluminium: -5.10701e-7 kg; = (aluminiumcast)*-1; lognormal variance with pedigree 0.0137, pedigree (4,4,3,3,2)
  Disposal of scrap aluminium
  production volume 50 kg; = Ref('d062b734-0604-4c79-bc10-1dcb1bd4f4cf', 'ProductionVolume') * ((Ref('0d303705-adbf-4828-af9d-5546aefd660b')*-1) / Ref('d062b734-0604-4c79-bc10-1dcb1bd4f4cf'))
    Calculated from production volume of reference product using the relative outputs.
  properties: wet mass 1 kg, dry mass 1 kg
- control cabinet, heat and power co-generation unit, 160kW electrical: 3.06421e-8 unit; lognormal variance with pedigree 0.0137, pedigree (4,4,3,3,2)
  480 V motor control center

## Sampling procedure
This dataset is entirely based on the detailed life cycle inventory as presented in the dissertation report by
Telsnig, Thomas. 2015. Standortabhängige Analyse und Bewertung solarthermischer Kraftwerke am Beispiel Südafrikas. Forschungsbericht. Band 123. ISSN 0938-1228. Institut für Energiewirtschaft und Rationelle Energieanwendung, Universität Stuttgart, Germany.
Further, data in Telsnig 2015 are not shown explicitely for the downscaled 50 MW parabolic trough power plant. This gap is filled in the ecoinvent report.

## Extrapolations
The original data modelling a 250 MW power plant have been scaled down with parameter specific linear and non-linear equations to represent a 50 MW plant design.

## Review by Christopher Oberschelp 2017-03-06
Very detailed and well-structured dataset with in-depth documentation. Key exchanges have been found reasonable. Comparison of impacts with other technologies might now help to spot any unusual or unexpected exchanges.
