# treatment of wastewater from cathode ray tube production, capacity 1.1E10l/year

Dataset: EcoSpold 2, unit process
Geography: RoW
Time period: 1994-01-01 to 2019-12-31
Technology level: current
Classification: ISIC rev.4 ecoinvent: 3700:Sewerage
Classification: EcoSpold01Categories: waste management/wastewater treatment
Tags: Treatment; ConvertedDataset
Scenario: Business-as-Usual
System model: Allocation at the point of substitution
Generated by: Roland Hischier
Published in: Hischier R. 2007
Database: ecoinvent
isCopyrightProtected: true
accessRestrictedTo: 1

## General comment
Wastewater purified in a moderatly large municipal wastewater treatment plant (capacity class 2), with an average capacity size of 71100 per-captia-equivalents PCE.
Wastewater contains (in kg/m3): COD: 0.779 (GSD=122.5%); F: 0.0328 (GSD=224.1%); Cr: 0.0000963 (GSD=223.8%); Pb: 0.0000963 (GSD=223.8%); Zn: 0.0000963 (GSD=223.8%);
[This dataset was already contained in the ecoinvent database version 2. It was not individually updated during the transfer to ecoinvent version 3. Life Cycle Impact Assessment results may still have changed, as they are affected by changes in the supply chain, i.e. in other datasets. This dataset was generated following the ecoinvent quality guidelines for version 2. It may have been subject to central changes described in the ecoinvent version 3 change report (http://www.ecoinvent.org/database/ecoinvent-version-3/reports-of-changes/), and the results of the central updates were reviewed extensively. The changes added e.g. consistent water flows and other information throughout the database. The documentation of this dataset can be found in the ecoinvent reports of version 2, which are still available via the ecoinvent website. The change report linked above covers all central changes that were made during the conversion process.]

## Included activities end
Infrastructure materials for municipal wastewater treatment plant, transports, dismantling. Land use burdens.

## Geography
Specific to the technology mix encountered in Switzerland in 2000. Well applicable to modern treatment practices in Europe, North America or Japan.

## Technology
Three stage wastewater treatment (mechanical, biological, chemical) including sludge digestion (fermentation) according to the average technology in Switzerland

## Parameters
- fraction, process water, to air: 0.1 dimensionless; name fraction_PW_to_air; lognormal variance with pedigree 0.092025, pedigree (4,4,3,2,4)

## Reference product
- wastewater from cathode ray tube production: -1 m3; By-product classification Waste; CPC 39920: Sewage sludge
  EcoSpold01Location=CH
  production volume 3.96633 m3
    This is a placeholder value that does not reflect real-world production volumes. This dataset does not currently require a real-world production volume to work in the database framework, and no actual data were collected yet. This has no negative effect on the results of the ecoinvent database.
  property price 0 EUR2005
    Waste products are assigned a price of zero as they are assumed to require further treatment.
  property carbon content, fossil 0.0400425
    COD is 7.79e-4 kg/kg (Tab 12.11, ecoinvent v2.2 report 18_III). COD was converted to TOC, using conversion factors in Tab 4.10 (ecoinvent v2.2 report 13_IV). TOC was considered as Total Carbon.
  property carbon content 0.0400425
    carbon content on a dry matter basis (reserved; not for manual entry)
  properties: water in wet mass 991.578 kg, carbon content, non-fossil 0, water content 117.74, dry mass 8.42179 kg, wet mass 1000 kg, carbon allocation 0.337229 kg

## By-products
- heat, for reuse in municipal waste incineration only: 0 MJ; CPC 17300: Steam and hot water; By-product classification allocatable product; pedigree (1,1,1,1,1)
  Net electricity generated from this waste and used in internal MSWI plant energy redistribution.
  Uncertainty: uncertainty is calculated from uncertainties in waste composition and uncertainties in energy efficiency and the uncertainty in internal energy demand
  property exergy 0.1842 MJ; name E_th_prod_MSWI_exergy
    This exergy property is based on the exergy content of the product.
  property price 0.0106 EUR2005; name E_th_prod_MSWI_price_EUR2005
    Average European district heat price from Ecoheatcool and Euroheat 2005-2006, Ecoheat Work package 1: The European heat market. Final report. 10.6 EUR/GJ i s the price of district heat. http://www.solarthermalworld.org/files/Ecoheatcool%20WP1%20Web.pdf?download
  property true value relation 0.1842; name E_th_prod_MSWI_true_value_relation
    property to calculate "true value" from
- electricity, for reuse in municipal waste incineration only: 0 kWh; CPC 17100: Electrical energy; By-product classification allocatable product; pedigree (1,1,1,1,1)
  (same comment as for heat, for reuse in municipal waste incineration only)
  property price 0.1 EUR2005; name E_el_prod_MSWI_price_EUR2005
    Estimated to be the same price as in case of electricity, medium voltage.
  property exergy 3.6 MJ; name E_el_prod_MSWI_exergy
    This exergy property is based on the exergy content of the product.
  property true value relation 3.6; name E_el_prod_MSWI_true_value_relation
    property to calculate "true value" from

## Inputs from technosphere
- municipal waste incineration facility: 6.1533e-11 unit; lognormal variance with pedigree 0.042, pedigree (1,1,5,5,1)
  EcoSpold01Location=CH
  burden from sludge incineration. Uncertainty calculated from wastewater composition and treatment model
- chemical, inorganic: 4.7236e-8 kg; lognormal variance with pedigree 0.352, pedigree (1,1,5,5,1)
  burden from sludge incineration. Uncertainty calculated from wastewater composition and treatment model
  EcoSpold01Location=GLO
  properties: carbon content, fossil 0.003, wet mass 1 kg, dry mass 1 kg
  note on carbon content, fossil: This dataset is an unweighted average of 20 inorganic substances (listed in Tab 88.1, ecoinvent v2.2 report 8, part II), being part of the top100 chemicals included in this database. The C-content has also been calculated as an unweighted average of the C content of the substances composing this dataset.
- cement, unspecified: 0 kg; pedigree (1,1,1,1,1)
  burden from sludge incineration. Uncertainty calculated from wastewater composition and treatment model
  EcoSpold01Location=CH
  properties: dry mass 1 kg, wet mass 1 kg
- waste cement, hydrated: 0 kg; pedigree (1,1,1,1,1)
  (same comment as for municipal waste incineration facility)
  production volume 0 kg
    Calculated from the production volume of wastewater from cathode ray tube production in proportion to the respective output amounts.
  properties: dry mass 1 kg, wet mass 1 kg
- hydrochloric acid, without water, in 30% solution state: 2.8342e-8 kg; lognormal variance with pedigree 0.352, pedigree (1,1,5,5,1)
  EcoSpold01Location=RER
  burden from sludge incineration. Uncertainty calculated from wastewater composition and treatment model
  properties: dry mass 1 kg, wet mass 1 kg
- waste graphical paper: -0.0155 kg; lognormal variance with pedigree 0.042, pedigree (1,1,5,5,1)
  EcoSpold01Location=CH
  direct wastewater treatment plant burden. Uncertainty calculated from wastewater composition and treatment model
  production volume 0.062 kg
    (same comment as for waste cement, hydrated)
  properties: dry mass 0.888 kg, wet mass 1 kg, water content 0.126126, carbon content, non-fossil 0.454955
- electricity, low voltage: 0 kWh; pedigree (1,1,1,1,1)
  direct wastewater treatment plant burden. Uncertainty calculated from wastewater composition and treatment model
  EcoSpold01Location=CH
- heat, district or industrial, other than natural gas: 0 MJ; pedigree (1,1,1,1,1)
  (same comment as for municipal waste incineration facility)
- sewer grid, 1.1E10l/year, 242 km: 1.6832e-7 km; lognormal variance with pedigree 0.042, pedigree (1,1,5,5,1)
  EcoSpold01Location=CH
  uncertainty heeded in exchanges of the module
- waste plastic, mixture: 0 kg; pedigree (1,1,1,1,1)
  (same comment as for electricity, low voltage)
  production volume 0 kg
    (same comment as for waste cement, hydrated)
  properties: carbon content, fossil 0.747344, wet mass 1 kg, water content 0.180638, dry mass 0.847 kg
  note on carbon content, fossil: C content in 1 kg DM was calculated using data in Tab A.2, ecoinvent v2.2 report 13_I
- process-specific burdens, municipal waste incineration: 0 kg; pedigree (1,1,1,1,1)
  (same comment as for municipal waste incineration facility)
- process-specific burdens, slag landfill: 0 kg; pedigree (1,1,1,1,1)
  (same comment as for cement, unspecified)
- residual material landfill: 6.5344e-13 unit; lognormal variance with pedigree 0.072, pedigree (1,1,5,5,1)
  (same comment as for cement, unspecified)
- liquid manure spreading, by vacuum tanker: 0.00083147 m3; lognormal variance with pedigree 0.042, pedigree (1,1,5,5,1)
  EcoSpold01Location=CH
  burden from sludge spreading. Uncertainty calculated from wastewater composition and treatment model
- slag landfill: 7.6187e-13 unit; lognormal variance with pedigree 0.072, pedigree (1,1,5,5,1)
  (same comment as for municipal waste incineration facility)
- wastewater treatment facility, capacity 1.1E10l/year: 1.9883e-9 unit; lognormal variance with pedigree 0.042, pedigree (1,1,5,5,1)
  uncertainty heeded in exchanges of the module
  EcoSpold01Location=CH
- electricity, high voltage: 0 kWh; pedigree (1,1,1,1,1)
  (same comment as for municipal waste incineration facility)
- iron (III) chloride, without water, in 40% solution state: 7.9851e-6 kg; lognormal variance with pedigree 0.382, pedigree (1,1,5,5,1)
  direct wastewater treatment plant burden plus burden from sludge incineration. Uncertainty calculated from wastewater composition and treatment model
  EcoSpold01Location=CH
  properties: wet mass 1 kg, dry mass 1 kg
- process-specific burdens, residual material landfill: 0 kg; pedigree (1,1,1,1,1)
  (same comment as for municipal waste incineration facility)
- cement, unspecified: 3.76938e-6, 2.76081e-7, 7.86922e-7, 1.81159e-5, 1.77965e-5, 5.23803e-7, 5.7529e-6, 6.96037e-7, 7.77425e-5 kg (9 entries); lognormal variance with pedigree 0.082, pedigree (1,1,5,5,1)
  (same comment as for cement, unspecified)
- waste cement, hydrated: -8.87236e-5, -0.000224926 kg (2 entries); lognormal variance with pedigree 0.082, pedigree (1,1,5,5,1)
  (same comment as for municipal waste incineration facility)
  production volume 0.00124404 kg
- electricity, low voltage: 0.00247612, 0.000434281, 0.00984951, 0.035313, 0.00714132, 0.107997, 0.0178015, 0.0507068 kWh (8 entries); lognormal variance with pedigree 0.142, pedigree (1,1,5,5,1)
  (same comment as for electricity, low voltage)
- heat, district or industrial, other than natural gas: 9.00925e-5, 0.00537693, 0.200963 MJ (3 entries); lognormal variance with pedigree 0.052, pedigree (1,1,5,5,1)
  (same comment as for municipal waste incineration facility)
- waste plastic, mixture: -0.00172425, -0.000115208, -8.71297e-6, -4.75849e-5, -1.92238e-5, -4.51863e-5, -0.00146914, -0.0120707 kg (8 entries); lognormal variance with pedigree 0.042, pedigree (1,1,5,5,1)
  (same comment as for electricity, low voltage)
  production volume 0.0614782 kg
- process-specific burdens, municipal waste incineration: 0.0696239, 0.176506 kg (2 entries); lognormal variance with pedigree 0.042, pedigree (1,1,5,5,1)
  (same comment as for municipal waste incineration facility)
- process-specific burdens, slag landfill: 0.000121226, 0.000307324 kg (2 entries); lognormal variance with pedigree 0.072, pedigree (1,1,5,5,1)
  (same comment as for cement, unspecified)
- electricity, high voltage: 0.000370109, 6.73984e-5, 0.00156114, 0.00525511, 0.00115123, 0.0165737, 0.00266938, 0.0077379 kWh (8 entries); lognormal variance with pedigree 0.492, pedigree (1,1,5,5,1)
  (same comment as for municipal waste incineration facility)
- process-specific burdens, residual material landfill: 8.87236e-5, 0.000224926 kg (2 entries); lognormal variance with pedigree 0.072, pedigree (1,1,5,5,1)
  (same comment as for municipal waste incineration facility)

## Emissions to nature
- Zinc, ion [water, surface water]: 2.9774e-5 kg; lognormal variance with pedigree 0.652, pedigree (1,1,5,5,1)
  sewer overload discharge plus direct wastewater treatment plant emission plus emission from sludge incineration. Uncertainty calculated from wastewater composition and treatment model
- Carbon dioxide, fossil [air, urban air close to ground]: 0.96215 kg; lognormal variance with pedigree 0.062, pedigree (1,1,5,5,1)
  emission from sludge incineration. Uncertainty calculated from wastewater composition and treatment model
- Zinc, ion [water, ground-, long-term]: 6.3259e-7 kg; lognormal variance with pedigree 5.512, pedigree (1,1,5,5,1)
  (same comment as for Carbon dioxide, fossil)
- TOC, Total Organic Carbon [water, surface water]: 0.040445 kg; lognormal variance with pedigree 0.042, pedigree (1,1,5,5,1)
  (same comment as for Zinc, ion)
- Lead [water, surface water]: 1.0585e-5 kg; lognormal variance with pedigree 0.602, pedigree (1,1,5,5,1)
  (same comment as for Zinc, ion)
- Lead [soil, agricultural]: 3.315e-5 kg; lognormal variance with pedigree 0.712, pedigree (1,1,5,5,1)
  emission from sludge spreading. Uncertainty calculated from wastewater composition and treatment model
- Water [air, unspecified]: 0.1 m3; name water_to_air_unspecified; lognormal variance with pedigree 0.0827, pedigree (2,2,5,5,1)
  Calculated value based on water balance.
  property fraction, origin: unspecified 1; name fraction_origin_unspecified
  property fraction, origin: salt water 0; name fraction_origin_salt_water
  property fraction, origin: fresh water 0; name fraction_origin_fresh_water
- Chromium VI [water, ground-, long-term]: 3.079e-6 kg; lognormal variance with pedigree 1.092, pedigree (1,1,5,5,1)
  (same comment as for Carbon dioxide, fossil)
- Water [water, unspecified]: 0.9 m3; name water_to_water_unspecified; lognormal variance with pedigree 0.0827, pedigree (2,2,5,5,1)
  Calculated value based on water balance.
  property fraction, origin: unspecified 0; name fraction_origin_unspecified_Ww
  property fraction, origin: salt water 0; name fraction_origin_salt_water_Ww
  property fraction, origin: fresh water 1; name fraction_origin_fresh_water_Ww
  property dry mass 0 kg; name DM
  property wet mass 1000 kg; name WM
  property carbon content, fossil 0; name C_content_fossil
  property carbon content, non-fossil 0; name C_content_non_fossil
  property water in wet mass 1000 kg; name WWM
- Chromium [air, urban air close to ground]: 2.1506e-12 kg; lognormal variance with pedigree 0.802, pedigree (1,1,5,5,1)
  direct digester gas emission plus emission from sludge incineration. Uncertainty calculated from wastewater composition and treatment model
- Chromium, ion [water, surface water]: 9.2698e-8 kg; lognormal variance with pedigree 0.722, pedigree (1,1,5,5,1)
  (same comment as for Carbon dioxide, fossil)
- DOC, Dissolved Organic Carbon [water, surface water]: 0.037779 kg; lognormal variance with pedigree 0.082, pedigree (1,1,5,5,1)
  (same comment as for Zinc, ion)
- Zinc [air, urban air close to ground]: 6.6657e-10 kg; lognormal variance with pedigree 0.762, pedigree (1,1,5,5,1)
  (same comment as for Chromium)
- Lead [water, ground-, long-term]: 3.7452e-6 kg; lognormal variance with pedigree 6.922, pedigree (1,1,5,5,1)
  (same comment as for Carbon dioxide, fossil)
- Carbon monoxide, fossil [air, urban air close to ground]: 0.0008163 kg; lognormal variance with pedigree 0.162, pedigree (1,1,5,5,1)
  (same comment as for Carbon dioxide, fossil)
- Carbon [soil, agricultural]: 0.03421 kg; lognormal variance with pedigree 0.102, pedigree (1,1,5,5,1)
  (same comment as for Lead)
- DOC, Dissolved Organic Carbon [water, ground-, long-term]: 0.00052972 kg; lognormal variance with pedigree 0.112, pedigree (1,1,5,5,1)
  (same comment as for Carbon dioxide, fossil)
- COD, Chemical Oxygen Demand [water, surface water]: 0.15096 kg; lognormal variance with pedigree 0.082, pedigree (1,1,5,5,1)
  (same comment as for Zinc, ion)
- TOC, Total Organic Carbon [water, ground-, long-term]: 0.00052972 kg; lognormal variance with pedigree 0.112, pedigree (1,1,5,5,1)
  (same comment as for Carbon dioxide, fossil)
- Methane, fossil [air, urban air close to ground]: 0.0025685 kg; lognormal variance with pedigree 0.142, pedigree (1,1,5,5,1)
  (same comment as for Carbon dioxide, fossil)
- Zinc [soil, agricultural]: 2.5731e-5 kg; lognormal variance with pedigree 0.712, pedigree (1,1,5,5,1)
  (same comment as for Lead)
- COD, Chemical Oxygen Demand [water, ground-, long-term]: 0.0013387 kg; lognormal variance with pedigree 0.112, pedigree (1,1,5,5,1)
  (same comment as for Carbon dioxide, fossil)
- Lead [air, urban air close to ground]: 1.9544e-9 kg; lognormal variance with pedigree 0.752, pedigree (1,1,5,5,1)
  (same comment as for Chromium)
- Chromium [soil, agricultural]: 1.8342e-5 kg; lognormal variance with pedigree 0.712, pedigree (1,1,5,5,1)
  (same comment as for Lead)
- NMVOC, non-methane volatile organic compounds, unspecified origin [air, urban air close to ground]: 1.167e-5 kg; lognormal variance with pedigree 0.262, pedigree (1,1,5,5,1)
  direct digester gas emission. Uncertainty calculated from wastewater composition and treatment model
- Chromium VI [water, surface water]: 4.982e-5 kg; lognormal variance with pedigree 0.642, pedigree (1,1,5,5,1)
  (same comment as for Zinc, ion)
- BOD5, Biological Oxygen Demand [water, surface water]: 0.049576 kg; lognormal variance with pedigree 0.052, pedigree (1,1,5,5,1)
  (same comment as for Zinc, ion)
- BOD5, Biological Oxygen Demand [water, ground-, long-term]: 0.00043788 kg; lognormal variance with pedigree 0.112, pedigree (1,1,5,5,1)
  (same comment as for Carbon dioxide, fossil)
- Fluoride [water, surface water]: 0.0328 kg; lognormal variance with pedigree 0.672, pedigree (1,1,5,5,1)
  (same comment as for Zinc, ion)

## Extrapolations
wastewater compositions from literature and/or estimates This dataset has been copied from an original dataset covering the geography CH. The uncertainty has been adjusted accordingly.

## Review by Jürgen Sutter 2009-02-07
passed.
