# heat production, light fuel oil, at boiler 100kW condensing, non-modulating

Dataset: EcoSpold 2, unit process
Geography: Europe without Switzerland
Time period: 1991-01-01 to 2019-12-31
Technology level: current
Classification: ISIC rev.4 ecoinvent: 3530a: Steam and air conditioning supply based on liquid fuels
Classification: EcoSpold01Categories: oil/heating systems
Scenario: Business-as-Usual
System model: Allocation at the point of substitution
Generated by: [System]
Published in: Jungbluth, N. 2007
Database: ecoinvent
isCopyrightProtected: true
accessRestrictedTo: 1

## General comment
This dataset is a copy of the Swiss dataset.
Inventory for the operation of a light fuel oil boiler. Data related to input.
[This dataset was already contained in the ecoinvent database version 2. It was not individually updated during the transfer to ecoinvent version 3. Life Cycle Impact Assessment results may still have changed, as they are affected by changes in the supply chain, i.e. in other datasets. This dataset was generated following the ecoinvent quality guidelines for version 2. It may have been subject to central changes described in the ecoinvent version 3 change report (http://www.ecoinvent.org/database/ecoinvent-version-3/reports-of-changes/), and the results of the central updates were reviewed extensively. The changes added e.g. consistent water flows and other information throughout the database. The documentation of this dataset can be found in the ecoinvent reports of version 2, which are still available via the ecoinvent website. The change report linked above covers all central changes that were made during the conversion process.]

## Included activities end
Direct air emissions from combustion, waste, effluents and electricity use.

## Geography
Assumption for operation in Switzerland.

## Technology
Non-modulating, condensing boiler sold in 2000.

## Time period
New data for regulated emissions like NOx, particles, other figures are partly based on older literature data.

## Reference product
- heat, central or small-scale, other than natural gas: 1 MJ; By-product classification allocatable product; CPC 17300: Steam and hot water
  EcoSpold01Location=CH
  production volume 4.96322e10 MJ; name heat_apv
    Assumption. The original value from the global dataset was altered in order to model the correct shares of central or small-scale heat producing datasets on the market for heat, central or small-scale, other than natural gas according to http://www.iea.org/statistics/statisticssearch/report/?country=EU28&product=electricityandheat&year=2012
    See talk pages for further discussion.
    //Original comment from global dataset//:
    Total heat from oil calculated from IEA Oil statistics for 2007 (http://www.iea.org/stats/oildata.asp?COUNTRY_CODE=CH ; residential, commercial and agriculture), using default IEA MJ/kg conversion factors, dividing the total evenly over 4 boiler types, multiplied by conversion efficiency of specific boiler type (1.0), all on a net heat value basis.
  property price 0.0106 EUR2005
    Average European district heat price from Ecoheatcool and Euroheat 2005-2006, Ecoheat Work package 1: The European heat market. Final report. 10.6 EUR/GJ i s the price of district heat. http://www.solarthermalworld.org/files/Ecoheatcool%20WP1%20Web.pdf?download
  property true value 0.0106
    allocation property applied in "true value" allocation // value calculated from revenue
  properties: Corresponding fuel use 1 MJ

## By-products
- heat, for reuse in municipal waste incineration only: 0 MJ; CPC 17300: Steam and hot water; By-product classification allocatable product; pedigree (1,1,1,1,1)
  Net electricity generated from this waste and used in internal MSWI plant energy redistribution.
  Uncertainty: uncertainty is calculated from uncertainties in waste composition and uncertainties in energy efficiency and the uncertainty in internal energy demand
  production volume 7589.63 MJ
  property exergy 0.1842 MJ; name E_th_prod_MSWI_exergy
    This exergy property is based on the exergy content of the product.
  property price 0.0106 EUR2005; name E_th_prod_MSWI_price_EUR2005
    (same comment as for heat, central or small-scale, other than natural gas)
  property true value relation 0.1842; name E_th_prod_MSWI_true_value_relation
    property to calculate "true value" from
  property true value 1.00588e-9
    allocation property applied in "true value" allocation // value calculated from true value relation
- electricity, for reuse in municipal waste incineration only: 0 kWh; CPC 17100: Electrical energy; By-product classification allocatable product; pedigree (1,1,1,1,1)
  (same comment as for heat, for reuse in municipal waste incineration only)
  production volume 1068.91 kWh
  property true value relation 3.6; name E_el_prod_MSWI_true_value_relation
    property to calculate "true value" from
  property price 0.1 EUR2005; name E_el_prod_MSWI_price_EUR2005
    Estimated to be the same price as in case of electricity, medium voltage.
  property exergy 3.6 MJ; name E_el_prod_MSWI_exergy
    This exergy property is based on the exergy content of the product.
  property true value 2.76871e-9
    (same comment as for heat, for reuse in municipal waste incineration only)

## Inputs from technosphere
- condensate from light oil boiler: -9.8364e-6 m3; name condensate; lognormal variance with pedigree 0.3526, pedigree (3,3,5,1,1)
  Literature, basic uncertainity = 3
  EcoSpold01Location=CH
  Uncertainty: Literature, basic uncertainity = 3
  production volume 488202 m3; = heat_apv*condensate
    Calculated from the production volume of light fuel oil, burned in boiler 100kW condensing, non-modulating in proportion to the respective output amounts.
  property price 0 EUR2005; name condensate_price_EUR2005
  properties: wet mass 1000 kg, water content 2962.17, dry mass 0.337476 kg, carbon content, fossil 0.0740793
  note on carbon content, fossil: 0.025 kg TOC/m3 (Tab A.18, ecoinvent v2.2 report 13_I). TOC was considered as Total Carbon.
- hazardous waste, for incineration: -4.15e-6 kg; name haz_waste; lognormal variance with pedigree 0.0526, pedigree (3,3,5,1,1)
  Literature
  EcoSpold01Location=CH
  Uncertainty: Literature
  production volume 205973 kg; = heat_apv*haz_waste
    (same comment as for condensate from light oil boiler)
  property price 0 EUR2005; name haz_waste_price_EUR2005
  properties: wet mass 1 kg, dry mass 0.75 kg, carbon content, fossil 0.554667, water content 0.333333
  note on carbon content, fossil: Tab A.6, ecoinvent v2.2 report 13_I. C content has been calculated after data in the tables, and then referred to 1 kg DM
- chimney: 2.9762e-7 m; lognormal variance with pedigree 0.3526, pedigree (3,3,5,1,1)
  Calculated
  EcoSpold01Location=CH
  Uncertainty: Calculated
- light fuel oil: 0.02342 kg; lognormal variance with pedigree 0.0426, pedigree (3,3,5,1,1)
  Literature
  EcoSpold01Location=CH
  Uncertainty: Literature
  properties: wet mass 1 kg, dry mass 1 kg, carbon content, fossil 0.862
- electricity, low voltage: 0.0016628 kWh; lognormal variance with pedigree 0.0426, pedigree (3,3,5,1,1)
  Literature
  EcoSpold01Location=CH
  Uncertainty: Literature
- oil boiler, 100kW: 6.6138e-8 unit; lognormal variance with pedigree 0.3526, pedigree (3,3,5,1,1)
  EcoSpold01Location=CH
  Estimation 2100h use per year
  Uncertainty: Estimation 2100h use per year
- oil storage, 3000l: 1.7637e-7 unit; lognormal variance with pedigree 0.3526, pedigree (3,3,5,1,1)
  EcoSpold01Location=CH
  Calculated
  Uncertainty: Calculated

## Emissions to nature
- Toluene [air, urban air close to ground]: 1e-8 kg; lognormal variance with pedigree 0.8526, pedigree (3,3,5,1,1)
  Literature, basic uncertainity estimated = 6
  Uncertainty: Literature, basic uncertainity estimated = 6
- Ethane [air, urban air close to ground]: 2e-8 kg; lognormal variance with pedigree 0.8526, pedigree (3,3,5,1,1)
  (same comment as for Toluene)
- Particulates, < 2.5 um [air, urban air close to ground]: 5e-7 kg; lognormal variance with pedigree 0.3526, pedigree (3,3,5,1,1)
  Literature, basic uncertainty estimated = 3
  Uncertainty: Literature, basic uncertainty estimated = 3
- Acrolein [air, urban air close to ground]: 1.15e-8 kg; lognormal variance with pedigree 0.8526, pedigree (3,3,5,1,1)
  (same comment as for Toluene)
- Hydrocarbons, aromatic [air, urban air close to ground]: 2e-8 kg; lognormal variance with pedigree 0.8526, pedigree (3,3,5,1,1)
  (same comment as for Toluene)
- Hydrocarbons, aliphatic, alkanes, unspecified [air, urban air close to ground]: 2.5e-7 kg; lognormal variance with pedigree 0.8526, pedigree (3,3,5,1,1)
  (same comment as for Toluene)
- Formaldehyde [air, urban air close to ground]: 6e-9 kg; lognormal variance with pedigree 0.8526, pedigree (3,3,5,1,1)
  (same comment as for Toluene)
- Carbon dioxide, fossil [air, urban air close to ground]: 0.074 kg; lognormal variance with pedigree 0.0426, pedigree (3,3,5,1,1)
  Literature
  Uncertainty: Literature
- Hydrogen fluoride [air, urban air close to ground]: 4.5e-9 kg; lognormal variance with pedigree 0.0926, pedigree (3,3,5,1,1)
  Literature
  Uncertainty: Literature
- Zinc [air, urban air close to ground]: 5e-10 kg; lognormal variance with pedigree 0.6926, pedigree (3,3,5,1,1)
  Literature
  Uncertainty: Literature
- Carbon monoxide, fossil [air, urban air close to ground]: 7.5e-6 kg; lognormal variance with pedigree 0.93, pedigree (1,1,5,1,1)
  Deviation calculated
- Ethyne [air, urban air close to ground]: 1e-8 kg; lognormal variance with pedigree 0.8526, pedigree (3,3,5,1,1)
  (same comment as for Toluene)
- Methane, fossil [air, urban air close to ground]: 2e-7 kg; lognormal variance with pedigree 0.8526, pedigree (3,3,5,1,1)
  (same comment as for Toluene)
- Propanal [air, urban air close to ground]: 6e-9 kg; lognormal variance with pedigree 0.8526, pedigree (3,3,5,1,1)
  (same comment as for Toluene)
- Ethene [air, urban air close to ground]: 5e-8 kg; lognormal variance with pedigree 0.8526, pedigree (3,3,5,1,1)
  (same comment as for Toluene)
- PAH, polycyclic aromatic hydrocarbons [air, urban air close to ground]: 4.6e-10 kg; lognormal variance with pedigree 0.3526, pedigree (3,3,5,1,1)
  Literature
  Uncertainty: Literature
- Dioxins, measured as 2,3,7,8-tetrachlorodibenzo-p-dioxin [air, urban air close to ground]: 0 kg; pedigree (1,1,1,1,1)
  Literature
  Uncertainty: Literature
- Sulfur dioxide [air, urban air close to ground]: 4.5669e-5 kg; lognormal variance with pedigree 0.0426, pedigree (3,3,5,1,1)
  Calculated
  Uncertainty: Calculated
- Acetaldehyde [air, urban air close to ground]: 2.05e-8 kg; lognormal variance with pedigree 0.8526, pedigree (3,3,5,1,1)
  (same comment as for Toluene)
- Mercury [air, urban air close to ground]: 5e-10 kg; lognormal variance with pedigree 0.6926, pedigree (3,3,5,1,1)
  Literature
  Uncertainty: Literature
- Copper [air, urban air close to ground]: 4e-10 kg; lognormal variance with pedigree 0.6926, pedigree (3,3,5,1,1)
  Literature
  Uncertainty: Literature
- Hydrocarbons, aliphatic, unsaturated [air, urban air close to ground]: 2e-8 kg; lognormal variance with pedigree 0.8526, pedigree (3,3,5,1,1)
  (same comment as for Toluene)
- Nitrogen oxides [air, urban air close to ground]: 2.75e-5 kg; lognormal variance with pedigree 0.11, pedigree (1,1,5,1,1)
  Deviation calculated
- Dinitrogen monoxide [air, urban air close to ground]: 7e-7 kg; lognormal variance with pedigree 0.5226, pedigree (3,3,5,1,1)
  Literature, basic uncertainty estimated = 4
  Uncertainty: Literature, basic uncertainty estimated = 4
- Benzene [air, urban air close to ground]: 2e-8 kg; lognormal variance with pedigree 0.8526, pedigree (3,3,5,1,1)
  (same comment as for Toluene)
- Propene [air, urban air close to ground]: 2e-8 kg; lognormal variance with pedigree 0.8526, pedigree (3,3,5,1,1)
  (same comment as for Toluene)
- Benzaldehyde [air, urban air close to ground]: 6e-9 kg; lognormal variance with pedigree 0.8526, pedigree (3,3,5,1,1)
  (same comment as for Toluene)
- Pentane [air, urban air close to ground]: 1e-7 kg; lognormal variance with pedigree 0.8526, pedigree (3,3,5,1,1)
  (same comment as for Toluene)
- Propane [air, urban air close to ground]: 3e-8 kg; lognormal variance with pedigree 0.8526, pedigree (3,3,5,1,1)
  (same comment as for Toluene)
- Butane [air, urban air close to ground]: 1.5e-7 kg; lognormal variance with pedigree 0.8526, pedigree (3,3,5,1,1)
  (same comment as for Toluene)
- Acetone [air, urban air close to ground]: 5e-8 kg; lognormal variance with pedigree 0.8526, pedigree (3,3,5,1,1)
  (same comment as for Toluene)

## Sampling procedure
Data published in literature based on measurements.

## Extrapolations
This dataset is a copy of the Swiss dataset.
Some information from other European countries has been used to determine the emission factors.
