# phenolic resin production

Dataset: EcoSpold 2, unit process
Geography: RER
Time period: 2000-01-01 to 2020-12-31
Technology level: current
Classification: ISIC rev.4 ecoinvent: 2013:Manufacture of plastics and synthetic rubber in primary forms
Synonyms: Formaldehyde polymer with 2,7-naphthalenediol and phenol (9CI); 26936-19-6; phenol; L 8; naphthalene-2,7-diol; Formaldehyde; 1-(beta-Bromophenethyl)piperidine hydrobromide; L 8 (phenolic resin)
Scenario: Business-as-Usual
System model: Allocation at the point of substitution
Generated by: Roland Hischier
Published in: Althaus H.-J. 2007
Database: ecoinvent
isCopyrightProtected: true
accessRestrictedTo: 1

## General comment
This dataset represents the production of 1 kg of pure phenolic resin. Phenolic resins are polycondensation products of phenols and aldehydes, in particular phenol and formaldehyde. Within the phenolic resins, two different types can be distinguished:
- Novolacs: Polycondesation is not stopped but brought to completion. The characteristic functional group here is just the alkylidene bridge – there are no other functional groups.
- Resols: Synthesized by base-catalyzed polycondensation, stopped before completion. The characteristic functional groups therefore are the hydroxymethyl group and the dimethylene ether bridge.
Depending on the type of phenolic resin (and if they are cross-linked or not), a huge variety of different applications are possible. One of the first was the use as varnishes (usually unlinked novolacs). Nowadays a lot of further applications, not only from the construction sector,
have been identified – e.g. in the sector of printing technology, in the production of epoxy resins, as adhesives in a variety of cases, etc.
The data is based on estimations as well as approximations based on data from a large chemical factory (Gendorf 2016).
References:
Althaus H.-J., Chudacoff M., Hischier R., Jungbluth N., Osses M. and Primas A. (2007) Life Cycle Inventories of Chemicals. ecoinvent report No. 8, v2.0. EMPA Dübendorf, Swiss Centre for Life Cycle Inventories, Dübendorf, CH.
Gendorf (2016) Umwelterklärung 2015, Werk Gendorf Industriepark, www.gendorf.de.

## Included activities start
The activity starts when the raw materials enter the process.

## Included activities end
This activity ends with the production of phenolic resin. The dataset includes raw materials and chemicals used for production, estimated emissions to air and water from production (incomplete) as well as the estimated energy demand and infrastructure of the plant (approximation). Solid wastes are omitted.

## Geography
The data used has no specific geographical origin as it is based on stoechiometric calculations and estimations. It is assumed to be representative of the production processes in this geography. Some values are based on data from a large chemical factory located in Germany. These are assumed to be valid for this geography.

## Technology
Production from phenol and formaldehyde (as examples of the respective substance classes) with a yield of 98%. The inventory is based on stoechiometric calculations. The emissions to air (0.2 wt% of raw material input) and water were estimated using mass balance. Treatment of the wastewater in an internal wastewater treatment plant is assumed (elimination efficiency of 90% for C).
References:
Althaus H.-J., Chudacoff M., Hischier R., Jungbluth N., Osses M. and Primas A. (2007) Life Cycle Inventories of Chemicals. ecoinvent report No. 8, v2.0. EMPA Dübendorf, Swiss Centre for Life Cycle Inventories, Dübendorf, CH.

## Time period
Date of published literature. Some values are based on data published by the Gendorf factory that were collected between 2011 and 2015. The time period has been adjusted accordingly. For more details, see the comments of the exchanges.

## Reference product
- phenolic resin: 1 kg; name RP; CPC 34790: Other plastics in primary forms; ion exchangers; By-product classification allocatable product
  Phenolic resins are polycondensation products of phenols and aldehydes, in particular phenol and formaldehyde. Within the phenolic resins, two different types can be distinguished:
  - Novolacs: Polycondesation is not stopped but brought to completion. The characteristic functional group here is just the alkylidene bridge – there are no other functional groups.
  - Resols: Synthesized by base-catalyzed polycondensation, stopped before completion. The characteristic functional groups therefore are the hydroxymethyl group and the dimethylene ether bridge.
  Depending on the type of phenolic resin (and if they are cross-linked or not), a huge variety of different applications are possible. One of the first was the use as varnishes (usually unlinked novolacs). Nowadays a lot of further applications, not only from the construction sector,
  have been identified – e.g. in the sector of printing technology, in the production of epoxy resins, as adhesives in a variety of cases, etc.
  References:
  Althaus H.-J., Chudacoff M., Hischier R., Jungbluth N., Osses M. and Primas A. (2007) Life Cycle Inventories of Chemicals. ecoinvent report No. 8, v2.0. EMPA Dübendorf, Swiss Centre for Life Cycle Inventories, Dübendorf, CH.
  production volume 9.8e8 kg; name RP_PV
    According to the European Commission, in 2003 the production of phenolic resins in Western Europe was 980000 metric tonnes.
    Reference(s):
    European Commission. 2007. Reference Document on Best Available Techniques for the Manufacture of Polymers. Retrieved from: http://eippcb.jrc.ec.europa.eu/reference/BREF/pol_bref_0807.pdf, on 15 of June 2017 .
  property price 1.37 EUR2005
    Calculated value based on data from United Nations Commodity Trade Statistics Database (comtrade.un.org). UN comtrade category: 390940 Phenolic resins, in primary forms. Year 2005. Using exchange rate of 1EURO = 1.209 USD. Average of price of import into 5 main markets (EU, US, JP, IN and CN).
  property carbon content, fossil 0.772277
    (C6H5OH)-CH2-(C6H5OH) was considered to be the basic structure in phenolic resin (ecoinvent v2.2 report 8-part 61). C13H14O2, MW=202 g/mol
  property carbon content 0.772277
    carbon content on a dry matter basis (reserved; not for manual entry)
  property true value 1.37; name RP_true_value
    allocation property applied in "true value" allocation // value calculated from revenue
  properties: dry mass 1 kg, water content 0, water in wet mass 0 kg, wet mass 1 kg, carbon content, non-fossil 0, carbon allocation 0.772277 kg

## By-products
- heat, for reuse in municipal waste incineration only: 0 MJ; CPC 17300: Steam and hot water; By-product classification allocatable product; pedigree (1,1,1,1,1)
  Net electricity generated from this waste and used in internal MSWI plant energy redistribution.
  Uncertainty: uncertainty is calculated from uncertainties in waste composition and uncertainties in energy efficiency and the uncertainty in internal energy demand
  production volume 597.854 MJ
  property exergy 0.1842 MJ; name E_th_prod_MSWI_exergy
    This exergy property is based on the exergy content of the product.
  property price 0.0106 EUR2005; name E_th_prod_MSWI_price_EUR2005
    Average European district heat price from Ecoheatcool and Euroheat 2005-2006, Ecoheat Work package 1: The European heat market. Final report. 10.6 EUR/GJ i s the price of district heat. http://www.solarthermalworld.org/files/Ecoheatcool%20WP1%20Web.pdf?download
  property true value relation 0.1842; name E_th_prod_MSWI_true_value_relation
    property to calculate "true value" from
  property true value 1.16811e-9
    allocation property applied in "true value" allocation // value calculated from true value relation
- electricity, for reuse in municipal waste incineration only: 0 kWh; CPC 17100: Electrical energy; By-product classification allocatable product; pedigree (1,1,1,1,1)
  (same comment as for heat, for reuse in municipal waste incineration only)
  production volume 84.0627 kWh
  property true value relation 3.6; name E_el_prod_MSWI_true_value_relation
    property to calculate "true value" from
  property price 0.1 EUR2005; name E_el_prod_MSWI_price_EUR2005
    Estimated to be the same price as in case of electricity, medium voltage.
  property exergy 3.6 MJ; name E_el_prod_MSWI_exergy
    This exergy property is based on the exergy content of the product.
  property true value 3.17451e-9
    (same comment as for heat, for reuse in municipal waste incineration only)
- zinc concentrate: 0 kg; CPC 14290: Other non-ferrous metal ores and concentrates (other than uranium or thorium ores and concentrates); By-product classification allocatable product
  Calculated value from the knowledge of the properties of both products.
  production volume 0.0113727 kg
  property price 0.38 EUR2005; name ByP_price_EUR2005
    Temporary price data. Calculated as 90% of purchasers price based on: Zinc content in concentrate 53%. Concentrate price per kg Zn 86.5% of refined Zn price (13.5% treatment charges according to CHR Metals Limited 2005: Dynamic cost curves. http://www.minecost.com/dynamic.pdf). 2004 zinc price from USGS (2007) Mineral commodity summaries 2007. <http://minerals.usgs.gov/minerals/pubs/mcs/2007/mcs2007.pdf> [Accessed 25 May 2010]
  property zinc content 0.53; name zinc_C_zinc_concentrate
    Zinc content on a dry matter basis. Value taken from teh "zinc mine operation" /GLO dataset.
  property dry mass 1 kg; name DM_zinc_concentrate
  property carbon content 0
    carbon content on a dry matter basis (reserved; not for manual entry)
  property true value 4.30488e-13
    allocation property applied in "true value" allocation // value calculated from revenue
  properties: wet mass 1 kg, water content 0, carbon content, non-fossil 0, carbon content, fossil 0, water in wet mass 0 kg, carbon allocation 0 kg

## Inputs from technosphere
- chemical factory, organics: 4e-10 unit; lognormal variance with pedigree 0.309225, pedigree (2,3,1,2,3)
  Calculated based on literature data published by the industry. For this activity, no information was readily available concerning infrastructure and land-use. Therefore, the infrastructure is estimated based on data from two chemical factories, the BASF site of Ludwigshafen and the chemical factory in Gendorf (which are both located in Germany), which produce a wide range of chemical substances. Based on this data, the following assumptions are made: the built area amounts to about 4.2 ha, the plant has an average output of 50'000 t/a and a lifespan of fifty years. The estimated infrastructure amount is therefore 4.00 E-10 units per kg of produced chemical.
  References:
  Althaus H.-J., Chudacoff M., Hischier R., Jungbluth N., Osses M. and Primas A. (2007) Life Cycle Inventories of Chemicals. ecoinvent report No. 8, v2.0. EMPA Dübendorf, Swiss Centre for Life Cycle Inventories, Dübendorf, CH.
  Gendorf (2000) Umwelterklärung 2000, Werk Gendorf. Werk Gendorf, Burgkirchen.
- nitrogen, liquid: 0.019 kg; lognormal variance with pedigree 0.009825, pedigree (2,3,1,2,3)
  Calculated based on literature data published by the industry. This value is a 5-year average of data (2011 - 2015) published by the Gendorf factory (Gendorf, 2016, Umwelterklärung, www.gendorf.de), (Gendorf, 2015, Umwelterklärung, www.gendorf.de), (Gendorf, 2014, Umwelterklärung, www.gendorf.de). The amount of nitrogen used per kg of chemical substance produced is calculated using literature data published by the Gendorf factory based in Germany, which produces a wide range of chemical substances. The factory produced 1657400 tonnes of chemical substances in the year 2015 (Gendorf, 2016, Umwelterklärung, www.gendorf.de) and 740000 tonnes of intermediate products. The reported amount of nitrogen used in 2015 was 33512400 Nm3 (Gendorf, 2016, Umwelterklärung, www.gendorf.de). One Nm3 of nitrogen is equal to 1.2506 kg. The resulting amount of nitrogen - the 5-year average (2011 - 2015, weighted by production volume) is 0.019 kg/kg. Nitrogen is mainly used during the production of chemicals for 'blanketing', which is the process of applying gas to the vapour space of a container or vessel in order to control its composition.
  properties: wet mass 1 kg, dry mass 1 kg
- wastewater, average: 0 m3; name BP_wastewater_average; pedigree (1,1,1,1,1)
  Calculated based on literature data published by the industry. This value is a 5-year average of data (2011 - 2015) published by the Gendorf factory (Gendorf, 2016, Umwelterklärung, www.gendorf.de), (Gendorf, 2015, Umwelterklärung, www.gendorf.de), (Gendorf, 2014, Umwelterklärung, www.gendorf.de). The amount of wastewater (which is later on treated in the municipal WWTP) per kg of chemical substance produced is calculated using literature data published by the Gendorf factory based in Germany, which produces a wide range of chemical substances. The factory produced 1657400 tonnes of chemical substances in the year 2015 (Gendorf, 2016, Umwelterklärung, www.gendorf.de) and 740000 tonnes of intermediate products. The amount of wastewater which is later on treated in the municipal WWTP in the year 2015 was 1200 tonnes (Gendorf, 2016, Umwelterklärung, www.gendorf.de). The resulting amount of wastewater is 2.7E-06 m3/kg of chemical product produced.
  production volume 0 m3
    Calculated from the production volume of phenolic resin in proportion to the respective output amounts.
  property price 0 EUR2005; name BP_wastewater_average_price_EUR2005
  properties: water content 2882.2, dry mass 0.346837 kg, wet mass 1000 kg, carbon content, non-fossil 0.194039
  note on carbon content, non-fossil: 0.0673 kg TOC/m3 (Tab A.17, ecoinvent v2.2 report 13_I). TOC was considered as Total Carbon.
- electricity, medium voltage: 0.416 kWh; lognormal variance with pedigree 0.009825, pedigree (2,3,1,2,3)
  Calculated based on literature data published by the industry. This value is a 5-year average of data (2011 - 2015) published by the Gendorf factory (Gendorf, 2016, Umwelterklärung, www.gendorf.de), (Gendorf, 2015, Umwelterklärung, www.gendorf.de), (Gendorf, 2014, Umwelterklärung, www.gendorf.de). The amount of electricity per kg of chemical substance produced is calculated using literature data published by the Gendorf factory based in Germany, which produces a wide range of chemical substances. The factory produced 1657400 tonnes of chemical substances in the year 2015 (Gendorf, 2016, Umwelterklärung, www.gendorf.de) and 740000 tonnes of intermediate products. The amount of electricity consumed in the year 2015 was 3498800 GJ (Gendorf, 2016, Umwelterklärung, www.gendorf.de). The resulting amount of electricity is 0.406 kWh/kg (year 2015) of chemical substance produced. The 5-year average (2011 - 2015, weighted by production volume) is 0.416 kWh/kg (1.5 MJ/kg). Cross-reference: the amount of chemicals produced (excluding intermediate products) in the EU-28 in the year 2011 was 327 million tonnes (Eurostat, http://ec.europa.eu/eurostat/statistics-explained/index.php/Chemicals_production_statistics, accessed 20170126). The chemical and petrochemical industry sector consumed 2.33 EJ of energy in 2011 (European Commission - Joint Research Centre, 2014, BAT on Common Waste water and Waste Gas Treatment/Management Systems in the Chemical Sector). The resulting energy (both heat and electricity) consumed per kg of chemicals produced in 2011 is thus 7.13 MJ/kg. This is higher than the value calculated using data published by Gendorf – 3.85 MJ/kg, but that is to be expected as the intermediate products are not accounted for.
- tap water: 0.026 kg; lognormal variance with pedigree 0.009825, pedigree (2,3,1,2,3)
  Calculated based on literature data published by the industry. This value is a 5-year average of data (2011 - 2015) published by the Gendorf factory (Gendorf, 2016, Umwelterklärung, www.gendorf.de), (Gendorf, 2015, Umwelterklärung, www.gendorf.de), (Gendorf, 2014, Umwelterklärung, www.gendorf.de). The amount of tap water per kg of chemical substance produced is calculated using literature data published by the Gendorf factory based in Germany, which produces a wide range of chemical substances. The factory produced 1657400 tonnes of chemical substances in the year 2015 (Gendorf, 2016, Umwelterklärung, www.gendorf.de) and 740000 tonnes of intermediate products. The amount of tap water consumed in the year 2015 was 55100 tonnes (Gendorf, 2016, Umwelterklärung, www.gendorf.de). The resulting amount of tap water is 0.023 kg/kg of chemical product produced. The 5-year average (2011 - 2015, weighted by production volume) is 0.026 kg/kg.
  properties: dry mass 0.000337476 kg, water content 2962.17, carbon content, fossil 0.00178991, wet mass 1 kg
  note on carbon content, fossil: Bicarbonate content is 2.93 mol/m3. CO2 content is 0.1 mol/m3 (ecoinvent v2.2 report 8, Tab 93.1).
- formaldehyde: 0.152 kg; lognormal variance with pedigree 0.1786, pedigree (4,5,5,5,5)
  Estimation based on process yield 90-99.8%
  Uncertainty: e
  properties: wet mass 1 kg, dry mass 1 kg, carbon content, fossil 0.4
- phenol: 0.95 kg; lognormal variance with pedigree 0.1786, pedigree (4,5,5,5,5)
  Estimation based on process yield 90-99.8%
  Uncertainty: e
  properties: dry mass 1 kg, carbon content, fossil 0.765957, wet mass 1 kg
- wastewater, average: -2.43642e-6, -2.63575e-7 m3 (2 entries); lognormal variance with pedigree 0.009825, pedigree (2,3,1,2,3)
  (same comment as for wastewater, average)
  production volume 2646 m3

## Inputs from nature
- Water, well, in ground [natural resource, in water]: 0.00083 m3; lognormal variance with pedigree 0.009825, pedigree (2,3,1,2,3)
  Calculated based on literature data published by the industry. This value is a 5-year average of data (2011 - 2015) published by the Gendorf factory (Gendorf, 2016, Umwelterklärung, www.gendorf.de), (Gendorf, 2015, Umwelterklärung, www.gendorf.de), (Gendorf, 2014, Umwelterklärung, www.gendorf.de). The amount of groundwater and surface water (river) extracted per kg of chemical substance produced is calculated using literature data published by the Gendorf factory based in Germany, which produces a wide range of chemical substances. The factory produced 1657400 tonnes of chemical substances in the year 2015 (Gendorf, 2016, Umwelterklärung, www.gendorf.de) and 740000 tonnes of intermediate products. The amount of groundwater and surface water (river) extracted in the year 2015 was 19950000 tonnes and 21488100 tonnes respectively (Gendorf, 2016, Umwelterklärung, www.gendorf.de).
- Water, river [natural resource, in water]: 0.00086 m3; lognormal variance with pedigree 0.009825, pedigree (2,3,1,2,3)
  (same comment as for Water, well, in ground)
- Water, cooling, unspecified natural origin [natural resource, in water]: 0.0164 m3; lognormal variance with pedigree 0.009825, pedigree (2,3,1,2,3)
  Calculated based on literature data published by the industry. This value is a 5-year average of data (2011 - 2015) published by the Gendorf factory (Gendorf, 2016, Umwelterklärung, www.gendorf.de), (Gendorf, 2015, Umwelterklärung, www.gendorf.de), (Gendorf, 2014, Umwelterklärung, www.gendorf.de). The amount of water for cooling extracted per kg of chemical substance produced is calculated using literature data published by the Gendorf factory based in Germany, which produces a wide range of chemical substances. The factory produced 1657400 tonnes of chemical substances in the year 2015 (Gendorf, 2016, Umwelterklärung, www.gendorf.de) and 740000 tonnes of intermediate products. The reported amounts of water extracted as groundwater and surface water (river) are assumed to be used entirely for cooling purposes.

## Emissions to nature
- BOD5, Biological Oxygen Demand [water, unspecified]: 0.00418651 kg; lognormal variance with pedigree 0.218, pedigree (4,5,5,5,5)
  Calculated value. The BOD, COD, TOC and BOD5 are calculated based on the amount and type of emissions released to water in the same activity.
- Nitrogen [air, unspecified]: 0.019 kg; lognormal variance with pedigree 0.009825, pedigree (2,3,1,2,3)
  Calculated value. The amount of nitrogen released to air is equal to the amount of nitrogen entering the activity.
- COD, Chemical Oxygen Demand [water, unspecified]: 0.00418651 kg; lognormal variance with pedigree 0.218, pedigree (4,5,5,5,5)
  (same comment as for BOD5, Biological Oxygen Demand)
- Formaldehyde [water, surface water]: 0.000273 kg; lognormal variance with pedigree 0.5, pedigree (5,5,5,5,4)
  Estimated from mass balance and WWTP effic.
  Uncertainty: e
- TOC, Total Organic Carbon [water, unspecified]: 0.00141732 kg; lognormal variance with pedigree 0.218, pedigree (4,5,5,5,5)
  (same comment as for BOD5, Biological Oxygen Demand)
- Formaldehyde [air, urban air close to ground]: 0.000303 kg; lognormal variance with pedigree 0.33, pedigree (5,5,5,5,5)
  Estimation
  Uncertainty: e
- DOC, Dissolved Organic Carbon [water, unspecified]: 0.00141732 kg; lognormal variance with pedigree 0.218, pedigree (4,5,5,5,5)
  (same comment as for BOD5, Biological Oxygen Demand)
- Carbon dioxide, fossil [air, urban air close to ground]: 0.0468 kg; lognormal variance with pedigree 0.2, pedigree (5,5,5,5,4)
  Estimated from mass balance and WWTP effic.
  Uncertainty: e
- Water [water, unspecified]: 0.0167 m3; lognormal variance with pedigree 0.009825, pedigree (2,3,1,2,3)
  Calculated based on literature data published by the industry (Gendorf, 2016, Umwelterklärung, www.gendorf.de). The amount of water released back to the environment consists of the amount of process water treated in the internal WWTP and then released back to the environment and the amount of cooling water released back to the environment.
  property fraction, origin: unspecified 1; name fraction_origin_unspecified_Ww
  property fraction, origin: salt water 0; name fraction_origin_salt_water_Ww
  property wet mass 1000 kg; name WM
  property water in wet mass 1000 kg; name WWM
  property fraction, origin: fresh water 0; name fraction_origin_fresh_water_Ww
  property carbon content, fossil 0; name C_content_fossil
  property dry mass 0 kg; name DM
  property carbon content, non-fossil 0; name C_content_non_fossil
- Water [air, unspecified]: 0.0014 m3; lognormal variance with pedigree 0.009825, pedigree (2,3,1,2,3)
  Calculated to ensure the water balance. In general, in the case of recirculating cooling systems, 77% of the water input evaporates to air. In case of once-through cooling systems, 4% of the water input evaporates to air. The process water has in the chemical industry an average evaporation rate of 20.5%. In the specific case of the Gendorf factory, the calculated evaporation rate based on the data published is 6.3%. This matches the qualitative information, that the majority of the cooling systems in Gendorf are once-through and that the amount of cooling water used is significantly higher than the amount of process water used (Gendorf, 2016, Umwelterklärung, www.gendorf.de).
  property fraction, origin: unspecified 1; name fraction_origin_unspecified
  property fraction, origin: salt water 0; name fraction_origin_salt_water
  property fraction, origin: fresh water 0; name fraction_origin_fresh_water
- Phenol [water, surface water]: 0.00171 kg; lognormal variance with pedigree 0.5, pedigree (5,5,5,5,4)
  Estimated from mass balance and WWTP effic.
  Uncertainty: e
- Phenol [air, urban air close to ground]: 0.0019 kg; lognormal variance with pedigree 0.33, pedigree (5,5,5,5,5)
  Estimation
  Uncertainty: e

## Sampling procedure
The process data is estimated based on literature and stoechiometric calculations. Process emissions are based on estimations only. Some values are calculated based on data from a large chemical factory located in Germany. For more details, see the comments of the exchanges.

## Review by Emilia Moreno Ruiz 2017-08-11
This dataset was additionally reviewed in a separate review process by Eric Johnson of Atlantic Consulting as well as Emilia Moreno Ruiz and Gregor Wernet of ecoinvent.
