# fish curing plant construction and maintenance

Dataset: EcoSpold 2, unit process
Geography: PE
Time period: 2011-01-01 to 2019-12-31
Technology level: current
Classification: ISIC rev.4 ecoinvent: 1020:Processing and preserving of fish, crustaceans and molluscs
Scenario: Business-as-Usual
System model: Allocation at the point of substitution
Generated by: Angel Avadí
Published in: Avadí, A. 2018
Database: ecoinvent
isCopyrightProtected: true
accessRestrictedTo: 1

## General comment
The activity represents the construction and maintenance along its lifetime of a fish curing (salting + curing under controlled temperature) plant, expressed as the installed capacity required to process 1000 kg of raw material. The life cycle inventories were produced based on a sample of 1 Peruvian plant (processing capacity: 2 700 t/y) and data from other industry representatives. This dataset may be adapted to other global production sites.
System boundaries of fish processing plants and relations between activities

## Included activities start
From construction of the plant, through maintenance.

## Included activities end
End of life treatment of the plant

## Geography
Representative of Peru, as of 2017 there were 73 active fish curing plants, with an aggregated processing capacity of 139 000 t/y.

## Technology
Construction and maintenance activities of Peruvian fish curing plants, per t of processing capacity. Plants have a lifespan of 30 years.
Process diagram of small fish curing

## Time period
Production figures represent the period 2012. Valid as of 2017.

## Parameters
- copper wire use: 0.31 kg; name copper_wire_use; triangular min 0.14, mostLikely 0.31, max 1.49, pedigree (3,3,1,1,1)
  Copper wire for construction/maintenance consumed per t of processed raw material
  Uncertainty: Data from 1 plant, assumptions for larger plants

## Reference product
- fish curing plant: 0 unit; name plant; source Angel Avadí 2014; CPC 8812: Fish processing services; By-product classification allocatable product
  One unit of plant represents the installed capacity required to process 1 t of raw material, including annual maintenance of the infrastructure, over the plant's lifetime.
  production volume 1.9e6 unit; name prod_vol
    In average 1 new plant is built per year, with processing capacity of at least 1900 t raw material/year
  property capacity [kg] 1909 kg; name plant_capacity_kg
  property price 1015.37 EUR2005; name plant_price_EUR2005
    Calculated based on inputs: The price of the product has been calculated as a sum of the values of the material and energy inputs for this product. This value is therefore a rough estimation. It may underestimate the real price since there are additional expenses when producing any product. These expences can include for example labour costs, treatment of waste materials and profit for the producer. Please consider carefully whether this level of data quality is acceptable for your application.
  property lifetime 30 year; name plant_lifetime
  property true value 1015.37; name plant_true_value
    allocation property applied in "true value" allocation // value calculated from revenue
- iron scrap, unsorted: 1 kg; name iron_s; = evaporators_steel; source Angel Avadí 2014; CPC 39310: Slag, dross, scalings and other waste from the manufacture of iron or steel; By-product classification Recyclable
  Waste steel and iron at end of life
  production volume 4.484e6 kg; = ABS(prod_vol*iron_s/plant)
    Calculated from production volume of reference product using the relative outputs.
  property price 0.149 EUR2005; name iron_s_price_EUR2005
    Temporary price data. Calculated as 90% of purchasers price based on: estimated at 85% of sorted scrap
  property carbon content 0.005
    carbon content on a dry matter basis (reserved; not for manual entry)
  property true value 0.35164; name iron_s_true_value
    allocation property applied in "true value" allocation // value calculated from revenue
  properties: dry mass 1 kg, water content 0, carbon content, fossil 0.005, wet mass 1 kg, water in wet mass 0 kg, carbon content, non-fossil 0, carbon allocation 0.005 kg

## By-products
- heat, for reuse in municipal waste incineration only: 0 MJ; CPC 17300: Steam and hot water; By-product classification allocatable product; pedigree (1,1,1,1,1)
  Net electricity generated from this waste and used in internal MSWI plant energy redistribution.
  production volume 333409 MJ
  property true value relation 0.1842; name E_th_prod_MSWI_true_value_relation
    property to calculate 'true value' from
  property exergy 0.1842 MJ; name E_th_prod_MSWI_exergy
    This exergy property is based on the exergy content of the product.
  property price 0.0106 EUR2005; name E_th_prod_MSWI_price_EUR2005
    Average European district heat price from Ecoheatcool and Euroheat 2005-2006, Ecoheat Work package 1: The European heat market. Final report. 10.6 EUR/GJ i s the price of district heat. http://www.solarthermalworld.org/files/Ecoheatcool%20WP1%20Web.pdf?download
  property true value 0.00115786
    allocation property applied in "true value" allocation // value calculated from true value relation
- electricity, for reuse in municipal waste incineration only: 0 kWh; CPC 17100: Electrical energy; By-product classification allocatable product; pedigree (1,1,1,1,1)
  (same comment as for heat, for reuse in municipal waste incineration only)
  production volume 46075 kWh
  property price 0.1 EUR2005; name E_el_prod_MSWI_price_EUR2005
    Estimated to be the same price as in case of electricity, medium voltage.
  property exergy 3.6 MJ; name E_el_prod_MSWI_exergy
    This exergy property is based on the exergy content of the product.
  property true value relation 3.6; name E_el_prod_MSWI_true_value_relation
    property to calculate 'true value' from
  property true value 0.00312721
    (same comment as for heat, for reuse in municipal waste incineration only)
- copper: 0 kg; source Rentz O. 1999; By-product classification allocatable product; CPC 41413: Refined copper and copper alloys, unwrought; master alloys of copper
  Literature value. Copper uses: Before end-use copper is manufactured into semi fabricated products, such as shapes and ingots (known as 'semis'). These manufacturing processes are subdivided into hot working, cold working and, if necessary, process annealing. Few of the semis are ready for use as such. They more typically travel to first-stage manufacturers, who make metal rods, wire, and casting, and then to component manufacturers who produce such things as motors, valves, and insulated cables The components in turn are incorporated by final-stage manufacturers into a variety of finished products - automobiles, commercial buildings, residential housing, and so forth. These uses account for about 79% of the world-wide consumption of copper.
  production volume 449618 kg
  properties: dry mass 1 kg, water in wet mass 0 kg, wet mass 1 kg, carbon content, non-fossil 0, water content 0, price 5.52 EUR2005, carbon content, fossil 0, carbon content 0, carbon allocation 0 kg, true value 1.30626
- zinc concentrate: 0 kg; CPC 14290: Other non-ferrous metal ores and concentrates (other than uranium or thorium ores and concentrates); By-product classification allocatable product
  Calculated value from the knowledge of the properties of both products.
  production volume 0.000405508 kg
  property price 0.38 EUR2005; name ByP_price_EUR2005
    Temporary price data. Calculated as 90% of purchasers price based on: Zinc content in concentrate 53%. Concentrate price per kg Zn 86.5% of refined Zn price (13.5% treatment charges according to CHR Metals Limited 2005: Dynamic cost curves. http://www.minecost.com/dynamic.pdf). 2004 zinc price from USGS (2007) Mineral commodity summaries 2007. <http://minerals.usgs.gov/minerals/pubs/mcs/2007/mcs2007.pdf> [Accessed 25 May 2010]
  property zinc content 0.53; name zinc_C_zinc_concentrate
    Zinc content on a dry matter basis. Value taken from teh "zinc mine operation" /GLO dataset.
  property dry mass 1 kg; name DM_zinc_concentrate
  property carbon content 0
    carbon content on a dry matter basis (reserved; not for manual entry)
  property true value 8.11017e-11
    allocation property applied in "true value" allocation // value calculated from revenue
  properties: wet mass 1 kg, water content 0, carbon content, non-fossil 0, carbon content, fossil 0, water in wet mass 0 kg, carbon allocation 0 kg

## Inputs from technosphere
- waste paint on wall: -2.49058e-5 kg; = (paint)*-1; source Avadí, A. 2018
  Waste paint
  production volume 323000 kg; = prod_vol * ((Ref('9f1699cf-243e-41f7-8620-4949cf99a157')*-1) / plant)
    Calculated from production volume of reference product using the relative outputs.
  properties: carbon content, non-fossil 0.199629, wet mass 1 kg, dry mass 1 kg, carbon content, fossil 0.140367
- generator, 200kW electrical: 3.83842e-8 unit; source Angel Avadí 2014; triangular min 3.83842e-8, mostLikely 3.83842e-8, max 3.83842e-8, pedigree (3,3,3,1,1)
  Electric generator 100 kW
  Uncertainty: Data from 1 plant, assumptions for larger plants
- copper scrap, sorted, pressed: -4.54164e-5 kg; name copper_s; = (copper_wire_use)*-1; source Angel Avadí 2014
  Waste copper wire at end of life
  production volume 589000 kg; = ABS(prod_vol*copper_s/plant)
    Calculated from production volume of reference product using the relative outputs.
  property price 2.84 EUR2005; name copper_s_price_EUR2005
  properties: wet mass 1 kg, dry mass 1 kg
- tap water: 0.973523 kg; name water; source Avadí, A. 2018; triangular min 0.973523, mostLikely 0.973523, max 0.973523, pedigree (3,3,5,3,3)
  Water for maintenance/cleansing
  Uncertainty: It is assumed that 60% of total water consumption is used during processing, and 40% for maintenance/cleaning (http://www.dfo-mpo.gc.ca/Library/273700.pdf)
  property carbon content, fossil 0.00178991; name water_CCF
  properties: wet mass 1 kg, dry mass 0.000337476 kg, water content 2962.17
  note on carbon content, fossil: Bicarbonate content is 2.93 mol/m3. CO2 content is 0.1 mol/m3 (ecoinvent v2.2 report 8, Tab 93.1).
- steel, chromium steel 18/8: 0.00107388 kg; name racks; source Angel Avadí 2014; triangular min 0.00107388, mostLikely 0.00107388, max 0.00107388, pedigree (3,3,3,1,1)
  Racks and other equipment
  Uncertainty: Data from 1 plant, assumptions for larger plants
  properties: wet mass 1 kg, dry mass 1 kg, carbon content, fossil 0.0008
  note on carbon content, fossil: Stainless steel model is the grade 304 steel (18/8 stainless, 18% chromium 8% nickel; max. 0.08% C)
- aluminium, primary, ingot: 2.93009e-5 kg; name evaporators_Al; source Angel Avadí 2014; triangular min 2.93009e-5, mostLikely 2.93009e-5, max 2.93009e-5, pedigree (3,3,3,1,1)
  Evaporators
  Uncertainty: Data from 1 plant, assumptions for larger plants
  properties: wet mass 1 kg, dry mass 1 kg
- air compressor, screw-type compressor, 300kW: 7.67684e-8 unit; source Angel Avadí 2014; triangular min 7.67684e-8, mostLikely 7.67684e-8, max 7.67684e-8, pedigree (3,3,3,1,1)
  Air compression system 300 kW
  Uncertainty: Data from 1 plant, assumptions for larger plants
- air compressor, screw-type compressor, 4kW: 3.83842e-7 unit; source Angel Avadí 2014; triangular min 3.83842e-7, mostLikely 3.83842e-7, max 3.83842e-7, pedigree (3,3,3,1,1)
  Air compression system 20 kW
  Uncertainty: Data from 1 plant, assumptions for larger plants
- building, hall, steel construction: 0.00107388 m2; source Angel Avadí 2014; triangular min 0.00107388, mostLikely 0.00107388, max 0.00107388, pedigree (3,3,3,1,1)
  Plant building
  Uncertainty: Data from 1 plant, assumptions for larger plants
- sheet rolling, aluminium: 2.93009e-5 kg; = evaporators_Al; source Angel Avadí 2014
  Evaporators
- wire drawing, copper: 4.54164e-5 kg; = copper_wire_use; source Angel Avadí 2014
  Copper wire for construction/maintenance consumed per t of processed raw material. Lifespan of plant: 30 years.
- concrete, normal: 7.32523e-6 m3; name concrete; source Angel Avadí 2014; triangular min 7.32523e-6, mostLikely 7.32523e-6, max 7.32523e-6, pedigree (3,3,3,1,1)
  Weights
  Uncertainty: Data from 1 plant, assumptions for larger plants
  properties: dry mass 2190 kg, wet mass 2380 kg, water content 0.086758
- scrap steel: -0.00107388 kg; name chromium_s; = (racks)*-1; source Angel Avadí 2014
  Representing waste chromium steel
  production volume 1.3927e7 kg; = ABS(prod_vol*chromium_s/plant)
    Calculated from production volume of reference product using the relative outputs.
  property price 0 EUR2005; name chromium_s_price_EUR2005
  properties: dry mass 1 kg, wet mass 1 kg
- gas boiler: 7.67684e-8 unit; source Angel Avadí 2014; triangular min 7.67684e-8, mostLikely 7.67684e-8, max 7.67684e-8, pedigree (3,3,3,1,1)
  Industrial heat system 60 KW
  Uncertainty: Data from 1 plant, assumptions for larger plants
- steel, low-alloyed: 0.000345751 kg; name evaporators_steel; source Angel Avadí 2014; triangular min 0.000345751, mostLikely 0.000345751, max 0.000345751, pedigree (3,3,3,1,1)
  Pipes and evaporators
  Uncertainty: Data from 1 plant, assumptions for larger plants
  properties: carbon content, fossil 0.005, dry mass 1 kg, wet mass 1 kg
- soap: 0.00105483 kg; source Angel Avadí 2014; triangular min 0.00105483, mostLikely 0.00105483, max 0.00105483, pedigree (2,3,3,1,1)
  Cleaning agents
  Uncertainty: Data from 1 plant, assumptions for larger plants
  properties: water content 0.149425, dry mass 0.87 kg, carbon content, non-fossil 0.692237, wet mass 1 kg
- metal working, average for chromium steel product manufacturing: 0.00141963 kg; = racks+evaporators_steel; source Angel Avadí 2014
  Construction of racks, equipment, pipes, evaporators
- chlorine, liquid: 4.83465e-5 kg; name chlorine; source Angel Avadí 2014; triangular min 4.83465e-5, mostLikely 4.83465e-5, max 4.83465e-5, pedigree (2,3,3,1,1)
  Cleaning agents
  Uncertainty: Data from 1 plant, assumptions for larger plants
  properties: wet mass 1 kg, dry mass 1 kg
- methyl ethyl ketone: 4.39514e-6 kg; name solvent; source Angel Avadí 2014; triangular min 4.39514e-6, mostLikely 4.39514e-6, max 4.39514e-6, pedigree (2,3,3,1,1)
  Butanone, used as a solvent
  Uncertainty: Data from 1 plant, assumptions for larger plants
  property carbon content, fossil 0.666667; name solvent_CCF
  properties: wet mass 1 kg, dry mass 1 kg
- sodium hydroxide, without water, in 50% solution state: 0.000575763 kg; name soda; source Angel Avadí 2014; triangular min 0.000575763, mostLikely 0.000575763, max 0.000575763, pedigree (2,3,3,1,1)
  Proxy for caustic soda
  Uncertainty: Data from 1 plant, assumptions for larger plants
  properties: wet mass 1 kg, dry mass 1 kg
- alkyd paint, white, without solvent, in 60% solution state: 2.49058e-5 kg; name paint; source Angel Avadí 2014; triangular min 2.49058e-5, mostLikely 2.49058e-5, max 2.49058e-5, pedigree (2,3,3,1,1)
  Paint
  Uncertainty: Data from 1 plant, assumptions for larger plants
  property carbon content, non-fossil 0.199629; name paint_CCNF
  property carbon content, fossil 0.140367; name paint_CCF
  properties: wet mass 1 kg, dry mass 1 kg
  note on carbon content, non-fossil: C content was calculated as an addition of C content in the raw materials.
- waste concrete: -0.0183131 kg; name concrete_s; = (concrete*2500)*-1; source Angel Avadí 2014
  Waste concrete at end of life
  production volume 2.375e8 kg; = ABS(prod_vol*concrete_s/plant)
    Calculated from production volume of reference product using the relative outputs.
  property price 0 EUR2005; name concrete_s_price_EUR2005
  properties: water content 0.086758, wet mass 1 kg, dry mass 0.920168 kg
- lubricating oil: 5.71368e-5 kg; name oil; source Angel Avadí 2014; triangular min 5.71368e-5, mostLikely 5.71368e-5, max 5.71368e-5, pedigree (2,3,3,1,1)
  Lubricating oil for machinery
  Uncertainty: Data from 1 plant, assumptions for larger plants
  properties: carbon content, fossil 0.75, dry mass 1 kg, wet mass 1 kg
  note on carbon content, fossil: Lubricating oil is produced from diesel. C-content/dry mass of fats and oils considered 75%, from: ecoinvent v2.2 report, n 15a, pg 40
- wastewater from vegetable oil refinery: -0.000975202 m3; = ((water+soap+soda+chlorine)/1000)*-1; source Avadí, A. 2018
  Proxy for wastewater from fish processing plant.
  production volume 1.26473e7 m3; = prod_vol * ((Ref('34c62d41-a630-456c-9c62-1b215ca1da26')*-1) / plant)
    Calculated from production volume of reference product using the relative outputs.
  properties: dry mass 0.871801 kg, carbon content, fossil 0.00178991, carbon content, non-fossil 0.8, water content 1146.05, wet mass 1000 kg
  note on carbon content, fossil: Estimated load for fish processing plant cleansing wastewater. The loading of fish processing wastewater is mainly organic (http://www.dfo-mpo.gc.ca/Library/273700.pdf)
- waste aluminium: -2.93009e-5 kg; name alu_s; = (evaporators_Al)*-1; source Angel Avadí 2014
  Waste aluminium at end of life
  production volume 380000 kg; = ABS(prod_vol*alu_s/plant)
    Calculated from production volume of reference product using the relative outputs.
  property price 0 EUR2005; name alu_s_price_EUR2005
  properties: wet mass 1 kg, dry mass 1 kg
- waste mineral oil: -5.71368e-5 kg; name oil_s; = (oil)*-1; source Avadí, A. 2018
  Waste lubricating oil
  production volume 741000 kg; = ABS(prod_vol*oil_s/plant)
    Calculated from production volume of reference product using the relative outputs.
  property price 0 EUR2005; name oil_s_price_EUR2005
  properties: dry mass 1 kg, carbon content, fossil 0.75, wet mass 1 kg
  note on carbon content, fossil: Tab A.6, ecoinvent v2.2 report 13_I. C content has been calculated after data in the tables, and then referred to 1 kg DM
- copper: 4.54164e-5 kg; = copper_wire_use; source Angel Avadí 2014
  (same comment as for wire drawing, copper)
  properties: dry mass 1 kg, wet mass 1 kg
- spent solvent mixture: -4.39514e-6 kg; = (solvent)*-1; source Avadí, A. 2018
  Spent solvent
  production volume 57000 kg; = prod_vol * ((Ref('a0a24da6-3266-4ab0-8011-459227696728')*-1) / plant)
    Calculated from production volume of reference product using the relative outputs.
  properties: carbon content, fossil 0.666667, wet mass 1 kg, water content 0.197605, dry mass 0.835 kg
  note on carbon content, fossil: Tab A.7, ecoinvent v2.2 report 13_I. C content has been calculated after data in the tables, and then referred to 1 kg DM

## Sampling procedure
Data from one plant were extrapolated on the basis of built area and processing capacity to represent any plant of the same type, regardless of size.
