# power saw production, with catalytic converter

Dataset: EcoSpold 2, unit process
Geography: RER
Time period: 1995-01-01 to 2019-12-31
Technology level: current
Classification: EcoSpold01Categories: construction processes/machinery
Classification: ISIC rev.4 ecoinvent: 2818:Manufacture of power-driven hand tools
Synonyms: chain; motor; Kettensäge
Tags: ConvertedDataset
Scenario: Business-as-Usual
System model: Allocation at the point of substitution
Generated by: Daniel Kellenberger (obsolete)
Published in: Kellenberger D. 2007
Database: ecoinvent
isCopyrightProtected: true
accessRestrictedTo: 1

## General comment
The composition is based on one type of power saw (produced in Stihl, Germany) and the transportation distances are partly estimated. This module should not be used if its relative importance would be high in a certain environmental inventory. Service life capacity, declared by producer: 2500 hours
[This dataset was already contained in the ecoinvent database version 2. It was not individually updated during the transfer to ecoinvent version 3. Life Cycle Impact Assessment results may still have changed, as they are affected by changes in the supply chain, i.e. in other datasets. This dataset was generated following the ecoinvent quality guidelines for version 2. It may have been subject to central changes described in the ecoinvent version 3 change report (http://www.ecoinvent.org/database/ecoinvent-version-3/reports-of-changes/), and the results of the central updates were reviewed extensively. The changes added e.g. consistent water flows and other information throughout the database. The documentation of this dataset can be found in the ecoinvent reports of version 2, which are still available via the ecoinvent website. The change report linked above covers all central changes that were made during the conversion process.]

## Included activities end
Based on the module for power saw without catalytic converter, adding some ceramics, platinum and rhodium to describe the catalytic converter.

## Geography
The power saw studied is produced in Germany and used as proxy for RER. For some elementary flows proxys (other geographical origin) have been used.

## Technology
An average chainsaw weights about 7 kg. It is assumed that about 5.4 kg are unalloyed steel. The remaining 1.6 kg consists of the chain (0.4 kg) and the running rail (blade). Chain and running rail are made of highly alloyed steel. Service life of a chainsaw is around 2'500 service hours. The chain is replaced every 65 service hours; the running rail is replaced every 200 hours.

## Reference product
- power saw, with catalytic converter: 1 unit; CPC 88768: Power-driven hand tool manufacturing services; By-product classification allocatable product
  EcoSpold01Location=RER
  production volume 1.32237 unit
    This is a placeholder value that does not reflect real-world production volumes. This dataset does not currently require a real-world production volume to work in the database framework, and no actual data were collected yet. This has no negative effect on the results of the ecoinvent database. The placeholder value of this activity was scaled according to the nominal GDP of 2005 (source: United Nations, http://data.un.org/Glossary.aspx?q=GDP+%28current+US%24%29, accessed 20130726) to reflect an appropriate share of the global production volume, which is also a placeholder value.
  property price 21.7 EUR2005
    Calculated based on inputs: The price of the product has been calculated as a sum of the values of the material and energy inputs for this product. This value is therefore a rough estimation. It may underestimate the real price since there are additional expenses when producing any product. These expences can include for example labour costs, treatment of waste materials and profit for the producer. Please consider carefully whether this level of data quality is acceptable for your application.

## Inputs from technosphere
- platinum: 0.00016 kg; lognormal variance with pedigree 0.176025, pedigree (5,5,5,2,3)
  EcoSpold01Location=RER
  properties: wet mass 1 kg, dry mass 1 kg
- power saw, without catalytic converter: 1 unit; lognormal variance with pedigree 0.34, pedigree (1,1,5,1,1)
  EcoSpold01Location=RER
- palladium: 3e-5 kg; lognormal variance with pedigree 0.176025, pedigree (5,5,5,2,3)
  EcoSpold01Location=RER
  properties: dry mass 1 kg, wet mass 1 kg

## Sampling procedure
Most data obtained by personal communication. Data for the catalytic converter were extrapolated from data for car equipment.

## Extrapolations
See geography

This dataset has been extrapolated from year 2001 to the year of the calculation (2019). The uncertainty has been adjusted accordingly.

## Review by Roberto Dones 2003-09-12
passed
