# phosphate rock beneficiation, wet

Dataset: EcoSpold 2, unit process
Geography: RoW
Time period: 1986-01-01 to 2019-12-31
Technology level: current
Classification: EcoSpold01Categories: chemicals/inorganics
Classification: ISIC rev.4 ecoinvent: 0891:Mining of chemical and fertilizer minerals
Tags: ConvertedDataset
Scenario: Business-as-Usual
System model: Allocation at the point of substitution
Share of production covered: 15 %
Generated by: Alex Primas
Published in: Althaus H.-J. 2007
Database: ecoinvent
isCopyrightProtected: true
accessRestrictedTo: 1

## General comment
Large uncertainties exist for data on particle emissions from transfer and storage. Also data of emissions to water and soil are uncertain due to missing data of uncontrolled run off which was estimated. Energy consumption data related to mass of rock moved.
[This dataset was already contained in the ecoinvent database version 2. It was not individually updated during the transfer to ecoinvent version 3. Life Cycle Impact Assessment results may still have changed, as they are affected by changes in the supply chain, i.e. in other datasets. This dataset was generated following the ecoinvent quality guidelines for version 2. It may have been subject to central changes described in the ecoinvent version 3 change report (http://www.ecoinvent.org/database/ecoinvent-version-3/reports-of-changes/), and the results of the central updates were reviewed extensively. The changes added e.g. consistent water flows and other information throughout the database. The documentation of this dataset can be found in the ecoinvent reports of version 2, which are still available via the ecoinvent website. The change report linked above covers all central changes that were made during the conversion process.]

## Included activities end
Mining process, transport to beneficiation plant, wet processing including screening, washing and flotation. No drying of calcination included. Land use for mining and reclamation.

## Geography
Assumption for production in U.S. based mainly on data from Florida. Various processes with location RER used.

## Technology
U.S. technology for wet rock processing. No specific age of technology modelled

## Time period
Time of literature publication. Measurements took place partly before this period.

## Parameters
- fraction, process water, to air: 0.34 dimensionless; name fraction_PW_to_air; lognormal variance with pedigree 0.092025, pedigree (4,4,3,2,4)

## Reference product
- phosphate rock, as P2O5, beneficiated, wet: 1 kg; CPC 34629: Other phosphatic fertilizers, n.e.c.; By-product classification allocatable product; CAS 65996-94-3
  Uncertainty not applicable for output
  EcoSpold01Location=US
  production volume 2.41685e10 kg
    Source: IFA production and trade statistics http://www.fertilizer.org/ifa/Home-Page/STATISTICS/Production-and-trade divided evenly between wet and dry product
  property price 0.049 EUR2005
    Calculated value based on data from United Nations Commodity Trade Statistics Database (comtrade.un.org). UN comtrade category: 251010 Natural calcium phosphates, unground. Year 2005. Using exchange rate of 1EURO = 1.209 USD. Average of price of import into 5 main markets (EU, US, JP, IN and CN).
  property carbon content 0
    carbon content on a dry matter basis (reserved; not for manual entry)
  properties: carbon content, fossil 0, carbon content, non-fossil 0, wet mass 1 kg, water content 0, water in wet mass 0 kg, dry mass 1 kg, carbon allocation 0 kg

## Inputs from technosphere
- palm oil, crude: 0.0069 kg; lognormal variance with pedigree 0.2532, pedigree (2,3,5,5,5)
  Average data from U.S study; proxy used
  EcoSpold01Location=MY
  Uncertainty: Average data from U.S study; proxy used
  properties: dry mass 1 kg, wet mass 1 kg, carbon content, non-fossil 0.752881
  note on carbon content, non-fossil: C49H97O6. Palm oil (tab 17.4, ecoinvent v2.2 report 17-part 17)
- ethylenediamine: 0.0028 kg; lognormal variance with pedigree 0.2532, pedigree (2,3,5,5,5)
  EcoSpold01Location=RER
  Average data from U.S study; proxy used
  Uncertainty: Average data from U.S study; proxy used
  properties: wet mass 1 kg, dry mass 1 kg, carbon content, fossil 0.5
- mine infrastructure, phosphate rock: 3.45e-11 unit; lognormal variance with pedigree 0.448, pedigree (4,5,5,5,4)
  EcoSpold01Location=US
  Estimated with weak data from 2 sites
  Uncertainty: Estimated with weak data from 2 sites
- diesel, burned in building machine: 0.19 MJ; lognormal variance with pedigree 0.0612, pedigree (2,3,5,5,3)
  61% of world production 1994
  EcoSpold01Location=GLO
  Uncertainty: 61% of world production 1994
- electricity, medium voltage: 0 kWh; pedigree (1,1,1,1,1)
  61% of world production 1994, European mix
  EcoSpold01Location=UCTE
  Uncertainty: 61% of world production 1994, European mix
- soda ash, light, crystalline, heptahydrate: 0.0069 kg; lognormal variance with pedigree 0.1232, pedigree (2,3,5,5,4)
  Average data from U.S study, Location RER
  EcoSpold01Location=RER
  Uncertainty: Average data from U.S study, Location RER
  properties: carbon content, fossil 0.0517241, wet mass 1 kg, dry mass 1 kg
- light fuel oil: 0 kg; pedigree (1,1,1,1,1)
  EcoSpold01Location=RER
  Average data from U.S study, Location RER
  Uncertainty: Average data from U.S study, Location RER
  properties: dry mass 1 kg, wet mass 1 kg, carbon content, fossil 0.862
- sulfuric acid: 0.0103 kg; lognormal variance with pedigree 0.1232, pedigree (2,3,5,5,4)
  (same comment as for soda ash, light, crystalline, heptahydrate)
  properties: wet mass 1 kg, dry mass 1 kg
- sodium silicate, spray powder, 80%: 0.0021 kg; lognormal variance with pedigree 0.1232, pedigree (2,3,5,5,4)
  (same comment as for soda ash, light, crystalline, heptahydrate)
  properties: wet mass 1 kg, dry mass 1 kg
- electricity, medium voltage: 0.00374977, 0.000682299, 0.0157494, 0.0115708, 0.167764, 0.0544736, 0.0240102 kWh (7 entries); lognormal variance with pedigree 0.1232, pedigree (2,3,5,5,4)
  (same comment as for electricity, medium voltage)
- light fuel oil: 0.00131112, 0.000189084, 0.00264615, 0.000175595, 0.000254431, 0.00572363 kg (6 entries); lognormal variance with pedigree 0.1232, pedigree (2,3,5,5,4)
  (same comment as for light fuel oil)

## Inputs from nature
- Fluorine, in ground [natural resource, in ground]: 0.155 kg; lognormal variance with pedigree 0.0546, pedigree (3,3,5,5,1)
  4.5% F in apatite; 1% F in ore; Data for process loss estimated
  Uncertainty: Data for process loss estimated
- Transformation, to pasture, man made [natural resource, land]: 0.00188 m2; lognormal variance with pedigree 0.1932, pedigree (2,3,5,5,1)
  Data from 1970-1989 for Florida
  Uncertainty: Data from 1970-1989 for Florida
- Transformation, from mineral extraction site [natural resource, land]: 0.00221 m2; lognormal variance with pedigree 0.1932, pedigree (2,3,5,5,1)
  Data from 1970-1989 for Florida
  Uncertainty: Data from 1970-1989 for Florida
- Occupation, mineral extraction site [natural resource, land]: 0.0441 m2*year; lognormal variance with pedigree 0.1132, pedigree (2,3,5,5,1)
  Data from 1970-1989 for Florida
  Uncertainty: Data from 1970-1989 for Florida
- Transformation, from forest, unspecified [natural resource, land]: 0.00066 m2; lognormal variance with pedigree 0.1932, pedigree (2,3,5,5,1)
  Data from 1970-1989 for Florida
  Uncertainty: Data from 1970-1989 for Florida
- Transformation, from pasture, man made [natural resource, land]: 0.00154 m2; lognormal variance with pedigree 0.1932, pedigree (2,3,5,5,1)
  Data from 1970-1989 for Florida
  Uncertainty: Data from 1970-1989 for Florida
- Transformation, to forest, unspecified [natural resource, land]: 0.00033 m2; lognormal variance with pedigree 0.1932, pedigree (2,3,5,5,1)
  Data from 1970-1989 for Florida
  Uncertainty: Data from 1970-1989 for Florida
- Transformation, to mineral extraction site [natural resource, land]: 0.00221 m2; lognormal variance with pedigree 0.1932, pedigree (2,3,5,5,1)
  Data from 1970-1989 for Florida
  Uncertainty: Data from 1970-1989 for Florida
- Water, well, in ground [natural resource, in water]: 0.01 m3; name water_well_in_ground_input; lognormal variance with pedigree 0.0426, pedigree (1,3,5,5,1)
  Average data of 7 mines from 1991-2000
  Uncertainty: Average data of 7 mines from 1991-2000
- Phosphorus, in ground [natural resource, in ground]: 0.62 kg; lognormal variance with pedigree 0.0421, pedigree (1,2,5,5,1)
  18% P in apatite; 4% in ore; Data of year 2001 from Florida used
  Uncertainty: Data of year 2001 from Florida used
- Occupation, construction site [natural resource, land]: 0.0109 m2*year; lognormal variance with pedigree 0.1386, pedigree (4,3,5,5,3)
  Reclamation time for clay ponds may vary largely
  Uncertainty: Reclamation time for clay ponds may vary largely

## Emissions to nature
- BOD5, Biological Oxygen Demand [water, surface water]: 0.000668 kg; lognormal variance with pedigree 0.136, pedigree (4,5,5,5,3)
  Calculated from measured data
  Uncertainty: Calculated from measured data
- Thorium-230 [air, non-urban air or from high stacks]: 0.00586 kBq; lognormal variance with pedigree 0.426, pedigree (4,5,5,5,3)
  Calculated from dust emissions
  Uncertainty: Calculated from dust emissions
- Toluene [water, surface water]: 5.38e-7 kg; lognormal variance with pedigree 0.374, pedigree (3,4,5,5,3)
  Data from 1 site measured in 1990 and estimates
  Uncertainty: Data from 1 site measured in 1990 and estimates
- Fluoride [water, surface water]: 4.48e-5 kg; lognormal variance with pedigree 0.114, pedigree (3,4,5,5,3)
  (same comment as for Toluene)
- Particulates, > 10 um [air, non-urban air or from high stacks]: 0.002 kg; lognormal variance with pedigree 0.15, pedigree (3,5,5,5,3)
  U.S. data from 1970 and data of coal mining
  Uncertainty: U.S. data from 1970 and data of coal mining
- Phosphorus [water, surface water]: 8.97e-5 kg; lognormal variance with pedigree 0.114, pedigree (3,4,5,5,3)
  (same comment as for Toluene)
- Nitrogen [water, surface water]: 3.5e-5 kg; lognormal variance with pedigree 0.114, pedigree (3,4,5,5,3)
  (same comment as for Toluene)
- DOC, Dissolved Organic Carbon [water, surface water]: 4.93e-7 kg; lognormal variance with pedigree 0.136, pedigree (4,5,5,5,3)
  Calculated from measured data
  Uncertainty: Calculated from measured data
- Thorium-232 [air, non-urban air or from high stacks]: 0.000103 kBq; lognormal variance with pedigree 0.426, pedigree (4,5,5,5,3)
  Calculated from dust emissions
  Uncertainty: Calculated from dust emissions
- Radioactive species, alpha emitters [water, surface water]: 0.00433 kBq; lognormal variance with pedigree 0.374, pedigree (3,4,5,5,3)
  (same comment as for Toluene)
- Suspended solids, unspecified [water, surface water]: 0.000224 kg; lognormal variance with pedigree 0.114, pedigree (3,4,5,5,3)
  (same comment as for Toluene)
- Oils, unspecified [soil, industrial]: 0.0051 kg; lognormal variance with pedigree 0.25, pedigree (5,5,5,5,4)
  Estimation from data of chemical demand
  Uncertainty: Estimation from data of chemical demand
- COD, Chemical Oxygen Demand [water, surface water]: 0.000668 kg; lognormal variance with pedigree 0.136, pedigree (4,5,5,5,3)
  Calculated from measured data
  Uncertainty: Calculated from measured data
- Polonium-210 [air, non-urban air or from high stacks]: 0.00234 kBq; lognormal variance with pedigree 0.426, pedigree (4,5,5,5,3)
  Calculated from dust emissions
  Uncertainty: Calculated from dust emissions
- Lead-210 [air, non-urban air or from high stacks]: 0.00234 kBq; lognormal variance with pedigree 0.426, pedigree (4,5,5,5,3)
  Calculated from dust emissions
  Uncertainty: Calculated from dust emissions
- Sulfate [water, surface water]: 0.00296 kg; lognormal variance with pedigree 0.114, pedigree (3,4,5,5,3)
  (same comment as for Toluene)
- Particulates, < 2.5 um [air, non-urban air or from high stacks]: 0.00041 kg; lognormal variance with pedigree 0.41, pedigree (3,5,5,5,3)
  (same comment as for Particulates, > 10 um)
- Water [water, unspecified]: 0.0066 m3; name water_to_water_unspecified; lognormal variance with pedigree 0.0827, pedigree (2,2,5,5,1)
  Calculated value based on literature values and expert opinion. See comments in the parametres' comment field.
  property fraction, origin: salt water 0; name fraction_origin_salt_water_Ww
  property fraction, origin: fresh water 1; name fraction_origin_fresh_water_Ww
  property fraction, origin: unspecified 0; name fraction_origin_unspecified_Ww
  property wet mass 1000 kg; name WM
  property carbon content, non-fossil 0; name C_content_non_fossil
  property carbon content, fossil 0; name C_content_fossil
  property water in wet mass 1000 kg; name WWM
  property dry mass 0 kg; name DM
- Water [air, unspecified]: 0.0034 m3; name water_to_air_unspecified; lognormal variance with pedigree 0.0827, pedigree (2,2,5,5,1)
  (same comment as for Water)
  property fraction, origin: salt water 0; name fraction_origin_salt_water
  property fraction, origin: unspecified 0; name fraction_origin_unspecified
  property fraction, origin: fresh water 1; name fraction_origin_fresh_water
- TOC, Total Organic Carbon [water, surface water]: 0.000179 kg; lognormal variance with pedigree 0.136, pedigree (4,5,5,5,3)
  Calculated from measured data
  Uncertainty: Calculated from measured data
- Uranium-234 [air, non-urban air or from high stacks]: 0.00586 kBq; lognormal variance with pedigree 0.426, pedigree (4,5,5,5,3)
  Calculated from dust emissions
  Uncertainty: Calculated from dust emissions
- Radium-226 [air, non-urban air or from high stacks]: 0.00586 kBq; lognormal variance with pedigree 0.426, pedigree (4,5,5,5,3)
  Calculated from dust emissions
  Uncertainty: Calculated from dust emissions
- Uranium-238 [air, non-urban air or from high stacks]: 0.00586 kBq; lognormal variance with pedigree 0.426, pedigree (4,5,5,5,3)
  Calculated from dust emissions
  Uncertainty: Calculated from dust emissions
- Particulates, > 2.5 um, and < 10um [air, non-urban air or from high stacks]: 0.00103 kg; lognormal variance with pedigree 0.23, pedigree (3,5,5,5,3)
  (same comment as for Particulates, > 10 um)

## Sampling procedure
Data for emissions and land use based on various studies from Florida. Energy data based on a world-wide survey and some assumptions. Further data from literature and estimations.

## Extrapolations
Extrapolation from 1 producer having 15% market share for emission data. Therefore representativeness set to 15%. No extrapolation for energy and land use data. Representativeness of those data is much higher, estimated to be about by 80%. This dataset has been copied from an original dataset covering the geography US. The uncertainty has been adjusted accordingly.

## Review by Roland Hischier 2003-08-26
Passed.
