# treatment of waste polyethylene, municipal incineration

Dataset: EcoSpold 2, unit process
Geography: CH
Time period: 1994-01-01 to 2019-12-31
Technology level: outdated
Classification: EcoSpold01Categories: waste management/municipal incineration
Classification: ISIC rev.4 ecoinvent: 3821:Treatment and disposal of non-hazardous waste
Synonyms: PE
Tags: Treatment; ConvertedDataset
Scenario: Business-as-Usual
System model: Allocation at the point of substitution
Generated by: Gabor Doka (obsolete)
Published in: Doka G. 2007
Database: ecoinvent
isCopyrightProtected: true
accessRestrictedTo: 1

## General comment
Inventoried waste contains 100% PE; .
waste composition (wet, in ppm): upper heating value 42.82 MJ/kg; lower heating value 42.47 MJ/kg; H2O 4000; O 38435; H 122490; C 822050; S 426.9; N 1297.2; P n.a.; B n.a.; Cl 1461.5; Br 9.5896; F 14.384; I n.a.; Ag n.a.; As 1.822; Ba 239.74; Cd 33.946; Co 1.6782; Cr 12.466; Cu 41.367; Hg 0.047948; Mn 30.047; Mo n.a.; Ni 0.95896; Pb 22.596; Sb 10.069; Se 2.0138; Sn 3.814; V 2205.6; Zn 342.01; Be 0.47948; Sc n.a.; Sr 84.868; Ti 958.96; Tl 0.38358; W n.a.; Si n.a.; Fe 1534.3; Ca 2589.2; Al 191.79; K n.a.; Mg 95.896; Na 1405.4;
Share of carbon in waste that is biogenic 0%.
Share of iron in waste that is metallic/recyclable 0%.
Net energy produced in MSWI: 5MJ/kg waste electric energy and 10.02MJ/kg waste thermal energy
Allocation of energy production: no substitution or expansion. Total burden allocated to waste disposal function of MSWI.
One kg of this waste produces 0.01917 kg of slag and 0.005762 kg of residues, which are landfilled. Additional solidification with 0.002305 kg of cement.
[This dataset was already contained in the ecoinvent database version 2. It was not individually updated during the transfer to ecoinvent version 3. Life Cycle Impact Assessment results may still have changed, as they are affected by changes in the supply chain, i.e. in other datasets. This dataset was generated following the ecoinvent quality guidelines for version 2. It may have been subject to central changes described in the ecoinvent version 3 change report (http://www.ecoinvent.org/database/ecoinvent-version-3/reports-of-changes/), and the results of the central updates were reviewed extensively. The changes added e.g. consistent water flows and other information throughout the database. The documentation of this dataset can be found in the ecoinvent reports of version 2, which are still available via the ecoinvent website. The change report linked above covers all central changes that were made during the conversion process.]

## Included activities end
waste-specific air and water emisions from incineration, auxiliary material consumption for flue gas cleaning. Short-term emissions to river water and long-term emisisons to ground water from slag compartment (from bottom slag) and residual material landfill (from solidified fly ashes and scrubber slugde). Process energy demands for MSWI.

## Geography
Specific to the technology mix encountered in Switzerland in 2000. Well applicable to modern incineration practices in Europe, North America or Japan.

## Technology
replaced by newer incineration technology with fly ash extraction. Average Swiss MSWI plants in 2000 with electrostatic precipitator for fly ash (ESP), wet flue gas scrubber and 29.4% SNCR , 32.2% SCR-high dust , 24.6% SCR-low dust -DeNOx facilities and 13.8% without Denox (by burnt waste, according to Swiss average). Share of waste incinerated in plants with magnetic scrap separation from slag : 50%. Gross electric efficiency technology mix 12.997% and Gross thermal efficiency technology mix 25.57%

## Time period
Waste composition as given in literature reference, theoretical data or other source. Transfer coefficients for modern Swiss MSWI. Emission speciation based on early 90ies data.

## Reference product
- waste polyethylene: -1 kg; CPC 39270: Waste, parings and scrap of plastics; By-product classification Waste; CAS 9002-88-4
  EcoSpold01Location=CH
  production volume 0 kg
    outdated. Replaced by newer incineration technology with fly ash extraction.
  property price 0 EUR2005
    Waste products are assigned a price of zero as they are assumed to require further treatment.
  property carbon content, fossil 0.825301
    C content in 1 kg DM was calculated using data in Tab A.1, ecoinvent v2.2 report 13_I
  property carbon content 0.825301
    carbon content on a dry matter basis (reserved; not for manual entry)
  properties: carbon content, non-fossil 0, water content 0.00401606, water in wet mass 0.004 kg, wet mass 1 kg, dry mass 0.996 kg, carbon allocation 0.822 kg

## Inputs from technosphere
- quicklime, milled, packed: 0.000253 kg; lognormal variance with pedigree 0.65, pedigree (1,1,5,1,1)
  uncertainty calculated from uncertainty in average auxiliary material input, and the unertainty of the waste composition of this waste
  EcoSpold01Location=CH
  properties: dry mass 0.99 kg, wet mass 1 kg, water content 0.010101
- sodium hydroxide, without water, in 50% solution state: 0.00158 kg; lognormal variance with pedigree 0.57, pedigree (1,1,5,1,1)
  EcoSpold01Location=RER
  uncertainty calculated from uncertainty in average auxiliary material input, and the unertainty of the waste composition of this waste
  properties: dry mass 1 kg, wet mass 1 kg
- cement, unspecified: 0.0023 kg; lognormal variance with pedigree 0.07, pedigree (1,1,5,1,1)
  Cement for solidification of landfilled residual material. Uncertainty calculated from unertainty of the waste composition of this waste, of transfer coefficients in the incinerator and of the solidification recipe.
  EcoSpold01Location=CH
  properties: dry mass 1 kg, wet mass 1 kg
- ammonia, liquid: 6.54e-5 kg; lognormal variance with pedigree 1.58, pedigree (1,1,5,1,1)
  EcoSpold01Location=CH
  uncertainty calculated from uncertainty in average DeNOx input, uncertainty in the share of thermal NOx, uncertainty of nitrogen content in average municipal waste and the unertainty in nitrogen content in *this* waste.
  properties: dry mass 1 kg, wet mass 1 kg
- heat, district or industrial, natural gas: 0.005742 MJ; lognormal variance with pedigree 1.58, pedigree (1,1,5,1,1)
  EcoSpold01Location=RER
  uncertainty calculated from uncertainty in average DeNOx input, uncertainty in the share of thermal NOx, uncertainty of nitrogen content in average municipal waste and the unertainty in nitrogen content in *this* waste.
- waste cement, hydrated: -0.00576 kg; lognormal variance with pedigree 0.07, pedigree (1,1,5,1,1)
  EcoSpold01Location=CH
  Hydrated cement for solidification of landfilled residual material. Uncertainty calculated from unertainty of the waste composition of this waste and transfer coefficients in the incinerator and of the solidification recipe.
  production volume 0 kg; = Ref('439ffaf7-86c5-4abb-b6d3-7a3b2acf025f', 'ProductionVolume')* (Ref('89385bf4-0bd6-441c-864f-4129dbc92eb6')*-1)
    Calculated from the production volume of waste polyethylene, 0.4% water in proportion to the respective output amounts.
  properties: wet mass 1 kg, dry mass 1 kg
- iron (III) chloride, without water, in 40% solution state: 6.41e-5 kg; lognormal variance with pedigree 0.45, pedigree (1,1,5,1,1)
  EcoSpold01Location=CH
  uncertainty calculated from uncertainty in average auxiliary material input, and the unertainty of the waste composition of this waste
  properties: dry mass 1 kg, wet mass 1 kg
- hydrochloric acid, without water, in 30% solution state: 3.01e-6 kg; lognormal variance with pedigree 0.52, pedigree (1,1,5,1,1)
  (same comment as for sodium hydroxide, without water, in 50% solution state)
  properties: wet mass 1 kg, dry mass 1 kg
- process-specific burdens, slag landfill: 0.0192 kg; lognormal variance with pedigree 0.09, pedigree (1,1,5,1,1)
  EcoSpold01Location=CH
  uncertainty is calculated from uncertainties in waste composition and transfer coefficients in incinerator;activityLink introduced to establish a direct link to the corresponding regional supply of this product
- residual material landfill: 1.2e-11 unit; lognormal variance with pedigree 0.06, pedigree (1,1,5,1,1)
  uncertainty is calculated from uncertainties in waste composition and transfer coefficients in incinerator
  EcoSpold01Location=CH
- chromium oxide, flakes: 3.82e-8 kg; lognormal variance with pedigree 2.29, pedigree (1,1,5,1,1)
  EcoSpold01Location=RER
  Proxy for vanadium pentoxide V2O5 in SCR catalyst, uncertainty calculated from uncertainty in average DeNOx input, uncertainty in the share of thermal NOx, uncertainty of nitrogen content in average municipal waste and the unertainty in nitrogen content in *this* waste.
  properties: wet mass 1 kg, dry mass 1 kg
- process-specific burdens, municipal waste incineration: 1 kg; lognormal variance with pedigree 0.04, pedigree (1,1,5,1,1)
  EcoSpold01Location=CH
  demands per kilogram waste. uncertainty is heeded in the module;activityLink introduced to establish a direct link to the corresponding regional supply of this product
- slag landfill: 3.41e-11 unit; lognormal variance with pedigree 0.09, pedigree (1,1,5,1,1)
  (same comment as for residual material landfill)
- municipal waste incineration facility: 2.5e-10 unit; lognormal variance with pedigree 0.04, pedigree (1,1,5,1,1)
  demands per kilogram waste. uncertainty is heeded in the module
  EcoSpold01Location=CH
- titanium dioxide: 1.87e-6 kg; lognormal variance with pedigree 2.29, pedigree (1,1,5,1,1)
  uncertainty calculated from uncertainty in average DeNOx input, uncertainty in the share of thermal NOx, uncertainty of nitrogen content in average municipal waste and the unertainty in nitrogen content in *this* waste.
  EcoSpold01Location=RER
  properties: dry mass 1 kg, wet mass 1 kg
- process-specific burdens, residual material landfill: 0.00576 kg; lognormal variance with pedigree 0.06, pedigree (1,1,5,1,1)
  (same comment as for process-specific burdens, slag landfill)
- chemical, organic: 0.000135 kg; lognormal variance with pedigree 1.15, pedigree (1,1,5,1,1)
  Proxy for TMT15. uncertainty calculated from uncertainty in average auxiliary material input, and the unertainty of the waste composition of this waste
  EcoSpold01Location=GLO
  properties: dry mass 1 kg, wet mass 1 kg, carbon content, fossil 0.628
  note on carbon content, fossil: This dataset is an unweighted average of 20 organic substances (listed in Tab 88.1, ecoinvent v2.2 report 8, part II), being part of the top100 chemicals included in this database. The C-content has also been calculated as an unweighted average of the C content of the substances composing this dataset.
- chemical, inorganic: 5.02e-6 kg; lognormal variance with pedigree 0.52, pedigree (1,1,5,1,1)
  Proxy for Polyelectrolyte. uncertainty calculated from uncertainty in average auxiliary material input, and the unertainty of the waste composition of this waste
  EcoSpold01Location=GLO
  properties: dry mass 1 kg, wet mass 1 kg, carbon content, fossil 0.003
  note on carbon content, fossil: This dataset is an unweighted average of 20 inorganic substances (listed in Tab 88.1, ecoinvent v2.2 report 8, part II), being part of the top100 chemicals included in this database. The C-content has also been calculated as an unweighted average of the C content of the substances composing this dataset.

## Emissions to nature
- BOD5, Biological Oxygen Demand [water, ground-, long-term]: 0.00664 kg; lognormal variance with pedigree 0.05, pedigree (1,1,5,1,1)
  Long-term emissions from landfilling of incineration residues. uncertainty is calculated from uncertainties in waste composition and transfer coefficients in incinerator and landfills.
- Cadmium, ion [water, surface water]: 1.54e-8 kg; lognormal variance with pedigree 1.12, pedigree (1,1,5,1,1)
  uncertainty is calculated from uncertainties in waste composition and transfer coefficients in incinerator and landfills
- Thallium [water, surface water]: 2.35e-10 kg; lognormal variance with pedigree 1.91, pedigree (1,1,5,1,1)
  (same comment as for Cadmium, ion)
- Fluoride [water, surface water]: 1.11e-6 kg; lognormal variance with pedigree 0.91, pedigree (1,1,5,1,1)
  (same comment as for Cadmium, ion)
- Chromium, ion [water, surface water]: 3.97e-8 kg; lognormal variance with pedigree 1.29, pedigree (1,1,5,1,1)
  (same comment as for Cadmium, ion)
- Arsenic, ion [water, ground-, long-term]: 1e-6 kg; lognormal variance with pedigree 1.53, pedigree (1,1,5,1,1)
  (same comment as for BOD5, Biological Oxygen Demand)
- Sulfur dioxide [air, urban air close to ground]: 1.82e-6 kg; lognormal variance with pedigree 0.83, pedigree (1,1,5,1,1)
  uncertainty is calculated from uncertainties in waste composition and transfer coefficients in incinerator
- Chromium VI [water, ground-, long-term]: 1.32e-6 kg; lognormal variance with pedigree 1.49, pedigree (1,1,5,1,1)
  (same comment as for BOD5, Biological Oxygen Demand)
- Antimony [water, surface water]: 3.49e-6 kg; lognormal variance with pedigree 1.11, pedigree (1,1,5,1,1)
  (same comment as for Cadmium, ion)
- Methane, fossil [air, urban air close to ground]: 6.38e-6 kg; lognormal variance with pedigree 0.091225, pedigree (2,3,5,2,1)
  Confidential data from 5 plants in Switzerland and Germany
  Uncertainty: & basic uncertainty of 1.5; confidential data from 5 plants in Switzerland and Germany
- Carbon dioxide, fossil [air, urban air close to ground]: 2.98 kg; lognormal variance with pedigree 0.04, pedigree (1,1,5,1,1)
  (same comment as for Sulfur dioxide)
- Barium [water, ground-, long-term]: 0.000213 kg; lognormal variance with pedigree 0.94, pedigree (1,1,5,1,1)
  (same comment as for BOD5, Biological Oxygen Demand)
- Beryllium [air, urban air close to ground]: 4.79e-10 kg; lognormal variance with pedigree 1.72, pedigree (1,1,5,1,1)
  (same comment as for Sulfur dioxide)
- Titanium, ion [water, ground-, long-term]: 0.000287 kg; lognormal variance with pedigree 1.07, pedigree (1,1,5,1,1)
  (same comment as for BOD5, Biological Oxygen Demand)
- Iron, ion [water, ground-, long-term]: 0.000719 kg; lognormal variance with pedigree 1.4, pedigree (1,1,5,1,1)
  (same comment as for BOD5, Biological Oxygen Demand)
- Magnesium [air, urban air close to ground]: 1.32e-7 kg; lognormal variance with pedigree 1.03, pedigree (1,1,5,1,1)
  (same comment as for Sulfur dioxide)
- Nitrate [water, ground-, long-term]: 4.66e-5 kg; lognormal variance with pedigree 0.67, pedigree (1,1,5,1,1)
  (same comment as for BOD5, Biological Oxygen Demand)
- Cobalt [water, ground-, long-term]: 1.47e-6 kg; lognormal variance with pedigree 1.49, pedigree (1,1,5,1,1)
  (same comment as for BOD5, Biological Oxygen Demand)
- Calcium [air, urban air close to ground]: 4.32e-6 kg; lognormal variance with pedigree 0.59, pedigree (1,1,5,1,1)
  (same comment as for Sulfur dioxide)
- Arsenic, ion [water, surface water]: 8.21e-7 kg; lognormal variance with pedigree 1.29, pedigree (1,1,5,1,1)
  (same comment as for Cadmium, ion)
- Nickel, ion [water, surface water]: 6.01e-10 kg; lognormal variance with pedigree 2.18, pedigree (1,1,5,1,1)
  (same comment as for Cadmium, ion)
- Vanadium, ion [water, surface water]: 1.49e-6 kg; lognormal variance with pedigree 0.87, pedigree (1,1,5,1,1)
  (same comment as for Cadmium, ion)
- BOD5, Biological Oxygen Demand [water, surface water]: 3.08e-5 kg; lognormal variance with pedigree 0.16, pedigree (1,1,5,1,1)
  (same comment as for Cadmium, ion)
- Hydrogen fluoride [air, urban air close to ground]: 7.57e-9 kg; lognormal variance with pedigree 1.28, pedigree (1,1,5,1,1)
  (same comment as for Sulfur dioxide)
- Hydrogen chloride [air, urban air close to ground]: 1.62e-8 kg; lognormal variance with pedigree 0.7, pedigree (1,1,5,1,1)
  (same comment as for Sulfur dioxide)
- Vanadium [air, urban air close to ground]: 2.21e-7 kg; lognormal variance with pedigree 0.63, pedigree (1,1,5,1,1)
  (same comment as for Sulfur dioxide)
- Manganese [water, surface water]: 1.68e-9 kg; lognormal variance with pedigree 1.93, pedigree (1,1,5,1,1)
  (same comment as for Cadmium, ion)
- Antimony [air, urban air close to ground]: 3.92e-14 kg; lognormal variance with pedigree 1.43, pedigree (1,1,5,1,1)
  (same comment as for Sulfur dioxide)
- Chromium VI [water, surface water]: 4.06e-7 kg; lognormal variance with pedigree 1.2, pedigree (1,1,5,1,1)
  (same comment as for Cadmium, ion)
- Zinc [air, urban air close to ground]: 5.59e-9 kg; lognormal variance with pedigree 0.89, pedigree (1,1,5,1,1)
  (same comment as for Sulfur dioxide)
- Lead [air, urban air close to ground]: 8.39e-10 kg; lognormal variance with pedigree 1.24, pedigree (1,1,5,1,1)
  (same comment as for Sulfur dioxide)
- Magnesium [water, surface water]: 3.36e-7 kg; lognormal variance with pedigree 1.49, pedigree (1,1,5,1,1)
  (same comment as for Cadmium, ion)
- Copper, ion [water, surface water]: 1.68e-9 kg; lognormal variance with pedigree 1.73, pedigree (1,1,5,1,1)
  (same comment as for Cadmium, ion)
- Chromium [air, urban air close to ground]: 9.22e-13 kg; lognormal variance with pedigree 1.37, pedigree (1,1,5,1,1)
  (same comment as for Sulfur dioxide)
- Chloride [water, surface water]: 0.00143 kg; lognormal variance with pedigree 0.59, pedigree (1,1,5,1,1)
  (same comment as for Cadmium, ion)
- Cadmium [air, urban air close to ground]: 1.87e-9 kg; lognormal variance with pedigree 1.18, pedigree (1,1,5,1,1)
  (same comment as for Sulfur dioxide)
- Sodium, ion [water, ground-, long-term]: 0.00109 kg; lognormal variance with pedigree 0.43, pedigree (1,1,5,1,1)
  (same comment as for BOD5, Biological Oxygen Demand)
- Antimony [water, ground-, long-term]: 6.44e-6 kg; lognormal variance with pedigree 1.08, pedigree (1,1,5,1,1)
  (same comment as for BOD5, Biological Oxygen Demand)
- Iron, ion [water, surface water]: 5.25e-7 kg; lognormal variance with pedigree 0.63, pedigree (1,1,5,1,1)
  (same comment as for Cadmium, ion)
- Cyanide [air, urban air close to ground]: 1.17e-6 kg; lognormal variance with pedigree 1.69, pedigree (1,1,5,1,1)
  uncertainty calculated from uncertainty in average N-emissions, uncertainty in the share of thermal NOx, uncertainty of nitrogen content in average municipal waste and the unertainty in nitrogen content in *this* waste.
- Mercury [air, urban air close to ground]: 1.66e-15 kg; lognormal variance with pedigree 2.06, pedigree (1,1,5,1,1)
  (same comment as for Sulfur dioxide)
- Sulfate [water, ground-, long-term]: 0.00107 kg; lognormal variance with pedigree 0.49, pedigree (1,1,5,1,1)
  (same comment as for BOD5, Biological Oxygen Demand)
- Beryllium [water, ground-, long-term]: 3.86e-7 kg; lognormal variance with pedigree 1.48, pedigree (1,1,5,1,1)
  (same comment as for BOD5, Biological Oxygen Demand)
- COD, Chemical Oxygen Demand [water, surface water]: 5.49e-5 kg; lognormal variance with pedigree 0.28, pedigree (1,1,5,1,1)
  (same comment as for Cadmium, ion)
- Manganese [air, urban air close to ground]: 1.64e-13 kg; lognormal variance with pedigree 1.28, pedigree (1,1,5,1,1)
  (same comment as for Sulfur dioxide)
- Titanium, ion [water, surface water]: 4.62e-9 kg; lognormal variance with pedigree 2.06, pedigree (1,1,5,1,1)
  (same comment as for Cadmium, ion)
- DOC, Dissolved Organic Carbon [water, surface water]: 2.25e-5 kg; lognormal variance with pedigree 0.27, pedigree (1,1,5,1,1)
  (same comment as for Cadmium, ion)
- DOC, Dissolved Organic Carbon [water, ground-, long-term]: 0.00803 kg; lognormal variance with pedigree 0.05, pedigree (1,1,5,1,1)
  (same comment as for BOD5, Biological Oxygen Demand)
- Strontium [water, surface water]: 5.34e-8 kg; lognormal variance with pedigree 1.73, pedigree (1,1,5,1,1)
  (same comment as for Cadmium, ion)
- Tin, ion [water, surface water]: 1.42e-10 kg; lognormal variance with pedigree 1.49, pedigree (1,1,5,1,1)
  (same comment as for Cadmium, ion)
- Bromine [water, ground-, long-term]: 1.68e-6 kg; lognormal variance with pedigree 1.31, pedigree (1,1,5,1,1)
  (same comment as for BOD5, Biological Oxygen Demand)
- Chloride [water, ground-, long-term]: 3.45e-5 kg; lognormal variance with pedigree 0.32, pedigree (1,1,5,1,1)
  (same comment as for BOD5, Biological Oxygen Demand)
- COD, Chemical Oxygen Demand [water, ground-, long-term]: 0.0203 kg; lognormal variance with pedigree 0.05, pedigree (1,1,5,1,1)
  (same comment as for BOD5, Biological Oxygen Demand)
- Fluoride [water, ground-, long-term]: 1.28e-5 kg; lognormal variance with pedigree 0.87, pedigree (1,1,5,1,1)
  (same comment as for BOD5, Biological Oxygen Demand)
- Zinc, ion [water, ground-, long-term]: 5.3e-6 kg; lognormal variance with pedigree 5.45, pedigree (1,1,5,1,1)
  (same comment as for BOD5, Biological Oxygen Demand)
- Bromine [air, urban air close to ground]: 2.88e-8 kg; lognormal variance with pedigree 1.33, pedigree (1,1,5,1,1)
  (same comment as for Sulfur dioxide)
- Iron [air, urban air close to ground]: 5.12e-8 kg; lognormal variance with pedigree 0.68, pedigree (1,1,5,1,1)
  (same comment as for Sulfur dioxide)
- Mercury [water, ground-, long-term]: 2.49e-9 kg; lognormal variance with pedigree 3.69, pedigree (1,1,5,1,1)
  (same comment as for BOD5, Biological Oxygen Demand)
- Lead [water, ground-, long-term]: 1.61e-6 kg; lognormal variance with pedigree 7.25, pedigree (1,1,5,1,1)
  (same comment as for BOD5, Biological Oxygen Demand)
- Aluminium [water, surface water]: 1.6e-8 kg; lognormal variance with pedigree 1.21, pedigree (1,1,5,1,1)
  (same comment as for Cadmium, ion)
- Barium [water, surface water]: 3.3e-8 kg; lognormal variance with pedigree 1.76, pedigree (1,1,5,1,1)
  (same comment as for Cadmium, ion)
- Bromine [water, surface water]: 7.9e-6 kg; lognormal variance with pedigree 1.12, pedigree (1,1,5,1,1)
  (same comment as for Cadmium, ion)
- Tin, ion [water, ground-, long-term]: 1.92e-6 kg; lognormal variance with pedigree 1.77, pedigree (1,1,5,1,1)
  (same comment as for BOD5, Biological Oxygen Demand)
- Sodium [air, urban air close to ground]: 1.32e-5 kg; lognormal variance with pedigree 0.66, pedigree (1,1,5,1,1)
  (same comment as for Sulfur dioxide)
- Manganese [water, ground-, long-term]: 2.59e-5 kg; lognormal variance with pedigree 1.25, pedigree (1,1,5,1,1)
  (same comment as for BOD5, Biological Oxygen Demand)
- Sodium, ion [water, surface water]: 0.000304 kg; lognormal variance with pedigree 0.35, pedigree (1,1,5,1,1)
  (same comment as for Cadmium, ion)
- Selenium [water, surface water]: 6.56e-7 kg; lognormal variance with pedigree 1.21, pedigree (1,1,5,1,1)
  (same comment as for Cadmium, ion)
- Calcium, ion [water, ground-, long-term]: 0.00225 kg; lognormal variance with pedigree 0.55, pedigree (1,1,5,1,1)
  (same comment as for BOD5, Biological Oxygen Demand)
- Carbon monoxide, fossil [air, urban air close to ground]: 0.000223 kg; lognormal variance with pedigree 0.690625, pedigree (1,3,5,2,1)
  Literature data from switzerland and germany adapted to plant age distribution in switzerland
  Uncertainty: & basic uncertainty of 5; literature data from switzerland and germany adapted to plant age distribution in switzerland
- Aluminium [water, ground-, long-term]: 0.000142 kg; lognormal variance with pedigree 0.86, pedigree (1,1,5,1,1)
  (same comment as for BOD5, Biological Oxygen Demand)
- Cobalt [water, surface water]: 2.87e-10 kg; lognormal variance with pedigree 1.97, pedigree (1,1,5,1,1)
  (same comment as for Cadmium, ion)
- Magnesium [water, ground-, long-term]: 8.85e-5 kg; lognormal variance with pedigree 0.99, pedigree (1,1,5,1,1)
  (same comment as for BOD5, Biological Oxygen Demand)
- TOC, Total Organic Carbon [water, surface water]: 2.25e-5 kg; lognormal variance with pedigree 0.27, pedigree (1,1,5,1,1)
  (same comment as for Cadmium, ion)
- TOC, Total Organic Carbon [water, ground-, long-term]: 0.00803 kg; lognormal variance with pedigree 0.05, pedigree (1,1,5,1,1)
  (same comment as for BOD5, Biological Oxygen Demand)
- Nickel [air, urban air close to ground]: 4.14e-14 kg; lognormal variance with pedigree 1.71, pedigree (1,1,5,1,1)
  (same comment as for Sulfur dioxide)
- Sulfate [water, surface water]: 0.000207 kg; lognormal variance with pedigree 0.4, pedigree (1,1,5,1,1)
  (same comment as for Cadmium, ion)
- Cobalt [air, urban air close to ground]: 5.33e-14 kg; lognormal variance with pedigree 1.64, pedigree (1,1,5,1,1)
  (same comment as for Sulfur dioxide)
- Copper [air, urban air close to ground]: 3.05e-10 kg; lognormal variance with pedigree 1.17, pedigree (1,1,5,1,1)
  (same comment as for Sulfur dioxide)
- Dinitrogen monoxide [air, urban air close to ground]: 5.48e-6 kg; lognormal variance with pedigree 1.69, pedigree (1,1,5,1,1)
  (same comment as for Cyanide)
- Cadmium, ion [water, ground-, long-term]: 3.41e-7 kg; lognormal variance with pedigree 6.95, pedigree (1,1,5,1,1)
  (same comment as for BOD5, Biological Oxygen Demand)
- Nitrogen oxides [air, urban air close to ground]: 4.13e-5 kg; lognormal variance with pedigree 1.69, pedigree (1,1,5,1,1)
  (same comment as for Cyanide)
- Ammonia [air, urban air close to ground]: 1.03e-6 kg; lognormal variance with pedigree 1.69, pedigree (1,1,5,1,1)
  (same comment as for Cyanide)
- Tin [air, urban air close to ground]: 5.06e-9 kg; lognormal variance with pedigree 1.46, pedigree (1,1,5,1,1)
  (same comment as for Sulfur dioxide)
- Selenium [air, urban air close to ground]: 1.01e-14 kg; lognormal variance with pedigree 1.63, pedigree (1,1,5,1,1)
  (same comment as for Sulfur dioxide)
- Beryllium [water, surface water]: 2.98e-10 kg; lognormal variance with pedigree 1.94, pedigree (1,1,5,1,1)
  (same comment as for Cadmium, ion)
- Barium [air, urban air close to ground]: 2.4e-7 kg; lognormal variance with pedigree 0.91, pedigree (1,1,5,1,1)
  (same comment as for Sulfur dioxide)
- Strontium [air, urban air close to ground]: 8.49e-9 kg; lognormal variance with pedigree 1.06, pedigree (1,1,5,1,1)
  (same comment as for Sulfur dioxide)
- Aluminium [air, urban air close to ground]: 3e-7 kg; lognormal variance with pedigree 0.93, pedigree (1,1,5,1,1)
  (same comment as for Sulfur dioxide)
- Nitrate [water, surface water]: 1.66e-5 kg; lognormal variance with pedigree 0.48, pedigree (1,1,5,1,1)
  (same comment as for Cadmium, ion)
- Strontium [water, ground-, long-term]: 8.48e-5 kg; lognormal variance with pedigree 1.02, pedigree (1,1,5,1,1)
  (same comment as for BOD5, Biological Oxygen Demand)
- Mercury [water, surface water]: 5.13e-10 kg; lognormal variance with pedigree 1.93, pedigree (1,1,5,1,1)
  (same comment as for Cadmium, ion)
- Titanium [air, urban air close to ground]: 9.59e-7 kg; lognormal variance with pedigree 0.73, pedigree (1,1,5,1,1)
  (same comment as for Sulfur dioxide)
- Vanadium, ion [water, ground-, long-term]: 0.000378 kg; lognormal variance with pedigree 1.36, pedigree (1,1,5,1,1)
  (same comment as for BOD5, Biological Oxygen Demand)
- Lead [water, surface water]: 6.29e-10 kg; lognormal variance with pedigree 1.2, pedigree (1,1,5,1,1)
  (same comment as for Cadmium, ion)
- Arsenic [air, urban air close to ground]: 1.86e-14 kg; lognormal variance with pedigree 1.64, pedigree (1,1,5,1,1)
  (same comment as for Sulfur dioxide)
- Calcium, ion [water, surface water]: 9.79e-6 kg; lognormal variance with pedigree 1.03, pedigree (1,1,5,1,1)
  (same comment as for Cadmium, ion)
- Thallium [water, ground-, long-term]: 2.24e-7 kg; lognormal variance with pedigree 1.31, pedigree (1,1,5,1,1)
  (same comment as for BOD5, Biological Oxygen Demand)
- Nickel, ion [water, ground-, long-term]: 8.98e-7 kg; lognormal variance with pedigree 1.56, pedigree (1,1,5,1,1)
  (same comment as for BOD5, Biological Oxygen Demand)
- Thallium [air, urban air close to ground]: 3.84e-10 kg; lognormal variance with pedigree 1.75, pedigree (1,1,5,1,1)
  (same comment as for Sulfur dioxide)
- Selenium [water, ground-, long-term]: 1.35e-6 kg; lognormal variance with pedigree 1.03, pedigree (1,1,5,1,1)
  (same comment as for BOD5, Biological Oxygen Demand)
- Zinc, ion [water, surface water]: 6.29e-8 kg; lognormal variance with pedigree 0.75, pedigree (1,1,5,1,1)
  (same comment as for Cadmium, ion)
- Copper, ion [water, ground-, long-term]: 3.34e-5 kg; lognormal variance with pedigree 1.09, pedigree (1,1,5,1,1)
  (same comment as for BOD5, Biological Oxygen Demand)

## Sampling procedure
waste-specific calculation based on literature data

## Extrapolations
This dataset has been extrapolated from year 2000 to the year of the calculation (2019). The uncertainty has been adjusted accordingly.

## Review by Niels Jungbluth 2003-07-15
Passed. Calculation for standard deviation 95 of, i.e., infrastructure,
land occupation, transport services or other services can differ from
standard Pedigree approach used in this project and figures obtained by
this procedure.
