# electricity production, hydro, pumped storage

Dataset: EcoSpold 2, unit process
Geography: AR
Time period: 2012-01-01 to 2019-12-31
Technology level: modern
Classification: ISIC rev.4 ecoinvent: 3510:Electric power generation, transmission and distribution
Tags: hydro power
Scenario: Business-as-Usual
System model: Allocation at the point of substitution
Generated by: Bárbara Civit
Published in: Suppen, N. 2017
Database: ecoinvent
isCopyrightProtected: true
accessRestrictedTo: 1

## General comment
This dataset represents the production of 1 kWh of electricity in pumped storage power plants in Argentina in 2014.
The physical information about the different power plants is obtained from the Argentinean energy statistics.
The emissions data are taken over from the "electricity production, hydro, pumped storage/GLO, 2008 dataset" (accessed: January 24th, 2018).

## Included activities start
From water pumped up from a lower to an upper reservoir.

## Included activities end
The activity ends with 1 kWh of high voltage electricity produced at the power plant and arrived at the busbar.

The dataset includes the use of pump energy (electricity, high voltage), lubricant oil, the volume of the reservoir, the mass of water passing through the turbines and an estimation of greenhouse gas emissions out of the water reservoir.

The dataset doesn't include an analysis of net greenhouse gas emissions (due to a lack of respective information) and the hydrological and biological impacts are only rudimentary included via land use (occupation and transformation) data.

## Geography
Data represent the average of a characteristic sample of Swiss reservoir hydropower plants, valid for pumped storage hydro power plants.

## Technology
Definition of pumped storage in this dataset: The water is not being pumped for circulation reasons, but for increasing the inflow of a reservoir. Net production is the gross production minus about 1% losses. Additionally there is energy needed for pumping. The efficiency of a pumped storage hydropower plant is around 70% (p.14 in Bauer et al. 2007)

## Time period
The Annual Production Volume is valid for the year 2014

## Parameters
- gross electricity production: 7.20596e8 kWh; name gross_electricity; lognormal variance with pedigree 0.0012, pedigree (2,1,1,1,1)
  Literature value/statistics, extrapolation. The gross electricity production was calculated from the net electricity production considering the losses due to auxiliary consumption within the power plant (see the comment for the parameter losses from gross electricity production)..
  The net electricity production was obtained from CAMMESA "COMPAÑÍA ADMINISTRADORA DEL MERCADO MAYORISTA ELÉCTRICO SOCIEDAD ANÓNIMA" Informe anual 2014. Supporting documentation available at: <http://portalweb.cammesa.com/Memnet1/default.aspx>
- losses from gross electricity production: 0.01 dimensionless; name losses_gross_net; lognormal variance with pedigree 0.003225, pedigree (3,3,1,2,1)
  Literature value. Generic value taken from the IEA Electricity information 2014, part I, p. I.7: 'The difference between gross and net electricity production is generally observed to be about 7% for conventional thermal stations, 1% for hydro stations and 6% for nuclear.'
  IEA/OECD. 2014. Electricity Information 2014. International Energy Agency (IEA), Paris Cedex (FR).
  nan
  Uncertainty: Generic assumption
- lifetime: 150 year; lognormal variance with pedigree 0.0014, pedigree (2,2,1,3,1)
  Estimation based on experiences.
  nan

## Reference product
- electricity, high voltage: 1 kWh; CPC 17100: Electrical energy; By-product classification allocatable product
  production volume 7.1339e8 kWh; name apv_electricity; = gross_electricity*(1-losses_gross_net)
    "Literature value/statistics.
  property price 0.0977 EUR2005
    Temporary price data. Calculated as 90% of purchasers price based on: 94% of the average price (to account for a 6% loss in transformation and transmission) for electricity for industrial consumersin 2005 (excluded taxes). From IEA.

## Inputs from technosphere
- waste mineral oil: -7.56e-6 kg; name waste_oil; = (lubricating_oil)*-1; lognormal variance with pedigree 0.108, pedigree (1,1,4,5,3)
  Estimation. The lubricating oil is in a closed loop system (i.e. cannot get into the turbined water system) and is disposed annualy as waste oil in a hazardous waste treatment plant.
  production volume 5393.23 kg; = apv_electricity* waste_oil
    Calculated from the production volume of electricity, high voltage in proportion to the respective output amounts.
  property price 0 EUR2005; name waste_oil_price_EUR2005
  properties: water content 0.111111, wet mass 1 kg, carbon content, fossil 0.864444, dry mass 0.9 kg
  note on carbon content, fossil: Tab A.6, ecoinvent v2.2 report 13_I. C content has been calculated after data in the tables, and then referred to 1 kg DM
- electricity, high voltage: 1.43 kWh; source Bolliger, R. 2007, p. Tab. 4.3, p.41 +Tab. 5.3 p.44; lognormal variance with pedigree 0.018, pedigree (1,1,4,5,3)
  Estimation based on the original dataset. The electricity source for pumping is not known. Hence the electricity mix of this geography is assumed to be used as pump electricity.
- lubricating oil: 7.56e-6 kg; name lubricating_oil; = 0.000009*0.84; source Vögtlin H. J. 2002, p. Tab. 5.3 p.44 in Bolliger 2007; lognormal variance with pedigree 0.1, pedigree (1,1,4,5,1)
  Estimation. This exchange has been taken over from a dataset for a Swiss reservoir power plant without pumping. For the consumption of lubricating oil during plant operation no data was available. It is assumed that both turbines and run-of-river plants need the same amount of oil hence the information about lubricating oil consumption of run-of-rivers is adopted. A consumption of lubricating oil for turbines of 9 liters per GWh is estimated. With an oil density of 0.84 kg/l this amounts to 0.007 g/kWh. The lubricating oil is in a closed loop system (i.e. cannot get into the turbined water system) and is disposed annualy as waste oil in a hazardous waste treatment plant.
  properties: wet mass 1 kg, dry mass 1 kg, carbon content, fossil 0.75
  note on carbon content, fossil: Lubricating oil is produced from diesel. C-content/dry mass of fats and oils considered 75%, from: ecoinvent v2.2 report, n 15a, pg 40
- hydropower plant, reservoir, alpine region: 4.0404e-13 unit; = 1/(lifetime*16500*1000000); lognormal variance with pedigree 0.211, pedigree (5,5,5,5,5)
  Literature value/calculated value. The needed amount of infrastructure per kWh produced is calculated with the lifetime and the annual net energy production.

## Inputs from nature
- Transformation, to lake, artificial [natural resource, land]: 0.000109395 m2; = transformation_from-transformation_to_industrial; source Bolliger, R. 2007, p. Tab. 4.3, p.41 +Tab. 5.3 p.44; lognormal variance with pedigree 0.138, pedigree (1,1,4,5,3)
  The original state before setting up the reservoir has to be classified as module 'transformation, from unspecified' due to the fact that various types of flooded ground can be distinguished. The flooded area partly consisted of alpine meadows and grazing land, rarely also villages had to be resettled; often impassable, rocky alpine valleys and gorges were filled with water, where only marginal vegetation and no agricultural use was possible. The definition of the character and the environmental value (e.g. forest, areas with rare mushrooms, moorlands, etc.) of the affected areas were not possible, due to the lack of information.
  Calculated value. This exchange amount is calculated as the difference between the transformed area and the area occupied by the infrastrature of the power plant.
  Standard values for landuse are assumed.
- Transformation, to industrial area [natural resource, land]: 1.105e-6 m2; name transformation_to_industrial; = transformation_from*0.01; lognormal variance with pedigree 0.138, pedigree (1,1,4,5,3)
  Estimation. The area for the barrage and the power station are assumed to amount to 1% of the total land use. No land use for access roads was taken into account.
  The original state before setting up the reservoir has to be classified as module 'transformation, from unspecified' due to the fact that various types of flooded ground can be distinguished. The flooded area partly consisted of alpine meadows and grazing land, rarely also villages had to be resettled; often impassable, rocky alpine valleys and gorges were filled with water, where only marginal vegetation and no agricultural use was possible. The definition of the character and the environmental value (e.g. forest, areas with rare mushrooms, moorlands, etc.) of the affected areas were not possible, due to the lack of information.
  Standard values for landuse are assumed.
- Volume occupied, reservoir [natural resource, in water]: 0.64 m3*year; source Eidg. Amt für Wasserwirtschaft (BWW) 1991; lognormal variance with pedigree 0.138, pedigree (1,1,4,5,3)
  Based on data of BWW, a total usable capacity of 3413 Mio m3 for all Swiss reservoir power plants can be calculated. Referred to the annual net production potential, the specific usable capacity amounts to 0.17 m3a/kWh. Based on the sample of reservoir power plants an usable capacity of 2200 Mio m3 with a specific usable capacity of 0.15 m3a/kWh can be calculated. The difference between the two values can be explained by the fact that the reservoir power plants considered in the sample are located at higher altitudes (i.e. means deeper reservoirs) than the averaged Swiss power plants. This fact results in a higher energy production and a lower specific usable capacity, considering a given amount of turbined water and a given useable capacity. However, the difference with an error of 6% can be neglected.
  Standard values for landuse are assumed.
  Calculated value.
  Estimation. The useful volume of all pumped storage hydro power plants have been considered, and related to the amount of electricy produced during the useful life.
  Source: Inventario de Presas y Centrales Hidroeléctricas de la República Argentina,- 1a ed. Subsecretaria de Recursos Hídricos de la Nación
  Buenos Aires : Ministerio de Planificación Federal, Inversión Pública y Servicios, 2010. ISBN 978-987-23585-8-7
  The usable capacity of reservoirs is an important figure both for significant water supply regions and for the definition of ecological relevant indices. First of all the usable capacity is a measurement for the rearrangement of the runoff regime over time, i.e. the amount of water detracted temporarily from the natural water cycle and returned to the surface waters with delay. Depending on the type of reservoir (daily, monthly, annual reservoir) the delay takes less or more time. Second, the usable capacity of reservoirs is a measurement for the occupied volume of reservoirs. Thereby, the volume of the fluctuation area is considered, i.e. not the total reservoir volume.
- Occupation, lake, artificial [natural resource, land]: 0.016575 m2*year; = transformation_from*lifetime; lognormal variance with pedigree 0.058, pedigree (1,1,4,5,3)
  Calculated value
- Transformation, from unspecified [natural resource, land]: 0.0001105 m2; name transformation_from; source Bolliger, R. 2007, p. Tab. 4.3, p.41 +Tab. 5.3 p.44; lognormal variance with pedigree 0.138, pedigree (1,1,4,5,3)
  Calculated value
  The original state before setting up the reservoir has to be classified as module 'transformation, from unspecified' due to the fact that various types of flooded ground can be distinguished.
  This exchange amount is taken over from datasets for both alpine and non-alpine power plants. The water surface of all pumped storage power plants with pondage in both mountain and no mountain regions have been summed up. Source: Inventario de Presas y Centrales Hidroeléctricas de la República Argentina,- 1a ed. Subsecretaria de Recursos Hídricos de la Nación
  Buenos Aires : Ministerio de Planificación Federal, Inversión Pública y Servicios, 2010.
  ISBN 978-987-23585-8-7
  The original state before setting up the reservoir has to be classified as module 'transformation, from unspecified' due to the fact that various types of flooded ground can be distinguished. The flooded area partly consisted of alpine meadows and grazing land, rarely also villages had to be resettled; often impassable, rocky alpine valleys and gorges were filled with water, where only marginal vegetation and no agricultural use was possible. The definition of the character and the environmental value (e.g. forest, areas with rare mushrooms, moorlands, etc.) of the affected areas were not possible, due to the lack of information.
  Standard values for landuse are assumed.
- Water, turbine use, unspecified natural origin [natural resource, in water]: 2.9 m3; name water_turbine_use_UNO_input; lognormal variance with pedigree 0.018, pedigree (1,1,4,5,3)
  Standard values for resources are assumed. The global value is calculated as production weighted average.
  Calculated value. The specific turbine water amount is inversely proportional to the average head. A guidance value says that a hydropower plant can produce 1kWh of electricity with 1 m3 water over a head of 450 m. The ecological relevance of the turbine water amount is that it presents a demonstrative dimension of water being taken from natural water balance for a while

## Emissions to nature
- Water [air, unspecified]: 0.000292217 m3; name water_to_air_unspecified; = 0.0292216783849254*0.01; lognormal variance with pedigree 0.0409, pedigree (2,2,2,1,1)
  Calculated value based on literature values
  property fraction, origin: fresh water 1; name fraction_origin_fresh_water_Ww
  property fraction, origin: unspecified 0; name fraction_origin_unspecified_Ww
  property fraction, origin: salt water 0; name fraction_origin_salt_water_Ww
- Water [water, unspecified]: 2.89971 m3; name water_to_water_unspecified; = water_turbine_use_UNO_input-water_to_air_unspecified; lognormal variance with pedigree 0.098025, pedigree (4,4,4,2,4)
  Calculated value based on literature values.
  property fraction, origin: salt water 0; name fraction_origin_salt_water
  property fraction, origin: fresh water 1; name fraction_origin_fresh_water
  property fraction, origin: unspecified 0; name fraction_origin_unspecified
- Dinitrogen monoxide [air, non-urban air or from high stacks]: 1.34e-8 kg; source Dones R. 1996, p. Tab. 4.3, p.41; lognormal variance with pedigree 0.108, pedigree (1,1,4,5,3)
  "The global value is calculated as production weighted average of all pumped storage alpine and non-alpine reservoirs in ev3.2.
  The global value is calculated as production weighted average of all pumped storage alpine and non-alpine reservoirs in ev3.2.
  Regarding net emissions, there is no data available. Hence, it is possible that the calculated and assumed emissions are overestimated, but the approximation is reasonable because emissions emerging from reservoirs make just a small contribution to the total greenhouse gas emissions. Due to the lack of information, direct CO2-emissions emerging from reservoirs in alpine regions are not taken into account. Once further measurements are done, this data can be implemented in the calculation. Due to the variability of the characteristics of Swiss reservoirs, the overall balance is expected neither to be severely overestimated nor to be severely underestimated.
- Carbon dioxide, from soil or biomass stock [air, non-urban air or from high stacks]: 0.134433 kg; lognormal variance with pedigree 0.0992, pedigree (5,3,5,4,3)
  Literature value. Takern from Scherer, Laura; Pfister, Stephan (2017), “National Carbon and Water Footprints of Hydropower”, Mendeley Data, v1
  http://dx.doi.org/10.17632/xdgszz76vz.1#file-032818b9-a767-4e16-a207-1fb0db2c9a35
  Hertwich, E.G. 2013. Addressing Biogenic Greenhouse Gas Emissions from Hydropower in LCA. Environmental Sciency&Technology, 47, 9604-9611
- Methane, non-fossil [air, non-urban air or from high stacks]: 0.001408 kg; lognormal variance with pedigree 0.0992, pedigree (5,3,5,4,3)
  (same comment as for Carbon dioxide, from soil or biomass stock)

## Sampling procedure
Sampling procedure
There are only two pumped storage hydro power plants: Los Reyunos, located in a monainous region, and Río Grande, located in a non-mountainaeous area. Both have been considered in this dataset. The representativeness is therefore 100 %

## Extrapolations
This dataset has been extrapolated from year 2017 to the year of the calculation (2019). The uncertainty has been adjusted accordingly.
