# phosphoric acid factory construction, fertiliser grade

Dataset: EcoSpold 2, unit process
Geography: RoW
Time period: 1986-01-01 to 2019-12-31
Technology level: current
Classification: EcoSpold01Categories: chemicals/inorganics
Classification: ISIC rev.4 ecoinvent: 4100:Construction of buildings
Tags: ConvertedDataset
Scenario: Business-as-Usual
System model: Allocation at the point of substitution
Generated by: Alex Primas
Published in: Althaus H.-J. 2007
Database: ecoinvent
isCopyrightProtected: true
accessRestrictedTo: 1

## General comment
Large uncertainties for equipment used due to weak data from a small pilot plant. Process refers to an phosphoric acid plant using with 65'000 t phosphoric acid (as 100% H3PO4) production per year. Assumed life time 50 years.
[This dataset was already contained in the ecoinvent database version 2. It was not individually updated during the transfer to ecoinvent version 3. Life Cycle Impact Assessment results may still have changed, as they are affected by changes in the supply chain, i.e. in other datasets. This dataset was generated following the ecoinvent quality guidelines for version 2. It may have been subject to central changes described in the ecoinvent version 3 change report (http://www.ecoinvent.org/database/ecoinvent-version-3/reports-of-changes/), and the results of the central updates were reviewed extensively. The changes added e.g. consistent water flows and other information throughout the database. The documentation of this dataset can be found in the ecoinvent reports of version 2, which are still available via the ecoinvent website. The change report linked above covers all central changes that were made during the conversion process.]

## Included activities end
Estimation of infrastructure from wet-phosphoric acid production plant including building materials and material for processing equipment. Transport of materials to construction site. Dismaterling of plant and disposal. Land useand occupation for plant.

## Geography
Estimated data refers on a plant built in Jordania. Land use considered from a large plant in Florida. Land use asessed and extrapoleated with data of a mayor site in Florida.

## Technology
Estimated. No specific technology modelled. Tranport requirement of steel cylinder included.

## Reference product
- phosphoric acid factory, fertiliser grade: 1 unit; CPC 53269: Other constructions for manufacturing; By-product classification allocatable product
  production volume 2.90057 unit
    This is a placeholder value that does not reflect real-world production volumes. This dataset does not currently require a real-world production volume to work in the database framework, and no actual data were collected yet. This has no negative effect on the results of the ecoinvent database.
  property price 1e8 EUR2005
    Calculated based on literature value; http://www.indembassy.org.jo/user/Commerce/ reports full-fledged costs (no information what type) of a phosphoric acid plant with an annual production volume of 475000 tons to be 570 million USD (the phosphoric acid plant in ecoinvent has an annual production volume of 65000 tons (i.e. ~14%). Scaling linearly by means of the annual production volume (which is defenitley to optimistic) would result in costs of roughly 60 million EUR2005. Another source http://www.thefreelibrary.com/Petrokimia+Gresik+to+build+new+factories+to+cost+US$+1.1+billion.-a0297916001 reports cost (no information what type) for phosporic acid factory with roughly USD 200 million, i.e. roughly 128 million EUR2005. However, it provides no information for the annual production volume. Nevertheless, in the light of the lack of further information we estimate the production cost of the factory with 100 million EUR2005.
  property true value 1e8
    allocation property applied in "true value" allocation // value calculated from revenue

## By-products
- heat, for reuse in municipal waste incineration only: 0 MJ; CPC 17300: Steam and hot water; By-product classification allocatable product; pedigree (1,1,1,1,1)
  Net electricity generated from this waste and used in internal MSWI plant energy redistribution.
  Uncertainty: uncertainty is calculated from uncertainties in waste composition and uncertainties in energy efficiency and the uncertainty in internal energy demand
  production volume 3613.74 MJ
  property exergy 0.1842 MJ; name E_th_prod_MSWI_exergy
    This exergy property is based on the exergy content of the product.
  property true value relation 0.1842; name E_th_prod_MSWI_true_value_relation
    property to calculate "true value" from
  property price 0.0106 EUR2005; name E_th_prod_MSWI_price_EUR2005
    Average European district heat price from Ecoheatcool and Euroheat 2005-2006, Ecoheat Work package 1: The European heat market. Final report. 10.6 EUR/GJ i s the price of district heat. http://www.solarthermalworld.org/files/Ecoheatcool%20WP1%20Web.pdf?download
  property true value 3.94
    allocation property applied in "true value" allocation // value calculated from true value relation
- electricity, for reuse in municipal waste incineration only: 0 kWh; CPC 17100: Electrical energy; By-product classification allocatable product; pedigree (1,1,1,1,1)
  (same comment as for heat, for reuse in municipal waste incineration only)
  production volume 520.908 kWh
  property exergy 3.6 MJ; name E_el_prod_MSWI_exergy
    This exergy property is based on the exergy content of the product.
  property true value relation 3.6; name E_el_prod_MSWI_true_value_relation
    property to calculate "true value" from
  property price 0.1 EUR2005; name E_el_prod_MSWI_price_EUR2005
    Estimated to be the same price as in case of electricity, medium voltage.
  property true value 11.0997
    (same comment as for heat, for reuse in municipal waste incineration only)

## Inputs from technosphere
- waste polyethylene: 0 kg; pedigree (1,1,1,1,1)
  Estimated with data from a small Jordanian plant
  Uncertainty: E
  production volume 0 kg
    Calculated from the production volume of phosphoric acid factory, fertiliser grade in proportion to the respective output amounts.
  properties: water content 0.00401606, dry mass 0.996 kg, wet mass 1 kg, carbon content, fossil 0.825301
  note on carbon content, fossil: C content in 1 kg DM was calculated using data in Tab A.1, ecoinvent v2.2 report 13_I
- synthetic rubber: 20000 kg; lognormal variance with pedigree 0.148, pedigree (4,5,5,5,4)
  Estimated with data from a small Jordanian plant
  Uncertainty: E
  properties: dry mass 1 kg, carbon content, fossil 0.871949, wet mass 1 kg
  note on carbon content, fossil: EPDM (Ethylene-propene-diene terpolymer) rubber is a terpolymer of ethylene, propene, and a diene with the residual unsaturated portion of the diene in the side chain (ecoinvent v2.2 report 7-part XX & Ullmann). Chemical formula (deduced from Evidences of Solvent-Induced Miscibility in Polychloroprene-co-Ethylene-Propene Diene Terpolymer Blends, Dubey et al., Journal of Applied Polymer Science, 2009, 111:1884–1891): C20H35
- steel, chromium steel 18/8, hot rolled: 120000 kg; lognormal variance with pedigree 0.148, pedigree (4,5,5,5,4)
  Estimated with data from a small Jordanian plant
  Uncertainty: E
  properties: wet mass 1 kg, carbon content, fossil 0.0008, dry mass 1 kg
  note on carbon content, fossil: Stainless steel model is the grade 304 steel (18/8 stainless, 18% chromium 8% nickel; max. 0.08% C)
- waste brick: 0 kg; pedigree (1,1,1,1,1)
  Estimated with data from a small Jordanian plant
  Uncertainty: E
  production volume 0 kg
    (same comment as for waste polyethylene)
  properties: wet mass 1 kg, dry mass 1 kg
- building, hall, steel construction: 7000 m2; lognormal variance with pedigree 0.448, pedigree (4,5,5,5,4)
  Estimated with data from a small Jordanian plant
  Uncertainty: E
- steel, low-alloyed, hot rolled: 120000 kg; lognormal variance with pedigree 0.148, pedigree (4,5,5,5,4)
  Estimated with data from a small Jordanian plant
  Uncertainty: E
  properties: dry mass 1 kg, wet mass 1 kg, carbon content, fossil 0.005
  note on carbon content, fossil: Low alloyed steel composition given in Tab. 3.2 ecoinvent v2.2 report 10_partII. Steel assumed to have a C content of 0.5%
- waste concrete, not reinforced: 0 kg; pedigree (1,1,1,1,1)
  Estimated with data from a small Jordanian plant
  Uncertainty: E
  production volume 0 kg
    (same comment as for waste polyethylene)
  properties: wet mass 1 kg, dry mass 1 kg
- clay brick: 80000 kg; lognormal variance with pedigree 0.148, pedigree (4,5,5,5,4)
  Estimated with data from a small Jordanian plant
  Uncertainty: E
  properties: dry mass 1 kg, wet mass 1 kg
- concrete, normal: 0 m3; pedigree (1,1,1,1,1)
  Estimated with data from a small Jordanian plant
  Uncertainty: E
  properties: water content 0.086758, wet mass 2380 kg, dry mass 2190 kg
- waste polyethylene: -10032.4, -670.327, -50.6958, -276.869, -111.852, -262.913, -8694.92 kg (7 entries); lognormal variance with pedigree 0.148, pedigree (4,5,5,5,4)
  Estimated with data from a small Jordanian plant
  Uncertainty: E
  production volume 60300 kg
- waste brick: -10470.4, -69529.6 kg (2 entries); lognormal variance with pedigree 0.148, pedigree (4,5,5,5,4)
  Estimated with data from a small Jordanian plant
  Uncertainty: E
  production volume 240000 kg
- waste concrete, not reinforced: -14678.5, -1.38532e6 kg (2 entries); lognormal variance with pedigree 0.148, pedigree (4,5,5,5,4)
  Estimated with data from a small Jordanian plant
  Uncertainty: E
  production volume 4.2e6 kg
- concrete, normal: 0.460879, 15.2978, 1.59401, 12.9046, 7.25884, 1.03681, 597.447 m3 (7 entries); lognormal variance with pedigree 0.148, pedigree (4,5,5,5,4)
  Estimated with data from a small Jordanian plant
  Uncertainty: E

## Inputs from nature
- Occupation, construction site [natural resource, land]: 72500 m2*year; lognormal variance with pedigree 0.114, pedigree (3,4,5,5,3)
  Estimated with data from one large plant in Florida
  Uncertainty: E
- Occupation, industrial area [natural resource, land]: 725000 m2*year; lognormal variance with pedigree 0.114, pedigree (3,4,5,5,3)
  Estimated with data from one large plant in Florida
  Uncertainty: E
- Transformation, from unspecified [natural resource, land]: 14500 m2; lognormal variance with pedigree 0.194, pedigree (3,4,5,5,3)
  Estimated with data from one large plant in Florida
  Uncertainty: E
- Transformation, to industrial area [natural resource, land]: 14500 m2; lognormal variance with pedigree 0.194, pedigree (3,4,5,5,3)
  Estimated with data from one large plant in Florida
  Uncertainty: E

## Sampling procedure
Estimation of the infrastructure will have low representativity because they were asessed with data from a small scale plant.

## Extrapolations
Infrastructure data from one small plant applied for the whole production. Therefore very high uncertainity. This dataset has been copied from an original dataset covering the geography US. The uncertainty has been adjusted accordingly.

## Review by Roland Hischier 2004-06-07
Passed.
