# fibreboard production, hard

Dataset: EcoSpold 2, unit process
Geography: RoW
Time period: 2012-01-01 to 2019-12-31
Technology level: current
Classification: EcoSpold01Categories: wooden materials/processing
Classification: ISIC rev.4 ecoinvent: 1621:Manufacture of veneer sheets and wood-based panels
Synonyms: hard fibreboard; hardboard
Scenario: Business-as-Usual
System model: Allocation at the point of substitution
Generated by: Frank Werner
Database: ecoinvent
isCopyrightProtected: true
accessRestrictedTo: 1

## General comment
This dataset represents hard wood fibreboard production produced in the wet process as the weighted average of hard wood fibreboards produced by the members of the European Panel Federation (EPF)
Hard fibreboard, also called hardboard, is an engineered wood product in conformity with the stan-dard EN 622-1. Hard fibreboard is produced in either the wet or dry process. The wet process leaves only one smooth side while the dry processed hardboard is smooth on both sides. Hardboard is similar to medium density fibreboard, but is denser, much stronger and harder because it is made out of exploded wood fibres that have been highly compressed. Consequently, the density of hardboard is usually about 800-1040 kg/m³. Typical thickness is in a range from 2.2-4.0 mm.
It differs from MDF in that the bonding of the wood fibres usually requires no additional materials, although resin is often added. Hard fibreboard is characterised by high dimensional stability.
The inventoried hardboard has the following composition:
Raw and lacquered hardboard panels are used e.g. for construction, packaging, furniture, upholstery, door skins, toys, automobile and caravan interiors. Hard fibreboard is also used for packaging of fruits, vegetables and mineral water bottles. It is also used for specialized applications like perforated boards for moulding. Producers offer customers specific services including cut to size, and drilling and milling.
The packaging sector is representing 28%, Furniture industry 28%, door industry 18%, automotive 10%, construction 7%, picture frames 4%, retailers 4% , toys 1% and others 2%.

## Included activities start
From the reception at the factory gate of all materials and fuels used.

## Included activities end
Activity ends with the hard fibreboard at the factory gate.

## Geography
Representation of the production of the member companies of the European Panel Federation (EPF).

## Technology
The dataset represents hardboard produced in the wet process. In th wet process, the raw material is grinded and then mixed into a mash with up to 98% water. This mash is then formed into a so-called fibre cake. After pressing most water out of the mat, the fibre cake is the cut and dried in the drying channel with temperatures between 160 to 220 °C. The addition of binders is usually not required, as the heating of the liquid lignin as part of the wood bonds the fibres during cooling. For special purposes (higher strength, hydrophobic properties), resins or bitumen-containing agents can be added.
Production is subject to the regulations of the Industrial Emissions Directive (EU-IED, 2011) if the production capacity exceeds 600 m3 per day where one or more of the following wood-based panels are produced: fibreboard, particleboard or oriented strand board.

## Parameters
- input wood fuel: 3907.3 MJ; name wood_fuel; = 205*19.06
  input of wood fuel used in production, i.e. wood fuel from forestry, internal wood residues, post-consumer wood used for energy purposes, etc; expressed in MJ of absolutely dry mass (lower heating value at humidity u=0%)

## Reference product
- bark chips, wet, measured as dry mass: 1 kg; name w_bark; By-product classification allocatable product; CPC 31230: Wood in chips or particles; pedigree (1,1,1,1,1)
  bark from debarking logs, not used energetically minus bark bought for energetic purposes
  production volume 2.21246e8 kg; = w_bark*p_board
    Calculated from production volume of reference product using the relative outputs.
  property price 0.034 EUR2005; name w_bark_price_EUR2005
    Expert judgement (Urs Luginbühl, Swiss Sawmilling industry, personal communication in June 2014). Cross-reference; FAOSTAT database; http://faostat.fao.org/site/626/DesktopDefault.aspx?PageID=626#ancor; Average import/export prices of EU for 'chips and particles'. Price: 48.76 Euro/m3. The density of the wood chips is 650 kg/m3. The price is calculated to be 0.075 EUR/kg.
  property carbon content 0.494
    carbon content on a dry matter basis (reserved; not for manual entry)
  property true value 0.80852; name w_bark_true_value
    allocation property applied in "true value" allocation // value calculated from revenue
  properties: water content 1.4, water in wet mass 1.4 kg, dry mass 1 kg, carbon content, non-fossil 0.494, wet mass 2.4 kg, carbon content, fossil 0, carbon allocation 0.494 kg
- fibreboard, hard: 0 m3; By-product classification allocatable product; CPC 31449: Other fibreboard
  production volume 9.30386e6 m3; name p_board
    FaoStat 2011
  property carbon content, non-fossil 0.47823; = 876.4*0.494/DM_HFB
    wood content converted to carbon, divided by dry mass
  property price 412 EUR2005
    Export prices for the World+ according to: http://faostat.fao.org/site/626/DesktopDefault.aspx?PageID=626#ancor downloaded 28 April 2009; calculated as export value divided by export volume.
  property water content 0.0560035; = WiWM_HFB/DM_HFB
  property dry mass 905.3 kg; name DM_HFB; = WM_HFB - WiWM_HFB
  property wet mass 956 kg; name WM_HFB
  property water in wet mass 50.7 kg; name WiWM_HFB
  property carbon content 0.490663
    carbon content on a dry matter basis (reserved; not for manual entry)
  property true value 412
    allocation property applied in "true value" allocation // value calculated from revenue
  properties: carbon content, fossil 0.0124326, carbon allocation 444.197 kg

## By-products
- residual wood, dry: 0 m3; = 19.1/DM_residual_wood; CPC 39283: Non-agglomerated wood waste and scrap; By-product classification allocatable product; pedigree (1,1,1,1,1)
  sold residual wood: output in kg dry matter divided by dry wood density
  production volume 323098 m3; = p_board * (Ref('82dc12c6-0c58-4eb1-85a8-bb3c01f7c57e') / Ref('15b08b8e-5cfb-4a1c-8c7f-b4333df6f93f'))
    Calculated from production volume of reference product using the relative outputs.
  property price 26.9 EUR2005
    Temporary price data. Calculated as 90% of purchasers price based on: 2004 prices for World Import/Export (USD/cubicmeter) from FaoStat (http://faostat.fao.org/site/626/default.aspx#ancor, [accessed 10th June 2010]) Commodity: 'Chips and Particles' assuming this is for air-dry chips (10% water on a dry matter basis at 650 kg/m3) and no price difference for water content (i.e. assuming air-drying).
  property dry mass 550 kg; name DM_residual_wood
  property carbon content 0.494
    carbon content on a dry matter basis (reserved; not for manual entry)
  property true value 0.934164
    allocation property applied in "true value" allocation // value calculated from revenue
  properties: water in wet mass 82.5 kg, carbon content, fossil 0, water content 0.15, carbon content, non-fossil 0.494, wet mass 632.5 kg, carbon allocation 271.7 kg
- heat, for reuse in municipal waste incineration only: 0 MJ; CPC 17300: Steam and hot water; By-product classification allocatable product; pedigree (1,1,1,1,1)
  Net electricity generated from this waste and used in internal MSWI plant energy redistribution.
  Uncertainty: uncertainty is calculated from uncertainties in waste composition and uncertainties in energy efficiency and the uncertainty in internal energy demand
  production volume 2.89834e8 MJ
  property exergy 0.1842 MJ; name E_th_prod_MSWI_exergy
    This exergy property is based on the exergy content of the product.
  property price 0.0106 EUR2005; name E_th_prod_MSWI_price_EUR2005
    Average European district heat price from Ecoheatcool and Euroheat 2005-2006, Ecoheat Work package 1: The European heat market. Final report. 10.6 EUR/GJ i s the price of district heat. http://www.solarthermalworld.org/files/Ecoheatcool%20WP1%20Web.pdf?download
  property true value relation 0.1842; name E_th_prod_MSWI_true_value_relation
    property to calculate "true value" from
  property true value 0.212505
    allocation property applied in "true value" allocation // value calculated from true value relation
- electricity, for reuse in municipal waste incineration only: 0 kWh; CPC 17100: Electrical energy; By-product classification allocatable product; pedigree (1,1,1,1,1)
  (same comment as for heat, for reuse in municipal waste incineration only)
  production volume 3.28667e7 kWh
  property price 0.1 EUR2005; name E_el_prod_MSWI_price_EUR2005
    Estimated to be the same price as in case of electricity, medium voltage.
  property exergy 3.6 MJ; name E_el_prod_MSWI_exergy
    This exergy property is based on the exergy content of the product.
  property true value relation 3.6; name E_el_prod_MSWI_true_value_relation
    property to calculate "true value" from
  property true value 0.470966
    (same comment as for heat, for reuse in municipal waste incineration only)
- biogas: 0 m3; source Raboni, Massimo 2014; By-product classification allocatable product; CPC 17200: Coal gas, water gas, producer gas and similar gases, other than petroleum gases and other gaseous hydrocarbons; pedigree (1,1,1,1,1)
  An average yield of 100 litres of biogas per kg biowaste is assumed
  production volume 2.1251e6 m3
  property price 0.109 EUR2005; name biogas_yield_price_EUR2005
    Temporary price data. Calculated as 90% of purchasers price based on: Same prices per energy output as natural gas, based on the proportional lower heating value (2/3 that of natural gas)
  property carbon content, non-fossil 0.449939
    Total C content in kg/Nm3 (Tab 12.8, ecoinvent v2.2 report n17), referred to 1kg DM
  property carbon content 0.449939
    carbon content on a dry matter basis (reserved; not for manual entry)
  property true value 0.0248968
    allocation property applied in "true value" allocation // value calculated from revenue
  properties: water in wet mass 0 kg, wet mass 1.15 kg, carbon content, fossil 0, lower heating value 0 MJ/Nm3, water content 0, dry mass 1.15 kg, carbon allocation 0.51743 kg
- zinc concentrate: 0 kg; CPC 14290: Other non-ferrous metal ores and concentrates (other than uranium or thorium ores and concentrates); By-product classification allocatable product
  Calculated value from the knowledge of the properties of both products.
  production volume 83.8785 kg
  property price 0.38 EUR2005; name ByP_price_EUR2005
    Temporary price data. Calculated as 90% of purchasers price based on: Zinc content in concentrate 53%. Concentrate price per kg Zn 86.5% of refined Zn price (13.5% treatment charges according to CHR Metals Limited 2005: Dynamic cost curves. http://www.minecost.com/dynamic.pdf). 2004 zinc price from USGS (2007) Mineral commodity summaries 2007. <http://minerals.usgs.gov/minerals/pubs/mcs/2007/mcs2007.pdf> [Accessed 25 May 2010]
  property zinc content 0.53; name zinc_C_zinc_concentrate
    Zinc content on a dry matter basis. Value taken from teh "zinc mine operation" /GLO dataset.
  property dry mass 1 kg; name DM_zinc_concentrate
  property carbon content 0
    carbon content on a dry matter basis (reserved; not for manual entry)
  property true value 3.42587e-6
    allocation property applied in "true value" allocation // value calculated from revenue
  properties: wet mass 1 kg, water content 0, carbon content, non-fossil 0, carbon content, fossil 0, water in wet mass 0 kg, carbon allocation 0 kg
- compost: 0 kg; CPC 391: Wastes from food and tobacco industry; By-product classification allocatable product; pedigree (1,1,1,1,1)
  EcoSpold01Location=CH
  Biowaste is reduced in mass by a factor of 2 during composting
  production volume 1.69289e8 kg
  property water in wet mass 0.472 kg; name Water_in_wet_mass_compost; = 1- DM_compost
  property price 0.03 EUR2005
    Temporary price data. Calculated as 90% of purchasers price based on: Estimation done using the following sources: <http://www.wmaa.asn.au/uploads/documents/MarkWinser_1May2007.pdf>; <http://www.swlf.ait.ac.th/UpdData/International/Composting%20and%20anaerobic%20digestion_%20comparions%20for%20Europe%20and%20Asia.pdf>; <http://www.epa.gov/osw/conserve/rrr/composting/basic.htm>, accessed 2011.06.16
  property carbon content, non-fossil 0.1165
    calculation: dry matter 50%, organic matter 40% of dry matter, C content calculated from organic matter divided by 1.72. Relative to dry matter; relative to fresh matter: divided by 2 => 0.1156
  property dry mass 0.528 kg; name DM_compost
  property water content 0.893939; name Water_content_compost; = Water_in_wet_mass_compost/DM_compost
  property concentration, cadmium 0 kg/kg; name Mass_compost_concentration_Cd; = Mass_biowaste_concentration_Cd*2
    Biowaste mass is reduced by a factor of two during composting, therefore concentration is doubled
  property humus equivalent 0.061 kg
    Humus building fraction expressed in kg per kg product on a FM basis. Humus denotes the converted, primary biomass from plants or animals in the ground. More information can be found in the documentation of the composting itself: "treatment of biowaste, industrial composting".
  property concentration, copper 0 kg/kg; name Mass_compost_concentration_Cu; = Mass_biowaste_concentration_Cu*2
    (same comment as for compost)
  property concentration, calcium 0 kg/kg; name Mass_compost_Ca_concentration; = Mass_biowaste_concentration_Ca*2
    (same comment as for compost)
  property concentration, magnesium 0 kg/kg; name Mass_compost_Mg_concentration; = Mass_biowaste_concentration_Mg*2
    (same comment as for compost)
  property concentration, mercury 0 kg/kg; name Mass_compost_Hg_concentration; = Mass_biowaste_concentration_Hg*2
    (same comment as for compost)
  property concentration, lead 0 kg/kg; name Mass_compost_concentration_Pb; = Mass_biowaste_concentration_Pb*2
    (same comment as for compost)
  property concentration, nickel 0 kg/kg; name Mass_compost_Ni_concentration; = Mass_biowaste_concentration_Ni*2
    (same comment as for compost)
  property concentration, phosphorus 0 kg/kg; name Mass_compost_P_concentration; = Mass_biowaste_concentration_P*2
    (same comment as for compost)
  property concentration, sulfur 0 kg/kg; name Mass_compost_concentration_S; = Mass_biowaste_concentration_S*2
    (same comment as for compost)
  property concentration, potassium 0 kg/kg; name Mass_compost_K_concentration; = Mass_biowaste_concentration_K*2
    (same comment as for compost)
  property nickel content 1.60606e-5; name Mass_compost_Ni_content; = Mass_biowaste_Ni_content/0.5*( DM_biowaste / DM_compost)
    nickel content on a dry matter basis
  property concentration, nitrogen 0 kg/kg; = Mass_biowaste_concentration_N*2
    (same comment as for compost)
  property concentration, zinc 0 kg/kg; name Mass_compost_concentration_Zn; = Mass_biowaste_concentration_Zn*2
    (same comment as for compost)
  property lead content 2.66667e-5; name Mass_compost_Pb_content; = Mass_biowaste_Pb_content/0.5*( DM_biowaste / DM_compost)
    lead content on a dry matter basis
  property copper content 3.81818e-5; name Mass_compost_Cu_content; = Mass_biowaste_Cu_content/0.5*( DM_biowaste / DM_compost)
    copper content on a dry matter basis
  property cadmium content 2.89394e-7; name Mass_compost_Cd_content; = Mass_biowaste_Cd_content/0.5*( DM_biowaste / DM_compost)
    cadmium content on a dry matter basis
  property nitrogen content 0.0136364; name Mass_compost_N_content; = Mass_biowaste_N_content/0.5*( DM_biowaste / DM_compost)
    nitrogen content on a dry matter basis
  property magnesium content 0.00525758; name Mass_compost_Mg_content; = Mass_biowaste_Mg_content/0.5*( DM_biowaste / DM_compost)
    magnesium content on a dry matter basis
  property zinc content 0.000120303; name Mass_compost_Zn_content; = Mass_biowaste_Zn_content/0.5*( DM_biowaste / DM_compost)
    zinc content on a dry matter basis
  property potassium content 0.0099697; name Mass_compost_K_content; = Mass_biowaste_K_content/0.5*( DM_biowaste / DM_compost)
    potassium content on a dry matter basis
  property sulfur content 0.00190909; name Mass_compost_S_content; = Mass_biowaste_S_content/0.5*( DM_biowaste / DM_compost)
    sulfur content on a dry matter basis
  property calcium content 0.0504545; name Mass_compost_Ca_content; = Mass_biowaste_Ca_content/0.5*( DM_biowaste / DM_compost)
    calcium content on a dry matter basis
  property mercury content 1e-7; name Mass_compost_Hg_content; = Mass_biowaste_Hg_content/0.5*( DM_biowaste / DM_compost)
    mercury content on a dry matter basis
  property phosphorus content 0.00275758; name Mass_compost_P_content; = Mass_biowaste_P_content/0.5*( DM_biowaste / DM_compost)
    phosphorus content on a dry matter basis
  property carbon content 0.1165
    carbon content on a dry matter basis (reserved; not for manual entry)
  property true value 0.545868
    allocation property applied in "true value" allocation // value calculated from revenue
  properties: carbon content, fossil 0, wet mass 1 kg, carbon allocation 0.061512 kg
- iron scrap, sorted, pressed: 0 kg; By-product classification Recyclable; CPC 39310: Slag, dross, scalings and other waste from the manufacture of iron or steel; pedigree (1,1,1,1,1)
  metallic iron scrap removed from ash reamains and recycled.
  Uncertainty: uncertainty is calculated from uncertainties in waste composition and transfer coefficients to soild residues
  production volume 17.7914 kg
  property price 0.175 EUR2005
    Temporary price data. Calculated as 90% of purchasers price based on: 2005 import and export prices (total trades (USD) divided by total weight (kg) in biggest economies of the world: EU27, USA, Brasil, China, India, Japan and Russia) from UN Commodity Trade Statistics Database (http://data.un.org/Explorer.aspxDatabase [Accessed 2011.06.20]). Commodity: Waste or scrap, of cast iron
  property carbon content 0
    carbon content on a dry matter basis (reserved; not for manual entry)
  property true value 3.34646e-7
    allocation property applied in "true value" allocation // value calculated from revenue
  properties: carbon content, non-fossil 0, wet mass 1 kg, dry mass 1 kg, water content 0, carbon content, fossil 0, water in wet mass 0 kg, carbon allocation 0 kg
- copper: 0 kg; source Rentz O. 1999; By-product classification allocatable product; CPC 41413: Refined copper and copper alloys, unwrought; master alloys of copper
  Literature value. Copper uses: Before end-use copper is manufactured into semi fabricated products, such as shapes and ingots (known as 'semis'). These manufacturing processes are subdivided into hot working, cold working and, if necessary, process annealing. Few of the semis are ready for use as such. They more typically travel to first-stage manufacturers, who make metal rods, wire, and casting, and then to component manufacturers who produce such things as motors, valves, and insulated cables The components in turn are incorporated by final-stage manufacturers into a variety of finished products - automobiles, commercial buildings, residential housing, and so forth. These uses account for about 79% of the world-wide consumption of copper.
  production volume 0.566305 kg
  property price 5.52 EUR2005
    Literature value (http://www.economist.com/news/business/21576714-mining-industry-has-enriched-chile-its-future-precarious-copper-solution). Average price between 20015 and 2013.
  property carbon content 0
    carbon content on a dry matter basis (reserved; not for manual entry)
  property true value 3.3599e-7
    allocation property applied in "true value" allocation // value calculated from revenue
  properties: dry mass 1 kg, water in wet mass 0 kg, wet mass 1 kg, carbon content, non-fossil 0, water content 0, carbon content, fossil 0, carbon allocation 0 kg
- iron scrap, unsorted: 0 kg; source European Aluminium Association 2008; CPC 39310: Slag, dross, scalings and other waste from the manufacture of iron or steel; By-product classification Recyclable; pedigree (1,1,1,1,1)
  production volume 0.000506172 kg
  property price 0.149 EUR2005; name ironScrapAmount_price_EUR2005
    Temporary price data. Calculated as 90% of purchasers price based on: estimated at 85% of sorted scrap
  property carbon content 0
    carbon content on a dry matter basis (reserved; not for manual entry)
  property true value 8.10628e-12
    allocation property applied in "true value" allocation // value calculated from revenue
  properties: water in wet mass 0 kg, water content 0, carbon content, fossil 0, carbon content, non-fossil 0, dry mass 1 kg, wet mass 1 kg, carbon allocation 0 kg
- aluminium oxide, non-metallurgical: 0 kg; source European Aluminium Association 2008; CPC 41432: Alumina (aluminium oxide), except artificial corundum; By-product classification allocatable product; CAS 1344-28-1; pedigree (1,1,1,1,1)
  production volume 0.0318515 kg
  property carbon content, non-fossil 0; name C_content_non_fossil
  property price 0.28 EUR2005; name Al2O3Amount_price_EUR2005
    From UN trade database. http://data.un.org/ Import data from the largest economies of the world are used (Brazil, India, USA, China, Japan and EU-27).
  property dry mass 1 kg; name DM
  property water content 0; name water_content
  property wet mass 1 kg; name WM
  property water in wet mass 0 kg; name WWM
  property carbon content, fossil 0; name C_content_fossil
  property carbon content 0
    carbon content on a dry matter basis (reserved; not for manual entry)
  property true value 9.58572e-10
    allocation property applied in "true value" allocation // value calculated from revenue
  properties: carbon allocation 0 kg
- aluminium, cast alloy: 0 kg; source European Aluminium Association 2008; By-product classification allocatable product; CPC 41431: Unwrought aluminium; pedigree (1,1,1,1,1)
  EcoSpold01Location=RER
  production volume 0.297741 kg
  property price 1.3 EUR2005; name castAlloyAmount_price_EUR2005
    Temporary price data. Calculated as 90% of purchasers price based on: Source: London Metal Exchange, Aluminium alloy price for 2005
  property carbon content 0
    carbon content on a dry matter basis (reserved; not for manual entry)
  property true value 4.16024e-8
    allocation property applied in "true value" allocation // value calculated from revenue
  properties: water in wet mass 0 kg, carbon content, non-fossil 0, water content 0, dry mass 1 kg, carbon content, fossil 0, wet mass 1 kg, carbon allocation 0 kg
- aluminium, wrought alloy: 0 kg; source European Aluminium Association 2008; By-product classification allocatable product; CPC 4153: Semi-finished products of aluminium or aluminium alloys; pedigree (1,1,1,1,1)
  production volume 0.130345 kg
  property price 1.44 EUR2005; name secondaryAluminiumOutput_price_EUR2005
    Estimated based on literature values and expert judgement. Aluminium ccast alloys are about 90% of the price of aluminium wrought alloys.
  property carbon content 0
    carbon content on a dry matter basis (reserved; not for manual entry)
  property true value 2.01741e-8
    allocation property applied in "true value" allocation // value calculated from revenue
  properties: wet mass 1 kg, water content 0, carbon content, fossil 0, water in wet mass 0 kg, carbon content, non-fossil 0, dry mass 1 kg, carbon allocation 0 kg

## Inputs from technosphere
- phenolic resin: 0.00098314 kg; lognormal variance with pedigree 0.037, pedigree (1,5,3,5,1)
  part of glueing system (inventoried as averaged production average in Europe)
  properties: wet mass 1 kg, carbon content, fossil 0.772277, dry mass 1 kg
- heat, district or industrial, other than natural gas: 0.282067 MJ; = 3615/1.05; lognormal variance with pedigree 0.037, pedigree (1,5,3,5,1)
  Fuel input, converted to heat output
- wooden board factory, organic bonded boards: 3.12108e-12 unit; = 1/(525000*50); lognormal variance with pedigree 0.037, pedigree (1,5,3,5,1)
  estimated based on an assumed yearly production volume o 525,000 m3/year and a life time of infrastructure of 50 years
- paraffin: 0.000761114 kg; lognormal variance with pedigree 0.037, pedigree (1,5,3,5,1)
  hydrophobing agent
  properties: wet mass 1 kg, dry mass 1 kg, carbon content, fossil 0.847059
- heat, district or industrial, natural gas: 2.16915e-6 MJ; = 0.0278/1.05; lognormal variance with pedigree 0.037, pedigree (1,5,3,5,1)
  input of natural gas, converted to heat output
- furnace, wood chips, softwood storage area, 1000kW: 2.11598e-9 unit; = 6.61E-09*wood_fuel; lognormal variance with pedigree 0.022, pedigree (1,5,3,5,1)
  EcoSpold01Location=CH
  Factor from DS on heat generation from industrial residual wood mulitplied by the input of wood fuel (direct wood fuel plus production residues)
- pulpwood, hardwood, measured as solid wood under bark: 3.43325e-5 m3; = 239.7/572; lognormal variance with pedigree 0.037, pedigree (1,5,3,5,1)
  input in kg divided by the basic wood density of 572 kg/m3
  properties: wet mass 1170 kg, carbon content, non-fossil 0.494, dry mass 650 kg, water content 0.8
- heat, district or industrial, other than natural gas: 0.00156054 MJ; = 20/1.05; lognormal variance with pedigree 0.037, pedigree (1,5,3,5,1)
  Fuel input, converted to heat output; proxy for animal grease
- pulpwood, softwood, measured as solid wood under bark: 0.000121202 m3; = 559.2/378; lognormal variance with pedigree 0.037, pedigree (1,5,3,5,1)
  input in kg divided by the basic wood density of 378 kg/m3
  properties: wet mass 1080 kg, carbon content, non-fossil 0.494, water content 1.4, dry mass 450 kg
- wood chips, dry, measured as dry mass: 0.016869 kg; = 55.3+150.6; lognormal variance with pedigree 0.037, pedigree (1,5,3,5,1)
  input of different types of wood chips
  properties: water content 0.4, wet mass 1.4 kg, dry mass 1 kg, carbon content, non-fossil 0.494
  note on carbon content, non-fossil: C content of dry mass is 0.494 kgC/kg dry wood (ecoinvent v2.2 report 9).
- wood ash mixture, pure: -0.000152376 kg; name w_wood_ash; = (0.000476*wood_fuel)*-1; lognormal variance with pedigree 0.037, pedigree (1,5,3,5,1)
  EcoSpold01Location=CH
  Emission factor from DS on heat generation from industrial residual wood mulitplied by the input of wood fuel (direct wood fuel plus production residues)
  production volume 1.7304e7 kg; = w_wood_ash*p_board
    Calculated from production volume of reference product using the relative outputs.
  property price 0 EUR2005; name w_wood_ash_price_EUR2005
  properties: carbon content, non-fossil 0.012, dry mass 1 kg, wet mass 1 kg
- sodium hydroxide, without water, in 50% solution state: 7.37355e-7 kg; = 0.018*0.5; lognormal variance with pedigree 0.037, pedigree (1,5,3,5,1)
  50% concentration
  properties: dry mass 1 kg, wet mass 1 kg
- wastewater from hard fibreboard production: -0.0001827 m3; name w_WW; lognormal variance with pedigree 0.037, pedigree (1,5,3,5,1)
  production volume 2.07476e7 m3; = w_WW*p_board
    Calculated from production volume of reference product using the relative outputs.
  property price 0 EUR2005; name w_WW_price_EUR2005
- biowaste: -0.00770126 kg; name w_biowaste; lognormal variance with pedigree 0.0376, pedigree (2,5,3,5,1)
  sludges from chip washing etc.
  production volume 8.74563e8 kg; = w_biowaste*p_board
    Calculated from production volume of reference product using the relative outputs.
  property price 0 EUR2005; name w_biowaste_price_EUR2005
  properties: dry mass 0.4 kg, water content 1.5, wet mass 1 kg, carbon content, non-fossil 0.1624
- saw dust, wet, measured as dry mass: 0.00162136 kg; lognormal variance with pedigree 0.0086, pedigree (1,3,3,5,1)
  input of sawdust
- hazardous waste, for incineration: -1.42719e-5 kg; name w_HW; lognormal variance with pedigree 0.037, pedigree (1,5,3,5,1)
  Output of minor quantities of waste resins, oily filters and rags
  production volume 1.62073e6 kg; = w_HW*p_board
    Calculated from production volume of reference product using the relative outputs.
  property price 0 EUR2005; name w_HW_price_EUR2005
  properties: dry mass 0.75 kg, carbon content, fossil 0.554667, wet mass 1 kg, water content 0.333333
  note on carbon content, fossil: Tab A.6, ecoinvent v2.2 report 13_I. C content has been calculated after data in the tables, and then referred to 1 kg DM
- electricity, medium voltage: 0 kWh; pedigree (1,1,1,1,1)
- lubricating oil: 2.50701e-5 kg; = 0.011+0.295; lognormal variance with pedigree 0.037, pedigree (1,5,3,5,1)
  input of lubricating oils plus mineral oils, incl. thermooil
  properties: wet mass 1 kg, carbon content, fossil 0.75, dry mass 1 kg
  note on carbon content, fossil: Lubricating oil is produced from diesel. C-content/dry mass of fats and oils considered 75%, from: ecoinvent v2.2 report, n 15a, pg 40
- wood chips, from post-consumer wood, measured as dry mass: 0.00344918 kg; lognormal variance with pedigree 0.037, pedigree (1,5,3,5,1)
  properties: wet mass 1.4 kg, carbon content, non-fossil 0.494, dry mass 1 kg, water content 0.4
- chemical, organic: 0.000162644 kg; lognormal variance with pedigree 0.037, pedigree (1,5,3,5,1)
  input of unspecified additives, dyes, flame redardants, etc.
  properties: wet mass 1 kg, dry mass 1 kg, carbon content, fossil 0.628
  note on carbon content, fossil: This dataset is an unweighted average of 20 organic substances (listed in Tab 88.1, ecoinvent v2.2 report 8, part II), being part of the top100 chemicals included in this database. The C-content has also been calculated as an unweighted average of the C content of the substances composing this dataset.
- vegetable oil, refined: 0.000348195 kg; lognormal variance with pedigree 0.037, pedigree (1,5,3,5,1)
  additive
  properties: carbon content, non-fossil 0.768, wet mass 1 kg, dry mass 1 kg
- diesel, burned in building machine: 0.00344099 MJ; lognormal variance with pedigree 0.037, pedigree (1,5,3,5,1)
  for internal transport
- dust collector, electrostatic precipitator, for industrial use: 4.23441e-10 unit; = 1.3889E-09*wood_fuel/1.05; lognormal variance with pedigree 0.037, pedigree (1,5,3,5,1)
  Infrastructure factor from DS on heat generation from industrial residual wood mulitplied by the input of wood fuel (direct wood fuel plus production residues); correction for assumed efficiency as original value refers to heat output
- aluminium sulfate, powder: 4.78461e-5 kg; lognormal variance with pedigree 0.037, pedigree (1,5,3,5,1)
  aluminium sulfate plus input of unspecified hardeners
  properties: wet mass 1 kg, dry mass 1 kg
- furnace, wood chips, with silo, 5000kW: 8.94289e-9 unit; = 2.9333E-08*wood_fuel/1.05; lognormal variance with pedigree 0.037, pedigree (1,5,3,5,1)
  (same comment as for dust collector, electrostatic precipitator, for industrial use)
- tap water: 0 kg; pedigree (1,1,1,1,1)
  properties: carbon content, fossil 0.00178991, dry mass 0.000337476 kg, wet mass 1 kg, water content 2962.17
  note on carbon content, fossil: Bicarbonate content is 2.93 mol/m3. CO2 content is 0.1 mol/m3 (ecoinvent v2.2 report 8, Tab 93.1).
- electricity, medium voltage: 0.000541614, 9.85509e-5, 0.00167127, 0.0242317, 0.00346802, 0.0113626 kWh (6 entries); lognormal variance with pedigree 0.0145, pedigree (1,5,3,5,1)
- tap water: 0.000193271, 0.0016056, 0.000319412, 0.00805431, 0.000209531, 0.000596007, 0.0921696 kg (7 entries); lognormal variance with pedigree 0.037, pedigree (1,5,3,5,1)

## Inputs from nature
- Water, cooling, unspecified natural origin [natural resource, in water]: 0.000184339 m3; lognormal variance with pedigree 0.036, pedigree (1,5,3,5,1)

## Emissions to nature
- Carbon monoxide, non-fossil [air, urban air close to ground]: 6.40237e-5 kg; = 2E-04*wood_fuel; lognormal variance with pedigree 0.0706, pedigree (2,5,5,5,1)
  Emission factor from DS on heat generation from industrial residual wood mulitplied by the input of wood fuel (direct wood fuel plus production residues)
- Sodium [air, urban air close to ground]: 4.16154e-7 kg; = 1.3E-06*wood_fuel; lognormal variance with pedigree 0.4806, pedigree (2,5,5,5,1)
  (same comment as for Carbon monoxide, non-fossil)
- Acetaldehyde [air, urban air close to ground]: 6.47517e-8 kg; = 6.1E-08*wood_fuel+0.000552; lognormal variance with pedigree 0.4806, pedigree (2,5,5,5,1)
  Emission factor from DS on heat generation from industrial residual wood mulitplied by the input of wood fuel (direct wood fuel plus production residues ) plus estimated emissions from wood and glue drying processes (based on Albrecht et al. 2009).
- Magnesium [air, urban air close to ground]: 1.15243e-7 kg; = 3.6E-07*wood_fuel; lognormal variance with pedigree 0.4806, pedigree (2,5,5,5,1)
  (same comment as for Carbon monoxide, non-fossil)
- Fluorine [air, urban air close to ground]: 1.60059e-8 kg; = 5E-08*wood_fuel; lognormal variance with pedigree 0.4806, pedigree (2,5,5,5,1)
  (same comment as for Carbon monoxide, non-fossil)
- Methane, non-fossil [air, urban air close to ground]: 4.80178e-7 kg; = 1.5E-06*wood_fuel; lognormal variance with pedigree 0.4806, pedigree (2,5,5,5,1)
  (same comment as for Carbon monoxide, non-fossil)
- Benzene, hexachloro- [air, urban air close to ground]: 2.30485e-15 kg; = 7.2E-15*wood_fuel; lognormal variance with pedigree 0.4806, pedigree (2,5,5,5,1)
  (same comment as for Carbon monoxide, non-fossil)
- PAH, polycyclic aromatic hydrocarbons [air, urban air close to ground]: 3.55332e-9 kg; = 1.11E-08*wood_fuel; lognormal variance with pedigree 0.4806, pedigree (2,5,5,5,1)
  (same comment as for Carbon monoxide, non-fossil)
- Dinitrogen monoxide [air, urban air close to ground]: 7.36273e-7 kg; = 2.3E-06*wood_fuel; lognormal variance with pedigree 0.4806, pedigree (2,5,5,5,1)
  (same comment as for Carbon monoxide, non-fossil)
- Arsenic [air, urban air close to ground]: 3.20119e-10 kg; = 1E-09*wood_fuel; lognormal variance with pedigree 0.4806, pedigree (2,5,5,5,1)
  (same comment as for Carbon monoxide, non-fossil)
- Particulates, > 10 um [air, unspecified]: 1.35182e-5 kg; lognormal variance with pedigree 0.444, pedigree (3,5,3,5,1)
  dust emissions
- Formaldehyde [air, urban air close to ground]: 2.5732e-6 kg; = 1.3E-07*wood_fuel+0.0309; lognormal variance with pedigree 0.4806, pedigree (2,5,5,5,1)
  Emission factor from DS on heat generation from industrial residual wood mulitplied by the input of wood fuel (direct wood fuel plus production residues) plus estimated emissions from wood and glue drying processes
- Nickel [air, urban air close to ground]: 1.92071e-9 kg; = 6E-09*wood_fuel; lognormal variance with pedigree 0.4806, pedigree (2,5,5,5,1)
  (same comment as for Carbon monoxide, non-fossil)
- Lead [air, urban air close to ground]: 8.00296e-9 kg; = 2.5E-08*wood_fuel; lognormal variance with pedigree 0.4806, pedigree (2,5,5,5,1)
  (same comment as for Carbon monoxide, non-fossil)
- NMVOC, non-methane volatile organic compounds, unspecified origin [air, urban air close to ground]: 6.44542e-5 kg; = 3.6E-06*wood_fuel + 0.833 - (0.0309+0.000552+0.0289); lognormal variance with pedigree 0.2106, pedigree (2,5,5,5,1)
  Emission factor from DS on heat generation from industrial residual wood mulitplied by the input of wood fuel (direct wood fuel plus production residues) plus estimated emissions from wood and glue drying processes (based on Albrecht et al. 2009) minus emissions that have been inventoried specifically
- Methanol [air, non-urban air or from high stacks]: 2.36773e-6 kg; lognormal variance with pedigree 0.482, pedigree (3,5,5,5,1)
  Estimated emissions from wood and glue drying processes
- Carbon dioxide, non-fossil [air, urban air close to ground]: 0.0326521 kg; = 0.102*wood_fuel; lognormal variance with pedigree 0.0506, pedigree (2,5,5,5,1)
  (same comment as for Carbon monoxide, non-fossil)
- Benzene, ethyl- [air, urban air close to ground]: 9.60356e-9 kg; = 3E-08*wood_fuel; lognormal variance with pedigree 0.4806, pedigree (2,5,5,5,1)
  (same comment as for Carbon monoxide, non-fossil)
- Copper [air, urban air close to ground]: 7.04261e-9 kg; = 2.2E-08*wood_fuel; lognormal variance with pedigree 0.4806, pedigree (2,5,5,5,1)
  (same comment as for Carbon monoxide, non-fossil)
- Bromine [air, urban air close to ground]: 1.92071e-8 kg; = 6E-08*wood_fuel; lognormal variance with pedigree 0.4806, pedigree (2,5,5,5,1)
  (same comment as for Carbon monoxide, non-fossil)
- Chromium VI [air, urban air close to ground]: 1.28047e-11 kg; = 4E-11*wood_fuel; lognormal variance with pedigree 0.5306, pedigree (2,5,5,5,1)
  (same comment as for Carbon monoxide, non-fossil)
- Calcium [air, urban air close to ground]: 1.87269e-6 kg; = 5.85E-06*wood_fuel; lognormal variance with pedigree 0.4806, pedigree (2,5,5,5,1)
  (same comment as for Carbon monoxide, non-fossil)
- Particulates, < 2.5 um [air, urban air close to ground]: 8.00296e-7 kg; = 2.5E-06*wood_fuel; lognormal variance with pedigree 0.1206, pedigree (2,5,5,5,1)
  (same comment as for Carbon monoxide, non-fossil)
- Hydrocarbons, aliphatic, unsaturated [air, urban air close to ground]: 9.92367e-7 kg; = 3.1E-06*wood_fuel; lognormal variance with pedigree 0.4806, pedigree (2,5,5,5,1)
  (same comment as for Carbon monoxide, non-fossil)
- Toluene [air, urban air close to ground]: 9.60356e-8 kg; = 3E-07*wood_fuel; lognormal variance with pedigree 0.4806, pedigree (2,5,5,5,1)
  (same comment as for Carbon monoxide, non-fossil)
- Dioxins, measured as 2,3,7,8-tetrachlorodibenzo-p-dioxin [air, urban air close to ground]: 9.60356e-15 kg; = 3E-14*wood_fuel; lognormal variance with pedigree 0.4806, pedigree (2,5,5,5,1)
  (same comment as for Carbon monoxide, non-fossil)
- Phenol, pentachloro- [air, urban air close to ground]: 2.59296e-12 kg; = 8.1E-12*wood_fuel; lognormal variance with pedigree 0.4806, pedigree (2,5,5,5,1)
  (same comment as for Carbon monoxide, non-fossil)
- Manganese [air, urban air close to ground]: 5.44201e-8 kg; = 1.7E-07*wood_fuel; lognormal variance with pedigree 0.4806, pedigree (2,5,5,5,1)
  (same comment as for Carbon monoxide, non-fossil)
- Hydrocarbons, aliphatic, alkanes, unspecified [air, urban air close to ground]: 2.91308e-7 kg; = 9.1E-07*wood_fuel; lognormal variance with pedigree 0.4806, pedigree (2,5,5,5,1)
  (same comment as for Carbon monoxide, non-fossil)
- Benzene [air, urban air close to ground]: 2.91308e-7 kg; = 9.1E-07*wood_fuel; lognormal variance with pedigree 0.4806, pedigree (2,5,5,5,1)
  (same comment as for Carbon monoxide, non-fossil)
- Cadmium [air, urban air close to ground]: 2.24083e-10 kg; = 7E-10*wood_fuel; lognormal variance with pedigree 0.4806, pedigree (2,5,5,5,1)
  (same comment as for Carbon monoxide, non-fossil)
- Sulfur dioxide [air, urban air close to ground]: 8.00296e-7 kg; = 2.5E-06*wood_fuel; lognormal variance with pedigree 0.4806, pedigree (2,5,5,5,1)
  (same comment as for Carbon monoxide, non-fossil)
- Zinc [air, urban air close to ground]: 9.60356e-8 kg; = 3E-07*wood_fuel; lognormal variance with pedigree 0.4806, pedigree (2,5,5,5,1)
  (same comment as for Carbon monoxide, non-fossil)
- Benzo(a)pyrene [air, urban air close to ground]: 1.60059e-10 kg; = 5E-10*wood_fuel; lognormal variance with pedigree 0.4806, pedigree (2,5,5,5,1)
  (same comment as for Carbon monoxide, non-fossil)
- m-Xylene [air, urban air close to ground]: 3.84142e-8 kg; = 1.2E-07*wood_fuel; lognormal variance with pedigree 0.4806, pedigree (2,5,5,5,1)
  (same comment as for Carbon monoxide, non-fossil)
- Chromium [air, urban air close to ground]: 1.26767e-9 kg; = 3.96E-09*wood_fuel; lognormal variance with pedigree 0.4806, pedigree (2,5,5,5,1)
  (same comment as for Carbon monoxide, non-fossil)
- Mercury [air, urban air close to ground]: 9.60356e-11 kg; = 3E-10*wood_fuel; lognormal variance with pedigree 0.4806, pedigree (2,5,5,5,1)
  (same comment as for Carbon monoxide, non-fossil)
- Nitrogen oxides [air, urban air close to ground]: 3.84142e-5 kg; = 0.00012*wood_fuel; lognormal variance with pedigree 0.1206, pedigree (2,5,5,5,1)
  (same comment as for Carbon monoxide, non-fossil)
- Phosphorus [air, urban air close to ground]: 9.60356e-8 kg; = 3E-07*wood_fuel; lognormal variance with pedigree 0.4806, pedigree (2,5,5,5,1)
  (same comment as for Carbon monoxide, non-fossil)
- Chlorine [air, urban air close to ground]: 5.76213e-8 kg; = 1.8E-07*wood_fuel; lognormal variance with pedigree 0.4806, pedigree (2,5,5,5,1)
  (same comment as for Carbon monoxide, non-fossil)
- Potassium [air, urban air close to ground]: 7.49077e-6 kg; = 2.34E-05*wood_fuel; lognormal variance with pedigree 0.4806, pedigree (2,5,5,5,1)
  (same comment as for Carbon monoxide, non-fossil)
- Ammonia [air, urban air close to ground]: 5.53805e-7 kg; = 1.73E-06*wood_fuel; lognormal variance with pedigree 0.4806, pedigree (2,5,5,5,1)
  (same comment as for Carbon monoxide, non-fossil)

## Sampling procedure
Survey among member companies of the European Panel Federation; emissions profile per MJ wood input from PSI (2014)

## Review by Gregor Wernet 2014-05-11
Residual wood, dry was entered in kg, needed to be corrected for unit of m3.

## Review by Emilia Moreno Ruiz 2014-06-12
AL in heat input corrected to the most recent activity
