# dried roughage store construction, cold-air dried, conventional

Dataset: EcoSpold 2, unit process
Geography: CH
Time period: 1994-01-01 to 2019-12-31
Technology level: current
Classification: ISIC rev.4 ecoinvent: 4100:Construction of buildings
Classification: EcoSpold01Categories: agricultural means of production/buildings
Tags: ConvertedDataset
Scenario: Business-as-Usual
System model: Allocation at the point of substitution
Generated by: Dunja Dux
Published in: Nemecek, T. 2007
Database: ecoinvent
isCopyrightProtected: true
accessRestrictedTo: 1

## General comment
This dataset represents an example of a typical dried roughage store. The module includes the installations for the dried roughage store (ventilator, impeller blower with telescopic spreader, ventilation rust) and the part of the building around the store (floor, walls and roof). Size: 830 m3. Lifetime of the building is 50 years. The Functional Unit is one m3 of dried roughage store during entire service life.
[This dataset was already contained in the ecoinvent database version 2. It was not individually updated during the transfer to ecoinvent version 3. Life Cycle Impact Assessment results may still have changed, as they are affected by changes in the supply chain, i.e. in other datasets. This dataset was generated following the ecoinvent quality guidelines for version 2. It may have been subject to central changes described in the ecoinvent version 3 change report (http://www.ecoinvent.org/database/ecoinvent-version-3/reports-of-changes/), and the results of the central updates were reviewed extensively. The changes added e.g. consistent water flows and other information throughout the database. The documentation of this dataset can be found in the ecoinvent reports of version 2, which are still available via the ecoinvent website. The change report linked above covers all central changes that were made during the conversion process.]
Obs: The following limitation on the use of individual modules should be noted: to obtain realistic values when applying the modules, building sizes should not differ too widely from the sizes on which the module calculations were based. An acceptable approximation can be achieved for building sizes within a range of about half to twice the value of the calculated size of the modules. A wider difference would not be reasonable, since the type of construction would be too different from the calculated module.
Construction plan for dried roughage store 830 m3.

## Included activities start
From unoccupied land foreseen for a dried roughage store.

## Included activities end
This acitivity ends with the final treatment and disposal of the building. The dataset includes the use of construction materials and building machines (hydraulic diggers, skid-steer loaders) for construction and also materials for repair and replacement. Waste disposal is inlcuded for repair, replacement and dismantling materials from the building infrastructure. The dataset doesn't include direct emissions from construction, waste disposal of production and the resources used during utilization phase of the building. Disposal of construction waste such as packing materials and remnants of construction materials were not considered because it represents only a small proportion of the overall disposal quantity.

## Geography
The inventory applies for Swiss agricultural buildings only, because of the solid method of construction.

## Technology
Based on selected examples of this type of housing and buildings commonly found in Switzerland in the year 2000; but not conform to an “average Swiss building style”.

## Reference product
- dried roughage store, cold-air dried, conventional: 1 m3; CPC 53121: Industrial buildings; By-product classification allocatable product
  EcoSpold01Location=CH
  production volume 0.0336675 m3
    This is a placeholder value that does not reflect real-world production volumes. This dataset does not currently require a real-world production volume to work in the database framework, and no actual data were collected yet. This has no negative effect on the results of the ecoinvent database. The placeholder value of this activity was scaled according to the nominal GDP of 2005 (source: United Nations, http://data.un.org/Glossary.aspx?q=GDP+%28current+US%24%29, accessed 20130726) to reflect an appropriate share of the global production volume, which is also a placeholder value.
  property price 53.0018 EUR2005
    Calculated based on inputs: The price of the product has been calculated as a sum of the values of the material and energy inputs for this product. This value is therefore a rough estimation. It may underestimate the real price since there are additional expenses when producing any product. These expences can include for example labour costs, treatment of waste materials and profit for the producer. Please consider carefully whether this level of data quality is acceptable for your application.
  property true value 53.0018
    allocation property applied in "true value" allocation // value calculated from revenue

## By-products
- heat, for reuse in municipal waste incineration only: 0 MJ; CPC 17300: Steam and hot water; By-product classification allocatable product; pedigree (1,1,1,1,1)
  Net useful heat generated from this waste and used in internal MSWI plant energy redistribution.
  Uncertainty: uncertainty is calculated from uncertainties in waste composition and uncertainties in energy efficiency and the uncertainty in internal energy demand
  production volume 222.068 MJ
  property true value relation 0.1842; name E_th_prod_MSWI_true_value_relation
    property to calculate "true value" from
  property exergy 0.1842 MJ; name E_th_prod_MSWI_exergy
    This exergy property is based on the exergy content of the product.
  property price 0.0106 EUR2005; name E_th_prod_MSWI_price_EUR2005
    Average European district heat price from Ecoheatcool and Euroheat 2005-2006, Ecoheat Work package 1: The European heat market. Final report. 10.6 EUR/GJ i s the price of district heat. http://www.solarthermalworld.org/files/Ecoheatcool%20WP1%20Web.pdf?download
  property true value 1.46466
    allocation property applied in "true value" allocation // value calculated from true value relation
- electricity, for reuse in municipal waste incineration only: 0 kWh; CPC 17100: Electrical energy; By-product classification allocatable product; pedigree (1,1,1,1,1)
  Net electricity generated from this waste and used in internal MSWI plant energy redistribution.
  Uncertainty: uncertainty is calculated from uncertainties in waste composition and uncertainties in energy efficiency and the uncertainty in internal energy demand
  production volume 30.7676 kWh
  property true value relation 3.6; name E_el_prod_MSWI_true_value_relation
    property to calculate "true value" from
  property price 0.1 EUR2005; name E_el_prod_MSWI_price_EUR2005
    Estimated to be the same price as in case of electricity, medium voltage.
  property exergy 3.6 MJ; name E_el_prod_MSWI_exergy
    This exergy property is based on the exergy content of the product.
  property true value 3.96603
    (same comment as for heat, for reuse in municipal waste incineration only)
- zinc concentrate: 0 kg; CPC 14290: Other non-ferrous metal ores and concentrates (other than uranium or thorium ores and concentrates); By-product classification allocatable product
  Calculated value from the knowledge of the properties of both products.
  production volume 0.00205548 kg
  property price 0.38 EUR2005; name ByP_price_EUR2005
    Temporary price data. Calculated as 90% of purchasers price based on: Zinc content in concentrate 53%. Concentrate price per kg Zn 86.5% of refined Zn price (13.5% treatment charges according to CHR Metals Limited 2005: Dynamic cost curves. http://www.minecost.com/dynamic.pdf). 2004 zinc price from USGS (2007) Mineral commodity summaries 2007. <http://minerals.usgs.gov/minerals/pubs/mcs/2007/mcs2007.pdf> [Accessed 25 May 2010]
  property zinc content 0.53; name zinc_C_zinc_concentrate
    Zinc content on a dry matter basis. Value taken from teh "zinc mine operation" /GLO dataset.
  property dry mass 1 kg; name DM_zinc_concentrate
  property carbon content 0
    carbon content on a dry matter basis (reserved; not for manual entry)
  property true value 0.000781083
    allocation property applied in "true value" allocation // value calculated from revenue
  properties: wet mass 1 kg, water content 0, carbon content, non-fossil 0, carbon content, fossil 0, water in wet mass 0 kg, carbon allocation 0 kg
- iron scrap, sorted, pressed: 0 kg; By-product classification Recyclable; CPC 39310: Slag, dross, scalings and other waste from the manufacture of iron or steel; pedigree (1,1,1,1,1)
  Iron scrap recovered from this waste.
  Uncertainty: uncertainty calculated from uncertainty in waste composition, uncertainty of share of recyclable metal, uncertainty of transfer coefficient to bottom ash, uncertainty of the efficiency of scrap removal in MSWI plant.
  production volume 0.0489613 kg
  property price 0.175 EUR2005
    Temporary price data. Calculated as 90% of purchasers price based on: 2005 import and export prices (total trades (USD) divided by total weight (kg) in biggest economies of the world: EU27, USA, Brasil, China, India, Japan and Russia) from UN Commodity Trade Statistics Database (http://data.un.org/Explorer.aspxDatabase [Accessed 2011.06.20]). Commodity: Waste or scrap, of cast iron
  property carbon content 0
    carbon content on a dry matter basis (reserved; not for manual entry)
  property true value 0.00856823
    allocation property applied in "true value" allocation // value calculated from revenue
  properties: wet mass 1 kg, water in wet mass 0 kg, carbon content, non-fossil 0, carbon content, fossil 0, dry mass 1 kg, water content 0, carbon allocation 0 kg

## Inputs from technosphere
All rows: lognormal variance with pedigree 0.0401, pedigree (1,2,5,1,1)
- cast iron: 2.53029 kg
  Modelled, based on "Agricultural Buildings" - pdf-document on the dedicated talk page of ecoinvent (www.ecoinvent.org/talk-pages)
  EcoSpold01Location=RER
  properties: carbon content, fossil 0.04, wet mass 1 kg, dry mass 1 kg
  note on carbon content, fossil: Cast iron is made by remelting pig iron in small furnaces (e.g. cupola furnaces or electric arc furnaces) and poured into moulds to make castings. It usually contains 2% to 6% carbon (ecoinvent v2.2 report 10_partII). An average content of 4% was considered
- polyethylene, high density, granulate: 0.00572264 kg
  EcoSpold01Location=RER
  Modelled, based on "Agricultural Buildings" - pdf-document on the dedicated talk page of ecoinvent (www.ecoinvent.org/talk-pages)
  properties: dry mass 1 kg, carbon content, fossil 0.857143, wet mass 1 kg
  note on carbon content, fossil: Polyethylene is formed out of a huge amount of ethylene monomers (C2H4) (ecoinvent v2.2 report 11_II). MW=28 g/mol
- electricity, low voltage: 0.75274 kWh
  Modelled, based on "Agricultural Buildings" - pdf-document on the dedicated talk page of ecoinvent (www.ecoinvent.org/talk-pages)
  EcoSpold01Location=CH
- fibre cement corrugated slab: 1.65059 kg
  (same comment as for electricity, low voltage)
  properties: wet mass 1 kg, carbon content, fossil 0.00981818, dry mass 1 kg, carbon content, non-fossil 0.01656
  note on carbon content, fossil: Tab 5.1, ecoinvent v2.2 report 7, part IX. Fibres (pulp) 3.6%. Fibres (polyvinyl alcohol) 1.8%. C-content/dry mass of natural fibres was considered 46% (from "Evolutionary and Biochemical Aspects", A.D. Kay and T. Vrede (in Global Ecology, 2010, Elsevier B.V., S.E. Jørgensen Ed.)). C-content/dry mass of polyvinyl alcohol ((C2H4O)x) was considered =24/44.
- concrete, normal: 0.0614889 m3
  EcoSpold01Location=CH
  Modelled, based on "Agricultural Buildings" - pdf-document on the dedicated talk page of ecoinvent (www.ecoinvent.org/talk-pages)
  properties: water content 0.086758, dry mass 2190 kg, wet mass 2380 kg
- gravel, round: 77.632 kg
  (same comment as for electricity, low voltage)
  properties: wet mass 1 kg, dry mass 1 kg
- aluminium, cast alloy: 0.0676196 kg
  (same comment as for cast iron)
  properties: wet mass 1 kg, dry mass 1 kg
- waste wood, untreated: -33.5559 kg
  (same comment as for concrete, normal)
  production volume 37 kg
    Calculated from the production volume of dried roughage store, cold-air dried, conventional in proportion to the respective output amounts.
  properties: water content 0.25, wet mass 1 kg, carbon content, non-fossil 0.48632, dry mass 0.8 kg
  note on carbon content, non-fossil: Tab A.4, ecoinvent v2.2 report 13_I. C content has been referred to 1 kg DM,
- aluminium, wrought alloy: 0.143692 kg
  (same comment as for cast iron)
  properties: dry mass 1 kg, wet mass 1 kg
- waste brick: -11.0644 kg
  (same comment as for electricity, low voltage)
  production volume 12.2 kg
    (same comment as for waste wood, untreated)
  properties: dry mass 1 kg, wet mass 1 kg
- sheet rolling, steel: 1.19713 kg
  (same comment as for cast iron)
- particle board, for indoor use: 0.0265726 m3
  (same comment as for polyethylene, high density, granulate)
  properties: carbon content, non-fossil 0.446121, dry mass 639.701 kg, water content 0.0629967, carbon content, fossil 0.0471697, wet mass 680 kg
  note on carbon content, non-fossil: The particle board is composed of wood and additives. The weight of the wood is assumed to be the DM kg minus 62 kg additives. C content of wood is 0.494 kgC/kg dry wood (ecoinvent v2.2 report 9)
  note on carbon content, fossil: C content calculated as the addition of the C contents in the final product components (urea formaldehyde resin, ammonium chloride) (Fig 12.1, ecoinvent v2.2 report 9)
- excavation, skid-steer loader: 0.00161431 m3
  EcoSpold01Location=RER
  Modelled, based on "Agricultural Buildings" - pdf-document on the dedicated talk page of ecoinvent (www.ecoinvent.org/talk-pages);activityLink introduced to establish a direct link to the corresponding regional supply of this product
- glued laminated timber, for indoor use: 0.00828921 m3
  (same comment as for polyethylene, high density, granulate)
  properties: water content 0.13, carbon content, non-fossil 0.478422, carbon content, fossil 0.0128964, dry mass 380.531 kg, wet mass 430 kg
  note on carbon content, non-fossil: The laminated timber is composed of wood and glue. The weight of the wood is assumed to be the DM minus 12 kg glue. C content of wood is 0.494 kgC/kg dry wood (ecoinvent v2.2 report 9)
  note on carbon content, fossil: C content of 12 kg Urea formaldehyde resin (C3H8N2O) used for glueing
- extrusion, plastic film: 0.00572264 kg
  (same comment as for polyethylene, high density, granulate)
- waste concrete, not reinforced: -2.37612 kg
  (same comment as for electricity, low voltage)
  production volume 2.62 kg
    (same comment as for waste wood, untreated)
  properties: wet mass 1 kg, dry mass 1 kg
- copper: 1.26968 kg
  (same comment as for cast iron)
  properties: wet mass 1 kg, dry mass 1 kg
- waste fibreboard: -17.2314 kg
  (same comment as for electricity, low voltage)
  production volume 19 kg
    (same comment as for waste wood, untreated)
  properties: water content 0.187014, carbon content, fossil 0.0731794, dry mass 0.84245 kg, wet mass 1 kg, carbon content, non-fossil 0.439195
  note on carbon content, fossil: The waste contains 0.925kg untreated wood (Tab A.4 for details) and 0.075kg polyurethane (Tab A.1 for details), (ecoinvent v2.2 report 13_I)
- zinc coat, pieces: 0.00389067 m2
  (same comment as for polyethylene, high density, granulate)
- reinforcing steel: 1.68686 kg
  (same comment as for polyethylene, high density, granulate)
  properties: wet mass 1 kg, dry mass 1 kg, carbon content, fossil 0.004
- waste polyethylene/polypropylene product: -0.00572264 kg
  (same comment as for concrete, normal)
  production volume 0.00631 kg
    (same comment as for waste wood, untreated)
  properties: dry mass 0.847 kg, carbon content, fossil 0.748045, water content 0.180638, wet mass 1 kg
  note on carbon content, fossil: Mixed various plastics was used to estimate the C content of this waste (Tab A.2, ecoinvent v2.2 report 13_I)
- zinc coat, coils: 0.254843 m2
  (same comment as for cast iron)
- waste building wood, chrome preserved: -5.71357 kg
  (same comment as for electricity, low voltage)
  production volume 6.3 kg
    (same comment as for waste wood, untreated)
  properties: water content 0.25, carbon content, non-fossil 0.484262, dry mass 0.8 kg, wet mass 1 kg
  note on carbon content, non-fossil: C content per kg DM was calculated using information in Tab A.4, ecoinvent v2.2 report 13_I
- lean concrete: 0.00107923 m3
  (same comment as for concrete, normal)
  properties: water content 0.0528846, wet mass 2190 kg, dry mass 2080 kg
- waste bulk iron, excluding reinforcement: -5.00617 kg
  (same comment as for concrete, normal)
  production volume 5.52 kg
    (same comment as for waste wood, untreated)
  properties: wet mass 1 kg, dry mass 1 kg
- waste reinforced concrete: -136.944 kg
  (same comment as for electricity, low voltage)
  production volume 151 kg
    (same comment as for waste wood, untreated)
  properties: water content 0.00585407, dry mass 0.99418 kg, wet mass 1 kg
- excavation, hydraulic digger: 0.0888777 m3
  (same comment as for cast iron)
- sawnwood, softwood, dried (u=20%), planed: 0.0708301 m3
  (same comment as for polyethylene, high density, granulate)
  properties: water content 0.2, carbon content, non-fossil 0.494, dry mass 450 kg, wet mass 540 kg
  note on carbon content, non-fossil: C content of dry mass is 0.494 kgC/kg dry wood (ecoinvent v2.2 report 9)
- steel, low-alloyed, hot rolled: 1.19713 kg
  (same comment as for polyethylene, high density, granulate)
  properties: wet mass 1 kg, dry mass 1 kg, carbon content, fossil 0.005
  note on carbon content, fossil: Low alloyed steel composition given in Tab. 3.2 ecoinvent v2.2 report 10_partII. Steel assumed to have a C content of 0.5%
- fibre cement facing tile: 9.43192 kg
  (same comment as for concrete, normal)
  properties: carbon content, non-fossil 0.0115, carbon content, fossil 0.0201818, dry mass 1 kg, wet mass 1 kg
  note on carbon content, non-fossil: Tab 5.1, ecoinvent v2.2 report 7, part IX. Fibres (pulp) 2.5%. Fibres (polyvinyl alcohol) 3.7%. C-content/dry mass of natural fibres was considered 46% (from "Evolutionary and Biochemical Aspects", A.D. Kay and T. Vrede (in Global Ecology, 2010, Elsevier B.V., S.E. Jørgensen Ed.)). C-content/dry mass of polyvinyl alcohol ((C2H4O)x) was considered =24/44.

## Inputs from nature
- Occupation, urban, discontinuously built [natural resource, land]: 14.3293 m2*year; lognormal variance with pedigree 0.0801, pedigree (1,2,5,1,1)
  Modelled, based on "Agricultural Buildings" - pdf-document on the dedicated talk page of ecoinvent (www.ecoinvent.org/talk-pages)
- Transformation, to urban, discontinuously built [natural resource, land]: 0.286585 m2; lognormal variance with pedigree 0.1601, pedigree (1,2,5,1,1)
  (same comment as for Occupation, urban, discontinuously built)
- Occupation, construction site [natural resource, land]: 0.286585 m2*year; lognormal variance with pedigree 0.0801, pedigree (1,2,5,1,1)
  (same comment as for Occupation, urban, discontinuously built)
- Transformation, from pasture, man made [natural resource, land]: 0.286585 m2; lognormal variance with pedigree 0.1601, pedigree (1,2,5,1,1)
  (same comment as for Occupation, urban, discontinuously built)

## Sampling procedure
The inventory is calculated based on a solid database of agricultural buildings.

## Review by Roland Hischier 2003-08-06
Passed.

## Review by Roland Hischier 2011-09-28
Transfer of documentation done.
