# hard coal preparation plant construction

Dataset: EcoSpold 2, unit process
Geography: GLO
Time period: 2000-01-01 to 2020-12-31
Technology level: current
Classification: ISIC rev.4 ecoinvent: 4290:Construction of other civil engineering projects
Synonyms: washery
Scenario: Business-as-Usual
System model: Allocation at the point of substitution
Generated by: Florentine Brunner
Database: ecoinvent
isCopyrightProtected: true
accessRestrictedTo: 1

## General comment
"This activity describes the infrastructure required for the preparation (screening, crushing, washing etc.) of run-of-mine (R.O.M) hard coal. Data for land use is based on information from specific plants. Material requirements are based on generic estimates.
The average annual capacity of coal washeries (for thermal coal) of 4.38 million metric tonnes is based on information from 9 plants. The average lifetime of the plants is estimated to be 30 years.

## Included activities start
Includes the area of the infrastructure (buildings, paved roads, etc.), the machines and buildings used for the hard coal preperation. Energy requirements for the construction as well as end of life treatment of buildings and industrial machinery are accounted for in the respective upstream activities (building construction multi-storey/hall, industrial machine construction).

## Included activities end
Does not include the operation of the plant.

## Geography
Data for land use and plant capacity are based on Indian reports. Material input data is based on generic estimates.

## Technology
The datasets represtents an average hard coal preperation plant, as operational in India in 2007/2008. Reference(s): Ministry of Environment & Forests, Government of India. 2010. Environmental Impact Assessment Guidance Manual for Coal Washeries. Online from http://envfor.nic.in/sites/default/files/Coal%20washeries_may-10_0.pdf, September 8, 2017

## Time period
Data of plants operational in 2007/2008 are used in this dataset. With an average life time of 30 years it can be assumed that this represent the current technology level at least until 2020.

## Reference product
- hard coal preparation plant: 1 unit; By-product classification allocatable product; CPC 53261: Mining constructions
  production volume 4 unit
    This is a placeholder value.
  property price 1.2485e6 EUR2005
    Calculated based on inputs: The price of the product has been calculated as a sum of the values of the material and energy inputs for this product. This value is therefore a rough estimation. It may underestimate the real price since there are additional expenses when producing any product. These expences can include for example labour costs, treatment of waste materials and profit for the producer. Please consider carefully whether this level of data quality is acceptable for your application.
  property lifetime capacity [kg] 1.314e11 kg; = lifetime_hard_coal_prep*4.38*10^9
    The average annual capacity of hard coal preperation plants of 4.38 million metric tonnes (Ministry of Environment & Forests, Government of India. 2010. Environmental Impact Assessment Guidance Manual for Coal Washeries. Online from http://envfor.nic.in/sites/default/files/Coal%20washeries_may-10_0.pdf, September 8, 2017) multiplied by the lifetime.
  property lifetime 30 year; name lifetime_hard_coal_prep
    Estimation.

## Inputs from technosphere
- industrial machine, heavy, unspecified: 0 kg; pedigree (1,1,1,1,1)
  For the lack of data available an estimate for the weight of the typical equiment found in a coal preperation plant (including screens, breakers, crushers, hydrocyclones, launders, concentration tablesm jigs) was made to be 800 metric tonnes.
- building, hall, steel construction: 3000 m2; lognormal variance with pedigree 0.51, pedigree (5,5,5,5,5)
  Estimated value based on the assumptions made the ecoinvent v3.3 dataset for gravel/sand quarry construction.
- building, multi-storey: 3120 m3; lognormal variance with pedigree 0.51, pedigree (5,5,5,5,5)
  Estimated value based on the assumptions made the ecoinvent v3.3 dataset for gravel/sand quarry construction: area of building 520m2, hight 6m resulting in a building volume of 3120m3.
- industrial machine, heavy, unspecified: 264474, 535526 kg (2 entries); lognormal variance with pedigree 0.51, pedigree (5,5,5,5,5)
  (same comment as for industrial machine, heavy, unspecified)

## Inputs from nature
- Transformation, from unspecified [natural resource, land]: 67125 m2; = (60750+73500)/2; lognormal variance with pedigree 0.33, pedigree (5,5,5,5,5)
  Based on data for occupied area from two EIA reports for coal washery plant projects in India (6.075ha with capacity of 5Mt/a and 7.35ha with capacity of 4.8Mt/a. It is assumed that land use for this type of plants is similar across geographies. No information available on the lifetime of the plants. An estimation had to be made to calculate the specific land transformation. A lifetime of the plant of 30 years can be assumed.
  Reference(s):
  Min Mec Consultancy Pvt. Ltd. (2008). Executive summary of rapid environmental impact assessment and environmental management plan for Binjhri Washery expansion plant at Korba, Chattisgharh
  Chattisgharh Environmental Conservation Board (n.d.) Executive Summary. Rapid Environmental Impact Assessment for Proposal of Coal Washery Plant at Jhaber, Tahsil Dipka, Korba (CG)
- Occupation, industrial area [natural resource, land]: 2.01375e6 m2*year; = (60750+73500)/2*lifetime_hard_coal_prep; lognormal variance with pedigree 0.25, pedigree (5,5,5,5,5)
  Based on data for occupied area from two EIA reports for coal washery plant projects in India (6.075ha with capacity of 5Mt/a and 7.35ha with capacity of 4.8Mt/a. It is assumed that land use for this type of plants is similar across geographies. Reference(s):
  Min Mec Consultancy Pvt. Ltd. (2008). Executive summary of rapid environmental impact assessment and environmental management plan for Binjhri Washery expansion plant at Korba, Chattisgharh
  Chattisgharh Environmental Conservation Board (n.d.) Executive Summary. Rapid Environmental Impact Assessment for Proposal of Coal Washery Plant at Jhaber, Tahsil Dipka, Korba (CG)
- Transformation, to industrial area [natural resource, land]: 67125 m2; = (60750+73500)/2; lognormal variance with pedigree 0.33, pedigree (5,5,5,5,5)
  Based on data for occupied area from two EIA reports for coal washery plant projects in India (6.075ha with capacity of 5Mt/a and 7.35ha with capacity of 4.8Mt/a. It is assumed that land use for this type of plants is similar across geographies. No information available on the lifetime of the plants. An estimation had to be made to calculate the specific land transformation. A lifetime of the plant of 30 years can be assumed.

## Sampling procedure
Based on literature and estimates.

## Extrapolations
Data are partially based on information specific to the Indian context (land use, capacity) and assumed representative also for the global dataset.

## Review by Sirje Vares 2017-10-12
This average, steel framed, hard coal preparation plant construction dataset is accepted to the EcoInvent database submission.
