# pump production, 40W

Dataset: EcoSpold 2, unit process
Geography: RoW
Time period: 1994-01-01 to 2019-12-31
Technology level: current
Classification: EcoSpold01Categories: solar collector systems/production of components
Classification: ISIC rev.4 ecoinvent: 2812:Manufacture of fluid power equipment
Tags: ConvertedDataset
Scenario: Business-as-Usual
System model: Allocation at the point of substitution
Generated by: Niels Jungbluth
Published in: Jungbluth, N. 2007
Database: ecoinvent
isCopyrightProtected: true
accessRestrictedTo: 1

## General comment
Water pump Grundfos UP 15-35x20 with a capacity of 40W for use in solar collector systems.
[This dataset was already contained in the ecoinvent database version 2. It was not individually updated during the transfer to ecoinvent version 3. Life Cycle Impact Assessment results may still have changed, as they are affected by changes in the supply chain, i.e. in other datasets. This dataset was generated following the ecoinvent quality guidelines for version 2. It may have been subject to central changes described in the ecoinvent version 3 change report (http://www.ecoinvent.org/database/ecoinvent-version-3/reports-of-changes/), and the results of the central updates were reviewed extensively. The changes added e.g. consistent water flows and other information throughout the database. The documentation of this dataset can be found in the ecoinvent reports of version 2, which are still available via the ecoinvent website. The change report linked above covers all central changes that were made during the conversion process.]

## Included activities end
Production and disposal of a water pump. Including materials. Not including energy use of production and infrastructure for factory.

## Geography
Pump produced in CH.

## Technology
Circulating pump for heat exchange fluid in solar collector systems for a one family dwelling.

## Time period
Time of weighting the different parts of the pump.

## Reference product
- pump, 40W: 1 unit; By-product classification allocatable product; CPC 432: Pumps, compressors, hydraulic and pneumatic power engines, and valves, and parts thereof
  EcoSpold01Location=CH
  production volume 3.96633 unit
    This is a placeholder value that does not reflect real-world production volumes. This dataset does not currently require a real-world production volume to work in the database framework, and no actual data were collected yet. This has no negative effect on the results of the ecoinvent database.
  property price 13.6 EUR2005
    EU27 I/O database, the price of "_66 machinery and equipment n.e.c., EU27" (in the 'EU & DK Input Output Database' (available in SimaPro))(5.71 Euro/kg DS); 2.4 kg/unit
  property true value 13.6
    allocation property applied in "true value" allocation // value calculated from revenue

## By-products
- electricity, for reuse in municipal waste incineration only: 0 kWh; CPC 17100: Electrical energy; By-product classification allocatable product; pedigree (1,1,1,1,1)
  Net electricity generated from this waste and used in internal MSWI plant energy redistribution.
  Uncertainty: uncertainty is calculated from uncertainties in waste composition and uncertainties in energy efficiency and the uncertainty in internal energy demand
  production volume 0.00773557 kWh
  property true value relation 3.6; name E_el_prod_MSWI_true_value_relation
    property to calculate "true value" from
  property exergy 3.6 MJ; name E_el_prod_MSWI_exergy
    This exergy property is based on the exergy content of the product.
  property price 0.1 EUR2005; name E_el_prod_MSWI_price_EUR2005
    Estimated to be the same price as in case of electricity, medium voltage.
  property true value 0.000247304
    allocation property applied in "true value" allocation // value calculated from true value relation
- heat, for reuse in municipal waste incineration only: 0 MJ; CPC 17300: Steam and hot water; By-product classification allocatable product; pedigree (1,1,1,1,1)
  (same comment as for electricity, for reuse in municipal waste incineration only)
  production volume 0.0633695 MJ
  property exergy 0.1842 MJ; name E_th_prod_MSWI_exergy
    This exergy property is based on the exergy content of the product.
  property true value relation 0.1842; name E_th_prod_MSWI_true_value_relation
    property to calculate "true value" from
  property price 0.0106 EUR2005; name E_th_prod_MSWI_price_EUR2005
    Average European district heat price from Ecoheatcool and Euroheat 2005-2006, Ecoheat Work package 1: The European heat market. Final report. 10.6 EUR/GJ i s the price of district heat. http://www.solarthermalworld.org/files/Ecoheatcool%20WP1%20Web.pdf?download
  property true value 0.000103486
    (same comment as for electricity, for reuse in municipal waste incineration only)

## Inputs from technosphere
- cast iron: 1.19997 kg; lognormal variance with pedigree 0.0706, pedigree (2,5,5,5,1)
  EcoSpold01Location=RER
  Own measurement
  Uncertainty: Own measurement
  properties: dry mass 1 kg, carbon content, fossil 0.04, wet mass 1 kg
  note on carbon content, fossil: Cast iron is made by remelting pig iron in small furnaces (e.g. cupola furnaces or electric arc furnaces) and poured into moulds to make castings. It usually contains 2% to 6% carbon (ecoinvent v2.2 report 10_partII). An average content of 4% was considered
- aluminium, wrought alloy: 0.0199995 kg; lognormal variance with pedigree 0.0706, pedigree (2,5,5,5,1)
  EcoSpold01Location=RER
  Own measurement
  Uncertainty: Own measurement
  properties: wet mass 1 kg, dry mass 1 kg
- polyvinylchloride, suspension polymerised: 0.0261695 kg; lognormal variance with pedigree 0.0706, pedigree (2,5,5,5,1)
  EcoSpold01Location=RER
  Own measurement
  Uncertainty: Own measurement
  properties: carbon content, fossil 0.387097, dry mass 1 kg, wet mass 1 kg
  note on carbon content, fossil: Monomer is vynyl chloride, C2H3Cl (ecoinvent v2.2 report 11_II). MW=62 g/mol
- synthetic rubber: 0.00699982 kg; lognormal variance with pedigree 0.0706, pedigree (2,5,5,5,1)
  Own measurement
  EcoSpold01Location=RER
  Uncertainty: Own measurement
  properties: carbon content, fossil 0.871949, dry mass 1 kg, wet mass 1 kg
  note on carbon content, fossil: EPDM (Ethylene-propene-diene terpolymer) rubber is a terpolymer of ethylene, propene, and a diene with the residual unsaturated portion of the diene in the side chain (ecoinvent v2.2 report 7-part XX & Ullmann). Chemical formula (deduced from Evidences of Solvent-Induced Miscibility in Polychloroprene-co-Ethylene-Propene Diene Terpolymer Blends, Dubey et al., Journal of Applied Polymer Science, 2009, 111:1884–1891): C20H35
- waste polyvinylchloride product: 0 kg; pedigree (1,1,1,1,1)
  EcoSpold01Location=CH
  Estimation
  Uncertainty: Estimation
  production volume 0 kg
    Calculated from the production volume of pump, 40W in proportion to the respective output amounts.
  properties: carbon content, fossil 0.440882, water content 0.00200401, dry mass 0.998 kg, wet mass 1 kg
- copper: 0.249994 kg; lognormal variance with pedigree 0.0706, pedigree (2,5,5,5,1)
  Own measurement
  EcoSpold01Location=RER
  Uncertainty: Own measurement
  properties: dry mass 1 kg, wet mass 1 kg
- hot water tank factory: 1.99995e-7 unit; lognormal variance with pedigree 0.65, pedigree (5,5,5,5,5)
  EcoSpold01Location=CH
  Rough estimation
  Uncertainty: Rough estimation
- polyvinylchloride, emulsion polymerised: 0.0038297 kg; lognormal variance with pedigree 0.0706, pedigree (2,5,5,5,1)
  EcoSpold01Location=RER
  Own measurement
  Uncertainty: Own measurement
  properties: wet mass 1 kg, carbon content, fossil 0.387097, dry mass 1 kg
- steel, chromium steel 18/8, hot rolled: 0.919976 kg; lognormal variance with pedigree 0.0706, pedigree (2,5,5,5,1)
  Own measurement
  EcoSpold01Location=RER
  Uncertainty: Own measurement
  properties: wet mass 1 kg, carbon content, fossil 0.0008, dry mass 1 kg
  note on carbon content, fossil: Stainless steel model is the grade 304 steel (18/8 stainless, 18% chromium 8% nickel; max. 0.08% C)
- waste plastic, mixture: 0 kg; pedigree (1,1,1,1,1)
  Estimation
  EcoSpold01Location=CH
  Uncertainty: Estimation
  production volume 0 kg
    (same comment as for waste polyvinylchloride product)
  properties: dry mass 0.847 kg, water content 0.180638, carbon content, fossil 0.747344, wet mass 1 kg
  note on carbon content, fossil: C content in 1 kg DM was calculated using data in Tab A.2, ecoinvent v2.2 report 13_I
- waste polyvinylchloride product: -0.00839545, -0.0216038 kg (2 entries); lognormal variance with pedigree 0.0706, pedigree (2,5,5,5,1)
  EcoSpold01Location=CH
  Estimation
  Uncertainty: Estimation
  production volume 0.09 kg
- waste plastic, mixture: -0.000778673, -5.20279e-5, -3.93479e-6, -2.14894e-5, -8.68147e-6, -2.04062e-5, -0.000663466, -0.00545114 kg (8 entries); lognormal variance with pedigree 0.0706, pedigree (2,5,5,5,1)
  Estimation
  EcoSpold01Location=CH
  Uncertainty: Estimation
  production volume 0.021 kg

## Sampling procedure
Own weighting of the different parts of the pump.

## Extrapolations
None This dataset has been copied from an original dataset covering the geography CH. The uncertainty has been adjusted accordingly.

## Review by Sebastiano Meier 2003-07-29
Passed.
