# treatment of waste polyvinylchloride, unsanitary landfill, dry infiltration class (100mm)

Dataset: EcoSpold 2, unit process
Geography: GLO
Time period: 2006-01-01 to 2019-12-31
Technology level: current
Classification: ISIC rev.4 ecoinvent: 3821:Treatment and disposal of non-hazardous waste
Synonyms: municipal waste landfill
Scenario: Business-as-Usual
System model: Allocation at the point of substitution
Share of production covered: 1 %
Generated by: Avraam Symeonidis
Database: ecoinvent
isCopyrightProtected: true
accessRestrictedTo: 1

## General comment
This dataset represents the activity of waste disposal of waste polyvinylchloride in a unsanitary landfill. Recommended use of this dataset: For PVC, which goes to disposal as part of managed communal waste mixture. // Waste composition (wet, in ppm): upper heating value 21.67 MJ/kg; lower heating value 21.51 MJ/kg; H2O 2000; O 16911; H 54921; C 440610; S 1057; N 1057; P n.a.; B n.a.; Cl 475290; Br 73.839; F 15.506; I n.a.; Ag n.a.; As 2.0042; Ba 196.73; Cd 2.7546; Co 33.322; Cr 43.106; Cu 28.223; Hg 0.89569; Mn 84.301; Mo n.a.; Ni 21.729; Pb 16.002; Sb 45.323; Se 2.2152; Sn 391.41; V 303.95; Zn 59.775; Be 0.52742; Sc n.a.; Sr 93.353; Ti 1054.8; Tl 0.42194; W n.a.; Si n.a.; Fe 3930; Ca n.a.; Al 210.97; K n.a.; Mg n.a.; Na 1545.9; . // Share of carbon in waste that is biogenic 0%. Share of metals in waste not oxidised and bulk-recyclable (exclude very small or thin parts) Iron: 0%; Alu: 0%; Copper: 0%. Overall degradability of waste during 100 years: 1%.

## Included activities start
from final waste deposition (without transports to the site)

## Included activities end
Waste-specific short-term emissions to air via landfill gas and landfill leachate. Waste-specific long-term emissions from landfill.

## Geography
Given name of landfill location is 'infiltration class 2 dry (2018)'. Landfill site with mean annual temperature (MAT) of 8 degC, mean annual precipitation (MAP) of 550 mm/year, and net infiltration of 100 mm/year.
Climate adjustments result in an alpha t (temperature) for permafrost areas of 0.999. Total climate adjustments with alpha pt of 0.999.

## Technology
This is an inventory for an unsanitary, sub-controlled landfill for municipal solid waste. Ultimate average landfill height is 15 meters. Operation phase duration is 25 years.Percentage of landfill gas directly emitted is 100w%.
Leachate of the landfill is not treated. Based on average waste composition and climate data the end of carbonate phase is estimated to be reached 16577 years after waste deposition.

## Reference product
- waste polyvinylchloride: -1 kg; By-product classification Waste; CPC 39270: Waste, parings and scrap of plastics; CAS 9002-86-2; pedigree (1,1,1,1,1)
  main reference product of this activity (supply of disposal service).
  Uncertainty: Uncertainty is not adjusted, as this is the refence product
  production volume 1 kg
    The amount of the annual production volume is a placeholder value. The contribution of this technology to the different local markets can be found in the markets themselves.
  property price 0 EUR2005
    Waste products are assigned a price of zero as they are assumed to require further treatment.
  property carbon content 0.44149
    carbon content on a dry matter basis (reserved; not for manual entry)
  properties: vanadium content 0.00030456, mercury content 8.9749e-7, water in wet mass 0.002 kg, copper content 2.828e-5, manganese content 8.447e-5, nickel content 2.1772e-5, wet mass 1 kg, beryllium content 5.2848e-7, chromium content 4.3192e-5, cadmium content 2.7601e-6, water content 0.002004, selenium content 2.2196e-6, zinc content 5.9894e-5, iron content 0.0039379, tin content 0.0003922, aluminium content 0.00021139, cobalt content 3.3389e-5, sodium content 0.001549, strontium content 9.354e-5, antimony content 4.5414e-5, lead content 1.6034e-5, thallium content 4.2278e-7, titanium content 0.001057, carbon content, fossil 0.44149, dry mass 0.998 kg, sulfur content 0.0010591, fluorine content 1.5537e-5, heating value, net 21.513 MJ, oxygen content 0.016945, chlorine content 0.47624, barium content 0.00019712, heating value, gross 21.673 MJ, hydrogen content 0.055031, nitrogen content 0.0010591, arsenic content 2.0082e-6, bromine content 7.3987e-5, carbon allocation 0.440607 kg

## Inputs from technosphere
- excavation, skid-steer loader: 0.00031708 m3; lognormal variance with pedigree 0.082256, pedigree (1,1,3,1,1)
  application of daily cover.
  Uncertainty: Uncertainty calculated from uncertainty in base parameters.
- diesel, burned in building machine: 0.046738 MJ; lognormal variance with pedigree 0.082256, pedigree (1,1,3,1,1)
  for waste distribution and compaction.
  Uncertainty: Uncertainty calculated from uncertainty in base parameters.

## Emissions to nature
- Manganese [water, ground-, long-term]: 8.3336e-5 kg; lognormal variance with pedigree 0.24819, pedigree (1,1,3,1,1)
  Emissions from long-term leachate (>100a) directly from MSW landfill and indirectly via incineration of treatement sludge from leachate treatement.
  Uncertainty: Uncertainty calculated depending on waste input and uncertainty of long-term transfer coefficents in landfill.
- Beryllium [air, non-urban air or from high stacks]: 7.6566e-14 kg; lognormal variance with pedigree 0.86655, pedigree (1,1,3,1,1)
  burden from direct release or incineration of landfill biogas; or windblown leachate evaporite in arid climates.
  Uncertainty: Uncertainty calculated from unertainty of the waste composition of this waste, uncertainty in waste decomposition and short-term leaching in landfill
- Strontium [water, ground-]: 5.4209e-8 kg; lognormal variance with pedigree 0.42571, pedigree (1,1,3,1,1)
  burden from short-term leachate to groundwater in uncontrolled landfill in moist cimate.
  Uncertainty: Uncertainty calculated from unertainty of the waste composition of this waste, uncertainty in waste decomposition and short-term leaching in landfill
- Cobalt [water, ground-, long-term]: 3.3215e-5 kg; lognormal variance with pedigree 0.27907, pedigree (1,1,3,1,1)
  (same comment as for Manganese)
- Zinc [air, non-urban air or from high stacks]: 6.2852e-12 kg; lognormal variance with pedigree 0.72134, pedigree (1,1,3,1,1)
  (same comment as for Beryllium)
- Beryllium [water, ground-]: 3.0626e-10 kg; lognormal variance with pedigree 0.59592, pedigree (1,1,3,1,1)
  (same comment as for Strontium)
- Copper, ion [water, ground-, long-term]: 2.8222e-5 kg; lognormal variance with pedigree 0.28459, pedigree (1,1,3,1,1)
  (same comment as for Manganese)
- Vanadium [air, non-urban air or from high stacks]: 8.0038e-11 kg; lognormal variance with pedigree 0.63828, pedigree (1,1,3,1,1)
  (same comment as for Beryllium)
- Titanium, ion [water, ground-]: 5.2666e-7 kg; lognormal variance with pedigree 0.35052, pedigree (1,1,3,1,1)
  (same comment as for Strontium)
- Cadmium, ion [water, ground-, long-term]: 2.7497e-6 kg; lognormal variance with pedigree 0.36137, pedigree (1,1,3,1,1)
  (same comment as for Manganese)
- Tin [air, non-urban air or from high stacks]: 5.7593e-12 kg; lognormal variance with pedigree 0.71996, pedigree (1,1,3,1,1)
  (same comment as for Beryllium)
- Vanadium, ion [water, ground-]: 3.2015e-7 kg; lognormal variance with pedigree 0.36711, pedigree (1,1,3,1,1)
  (same comment as for Strontium)
- Chromium VI [water, ground-, long-term]: 6.601e-7 kg; lognormal variance with pedigree 1.362, pedigree (1,1,3,1,1)
  (same comment as for Manganese)
- Selenium [air, non-urban air or from high stacks]: 5.833e-13 kg; lognormal variance with pedigree 0.80119, pedigree (1,1,3,1,1)
  (same comment as for Beryllium)
- Tin, ion [water, ground-]: 2.3037e-8 kg; lognormal variance with pedigree 0.45365, pedigree (1,1,3,1,1)
  (same comment as for Strontium)
- Arsenic, ion [water, ground-, long-term]: 2.0006e-6 kg; lognormal variance with pedigree 0.37176, pedigree (1,1,3,1,1)
  (same comment as for Manganese)
- Lead [air, non-urban air or from high stacks]: 3.1392e-13 kg; lognormal variance with pedigree 0.81733, pedigree (1,1,3,1,1)
  (same comment as for Beryllium)
- Zinc, ion [water, ground-]: 2.8283e-8 kg; lognormal variance with pedigree 0.44725, pedigree (1,1,3,1,1)
  (same comment as for Strontium)
- Barium [water, ground-, long-term]: 0.00019448 kg; lognormal variance with pedigree 0.22001, pedigree (1,1,3,1,1)
  (same comment as for Manganese)
- Antimony [air, non-urban air or from high stacks]: 1.1935e-11 kg; lognormal variance with pedigree 0.70154, pedigree (1,1,3,1,1)
  (same comment as for Beryllium)
- Selenium [water, ground-]: 2.3332e-9 kg; lognormal variance with pedigree 0.53002, pedigree (1,1,3,1,1)
  (same comment as for Strontium)
- Chloride [water, ground-, long-term]: 0.46316 kg; lognormal variance with pedigree 0.0060041, pedigree (1,1,3,1,1)
  (same comment as for Manganese)
- Nickel [air, non-urban air or from high stacks]: 3.1544e-12 kg; lognormal variance with pedigree 0.74483, pedigree (1,1,3,1,1)
  (same comment as for Beryllium)
- Antimony [water, ground-]: 4.7738e-8 kg; lognormal variance with pedigree 0.43037, pedigree (1,1,3,1,1)
  (same comment as for Strontium)
- Bromine [water, ground-, long-term]: 7.1956e-5 kg; lognormal variance with pedigree 0.25262, pedigree (1,1,3,1,1)
  (same comment as for Manganese)
- Manganese [air, non-urban air or from high stacks]: 2.4109e-10 kg; lognormal variance with pedigree 0.60413, pedigree (1,1,3,1,1)
  (same comment as for Beryllium)
- Nickel, ion [water, ground-]: 1.2618e-8 kg; lognormal variance with pedigree 0.47419, pedigree (1,1,3,1,1)
  (same comment as for Strontium)
- Fluoride [water, ground-, long-term]: 1.5436e-5 kg; lognormal variance with pedigree 0.30446, pedigree (1,1,3,1,1)
  (same comment as for Manganese)
- Mercury [air, non-urban air or from high stacks]: 2.4513e-10 kg; lognormal variance with pedigree 0.60354, pedigree (1,1,3,1,1)
  (same comment as for Beryllium)
- Lead [water, ground-]: 9.4176e-10 kg; lognormal variance with pedigree 0.55986, pedigree (1,1,3,1,1)
  (same comment as for Strontium)
- Nitrite [water, ground-, long-term]: 2.2871e-5 kg; lognormal variance with pedigree 0.16461, pedigree (1,1,3,1,1)
  (same comment as for Manganese)
- Chromium [air, non-urban air or from high stacks]: 1.2269e-12 kg; lognormal variance with pedigree 0.77295, pedigree (1,1,3,1,1)
  (same comment as for Beryllium)
- Manganese [water, ground-]: 9.6435e-7 kg; lognormal variance with pedigree 0.33534, pedigree (1,1,3,1,1)
  (same comment as for Strontium)
- Nitrate [water, ground-, long-term]: 4.4192e-5 kg; lognormal variance with pedigree 0.16461, pedigree (1,1,3,1,1)
  (same comment as for Manganese)
- Cadmium [air, non-urban air or from high stacks]: 3.2275e-11 kg; lognormal variance with pedigree 0.67113, pedigree (1,1,3,1,1)
  (same comment as for Beryllium)
- Mercury [water, ground-]: 6.1283e-10 kg; lognormal variance with pedigree 0.57347, pedigree (1,1,3,1,1)
  (same comment as for Strontium)
- Nitrogen, organic bound [water, ground-, long-term]: 0.00068681 kg; lognormal variance with pedigree 0.16461, pedigree (1,1,3,1,1)
  (same comment as for Manganese)
- Copper [air, non-urban air or from high stacks]: 3.9441e-13 kg; lognormal variance with pedigree 0.80892, pedigree (1,1,3,1,1)
  (same comment as for Beryllium)
- Copper, ion [water, ground-]: 1.3804e-9 kg; lognormal variance with pedigree 0.54715, pedigree (1,1,3,1,1)
  (same comment as for Strontium)
- Sulfate [water, ground-, long-term]: 0.0029406 kg; lognormal variance with pedigree 0.1646, pedigree (1,1,3,1,1)
  (same comment as for Manganese)
- Cobalt [air, non-urban air or from high stacks]: 2.6744e-11 kg; lognormal variance with pedigree 0.67614, pedigree (1,1,3,1,1)
  (same comment as for Beryllium)
- Cobalt [water, ground-]: 1.0698e-7 kg; lognormal variance with pedigree 0.405, pedigree (1,1,3,1,1)
  (same comment as for Strontium)
- Hydrogen sulfide [water, ground-, long-term]: 7.6653e-5 kg; lognormal variance with pedigree 0.1646, pedigree (1,1,3,1,1)
  (same comment as for Manganese)
- Barium [air, non-urban air or from high stacks]: 5.6261e-10 kg; lognormal variance with pedigree 0.57595, pedigree (1,1,3,1,1)
  (same comment as for Beryllium)
- Chromium VI [water, ground-]: 4.9076e-9 kg; lognormal variance with pedigree 0.50511, pedigree (1,1,3,1,1)
  (same comment as for Strontium)
- Ammonium, ion [water, ground-, long-term]: 0.00042021 kg; lognormal variance with pedigree 0.16461, pedigree (1,1,3,1,1)
  (same comment as for Manganese)
- Arsenic [air, non-urban air or from high stacks]: 5.0405e-11 kg; lognormal variance with pedigree 0.65632, pedigree (1,1,3,1,1)
  (same comment as for Beryllium)
- Barium [water, ground-]: 2.2504e-6 kg; lognormal variance with pedigree 0.30715, pedigree (1,1,3,1,1)
  (same comment as for Strontium)
- TOC, Total Organic Carbon [water, ground-, long-term]: 0.43621 kg; lognormal variance with pedigree 0.0067843, pedigree (1,1,3,1,1)
  (same comment as for Manganese)
- Bromine [air, non-urban air or from high stacks]: 2.6036e-8 kg; lognormal variance with pedigree 0.44988, pedigree (1,1,3,1,1)
  (same comment as for Beryllium)
- Cadmium, ion [water, ground-]: 4.8413e-9 kg; lognormal variance with pedigree 0.50642, pedigree (1,1,3,1,1)
  (same comment as for Strontium)
- COD, Chemical Oxygen Demand [water, ground-, long-term]: 0.4771 kg; lognormal variance with pedigree 0.0067843, pedigree (1,1,3,1,1)
  (same comment as for Manganese)
- Hydrogen chloride [air, non-urban air or from high stacks]: 0.00017232 kg; lognormal variance with pedigree 0.20326, pedigree (1,1,3,1,1)
  (same comment as for Beryllium)
- Fluoride [water, ground-]: 1.1378e-8 kg; lognormal variance with pedigree 0.47774, pedigree (1,1,3,1,1)
  (same comment as for Strontium)
- DOC, Dissolved Organic Carbon [water, ground-, long-term]: 0.43621 kg; lognormal variance with pedigree 0.0067843, pedigree (1,1,3,1,1)
  (same comment as for Manganese)
- Hydrogen fluoride [air, non-urban air or from high stacks]: 6.1736e-8 kg; lognormal variance with pedigree 0.42526, pedigree (1,1,3,1,1)
  (same comment as for Beryllium)
- Bromine [water, ground-]: 1.8572e-6 kg; lognormal variance with pedigree 0.31726, pedigree (1,1,3,1,1)
  (same comment as for Strontium)
- BOD5, Biological Oxygen Demand [water, ground-, long-term]: 0.11295 kg; lognormal variance with pedigree 0.0067843, pedigree (1,1,3,1,1)
  (same comment as for Manganese)
- Nitrogen oxides [air, non-urban air or from high stacks]: 1.4479e-8 kg; lognormal variance with pedigree 0.32355, pedigree (1,1,3,1,1)
  burden from direct release or incineration of landfill biogas.
  Uncertainty: Uncertainty calculated from unertainty of the waste composition of this waste, uncertainty in waste decomposition and short-term leaching in landfill
- Chloride [water, ground-]: 0.011955 kg; lognormal variance with pedigree 0.070646, pedigree (1,1,3,1,1)
  (same comment as for Strontium)
- Sulfur dioxide [air, non-urban air or from high stacks]: 1.3777e-6 kg; lognormal variance with pedigree 0.34174, pedigree (1,1,3,1,1)
  (same comment as for Nitrogen oxides)
- Arsenic, ion [water, ground-]: 3.5955e-9 kg; lognormal variance with pedigree 0.51614, pedigree (1,1,3,1,1)
  (same comment as for Strontium)
- Methane, fossil [air, non-urban air or from high stacks]: 0.0031875 kg; lognormal variance with pedigree 0.10984, pedigree (1,1,3,1,1)
  (same comment as for Nitrogen oxides)
- Nitrite [water, ground-]: 5.4749e-7 kg; lognormal variance with pedigree 0.23132, pedigree (1,1,3,1,1)
  (same comment as for Strontium)
- Carbon dioxide, fossil [air, non-urban air or from high stacks]: 0.006901 kg; lognormal variance with pedigree 0.099708, pedigree (1,1,3,1,1)
  (same comment as for Nitrogen oxides)
- Nitrate [water, ground-]: 1.0579e-6 kg; lognormal variance with pedigree 0.23132, pedigree (1,1,3,1,1)
  (same comment as for Strontium)
- Sodium, ion [water, ground-, long-term]: 0.001482 kg; lognormal variance with pedigree 0.1523, pedigree (1,1,3,1,1)
  (same comment as for Manganese)
- Ammonium, ion [water, ground-]: 1.0059e-5 kg; lognormal variance with pedigree 0.23132, pedigree (1,1,3,1,1)
  (same comment as for Strontium)
- Occupation, dump site [natural resource, land]: 0.0023333 m2*year; lognormal variance with pedigree 0.082256, pedigree (1,1,3,1,1)
  for landfill operation phase and spontaneous renaturation.
  Uncertainty: Uncertainty calculated from uncertainty in base parameters.
- Nitrogen, organic bound [water, ground-]: 1.6441e-5 kg; lognormal variance with pedigree 0.23132, pedigree (1,1,3,1,1)
  (same comment as for Strontium)
- Aluminium [water, ground-, long-term]: 0.00021086 kg; lognormal variance with pedigree 0.21769, pedigree (1,1,3,1,1)
  (same comment as for Manganese)
- Hydrogen sulfide [water, ground-]: 2.8637e-7 kg; lognormal variance with pedigree 0.28591, pedigree (1,1,3,1,1)
  (same comment as for Strontium)
- Iron, ion [water, ground-, long-term]: 0.0039294 kg; lognormal variance with pedigree 0.12252, pedigree (1,1,3,1,1)
  (same comment as for Manganese)
- COD, Chemical Oxygen Demand [water, ground-]: 0.0001402 kg; lognormal variance with pedigree 0.21039, pedigree (1,1,3,1,1)
  (same comment as for Strontium)
- Beryllium [water, ground-, long-term]: 5.2711e-7 kg; lognormal variance with pedigree 0.415, pedigree (1,1,3,1,1)
  (same comment as for Manganese)
- Sulfate [water, ground-]: 1.0986e-5 kg; lognormal variance with pedigree 0.28591, pedigree (1,1,3,1,1)
  (same comment as for Strontium)
- Strontium [water, ground-, long-term]: 9.3299e-5 kg; lognormal variance with pedigree 0.2448, pedigree (1,1,3,1,1)
  (same comment as for Manganese)
- TOC, Total Organic Carbon [water, ground-]: 0.00012818 kg; lognormal variance with pedigree 0.21039, pedigree (1,1,3,1,1)
  (same comment as for Strontium)
- Titanium, ion [water, ground-, long-term]: 0.0010543 kg; lognormal variance with pedigree 0.16466, pedigree (1,1,3,1,1)
  (same comment as for Manganese)
- DOC, Dissolved Organic Carbon [water, ground-]: 0.00012818 kg; lognormal variance with pedigree 0.21039, pedigree (1,1,3,1,1)
  (same comment as for Strontium)
- Thallium [water, ground-, long-term]: 4.2169e-7 kg; lognormal variance with pedigree 0.42217, pedigree (1,1,3,1,1)
  (same comment as for Manganese)
- Heat, waste [soil, industrial]: 0.14514 MJ; lognormal variance with pedigree 0.073371, pedigree (1,1,3,1,1)
  burden from short-term decomposition of waste (0-100a).
  Uncertainty: Uncertainty calculated from unertainty of the waste composition of this waste, uncertainty in waste decomposition and short-term leaching in landfill
- Vanadium, ion [water, ground-, long-term]: 0.00020942 kg; lognormal variance with pedigree 0.21424, pedigree (1,1,3,1,1)
  (same comment as for Manganese)
- Heat, waste [water, ground-, long-term]: 21.457 MJ; lognormal variance with pedigree 0.014651, pedigree (1,1,3,1,1)
  burden from long-term decomposition of waste (>100a).
  Uncertainty: Uncertainty calculated from unertainty of the waste composition of this waste, uncertainty in waste decomposition and short-term leaching in landfill
- Zinc, ion [water, ground-, long-term]: 5.9746e-5 kg; lognormal variance with pedigree 0.25963, pedigree (1,1,3,1,1)
  (same comment as for Manganese)
- BOD5, Biological Oxygen Demand [water, ground-]: 3.319e-5 kg; lognormal variance with pedigree 0.21039, pedigree (1,1,3,1,1)
  (same comment as for Strontium)
- Tin, ion [water, ground-, long-term]: 0.00039139 kg; lognormal variance with pedigree 0.19721, pedigree (1,1,3,1,1)
  (same comment as for Manganese)
- Sodium [air, non-urban air or from high stacks]: 1.5974e-8 kg; lognormal variance with pedigree 0.46615, pedigree (1,1,3,1,1)
  (same comment as for Beryllium)
- Selenium [water, ground-, long-term]: 1.4951e-6 kg; lognormal variance with pedigree 0.37814, pedigree (1,1,3,1,1)
  (same comment as for Manganese)
- Aluminium [air, non-urban air or from high stacks]: 2.6333e-11 kg; lognormal variance with pedigree 0.674, pedigree (1,1,3,1,1)
  (same comment as for Beryllium)
- Antimony [water, ground-, long-term]: 1.3666e-5 kg; lognormal variance with pedigree 0.35865, pedigree (1,1,3,1,1)
  (same comment as for Manganese)
- Iron [air, non-urban air or from high stacks]: 1.3479e-10 kg; lognormal variance with pedigree 0.61919, pedigree (1,1,3,1,1)
  (same comment as for Beryllium)
- Sodium, ion [water, ground-]: 6.3897e-5 kg; lognormal variance with pedigree 0.20363, pedigree (1,1,3,1,1)
  (same comment as for Strontium)
- Lead [water, ground-, long-term]: 1.6001e-5 kg; lognormal variance with pedigree 0.30342, pedigree (1,1,3,1,1)
  (same comment as for Manganese)
- Thallium [air, non-urban air or from high stacks]: 6.1253e-14 kg; lognormal variance with pedigree 0.87372, pedigree (1,1,3,1,1)
  (same comment as for Beryllium)
- Iron, ion [water, ground-]: 5.3916e-7 kg; lognormal variance with pedigree 0.35094, pedigree (1,1,3,1,1)
  (same comment as for Strontium)
- Nickel, ion [water, ground-, long-term]: 2.1716e-5 kg; lognormal variance with pedigree 0.29327, pedigree (1,1,3,1,1)
  (same comment as for Manganese)
- Titanium [air, non-urban air or from high stacks]: 1.3167e-10 kg; lognormal variance with pedigree 0.62097, pedigree (1,1,3,1,1)
  (same comment as for Beryllium)
- Thallium [water, ground-]: 2.4501e-10 kg; lognormal variance with pedigree 0.60308, pedigree (1,1,3,1,1)
  (same comment as for Strontium)
- Mercury [water, ground-, long-term]: 8.9483e-7 kg; lognormal variance with pedigree 0.39792, pedigree (1,1,3,1,1)
  (same comment as for Manganese)
- Strontium [air, non-urban air or from high stacks]: 1.3552e-11 kg; lognormal variance with pedigree 0.69635, pedigree (1,1,3,1,1)
  (same comment as for Beryllium)
- Aluminium [water, ground-]: 1.0533e-7 kg; lognormal variance with pedigree 0.40354, pedigree (1,1,3,1,1)
  (same comment as for Strontium)

## Extrapolations
This dataset has been extrapolated from year 2012 to the year of the calculation (2019). The uncertainty has been adjusted accordingly.
