# expansion vessel production, 80l

Dataset: EcoSpold 2, unit process
Geography: CH
Time period: 1993-01-01 to 2019-12-31
Technology level: current
Classification: ISIC rev.4 ecoinvent: 2512:Manufacture of tanks, reservoirs and containers of metal
Classification: EcoSpold01Categories: solar collector systems/production of components
Tags: ConvertedDataset
Scenario: Business-as-Usual
System model: Allocation at the point of substitution
Generated by: Niels Jungbluth
Published in: Jungbluth, N. 2007
Database: ecoinvent
isCopyrightProtected: true
accessRestrictedTo: 1

## General comment
Expansion vessel with a capacity of 80l
[This dataset was already contained in the ecoinvent database version 2. It was not individually updated during the transfer to ecoinvent version 3. Life Cycle Impact Assessment results may still have changed, as they are affected by changes in the supply chain, i.e. in other datasets. This dataset was generated following the ecoinvent quality guidelines for version 2. It may have been subject to central changes described in the ecoinvent version 3 change report (http://www.ecoinvent.org/database/ecoinvent-version-3/reports-of-changes/), and the results of the central updates were reviewed extensively. The changes added e.g. consistent water flows and other information throughout the database. The documentation of this dataset can be found in the ecoinvent reports of version 2, which are still available via the ecoinvent website. The change report linked above covers all central changes that were made during the conversion process.]

## Included activities end
Production and disposal of an expansion vessel. Including materials and energy use of production. Not including infrastructure for factory.

## Geography
Production in CH.

## Technology
Expansion vessel (steel body with plastic) for heat exchange fluid used in a solar collector system.

## Time period
Time of information.

## Reference product
- expansion vessel, 80l: 1 unit; CPC 39370: Vessels and other floating structures for breaking up; By-product classification allocatable product
  production volume 0.0336675 unit
    This is a placeholder value that does not reflect real-world production volumes. This dataset does not currently require a real-world production volume to work in the database framework, and no actual data were collected yet. This has no negative effect on the results of the ecoinvent database. The placeholder value of this activity was scaled according to the nominal GDP of 2005 (source: United Nations, http://data.un.org/Glossary.aspx?q=GDP+%28current+US%24%29, accessed 20130726) to reflect an appropriate share of the global production volume, which is also a placeholder value.
  property price 28.8 EUR2005
    The production volume of this product is small compared to other products supplied by the activities within the same ISIC 3 category. Therefore, an average price of products supplied by the activities in the same ISIC 3 code has been applied.This price is obtained as '_65 Fabricated metal products, except machinery, EU27' (3.63 EURO2003/kg dry soilds) in the 'EU & DK Input Output Database' (available in SimaPro); Weight of product according to Ecoinvent: approx 8 kg per unit
  property true value 28.8
    allocation property applied in "true value" allocation // value calculated from revenue

## By-products
- heat, for reuse in municipal waste incineration only: 0 MJ; CPC 17300: Steam and hot water; By-product classification allocatable product; pedigree (1,1,1,1,1)
  Net useful heat generated from this waste and used in internal MSWI plant energy redistribution.
  Uncertainty: uncertainty is calculated from uncertainties in waste composition and uncertainties in energy efficiency and the uncertainty in internal energy demand
  production volume 12.8043 MJ
  property true value relation 0.1842; name E_th_prod_MSWI_true_value_relation
    property to calculate "true value" from
  property exergy 0.1842 MJ; name E_th_prod_MSWI_exergy
    This exergy property is based on the exergy content of the product.
  property price 0.0106 EUR2005; name E_th_prod_MSWI_price_EUR2005
    Average European district heat price from Ecoheatcool and Euroheat 2005-2006, Ecoheat Work package 1: The European heat market. Final report. 10.6 EUR/GJ i s the price of district heat. http://www.solarthermalworld.org/files/Ecoheatcool%20WP1%20Web.pdf?download
  property true value 0.0840483
    allocation property applied in "true value" allocation // value calculated from true value relation
- electricity, for reuse in municipal waste incineration only: 0 kWh; CPC 17100: Electrical energy; By-product classification allocatable product; pedigree (1,1,1,1,1)
  Net electricity generated from this waste and used in internal MSWI plant energy redistribution.
  Uncertainty: uncertainty is calculated from uncertainties in waste composition and uncertainties in energy efficiency and the uncertainty in internal energy demand
  production volume 1.82683 kWh
  property exergy 3.6 MJ; name E_el_prod_MSWI_exergy
    This exergy property is based on the exergy content of the product.
  property true value relation 3.6; name E_el_prod_MSWI_true_value_relation
    property to calculate "true value" from
  property price 0.1 EUR2005; name E_el_prod_MSWI_price_EUR2005
    Estimated to be the same price as in case of electricity, medium voltage.
  property true value 0.23436
    (same comment as for heat, for reuse in municipal waste incineration only)
- zinc concentrate: 0 kg; CPC 14290: Other non-ferrous metal ores and concentrates (other than uranium or thorium ores and concentrates); By-product classification allocatable product
  Calculated value from the knowledge of the properties of both products.
  production volume 0.000449887 kg
  property price 0.38 EUR2005; name ByP_price_EUR2005
    Temporary price data. Calculated as 90% of purchasers price based on: Zinc content in concentrate 53%. Concentrate price per kg Zn 86.5% of refined Zn price (13.5% treatment charges according to CHR Metals Limited 2005: Dynamic cost curves. http://www.minecost.com/dynamic.pdf). 2004 zinc price from USGS (2007) Mineral commodity summaries 2007. <http://minerals.usgs.gov/minerals/pubs/mcs/2007/mcs2007.pdf> [Accessed 25 May 2010]
  property zinc content 0.53; name zinc_C_zinc_concentrate
    Zinc content on a dry matter basis. Value taken from teh "zinc mine operation" /GLO dataset.
  property dry mass 1 kg; name DM_zinc_concentrate
  property carbon content 0
    carbon content on a dry matter basis (reserved; not for manual entry)
  property true value 0.000170957
    allocation property applied in "true value" allocation // value calculated from revenue
  properties: wet mass 1 kg, water content 0, carbon content, non-fossil 0, carbon content, fossil 0, water in wet mass 0 kg, carbon allocation 0 kg
- waste paperboard, sorted: 0 kg; CPC 39240: Waste and scrap of paper or paperboard; By-product classification Recyclable; pedigree (1,1,1,1,1)
  It is assumed that 86.3% (wet weight) of waste paperboard, unsorted is segregated to waste paperboard, sorted. Waste paper, sorted is later used in recycling industry where maximum 79% of it, is transformed into new paperboard.
  production volume 1.5534 kg
  property price 0.0436 EUR2005; name ByP_waste_paperboard_sorted_price_EUR200
    Estimated value; three different sources were used to determine the price for waste paperboard, sorted. 35 AUD/tonne (http://larimer.org/solidwaste/charts/Current.htm, accessed 20130328), 70 GBP/tonne (http://www.letsrecycle.com/prices/waste%20paper, accessed 20130328) and 20 USD/tonne (http://www.oxpaperboard.com/1/post/2013/03/ox-paperboard-announces-price-adjustment-to-uncoated-recycled-paperboard.html, accessed 20130328).
  property water content 0.243781; = WWM_waste_paperboard_sorted/ DM_waste_paperboard_sorted
  property water in wet mass 0.196 kg; name WWM_waste_paperboard_sorted; = WM_waste_paperboard_sorted- DM_waste_paperboard_sorted
  property dry mass 0.804 kg; name DM_waste_paperboard_sorted
  property wet mass 1 kg; name WM_waste_paperboard_sorted
  property carbon content 0.483259
    carbon content on a dry matter basis (reserved; not for manual entry)
  property true value 0.0677282
    allocation property applied in "true value" allocation // value calculated from revenue
  properties: carbon content, non-fossil 0.483259, carbon content, fossil 0, carbon allocation 0.38854 kg

## Inputs from technosphere
- electricity, medium voltage: 16.9723 kWh; lognormal variance with pedigree 0.0506, pedigree (2,1,5,1,1)
  Questionnaire
  Questionnaire
- heat, district or industrial, other than natural gas: 37.6845 MJ; lognormal variance with pedigree 0.0506, pedigree (2,1,5,1,1)
  Questionnaire
  Questionnaire
- steel, low-alloyed, hot rolled: 12.0385 kg; lognormal variance with pedigree 0.0506, pedigree (2,1,5,1,1)
  Questionnaire
  Questionnaire
  properties: carbon content, fossil 0.005, dry mass 1 kg, wet mass 1 kg
  note on carbon content, fossil: Low alloyed steel composition given in Tab. 3.2 ecoinvent v2.2 report 10_partII. Steel assumed to have a C content of 0.5%
- corrugated board box: 1.77618 kg; lognormal variance with pedigree 0.0506, pedigree (2,1,5,1,1)
  Questionnaire
  Questionnaire
  properties: dry mass 0.945 kg, wet mass 1 kg, water content 0.0582011, carbon content, non-fossil 0.432275, carbon content, fossil 0.000656085
  note on carbon content, non-fossil: Biogenic C content was calculated after biogenic C contents of chemicals used in the production of board (Tab 10.15 & 10.16, ecoinvent v2.2 report 11_III, part 10).
  note on carbon content, fossil: Fossil C content was calculated after fossil C contents of chemicals used in the production of board (Tab 10-15 & 10.16 ecoinvent v2.2 report 11_III, part 10)
- alkyd paint, white, without solvent, in 60% solution state: 0.0986764 kg; lognormal variance with pedigree 0.0506, pedigree (2,1,5,1,1)
  Questionnaire
  Questionnaire
  properties: carbon content, non-fossil 0.199629, dry mass 1 kg, carbon content, fossil 0.140367, wet mass 1 kg
  note on carbon content, non-fossil: C content was calculated as an addition of C content in the raw materials.
- waste polypropylene: -0.0690735 kg; lognormal variance with pedigree 0.0506, pedigree (2,1,5,1,1)
  Questionnaire
  Questionnaire
  production volume 0.07 kg
    Calculated from the production volume of expansion vessel, 80l in proportion to the respective output amounts.
  properties: carbon content, fossil 0.825208, dry mass 0.841 kg, wet mass 1 kg, water content 0.189061
  note on carbon content, fossil: C content in 1 kg DM was calculated using data in Tab A.1, ecoinvent v2.2 report 13_I
- hot water tank factory: 3.94706e-7 unit; lognormal variance with pedigree 0.348, pedigree (5,5,5,1,5)
  Rough estimation
  This exchange has an activity link directly to the producing activity because the product is primarily consumed in the same geographical area where it is produced.
- waste paperboard, unsorted: -1.77618 kg; lognormal variance with pedigree 0.0506, pedigree (2,1,5,1,1)
  Questionnaire
  Questionnaire
  production volume 1.8 kg
    (same comment as for waste polypropylene)
  properties: wet mass 1 kg, water content 0.243781, price 0.03924 EUR2005, dry mass 0.804 kg, carbon content, non-fossil 0.483259
  note on carbon content, non-fossil: C content was calculated for 1 kg DM, using data in Tab A.3, ecoinvent v2.2 report 13_I.
- welding, gas, steel: 0.986764 m; lognormal variance with pedigree 0.0506, pedigree (2,1,5,1,1)
  Questionnaire
  Questionnaire
- waste plastic, mixture: -1.57882 kg; lognormal variance with pedigree 0.0506, pedigree (2,1,5,1,1)
  Questionnaire
  Questionnaire
  production volume 1.6 kg
    (same comment as for waste polypropylene)
  properties: dry mass 0.847 kg, water content 0.180638, carbon content, fossil 0.747344, wet mass 1 kg
  note on carbon content, fossil: C content in 1 kg DM was calculated using data in Tab A.2, ecoinvent v2.2 report 13_I
- polypropylene, granulate: 0.0690735 kg; lognormal variance with pedigree 0.0506, pedigree (2,1,5,1,1)
  Questionnaire
  Questionnaire
  properties: wet mass 1 kg, carbon content, fossil 0.857143, dry mass 1 kg
  note on carbon content, fossil: Polypropylene is formed by the polymerisation of propylene, C3H6 (ecoinvent v2.2 report 11_II)
- butyl acrylate: 1.48015 kg; lognormal variance with pedigree 0.0506, pedigree (2,1,5,1,1)
  Questionnaire
  Questionnaire
  properties: wet mass 1 kg, carbon content, fossil 0.756757, dry mass 1 kg

## Sampling procedure
Questionnaire.

## Extrapolations
Estimation that the energy for production is three times higher than for the 25l vessel.

## Review by Sebastiano Meier 2003-07-16
Passed.
