# nuclear fuel element production, for pressure water reactor, UO2 3.9% & MOX

Dataset: EcoSpold 2, unit process
Geography: UCTE
Time period: 2002-01-01 to 2019-12-31
Technology level: current
Classification: ISIC rev.4 ecoinvent: 2011a: Manufacture of nuclear fuels
Classification: EcoSpold01Categories: nuclear power/production
Tags: ConvertedDataset
Scenario: Business-as-Usual
System model: Allocation at the point of substitution
Generated by: Roberto Dones
Published in: Dones, R. 2007
Database: ecoinvent
isCopyrightProtected: true
accessRestrictedTo: 1

## General comment
The shares express the equilibrium between all plutonium in UO2 fuel elements at final discharge from the reactor and MOX use, hypothesizing that this reflects the situation in UCTE countries in the long term. The indication of data validity inputted in "TimePeriod" only says that the shares represent the knowledge available today of the likely fuel management for the UCTE light water reactors.
[This dataset was already contained in the ecoinvent database version 2. It was not individually updated during the transfer to ecoinvent version 3. Life Cycle Impact Assessment results may still have changed, as they are affected by changes in the supply chain, i.e. in other datasets. This dataset was generated following the ecoinvent quality guidelines for version 2. It may have been subject to central changes described in the ecoinvent version 3 change report (http://www.ecoinvent.org/database/ecoinvent-version-3/reports-of-changes/), and the results of the central updates were reviewed extensively. The changes added e.g. consistent water flows and other information throughout the database. The documentation of this dataset can be found in the ecoinvent reports of version 2, which are still available via the ecoinvent website. The change report linked above covers all central changes that were made during the conversion process.]

## Included activities end
The module consists of the share of UO2 and MOX fuel elements.

## Geography
UCTE conditions

## Technology
Data reflects the use of UO2 and MOX fuel elements in current nuclear reactors.

## Reference product
- nuclear fuel element, for pressure water reactor, UO2 3.9% & MOX: 1 kg; By-product classification allocatable product; CPC 33710: Fuel elements (cartridges), non-irradiated, for nuclear reactors
  EcoSpold01Location=UCTE
  production volume 1.00616 kg
    This is a placeholder value that does not reflect real-world production volumes. This dataset does not currently require a real-world production volume to work in the database framework, and no actual data were collected yet. This has no negative effect on the results of the ecoinvent database. The placeholder value of this activity was scaled according to the nominal GDP of 2005 (source: United Nations, http://data.un.org/Glossary.aspx?q=GDP+%28current+US%24%29, accessed 20130726) to reflect an appropriate share of the global production volume, which is also a placeholder value.
  property price 515 EUR2005
    Calculated value based on data from United Nations Commodity Trade Statistics Database (comtrade.un.org). UN comtrade category: 840130 Fuel elements non-irradiated, for nuclear reactors. Year 2005. Using exchange rate of 1EURO = 1.209 USD. Average of price of import into 4 main markets (EU, US, JP and CN).
  property carbon content 0
    carbon content on a dry matter basis (reserved; not for manual entry)
  properties: carbon content, fossil 0, water content 0, water in wet mass 0 kg, carbon content, non-fossil 0, dry mass 1 kg, wet mass 1 kg, carbon allocation 0 kg

## Inputs from technosphere
- uranium, enriched 3.9%, in fuel element for light water reactor: 0.87 kg; lognormal variance with pedigree 0.04, pedigree (1,1,5,1,1)
  own estimation
  EcoSpold01Location=UCTE
  properties: wet mass 1 kg, dry mass 1 kg
- MOX fuel element, for light water reactor: 0.13 kg; lognormal variance with pedigree 0.08, pedigree (1,1,5,1,1)
  EcoSpold01Location=UCTE
  own estimation
  properties: wet mass 1 kg, dry mass 1 kg

## Sampling procedure
Literature

## Extrapolations
This dataset has been extrapolated from year 2003 to the year of the calculation (2019). The uncertainty has been adjusted accordingly.

## Review by Roberto Dones 2003-08-19
passed
for final calculation August 2003
