# electricity production, natural gas, combined cycle power plant

Dataset: EcoSpold 2, unit process
Geography: IN-AP
Time period: 2000-01-01 to 2019-12-31
Technology level: modern
Classification: EcoSpold01Categories: natural gas/power plants
Classification: ISIC rev.4 ecoinvent: 3510:Electric power generation, transmission and distribution
Synonyms: GCC; CCGT; CCPP; GuD
Tags: fossil fuels; natural gas power; India
Scenario: Business-as-Usual
System model: Allocation at the point of substitution
Generated by: Muhammed Noor Hossain
Published in: Hossain, Muhammed Noor 2016
Database: ecoinvent
isCopyrightProtected: true
accessRestrictedTo: 1

## General comment
This dataset represents the production of high voltage electricity in a combined cycle natural gas power plant without CHP (combined heat and power) in India - Andhra Pradesh (a state/union territory in India) in 2012. This dataset is created as a child of the global dataset, i.e. some of the values are inherited from the global dataset and some are country-specific. Following values are edited, because they are country specific: the annual production volume, input of fuel, thermal efficiency of the power plant, emissions of CO2, CO, CH4, NO2, SO2, and Particulates.
In a combined cycle power plant, a gas turbine is followed by a steam turbine. The dataset refers to a combined cycle power plant of 400MWe class with a gas turbine 260MWe and a steam turbine 140MWe.
For electricity production with natural gas, four different datasets relying to different power plant types exist:
- conventional power plant with / without CHP
- combined cycle power plant with / without CHP
At the moment, these datasets differ in nothing but the efficiency. High voltage electricity (at the busbar) is the reference product, whereupon heat is a by-product in CHP plants. Out of all fossile fuels, natural gas holds worldwide the highest share of CHP plants besides peat. Furthermore, natural gas power plants are today often designed with combined cycles. This dataset is for the natural gas, combined cycle power plant without CHP.The advantages of a combined cycle power plant are for example:
- a higher efficiency (approximately between 50-60% compared to ca. 33% for a conventional power plant
- high operating flexibility
- lower emissions due to higher efficiency
- lower cooling water need

The efficiency calculations are based on Central Electricity Authority (CEA) statistics (fuel input vs. electricity/heat produced) and own calculation assumptions. Reducing factors such as contaminations of important plant parts, cooling conditions or part load have been taken into account. Even if efficiencies vary with different surrounding temperatures, temperature adjustments would be related to high uncertainties.
Water is used for wet cooling and as feed water in the steam circuit. In this dataset, 100% wet cooling and no once-through cooling is assumed.
EMISSIONS:
Different sources served as basis for assumption of average emissions. Where possible, the most recent sources were taken into account, whereas older sources were taken in order to determine the remaining data gaps. The emissions of CO2, CO, CH4, NO2, SO2, and Particulates have been collected/calculated from India specific sources. The other emissions have been collected for the former UCTE region* and have been taken over as such for all countries (uncertainty adjusted accordingly). See ecoinvent report 'Erdgas' given as main source for details (Tab. 11.15). In the following a short overview:
Emissions of CO2 are mainly taken from CEA 2014. Emissions of NOx, CO, SO2, CH4, particles, and CH4 are mainly calculated as a product of input of fuel and corresponding emission factors. Please see the 'factor: input of MJ for the production' in 'parameters' tab for details.
NOx emissions are a major challenge in natural gas power plants. With rising temperature, emissions also rise; band widths of NOx emissions in literature are correspondingly large.
CO is a result of incomplete burning. For economic and technical reasons, plant combustion is optimized and CO emissions are low. CO2 and SO2 emissions are dependent on the composition of the used fuel. Due to the low sulfur content of the used natural gas, no desulfurization has to take place.

Organic compound emissions are estimated on the basis of EPA 1998.
Particles are assumed to be smaller than 2.5 micro-m
ormer UCTE: Union for the Coordination of the Transmission of Electricity, since 2009 replaced by ENTSO-E European Network of Transmission System Operators for Electricity
Sources:
CEA. (2014). CO2 Baseline Database for the Indian Power Sector. User Guide, Ministry of Power, Government of India, New Delhi. Retrieved 12 04, 2016, from http://cea.nic.in/reports/others/thermal/tpece/cdm_co2/user_guide_ver10.pdf
EPA 1998. US Environmental Protection Agency (1998). Compilation of Air Pollutant Emission Factors, AP-42, Fifth Edition, Volume I: Chapter 1: External Combustion Sources, Natural Gas Combustion - Final Section - Supplement D , July 1998. CHIEF (Clearinghouse for Inventories and Emission Factors). Research Triangle Park, North Carolina. http://www.epa.gov/ttn/chief/ap42/.
Rentz O., Karl U., Peter H. (2002). Ermittlung und Evaluierung von Emissionsfaktoren f\xfcr Feuerungsanlagen in Deutschland f\xfcr die Jahre 1995, 2000 und 2010. Deutsch- Franz\xf6sisches Institut f\xfcr Umweltforschung, Uni Karsruhe. Endbericht. Im Auftrag des Umweltbundesamtes. Forschungsbericht 299 43 142. Umweltbundesamt. Berlin.
[This dataset is meant to replace the following datasets:
- electricity production, natural gas, combined cycle power plant, IN, 2000 - 2015]

## Included activities start
From the constructed combined cycle natural gas power plant ready to produce electricity.

From reception of natural gas and operating materials at power plant/factory gate

## Included activities end
This activity ends with 1kWh of high voltage electricity produced at the power plant and arrived at the busbar.

This dataset includes:
- all operation and maintenance activities and materials of the power plants.
- Cooling: It is a assumed that all plants use wet cooling with a cooling tower. No cooling tower is included in this dataset (will be implemented in future versions)
- decarbonised water use for reduction of NOx emissions

This dataset doesn't include
- raw materials extraction, decommissioning and waste treatment as these activities are already included in the infrastructure datasets.
- transformation of the electricity produced.

## Technology
Combined cycle power plant of 400MWe class with a gas turbine 265MWe and a steam turbine 140MWe. The plant is used for middle load with 5000 hours of operation at full capacity per year. The plant is assumed to operate 180000 hours during its lifetime.

## Time period
The Annual Production Volume data for the period 01.04.2012 - 31.03.2013.

## Parameters
- efficiency: 0.447842 dimensionless; = 1*3.6/ factor_MJ_kWh; lognormal variance with pedigree 0.003325, pedigree (3,2,1,2,2)
  Calculated value. Efficiency is calculated as 1*3.6/input of fuel for the production of 1 kWh.
- water consumption, electricity production from NG, recirculating CS: 0.0005 m3/kWh; name WConsumption_EP_NG_onceT_andCP_CS; lognormal variance with pedigree 0.092025, pedigree (4,4,3,2,4)
  Estimated based on literature (Scown, 2011, Water Footprint of U.S. Transportation Fuels, SI).
  nan
- gross electricity production: 8.40316e9 kWh; name gross_electricity; lognormal variance with pedigree 0.0033, pedigree (3,2,1,1,2)
  Literature and calculated value. Annual production volume data were extracted from the annual thermal electricity generation report of Central Electricity Authority, India (CEA, 2013). However, there were no specific data on the actual share of electricity production from natual gas, conventional power plant and natural gas, combined cycle power plant. Hence, we keep the existing share in ecoinvent v3 which is 18% for conventional power plant and 82% for combined cycle power plant. CEA. (2013). Region Wise, State Wise, Sector Wise, Type Wise, Station Wise, Unit Wise Generation Report For 31-Mar-2013. Central Electricity Authority (CEA). Retrieved from 04 December, 2016 http://cea.nic.in/reports/daily/dgr/2013/March/31/dgr2.pdf
- losses from gross electricity production: 0.03 dimensionless; name losses_gross_net; lognormal variance with pedigree 0.003325, pedigree (3,2,1,2,2)
  Literature value. Own use of electricity plants in this State/Union Territory in 2012. The default loss as described by the CEA CO2 Baseline Database for the Indian Power Sector is applied, which is 3%. CEA. (2014). CO2 Baseline Database for the Indian Power Sector. User Guide, Ministry of Power, Government of India, New Delhi. Retrieved 12 04, 2016, from http://cea.nic.in/reports/others/thermal/tpece/cdm_co2/user_guide_ver10.pdf
- recirculating cooling system as a fraction of all cooling systems: 0.375 dimensionless; name recirculating_CS_fraction_from_allCS; lognormal variance with pedigree 0.092025, pedigree (4,4,3,2,4)
  Calculated as an average of data available for Europe (Floerke, 2008, Future changes of freshwater needs in the electricity production sector) and USA (NERL, 2011, Estimating freshwater needs to meet future thermoelectric generation requirements).
  nan
- fraction, water, decarbonised, to air: 0.0159178; name fraction_WDC_to_air; = fraction_CW_to_air; lognormal variance with pedigree 0.092025, pedigree (4,4,3,2,4)
  Calculated value. See comments in the other parametres present in this dataset. Decarbonised water is considered to be always used as cooling water, thus cooling water fractions to air are applied to all carbonised water input flows to calculate the amount of water consumed in the processes.
  nan
- fraction, process water, to air: 0.15 dimensionless; name fraction_PW_to_air; lognormal variance with pedigree 0.092025, pedigree (4,4,3,2,4)
  Literature value. In case when no industry/process specific data are available, default evaporation fraction value is used. This value is 15% and is based on literature (Statistics Canada, 2007 & Shaffer, K.H., 2008, Consumptive water use in the Great Lakes Basin, USGS & Shiklomanov, 2003, World Water Resources at the Beginning of the 21st Century) and has been approved by an expert.
  nan
- fraction, cooling water, to air: 0.0159178; name fraction_CW_to_air; = (WConsumption_EP_NG_recirculatingCS*recirculating_CS_fraction_from_allCS+WConsumption_EP_NG_onceT_andCP_CS*once_through_andCP_CS_fractio_from_allCS)/(WWithdrawal_EP_NG_recirculating_CS*recirculating_CS_fraction_from_allCS+WWithdrawal_EP_NG_onceT_andCP_CS*once_through_andCP_CS_fractio_from_allCS); lognormal variance with pedigree 0.092025, pedigree (4,4,3,2,4)
  Calculated
  nan
- factor: input of MJ for the production of 1 kWh: 8.03855 MJ/kWh; name factor_MJ_kWh; = natural_gas*natural_gas_Net_Heat_Value; lognormal variance with pedigree 0.003325, pedigree (3,2,1,2,2)
  Calculated value. Calculated as the product of fuel consumption and net calorific (heating) value of fuel. The fuel (natural gas) consumption is different across the Indian geographies. In this state/union territory, it is 0.24 m3/kWh. However, the net calorific (heating) value of natural gas is considered same for all the geographies becuase Indian Central Electricity Authority (CEA) provides only single national average value (33.14 MJ/m3) for that. Source: CEA. (2014). CO2 Baseline Database for the Indian Power Sector.
- fraction, water, completely softened, to air: 0.15; name fraction_WCS_to_air; = fraction_PW_to_air; lognormal variance with pedigree 0.092025, pedigree (4,4,3,2,4)
  Calculated value. See comment in the other parametres present in this dataset. Water, completely softened is considered to be always used as process water, thus process water fractions to air are applied to all water, completely softened input flows to calculate the amount of water consumed in the processes.
  nan
- water consumption, electricity production from NG, once-T and coolingP CS: 0.0018 m3/kWh; name WConsumption_EP_NG_recirculatingCS; lognormal variance with pedigree 0.092025, pedigree (4,4,3,2,4)
  (same comment as for water consumption, electricity production from NG, recirculating CS)
- water withdrawal, electricity production from NG, once-T and coolingP CS: 0.0021 m3/kWh; name WWithdrawal_EP_NG_recirculating_CS; lognormal variance with pedigree 0.092025, pedigree (4,4,3,2,4)
  (same comment as for water consumption, electricity production from NG, recirculating CS)
- water withdrawal, electricity production from NG, recirculating CS: 0.098 m3/kWh; name WWithdrawal_EP_NG_onceT_andCP_CS; lognormal variance with pedigree 0.092025, pedigree (4,4,3,2,4)
  (same comment as for water consumption, electricity production from NG, recirculating CS)
- once-through and cooling pond cooling systems as a fraction of all cooling syste: 0.625 dimensionless; name once_through_andCP_CS_fractio_from_allCS; lognormal variance with pedigree 0.092025, pedigree (4,4,3,2,4)
  (same comment as for recirculating cooling system as a fraction of all cooling systems)

## Reference product
- electricity, high voltage: 1 kWh; name electricity; CPC 17100: Electrical energy; By-product classification allocatable product
  production volume 8.15107e9 kWh; name electricity_apv; = gross_electricity*(1- losses_gross_net)
    Literature and calculated value. Annual production volume data were extracted from the annual thermal electricity generation report of Central Electricity Authority, India (CEA, 2013). The Annual Production Volume is for the time period of 01.04.2012 - 31.03.2013 since CEA documents annual electricity production data for the mentioned time period.
  property price 0.0977 EUR2005
    Temporary price data. Calculated as 90% of purchasers price based on: 94% of the average price (to account for a 6% loss in transformation and transmission) for electricity for industrial consumersin 2005 (excluded taxes). From IEA.
  property true value 0.0977; name electricity_true_value
    allocation property applied in "true value" allocation // value calculated from revenue

## By-products
- heat, for reuse in municipal waste incineration only: 0 MJ; CPC 17300: Steam and hot water; By-product classification allocatable product; pedigree (1,1,1,1,1)
  Net electricity generated from this waste and used in internal MSWI plant energy redistribution.
  Uncertainty: uncertainty is calculated from uncertainties in waste composition and uncertainties in energy efficiency and the uncertainty in internal energy demand
  production volume 2.54984 MJ
  property exergy 0.1842 MJ; name E_th_prod_MSWI_exergy
    This exergy property is based on the exergy content of the product.
  property price 0.0106 EUR2005; name E_th_prod_MSWI_price_EUR2005
    Average European district heat price from Ecoheatcool and Euroheat 2005-2006, Ecoheat Work package 1: The European heat market. Final report. 10.6 EUR/GJ i s the price of district heat. http://www.solarthermalworld.org/files/Ecoheatcool%20WP1%20Web.pdf?download
  property true value relation 0.1842; name E_th_prod_MSWI_true_value_relation
    property to calculate "true value" from
  property true value 2.05772e-12
    allocation property applied in "true value" allocation // value calculated from true value relation
- electricity, for reuse in municipal waste incineration only: 0 kWh; CPC 17100: Electrical energy; By-product classification allocatable product; pedigree (1,1,1,1,1)
  (same comment as for heat, for reuse in municipal waste incineration only)
  production volume 0.359115 kWh
  property true value relation 3.6; name E_el_prod_MSWI_true_value_relation
    property to calculate "true value" from
  property price 0.1 EUR2005; name E_el_prod_MSWI_price_EUR2005
    Estimated to be the same price as in case of electricity, medium voltage.
  property exergy 3.6 MJ; name E_el_prod_MSWI_exergy
    This exergy property is based on the exergy content of the product.
  property true value 5.66395e-12
    (same comment as for heat, for reuse in municipal waste incineration only)

## Inputs from technosphere
- water, decarbonised: 1.60771 kg; name water_decarbonised_user; = factor_MJ_kWh*0.2; lognormal variance with pedigree 0.2352, pedigree (4,3,4,4,3)
  Literature value/calculated value. Cooling water, decarbonised, for the cooling water circuit lost and NOx reduction when producing 1kWh of electricity, based on the value for burning 1MJ of natural gas. Tab. 11.25, p. 143. For natural gas burned in a combined cycle plant (Tab. 11.25), an amount of 0.5 kg water per MJ burned was taken into account in Röder et al. 2007. As the reasons for this are not documented any more, the cooling water use has been taken over to the combined cycle plant dataset for consistency reasons.
  Röder et al. 2007 state that CC plants have a lower cooling water need than conventional plants. However, as written above, water use for NOx reduction is also taken into account.
  properties: wet mass 1 kg
- residue from cooling tower: -8.03855e-6 kg; name cooling_tower_residue; = (factor_MJ_kWh*0.000001)*-1; lognormal variance with pedigree 1.1067, pedigree (4,3,5,3,3)
  Literature value/calculated value. Value taken over from the dataset of natural gas burned in a normal power plant (electricity production, natural gas, GLO 2008).
  Mass share of cooling tower needed for producing 1kWh of electricity, based on the value for burning 1MJ of natural gas. Weighted average with electricity production data (Itten&Frischknecht 2012) and values of 11 countries
  (AT, BE, DE, ES, FR, GB, IT, JP, LU, NL, US) (Faist Emmenegger et al. 2007, JP and US in the appendix)
  Source:
  Itten R. and Frischknecht R. (2012) Life Cycle Inventories of Electricity Mixes and Grid. ESU-services Ltd., Uster, Switzerland.
  production volume 65522.8 kg
    Calculated from the production volume of electricity produced.
  property price 0 EUR2005; name cooling_tower_residue_price_EUR2005
  properties: water content 0.428571, dry mass 0.7 kg, carbon content, fossil 0.0544233, wet mass 1 kg
- gas power plant, combined cycle, 400MW electrical: 1.38889e-11 unit; name gas_power_plant; = 1/(400*1000*180000); lognormal variance with pedigree 0.1392, pedigree (3,3,4,4,3)
  Amount of power plant infrastructure input calculated based on expected full load hours during power plant lifetime (180000h) and power plant capacity (400MW). See "gas power plant construction, combined cycle, 400MW electrical" dataset and corresponding documentation.
- water, completely softened: 0.0482313 kg; name water_completely_softened; = factor_MJ_kWh*0.006; lognormal variance with pedigree 0.234625, pedigree (4,3,4,2,3)
  Literature value/calculated value. Feed water for the steam circuit lost when producing 1kWh of electricity, based on the value for burning 1MJ of natural gas. Röder et al. 2007, Tab. 9.65 and Tab. 9.66, p. 160f. For natural gas burned in a combined cycle plant (Tab. 11.25), the feed water was taken into account in Röder et al. 2007 by modelling it with decorbonised water being treated with sodium hydroxide and hydrochloric acid directly in the dataset. For consistency reasons, now also the completely softened water is taken into account.
  properties: wet mass 1 kg
- natural gas, high pressure: 0.242563 m3; name natural_gas; = carbon_dioxide_fossil/(33*0.0543); source Central Electricity Authority (CEA) 2014; lognormal variance with pedigree 0.004725, pedigree (3,2,3,2,2)
  Calculated value. In case of natural gas power plants, CO2 emission data were available. However, the natural gas consumption data were not available. Hence, we reverse calculated the natural gas consumption as CO2 emission divided by the product of net calorific value (33 MJ/kg) and CO2 emission factor (0.0543 kg/MJ).
  property heating value, net 33.14 MJ; name natural_gas_Net_Heat_Value
  properties: dry mass 0.84 kg, wet mass 0.84 kg, carbon content, fossil 0.602381
  note on heating value, net: Net (lower) heating (calorific) value at norm conditions (0°C, 101.325 kPa). Literature value. The net calorific value of natural gas is considered same for all the geographies becuase Indian Central Electricity Authority (CEA) provides only single national average value (33.14 MJ/m3) for that.
  note on carbon content, fossil: An average C content of 0.506 kg C/ m3 has been assumed (this average has been calculated using data in Tab 3.5, ecoinvent v2.2 report 6_V

## Inputs from nature
- Water, cooling, unspecified natural origin [natural resource, in water]: 0.0474945 m3; name water_cooling_UNO_input; = ((recirculating_CS_fraction_from_allCS*WWithdrawal_EP_NG_recirculating_CS)+(once_through_andCP_CS_fractio_from_allCS*WWithdrawal_EP_NG_onceT_andCP_CS))/10.5*factor_MJ_kWh; lognormal variance with pedigree 0.098025, pedigree (4,4,4,2,4)
  Calculated based on literature data.

## Emissions to nature
- Arsenic [air, non-urban air or from high stacks]: 3.30385e-10 kg; name arsenic; = factor_MJ_kWh*0.0000000000411; lognormal variance with pedigree 0.066, pedigree (3,5,4,5,4)
  Literature value/calculated value. Value taken over from the dataset of natural gas burned in a normal power plant (electricity production, natural gas, GLO 2008).
  Emissions when producing 1kWh of electricity, based on the value for burning 1MJ of natural gas. Weighted average with electricity production data (Itten&Frischknecht 2012) and emission values of 11 countries
  (AT, BE, DE, ES, FR, GB, IT, JP, LU, NL, US) (Faist Emmenegger et al. 2007, JP and US in the appendix. Only the US dataset contains heavy metals emissions - see Tab. 16.10)
  Source:
  Itten R. and Frischknecht R. (2012) Life Cycle Inventories of Electricity Mixes and Grid. ESU-services Ltd., Uster, Switzerland.
- Cadmium [air, non-urban air or from high stacks]: 1.81671e-9 kg; name cadmium; = factor_MJ_kWh*0.000000000226; lognormal variance with pedigree 0.066, pedigree (3,5,4,5,4)
  (same comment as for Arsenic)
- Chromium [air, non-urban air or from high stacks]: 2.30706e-9 kg; name chromium; = factor_MJ_kWh*0.000000000287; lognormal variance with pedigree 0.034, pedigree (3,5,4,5,3)
  (same comment as for Arsenic)
- Butane [air, non-urban air or from high stacks]: 7.4437e-6 kg; name butane; = factor_MJ_kWh*0.000000926; lognormal variance with pedigree 0.6807, pedigree (3,3,5,3,3)
  Literature value/calculated value. Value taken over from the dataset of natural gas burned in a normal power plant (electricity production, natural gas, GLO 2008).
  Emissions when producing 1kWh of electricity, based on the value for burning 1MJ of natural gas. Weighted average with electricity production data (Itten&Frischknecht 2012) and emission values of 11 countries
  (AT, BE, DE, ES, FR, GB, IT, JP, LU, NL, US) (Faist Emmenegger et al. 2007, JP and US in the appendix)
  Country emissions values estimate from range of values from different references. See Tab. 11.19, p. 138 in Faist Emmenegger et al. 2007.
  Source:
  Itten R. and Frischknecht R. (2012) Life Cycle Inventories of Electricity Mixes and Grid. ESU-services Ltd., Uster, Switzerland.
- Nitrogen oxides [air, non-urban air or from high stacks]: 0.000204983 kg; name nitrogen_oxides; = factor_MJ_kWh*0.0000255; lognormal variance with pedigree 0.294725, pedigree (3,2,3,2,2)
  Calculated value. Emissions when producing 1kWh of electricity, based on the burning of 1MJ of natural gas. The emission is calculated as a product of input of fuel and corresponding emission factor (0.0000255 kg/MJ) of NO2. Emission factor is taken as weighted average with electricity production data (Itten&Frischknecht 2012) and emission values of 11 countries (AT, BE, DE, ES, FR, GB, IT, JP, LU, NL, US) (Faist Emmenegger et al. 2007). Country emissions values estimate from range of values from different references. See Tab. 11.15, p. 133f in Faist Emmenegger et al. 2007.
- Acetaldehyde [air, non-urban air or from high stacks]: 6.43084e-9 kg; name acetaldehyde; = factor_MJ_kWh*0.0000000008; lognormal variance with pedigree 1.1067, pedigree (4,3,5,3,3)
  (same comment as for Butane)
- Methane, fossil [air, non-urban air or from high stacks]: 7.80544e-6 kg; name methane_fossil; = factor_MJ_kWh*0.000000971; lognormal variance with pedigree 0.294725, pedigree (3,2,3,2,2)
  Calculated value. Emissions when producing 1kWh of electricity, based on the burning of 1MJ of natural gas. The emission is calculated as a product of input of fuel and corresponding emission factor (0.000000971 kg/MJ) of CH4. Emission factor is taken as weighted average with electricity production data (Itten&Frischknecht 2012) and emission values of 11 countries (AT, BE, DE, ES, FR, GB, IT, JP, LU, NL, US) (Faist Emmenegger et al. 2007). Country emissions values estimate from range of values from different references. See Tab. 11.15, p. 133f in Faist Emmenegger et al. 2007.
- Dinitrogen monoxide [air, non-urban air or from high stacks]: 7.85367e-6 kg; name dinitrogen_monoxide; = factor_MJ_kWh*0.000000977; lognormal variance with pedigree 0.3407, pedigree (3,3,5,3,3)
  Literature value/calculated value. Value taken over from the dataset of natural gas burned in a normal power plant (electricity production, natural gas, GLO 2008).
  Emissions when producing 1kWh of electricity, based on the value for burning 1MJ of natural gas. Weighted average with electricity production data (Itten&Frischknecht 2012) and emission values of 11 countries
  (AT, BE, DE, ES, FR, GB, IT, JP, LU, NL, US) (Faist Emmenegger et al. 2007)
  Country emissions values estimate from range of values from different references. See Tab. 11.15, p. 133f in Faist Emmenegger et al. 2007.
  Source:
  Itten R. and Frischknecht R. (2012) Life Cycle Inventories of Electricity Mixes and Grid. ESU-services Ltd., Uster, Switzerland.
- Pentane [air, non-urban air or from high stacks]: 9.24434e-6 kg; name pentane; = factor_MJ_kWh*0.00000115; lognormal variance with pedigree 0.6807, pedigree (3,3,5,3,3)
  (same comment as for Butane)
- Beryllium [air, non-urban air or from high stacks]: 1.98552e-11 kg; name beryllium; = factor_MJ_kWh*0.00000000000247; lognormal variance with pedigree 0.066, pedigree (3,5,4,5,4)
  (same comment as for Arsenic)
- Benzene [air, non-urban air or from high stacks]: 7.25078e-9 kg; name benzene; = factor_MJ_kWh*0.000000000902; lognormal variance with pedigree 0.6807, pedigree (3,3,5,3,3)
  (same comment as for Butane)
- Carbon monoxide, fossil [air, non-urban air or from high stacks]: 1.76848e-5 kg; name carbon_monoxide_fossil; = factor_MJ_kWh*0.0000022; lognormal variance with pedigree 0.294725, pedigree (3,2,3,2,2)
  Calculated value. Emissions when producing 1kWh of electricity, based on the burning of 1MJ of natural gas. The emission is calculated as a product of input of fuel and corresponding emission factor (0.0000022 kg/MJ) of CO. Emission factor is taken as weighted average with electricity production data (Itten&Frischknecht 2012) and emission values of 11 countries (AT, BE, DE, ES, FR, GB, IT, JP, LU, NL, US) (Faist Emmenegger et al. 2007). Country emissions values estimate from range of values from different references. See Tab. 11.15, p. 133f in Faist Emmenegger et al. 2007. CO is a product of an incomplete combustion.
- Cobalt [air, non-urban air or from high stacks]: 1.38263e-10 kg; name cobalt; = factor_MJ_kWh*0.0000000000172; lognormal variance with pedigree 0.066, pedigree (3,5,4,5,4)
  (same comment as for Arsenic)
- Propane [air, non-urban air or from high stacks]: 5.66718e-6 kg; name propane; = factor_MJ_kWh*0.000000705; lognormal variance with pedigree 0.6807, pedigree (3,3,5,3,3)
  (same comment as for Butane)
- Propionic acid [air, non-urban air or from high stacks]: 1.28617e-7 kg; name propionic_acid; = factor_MJ_kWh*0.000000016; lognormal variance with pedigree 1.1067, pedigree (4,3,5,3,3)
  (same comment as for Butane)
- Nickel [air, non-urban air or from high stacks]: 3.46462e-9 kg; name nickel; = factor_MJ_kWh*0.000000000431; lognormal variance with pedigree 0.066, pedigree (3,5,4,5,4)
  (same comment as for Arsenic)
- Hexane [air, non-urban air or from high stacks]: 6.37457e-6 kg; name hexane; = factor_MJ_kWh*0.000000793; lognormal variance with pedigree 0.6807, pedigree (3,3,5,3,3)
  (same comment as for Butane)
- Water [water, unspecified]: 0.0483616 m3; name water_to_water_unspecified; = (water_completely_softened/1000)*(1-fraction_WCS_to_air)+(water_decarbonised_user/1000)*(1-fraction_WDC_to_air)+water_cooling_UNO_input*(1-fraction_CW_to_air); lognormal variance with pedigree 0.098025, pedigree (4,4,4,2,4)
  Calculated value based on literature values and expert opinion. See comments in the parametres' comment field.
  property fraction, origin: unspecified 0.966438; name fraction_origin_unspecified_Ww
  property fraction, origin: fresh water 0.0335624; name fraction_origin_fresh_water_Ww
  property fraction, origin: salt water 0; name fraction_origin_salt_water_Ww
- Dioxins, measured as 2,3,7,8-tetrachlorodibenzo-p-dioxin [air, non-urban air or from high stacks]: 0 kg; name dioxins; = factor_MJ_kWh*2.9E-17; pedigree (1,1,1,1,1)
  Literature value/calculated value. Value taken over from the dataset of natural gas burned in a normal power plant (electricity production, natural gas, GLO 2008).
  Emissions when producing 1kWh of electricity, based on the value for burning 1MJ of natural gas. Weighted average with electricity production data (Itten&Frischknecht 2012) and emission values of 11 countries
  (AT, BE, DE, ES, FR, GB, IT, JP, LU, NL, US) (Faist Emmenegger et al. 2007)
  Country emissions values estimate from range of values from different references. See Tab. 11.19, p. 138 in Faist Emmenegger et al. 2007.
  Source:
  Itten R. and Frischknecht R. (2012) Life Cycle Inventories of Electricity Mixes and Grid. ESU-services Ltd., Uster, Switzerland.
- Sulfur dioxide [air, non-urban air or from high stacks]: 4.59805e-6 kg; name sulfur_dioxide; = factor_MJ_kWh*0.000000572; lognormal variance with pedigree 0.294725, pedigree (3,2,3,2,2)
  Calculated value. Emissions when producing 1kWh of electricity, based on the burning of 1MJ of natural gas. The emission is calculated as a product of input of fuel and corresponding emission factor (0.000000572 kg/MJ) of SO2. Emission factor is taken as weighted average with electricity production data (Itten&Frischknecht 2012) and emission values of 11 countries (AT, BE, DE, ES, FR, GB, IT, JP, LU, NL, US) (Faist Emmenegger et al. 2007). Country emissions values estimate from range of values from different references. See Tab. 11.15, p. 133f in Faist Emmenegger et al. 2007.
- Particulates, < 2.5 um [air, non-urban air or from high stacks]: 3.94693e-6 kg; name particulates_lt_2_5um; = factor_MJ_kWh*0.000000491; lognormal variance with pedigree 0.294725, pedigree (3,2,3,2,2)
  Calculated value. Emissions when producing 1kWh of electricity, based on the burning of 1MJ of natural gas. The emission is calculated as a product of input of fuel and corresponding emission factor (0.000000491 kg/MJ) of Particulate Matter. Emission factor is taken as weighted average with electricity production data (Itten&Frischknecht 2012) and emission values of 11 countries (AT, BE, DE, ES, FR, GB, IT, JP, LU, NL, US) (Faist Emmenegger et al. 2007). Country emissions values estimate from range of values from different references. See Tab. 11.15, p. 133f in Faist Emmenegger et al. 2007.
- Toluene [air, non-urban air or from high stacks]: 1.20578e-8 kg; name toluene; = factor_MJ_kWh*0.0000000015; lognormal variance with pedigree 0.6807, pedigree (3,3,5,3,3)
  (same comment as for Butane)
- Mercury [air, non-urban air or from high stacks]: 5.53052e-10 kg; name mercury; = factor_MJ_kWh*0.0000000000688; lognormal variance with pedigree 0.6807, pedigree (3,3,5,3,3)
  (same comment as for Arsenic)
- Manganese [air, non-urban air or from high stacks]: 6.27811e-10 kg; name manganese; = factor_MJ_kWh*0.0000000000781; lognormal variance with pedigree 0.066, pedigree (3,5,4,5,4)
  (same comment as for Arsenic)
- PAH, polycyclic aromatic hydrocarbons [air, non-urban air or from high stacks]: 6.43084e-8 kg; name pah; = factor_MJ_kWh*0.000000008; lognormal variance with pedigree 1.1067, pedigree (4,3,5,3,3)
  (same comment as for Dioxins, measured as 2,3,7,8-tetrachlorodibenzo-p-dioxin)
- Benzo(a)pyrene [air, non-urban air or from high stacks]: 4.25239e-12 kg; name benzo_a_pyrene; = factor_MJ_kWh*0.000000000000529; lognormal variance with pedigree 0.6807, pedigree (3,3,5,3,3)
  (same comment as for Butane)
- Lead [air, non-urban air or from high stacks]: 8.27971e-10 kg; name lead; = factor_MJ_kWh*0.000000000103; lognormal variance with pedigree 0.066, pedigree (3,5,4,5,4)
  (same comment as for Arsenic)
- Ethane [air, non-urban air or from high stacks]: 1.10128e-5 kg; name ethane; = factor_MJ_kWh*0.00000137; lognormal variance with pedigree 0.6807, pedigree (3,3,5,3,3)
  (same comment as for Butane)
- Selenium [air, non-urban air or from high stacks]: 3.94693e-11 kg; name selenium; = factor_MJ_kWh*0.00000000000491; lognormal variance with pedigree 0.6807, pedigree (3,3,5,3,3)
  (same comment as for Arsenic)
- Water [air, unspecified]: 0.000788833 m3; name water_to_air_unspecified; = (water_completely_softened/1000)*fraction_WCS_to_air+(water_decarbonised_user/1000)*fraction_WDC_to_air+water_cooling_UNO_input*fraction_CW_to_air; lognormal variance with pedigree 0.098025, pedigree (4,4,4,2,4)
  (same comment as for Water)
  property fraction, origin: unspecified 0.958386; name fraction_origin_unspecified
  property fraction, origin: salt water 0; name fraction_origin_salt_water
  property fraction, origin: fresh water 0.0416136; name fraction_origin_fresh_water
- Carbon dioxide, fossil [air, non-urban air or from high stacks]: 0.434649 kg; name carbon_dioxide_fossil; source Central Electricity Authority (CEA) 2014; lognormal variance with pedigree 0.0038, pedigree (2,1,3,1,2)
  Calculated/Literature value. CO2 emission data from the specific natural gas power plants are readily available from the Central Electricity Authority (CEA) CO2 Baseline Database for the Indian Power Sector. The emission value for this dataset is calculated as weighted average (based on the production volume) of CO2 emission from the natural gas power plants of this particular state/union territory.
- Acetic acid [air, non-urban air or from high stacks]: 9.72665e-7 kg; name acetic_acid; = factor_MJ_kWh*0.000000121; lognormal variance with pedigree 1.1007, pedigree (3,3,5,3,3)
  (same comment as for Butane)
- Acenaphthene [air, non-urban air or from high stacks]: 6.37457e-12 kg; name acenaphthene; = factor_MJ_kWh*0.000000000000793; lognormal variance with pedigree 0.6807, pedigree (3,3,5,3,3)
  (same comment as for Butane)
- Formaldehyde [air, non-urban air or from high stacks]: 2.59645e-7 kg; name formaldehyde; = factor_MJ_kWh*0.0000000323; lognormal variance with pedigree 0.6807, pedigree (3,3,5,3,3)
  (same comment as for Butane)

## Sampling procedure
The inventory is generated using statistical data, literature data and modelling.

## Extrapolations
All exchange data except the emissions of CO2, CO, CH4, NO2, SO2, and Particulates were extrapolated from datasets of the following 11 countries: AT, BE, DE, ES, FR, GB, IT, JP, LU, NL, US. The data of those countries basically rely on data of the former UCTE (see general comment).

The cooling and feed water use has been taken over from datasets for electricity production with hard coal or lignite.

## Review by Karin Treyer 2017-01-05
This dataset has been produced in a project on regionalisation of the Indian electricity mix on a states level.
In general, only key parameters have been adjusted to region-specific conditions, such as the electrical efficiency, specific emissions to air or power plants own use of electricity (losses from gross to net electricity). Whenever more accurate data will be available, these should be included in this dataset.
