# hot rolling, steel

Dataset: EcoSpold 2, unit process
Geography: RER
Time period: 1997-01-01 to 2019-12-31
Technology level: current
Classification: EcoSpold01Categories: metals/processing
Classification: ISIC rev.4 ecoinvent: 2410:Manufacture of basic iron and steel
Synonyms: Hot forming
Tags: ConvertedDataset
Scenario: Business-as-Usual
System model: Allocation at the point of substitution
Share of production covered: 0 %
Generated by: Silvio Blaser
Published in: Werner F. 2007
Database: ecoinvent
isCopyrightProtected: true
accessRestrictedTo: 1

## General comment
To achieve greater toughness, shock resistance and tensile strength, the raw steel production outputs cast ingots, slabs, billets and beam blanks are hot rolled to long or flat products or semifinished products.
[This dataset was already contained in the ecoinvent database version 2. It was not individually updated during the transfer to ecoinvent version 3. Life Cycle Impact Assessment results may still have changed, as they are affected by changes in the supply chain, i.e. in other datasets. This dataset was generated following the ecoinvent quality guidelines for version 2. It may have been subject to central changes described in the ecoinvent version 3 change report (http://www.ecoinvent.org/database/ecoinvent-version-3/reports-of-changes/), and the results of the central updates were reviewed extensively. The changes added e.g. consistent water flows and other information throughout the database. The documentation of this dataset can be found in the ecoinvent reports of version 2, which are still available via the ecoinvent website. The change report linked above covers all central changes that were made during the conversion process.]

## Included activities end
Includes the process steps scarfing, grinding heating, descaling, rolling and finishing. Semiclosed water circuit with water treatment plant is also included. Does not include the material being rolled

## Geography
Data-set is representative for European Union

## Technology
Average technique for EU. Assumption: heating 100% with natural gas. Furnaces of about 10 MW are approxi-mated by furnace "> 100 kW"

## Parameters
- fraction, cooling water, once-through system, to air: 0.004; name fraction_CW_OT_to_air; lognormal variance with pedigree 0.0413, pedigree (2,3,1,3,1)
  Calculated based on literature value (Scown, C.D., 2011, Water Footprint of U.S. Transportation Fuels and supplying information of the article) (Vionnet, S., Quantis Water Database - Technical Report, 2012).
- fraction, cooling water, to air: 0.3875; name fraction_CW_to_air; = (0.5*fraction_CW_OT_to_air)+(0.5*fraction_CW_R_to_air); lognormal variance with pedigree 0.092025, pedigree (4,4,3,2,4)
  Calculated value based on literature value (see comments of the other parametres present in this dataset) and expert opinion. In the case when no industry/literature data are available about the type of cooling or directly fraction, cooling water, to air specific for the process a default assumption is applied. It is assumed that the once-through cooling system is used in 50% of all cases and recirculating system is used in another 50% of all cases.
- fraction, cooling water, recirculating system, to air: 0.771; name fraction_CW_R_to_air; lognormal variance with pedigree 0.0413, pedigree (2,3,1,3,1)
  (same comment as for fraction, cooling water, once-through system, to air)
- fraction, process water, to air: 0.095 dimensionless; name fraction_PW_to_air; lognormal variance with pedigree 0.092025, pedigree (4,4,3,2,4)
  Literature value (Statistics Canada, 2007 & Shaffer, K.H., 2008, Consumptive water use in the Great Lakes Basin, USGS) (Vionnet, S., Quantis Water Database - Technical Report, 2012).
- fraction, cooling water, cooling pond system, to air: 0.032; name fraction_CW_CP_to_air; lognormal variance with pedigree 0.0413, pedigree (2,3,1,3,1)
  (same comment as for fraction, cooling water, once-through system, to air)

## Reference product
- hot rolling, steel: 1 kg; By-product classification allocatable product; CPC 88601: Basic iron and steel manufacturing services
  EcoSpold01Location=RER
  production volume 2.9e11 kg
    127.8 million tonnes in 1996
    IISI: Steel Statistical Yearbook 2007; Table 14 (Europe incl. CIS; Turkey estimated at 12 E+9 kg)
  property price 0.0689 EUR2005
    The prices of metal processing processes were calculated by using the monetary flows (deducted the price of metal inputs) from the following metal processing activities in EU & DK IO database: 61, 62, 63 and 64. Monetary supply: (1.6E11 EUR). Value of metal input to activities: 1.2E11 EUR. 4.4E10 (=(1.6-1.2) E11) was then considered as the price of the metal processing. The monetary flow was distributed over the Ecoinvent metal processing processes. 'Chipless shaping' and 'Chipping' acounted for 86.5 % of the production volumes and 86.5% of the monetary flow was therefore ascribed to these processe. The rest of the monetary flow was ascribed to the remaining metal processing processes. Within the last categories the money flow was ditributed between the different processes on basis of their respective electricity consumption, because many of the processes not had mass units.

## Inputs from technosphere
- packaging film, low density polyethylene: 1.89e-11 kg; lognormal variance with pedigree 0.084, pedigree (4,5,5,1,3)
  EcoSpold01Location=RER
  properties: dry mass 1 kg, carbon content, fossil 0.857143, wet mass 1 kg
  note on carbon content, fossil: Polyethylene is formed out of a huge amount of ethylene monomers (C2H4) (ecoinvent v2.2 report 11_II). MW=28 g/mol
- chemical, inorganic: 1.45e-8 kg; lognormal variance with pedigree 0.16, pedigree (1,1,5,1,1)
  EcoSpold01Location=GLO
  calculated from max value assuming lognormal distribution
  properties: carbon content, fossil 0.003, dry mass 1 kg, wet mass 1 kg
  note on carbon content, fossil: This dataset is an unweighted average of 20 inorganic substances (listed in Tab 88.1, ecoinvent v2.2 report 8, part II), being part of the top100 chemicals included in this database. The C-content has also been calculated as an unweighted average of the C content of the substances composing this dataset.
- rolling mill: 1.62e-9 unit; lognormal variance with pedigree 0.344, pedigree (3,4,5,1,1)
  EcoSpold01Location=RER
  activityLink introduced to establish a direct link to the corresponding regional supply of this product
- lime, hydrated, loose weight: 4.97e-5 kg; lognormal variance with pedigree 0.05, pedigree (1,1,5,1,1)
  calculated from max value assuming lognormal distribution
  EcoSpold01Location=CH
  properties: water content 0.00300903, wet mass 1 kg, dry mass 0.997 kg
- steel, unalloyed: 0.05 kg; lognormal variance with pedigree 0.066, pedigree (4,5,5,1,1)
  EcoSpold01Location=RER
  properties: carbon content, fossil 0.0025, dry mass 1 kg, wet mass 1 kg
  note on carbon content, fossil: Unalloyed steels or carbon steels are those in which the level of an individual element in no case reaches or exceeds the limiting concentration given in Tab. 3.1 ecoinvent v2.2 report 10_partII. Assumed to have a C content of 0.25%
- corrugated board box: 4.72e-12 kg; lognormal variance with pedigree 0.084, pedigree (4,5,5,1,3)
  EcoSpold01Location=RER
  properties: dry mass 0.945 kg, water content 0.0582011, carbon content, fossil 0.00365437, carbon content, non-fossil 0.450248, wet mass 1 kg
  note on carbon content, fossil: C content was calculated as an addition of C content in the raw materials.
- average incineration residue: -0.000223 kg; lognormal variance with pedigree 2.41, pedigree (1,1,5,1,1)
  calculated from max value assuming lognormal distribution
  EcoSpold01Location=CH
  production volume 6.467e7 kg
    Calculated from the production volume of hot rolling, steel in proportion to the respective output amounts.
  properties: carbon content, non-fossil 0.0511208, carbon content, fossil 0.0325466, dry mass 1 kg, wet mass 1 kg
  note on carbon content, non-fossil: Tab A.1, ecoinvent v2.2 report 13_I. It is considered that 61.1% of the C has a biogenic origin
- sludge from steel rolling: -0.0163 kg; lognormal variance with pedigree 0.0586, pedigree (2,5,5,1,1)
  EcoSpold01Location=CH
  production volume 4.727e9 kg
    (same comment as for average incineration residue)
  properties: water content 0.25, carbon content, fossil 0.0123943, dry mass 0.8 kg, wet mass 1 kg
- sawnwood, softwood, raw, dried (u=20%): 0 m3; pedigree (1,1,1,1,1)
  EcoSpold01Location=RER
  properties: dry mass 450 kg, wet mass 540 kg, water content 0.2, carbon content, non-fossil 0.494
  note on carbon content, non-fossil: C content of dry mass is 0.494 kgC/kg dry wood (ecoinvent v2.2 report 9)
- waste mineral oil: 0 kg; pedigree (1,1,1,1,1)
  EcoSpold01Location=CH
  calculated from max value assuming lognormal distribution
  production volume 0 kg
    (same comment as for average incineration residue)
  properties: dry mass 0.9 kg, wet mass 1 kg, carbon content, fossil 0.864444, water content 0.111111
  note on carbon content, fossil: Tab A.6, ecoinvent v2.2 report 13_I. C content has been calculated after data in the tables, and then referred to 1 kg DM
- basic oxygen furnace waste: -0.000483 kg; lognormal variance with pedigree 0.61, pedigree (1,1,5,1,1)
  EcoSpold01Location=CH
  calculated from max value assuming lognormal distribution
  production volume 1.4007e8 kg
    (same comment as for average incineration residue)
  properties: dry mass 1 kg, wet mass 1 kg
- oxygen, liquid: 0.00714 kg; lognormal variance with pedigree 0.058, pedigree (1,5,5,1,1)
  EcoSpold01Location=RER
  properties: wet mass 1 kg, dry mass 1 kg
- sheet rolling, steel: 2.36e-11 kg; lognormal variance with pedigree 0.084, pedigree (4,5,5,1,3)
  activityLink introduced to establish a direct link to the corresponding regional supply of this product
  EcoSpold01Location=RER
- municipal solid waste: -7.08e-11 kg; lognormal variance with pedigree 0.0666, pedigree (2,5,5,1,3)
  EcoSpold01Location=CH
  production volume 20.532 kg
    (same comment as for average incineration residue)
  properties: carbon content, non-fossil 0.261655, water content 0.297017, carbon content, fossil 0.171549, wet mass 1 kg, dry mass 0.771 kg
  note on carbon content, non-fossil: MSW composition in tab 4.1, ecoinvent v2.2 report 13_I. C content referred to 1 kg DM
- lubricating oil: 0.00404 kg; lognormal variance with pedigree 0.31, pedigree (1,1,5,1,1)
  EcoSpold01Location=RER
  calculated from max value assuming lognormal distribution
  properties: carbon content, fossil 0.75, dry mass 1 kg, wet mass 1 kg
  note on carbon content, fossil: Lubricating oil is produced from diesel. C-content/dry mass of fats and oils considered 75%, from: ecoinvent v2.2 report, n 15a, pg 40
- liquefied petroleum gas: 0 kg; pedigree (1,1,1,1,1)
  EcoSpold01Location=RER
  properties: carbon content, fossil 0.821863, wet mass 1 kg, dry mass 1 kg
- electricity, medium voltage: 0.14 kWh; lognormal variance with pedigree 0.0426, pedigree (3,3,5,1,1)
  EcoSpold01Location=UCTE
- dust, unalloyed electric arc furnace steel: -0.00131 kg; lognormal variance with pedigree 1.21, pedigree (1,1,5,1,1)
  calculated from max value assuming lognormal distribution
  EcoSpold01Location=CH
  production volume 3.799e8 kg
    (same comment as for average incineration residue)
  properties: wet mass 1 kg, carbon content, fossil 0.01339, water content 0.182033, dry mass 0.846 kg
- heat, district or industrial, natural gas: 1.482 MJ; lognormal variance with pedigree 0.07, pedigree (1,1,5,1,1)
  EcoSpold01Location=RER
  calculated from max value assuming lognormal distribution
- waste mineral oil: -0.000208183, -4.81714e-6 kg (2 entries); lognormal variance with pedigree 1.31, pedigree (1,1,5,1,1)
  EcoSpold01Location=CH
  calculated from max value assuming lognormal distribution
  production volume 6.177e7 kg
- liquefied petroleum gas: 0.000527318, 2.68183e-6 kg (2 entries); lognormal variance with pedigree 0.058, pedigree (1,5,5,1,1)
  EcoSpold01Location=RER

## Inputs from nature
- Water, unspecified natural origin [natural resource, in water]: 0.00340803 m3; name water_UNO_input; source Byers, W. 2003; lognormal variance with pedigree 0.052625, pedigree (3,3,5,2,1)
  Calculated from max value assuming lognormal distribution
  Calculated based on literature, (Vionnet, S., Quantis Water Database - Technical Report, 2012). Water is used during steel rolling mainly for steel conditioning, respectively cooling down. Even though it is used for cooling, this water comes into contact with the product, therefore it is reported as process water.
- Water, cooling, unspecified natural origin [natural resource, in water]: 0.0170402 m3; name water_cooling_UNO_input; source Byers, W. 2003; lognormal variance with pedigree 0.0513, pedigree (2,3,5,3,1)
  Calculated based on literature, (Vionnet, S., Quantis Water Database - Technical Report, 2012). Water is used during steel rolling mainly for steel conditioning, respectively cooling down.
  property wet mass 1000 kg; name WM
  property carbon content, non-fossil 0; name C_content_non_fossil
  property carbon content, fossil 0.0104329; name C_content_fossil
  property water content 9081.65; name water_content
  property water in wet mass 999.89 kg; name WWM
  property dry mass 0.1101 kg; name DM

## Emissions to nature
- Carbon monoxide, fossil [air, unspecified]: 2.24e-5 kg; lognormal variance with pedigree 0.058, pedigree (1,5,5,1,1)
- Chromium VI [water, unspecified]: 2.75e-8 kg; lognormal variance with pedigree 0.16, pedigree (1,1,5,1,1)
  calculated from max value assuming lognormal distribution
- Iron [air, unspecified]: 6.06e-6 kg; lognormal variance with pedigree 1.23, pedigree (1,1,5,1,1)
  calculated from max value assuming lognormal distribution
- BOD5, Biological Oxygen Demand [water, unspecified]: 3.8e-5 kg; lognormal variance with pedigree 0.41, pedigree (1,1,5,1,1)
  twice the uncertainty of COD (assumption)
- TOC, Total Organic Carbon [water, unspecified]: 1.2e-5 kg; lognormal variance with pedigree 0.41, pedigree (1,1,5,1,1)
  twice the uncertainty of COD (assumption)
- Nickel [air, unspecified]: 2.44e-7 kg; lognormal variance with pedigree 0.13, pedigree (1,1,5,1,1)
  calculated from max value assuming lognormal distribution
- Nitrogen oxides [air, unspecified]: 1.31e-5 kg; lognormal variance with pedigree 0.188, pedigree (1,5,5,1,1)
- Lead [water, unspecified]: 2.75e-7 kg; lognormal variance with pedigree 0.16, pedigree (1,1,5,1,1)
  calculated from max value assuming lognormal distribution
- Chromium, ion [water, unspecified]: 4.95e-7 kg; lognormal variance with pedigree 0.16, pedigree (1,1,5,1,1)
  calculated from max value assuming lognormal distribution
- Cadmium, ion [water, unspecified]: 1.37e-7 kg; lognormal variance with pedigree 0.16, pedigree (1,1,5,1,1)
  calculated from max value assuming lognormal distribution
- Copper [air, unspecified]: 7.18e-8 kg; lognormal variance with pedigree 0.04, pedigree (1,1,5,1,1)
  calculated from max value assuming lognormal distribution
- NMVOC, non-methane volatile organic compounds, unspecified origin [air, unspecified]: 0.000283 kg; lognormal variance with pedigree 0.31, pedigree (1,1,5,1,1)
  calculated from max value assuming lognormal distribution
- Particulates, < 2.5 um [air, unspecified]: 1.79e-5 kg; lognormal variance with pedigree 1.23, pedigree (1,1,5,1,1)
  calculated from max value assuming lognormal distribution
- Manganese [water, unspecified]: 5.61e-7 kg; lognormal variance with pedigree 0.27, pedigree (1,1,5,1,1)
  calculated from max value assuming lognormal distribution
- Hydrocarbons, unspecified [water, unspecified]: 1.73e-6 kg; lognormal variance with pedigree 0.11, pedigree (1,1,5,1,1)
  calculated from max value assuming lognormal distribution
- Copper, ion [water, unspecified]: 2.66e-7 kg; lognormal variance with pedigree 0.75, pedigree (1,1,5,1,1)
  calculated from max value assuming lognormal distribution
- Manganese [air, unspecified]: 2.19e-7 kg; lognormal variance with pedigree 0.1, pedigree (1,1,5,1,1)
  calculated from max value assuming lognormal distribution
- DOC, Dissolved Organic Carbon [water, unspecified]: 1.2e-5 kg; lognormal variance with pedigree 0.41, pedigree (1,1,5,1,1)
  twice the uncertainty of COD (assumption)
- Iron, ion [water, unspecified]: 4.26e-6 kg; lognormal variance with pedigree 0.27, pedigree (1,1,5,1,1)
  calculated from max value assuming lognormal distribution
- Particulates, > 2.5 um, and < 10um [air, unspecified]: 2.75e-5 kg; lognormal variance with pedigree 0.188, pedigree (1,5,5,1,1)
- Particulates, > 10 um [air, unspecified]: 2.75e-5 kg; lognormal variance with pedigree 0.098, pedigree (1,5,5,1,1)
- Chromium [air, unspecified]: 3.74e-7 kg; lognormal variance with pedigree 0.81, pedigree (1,1,5,1,1)
  calculated from max value assuming lognormal distribution
- Aluminium [water, unspecified]: 1.3e-7 kg; lognormal variance with pedigree 0.83, pedigree (1,1,5,1,1)
  calculated from max value assuming lognormal distribution
- Mercury [water, unspecified]: 2.75e-8 kg; lognormal variance with pedigree 0.16, pedigree (1,1,5,1,1)
  calculated from max value assuming lognormal distribution
- Chloride [water, unspecified]: 1.23e-6 kg; lognormal variance with pedigree 0.2, pedigree (1,1,5,1,1)
  calculated from max value assuming lognormal distribution
- Nickel, ion [water, unspecified]: 7.78e-7 kg; lognormal variance with pedigree 1.79, pedigree (1,1,5,1,1)
  calculated from max value assuming lognormal distribution
- Suspended solids, unspecified [water, unspecified]: 0.000146 kg; lognormal variance with pedigree 1.03, pedigree (1,1,5,1,1)
  calculated from max value assuming lognormal distribution
- Zinc, ion [water, unspecified]: 2.06e-7 kg; lognormal variance with pedigree 1.3, pedigree (1,1,5,1,1)
  calculated from max value assuming lognormal distribution
- Water [air, unspecified]: 0.00692682 m3; name water_to_air_unspecified; = (water_cooling_UNO_input*fraction_CW_to_air)+(water_UNO_input*fraction_PW_to_air); lognormal variance with pedigree 0.0807, pedigree (2,2,5,1,1)
  Calculated value based on literature values and expert opinion. See comments in the parametres' comment field.
  property fraction, origin: fresh water 0; name fraction_origin_fresh_water
  property fraction, origin: unspecified 1; name fraction_origin_unspecified
  property fraction, origin: salt water 0; name fraction_origin_salt_water
- Lead [air, unspecified]: 1.77e-8 kg; lognormal variance with pedigree 0.05, pedigree (1,1,5,1,1)
  calculated from max value assuming lognormal distribution
- COD, Chemical Oxygen Demand [water, unspecified]: 3.78e-5 kg; lognormal variance with pedigree 0.11, pedigree (1,1,5,1,1)
  calculated from max value assuming lognormal distribution
- Water [water, unspecified]: 0.0135214 m3; name water_to_water_unspecified; = water_cooling_UNO_input*(1-fraction_CW_to_air)+water_UNO_input*(1-fraction_PW_to_air); lognormal variance with pedigree 0.0807, pedigree (2,2,5,1,1)
  (same comment as for Water)
  property fraction, origin: salt water 0; name fraction_origin_salt_water_Ww
  property fraction, origin: fresh water 0; name fraction_origin_fresh_water_Ww
  property fraction, origin: unspecified 1; name fraction_origin_unspecified_Ww

## Sampling procedure
Literature

## Extrapolations
This dataset has been extrapolated from year 2002 to the year of the calculation (2019). The uncertainty has been adjusted accordingly.

## Review by Roland Hischier 2003-06-17
Passed.
Exchange Aluminium, water/unspecified: SD 95 <1 NICHT erlaubt bei lognormal!
