# electricity, high voltage, production mix

Dataset: EcoSpold 2, unit process, production mix
Geography: CN-ZJ
Time period: 2019-01-01 to 2019-12-31
Scenario: Business-as-Usual
System model: Allocation at the point of substitution
Generated by: [System]
Database: ecoinvent
isCopyrightProtected: false
accessRestrictedTo: 1

## Reference product
- electricity, high voltage: 1 kWh; CPC 17100: Electrical energy; By-product classification allocatable product
  production volume 5.64171e11 kWh

## Inputs from technosphere
- electricity, high voltage: 0.00609109 kWh
  production volume 3.43642e9 kWh
  properties: price 0.0977 EUR2005
- electricity, high voltage: 0.0678455 kWh
  production volume 3.82765e10 kWh
- electricity, high voltage: 0.000545345 kWh
  production volume 3.07668e8 kWh
- electricity, high voltage: 0.00134345 kWh
  production volume 7.57935e8 kWh
- electricity, high voltage: 0.00159486 kWh
  production volume 8.99772e8 kWh
- electricity, high voltage: 0.786055 kWh
  production volume 4.4347e11 kWh
- electricity, high voltage: 0.00163483 kWh
  production volume 9.22327e8 kWh
- electricity, high voltage: 0.100246 kWh
  production volume 5.6556e10 kWh
- electricity, high voltage: 0.000803923 kWh
  production volume 4.5355e8 kWh
- electricity, high voltage: 0.0155591 kWh
  production volume 8.778e9 kWh
- electricity, high voltage: 0.0174155 kWh
  production volume 9.8253e9 kWh
- electricity, high voltage: 0.000864986 kWh
  production volume 4.88e8 kWh
