# plastic granulate production, unspecified, recycled, informal sector

Dataset: EcoSpold 2, unit process
Geography: IN
Time period: 2017-01-01 to 2019-12-31
Technology level: old
Classification: ISIC rev.4 ecoinvent: 3830:Materials recovery
Scenario: Business-as-Usual
System model: Allocation at the point of substitution
Share of production covered: 1 %
Generated by: Prasad Gangane
Published in: Gangane, P. 2017
Database: ecoinvent
isCopyrightProtected: true
accessRestrictedTo: 1

## General comment
New Delhi informal plastic recycling market is South Asia's largest recycling hub. The raw material is collected from all parts of the country. The informal sector works on its large collection network of ragpickers and kabbadiwalas present throughout the country. It is known to be one of the most efficient collection channels due to its reach to every household in the country and efficient sorting techniques. The data set is a representation of collection of raw materials from the first immediate collection point which is Tikkrikalan, situated approximately 10 kilometers from the recycling hub. The informal sector in India uses extrusion machines for granulation, and separate moulding machines for moulding and colouring of plastics from e-waste. Electricity is obtained from the grid. Certain units that do not have a connection to the grid use generator sets with diesel as fuel in it. The basic operation of granulation at all informal recycler is same. Plastic flakes are fed into the extrusion machine through hoppers and plastic in molten state pass through electrically heated barrels and passed through dye to take up a shape of wire. These are passed through the water bath to reduce its temperature and at the end of bath these wires are cut in the uniform size to produce granules.

## Included activities start
This dataset include activities that occur after the shredded or ground plastic material is received for pelletization.

## Included activities end
This dataset includes activities until the received shredded or ground waste plastics is pelletized, moulded and/or coloured.

## Geography
The geography included for the informal sector mainly includes the recycling hub at New Delhi. However, since country's majority of the recycling happens in this hub, the data set can be considered complete.

## Technology
The informal sector uses equipment that it has been utilizing for several years. The equipment are generally assembled ones and do not refer to any particular supplier. Hence it can be considered as an old technology.

## Time period
The recycling sector has been following this method for several years. There is no anticipated change in the next few years in their method of working. However, with the new e-waste rules in the country, certain changes are expected to occur over a period of time, however, may not be earlier than 2022.

## Reference product
- plastic granulate, unspecified, recycled: 1 kg; name Granule; By-product classification allocatable product; CPC 347: Plastics in primary forms
  Recyled plastic granules produced from the extrusion process
  production volume 2.9857e8 kg
    Annual production volume is estimated based on the report on Plastic Scrap Trading in India, 2016 by Daniel Kross an intern at EMPA
  property price 0.7 EUR2005; name Granule_price_EUR2005
    Temporary from https://www.alibaba.com/trade/search?fsb=y&IndexArea=product_en&CatId=&SearchText=pet+granulate
  property carbon content 0.83022
    carbon content on a dry matter basis (reserved; not for manual entry)
  property true value 700; name Granule_true_value
    allocation property applied in "true value" allocation // value calculated from revenue
  properties: concentration, lead 5.66e-7 kg/kg, concentration, cadmium 1.05e-7 kg/kg, carbon content, fossil 0.83022, concentration, chromium 9.1e-7 kg/kg, concentration, zinc 6.517e-5 kg/kg, total polycyclic aromatic hydrocarbon content 0.0010858, dry mass 1 kg, concentration, copper 6.2e-7 kg/kg, concentration, nickel 1.225e-6 kg/kg, wet mass 1 kg, carbon allocation 0.83022 kg

## By-products
- heat, district or industrial, other than natural gas: 0 MJ; CPC 17300: Steam and hot water; By-product classification allocatable product; pedigree (1,1,1,1,1)
  net production of heat from landfill gas utilisation.
  Uncertainty: U
  production volume 2.97516e-6 MJ
  property price 0.0106 EUR2005
    Average European district heat price from Ecoheatcool and Euroheat 2005-2006, Ecoheat Work package 1: The European heat market. Final report. 10.6 EUR/GJ i s the price of district heat. http://www.solarthermalworld.org/files/Ecoheatcool%20WP1%20Web.pdf?download
  property carbon content 0
    carbon content on a dry matter basis (reserved; not for manual entry)
  property true value 6.53514e-14
    allocation property applied in "true value" allocation // value calculated from true value relation
  properties: wet mass 1 kg, water content 0, water in wet mass 0 kg, true value relation 0.1842, dry mass 1 kg, carbon content, non-fossil 0, carbon content, fossil 0, carbon allocation 0 kg
- electricity, medium voltage: 0 kWh; By-product classification allocatable product; CPC 17100: Electrical energy; pedigree (1,1,1,1,1)
  net production of electricity from landfill gas utilisation (minus electricity demand for landfill gas pumping).
  Uncertainty: U
  production volume 1.64963e-6 kWh
  property price 0.1 EUR2005
    Calculated to be between the price of electricity, high voltage and electricity, low voltage.
  property true value 7.08184e-13
    (same comment as for heat, district or industrial, other than natural gas)
  properties: true value relation 3.6
- heat, for reuse in municipal waste incineration only: 0 MJ; CPC 17300: Steam and hot water; By-product classification allocatable product; pedigree (1,1,1,1,1)
  Net electricity generated from this waste and used in internal MSWI plant energy redistribution.
  Uncertainty: uncertainty is calculated from uncertainties in waste composition and uncertainties in energy efficiency and the uncertainty in internal energy demand
  production volume 300430 MJ
  property exergy 0.1842 MJ; name E_th_prod_MSWI_exergy
    This exergy property is based on the exergy content of the product.
  property price 0.0106 EUR2005; name E_th_prod_MSWI_price_EUR2005
    (same comment as for heat, district or industrial, other than natural gas)
  property true value relation 0.1842; name E_th_prod_MSWI_true_value_relation
    property to calculate "true value" from
  property true value 0.00659915
    (same comment as for heat, district or industrial, other than natural gas)
- electricity, for reuse in municipal waste incineration only: 0 kWh; CPC 17100: Electrical energy; By-product classification allocatable product; pedigree (1,1,1,1,1)
  (same comment as for heat, for reuse in municipal waste incineration only)
  production volume 43096 kWh
  property true value relation 3.6; name E_el_prod_MSWI_true_value_relation
    property to calculate "true value" from
  property price 0.1 EUR2005; name E_el_prod_MSWI_price_EUR2005
    Estimated to be the same price as in case of electricity, medium voltage.
  property exergy 3.6 MJ; name E_el_prod_MSWI_exergy
    This exergy property is based on the exergy content of the product.
  property true value 0.018501
    (same comment as for heat, district or industrial, other than natural gas)

## Inputs from technosphere
- liquefied petroleum gas: 0.0077775 kg; name LPG; lognormal variance with pedigree 0.010025, pedigree (2,5,2,2,2)
  Used for barrel heating instead of electric heaters in some of the recyclers
  properties: dry mass 1 kg, carbon content, fossil 0.821863, wet mass 1 kg
- waste plastic, consumer electronics: -0.000116241 kg; name Waste_rejects; = (flakes- Granule)*-1; lognormal variance with pedigree 0.049425, pedigree (2,5,2,2,2)
  Waste plastic is again reused for extrusion process
  production volume 34707.3 kg; = Ref('d1958ecb-7428-477a-9c4a-999624691072', 'ProductionVolume')* Waste_rejects/ Granule
    Calculated from production volume of reference product using the relative outputs.
  property concentration, copper 6.2e-7 kg/kg; name Waste_rejects_concentration_Cu
  property price 0 EUR2005; name Waste_rejects_price_EUR2005
  property concentration, cadmium 1.05e-7 kg/kg; name Waste_rejects_concentration_Cd
  property concentration, lead 6.2e-7 kg/kg; name Waste_rejects_concentration_Pb
  property concentration, zinc 6.517e-5 kg/kg; name Waste_rejects_concentration_Zn
  property concentration, nickel 1.225e-6 kg/kg; name Waste_rejects_Ni_concentration
  properties: total polycyclic aromatic hydrocarbon content 0.0010858, carbon content, fossil 0.830215, wet mass 1 kg, dry mass 0.847 kg, water content 0.180638, concentration, chromium 9.1e-7 kg/kg
- electricity, low voltage: 0.0787012 kWh; lognormal variance with pedigree 0.010025, pedigree (2,5,2,2,2)
  Includes power required for extruder and other auxiliary requirement including power consumed by the borewell pump.
- plastic flake, consumer electronics, for recycling: 1.00008 kg; name flakes; lognormal variance with pedigree 0.049425, pedigree (2,5,2,2,2)
  plastic flakes produced from the grinding operations.
  property concentration, zinc 1.225e-6 kg/kg; name flakes_concentration_Zn
  property concentration, nickel 1.225e-6 kg/kg; name flakes_Ni_concentration
  property concentration, cadmium 1.05e-7 kg/kg; name flakes_concentration_Cd
  property concentration, copper 6.2e-7 kg/kg; name flakes_concentration_Cu
  property concentration, lead 5.66e-7 kg/kg; name flakes_concentration_Pb
  properties: concentration, chromium 9.1e-7 kg/kg, carbon content, fossil 0.83022, total polycyclic aromatic hydrocarbon content 0.0010858, wet mass 1 kg, dry mass 1 kg

## Inputs from nature
- Water, well, in ground [natural resource, in water]: 0.000427111 m3; name Water_inlet; lognormal variance with pedigree 0.049425, pedigree (2,5,2,2,2)
  Extruded plastic is passed through water tank to reduce its temperature

## Emissions to nature
- Nitrogen oxides [air, urban air close to ground]: 8.02136e-5 kg; = LPG*0.01031355; lognormal variance with pedigree 0.049425, pedigree (2,5,2,2,2)
  Emissions due to burning of LPG
- Benzene, ethyl- [air, urban air close to ground]: 1.18996e-9 kg; lognormal variance with pedigree 0.048825, pedigree (1,5,2,2,2)
  Based on the VOC emission measurement by SGS Pvt Ltd
- Carbon monoxide, fossil [air, urban air close to ground]: 1.97449e-5 kg; = LPG*0.00253872; lognormal variance with pedigree 0.659425, pedigree (2,5,2,2,2)
  Emissions due to burning of LPG
- Toluene [air, urban air close to ground]: 1.70994e-9 kg; lognormal variance with pedigree 0.048825, pedigree (1,5,2,2,2)
  Based on the VOC emission measurement by SGS Pvt Ltd
- Carbon dioxide, fossil [air, urban air close to ground]: 0.0222775 kg; = 2.8643469* LPG; lognormal variance with pedigree 0.010025, pedigree (2,5,2,2,2)
  Emissions due to burning of LPG
- Particulates, > 2.5 um, and < 10um [air, urban air close to ground]: 4.19579e-6 kg; = 0.000539478* LPG; lognormal variance with pedigree 0.309425, pedigree (2,5,2,2,2)
  Emissions due to burning of LPG
- Sulfur dioxide [air, urban air close to ground]: 6.17028e-7 kg; = 7.9335E-05* LPG; lognormal variance with pedigree 0.010025, pedigree (2,5,2,2,2)
  Emissions due to burning of LPG
- Particulates, > 10 um [air, urban air close to ground]: 1.04894e-6 kg; = 0.000134869* LPG; lognormal variance with pedigree 0.049425, pedigree (2,5,2,2,2)
  Emissions due to burning of LPG
- Water [air, unspecified]: 0.000116205 m3; = Water_inlet- Water_outlet; normal variance with pedigree 3.00942, pedigree (2,5,2,2,2)
  Evaporation losses
- Methane, dichloro-, HCC-30 [air, urban air close to ground]: 1.33995e-9 kg; lognormal variance with pedigree 0.048825, pedigree (1,5,2,2,2)
  Based on the VOC emission measurement by SGS Pvt Ltd
- Water [water, unspecified]: 0.000310907 m3; name Water_outlet; lognormal variance with pedigree 0.049425, pedigree (2,5,2,2,2)
  Discarded water periodically to drainage
- Carbon disulfide [air, urban air close to ground]: 4.62983e-10 kg; lognormal variance with pedigree 0.048825, pedigree (1,5,2,2,2)
  Based on the VOC emission measurement by SGS Pvt Ltd

## Sampling procedure
An initial data collection questionnaire was circulated amongst the recyclers. On-site visits were carried out and data were collected from 15 different recyclers in the informal recycling sector. Information provided was verified. For those facilities in the informal sector that did not have documented electricity bills, electrical consumption readings were taken for major energy consuming equipment. These recyclers were engaged into recycling of plastics mainly Polycarbonate (PC), High Impact Polystyrene (HIPS), Acrylonitrile Butadiene Styrene (ABS), Polypropylene (PP) etc. Data collected from different recyclers was compiled in the excel sheets and analysed All the data were aggregated to per 1000 kgs of production of pellets/granules
