# packaging production for pesticide, per kilogram of packed product

Dataset: EcoSpold 2, unit process
Geography: GLO
Time period: 2009-01-01 to 2019-12-31
Technology level: current
Classification: ISIC rev.4 ecoinvent: 2220:Manufacture of plastics products
Scenario: Business-as-Usual
System model: Allocation at the point of substitution
Generated by: Avraam Symeonidis
Database: ecoinvent
isCopyrightProtected: true
accessRestrictedTo: 1

## General comment
This dataset represents the production and disposal of packaging material for 1 kg of liquid pesticides used at the farm. Based on measured data, 1.160 kg of plastic is needed for a plastic container that can deliver 20 liters of liquid pesticides. The dataset considers all pesticides to be in a liquid form. The reference product (1 kg) represents the packaging necessary for the respective amount of pesticide used on the farm level. Therefore, this dataset should be used considering the amount of the active substance present in the pesticide and the final amount of pesticide (that contains the active substance dilluted) that is packed and finally applied in the field, i.e.: 1 kg of packaging for pesticides should be used per 0.5 kg of input of pesticide active substance - assuming here a dillution rate of 2 (parts of pesticide per part of active substance).
The activity is also considering the wastes generated by the use of packaging for pesticides on the farm level, so no addition of the waste is needed in the agricultural dataset.

## Included activities start
This activity starts with the reception of the HDPE granulates and production of the plastic container for packaging liquid pesticides.

## Included activities end
The dataset is also considering the production of the HDPE container, weighting 1.160 kg and able to deliver 20 kg of liquid pesticides. The container is produced with
injection moulding. This activity ends with the disposal of waste packaging.

## Reference product
- packaging, for pesticides: 1 kg; name RP; By-product classification allocatable product; CPC 36490: Other articles for the conveyance or packing of goods, of plastics; stoppers, lids, caps and other closures, o[…]
  The reference product represents the production of the packaging material that is needed to store 1 kg of liquid pesticides (or fertilisers) in a 20 liter plastic container.
  production volume 3.16364e7 kg; name PV_RP; = 1.80E+08*1/0.33/20*1.160
    Based on Eurostat, in 2017 the total amount of pesticides sold in Europe amounted to 1.80E+08 kg. Considering that EU represends circa 33% of the world GDP, the global figure is derived with GDP scaling. Therefore, the global consumption of pesticides in 2017 was calculated to be 5.45E+08 kg. Given this information, the amount of packaging of pesticides is calculated to be 3.16E+07 kg considering that 20 liters of pesticide need a plastic container that weights 1.160 kg. The calculation is considering the total amount of pesticides to be in liquid form.
    Source: Eurostat, 2019, Pesticide sales, accessed at: https://ec.europa.eu/eurostat/data/database on 03/04/2019.
  property price 0.0761185 EUR2005
    Calculated based on inputs: The price of the product has been calculated as a sum of the values of the material and energy inputs for this product. This value is therefore a rough estimation. It may underestimate the real price since there are additional expenses when producing any product. These expences can include for example labour costs, treatment of waste materials and profit for the producer. Please consider carefully whether this level of data quality is acceptable for your application.
  property carbon content, non-fossil 0
    Biogenic carbon content of plastics with fossil origin is considered zero.
  property carbon content 0.85714
    carbon content on a dry matter basis (reserved; not for manual entry)
  property true value 0.0761185; name RP_true_value
    allocation property applied in "true value" allocation // value calculated from revenue
  properties: carbon content, fossil 0.85714, water content 0, water in wet mass 0 kg, dry mass 1 kg, wet mass 1 kg, carbon allocation 0.85714 kg

## By-products
- heat, for reuse in municipal waste incineration only: 0 MJ; CPC 17300: Steam and hot water; By-product classification allocatable product; pedigree (1,1,1,1,1)
  Net electricity generated from this waste and used in internal MSWI plant energy redistribution.
  Uncertainty: uncertainty is calculated from uncertainties in waste composition and uncertainties in energy efficiency and the uncertainty in internal energy demand
  production volume 2.23562e6 MJ
  property exergy 0.1842 MJ; name E_th_prod_MSWI_exergy
    This exergy property is based on the exergy content of the product.
  property true value relation 0.1842; name E_th_prod_MSWI_true_value_relation
    property to calculate "true value" from
  property price 0.0106 EUR2005; name E_th_prod_MSWI_price_EUR2005
    Average European district heat price from Ecoheatcool and Euroheat 2005-2006, Ecoheat Work package 1: The European heat market. Final report. 10.6 EUR/GJ i s the price of district heat. http://www.solarthermalworld.org/files/Ecoheatcool%20WP1%20Web.pdf?download
  property true value 0.000344772
    allocation property applied in "true value" allocation // value calculated from true value relation
- electricity, for reuse in municipal waste incineration only: 0 kWh; CPC 17100: Electrical energy; By-product classification allocatable product; pedigree (1,1,1,1,1)
  (same comment as for heat, for reuse in municipal waste incineration only)
  production volume 322256 kWh
  property exergy 3.6 MJ; name E_el_prod_MSWI_exergy
    This exergy property is based on the exergy content of the product.
  property true value relation 3.6; name E_el_prod_MSWI_true_value_relation
    property to calculate "true value" from
  property price 0.1 EUR2005; name E_el_prod_MSWI_price_EUR2005
    Estimated to be the same price as in case of electricity, medium voltage.
  property true value 0.000971289
    (same comment as for heat, for reuse in municipal waste incineration only)

## Inputs from technosphere
- waste polyethylene: 0 kg; name BP1; pedigree (1,1,1,1,1)
  This waste exchange is taking into account the waste polyethylene that is produced after the application of the pesticide.
  production volume 0 kg
    Calculated from reference product production volume, reference product amount and byproduct amount.
  property price 0 EUR2005; name BP1_price_EUR2005
  properties: carbon content, fossil 0.825301, wet mass 1 kg, water content 0.00401606, dry mass 0.996 kg
- injection moulding: 0.0573584 kg; lognormal variance with pedigree 0.0073, pedigree (3,2,3,5,2)
  A plastic container to store 20 liter of liquide pesticides weights 1.160 kg (mesured data) which is 0.0058 kg packaging per kg stored liquor. The injection moulding process requiers 0.0583501 kg of HDPE since 1.0 kg product of this process equals 0.994 kg of injection moulded plastics.
- polyethylene, high density, granulate: 0.0573584 kg; lognormal variance with pedigree 0.0073, pedigree (3,2,3,5,2)
  (same comment as for injection moulding)
  properties: dry mass 1 kg, carbon content, fossil 0.857143, wet mass 1 kg
- waste polyethylene: -0.00552101, -0.000425638, -0.000175804, -0.000166942, -0.00637028, -7.10227e-5, -3.21903e-5, -0.0445955 kg (8 entries); lognormal variance with pedigree 0.0073, pedigree (3,2,3,5,2)
  (same comment as for waste polyethylene)
  production volume 1.84599e6 kg

## Sampling procedure
Measured values originate from the Swiss Federal Office for Agriculture.
