# fish freezing, small fish

Dataset: EcoSpold 2, unit process
Geography: RoW
Time period: 2011-01-01 to 2019-12-31
Technology level: current
Classification: ISIC rev.4 ecoinvent: 1020:Processing and preserving of fish, crustaceans and molluscs
Scenario: Business-as-Usual
System model: Allocation at the point of substitution
Generated by: Angel Avadí
Published in: Avadí, A. 2018
Database: ecoinvent
isCopyrightProtected: true
accessRestrictedTo: 1

## General comment
The activity represents the freezing os small fish in a freezing plant. The functional unit is 1000 kg of raw material processed, excluding residues. The total raw material demand of this activity is 1000 kg of preprocessed raw material + the amount of residues generated by preprocessing (gutting, heading, tailing, peeling, filleting, etc). The life cycle inventories were produced based on a sample of 1 Peruvian plant (processing capacity: 16 200 t/y) and data from other industry representatives. The data applies to small fish such as small pelagics (anchovies, herrings, sardines, mackerels) and small bottom feeders (grouppers, eals, small cods, haddock, bass, snappers). Energy demands for processing large fish may be different. This activity can be used to model fish processing in other geographies.
Users must use this service activity in combination with an activity providing the raw material (fish).
System boundaries of fish processing for Direct Human Consumption (DHC) and relations between activities
Detailed system boundaries of DCH activities in Peru, including provision of fish from dedicated fleet

## Included activities start
From delivery of consumables to the plant, through its Use phase (production), including all upstream activities (e.g. provision of infrastructure, fuels, electricity, chemicals and packaging materials).

## Included activities end
Excludes fishery activities and provision of raw material (fish)

## Geography
Representative of Peru.

## Technology
Small pelagics freezing activities of Peruvian fish freezing plants, per t of processing capacity. Plants have a lifespan of 30 years.
Process diagram of small fish freezing

## Time period
Production figures represent the period 2012. Valid as of 2017.

## Reference product
- fish residues: 1 kg; name residues; source Angel Avadí 2014; CPC 21221: Fish fillets and fish meat (whether or not minced), fresh or chilled; By-product classification Recyclable; pedigree (1,1,1,1,1)
  Residues from fish processing, raw or cooked
  Uncertainty: Data from 1 plant, assumptions for larger plants
  production volume 5.18016e8 kg; = prod_vol * residues / production
    Calculated from production volume of reference product using the relative outputs.
  property water content 0.758889; name residues_water_content
  property fat content 0.061; name residues_fat_content
    Average of 49 fish species, http://www.fao.org/wairdocs/tan/x5916e/x5916e01.htm
  property ash content 0.015 kg; name residues_ash
    Ash content of fish is between 1-2% of the edible portion, http://www.fao.org/wairdocs/tan/x5916e/x5916e01.htm
  property carbon content, non-fossil 0.47385; name residues_C_content_non_fossil; = (1-residues_protein-residues_fat_content-residues_ash)*0.444+residues_protein*0.535+residues_fat_content*0.774
    Calculated from C_content = polysaccharids*0.444+protein*0.535+lipids*0.774 and polysaccharids = 1-(protein+lipids+ash)
  property price 0.062025 EUR2005; name residues_price_EUR2005
    Calculated value. According to Vázquez-Rowe et al. (2014) fish residues represent 15% of economics savings in relation to canned sardines. The price of canned sardines is here assumed to be 0.5USD per kg (source: alibaba.com, retrieved from: https://www.alibaba.com/showroom/canned-sardine-price.html, accessed 2March2018 & mysupermarket.co.uk, retrieved from: http://www.mysupermarket.co.uk/grocery-categories/Tinned_Sardines_in_Lidl.html, accessed 3AMrch 2018). We assume the price is calculated as 0.5USD/kg *0.15. The price is then converted in EUR.
    Vázquez-Rowe et al. (2014) Life cycle assessment of European pilchard (Sardina pilchardus) consumption. A case study for Galicia (NW Spain). Science of the Total Environment 475 (2014) 48–60
  property dry mass 0.241111 kg; name residues_DM
  property energy content 4.01 MJ; name residues_energy_content
    Average of 49 fish species, http://www.fao.org/wairdocs/tan/x5916e/x5916e01.htm
  property protein content 0.18; name residues_protein
    Average of 49 fish species, http://www.fao.org/wairdocs/tan/x5916e/x5916e01.htm
  property water in wet mass 0.182977 kg; name residues_WWM
  property wet mass 0.424088 kg; name residues_WM
  property carbon content 0.47385
    carbon content on a dry matter basis (reserved; not for manual entry)
  property true value 20.6543; name residues_true_value
    allocation property applied in "true value" allocation // value calculated from revenue
  properties: carbon allocation 0.11425 kg
- fish freezing, small fish: 0 kg; name production; source Angel Avadí 2014; By-product classification allocatable product; CPC 21222: Fish fillets, frozen
  Amount of raw material processed, excluding residues. The total raw material demand of this activity is 1000 kg of preprocessed raw material + the amount of residues generated by preprocessing (gutting, heading, tailing, peeling, filleting, etc).
  production volume 1.5556e9 kg; name prod_vol
    Global production of frozen fish assumed to be 1 order of magnitude that of Peru (Peru produced 172 845 t of frozen fish (fillets, meat, minced) in 2013, ~10 000 t of which was anchovies)
  property price 0.182035 EUR2005; name production_price_EUR2005
    Calculated based on inputs: The price of the product has been calculated as a sum of the values of the material and energy inputs for this product. This value is therefore a rough estimation. It may underestimate the real price since there are additional expenses when producing any product. These expences can include for example labour costs, treatment of waste materials and profit for the producer. Please consider carefully whether this level of data quality is acceptable for your application.
  property true value 182.035; name production_true_value
    allocation property applied in "true value" allocation // value calculated from revenue

## By-products
- heat, for reuse in municipal waste incineration only: 0 MJ; CPC 17300: Steam and hot water; By-product classification allocatable product; pedigree (1,1,1,1,1)
  Net electricity generated from this waste and used in internal MSWI plant energy redistribution.
  Uncertainty: uncertainty is calculated from uncertainties in waste composition and uncertainties in energy efficiency and the uncertainty in internal energy demand
  production volume 9.16453e7 MJ
  property exergy 0.1842 MJ; name E_th_prod_MSWI_exergy
    This exergy property is based on the exergy content of the product.
  property price 0.0106 EUR2005; name E_th_prod_MSWI_price_EUR2005
    Average European district heat price from Ecoheatcool and Euroheat 2005-2006, Ecoheat Work package 1: The European heat market. Final report. 10.6 EUR/GJ i s the price of district heat. http://www.solarthermalworld.org/files/Ecoheatcool%20WP1%20Web.pdf?download
  property true value relation 0.1842; name E_th_prod_MSWI_true_value_relation
    property to calculate "true value" from
  property true value 0.00294375
    allocation property applied in "true value" allocation // value calculated from true value relation
- electricity, for reuse in municipal waste incineration only: 0 kWh; CPC 17100: Electrical energy; By-product classification allocatable product; pedigree (1,1,1,1,1)
  (same comment as for heat, for reuse in municipal waste incineration only)
  production volume 1.30611e7 kWh
  property price 0.1 EUR2005; name E_el_prod_MSWI_price_EUR2005
    Estimated to be the same price as in case of electricity, medium voltage.
  property exergy 3.6 MJ; name E_el_prod_MSWI_exergy
    This exergy property is based on the exergy content of the product.
  property true value relation 3.6; name E_el_prod_MSWI_true_value_relation
    property to calculate "true value" from
  property true value 0.00792861
    (same comment as for heat, for reuse in municipal waste incineration only)
- waste polyethylene, for recycling, sorted: 0 kg; CPC 39270: Waste, parings and scrap of plastics; By-product classification Recyclable; pedigree (1,1,1,1,1)
  production volume 3.38873e8 kg
  property price 0.035 EUR2005
    Convert from EU 27 price to the world by currency exchange rate.
  property carbon content 0.829
    carbon content on a dry matter basis (reserved; not for manual entry)
  property true value 2.5392
    allocation property applied in "true value" allocation // value calculated from revenue
  properties: water content 0.00603622, water in wet mass 0.006 kg, dry mass 0.994 kg, wet mass 1 kg, carbon content, non-fossil 0, carbon content, fossil 0.829, carbon allocation 0.824026 kg
- zinc concentrate: 0 kg; CPC 14290: Other non-ferrous metal ores and concentrates (other than uranium or thorium ores and concentrates); By-product classification allocatable product
  Calculated value from the knowledge of the properties of both products.
  production volume 3278.34 kg
  property price 0.38 EUR2005; name ByP_price_EUR2005
    Temporary price data. Calculated as 90% of purchasers price based on: Zinc content in concentrate 53%. Concentrate price per kg Zn 86.5% of refined Zn price (13.5% treatment charges according to CHR Metals Limited 2005: Dynamic cost curves. http://www.minecost.com/dynamic.pdf). 2004 zinc price from USGS (2007) Mineral commodity summaries 2007. <http://minerals.usgs.gov/minerals/pubs/mcs/2007/mcs2007.pdf> [Accessed 25 May 2010]
  property zinc content 0.53; name zinc_C_zinc_concentrate
    Zinc content on a dry matter basis. Value taken from teh "zinc mine operation" /GLO dataset.
  property dry mass 1 kg; name DM_zinc_concentrate
  property carbon content 0
    carbon content on a dry matter basis (reserved; not for manual entry)
  property true value 1.84522e-6
    allocation property applied in "true value" allocation // value calculated from revenue
  properties: wet mass 1 kg, water content 0, carbon content, non-fossil 0, carbon content, fossil 0, water in wet mass 0 kg, carbon allocation 0 kg
- iron scrap, unsorted: 0 kg; CPC 39310: Slag, dross, scalings and other waste from the manufacture of iron or steel; By-product classification Recyclable; pedigree (1,1,1,1,1)
  Not included in the original report. Added based on the CH inventory in order to have better consistency.;
  The amount and annual production volume for the recyclable by-product output 'iron scrap, sorted' was set to 0 during the review of the database for the release of v3.4. This is a temporary solution to ensure the appropriate point of cut-off for this product within the database. Original amount: 0.00619 kg/reference flow
  production volume 0.948228 kg
  property price 0.149 EUR2005
    Temporary price data. Calculated as 90% of purchasers price based on: estimated at 85% of sorted scrap
  property carbon content 0
    carbon content on a dry matter basis (reserved; not for manual entry)
  property true value 2.10785e-8
    allocation property applied in "true value" allocation // value calculated from revenue
  properties: carbon content, non-fossil 0, wet mass 1 kg, water content 0, carbon content, fossil 0, dry mass 1 kg, water in wet mass 0 kg, carbon allocation 0 kg
- iron scrap, sorted, pressed: 0 kg; By-product classification Recyclable; CPC 39310: Slag, dross, scalings and other waste from the manufacture of iron or steel; pedigree (1,1,1,1,1)
  Iron scrap recovered from this waste.
  Uncertainty: uncertainty calculated from uncertainty in waste composition, uncertainty of share of recyclable metal, uncertainty of transfer coefficient to bottom ash, uncertainty of the efficiency of scrap removal in MSWI plant.
  production volume 33328.4 kg
  property price 0.175 EUR2005
    Temporary price data. Calculated as 90% of purchasers price based on: 2005 import and export prices (total trades (USD) divided by total weight (kg) in biggest economies of the world: EU27, USA, Brasil, China, India, Japan and Russia) from UN Commodity Trade Statistics Database (http://data.un.org/Explorer.aspxDatabase [Accessed 2011.06.20]). Commodity: Waste or scrap, of cast iron
  property carbon content 0
    carbon content on a dry matter basis (reserved; not for manual entry)
  property true value 0.000870147
    allocation property applied in "true value" allocation // value calculated from revenue
  properties: dry mass 1 kg, water content 0, carbon content, non-fossil 0, water in wet mass 0 kg, carbon content, fossil 0, wet mass 1 kg, carbon allocation 0 kg
- aluminium oxide, non-metallurgical: 0 kg; source European Aluminium Association 2008; CPC 41432: Alumina (aluminium oxide), except artificial corundum; By-product classification allocatable product; CAS 1344-28-1; pedigree (1,1,1,1,1)
  production volume 59.6684 kg
  property carbon content, non-fossil 0; name C_content_non_fossil
  property price 0.28 EUR2005; name Al2O3Amount_price_EUR2005
    From UN trade database. http://data.un.org/ Import data from the largest economies of the world are used (Brazil, India, USA, China, Japan and EU-27).
  property dry mass 1 kg; name DM
  property water content 0; name water_content
  property wet mass 1 kg; name WM
  property water in wet mass 0 kg; name WWM
  property carbon content, fossil 0; name C_content_fossil
  property carbon content 0
    carbon content on a dry matter basis (reserved; not for manual entry)
  property true value 2.49254e-6
    allocation property applied in "true value" allocation // value calculated from revenue
  properties: carbon allocation 0 kg
- aluminium, cast alloy: 0 kg; source European Aluminium Association 2008; By-product classification allocatable product; CPC 41431: Unwrought aluminium; pedigree (1,1,1,1,1)
  EcoSpold01Location=RER
  production volume 557.767 kg
  property price 1.3 EUR2005; name castAlloyAmount_price_EUR2005
    Temporary price data. Calculated as 90% of purchasers price based on: Source: London Metal Exchange, Aluminium alloy price for 2005
  property carbon content 0
    carbon content on a dry matter basis (reserved; not for manual entry)
  property true value 0.000108177
    allocation property applied in "true value" allocation // value calculated from revenue
  properties: water in wet mass 0 kg, carbon content, non-fossil 0, water content 0, dry mass 1 kg, carbon content, fossil 0, wet mass 1 kg, carbon allocation 0 kg
- aluminium, wrought alloy: 0 kg; source European Aluminium Association 2008; By-product classification allocatable product; CPC 4153: Semi-finished products of aluminium or aluminium alloys; pedigree (1,1,1,1,1)
  production volume 244.18 kg
  property price 1.44 EUR2005; name secondaryAluminiumOutput_price_EUR2005
    Estimated based on literature values and expert judgement. Aluminium ccast alloys are about 90% of the price of aluminium wrought alloys.
  property carbon content 0
    carbon content on a dry matter basis (reserved; not for manual entry)
  property true value 5.24581e-5
    allocation property applied in "true value" allocation // value calculated from revenue
  properties: wet mass 1 kg, water content 0, carbon content, fossil 0, water in wet mass 0 kg, carbon content, non-fossil 0, dry mass 1 kg, carbon allocation 0 kg
- copper: 0 kg; source Rentz O. 1999; By-product classification allocatable product; CPC 41413: Refined copper and copper alloys, unwrought; master alloys of copper
  Literature value. Copper uses: Before end-use copper is manufactured into semi fabricated products, such as shapes and ingots (known as 'semis'). These manufacturing processes are subdivided into hot working, cold working and, if necessary, process annealing. Few of the semis are ready for use as such. They more typically travel to first-stage manufacturers, who make metal rods, wire, and casting, and then to component manufacturers who produce such things as motors, valves, and insulated cables The components in turn are incorporated by final-stage manufacturers into a variety of finished products - automobiles, commercial buildings, residential housing, and so forth. These uses account for about 79% of the world-wide consumption of copper.
  production volume 1060.84 kg
  property price 5.52 EUR2005
    Literature value (http://www.economist.com/news/business/21576714-mining-industry-has-enriched-chile-its-future-precarious-copper-solution). Average price between 20015 and 2013.
  property carbon content 0
    carbon content on a dry matter basis (reserved; not for manual entry)
  property true value 0.000873637
    allocation property applied in "true value" allocation // value calculated from revenue
  properties: dry mass 1 kg, water in wet mass 0 kg, wet mass 1 kg, carbon content, non-fossil 0, water content 0, carbon content, fossil 0, carbon allocation 0 kg

## Inputs from technosphere
- wastewater from vegetable oil refinery: -0.000417043 m3; = ((water*0.6)/1000)*-1; source Avadí, A. 2018
  Proxy for wastewater from fish processing plant. Asuumed 40% of the water is either incorporated into the product or lost
  production volume 2.14673e6 m3; = prod_vol * ((Ref('dc070838-daac-46a4-9bea-dd74640d2539')*-1) / production)
    Calculated from production volume of reference product using the relative outputs.
  properties: water content 1146.05, dry mass 0.871801 kg, wet mass 1000 kg, carbon content, non-fossil 0.8
  note on carbon content, non-fossil: Estimated load for fish processing plant cleansing wastewater. The loading of fish processing wastewater is mainly organic (http://www.dfo-mpo.gc.ca/Library/273700.pdf)
- water, completely softened: 0 kg; name water; source Angel Avadí 2014; pedigree (1,1,1,1,1)
  Soft water for process
  Uncertainty: Data from 1 plant, assumptions for larger plants
  properties: wet mass 1 kg
- extrusion, plastic film: 0.0241764 kg; = plastic; source Angel Avadí 2014
  Packaging plastic
- polyethylene, low density, granulate: 0.0241764 kg; name plastic; source Angel Avadí 2014; triangular min 0.0241764, mostLikely 0.0241764, max 0.0241764, pedigree (2,3,3,5,1)
  Packaging plastic
  Uncertainty: Data from 1 plant, assumptions for larger plants
  properties: wet mass 1 kg, carbon content, fossil 0.857143, dry mass 1 kg
- fish freezing plant: 5.17815e-10 unit; = ((production+residues)/1000)/(capacity*lifetime); source Angel Avadí 2014
  One unit of plant represents the installed capacity required to process 1 t of raw material
  property lifetime 30 year; name lifetime
  property capacity [kg] 25932 kg; name capacity
- sodium chloride, powder: 0.060441 kg; source Angel Avadí 2014; triangular min 0.060441, mostLikely 0.060441, max 0.060441, pedigree (2,3,3,5,1)
  Salt for brine
  Uncertainty: Data from 1 plant, assumptions for larger plants
  properties: dry mass 1 kg, wet mass 1 kg
- electricity, medium voltage: 0 kWh; source Angel Avadí 2014; pedigree (1,1,1,1,1)
  Electricity use along the whole process, including processing, freezing and cold storage
  Uncertainty: Data from 1 plant, assumptions for larger plants
- waste polyethylene, for recycling, unsorted: 0 kg; source Avadí, A. 2018
  Waste PET from packaging
  production volume 0 kg
    Calculated from production volume of reference product using the relative outputs.
  properties: price 0.0315 EUR2005
- water, completely softened: 0.290667 kg; source Angel Avadí 2014; triangular min 0.290667, mostLikely 0.290667, max 0.290667, pedigree (2,3,3,5,1)
  Soft water for process
  Uncertainty: Data from 1 plant, assumptions for larger plants
- water, completely softened: 0.404405 kg; source Angel Avadí 2014; triangular min 0.404405, mostLikely 0.404405, max 0.404405, pedigree (2,3,3,5,1)
  Soft water for process
  Uncertainty: Data from 1 plant, assumptions for larger plants
- electricity, medium voltage: 0.000360876 kWh; source Angel Avadí 2014; triangular min 0.000360876, mostLikely 0.000360876, max 0.000360876, pedigree (2,3,3,5,1)
  (same comment as for electricity, medium voltage)
- electricity, medium voltage: 0.000178854 kWh; source Angel Avadí 2014; triangular min 0.000178854, mostLikely 0.000178854, max 0.000178854, pedigree (2,3,3,5,1)
  (same comment as for electricity, medium voltage)
- electricity, medium voltage: 0.00169334 kWh; source Angel Avadí 2014; triangular min 0.00169334, mostLikely 0.00169334, max 0.00169334, pedigree (2,3,3,5,1)
  (same comment as for electricity, medium voltage)
- electricity, medium voltage: 0.000605008 kWh; source Angel Avadí 2014; triangular min 0.000605008, mostLikely 0.000605008, max 0.000605008, pedigree (2,3,3,5,1)
  (same comment as for electricity, medium voltage)
- electricity, medium voltage: 2.28158e-5 kWh; source Angel Avadí 2014; triangular min 2.28158e-5, mostLikely 2.28158e-5, max 2.28158e-5, pedigree (2,3,3,5,1)
  (same comment as for electricity, medium voltage)
- electricity, medium voltage: 0.000187293 kWh; source Angel Avadí 2014; triangular min 0.000187293, mostLikely 0.000187293, max 0.000187293, pedigree (2,3,3,5,1)
  (same comment as for electricity, medium voltage)
- electricity, medium voltage: 2.86032e-5 kWh; source Angel Avadí 2014; triangular min 2.86032e-5, mostLikely 2.86032e-5, max 2.86032e-5, pedigree (2,3,3,5,1)
  (same comment as for electricity, medium voltage)
- electricity, medium voltage: 4.74351e-5 kWh; source Angel Avadí 2014; triangular min 4.74351e-5, mostLikely 4.74351e-5, max 4.74351e-5, pedigree (2,3,3,5,1)
  (same comment as for electricity, medium voltage)
- electricity, medium voltage: 9.52874e-7 kWh; source Angel Avadí 2014; triangular min 9.52874e-7, mostLikely 9.52874e-7, max 9.52874e-7, pedigree (2,3,3,5,1)
  (same comment as for electricity, medium voltage)
- electricity, medium voltage: 3.86778e-5 kWh; source Angel Avadí 2014; triangular min 3.86778e-5, mostLikely 3.86778e-5, max 3.86778e-5, pedigree (2,3,3,5,1)
  (same comment as for electricity, medium voltage)
- electricity, medium voltage: 5.50925e-5 kWh; source Angel Avadí 2014; triangular min 5.50925e-5, mostLikely 5.50925e-5, max 5.50925e-5, pedigree (2,3,3,5,1)
  (same comment as for electricity, medium voltage)
- electricity, medium voltage: 2.71434e-5 kWh; source Angel Avadí 2014; triangular min 2.71434e-5, mostLikely 2.71434e-5, max 2.71434e-5, pedigree (2,3,3,5,1)
  (same comment as for electricity, medium voltage)
- electricity, medium voltage: 1.8414e-5 kWh; source Angel Avadí 2014; triangular min 1.8414e-5, mostLikely 1.8414e-5, max 1.8414e-5, pedigree (2,3,3,5,1)
  (same comment as for electricity, medium voltage)
- electricity, medium voltage: 1.65778e-6 kWh; source Angel Avadí 2014; triangular min 1.65778e-6, mostLikely 1.65778e-6, max 1.65778e-6, pedigree (2,3,3,5,1)
  (same comment as for electricity, medium voltage)
- electricity, medium voltage: 5.58991e-6 kWh; source Angel Avadí 2014; triangular min 5.58991e-6, mostLikely 5.58991e-6, max 5.58991e-6, pedigree (2,3,3,5,1)
  (same comment as for electricity, medium voltage)
- electricity, medium voltage: 0.000682245 kWh; source Angel Avadí 2014; triangular min 0.000682245, mostLikely 0.000682245, max 0.000682245, pedigree (2,3,3,5,1)
  (same comment as for electricity, medium voltage)
- electricity, medium voltage: 1.00109e-5 kWh; source Angel Avadí 2014; triangular min 1.00109e-5, mostLikely 1.00109e-5, max 1.00109e-5, pedigree (2,3,3,5,1)
  (same comment as for electricity, medium voltage)
- electricity, medium voltage: 0.000110086 kWh; source Angel Avadí 2014; triangular min 0.000110086, mostLikely 0.000110086, max 0.000110086, pedigree (2,3,3,5,1)
  (same comment as for electricity, medium voltage)
- electricity, medium voltage: 2.65089e-5 kWh; source Angel Avadí 2014; triangular min 2.65089e-5, mostLikely 2.65089e-5, max 2.65089e-5, pedigree (2,3,3,5,1)
  (same comment as for electricity, medium voltage)
- electricity, medium voltage: 3.63745e-5 kWh; source Angel Avadí 2014; triangular min 3.63745e-5, mostLikely 3.63745e-5, max 3.63745e-5, pedigree (2,3,3,5,1)
  (same comment as for electricity, medium voltage)
- electricity, medium voltage: 0.0025411 kWh; source Angel Avadí 2014; triangular min 0.0025411, mostLikely 0.0025411, max 0.0025411, pedigree (2,3,3,5,1)
  (same comment as for electricity, medium voltage)
- electricity, medium voltage: 1.57179e-5 kWh; source Angel Avadí 2014; triangular min 1.57179e-5, mostLikely 1.57179e-5, max 1.57179e-5, pedigree (2,3,3,5,1)
  (same comment as for electricity, medium voltage)
- electricity, medium voltage: 2.77513e-5 kWh; source Angel Avadí 2014; triangular min 2.77513e-5, mostLikely 2.77513e-5, max 2.77513e-5, pedigree (2,3,3,5,1)
  (same comment as for electricity, medium voltage)
- electricity, medium voltage: 2.79734e-5 kWh; source Angel Avadí 2014; triangular min 2.79734e-5, mostLikely 2.79734e-5, max 2.79734e-5, pedigree (2,3,3,5,1)
  (same comment as for electricity, medium voltage)
- electricity, medium voltage: 0.000252943 kWh; source Angel Avadí 2014; triangular min 0.000252943, mostLikely 0.000252943, max 0.000252943, pedigree (2,3,3,5,1)
  (same comment as for electricity, medium voltage)
- electricity, medium voltage: 0.00186689 kWh; source Angel Avadí 2014; triangular min 0.00186689, mostLikely 0.00186689, max 0.00186689, pedigree (2,3,3,5,1)
  (same comment as for electricity, medium voltage)
- electricity, medium voltage: 0.0270679 kWh; source Angel Avadí 2014; triangular min 0.0270679, mostLikely 0.0270679, max 0.0270679, pedigree (2,3,3,5,1)
  (same comment as for electricity, medium voltage)
- electricity, medium voltage: 0.00878907 kWh; source Angel Avadí 2014; triangular min 0.00878907, mostLikely 0.00878907, max 0.00878907, pedigree (2,3,3,5,1)
  (same comment as for electricity, medium voltage)
- electricity, medium voltage: 0.0126926 kWh; source Angel Avadí 2014; triangular min 0.0126926, mostLikely 0.0126926, max 0.0126926, pedigree (2,3,3,5,1)
  (same comment as for electricity, medium voltage)
- waste polyethylene, for recycling, unsorted: -5.5706e-5, -0.0185098, -0.00561089 kg (3 entries); source Avadí, A. 2018
  Waste PET from packaging
  production volume 1.24448e8 kg

## Emissions to nature
- Nitrogen [water, unspecified]: 1.39014e-5 kg; source Angel Avadí 2014; triangular min 1.39014e-5, mostLikely 1.39014e-5, max 1.39014e-5, pedigree (2,3,3,5,1)
  Emissions to water from process waters
  Uncertainty: Data from 1 plant, assumptions for larger plants
- Phosphorus [water, unspecified]: 6.95072e-6 kg; source Angel Avadí 2014; triangular min 6.95072e-6, mostLikely 6.95072e-6, max 6.95072e-6, pedigree (2,3,3,5,1)
  (same comment as for Nitrogen)
- Oils, non-fossil [water, ocean]: 0.000139014 kg; source Angel Avadí 2014; triangular min 0.000139014, mostLikely 0.000139014, max 0.000139014, pedigree (2,3,3,5,1)
  (same comment as for Nitrogen)

## Sampling procedure
Data from 1 freezing plant. This plant is representative of the current technology and management, as determined by interviews with many technical, commercial, academic and governmental representatives.
As of 2017 there were 127 active fish freezing plants in Peru, with an aggregated processing capacity of 3.3 million t/y.

## Extrapolations
Data from small pelagics freezing were assumed to represent the freezing of other fish. For large, whole fish, energy expenditure adjustments should be made.
