# board, hardwood, raw, kiln drying to u=10%

Dataset: EcoSpold 2, unit process
Geography: CA-QC
Time period: 2011-01-01 to 2019-12-31
Technology level: current
Classification: ISIC rev.4 ecoinvent: 1610:Sawmilling and planing of wood
Tags: recontextualization
Scenario: Business-as-Usual
System model: Allocation at the point of substitution
Share of production covered: 0 %
Generated by: Hugues Imbeault-Tétreault
Published in: Bauer, C. 2007
Database: ecoinvent
isCopyrightProtected: true
accessRestrictedTo: 1

## General comment
This dataset represents the service of kiln drying of one m3 sawn hardwood board. The wood chip used in the process is considered to be supplied internally which are generated from slabs and sidings when sawing. Characteristics of the of wood chips to be burned: Dry wood density 640 kg/m3; the low heating value 4208 MJ/m3, humidity when burned is estimated to be around 50%, which is achieved after some weeks of drying in the storage. Wood chip will be able to supply the entire thermal demand for drying, Air emission factors as well as the boiler efficiency represent average annual operation including start and stop (warm-up and shut-down). The boiler used is considered to be 300 kW and emission profile refers to the facility.
The data was provided by and approved by the Swiss forest industry.
Within ecoinvent, three products - boards, beams and laths - are distinguished:
After being sawn, the resulting products can either be air dried down to a moisture content of u=20% (mass of water per dry mass), kiln dried down to u=20% or kiln dried down to u=10%. The activity name indicates the respective product, drying technology and target moisture.
The exchanges of this child dataset are identical to the GLO dataset. This dataset was created to enable linking to regional markets (e.g. for electricity). Data quality indicators were adjusted accordingly.

## Included activities start
Kiln drying process starting from sawn softwood, at the sawmill site, assumed to lose some water before the start of the kiln drying process.

## Included activities end
This activity ends with kiln dried hardwood board, at sawmill. The dataset includes kiln drying of wet wood assumed as u=50%down to u=10%, and shrinkage. The dataset does not include air emissions released from the wood, as the emissions are assumed to be equivalent to emissions from natural drying of wood during decomposition and rotting.

## Geography
Represents average Swiss conditions. The exchanges of this child dataset are identical to the GLO dataset. This dataset was created to enable linking to regional markets (e.g. for electricity). Data quality indicators were adjusted accordingly.

## Parameters
- emission of dinitrogen monoxide: 3.06667e-6 kg/MJ; name N2O
  updated emission profile (amount of emission in kg/MJ used heat) based on personal communication, PSI, 2014
- emission of Mercury: 4e-10 kg/MJ; name Mercury
  (same comment as for emission of dinitrogen monoxide)
- emission of chromium 4: 5.33333e-11 kg/MJ; name chroIV
  (same comment as for emission of dinitrogen monoxide)
- emission of copper: 2.93333e-8 kg/MJ; name copper
  (same comment as for emission of dinitrogen monoxide)
- emission of Phosphorus: 4e-7 kg/MJ; name Phosphorus
  (same comment as for emission of dinitrogen monoxide)
- emission of cadmium: 9.33333e-10 kg/MJ; name cadmium
  (same comment as for emission of dinitrogen monoxide)
- emission of Formaldehyde: 1.73333e-7 kg/MJ; name Formaldehyde
  (same comment as for emission of dinitrogen monoxide)
- emission of Manganese: 2.26667e-7 kg/MJ; name Manganese
  (same comment as for emission of dinitrogen monoxide)
- emission of dioxin measured as 2,3,7,8-tetrachlorodibenzo-p-dioxin: 4.13333e-14 kg/MJ; name tetrachloro
  (same comment as for emission of dinitrogen monoxide)
- emission of Hydrocarbons, aliphatic, alkanes, unspecified: 1.21333e-6 kg/MJ; name Hydrocarbons_aliphatic_alkanes
  (same comment as for emission of dinitrogen monoxide)
- emission of chromium: 5.28e-9 kg/MJ; name chromium
  (same comment as for emission of dinitrogen monoxide)
- emission of Phenol, pentachloro-: 1.08e-11 kg/MJ; name Phenol_pentachloro
  (same comment as for emission of dinitrogen monoxide)
- emission of Nickel: 8e-9 kg/MJ; name Nickel
  (same comment as for emission of dinitrogen monoxide)
- moisture content board: 10 dimensionless; name moisture_board
  moisture content of board
- emission of Particulates >10: 6.66667e-6 kg/MJ; name Particulates_higher_10
  (same comment as for emission of dinitrogen monoxide)
- emission of Magnesium: 4.8e-7 kg/MJ; name Magnesium
  (same comment as for emission of dinitrogen monoxide)
- emission of Particulates >2.5 to <10: 6.66667e-6 kg/MJ; name Particulates2_5_to_10
  (same comment as for emission of dinitrogen monoxide)
- emission of Nitrogen oxides: 0.00024 kg/MJ; name no2
  (same comment as for emission of dinitrogen monoxide)
- emission of zinc: 4e-7 kg/MJ; name zinc
  (same comment as for emission of dinitrogen monoxide)
- emission of Potassium: 3.12e-5 kg/MJ; name Potassium
  (same comment as for emission of dinitrogen monoxide)
- emission of m-Xylene: 1.6e-7 kg/MJ; name mXylene
  (same comment as for emission of dinitrogen monoxide)
- emission of lead: 3.33333e-8 kg/MJ; name lead
  (same comment as for emission of dinitrogen monoxide)
- wood density, basic: 614.4 kg/m3; name basic_wood_d
  kg oven-dry matter/wet volume
- emission of sulfur dioxide: 3.33333e-6 kg/MJ; name SO2
  (same comment as for emission of dinitrogen monoxide)
- furnace, wood chip: 2.31481e-8 unit/MJ; name furnace_energy
  inventory of furnace over MJ heating demand
- emission of sodium: 1.73333e-6 kg/MJ; name sodium
  (same comment as for emission of dinitrogen monoxide)
- wood ash: 0.000666667 kg/MJ; name woodash
  generation of wood ash per MJ
- shrinkage ratio (u=30% - 0%): 0.004 dimensionless; name shrinkage_ratio
  shrinkage in % of volume per % of change in moisture content between u=30% to 0%
- scaling factor: 1.33333 dimensionless; name scaling_factor; lognormal variance with pedigree 0.0016, pedigree (2,1,1,1,1)
  The scaling factor corresponds to the inverse of the average annual efficiency of the heating system, including start/stop (warm up and cool down). Therefore, this efficiency will be lower than figures provided by manufacturers. The estimated value was provided by T.Nussbaumer, Verenum, and represents the average installed boiler in this size category in Switzerland.
- emission of polycyclic aromatic hydrocarbons: 1.48e-8 kg/MJ; name PAH
  (same comment as for emission of dinitrogen monoxide)
- emission of Particulates 2.5: 0.00012 kg/MJ; name Particulate2_5
  (same comment as for emission of dinitrogen monoxide)
- total heat: 1010 MJ; name heat_woodchip
  total thermal energy required for the drying process per m3 of output
- emission of benzene: 1.21333e-6 kg/MJ; name benzene
  (same comment as for emission of dinitrogen monoxide)
- wood density, dry: 640 kg/m3; name dry_wood_d
  kg oven-dry matter/oven-dry volume
- emission of carbon monoxide, non-fossil: 0.000333333 kg/MJ; name co
  (same comment as for emission of dinitrogen monoxide)
- emission of non-methane volatile organic compounds, unspecified origin: 1.4e-5 kg/MJ; name NMVOC
  (same comment as for emission of dinitrogen monoxide)
- emission of benzene, hexachloro: 9.6e-15 kg/MJ; name ben_hexa
  (same comment as for emission of dinitrogen monoxide)
- emission of benzene, ethyl: 4e-8 kg/MJ; name ben_ethyl
  (same comment as for emission of dinitrogen monoxide)
- emission of arsenic: 1.33333e-9 kg/MJ; name arsenic
  (same comment as for emission of dinitrogen monoxide)
- moisture content wood chip: 50 dimensionless; name moisture_woodchip
  moisture content of wood chip
- emission of acetaldehyde: 8.13333e-8 kg/MJ; name acet
  (same comment as for emission of dinitrogen monoxide)
- emission of toluene: 4e-7 kg/MJ; name toluene
  (same comment as for emission of dinitrogen monoxide)
- emission of Hydrocarbons, aliphatic, unsaturated: 4.13333e-6 kg/MJ; name Hydrocarbons_aliphatic
  (same comment as for emission of dinitrogen monoxide)
- emission of benzo(a)pyrene: 6.66667e-10 kg/MJ; name benzo
  (same comment as for emission of dinitrogen monoxide)
- emission of bromine: 8e-8 kg/MJ; name bro
  (same comment as for emission of dinitrogen monoxide)
- emission of chlorine: 2.4e-7 kg/MJ; name ch
  (same comment as for emission of dinitrogen monoxide)
- emission of calcium: 7.8e-6 kg/MJ; name calcium
  (same comment as for emission of dinitrogen monoxide)
- emission of ammonia: 2.30667e-6 kg/MJ; name ammonia
  (same comment as for emission of dinitrogen monoxide)
- emission of Fluorine: 6.66667e-8 kg/MJ; name Fluorine
  (same comment as for emission of dinitrogen monoxide)
- emission of Methane, non-fossil: 3.2e-6 kg/MJ; name Methane_nonfossil
  (same comment as for emission of dinitrogen monoxide)

## Reference product
- sawnwood, board, hardwood, raw, dried (u=10%): 1 m3; name board_kiln_raw; By-product classification allocatable product; CPC 31102: Wood, sawn or chipped lengthwise, sliced or peeled, of a thickness exceeding 6 mm, of non-coniferous wood
  production volume 376992 m3; name p_sawnwood_dried; = 10725/24340*8.5557E+05
    The Swiss annual production volume of raw kiln dried (u=10%) hardwood boards, extrapolated to Quebec (Canada) production volume via the production volumes of sawn hardwood (non-coniferous or NC; including boards, beams and laths) in Switzerland and Quebec according to FAOStat and Statistics Canada, respectively.
  property water in wet mass 61.44 kg; name WWM_dried; = board_raw_DM* board_raw_water_content
  property water content 0.1; name board_raw_water_content
  property dry mass 614.4 kg; name board_raw_DM; = basic_wood_d
  property carbon content, fossil 0; name board_raw_C_content_fossil
    fossil carbon content on a dry matter basis
  property wet mass 675.84 kg; name board_raw_WM; = board_raw_DM*(1+ board_raw_water_content)
  property price 265 EUR2005; name board_kiln_raw_price_EUR2005
    Expert judgement (Urs Luginbühl, Swiss Sawmilling industry, personal communication in June 2014). Cross-reference; FAOSTAT (accessed 20140428). The price is calculated by using data on total world import quantity (m3) and import value (1000 USD), year 2005. 25656806 m3 of Sawnwood (NC) - coniferous was imported in the world in 2005. The import value was 9652714000 USD. The calculated price is thus (9652714000/25656806=376*0.8=) 303 Euro.
  property carbon content, non-fossil 0.494; name board_raw_C_content_non_fossil
    biogene carbon content on a dry matter basis
  property carbon content 0.494
    carbon content on a dry matter basis (reserved; not for manual entry)
  property true value 265; name board_kiln_raw_true_value
    allocation property applied in "true value" allocation // value calculated from revenue
  properties: carbon allocation 303.514 kg

## By-products
- heat, for reuse in municipal waste incineration only: 0 MJ; CPC 17300: Steam and hot water; By-product classification allocatable product; pedigree (1,1,1,1,1)
  Net electricity generated from this waste and used in internal MSWI plant energy redistribution.
  Uncertainty: uncertainty is calculated from uncertainties in waste composition and uncertainties in energy efficiency and the uncertainty in internal energy demand
  production volume 4.70767 MJ
  property exergy 0.1842 MJ; name E_th_prod_MSWI_exergy
    This exergy property is based on the exergy content of the product.
  property price 0.0106 EUR2005; name E_th_prod_MSWI_price_EUR2005
    Average European district heat price from Ecoheatcool and Euroheat 2005-2006, Ecoheat Work package 1: The European heat market. Final report. 10.6 EUR/GJ i s the price of district heat. http://www.solarthermalworld.org/files/Ecoheatcool%20WP1%20Web.pdf?download
  property true value relation 0.1842; name E_th_prod_MSWI_true_value_relation
    property to calculate "true value" from
  property true value 8.21423e-8
    allocation property applied in "true value" allocation // value calculated from true value relation
- electricity, for reuse in municipal waste incineration only: 0 kWh; CPC 17100: Electrical energy; By-product classification allocatable product; pedigree (1,1,1,1,1)
  (same comment as for heat, for reuse in municipal waste incineration only)
  production volume 0.662968 kWh
  property price 0.1 EUR2005; name E_el_prod_MSWI_price_EUR2005
    Estimated to be the same price as in case of electricity, medium voltage.
  property exergy 3.6 MJ; name E_el_prod_MSWI_exergy
    This exergy property is based on the exergy content of the product.
  property true value relation 3.6; name E_el_prod_MSWI_true_value_relation
    property to calculate "true value" from
  property true value 2.26082e-7
    (same comment as for heat, for reuse in municipal waste incineration only)

## Inputs from technosphere
- wood ash mixture, pure: -0.740824 kg; name wood_ash; lognormal variance with pedigree 0.0052, pedigree (2,1,3,5,1)
  calculated from parameters according to the input wood chips for heat production; based on an updated emissions profile for industrial wood combustion (source: communication from PSI - Switzerland)
  production volume 279285 kg; = wood_ash*p_sawnwood_dried/board_kiln_raw
    Extrapolated from the amount of ash per m3 of sawnwood product via the production volume of the sawnwood product
  property price 0 EUR2005; name wood_ash_price_EUR2005
  properties: dry mass 1 kg, wet mass 1 kg, carbon content, non-fossil 0.012
- sawnwood, hardwood, raw: 1.08696 m3; name sawnwood; source Rudi Wagenführ 2000; lognormal variance with pedigree 0.0046, pedigree (2,1,3,5,1)
  Processed internally within the sawmill
  property water in wet mass 394.24 kg; name WWM_raw
  properties: carbon content, non-fossil 0.494, dry mass 563.2 kg, water content 0.7, wet mass 957.44 kg
- wood chips, wet, measured as dry mass: 77.3058 kg; name woodchip_hard; lognormal variance with pedigree 0.0046, pedigree (2,1,3,5,1)
  fuel used for heat generation for drying; CH industry data
  property wet mass 1.5 kg; name woodchip_hard_WM
  property carbon content, fossil 0; name woodchip_hard_C_content_fossil
  property heating value, gross 19.6 MJ; name woodchip_hard_Gross_Heat_Value
  property water in wet mass 0.5 kg; name woodchip_hard_WWM
  property water content 0.5; name woodchip_hard_water_content
  property dry mass 1 kg; name woodchip_hard_DM
  property heating value, net 11.6133 MJ; name woodchip_hard_Net_Heat_Value
  property carbon content, non-fossil 0.494; name woodchip_hard_C_content_non_fossil
  note on heating value, gross: gross (upper) heating (calorific) value according to ecoinvent guidelines 2.2
  note on heating value, net: net (lower) heating (calorific) value; calculated according to ecoinvent guidelines 2.2
- electricity, medium voltage: 30 kWh; name elec_midvol; lognormal variance with pedigree 0.0046, pedigree (2,1,3,5,1)
  electricity consumed in the kiln. Data from industry
- furnace, wood chips, with silo, 300kW: 2.57231e-5 unit; name furnace; lognormal variance with pedigree 0.4346, pedigree (2,1,3,5,1)
  data for heat generation from wooden chip
- technical wood drying facility: 3.66e-6 unit; name wooddrying; lognormal variance with pedigree 0.4346, pedigree (2,1,3,5,1)
  data from industry

## Emissions to nature
- Phenol, pentachloro- [air, urban air close to ground]: 1.20013e-8 kg; lognormal variance with pedigree 0.0052, pedigree (2,1,3,5,1)
  (same comment as for wood ash mixture, pure)
- Bromine [air, urban air close to ground]: 8.88989e-5 kg; lognormal variance with pedigree 0.0052, pedigree (2,1,3,5,1)
  (same comment as for wood ash mixture, pure)
- Particulates, > 2.5 um, and < 10um [air, unspecified]: 0.00740824 kg; lognormal variance with pedigree 0.0106, pedigree (2,1,3,5,1)
  (same comment as for wood ash mixture, pure)
- Cadmium [air, urban air close to ground]: 1.03715e-6 kg; lognormal variance with pedigree 0.0052, pedigree (2,1,3,5,1)
  (same comment as for wood ash mixture, pure)
- Phosphorus [air, urban air close to ground]: 0.000444494 kg; lognormal variance with pedigree 0.0052, pedigree (2,1,3,5,1)
  (same comment as for wood ash mixture, pure)
- Calcium [air, urban air close to ground]: 0.00866764 kg; lognormal variance with pedigree 0.0052, pedigree (2,1,3,5,1)
  (same comment as for wood ash mixture, pure)
- Potassium [air, urban air close to ground]: 0.0346706 kg; lognormal variance with pedigree 0.0052, pedigree (2,1,3,5,1)
  (same comment as for wood ash mixture, pure)
- Carbon dioxide, non-fossil [air, urban air close to ground]: 140.027 kg; lognormal variance with pedigree 0.0052, pedigree (2,1,3,5,1)
  calculated from parameters based on wood input oven-dry x carbon content x molar relationship of CO2/C
- Sodium [air, urban air close to ground]: 0.00192614 kg; lognormal variance with pedigree 0.0052, pedigree (2,1,3,5,1)
  (same comment as for wood ash mixture, pure)
- Carbon monoxide, non-fossil [air, urban air close to ground]: 0.370412 kg; lognormal variance with pedigree 0.0052, pedigree (2,1,3,5,1)
  (same comment as for wood ash mixture, pure)
- Formaldehyde [air, urban air close to ground]: 0.000192614 kg; lognormal variance with pedigree 0.0052, pedigree (2,1,3,5,1)
  (same comment as for wood ash mixture, pure)
- Sulfur dioxide [air, urban air close to ground]: 0.00370412 kg; lognormal variance with pedigree 0.0052, pedigree (2,1,3,5,1)
  (same comment as for wood ash mixture, pure)
- Chlorine [air, urban air close to ground]: 0.000266697 kg; lognormal variance with pedigree 0.0052, pedigree (2,1,3,5,1)
  (same comment as for wood ash mixture, pure)
- Hydrocarbons, aliphatic, alkanes, unspecified [air, urban air close to ground]: 0.0013483 kg; lognormal variance with pedigree 0.0052, pedigree (2,1,3,5,1)
  (same comment as for wood ash mixture, pure)
- Toluene [air, urban air close to ground]: 0.000444494 kg; lognormal variance with pedigree 0.0052, pedigree (2,1,3,5,1)
  (same comment as for wood ash mixture, pure)
- Chromium VI [air, urban air close to ground]: 5.92659e-8 kg; lognormal variance with pedigree 0.0052, pedigree (2,1,3,5,1)
  (same comment as for wood ash mixture, pure)
- Hydrocarbons, aliphatic, unsaturated [air, urban air close to ground]: 0.00459311 kg; lognormal variance with pedigree 0.0052, pedigree (2,1,3,5,1)
  (same comment as for wood ash mixture, pure)
- Zinc [air, urban air close to ground]: 0.000444494 kg; lognormal variance with pedigree 0.0052, pedigree (2,1,3,5,1)
  (same comment as for wood ash mixture, pure)
- Copper [air, urban air close to ground]: 3.25963e-5 kg; lognormal variance with pedigree 0.0052, pedigree (2,1,3,5,1)
  (same comment as for wood ash mixture, pure)
- Lead [air, urban air close to ground]: 3.70412e-5 kg; lognormal variance with pedigree 0.0052, pedigree (2,1,3,5,1)
  (same comment as for wood ash mixture, pure)
- Chromium [air, urban air close to ground]: 5.86733e-6 kg; lognormal variance with pedigree 0.0052, pedigree (2,1,3,5,1)
  (same comment as for wood ash mixture, pure)
- Dinitrogen monoxide [air, urban air close to ground]: 0.00340779 kg; lognormal variance with pedigree 0.0052, pedigree (2,1,3,5,1)
  (same comment as for wood ash mixture, pure)
- Magnesium [air, urban air close to ground]: 0.000533393 kg; lognormal variance with pedigree 0.0052, pedigree (2,1,3,5,1)
  (same comment as for wood ash mixture, pure)
- PAH, polycyclic aromatic hydrocarbons [air, urban air close to ground]: 1.64463e-5 kg; lognormal variance with pedigree 0.0052, pedigree (2,1,3,5,1)
  (same comment as for wood ash mixture, pure)
- Dioxins, measured as 2,3,7,8-tetrachlorodibenzo-p-dioxin [air, urban air close to ground]: 4.59311e-11 kg; lognormal variance with pedigree 0.0052, pedigree (2,1,3,5,1)
  (same comment as for wood ash mixture, pure)
- Manganese [air, urban air close to ground]: 0.00025188 kg; lognormal variance with pedigree 0.0052, pedigree (2,1,3,5,1)
  (same comment as for wood ash mixture, pure)
- Fluorine [air, urban air close to ground]: 7.40824e-5 kg; lognormal variance with pedigree 0.0052, pedigree (2,1,3,5,1)
  (same comment as for wood ash mixture, pure)
- Water [air, unspecified]: 0.367082 m3; = (sawnwood*WWM_raw-board_kiln_raw*WWM_dried)/1000; lognormal variance with pedigree 0.008, pedigree (1,1,3,1,1)
  difference in water in wet mass of raw and dried sawnwood, converted to m3
- Mercury [air, urban air close to ground]: 4.44494e-7 kg; lognormal variance with pedigree 0.0052, pedigree (2,1,3,5,1)
  (same comment as for wood ash mixture, pure)
- Arsenic [air, urban air close to ground]: 1.48165e-6 kg; lognormal variance with pedigree 0.0052, pedigree (2,1,3,5,1)
  (same comment as for wood ash mixture, pure)
- Methane, non-fossil [air, urban air close to ground]: 0.00355595 kg; lognormal variance with pedigree 0.0052, pedigree (2,1,3,5,1)
  (same comment as for wood ash mixture, pure)
- Benzene [air, urban air close to ground]: 0.0013483 kg; lognormal variance with pedigree 0.0052, pedigree (2,1,3,5,1)
  (same comment as for wood ash mixture, pure)
- m-Xylene [air, urban air close to ground]: 0.000177798 kg; lognormal variance with pedigree 0.0052, pedigree (2,1,3,5,1)
  (same comment as for wood ash mixture, pure)
- Acetaldehyde [air, urban air close to ground]: 9.03805e-5 kg; lognormal variance with pedigree 0.0052, pedigree (2,1,3,5,1)
  (same comment as for wood ash mixture, pure)
- Nickel [air, urban air close to ground]: 8.88989e-6 kg; lognormal variance with pedigree 0.0052, pedigree (2,1,3,5,1)
  (same comment as for wood ash mixture, pure)
- Ammonia [air, urban air close to ground]: 0.00256325 kg; lognormal variance with pedigree 0.0052, pedigree (2,1,3,5,1)
  (same comment as for wood ash mixture, pure)
- Nitrogen oxides [air, urban air close to ground]: 0.266697 kg; lognormal variance with pedigree 0.0052, pedigree (2,1,3,5,1)
  (same comment as for wood ash mixture, pure)
- Benzene, ethyl- [air, urban air close to ground]: 4.44494e-5 kg; lognormal variance with pedigree 0.0052, pedigree (2,1,3,5,1)
  (same comment as for wood ash mixture, pure)
- NMVOC, non-methane volatile organic compounds, unspecified origin [air, urban air close to ground]: 0.01414 kg; lognormal variance with pedigree 0.0052, pedigree (2,1,3,5,1)
  (same comment as for wood ash mixture, pure)
- Benzene, hexachloro- [air, urban air close to ground]: 1.06679e-11 kg; lognormal variance with pedigree 0.0052, pedigree (2,1,3,5,1)
  (same comment as for wood ash mixture, pure)
- Particulates, < 2.5 um [air, urban air close to ground]: 0.1212 kg; lognormal variance with pedigree 0.0052, pedigree (2,1,3,5,1)
  (same comment as for wood ash mixture, pure)
- Benzo(a)pyrene [air, urban air close to ground]: 7.40824e-7 kg; lognormal variance with pedigree 0.0052, pedigree (2,1,3,5,1)
  (same comment as for wood ash mixture, pure)

## Sampling procedure
complementary literature and sampling from sawmills

## Extrapolations
Extrapolated from Swiss data. The exchanges of this child dataset are identical to the GLO dataset. This dataset was created to enable linking to regional markets (e.g. for electricity). Data quality indicators were adjusted accordingly.
