# methane production, 96% by volume, from synthetic gas, wood, fluidised technology

Dataset: EcoSpold 2, unit process
Geography: RoW
Time period: 2008-01-01 to 2019-12-31
Technology level: current
Classification: EcoSpold01Categories: biomass/fuels
Classification: ISIC rev.4 ecoinvent: 3520:Manufacture of gas; distribution of gaseous fuels through mains
Scenario: Business-as-Usual
System model: Allocation at the point of substitution
Share of production covered: 0 %
Generated by: Andrea Del Duce
Published in: Andrea Del Duce 2015
Database: ecoinvent
isCopyrightProtected: true
accessRestrictedTo: 1

## General comment
This datasets describes the production of methane from wood. The feedstock is first gasified and then methanised. This dataset describes methane production through a fluidised technology. Gas composition (% mol.) of the gas is 96% CH4 (min.). Density is 0.752 kg/Nm3. Lower heating value of the gas is 34.4 MJ/Nm3. Process heat is supplied by methane combustion. Inventory refers to the net production of 1 Nm3 syngas. Net methane yield is 0.270 Nm3/kg of wood (dry matter) with a conversion efficiency (lower heating value of the methane/lower heating value of the required wood) of around 50%.
This dataset was already contained in the ecoinvent database version 2. It was then updated individually veryfing the original data and transofrmation into a v3 dataset. The fuel characteristics as well as production processes are the same as in the original ecoinvent v2 dataset. The values of the exchanges were updated based on some new scaling calculations where the specific values indicated for the differernt processing steps discussed in the ecoinvent report nr. 17 have been considered instead of the final value originally presented. The changes are minor and concern only a few exchanges.
[This dataset is meant to replace the following datasets:]

## Included activities start
The activity begins with the transport of the wood and other required auxiliaries to the production site.

## Included activities end
This process refers to the conversion of wood chips into synthetic methane (96% vol.) through gasification and subsequent methanation. It includes drying (down to 10-15% moisture) and further comminution of wood chips (down to a size of 30x30x30 mm), FICFB (Fast Internally Circulating Fluidised Bed of the BCL type) gasification of the wood chips, treatment and conditioning of the resulting syngas to remove impurities and contaminants, methanation of the the syngas to methane, and compression of methane to natural gas network pressure (30-70 bar).

## Geography
Data from Paul Scherrer Institut (PSI, Switzerland) and the pilot gasification plant in Güssing (Austria)

## Technology
Gasification technology is FICFB (fast internally circulating fluidized bed of the BCL type). Technology for methanation is developed by PSI.

## Time period
Data mainly from 2004, pilot scale, future technology

## Parameters
- fraction, process water, to air: 0.15 dimensionless; name fraction_PW_to_air; lognormal variance with pedigree 0.092025, pedigree (4,4,3,2,4)
- fraction, tap water, to air: 0.15; name fraction_TW_to_air; lognormal variance with pedigree 0.092025, pedigree (4,4,3,2,4)

## Reference product
- methane, 96% by volume: 1 m3; CPC 17200: Coal gas, water gas, producer gas and similar gases, other than petroleum gases and other gaseous hydrocarbons; By-product classification allocatable product
  EcoSpold01Location=CH
  production volume 5.94131e7 m3; name rp_pv
    Estimate. Very limited production, assumed at 50 MW mainly in Latin America and small plants in China using rice husk. See http://www.woodgas.net/files/World%20bank%20tech%20paper%20296.pdf
  property carbon content, non-fossil 0.695496
    Carbon content calculated from composition of the gas, 96% (in vol) methane, 2% (in vol) CO2 (Tab 13.3, ecoinvent v2.2 report 17). The composition in %vol was converted in % weight using density data of the different gases from tab 19.1, ecoinvent v2.2 report 17, part 19.
  property price 0.144 EUR2005
    Temporary price data. Calculated as 90% of purchasers price based on: Same prices per energy output as natural gas, based on the proportional heating value (55.5 MJ/kg for methane; 54.8 MJ/kg for natural gas)
  property carbon content 0.695496
    carbon content on a dry matter basis (reserved; not for manual entry)
  property true value 0.144
    allocation property applied in "true value" allocation // value calculated from revenue
  properties: carbon content, fossil 0, water content 0, water in wet mass 0 kg, wet mass 0.752 kg, dry mass 0.752 kg, carbon allocation 0.523013 kg

## By-products
- heat, for reuse in municipal waste incineration only: 0 MJ; CPC 17300: Steam and hot water; By-product classification allocatable product; pedigree (1,1,1,1,1)
  Net electricity generated from this waste and used in internal MSWI plant energy redistribution.
  Uncertainty: uncertainty is calculated from uncertainties in waste composition and uncertainties in energy efficiency and the uncertainty in internal energy demand
  production volume 4286.46 MJ
  property exergy 0.1842 MJ; name E_th_prod_MSWI_exergy
    This exergy property is based on the exergy content of the product.
  property price 0.0106 EUR2005; name E_th_prod_MSWI_price_EUR2005
    Average European district heat price from Ecoheatcool and Euroheat 2005-2006, Ecoheat Work package 1: The European heat market. Final report. 10.6 EUR/GJ i s the price of district heat. http://www.solarthermalworld.org/files/Ecoheatcool%20WP1%20Web.pdf?download
  property true value relation 0.1842; name E_th_prod_MSWI_true_value_relation
    property to calculate "true value" from
  property true value 4.70794e-7
    allocation property applied in "true value" allocation // value calculated from true value relation
- electricity, for reuse in municipal waste incineration only: 0 kWh; CPC 17100: Electrical energy; By-product classification allocatable product; pedigree (1,1,1,1,1)
  (same comment as for heat, for reuse in municipal waste incineration only)
  production volume 595.689 kWh
  property price 0.1 EUR2005; name E_el_prod_MSWI_price_EUR2005
    Estimated to be the same price as in case of electricity, medium voltage.
  property exergy 3.6 MJ; name E_el_prod_MSWI_exergy
    This exergy property is based on the exergy content of the product.
  property true value relation 3.6; name E_el_prod_MSWI_true_value_relation
    property to calculate "true value" from
  property true value 1.27852e-6
    (same comment as for heat, for reuse in municipal waste incineration only)

## Inputs from technosphere
All rows: source Jungbluth N. 2007
- sodium hydroxide, without water, in 50% solution state: 0.00322996 kg; lognormal variance with pedigree 0.0328, pedigree (3,3,2,5,3)
  EcoSpold01Location=RER
  Calculation from a typical quality of untreated syngas from wood
  Uncertainty: Calculation from a typical quality of untreated syngas from wood
  properties: wet mass 1 kg, dry mass 1 kg
- wood chips, wet, measured as dry mass: 0 kg; pedigree (1,1,1,1,1)
  Yield based on PSI data (Ecogas project) plus calculations, distribution of wood qualities from IEA Task 33 CH report.
  EcoSpold01Location=RER
  Uncertainty: Yield based on PSI data (Ecogas project) plus calculations, distribution of wood qualities from IEA Task 33 CH report
  properties: carbon content, non-fossil 0.494, water content 1.4, dry mass 1 kg, wet mass 2.4 kg
  note on carbon content, non-fossil: C content of dry mass is 0.494 kgC/kg dry wood (ecoinvent v2.2 report 9).
- wastewater, from residence: -0.00107689 m3; name wastewater_out; lognormal variance with pedigree 0.0148, pedigree (2,4,2,5,1)
  Based on PSI data (Ecogas project) plus calculations
  EcoSpold01Location=CH
  Uncertainty: Based on PSI data (Ecogas project) plus calculations
  production volume 63981.9 m3; = wastewater_out*rp_pv
    Calculated from the production volume of methane, 96% by volume in proportion to the respective output amounts. The formula multiplies the exchange output with the production volume of the reference product.
  property price 0 EUR2005; name wastewater_out_price_EUR2005
  properties: water content 2962.17, carbon content, non-fossil 0.199421, wet mass 1000 kg, dry mass 0.337476 kg
  note on carbon content, non-fossil: 0.0673 kg TOC/m3 (Tab A.17, ecoinvent v2.2 report 13_I). TOC was considered as Total Carbon.
- waste zeolite: -0.0081199 kg; lognormal variance with pedigree 0.0262, pedigree (4,5,2,1,1)
  Based on PSI data (Ecogas project) plus calculations, recalculated based on the data in the ecoinvent v2.2 report nr. 17.
  production volume 482434 kg; = Ref('377ffe2e-b1ce-4fea-96e2-cb82277a37e0', 'ProductionVolume') * ((Ref('53411b20-4408-4c8f-a086-62cbd48ac067')*-1) / Ref('377ffe2e-b1ce-4fea-96e2-cb82277a37e0'))
    Calculated from production volume of reference product using the relative outputs.
  properties: wet mass 1 kg, dry mass 0.95 kg, water content 0.0526316
- electricity, low voltage: 0 kWh; pedigree (1,1,1,1,1)
  EcoSpold01Location=UCTE
  Calculation, based on 'heat, natural gas, at boiler modulating' (according to heat supply from methane)
  Uncertainty: Calculation, based on 'heat, natural gas, at boiler modulating' (according to heat supply from methane)
- silica sand: 0.0494994 kg; lognormal variance with pedigree 0.0148, pedigree (2,4,2,5,1)
  Based on PSI data (Ecogas project) plus calculations. The specific value refers to the specific steps detailed in the ecoinvent v2.2 report nr. 17 and not just to the final value originally presented.
  EcoSpold01Location=DE
  Uncertainty: Based on PSI data (Ecogas project) plus calculations
  properties: wet mass 1 kg, water content 0.010101, dry mass 0.99 kg
- charcoal: 0.0198048 kg; lognormal variance with pedigree 0.0148, pedigree (2,4,2,5,1)
  Based on PSI data (Ecogas project) plus calculations
  EcoSpold01Location=GLO
  Uncertainty: Based on PSI data (Ecogas project) plus calculations
  properties: dry mass 1 kg, carbon content, non-fossil 0.8, wet mass 1 kg
- wood ash mixture, pure: 0 kg; name woodash_out; pedigree (1,1,1,1,1)
  EcoSpold01Location=CH
  Based on PSI data (Ecogas project) plus calculations
  Uncertainty: Based on PSI data (Ecogas project) plus calculations
  production volume 0 kg
    Calculated from the production volume of methane, 96% by volume in proportion to the respective output amounts.The formula multiplies the exchange output with the production volume of the reference product.
  property price 0 EUR2005; name woodash_out_price_EUR2005
  properties: carbon content, non-fossil 0.012, wet mass 1 kg, dry mass 1 kg
- aluminium oxide, non-metallurgical: 4.29415e-10 kg; lognormal variance with pedigree 0.0148, pedigree (2,4,2,5,1)
  Based on PSI data (Ecogas project) plus calculations
  EcoSpold01Location=RER
  Uncertainty: Based on PSI data (Ecogas project) plus calculations
  properties: wet mass 1 kg, dry mass 1 kg
- waste mineral oil: 0 kg; name wasteoil_out; pedigree (1,1,1,1,1)
  (same comment as for wood ash mixture, pure)
  production volume 0 kg
    (same comment as for wood ash mixture, pure)
  property price 0 EUR2005; name wasteoil_out_price_EUR2005
  properties: water content 0.111111, wet mass 1 kg, dry mass 0.9 kg, carbon content, fossil 0.864444
  note on carbon content, fossil: Tab A.6, ecoinvent v2.2 report 13_I. C content has been calculated after data in the tables, and then referred to 1 kg DM
- electricity, medium voltage: 0 kWh; pedigree (1,1,1,1,1)
  Based on PSI data (Ecogas project) plus calculations. The specific value refers to the specific steps detailed in the ecoinvent v2.2 report nr. 17 and not just to the final value originally presented. The mathematical relation descibes the sum of the electricity requirements from the various processing steps as derived from the values in the ecoinvent v2.2 report nr. 17.
  EcoSpold01Location=CH
  Uncertainty: Based on PSI data (Ecogas project) plus calculations
- wood chips, dry, measured as dry mass: 0.81399 kg; lognormal variance with pedigree 0.0328, pedigree (3,3,2,5,3)
  Yield based on PSI data (Ecogas project) plus calculations, distribution of wood qualities from IEA Task 33 CH report
  EcoSpold01Location=RER
  Uncertainty: Yield based on PSI data (Ecogas project) plus calculations, distribution of wood qualities from IEA Task 33 CH report
  properties: wet mass 1.4 kg, carbon content, non-fossil 0.494, water content 0.4, dry mass 1 kg
- tap water: 0 kg; name tap_water_input; pedigree (1,1,1,1,1)
  (same comment as for wood ash mixture, pure)
  properties: wet mass 1 kg, dry mass 0.000337476 kg, water content 2962.17, carbon content, fossil 0.00178991
  note on carbon content, fossil: Bicarbonate content is 2.93 mol/m3. CO2 content is 0.1 mol/m3 (ecoinvent v2.2 report 8, Tab 93.1).
- vegetable oil methyl ester: 0.0146218 kg; lognormal variance with pedigree 0.0148, pedigree (2,4,2,5,1)
  Based on PSI data (Ecogas project) plus calculations
  Uncertainty: Based on PSI data (Ecogas project) plus calculations
  properties: wet mass 1 kg, dry mass 1 kg, carbon content, non-fossil 0.732, carbon content, fossil 0.041
- zinc: 0.00186938 kg; lognormal variance with pedigree 0.0148, pedigree (2,4,2,5,1)
  (same comment as for aluminium oxide, non-metallurgical)
  properties: dry mass 1 kg, wet mass 1 kg
- nickel, 99.5%: 4.29415e-10 kg; lognormal variance with pedigree 0.0148, pedigree (2,4,2,5,1)
  EcoSpold01Location=GLO
  Based on PSI data (Ecogas project) plus calculations
  Uncertainty: Based on PSI data (Ecogas project) plus calculations
  properties: wet mass 1 kg, dry mass 1 kg
- dolomite: 0.0395995 kg; lognormal variance with pedigree 0.0054, pedigree (2,4,2,5,1)
  Based on PSI data (Ecogas project) plus calculations. The specific value refers to the specific steps detailed in the ecoinvent v2.2 report nr. 17 and not just to the final value originally presented.
  properties: carbon content, fossil 0.130435, wet mass 1 kg, dry mass 1 kg
- sulfuric acid: 0.0127998 kg; lognormal variance with pedigree 0.0328, pedigree (3,3,2,5,3)
  (same comment as for sodium hydroxide, without water, in 50% solution state)
  properties: wet mass 1 kg, dry mass 1 kg
- zeolite, powder: 0.0081199 kg; lognormal variance with pedigree 0.0054, pedigree (2,4,2,5,1)
  (same comment as for dolomite)
  properties: wet mass 1 kg, dry mass 1 kg
- industrial furnace, natural gas: 2.06207e-8 unit; lognormal variance with pedigree 0.3328, pedigree (3,3,2,5,3)
  Calculation, based on 'heat, natural gas, at boiler modulating' (according to heat supply from methane)
  EcoSpold01Location=RER
  Uncertainty: Calculation, based on 'heat, natural gas, at boiler modulating' (according to heat supply from methane)
- inert waste: 0 kg; name inertwaste_out; pedigree (1,1,1,1,1)
  Based on PSI data (Ecogas project) plus calculations, recalculated based on the data in the ecoinvent v2.2 report nr. 17.
  EcoSpold01Location=CH
  Uncertainty: Based on PSI data (Ecogas project) plus calculations
  production volume 0 kg
    (same comment as for wood ash mixture, pure)
  property price 0 EUR2005; name inertwaste_out_price_EUR2005
  properties: wet mass 1 kg, dry mass 1 kg
- synthetic gas factory: 2.90216e-9 unit; lognormal variance with pedigree 0.3148, pedigree (2,4,2,5,1)
  Calculation
  EcoSpold01Location=CH
  Uncertainty: Calculation
- heat, central or small-scale, other than natural gas: 0 MJ; pedigree (1,1,1,1,1)
  (same comment as for dolomite)
- wood chips, wet, measured as dry mass: 0.00640926, 0.0268887, 2.85392 kg (3 entries); lognormal variance with pedigree 0.0328, pedigree (3,3,2,5,3)
  (same comment as for wood chips, wet, measured as dry mass)
- electricity, low voltage: 8.73546e-5, 1.53209e-5, 0.000347479, 0.0012458, 0.000251937, 0.00381002, 0.000628014, 0.00178888 kWh (8 entries); lognormal variance with pedigree 0.0328, pedigree (3,3,2,5,3)
  (same comment as for electricity, low voltage)
- wood ash mixture, pure: -0.0113389, -0.0236427 kg (2 entries); lognormal variance with pedigree 0.0148, pedigree (2,4,2,5,1)
  (same comment as for wood ash mixture, pure)
  production volume 2.07839e6 kg
- waste mineral oil: -0.00367821, -0.0109436 kg (2 entries); lognormal variance with pedigree 0.0148, pedigree (2,4,2,5,1)
  (same comment as for wood ash mixture, pure)
  production volume 868738 kg
- electricity, medium voltage: 0.00873469, 0.00158935, 0.0366867, 0.124861, 0.0269529, 0.390789, 0.0559293, 0.183247 kWh (8 entries); lognormal variance with pedigree 0.0148, pedigree (2,4,2,5,1)
  (same comment as for electricity, medium voltage)
- tap water: 0.000628747, 0.00522332, 0.00103911, 0.223434, 0.0262022, 0.000681643, 0.00193892, 0.299845 kg (8 entries); lognormal variance with pedigree 0.0148, pedigree (2,4,2,5,1)
  (same comment as for wood ash mixture, pure)
- inert waste: -0.0395587, -0.139439 kg (2 entries); lognormal variance with pedigree 0.0148, pedigree (2,4,2,5,1)
  (same comment as for inert waste)
  production volume 1.06349e7 kg
- heat, central or small-scale, other than natural gas: 8.63868e-6, 0.000604354 MJ (2 entries); lognormal variance with pedigree 0.0148, pedigree (2,4,2,5,1)
  (same comment as for dolomite)

## Emissions to nature
All rows: source Jungbluth N. 2007
- Formaldehyde [air, urban air close to ground]: 7.36471e-7 kg; lognormal variance with pedigree 0.0728, pedigree (3,3,2,5,3)
  Calculation, based on 'heat, natural gas, at boiler modulating' (according to heat supply from methane)
  Uncertainty: Calculation, based on 'heat, natural gas, at boiler modulating' (according to heat supply from methane)
- Pentane [air, urban air close to ground]: 8.83759e-6 kg; lognormal variance with pedigree 0.0728, pedigree (3,3,2,5,3)
  (same comment as for Formaldehyde)
- Mercury [air, urban air close to ground]: 2.20937e-10 kg; lognormal variance with pedigree 0.6728, pedigree (3,3,2,5,3)
  (same comment as for Formaldehyde)
- Methane, non-fossil [air, urban air close to ground]: 1.47298e-5 kg; lognormal variance with pedigree 0.0728, pedigree (3,3,2,5,3)
  (same comment as for Formaldehyde)
- Benzo(a)pyrene [air, urban air close to ground]: 7.36471e-11 kg; lognormal variance with pedigree 0.3328, pedigree (3,3,2,5,3)
  (same comment as for Formaldehyde)
- Carbon monoxide, non-fossil [air, urban air close to ground]: 0.00342806 kg; lognormal variance with pedigree 0.6728, pedigree (3,3,2,5,3)
  Calculation, based on 'heat, natural gas, at boiler modulating' (according to heat supply from methane), and PSI data
  Uncertainty: Calculation, based on 'heat, natural gas, at boiler modulating' (according to heat supply from methane), and PSI data
- Butane [air, urban air close to ground]: 5.15524e-6 kg; lognormal variance with pedigree 0.0728, pedigree (3,3,2,5,3)
  (same comment as for Formaldehyde)
- Dinitrogen monoxide [air, urban air close to ground]: 3.68236e-6 kg; lognormal variance with pedigree 0.0728, pedigree (3,3,2,5,3)
  (same comment as for Formaldehyde)
- Hydrocarbons, aliphatic, alkanes, unspecified [air, urban air close to ground]: 7.36251e-5 kg; lognormal variance with pedigree 0.0548, pedigree (2,4,2,5,1)
  Based on PSI data from the Ecogas project
  Uncertainty: Based on PSI data from the Ecogas project
- Toluene [air, urban air close to ground]: 1.47298e-6 kg; lognormal variance with pedigree 0.0728, pedigree (3,3,2,5,3)
  (same comment as for Formaldehyde)
- Hydrocarbons, aliphatic, unsaturated [air, urban air close to ground]: 0.000250807 kg; lognormal variance with pedigree 0.0548, pedigree (2,4,2,5,1)
  (same comment as for Hydrocarbons, aliphatic, alkanes, unspecified)
- Propane [air, urban air close to ground]: 1.47298e-6 kg; lognormal variance with pedigree 0.0728, pedigree (3,3,2,5,3)
  (same comment as for Formaldehyde)
- PAH, polycyclic aromatic hydrocarbons [air, urban air close to ground]: 9.63618e-7 kg; lognormal variance with pedigree 0.3328, pedigree (3,3,2,5,3)
  (same comment as for Carbon monoxide, non-fossil)
- Particulates, < 2.5 um [air, urban air close to ground]: 5.45823e-5 kg; lognormal variance with pedigree 0.3328, pedigree (3,3,2,5,3)
  (same comment as for Carbon monoxide, non-fossil)
- Acetaldehyde [air, urban air close to ground]: 7.36471e-9 kg; lognormal variance with pedigree 0.0728, pedigree (3,3,2,5,3)
  (same comment as for Formaldehyde)
- Propionic acid [air, urban air close to ground]: 1.47298e-7 kg; lognormal variance with pedigree 0.0728, pedigree (3,3,2,5,3)
  (same comment as for Formaldehyde)
- Water [air, unspecified]: 0.00491994 m3; name water_to_air_unspecified; lognormal variance with pedigree 0.0429, pedigree (2,2,2,5,1)
  Calculated value based on literature values and expert opinion. See comments in the parametres' comment field.The dataset is not wtaer balanced. Specific information on the water balance was not found.
  property fraction, origin: unspecified 0; name fraction_origin_unspecified
  property fraction, origin: salt water 0; name fraction_origin_salt_water
  property fraction, origin: fresh water 1; name fraction_origin_fresh_water
- Benzene [air, urban air close to ground]: 2.94586e-6 kg; lognormal variance with pedigree 0.0728, pedigree (3,3,2,5,3)
  (same comment as for Formaldehyde)
- NMVOC, non-methane volatile organic compounds, unspecified origin [air, urban air close to ground]: 4.93534e-5 kg; lognormal variance with pedigree 0.0548, pedigree (2,4,2,5,1)
  (same comment as for Hydrocarbons, aliphatic, alkanes, unspecified)
- Carbon dioxide, non-fossil [air, urban air close to ground]: 4.89374 kg; lognormal variance with pedigree 0.011425, pedigree (3,3,2,2,3)
  Calculation, to close carbon balance
  Uncertainty: Calculation, to close carbon balance
- Acetic acid [air, urban air close to ground]: 1.10469e-6 kg; lognormal variance with pedigree 0.0728, pedigree (3,3,2,5,3)
  (same comment as for Formaldehyde)
- Nitrogen oxides [air, urban air close to ground]: 0.00208247 kg; lognormal variance with pedigree 0.0728, pedigree (3,3,2,5,3)
  (same comment as for Carbon monoxide, non-fossil)
- Dioxins, measured as 2,3,7,8-tetrachlorodibenzo-p-dioxin [air, urban air close to ground]: 0 kg; pedigree (1,1,1,1,1)
  (same comment as for Formaldehyde)
- Sulfur dioxide [air, urban air close to ground]: 4.05055e-6 kg; lognormal variance with pedigree 0.0328, pedigree (3,3,2,5,3)
  (same comment as for Formaldehyde)

## Sampling procedure
Data from one source, pilot-to-demonstration plant operation data

## Extrapolations
Combustion of methane (for internal process energy use) is extrapolated from the emission profile of natural gas combustion. This dataset has been copied from an original dataset covering the geography CH. The uncertainty has been adjusted accordingly.
