# natural gas service station construction

Dataset: EcoSpold 2, unit process
Geography: RoW
Time period: 2001-01-01 to 2019-12-31
Technology level: current
Classification: ISIC rev.4 ecoinvent: 4290:Construction of other civil engineering projects
Classification: EcoSpold01Categories: natural gas/fuels
Tags: ConvertedDataset
Scenario: Business-as-Usual
System model: Allocation at the point of substitution
Share of production covered: 0 %
Generated by: Mireille Faist Emmenegger (obsolete)
Published in: Jungbluth N. 2007
Database: ecoinvent
isCopyrightProtected: true
accessRestrictedTo: 1

## General comment
This data set includes land use for a natural gas service station as well as steel requirements for compressor and container. Data stems from a service station with 310'000 m3 gas (236'000 kg) sold per year (in 365 days). It is assumed that steel and concrete are recycled. A life span of 50 years is assumed.
[This dataset was already contained in the ecoinvent database version 2. It was not individually updated during the transfer to ecoinvent version 3. Life Cycle Impact Assessment results may still have changed, as they are affected by changes in the supply chain, i.e. in other datasets. This dataset was generated following the ecoinvent quality guidelines for version 2. It may have been subject to central changes described in the ecoinvent version 3 change report (http://www.ecoinvent.org/database/ecoinvent-version-3/reports-of-changes/), and the results of the central updates were reviewed extensively. The changes added e.g. consistent water flows and other information throughout the database. The documentation of this dataset can be found in the ecoinvent reports of version 2, which are still available via the ecoinvent website. The change report linked above covers all central changes that were made during the conversion process.]

## Included activities end
This data set includes land use for a natural gas service station as well as steel and concrete requirements for compressor and container.

## Geography
Data for Switzerland

## Technology
Service station with steel compressor.

## Time period
personal communication

## Reference product
- natural gas service station: 1 unit; CPC 53290: Other civil engineering works; By-product classification allocatable product
  EcoSpold01Location=CH
  production volume 3.96633 unit
    This is a placeholder value that does not reflect real-world production volumes. This dataset does not currently require a real-world production volume to work in the database framework, and no actual data were collected yet. This has no negative effect on the results of the ecoinvent database.
  property price 241554 EUR2005
    EU27 I/O database(in the 'EU & DK Input Output Database' (available in SimaPro)); -79 Building, non-residential EU 27 (calculated to be 38.169 EUR2003/kg). Based on consumption of (_53 Iron basic, virgin, EU27;7.25517782294095E-3 kg/EUR building; 0.45 EUR2003 per kg DS), (_61 Iron, after first processing, EU27;5.8766830719783E-3kg/EUR building; 0.62 EUR2003 per kg DS), (_65 Fabricated metal products, except machinery, EU27; 8.9167022775554E-3 kg/EUR building; 3.63 EUR2003 per kg DS) and (_66 Machinery and equipment n.e.c., EU27;4.15071881936446E-3 kg/EUR building; 5.71 EUR2003 per kg DS) - 6377 kg
  property true value 241554
    allocation property applied in "true value" allocation // value calculated from revenue

## By-products
- iron scrap, sorted, pressed: 0 kg; By-product classification Recyclable; CPC 39310: Slag, dross, scalings and other waste from the manufacture of iron or steel; pedigree (1,1,1,1,1)
  Iron scrap recovered from this waste.
  production volume 2.00374 kg
  property price 0.175 EUR2005
    Temporary price data. Calculated as 90% of purchasers price based on: 2005 import and export prices (total trades (USD) divided by total weight (kg) in biggest economies of the world: EU27, USA, Brasil, China, India, Japan and Russia) from UN Commodity Trade Statistics Database (http://data.un.org/Explorer.aspxDatabase [Accessed 2011.06.20]). Commodity: Waste or scrap, of cast iron
  property carbon content 0
    carbon content on a dry matter basis (reserved; not for manual entry)
  property true value 0.00765366
    allocation property applied in "true value" allocation // value calculated from revenue
  properties: water content 0, water in wet mass 0 kg, carbon content, fossil 0, dry mass 1 kg, carbon content, non-fossil 0, wet mass 1 kg, carbon allocation 0 kg
- heat, for reuse in municipal waste incineration only: 0 MJ; CPC 17300: Steam and hot water; By-product classification allocatable product; pedigree (1,1,1,1,1)
  Net electricity generated from this waste and used in internal MSWI plant energy redistribution.
  Uncertainty: uncertainty is calculated from uncertainties in waste composition and uncertainties in energy efficiency and the uncertainty in internal energy demand
  production volume 0.0649924 MJ
  property exergy 0.1842 MJ; name E_th_prod_MSWI_exergy
    This exergy property is based on the exergy content of the product.
  property price 0.0106 EUR2005; name E_th_prod_MSWI_price_EUR2005
    Average European district heat price from Ecoheatcool and Euroheat 2005-2006, Ecoheat Work package 1: The European heat market. Final report. 10.6 EUR/GJ i s the price of district heat. http://www.solarthermalworld.org/files/Ecoheatcool%20WP1%20Web.pdf?download
  property true value relation 0.1842; name E_th_prod_MSWI_true_value_relation
    property to calculate "true value" from
  property true value 0.000133175
    allocation property applied in "true value" allocation // value calculated from true value relation
- electricity, for reuse in municipal waste incineration only: 0 kWh; CPC 17100: Electrical energy; By-product classification allocatable product; pedigree (1,1,1,1,1)
  (same comment as for heat, for reuse in municipal waste incineration only)
  production volume 0.00915268 kWh
  property true value relation 3.6; name E_el_prod_MSWI_true_value_relation
    property to calculate "true value" from
  property price 0.1 EUR2005; name E_el_prod_MSWI_price_EUR2005
    Estimated to be the same price as in case of electricity, medium voltage.
  property exergy 3.6 MJ; name E_el_prod_MSWI_exergy
    This exergy property is based on the exergy content of the product.
  property true value 0.00036654
    (same comment as for heat, for reuse in municipal waste incineration only)

## Inputs from technosphere
- reinforcing steel: 5080 kg; lognormal variance with pedigree 0.0546, pedigree (2,4,5,5,1)
  Expert data for one service station
  EcoSpold01Location=RER
  Uncertainty: Expert data for one service station
  properties: carbon content, fossil 0.004, dry mass 1 kg, wet mass 1 kg
- waste reinforced concrete: 0 kg; pedigree (1,1,1,1,1)
  EcoSpold01Location=CH
  Estimation
  Uncertainty: Estimation
  production volume 0 kg
    Calculated from the production volume of natural gas service station in proportion to the respective output amounts.
  properties: water content 0.00585407, dry mass 0.99418 kg, wet mass 1 kg
- concrete, normal: 0 m3; pedigree (1,1,1,1,1)
  Expert data for one service station
  EcoSpold01Location=CH
  Uncertainty: Expert data for one service station
  properties: dry mass 2190 kg, wet mass 2380 kg, water content 0.086758
- building, hall: 35.5 m2; lognormal variance with pedigree 0.44, pedigree (5,5,5,5,1)
  EcoSpold01Location=CH
  Estimation
  Uncertainty: Estimation
- waste reinforced concrete: -1702.49, -24297.5 kg (2 entries); lognormal variance with pedigree 0.14, pedigree (5,5,5,5,1)
  EcoSpold01Location=CH
  Estimation
  Uncertainty: Estimation
  production volume 78000 kg
- concrete, normal: 0.26404, 0.0275126, 0.222734, 0.125288, 0.530559, 0.0178954, 10.312 m3 (7 entries); lognormal variance with pedigree 0.0546, pedigree (2,4,5,5,1)
  (same comment as for concrete, normal)

## Inputs from nature
- Occupation, traffic area, road network [natural resource, land]: 5600 m2*year; lognormal variance with pedigree 0.0946, pedigree (2,4,5,5,1)
  Expert data for one service station
  Uncertainty: Expert data for one service station
- Transformation, to industrial area [natural resource, land]: 35.5 m2; lognormal variance with pedigree 0.25, pedigree (5,5,5,5,1)
  Estimation
  Uncertainty: Estimation
- Occupation, industrial area [natural resource, land]: 1500 m2*year; lognormal variance with pedigree 0.18, pedigree (5,5,5,5,1)
  Estimation
  Uncertainty: Estimation
- Transformation, to traffic area, road network [natural resource, land]: 106 m2; lognormal variance with pedigree 0.1746, pedigree (2,4,5,5,1)
  Expert data for one service station
  Uncertainty: Expert data for one service station
- Transformation, from unspecified [natural resource, land]: 142 m2; lognormal variance with pedigree 0.1746, pedigree (2,4,5,5,1)
  Expert data for one service station
  Uncertainty: Expert data for one service station

## Sampling procedure
data for one service station

## Extrapolations
none This dataset has been copied from an original dataset covering the geography CH. The uncertainty has been adjusted accordingly.

## Review by Arnaud Dauriat 2005-12-02
passed.
