# treatment of used train, passenger, high-speed

Dataset: EcoSpold 2, unit process
Geography: DE
Time period: 1996-01-01 to 2019-12-31
Technology level: current
Classification: EcoSpold01Categories: transport systems/train
Classification: ISIC rev.4 ecoinvent: 3830:Materials recovery
Tags: Treatment; ConvertedDataset
Scenario: Business-as-Usual
System model: Allocation at the point of substitution
Generated by: Michael Spielmann (obsolete)
Published in: Spielmann M. 2004
Database: ecoinvent
isCopyrightProtected: true
accessRestrictedTo: 1

## General comment
The dataset represents the disposa of a high speed train in Germany.
[This dataset was already contained in the ecoinvent database version 2. It was not individually updated during the transfer to ecoinvent version 3. Life Cycle Impact Assessment results may still have changed, as they are affected by changes in the supply chain, i.e. in other datasets. This dataset was generated following the ecoinvent quality guidelines for version 2. It may have been subject to central changes described in the ecoinvent version 3 change report (http://www.ecoinvent.org/database/ecoinvent-version-3/reports-of-changes/), and the results of the central updates were reviewed extensively. The changes added e.g. consistent water flows and other information throughout the database. The documentation of this dataset can be found in the ecoinvent reports of version 2, which are still available via the ecoinvent website. The change report linked above covers all central changes that were made during the conversion process.]

## Included activities start
Service starts with the transport of the material to be disposal.

## Included activities end
The dataset ends with the disposal of one long distance train. The dataset includes the transport of the material and disposal of paint, glass and plastics.

## Geography
Data represents Swiss disposal conditions

## Reference product
- used train, passenger, high-speed: -1 unit; CPC 39990: Other wastes n.e.c.; By-product classification Waste
  EcoSpold01Location=DE
  production volume 0.242058 unit
    This is a placeholder value that does not reflect real-world production volumes. This dataset does not currently require a real-world production volume to work in the database framework, and no actual data were collected yet. This has no negative effect on the results of the ecoinvent database. The placeholder value of this activity was scaled according to the nominal GDP of 2005 (source: United Nations, http://data.un.org/Glossary.aspx?q=GDP+%28current+US%24%29, accessed 20130726) to reflect an appropriate share of the global production volume, which is also a placeholder value.
  property price 0 EUR2005
    Waste products are assigned a price of zero as they are assumed to require further treatment.
  property carbon content, non-fossil 0.00393143
    Calculated from C content in input materials in the infrastructure
  property carbon content, fossil 0.212575
    Calculated from C content in input materials in the infrastructure
  property carbon content 0.216507
    carbon content on a dry matter basis (reserved; not for manual entry)
  properties: water content 0, dry mass 639800 kg, wet mass 639800 kg, water in wet mass 0 kg, carbon allocation 138521 kg

## By-products
- heat, for reuse in municipal waste incineration only: 0 MJ; CPC 17300: Steam and hot water; By-product classification allocatable product; pedigree (1,1,1,1,1)
  Net electricity generated from this waste and used in internal MSWI plant energy redistribution.
  property true value relation 0.1842; name E_th_prod_MSWI_true_value_relation
    property to calculate 'true value' from
  property exergy 0.1842 MJ; name E_th_prod_MSWI_exergy
    This exergy property is based on the exergy content of the product.
  property price 0.0106 EUR2005; name E_th_prod_MSWI_price_EUR2005
    Average European district heat price from Ecoheatcool and Euroheat 2005-2006, Ecoheat Work package 1: The European heat market. Final report. 10.6 EUR/GJ i s the price of district heat. http://www.solarthermalworld.org/files/Ecoheatcool%20WP1%20Web.pdf?download
- electricity, for reuse in municipal waste incineration only: 0 kWh; CPC 17100: Electrical energy; By-product classification allocatable product; pedigree (1,1,1,1,1)
  (same comment as for heat, for reuse in municipal waste incineration only)
  property price 0.1 EUR2005; name E_el_prod_MSWI_price_EUR2005
    Estimated to be the same price as in case of electricity, medium voltage.
  property exergy 3.6 MJ; name E_el_prod_MSWI_exergy
    This exergy property is based on the exergy content of the product.
  property true value relation 3.6; name E_el_prod_MSWI_true_value_relation
    property to calculate 'true value' from

## Inputs from technosphere
- waste emulsion paint: -12600 kg; lognormal variance with pedigree 0.0521, pedigree (3,1,5,3,1)
  Calculated value. In v2.2. the flow was called "disposal, emulsion paint, 0% water, to municipal incineration".
  EcoSpold01Location=CH
  Uncertainty: derived from the material composition of the modelled ICE (unit process ICE manufacturing)
  production volume 12600 kg
    Calculated from the production volume of used train, passenger, high-speed in proportion to the respective output amounts.
  properties: carbon content, fossil 0.27, dry mass 1 kg, wet mass 1 kg
  note on carbon content, fossil: Tab A.4, ecoinvent v2.2 report 13_I. C content has been calculated after data in the tables, and then referred to 1 kg DM
- waste plastic, mixture: -155000 kg; lognormal variance with pedigree 0.0521, pedigree (3,1,5,3,1)
  Calculated value. In v2.2 the flow was called "disposal, plastics, mixture, 15.3% water, to sanitary landfill".
  EcoSpold01Location=CH
  Uncertainty: derived from the material composition of the modelled ICE (unit process ICE manufacturing)
  production volume 155000 kg
    (same comment as for waste emulsion paint)
  properties: water content 0.180638, dry mass 0.847 kg, wet mass 1 kg, carbon content, fossil 0.747344
  note on carbon content, fossil: C content in 1 kg DM was calculated using data in Tab A.2, ecoinvent v2.2 report 13_I
- waste glass: -25000 kg; lognormal variance with pedigree 0.0521, pedigree (3,1,5,3,1)
  EcoSpold01Location=CH
  Calculated value. In v2.2. the flow was called "disposal, glass, 0% water, to municipal incineration".
  Uncertainty: derived from the material composition of the modelled ICE (unit process ICE manufacturing)
  production volume 25000 kg
    (same comment as for waste emulsion paint)
  properties: wet mass 1 kg, dry mass 1 kg

## Sampling procedure
Data based on the material composition of an ICE.

## Extrapolations
This dataset has been extrapolated from year 2000 to the year of the calculation (2019). The uncertainty has been adjusted accordingly.

## Review by Roland Hischier 2011-09-23
Transfer of documentation done.

## Review by Niels Jungbluth 2004-04-01
Passed.
