# transport, freight, inland waterways, barge with reefer, freezing

Dataset: EcoSpold 2, unit process
Geography: GLO
Time period: 2010-01-01 to 2019-12-31
Technology level: current
Classification: ISIC rev.4 ecoinvent: 5022:Inland freight water transport
Scenario: Business-as-Usual
System model: Allocation at the point of substitution
Generated by: Tereza Levova
Database: ecoinvent
isCopyrightProtected: true
accessRestrictedTo: 1

## General comment
This dataset represent transport of reefer (refrigerated container) on a freight barge. The operation mode of the reefer is freezing (temperature between -35°C and -18°C).
The amount of operation of the reefer needed is calculated using the assumption of the average speed of the barge.
Barge carying intermodal shipping containers, France (http://www.bollore-logistics.com/news/2013/03_com_semaine_devdur_en.html, accessed 20141216)

## Included activities start
This dataset simply combine two other activities - transport, freight, inland waterways, barge with reefer and operation of reefer, For more information on these two activities please see the datasets representing these two activities.

## Parameters
- speed: 20 km/hour; name speed_barge; lognormal variance with pedigree 0.0166, pedigree (4,5,1,1,1)
  Estimated value based on an expert judgement. This value represents an average speed of barge including all stops and breaks.

## Reference product
- transport, freight, inland waterways, barge with reefer, freezing: 1 metric ton*km; name transport_barge_RP; CPC 65221: Inland water transport services of freight by refrigerator vessels; By-product classification allocatable product
  production volume 1.39862e9 metric ton*km; = 13086E6*0.0572*0.54*(1/0.289)
    Calculated based on literature and estimates.
    1.3086 E10 tkm is the amount of transport, freight, inland waterways, barge using intermodal shipping containers in Europe in 2011 (Eurostat database, http://ec.europa.eu/eurostat, Container transport by type of good (from 2007 onwards with NST2007), cathegory; Inland waterways transport measurement - good - annual data, accessed 20150108).
    0.05272 is the fraction of the cargo in need of atmosphere control in comparison with the dry cargo transported in the intermodal shipping containers (9.24E7 ton has been transported in reefers; http://www.joc.com/sites/default/files/u221106/SpeakerPresentations/March3/Dekker_Neil_Cool_Cargoes_Presentation.pdf, accessed 20150107 and 1.52E9 ton in ordinary intermodal shipping containers; http://www.statista.com/statistics/253987/international-seaborne-trade-carried-by-containers/, accessed 20141027).
    According to literature (Drawry, 2008, published in http://www.hamburg-sued.com/group/media/sharedmedia/dokumente/brochures/Reefer_guide.pdf, accessed 20141216) the type of food transported in reefers is following;
    31% fresh fruits and vegetables (excl. bananas)
    20% bananas
    24% meat and poultry
    19% fish and seafood
    6% various (medicine, flowers, etc.)
    The fruits and vegetables (54%) in general need to be cooled during its storage and transport and the meat and seafood (46%) need to be frozen. The various is divided half/half between cooling and freezing.
    0.289 is the GDP scaling factor (GDP GLO = 1, GDP Europe = 0.289). The PV of the global activity has been extrapolated using the nominal GDP of 2011 (source: United Nations, http://data.un.org/Glossary.aspx?q=GDP+%28current+US%24%29, accessed 20130726 and 20130312).
  property price 0.00709958 EUR2005; name transport_barge_RP_price_EUR2005
    Calculated based on inputs: The price of the product has been calculated as a sum of the values of the material and energy inputs for this product. This value is therefore a rough estimation. It may underestimate the real price since there are additional expenses when producing any product. These expences can include for example labour costs, treatment of waste materials and profit for the producer. Please consider carefully whether this level of data quality is acceptable for your application.

## Inputs from technosphere
- operation, reefer, freezing: 2.08333 kg*day; = 1000*(transport_barge_RP/speed_barge/24); lognormal variance with pedigree 0.0186, pedigree (4,5,3,1,1)
  Calculated value based on estimated speed of the barge.
- transport, freight, inland waterways, barge: 1 metric ton*km; lognormal variance with pedigree 0.0026, pedigree (1,1,3,1,1)

## Extrapolations
This dataset has been extrapolated from year 2014 to the year of the calculation (2019). The uncertainty has been adjusted accordingly.
