# furnace production, logs, 30kW

Dataset: EcoSpold 2, unit process
Geography: RoW
Time period: 2010-01-01 to 2019-12-31
Technology level: modern
Classification: EcoSpold01Categories: oil/cogeneration
Classification: ISIC rev.4 ecoinvent: 2815:Manufacture of ovens, furnaces and furnace burners
Synonyms: wood fired boiler production; wood boiler production
Tags: biomass power
Scenario: Business-as-Usual
System model: Allocation at the point of substitution
Generated by: Christian Bauer
Database: ecoinvent
isCopyrightProtected: true
accessRestrictedTo: 1

## General comment
This dataset represent the production and the disposal of a wood burning furnace for domestic heating system.

## Included activities start
From reception of furnace components at the factory gate

## Included activities end
This activity ends with the disposal of the device in the end of its lifetime. The dataset includes the most important materials used for the fabrication of the furnace, the accumulator hot water tank and the chimney flue pipes: steel, refractory bricks, electronic components, rock wool, polystyrene, plastics, lubricating oil, paint. The dataset includes also the concrete basement for the furnace (about 4m2), the land transformation and occupation and the energy and heat for the construction and the disposal of the device. The dataset doesn't include the storage silo for logs (the furnace is assumed to be feeded manually with log wood).

## Technology
Boiler of modern technology available on the European and Swiss market. The model of reference is a log wood boiler, brand ETA/BUDERUS, model SH/Logano 30kW. Austrian technology, commericialized and manufactured also in Switzerland.
Source of the image: http://www.eta.co.at/109.0.html

## Time period
This model of furnace is commercialized since 2010 in Europe and Switzerland and is still available on the market (end 2011)

## Reference product
- furnace, logs, 30kW: 0 unit; By-product classification allocatable product; CPC 43420: Industrial or laboratory furnaces and ovens, except non-electric bakery ovens; other industrial or laboratory […]
  EcoSpold01Location=GLO
  production volume 276250 unit
    extrapolated with proportions (population) from the local dataset of Switzerland (from which value comes from an estimation of the wood boiler<50kW produced within the country) - high uncertainty
  property capacity [MW] 0.03 MW; name capacity_MW
  property lifetime capacity [kWh] 5.256e6 kWh; name lifetime_capacity_kWh; = (lifetime*8760)*capacity_MW*1000
    calculated value.
  property lifetime 20 year; name lifetime
  property price 3401 EUR2005
    UNDATA "Industrial furnace, oven, incinerator non-electric ne" (http://data.un.org/Data.aspx?q=industrial+furnace&d=ComTrade&f=_l1Code%3a84%3bcmdCode%3a841780; EU I/E average price is 6.133EUR/kg). The prices are per kg and converted to per unit by summed weight of material concumption of the process in existing ecoinvent documentation from ecoinvent v.2.2 (about 511kg). For weight of concrete, it is separately added for from price per m3 used of each unit (0.16 m3; 'furnace production, logs, hardwood storage area, 30kW')and apply EU&DK input output database 2003 (0.08 Euro2003/kg DS; density 2380 kg/m3<#concrete production, normal' in ecoinvent).
  property true value 3401
    allocation property applied in "true value" allocation // value calculated from revenue
- iron scrap, unsorted: 1 kg; CPC 39310: Slag, dross, scalings and other waste from the manufacture of iron or steel; By-product classification Recyclable; pedigree (1,1,1,1,1)
  disposal of cast iron
  production volume 2.21e6 kg; = Ref('14d835f6-2979-4176-9c5e-886c5b2dc5c7', 'ProductionVolume') * (Ref('ab9f0643-26e7-4774-949c-8ffe87c3962e') / Ref('14d835f6-2979-4176-9c5e-886c5b2dc5c7'))
    Calculated from production volume of reference product using the relative outputs.
  property price 0.149 EUR2005
    Temporary price data. Calculated as 90% of purchasers price based on: estimated at 85% of sorted scrap
  property carbon content 0
    carbon content on a dry matter basis (reserved; not for manual entry)
  property true value 1.192
    allocation property applied in "true value" allocation // value calculated from revenue
  properties: water in wet mass 0 kg, carbon content, fossil 0, dry mass 1 kg, wet mass 1 kg, water content 0, carbon content, non-fossil 0, carbon allocation 0 kg

## By-products
- electricity, for reuse in municipal waste incineration only: 0 kWh; CPC 17100: Electrical energy; By-product classification allocatable product; pedigree (1,1,1,1,1)
  Net electricity generated from this waste and used in internal MSWI plant energy redistribution.
  Uncertainty: uncertainty is calculated from uncertainties in waste composition and uncertainties in energy efficiency and the uncertainty in internal energy demand
  production volume 1.26433e7 kWh
  property true value relation 3.6; name E_el_prod_MSWI_true_value_relation
    property to calculate "true value" from
  property exergy 3.6 MJ; name E_el_prod_MSWI_exergy
    This exergy property is based on the exergy content of the product.
  property price 0.1 EUR2005; name E_el_prod_MSWI_price_EUR2005
    Estimated to be the same price as in case of electricity, medium voltage.
  property true value 3.08539
    allocation property applied in "true value" allocation // value calculated from true value relation
- heat, for reuse in municipal waste incineration only: 0 MJ; CPC 17300: Steam and hot water; By-product classification allocatable product; pedigree (1,1,1,1,1)
  Net useful heat generated from this waste and used in internal MSWI plant energy redistribution.
  Uncertainty: uncertainty is calculated from uncertainties in waste composition and uncertainties in energy efficiency and the uncertainty in internal energy demand
  production volume 8.81971e7 MJ
  property true value relation 0.1842; name E_th_prod_MSWI_true_value_relation
    property to calculate "true value" from
  property exergy 0.1842 MJ; name E_th_prod_MSWI_exergy
    This exergy property is based on the exergy content of the product.
  property price 0.0106 EUR2005; name E_th_prod_MSWI_price_EUR2005
    Average European district heat price from Ecoheatcool and Euroheat 2005-2006, Ecoheat Work package 1: The European heat market. Final report. 10.6 EUR/GJ i s the price of district heat. http://www.solarthermalworld.org/files/Ecoheatcool%20WP1%20Web.pdf?download
  property true value 1.10143
    (same comment as for electricity, for reuse in municipal waste incineration only)
- zinc concentrate: 0 kg; CPC 14290: Other non-ferrous metal ores and concentrates (other than uranium or thorium ores and concentrates); By-product classification allocatable product
  Calculated value from the knowledge of the properties of both products.
  production volume 28.9348 kg
  property price 0.38 EUR2005; name ByP_price_EUR2005
    Temporary price data. Calculated as 90% of purchasers price based on: Zinc content in concentrate 53%. Concentrate price per kg Zn 86.5% of refined Zn price (13.5% treatment charges according to CHR Metals Limited 2005: Dynamic cost curves. http://www.minecost.com/dynamic.pdf). 2004 zinc price from USGS (2007) Mineral commodity summaries 2007. <http://minerals.usgs.gov/minerals/pubs/mcs/2007/mcs2007.pdf> [Accessed 25 May 2010]
  property zinc content 0.53; name zinc_C_zinc_concentrate
    Zinc content on a dry matter basis. Value taken from teh "zinc mine operation" /GLO dataset.
  property dry mass 1 kg; name DM_zinc_concentrate
  property carbon content 0
    carbon content on a dry matter basis (reserved; not for manual entry)
  property true value 3.98016e-5
    allocation property applied in "true value" allocation // value calculated from revenue
  properties: wet mass 1 kg, water content 0, carbon content, non-fossil 0, carbon content, fossil 0, water in wet mass 0 kg, carbon allocation 0 kg
- copper: 0 kg; By-product classification allocatable product; CPC 41413: Refined copper and copper alloys, unwrought; master alloys of copper
  production volume 368382 kg
  properties: water in wet mass 0 kg, water content 0, carbon content, non-fossil 0, dry mass 1 kg, carbon content, fossil 0, price 5.52 EUR2005, wet mass 1 kg, carbon content 0, carbon allocation 0 kg, true value 4.74846
- lead: 0 kg; CPC 41441: Lead, unwrought; By-product classification allocatable product
  EcoSpold01Location=SE
  production volume 2785.02 kg
  property price 0.744 EUR2005
    Temporary price data. Calculated as 90% of purchasers price based on: Source: ecoinvent v2 report 10-part IX, Tab 5.10 & 2.5
  property carbon content 0
    carbon content on a dry matter basis (reserved; not for manual entry)
  property true value 0.00750066
    allocation property applied in "true value" allocation // value calculated from revenue
  properties: wet mass 1 kg, water content 0, carbon content, non-fossil 0, carbon content, fossil 0, dry mass 1 kg, water in wet mass 0 kg, carbon allocation 0 kg
- nickel, 99.5%: 0 kg; CPC 41422: Unwrought nickel; By-product classification allocatable product
  EcoSpold01Location=SE
  production volume 5813.66 kg
  property price 10.4 EUR2005
    Temporary price data. Calculated as 90% of purchasers price based on: 2004 nickel price from USGS (2007) Mineral commodity summaries 2007. <http://minerals.usgs.gov/minerals/pubs/mcs/2007/mcs2007.pdf> [Accessed 25 May 2010]
  property carbon content 0
    carbon content on a dry matter basis (reserved; not for manual entry)
  property true value 0.218867
    allocation property applied in "true value" allocation // value calculated from revenue
  properties: water in wet mass 0 kg, wet mass 1 kg, carbon content, non-fossil 0, dry mass 1 kg, water content 0, carbon content, fossil 0, carbon allocation 0 kg
- silver: 0 kg; CPC 41310: Silver (including silver plated with gold or platinum), unwrought or in semi-manufactured forms, or in powder […]; By-product classification allocatable product; CAS 7440-22-4
  EcoSpold01Location=SE
  production volume 960.067 kg
  property price 178 EUR2005
    (same comment as for lead)
  property carbon content 0
    carbon content on a dry matter basis (reserved; not for manual entry)
  property true value 0.618614
    allocation property applied in "true value" allocation // value calculated from revenue
  properties: wet mass 1 kg, carbon content, non-fossil 0, dry mass 1 kg, water content 0, carbon content, fossil 0, water in wet mass 0 kg, carbon allocation 0 kg
- palladium: 0 kg; CPC 4160: Other non-ferrous metals and articles thereof (including waste and scrap of some metals); cermets and articles […]; By-product classification allocatable product
  EcoSpold01Location=SE
  production volume 53.146 kg
  property price 5640 EUR2005
    Temporary price data. Calculated as 90% of purchasers price based on: 2004 price from USGS (2007) Mineral commodity summaries 2007. <http://minerals.usgs.gov/minerals/pubs/mcs/2007/mcs2007.pdf> [Accessed 25 May 2010]
  property carbon content 0
    carbon content on a dry matter basis (reserved; not for manual entry)
  property true value 1.08504
    allocation property applied in "true value" allocation // value calculated from revenue
  properties: wet mass 1 kg, carbon content, fossil 0, water in wet mass 0 kg, water content 0, carbon content, non-fossil 0, dry mass 1 kg, carbon allocation 0 kg
- gold: 0 kg; CPC 41320: Gold (including gold plated with platinum), unwrought or in semi-manufactured forms, or in powder form; By-product classification allocatable product; CAS 7440-57-5
  EcoSpold01Location=SE
  production volume 29.1451 kg
  property price 10600 EUR2005
    Temporary price data. Calculated as 90% of purchasers price based on: Source: ecoinvent v2 report 10-part IX, Tab 2.5
  property carbon content 0
    carbon content on a dry matter basis (reserved; not for manual entry)
  property true value 1.11833
    allocation property applied in "true value" allocation // value calculated from revenue
  properties: wet mass 1 kg, carbon content, fossil 0, dry mass 1 kg, carbon content, non-fossil 0, water content 0, water in wet mass 0 kg, carbon allocation 0 kg
- iron scrap, sorted, pressed: 0 kg; By-product classification Recyclable; CPC 39310: Slag, dross, scalings and other waste from the manufacture of iron or steel; pedigree (1,1,1,1,1)
  Iron scrap recovered from this waste.
  production volume 483786 kg
  property price 0.175 EUR2005
    Temporary price data. Calculated as 90% of purchasers price based on: 2005 import and export prices (total trades (USD) divided by total weight (kg) in biggest economies of the world: EU27, USA, Brasil, China, India, Japan and Russia) from UN Commodity Trade Statistics Database (http://data.un.org/Explorer.aspxDatabase [Accessed 2011.06.20]). Commodity: Waste or scrap, of cast iron
  property carbon content 0
    carbon content on a dry matter basis (reserved; not for manual entry)
  property true value 0.0749255
    allocation property applied in "true value" allocation // value calculated from revenue
  properties: water content 0, water in wet mass 0 kg, carbon content, fossil 0, dry mass 1 kg, carbon content, non-fossil 0, wet mass 1 kg, carbon allocation 0 kg

## Inputs from technosphere
- lubricating oil: 2.61844e-5 kg; source ETA Heiztechnik GmbH 2011; lognormal variance with pedigree 0.0618, pedigree (3,3,5,5,1)
  EcoSpold01Location=RER
  estimation - used for the manufacturing of the furnace and for the maintenance. It is just added to the internal part of the furnace. It is assumed not to be dispersed or disposed
  properties: dry mass 1 kg, carbon content, fossil 0.75, wet mass 1 kg
  note on carbon content, fossil: Lubricating oil is produced from diesel. C-content/dry mass of fats and oils considered 75%, from: ecoinvent v2.2 report, n 15a, pg 40
- concrete, normal: 0 m3; source ETA Heiztechnik GmbH 2011; pedigree (1,1,1,1,1)
  EcoSpold01Location=CH
  calculated value - basing on the space required for the furnace basement (about 4m2) the amount of concrete was calculated
  properties: water content 0.086758, wet mass 2380 kg, dry mass 2190 kg
- polystyrene foam slab: 0.000829172 kg; source ETA Heiztechnik GmbH 2011; lognormal variance with pedigree 0.0284, pedigree (2,3,4,5,1)
  EcoSpold01Location=RER
  calculated value - insulation of the accumulator hot water tanks
  properties: carbon content, fossil 0.859091, wet mass 1 kg, dry mass 1 kg
  note on carbon content, fossil: XPS consists in 91% of polystyrene, 7% of blowing agent and the re-maining 2% are flame retardants (bromine compounds) and other additives (ecoinvent v2.2 report 7, part XIV, pg69). The chemical formula of polystyrene is (C8H8)n. Here, the blowing agent is CO2.
- heat, central or small-scale, other than natural gas: 0 MJ; source ETA Heiztechnik GmbH 2011; pedigree (1,1,1,1,1)
  estimation - data comes from a comparison between old dataset value and communication with ETA producer (total annual heating value in factory/production)
  EcoSpold01Location=CH
- waste mineral oil: 0 kg; pedigree (1,1,1,1,1)
  disposal of lubricating oil
  production volume 0 kg
    Calculated from production volume of reference product using the relative outputs.
  properties: carbon content, fossil 0.864444, wet mass 1 kg, dry mass 0.9 kg, water content 0.111111
  note on carbon content, fossil: Tab A.6, ecoinvent v2.2 report 13_I. C content has been calculated after data in the tables, and then referred to 1 kg DM
- sheet rolling, steel: 0.00394948 kg; source ETA Heiztechnik GmbH 2011; lognormal variance with pedigree 0.0284, pedigree (2,3,4,5,1)
  calculated value
  EcoSpold01Location=RER
- waste polystyrene isolation, flame-retardant: 0 kg; pedigree (1,1,1,1,1)
  disposal of insulation of the water storage
  production volume 0 kg
    Calculated from production volume of reference product using the relative outputs.
  properties: dry mass 0.998012 kg, wet mass 1 kg, water content 0.00199232, carbon content, fossil 0.918145
  note on carbon content, fossil: Polystyrene isolation (EPS) is flame-retarded with hexa-bromo-cyclo-dodecan (C12H18Br6) and contains 0.67 w% bromine (ecoinvent v2.2 report 13_I, pg 39). The rest is polystyrene: (C8H8)n.
- electricity, low voltage: 0 kWh; source ETA Heiztechnik GmbH 2011; pedigree (1,1,1,1,1)
  EcoSpold01Location=CH
  Estimation - data derives from comparison between old dataset value, energy required for steel manufacturing (similar weight device) and suggestions from ETA technician during a wood energy exposition
- waste mineral wool, for final disposal: 0 kg; pedigree (1,1,1,1,1)
  EcoSpold01Location=CH
  disposal of the insulation inside the furnace and for the chimney flue pipes
  production volume 0 kg
    Calculated from production volume of reference product using the relative outputs.
  properties: lifetime 20 year, wet mass 1 kg, dry mass 1 kg
- stone wool: 0.00196383 kg; source ETA Heiztechnik GmbH 2011; lognormal variance with pedigree 0.0284, pedigree (2,3,4,5,1)
  EcoSpold01Location=CH
  calculated value
  properties: carbon content, fossil 0.015401, dry mass 1 kg, wet mass 1 kg
  note on carbon content, fossil: The chemical composition of the glass fibres used in the rock wool production is similar to the composition of naturally cooled volcano basalt and has a composition listed in Tab. 3.1 and 3.2 in ecoinvent v2.2 report 16, part XIV. Rock wool contains: a minimum of 96% mineral fibres,between 0.5 and 3.0 weight percent of phenolic resin depending on the specific product characteristics, and about 0.2 percent mineral oil (ecoinvent v2.2 report 16, part XIV). An average composition of 1.8% phenolic resin, 0.2% mineral oil, and 98% mineral fibres has been assumed and used to calculate C content of the rock wool
- waste concrete: 0 kg; pedigree (1,1,1,1,1)
  EcoSpold01Location=CH
  disposal of the concrete for the furnace basement - around 0,2 m3 of concrete * 2350 kg/m3 (concrete density) = around 460 kg
  production volume 0 kg
    Calculated from production volume of reference product using the relative outputs.
  properties: dry mass 0.5 kg, wet mass 1 kg, lifetime 20 year, water content 1
- electronics scrap from control units: -0.000196383 kg; lognormal variance with pedigree 0.0186, pedigree (1,5,4,5,1)
  EcoSpold01Location=RER
  disposal of the electronics devices of the boiler
  production volume 1.24312e6 kg; = Ref('14d835f6-2979-4176-9c5e-886c5b2dc5c7', 'ProductionVolume')* (Ref('d7d0b593-01b2-4d39-9c23-7800759423c4')*-1)
    Calculated from production volume of reference product using the relative outputs.
  properties: wet mass 1 kg, lifetime 20 year, carbon content, fossil 0.337146, carbon content, non-fossil 0.00013442, dry mass 1 kg
- electronics, for control units: 0.000196383 kg; source ETA Heiztechnik GmbH 2011; lognormal variance with pedigree 0.0112, pedigree (1,3,4,5,1)
  measured value
  EcoSpold01Location=RER
  properties: carbon content, non-fossil 0.00013442, carbon content, fossil 0.337146, dry mass 1 kg, wet mass 1 kg
  note on carbon content, non-fossil: The control unit has a composition of 46% steel (housing), 32% plastics, 14% printed wiring boards and 8% cables (various types).;
- inert waste, for final disposal: -0.00414586 kg; lognormal variance with pedigree 0.0186, pedigree (1,5,4,5,1)
  EcoSpold01Location=CH
  disposal of refractory bricks
  production volume 2.62438e7 kg; = Ref('14d835f6-2979-4176-9c5e-886c5b2dc5c7', 'ProductionVolume')* (Ref('22075962-5722-482f-a023-80d72eb2662f')*-1)
    Calculated from production volume of reference product using the relative outputs.
  properties: lifetime 20 year, water content 0.00502513, wet mass 1 kg, dry mass 0.995 kg
- refractory, fireclay, packed: 0.00414586 kg; source ETA Heiztechnik GmbH 2011; lognormal variance with pedigree 0.0112, pedigree (1,3,4,5,1)
  EcoSpold01Location=DE
  measured value - refractory bricks in fireclay are used in the combustion chamber inside the furnace (value measured with a technician during wood boilers exposition in the modeled furnace)
  properties: dry mass 1 kg, wet mass 1 kg
- waste polyethylene: 0 kg; pedigree (1,1,1,1,1)
  EcoSpold01Location=CH
  disposal of plastic materials
  production volume 0 kg
    Calculated from production volume of reference product using the relative outputs.
  properties: carbon content, fossil 0.825301, water content 0.00401606, wet mass 1 kg, dry mass 0.996 kg, lifetime 20 year
  note on carbon content, fossil: C content in 1 kg DM was calculated using data in Tab A.1, ecoinvent v2.2 report 13_I
- steel, low-alloyed, hot rolled: 0.0259662 kg; source ETA Heiztechnik GmbH 2011; lognormal variance with pedigree 0.0272, pedigree (1,1,4,5,1)
  literature value
  EcoSpold01Location=RER
  properties: carbon content, fossil 0.005, dry mass 1 kg, wet mass 1 kg
  note on carbon content, fossil: Low alloyed steel composition given in Tab. 3.2 ecoinvent v2.2 report 10_partII. Steel assumed to have a C content of 0.5%
- alkyd paint, white, without solvent, in 60% solution state: 3.05484e-5 kg; source ETA Heiztechnik GmbH 2011; lognormal variance with pedigree 0.0284, pedigree (2,3,4,5,1)
  EcoSpold01Location=RER
  calculated value for the furnace cladding
  properties: carbon content, fossil 0.140367, carbon content, non-fossil 0.199629, wet mass 1 kg, dry mass 1 kg
  note on carbon content, fossil: C content was calculated as an addition of C content in the raw materials.
- copper: 8.72812e-5 kg; source ETA Heiztechnik GmbH 2011; lognormal variance with pedigree 0.0278, pedigree (1,3,4,5,1)
  estimation
  EcoSpold01Location=RER
  properties: dry mass 1 kg, wet mass 1 kg
- scrap steel: 0 kg; pedigree (1,1,1,1,1)
  disposal of the steel body of the furnace
  EcoSpold01Location=CH
  production volume 0 kg
    Calculated from production volume of reference product using the relative outputs.
  properties: dry mass 1 kg, wet mass 1 kg, lifetime 20 year
- polyethylene, high density, granulate: 0.000240023 kg; source ETA Heiztechnik GmbH 2011; lognormal variance with pedigree 0.0284, pedigree (2,3,4,5,1)
  EcoSpold01Location=RER
  calculated value
  properties: dry mass 1 kg, carbon content, fossil 0.857143, wet mass 1 kg
  note on carbon content, fossil: Polyethylene is formed out of a huge amount of ethylene monomers (C2H4) (ecoinvent v2.2 report 11_II). MW=28 g/mol
- cast iron: 0.000349125 kg; source ETA Heiztechnik GmbH 2011; lognormal variance with pedigree 0.0572, pedigree (1,1,5,1,1)
  EcoSpold01Location=RER
  Estimation - some components of the furnace
  properties: carbon content, fossil 0.04, wet mass 1 kg, dry mass 1 kg
  note on carbon content, fossil: Cast iron is made by remelting pig iron in small furnaces (e.g. cupola furnaces or electric arc furnaces) and poured into moulds to make castings. It usually contains 2% to 6% carbon (ecoinvent v2.2 report 10_partII). An average content of 4% was considered
- scrap copper: 0 kg; pedigree (1,1,1,1,1)
  disposal of copper
  production volume 0 kg
    Calculated from production volume of reference product using the relative outputs.
  properties: dry mass 1 kg, wet mass 1 kg
- concrete, normal: 2.00398e-7, 2.08812e-8, 1.69048e-7, 9.50894e-8, 4.02677e-7, 1.35821e-8, 7.82645e-6 m3 (7 entries); source ETA Heiztechnik GmbH 2011; lognormal variance with pedigree 0.0284, pedigree (2,3,4,5,1)
  (same comment as for concrete, normal)
- heat, central or small-scale, other than natural gas: 0.000922517, 0.0645384 MJ (2 entries); source ETA Heiztechnik GmbH 2011; lognormal variance with pedigree 0.132, pedigree (3,3,5,5,1)
  (same comment as for heat, central or small-scale, other than natural gas)
- waste mineral oil: -6.58684e-6, -1.95975e-5 kg (2 entries); lognormal variance with pedigree 0.0186, pedigree (1,5,4,5,1)
  disposal of lubricating oil
  production volume 165750 kg
- waste polystyrene isolation, flame-retardant: -0.000234551, -0.00059462 kg (2 entries); lognormal variance with pedigree 0.0186, pedigree (1,5,4,5,1)
  disposal of insulation of the water storage
  production volume 5.24875e6 kg
- electricity, low voltage: 0.000220111, 3.86047e-5, 0.000875556, 0.00313909, 0.000634816, 0.00960026, 0.00158243, 0.0045075 kWh (8 entries); source ETA Heiztechnik GmbH 2011; lognormal variance with pedigree 0.127, pedigree (3,3,5,5,1)
  (same comment as for electricity, low voltage)
- waste mineral wool, for final disposal: -0.000845907, -0.00111792 kg (2 entries); lognormal variance with pedigree 0.0186, pedigree (1,5,4,5,1)
  (same comment as for waste mineral wool, for final disposal)
  production volume 1.24312e7 kg
- waste concrete: -0.00136304, -0.0185807 kg (2 entries); lognormal variance with pedigree 0.0186, pedigree (1,5,4,5,1)
  (same comment as for waste concrete)
  production volume 1.26246e8 kg
- waste polyethylene: -2.67006e-5, -1.78403e-6, -1.34924e-7, -7.3687e-7, -2.97687e-7, -6.99727e-7, -2.27502e-5, -0.000186919 kg (8 entries); lognormal variance with pedigree 0.0186, pedigree (1,5,4,5,1)
  EcoSpold01Location=CH
  disposal of plastic materials
  production volume 1.51938e6 kg
- scrap steel: -0.00632459, -0.0196416 kg (2 entries); lognormal variance with pedigree 0.0186, pedigree (1,5,4,5,1)
  disposal of the steel body of the furnace
  EcoSpold01Location=CH
  production volume 1.64369e8 kg
- scrap copper: -2.81046e-5, -5.91767e-5 kg (2 entries); lognormal variance with pedigree 0.0186, pedigree (1,5,4,5,1)
  disposal of copper
  production volume 552500 kg

## Inputs from nature
- Transformation, from unspecified [natural resource, land]: 0.000261844 m2; name land_use; source ETA Heiztechnik GmbH 2011; lognormal variance with pedigree 0.0752, pedigree (4,5,5,5,1)
  calculated value - space required for the boiler from the furnace manual
- Transformation, to industrial area [natural resource, land]: 0.000261844 m2; source ETA Heiztechnik GmbH 2011; lognormal variance with pedigree 0.0752, pedigree (4,5,5,5,1)
  calculated value - space required for the boiler from the furnace manual
- Occupation, industrial area [natural resource, land]: 0.00523687 m2*year; = land_use* lifetime; source ETA Heiztechnik GmbH 2011; lognormal variance with pedigree 0.0752, pedigree (4,5,5,5,1)
  calculated value

## Sampling procedure
literature, furnace manual available for customers, personal communication from producer and technician, measured data during wood boiler exposition

## Extrapolations
extrapolated from Austrian and Swiss data

## Review by Bo Weidema 2012-02-16
As an exception, this dataset has only been reviewed by one reviewer. As an infraqstructure dataset, this exception is reasonable.

## Review by Bo Weidema 2012-02-16
Passed. Documentation adequate, inputs relevant, mass balance correct, and correct handling of capacity utilisation.
