# fish canning, small fish

Dataset: EcoSpold 2, unit process
Geography: PE
Time period: 2011-01-01 to 2019-12-31
Technology level: current
Classification: ISIC rev.4 ecoinvent: 1020:Processing and preserving of fish, crustaceans and molluscs
Scenario: Business-as-Usual
System model: Allocation at the point of substitution
Generated by: Angel Avadí
Published in: Avadí, A. 2018
Database: ecoinvent
isCopyrightProtected: true
accessRestrictedTo: 1

## General comment
The activity represents the canning of small fish in a canning plant. The functional unit is 1000 kg of raw material processed, excluding residues. The total raw material demand of this activity is 1000 kg of preprocessed raw material + the amount of residues generated by preprocessing (gutting, heading, tailing, peeling, filleting, etc). The life cycle inventories were produced based on a sample of 1 Peruvian plant (processing capacity: 461 t/y) and data from other industry representatives. The data applies to small fish such as small pelagics (anchovies, herrings, sardines, mackerels) and small bottom feeders (grouppers, eals, small cods, haddock, bass, snappers). This activity can be used to model fish processing in other geographies.
Users must use this service activity in combination with an activity providing the raw material (fish).
System boundaries of fish processing for Direct Human Consumption (DHC) and relations between activities
Detailed system boundaries of DCH activities in Peru, including provision of fish from dedicated fleet

## Included activities start
From delivery of consumables to the plant, through its Use phase (production), including all upstream activities (e.g. provision of infrastructure, fuels, electricity, chemicals and packaging materials).

## Included activities end
Excludes fishery activities and provision of raw material (fish)

## Geography
Representative of Peru.

## Technology
Small pelagics canning activities of Peruvian fish canning plants, per t of processing capacity. Plants have a lifespan of 40 years.
Process diagram of small fish canning

## Time period
Production figures represent the period 2012. Valid as of 2017.

## Reference product
- fish canning, small fish: 0 kg; name production; source Angel Avadí 2014; CPC 212: Prepared and preserved fish, crustaceans, molluscs and other aquatic invertebrates; By-product classification allocatable product
  Amount of raw material processed, excluding residues. The total raw material demand of this activity is 1000 kg of preprocessed raw material + the amount of residues generated by preprocessing (gutting, heading, tailing, peeling, filleting, etc).
  production volume 1.824e8 kg; name prod_vol
    Peru produced 182 355 t of canned fish in 2013 (51 380 t of which was anchovies)
  property price 0.361367 EUR2005; name production_price_EUR2005
    Calculated based on inputs: The price of the product has been calculated as a sum of the values of the material and energy inputs for this product. This value is therefore a rough estimation. It may underestimate the real price since there are additional expenses when producing any product. These expences can include for example labour costs, treatment of waste materials and profit for the producer. Please consider carefully whether this level of data quality is acceptable for your application.
  property true value 361.367; name production_true_value
    allocation property applied in "true value" allocation // value calculated from revenue
- fish residues: 1 kg; name residues; source Angel Avadí 2014; CPC 21221: Fish fillets and fish meat (whether or not minced), fresh or chilled; By-product classification Recyclable; pedigree (1,1,1,1,1)
  Residues from fish processing, raw or cooked
  Uncertainty: Data from 1 plant, assumptions for larger plants
  production volume 1.824e8 kg; = prod_vol * residues / production
    Calculated from production volume of reference product using the relative outputs.
  property water content 0.758889; name residues_water_content
  property protein content 0.18; name residues_protein
    Average of 49 fish species, http://www.fao.org/wairdocs/tan/x5916e/x5916e01.htm
  property water in wet mass 0.182977 kg; name residues_WWM
  property energy content 4.01 MJ; name residues_energy_content
    Average of 49 fish species, http://www.fao.org/wairdocs/tan/x5916e/x5916e01.htm
  property carbon content, non-fossil 0.47385; name residues_C_content_non_fossil; = (1-residues_protein-residues_fat_content-residues_ash)*0.444+residues_protein*0.535+residues_fat_content*0.774
    Calculated from C_content = polysaccharids*0.444+protein*0.535+lipids*0.774 and polysaccharids = 1-(protein+lipids+ash)
  property fat content 0.061; name residues_fat_content
    Average of 49 fish species, http://www.fao.org/wairdocs/tan/x5916e/x5916e01.htm
  property price 0.062025 EUR2005; name residues_price_EUR2005
    Calculated value. According to Vázquez-Rowe et al. (2014) fish residues represent 15% of economics savings in relation to canned sardines. The price of canned sardines is here assumed to be 0.5USD per kg (source: alibaba.com, retrieved from: https://www.alibaba.com/showroom/canned-sardine-price.html, accessed 2March2018 & mysupermarket.co.uk, retrieved from: http://www.mysupermarket.co.uk/grocery-categories/Tinned_Sardines_in_Lidl.html, accessed 3AMrch 2018). We assume the price is calculated as 0.5USD/kg *0.15. The price is then converted in EUR.
    Vázquez-Rowe et al. (2014) Life cycle assessment of European pilchard (Sardina pilchardus) consumption. A case study for Galicia (NW Spain). Science of the Total Environment 475 (2014) 48–60
  property wet mass 0.424088 kg; name residues_WM
  property ash content 0.015 kg; name residues_ash
    Ash content of fish is between 1-2% of the edible portion, http://www.fao.org/wairdocs/tan/x5916e/x5916e01.htm
  property dry mass 0.241111 kg; name residues_DM
  property carbon content 0.47385
    carbon content on a dry matter basis (reserved; not for manual entry)
  property true value 62.025; name residues_true_value
    allocation property applied in "true value" allocation // value calculated from revenue
  properties: carbon allocation 0.11425 kg

## By-products
- iron scrap, sorted, pressed: 0 kg; By-product classification Recyclable; CPC 39310: Slag, dross, scalings and other waste from the manufacture of iron or steel; pedigree (1,1,1,1,1)
  Iron scrap recovered from this waste.
  Uncertainty: uncertainty calculated from uncertainty in waste composition, uncertainty of share of recyclable metal, uncertainty of transfer coefficient to bottom ash, uncertainty of the efficiency of scrap removal in MSWI plant.
  production volume 1.64139e7 kg
  property price 0.175 EUR2005
    Temporary price data. Calculated as 90% of purchasers price based on: 2005 import and export prices (total trades (USD) divided by total weight (kg) in biggest economies of the world: EU27, USA, Brasil, China, India, Japan and Russia) from UN Commodity Trade Statistics Database (http://data.un.org/Explorer.aspxDatabase [Accessed 2011.06.20]). Commodity: Waste or scrap, of cast iron
  property carbon content 0
    carbon content on a dry matter basis (reserved; not for manual entry)
  property true value 15.748
    allocation property applied in "true value" allocation // value calculated from revenue
  properties: carbon content, non-fossil 0, wet mass 1 kg, carbon content, fossil 0, water content 0, water in wet mass 0 kg, dry mass 1 kg, carbon allocation 0 kg
- heat, for reuse in municipal waste incineration only: 0 MJ; CPC 17300: Steam and hot water; By-product classification allocatable product; pedigree (1,1,1,1,1)
  Net electricity generated from this waste and used in internal MSWI plant energy redistribution.
  Uncertainty: uncertainty is calculated from uncertainties in waste composition and uncertainties in energy efficiency and the uncertainty in internal energy demand
  production volume 16984.4 MJ
  property exergy 0.1842 MJ; name E_th_prod_MSWI_exergy
    This exergy property is based on the exergy content of the product.
  property price 0.0106 EUR2005; name E_th_prod_MSWI_price_EUR2005
    Average European district heat price from Ecoheatcool and Euroheat 2005-2006, Ecoheat Work package 1: The European heat market. Final report. 10.6 EUR/GJ i s the price of district heat. http://www.solarthermalworld.org/files/Ecoheatcool%20WP1%20Web.pdf?download
  property true value relation 0.1842; name E_th_prod_MSWI_true_value_relation
    property to calculate "true value" from
  property true value 0.000612508
    allocation property applied in "true value" allocation // value calculated from true value relation
- electricity, for reuse in municipal waste incineration only: 0 kWh; CPC 17100: Electrical energy; By-product classification allocatable product; pedigree (1,1,1,1,1)
  (same comment as for heat, for reuse in municipal waste incineration only)
  production volume 2392.05 kWh
  property price 0.1 EUR2005; name E_el_prod_MSWI_price_EUR2005
    Estimated to be the same price as in case of electricity, medium voltage.
  property exergy 3.6 MJ; name E_el_prod_MSWI_exergy
    This exergy property is based on the exergy content of the product.
  property true value relation 3.6; name E_el_prod_MSWI_true_value_relation
    property to calculate "true value" from
  property true value 0.00168595
    (same comment as for heat, for reuse in municipal waste incineration only)

## Inputs from technosphere
- operation, reefer, freezing: 0.282483 kg*day; source Angel Avadí 2014; triangular min 0.282483, mostLikely 0.282483, max 0.282483, pedigree (2,3,3,1,1)
  Proxy for ice use
  Uncertainty: Data from 1 plant, assumptions for larger plants
- heat, district or industrial, other than natural gas: 0.610586 MJ; source Angel Avadí 2014; triangular min 0.610586, mostLikely 0.610586, max 0.610586, pedigree (2,3,3,1,1)
  Industrial heat for cooking/sterilisation
  Uncertainty: Data from 1 plant, assumptions for larger plants
  properties: corresponding fuel use, propane, furnace >100kW 1.05263 MJ
  note on corresponding fuel use, propane, furnace >100kW: Lower heating value of the fuel input related to the heat/electricity output, taken directly from ecoinvent v3.0 dataset "heat production, natural gas, at industrial furnace >100kW, GLO 2000".
- water, completely softened: 1.41241 kg; name water; source Angel Avadí 2014; triangular min 1.41241, mostLikely 1.41241, max 1.41241, pedigree (2,3,3,1,1)
  Soft water for process
  Uncertainty: Data from 1 plant, assumptions for larger plants
  properties: wet mass 1 kg
- metal working, average for chromium steel product manufacturing: 0.00141241 kg; = tinplate_can; source Angel Avadí 2014
  Tinplate can
- sodium chloride, powder: 0.0282483 kg; source Angel Avadí 2014; triangular min 0.0282483, mostLikely 0.0282483, max 0.0282483, pedigree (2,3,3,1,1)
  Salt for brine
  Uncertainty: Data from 1 plant, assumptions for larger plants
  properties: dry mass 1 kg, wet mass 1 kg
- vegetable oil, refined: 0.0348866 kg; source Angel Avadí 2014; triangular min 0.0348866, mostLikely 0.0348866, max 0.0348866, pedigree (2,3,3,1,1)
  Oil for canned fish
  Uncertainty: Data from 1 plant, assumptions for larger plants
  properties: wet mass 1 kg, dry mass 1 kg, carbon content, non-fossil 0.768
- fish canning plant: 9.20379e-10 unit; = ((production+residues)/1000)/(capacity*lifetime); source Angel Avadí 2014
  One unit of plant represents the installed capacity required to process 1 t of raw material;activityLink introduced to establish a direct link to the corresponding regional supply of this product
  property capacity [kg] 7673 kg; name capacity
  property lifetime 40 year; name lifetime
- tin plated chromium steel sheet, 2 mm: 0.00141241 m2; name tinplate_can; source Angel Avadí 2014; triangular min 0.00141241, mostLikely 0.00141241, max 0.00141241, pedigree (2,3,3,1,1)
  Tinplate can
  Uncertainty: Data from 1 plant, assumptions for larger plants
  properties: dry mass 15.6365 kg, wet mass 15.6365 kg
- scrap tin sheet: -0.0220336 kg; = (tinplate_can*15.6)*-1; source Avadí, A. 2018
  Waste tinplate cans (sheet use times weight of each sheet)
  production volume 2.84544e7 kg; = prod_vol * ((Ref('27149502-cadc-4373-8239-6ee4b8b88de9')*-1) / production)
    Calculated from production volume of reference product using the relative outputs.
  properties: wet mass 1 kg, dry mass 1 kg
- electricity, medium voltage: 0.0528242 kWh; source Angel Avadí 2014; triangular min 0.0528242, mostLikely 0.0528242, max 0.0528242, pedigree (2,3,3,1,1)
  Electricity use for all production phases from reception/cold storage to final product
  Uncertainty: Data from 1 plant, assumptions for larger plants
- wastewater from vegetable oil refinery: -0.000847448 m3; = ((water*.6)/1000)*-1; source Avadí, A. 2018
  Proxy for wastewater from fish processing plant. Asumed 40% of the water is either incorporated into the product or lost
  production volume 1.0944e6 m3; = prod_vol * ((Ref('dcee2345-2a12-4120-8778-10e9a6bc48a4')*-1) / production)
    Calculated from production volume of reference product using the relative outputs.
  properties: water content 1146.05, dry mass 0.871801 kg, wet mass 1000 kg, carbon content, non-fossil 0.8
  note on carbon content, non-fossil: Estimated load for fish processing plant cleansing wastewater. The loading of fish processing wastewater is mainly organic (http://www.dfo-mpo.gc.ca/Library/273700.pdf)

## Emissions to nature
- Nitrogen [water, unspecified]: 0.000172314 kg; source Angel Avadí 2014; triangular min 0.000172314, mostLikely 0.000172314, max 0.000172314, pedigree (2,3,3,1,1)
  Uncertainty: Data from 1 plant, assumptions for larger plants
- Phosphorus [water, unspecified]: 3.53103e-5 kg; source Angel Avadí 2014; triangular min 3.53103e-5, mostLikely 3.53103e-5, max 3.53103e-5, pedigree (2,3,3,1,1)
  Uncertainty: Data from 1 plant, assumptions for larger plants

## Sampling procedure
Data from 1 canning plant. This plant is representative of the current technology and management, as determined by interviews with many technical, commercial, academic and governmental representatives.
As of 2017 there were 71 active fish canning plants in Peru, with an aggregated processing capacity of 545 000 t/y.

## Extrapolations
Data from anchovies and other small pelagics canning were assumed to represent the canning of other small fish
