# drying, natural gas

Dataset: EcoSpold 2, unit process
Geography: NO
Time period: 2000-01-01 to 2019-12-31
Technology level: current
Classification: ISIC rev.4 ecoinvent: 3520:Manufacture of gas; distribution of gaseous fuels through mains
Classification: EcoSpold01Categories: natural gas/production
Tags: ConvertedDataset
Scenario: Business-as-Usual
System model: Allocation at the point of substitution
Share of production covered: 100 %
Generated by: Mireille Faist Emmenegger (obsolete)
Published in: Faist Emmenegger, M. 2007
Database: ecoinvent
isCopyrightProtected: true
accessRestrictedTo: 1

## General comment
Data is based on the environmental report of the two gas processing plants of Norway Karsto and Kollsnes.
[This dataset was already contained in the ecoinvent database version 2. It was not individually updated during the transfer to ecoinvent version 3. Life Cycle Impact Assessment results may still have changed, as they are affected by changes in the supply chain, i.e. in other datasets. This dataset was generated following the ecoinvent quality guidelines for version 2. It may have been subject to central changes described in the ecoinvent version 3 change report (http://www.ecoinvent.org/database/ecoinvent-version-3/reports-of-changes/), and the results of the central updates were reviewed extensively. The changes added e.g. consistent water flows and other information throughout the database. The documentation of this dataset can be found in the ecoinvent reports of version 2, which are still available via the ecoinvent website. The change report linked above covers all central changes that were made during the conversion process.]

## Included activities end
Drying and processing of 1 m3 natural gas before being inducted in transport network.

## Geography
The figures are based on Norwegian data for the gas processing plants Karsto and Kollsnes. A

## Technology
Kårstø started operation in 1985 and Kollsnes in 1996. No further information on technology available.

## Time period
Data for 2000 is used. Emissions of CO2 and NMVOC were stable in the past 5 years. NOx increased slightly per tonne of product in the processing plant Karsto.

## Reference product
- drying, natural gas: 1 m3; name drying_RP; CPC 86211: Support services to oil and gas extraction; By-product classification allocatable product
  EcoSpold01Location=NO
  production volume 0.0266065 m3; name drying_RP_PV
    This is a placeholder value that does not reflect real-world production volumes. This dataset does not currently require a real-world production volume to work in the database framework, and no actual data were collected yet. This has no negative effect on the results of the ecoinvent database. The placeholder value of this activity was scaled according to the nominal GDP of 2005 (source: United Nations, http://data.un.org/Glossary.aspx?q=GDP+%28current+US%24%29, accessed 20130726) to reflect an appropriate share of the global production volume, which is also a placeholder value.
  property price 0.00459362 EUR2005
    Calculated based on inputs: The price of the product has been calculated as a sum of the values of the material and energy inputs for this product. This value is therefore a rough estimation. It may underestimate the real price since there are additional expenses when producing any product. These expences can include for example labour costs, treatment of waste materials and profit for the producer. Please consider carefully whether this level of data quality is acceptable for your application.
  property true value 0.00459362; name drying_RP_true_value
    allocation property applied in "true value" allocation // value calculated from revenue

## By-products
- heat, for reuse in municipal waste incineration only: 0 MJ; CPC 17300: Steam and hot water; By-product classification allocatable product; pedigree (1,1,1,1,1)
  Net electricity generated from this waste and used in internal MSWI plant energy redistribution.
  Uncertainty: uncertainty is calculated from uncertainties in waste composition and uncertainties in energy efficiency and the uncertainty in internal energy demand
  production volume 1.95153e-7 MJ
  property true value relation 0.1842; name E_th_prod_MSWI_true_value_relation
    property to calculate "true value" from
  property exergy 0.1842 MJ; name E_th_prod_MSWI_exergy
    This exergy property is based on the exergy content of the product.
  property price 0.0106 EUR2005; name E_th_prod_MSWI_price_EUR2005
    Average European district heat price from Ecoheatcool and Euroheat 2005-2006, Ecoheat Work package 1: The European heat market. Final report. 10.6 EUR/GJ i s the price of district heat. http://www.solarthermalworld.org/files/Ecoheatcool%20WP1%20Web.pdf?download
  property true value 4.85261e-8
    allocation property applied in "true value" allocation // value calculated from true value relation
- electricity, for reuse in municipal waste incineration only: 0 kWh; CPC 17100: Electrical energy; By-product classification allocatable product; pedigree (1,1,1,1,1)
  (same comment as for heat, for reuse in municipal waste incineration only)
  production volume 2.65355e-8 kWh
  property exergy 3.6 MJ; name E_el_prod_MSWI_exergy
    This exergy property is based on the exergy content of the product.
  property true value relation 3.6; name E_el_prod_MSWI_true_value_relation
    property to calculate "true value" from
  property price 0.1 EUR2005; name E_el_prod_MSWI_price_EUR2005
    Estimated to be the same price as in case of electricity, medium voltage.
  property true value 1.28956e-7
    (same comment as for heat, for reuse in municipal waste incineration only)
- iron scrap, sorted, pressed: 0 kg; By-product classification Recyclable; CPC 39310: Slag, dross, scalings and other waste from the manufacture of iron or steel; pedigree (1,1,1,1,1)
  Iron scrap recovered from this waste.
  Uncertainty: uncertainty calculated from uncertainty in waste composition, uncertainty of share of recyclable metal, uncertainty of transfer coefficient to bottom ash, uncertainty of the efficiency of scrap removal in MSWI plant.
  production volume 5.10141e-10 kg
  property price 0.175 EUR2005
    Temporary price data. Calculated as 90% of purchasers price based on: 2005 import and export prices (total trades (USD) divided by total weight (kg) in biggest economies of the world: EU27, USA, Brasil, China, India, Japan and Russia) from UN Commodity Trade Statistics Database (http://data.un.org/Explorer.aspxDatabase [Accessed 2011.06.20]). Commodity: Waste or scrap, of cast iron
  property carbon content 0
    carbon content on a dry matter basis (reserved; not for manual entry)
  property true value 3.35537e-9
    allocation property applied in "true value" allocation // value calculated from revenue
  properties: dry mass 1 kg, water content 0, carbon content, non-fossil 0, water in wet mass 0 kg, carbon content, fossil 0, wet mass 1 kg, carbon allocation 0 kg
- iron scrap, unsorted: 0 kg; source European Aluminium Association 2008; CPC 39310: Slag, dross, scalings and other waste from the manufacture of iron or steel; By-product classification Recyclable; pedigree (1,1,1,1,1)
  production volume 7.1892e-14 kg
  property price 0.149 EUR2005; name ironScrapAmount_price_EUR2005
    Temporary price data. Calculated as 90% of purchasers price based on: estimated at 85% of sorted scrap
  property carbon content 0
    carbon content on a dry matter basis (reserved; not for manual entry)
  property true value 4.02605e-13
    allocation property applied in "true value" allocation // value calculated from revenue
  properties: water in wet mass 0 kg, water content 0, carbon content, fossil 0, carbon content, non-fossil 0, dry mass 1 kg, wet mass 1 kg, carbon allocation 0 kg
- aluminium oxide, non-metallurgical: 0 kg; source European Aluminium Association 2008; CPC 41432: Alumina (aluminium oxide), except artificial corundum; By-product classification allocatable product; CAS 1344-28-1; pedigree (1,1,1,1,1)
  production volume 4.52389e-12 kg
  property carbon content, non-fossil 0; name C_content_non_fossil
  property price 0.28 EUR2005; name Al2O3Amount_price_EUR2005
    From UN trade database. http://data.un.org/ Import data from the largest economies of the world are used (Brazil, India, USA, China, Japan and EU-27).
  property dry mass 1 kg; name DM
  property water content 0; name water_content
  property wet mass 1 kg; name WM
  property water in wet mass 0 kg; name WWM
  property carbon content, fossil 0; name C_content_fossil
  property carbon content 0
    carbon content on a dry matter basis (reserved; not for manual entry)
  property true value 4.76083e-11
    allocation property applied in "true value" allocation // value calculated from revenue
  properties: carbon allocation 0 kg
- aluminium, cast alloy: 0 kg; source European Aluminium Association 2008; By-product classification allocatable product; CPC 41431: Unwrought aluminium; pedigree (1,1,1,1,1)
  EcoSpold01Location=RER
  production volume 4.22884e-11 kg
  property price 1.3 EUR2005; name castAlloyAmount_price_EUR2005
    Temporary price data. Calculated as 90% of purchasers price based on: Source: London Metal Exchange, Aluminium alloy price for 2005
  property carbon content 0
    carbon content on a dry matter basis (reserved; not for manual entry)
  property true value 2.06622e-9
    allocation property applied in "true value" allocation // value calculated from revenue
  properties: water in wet mass 0 kg, carbon content, non-fossil 0, water content 0, dry mass 1 kg, carbon content, fossil 0, wet mass 1 kg, carbon allocation 0 kg
- aluminium, wrought alloy: 0 kg; source European Aluminium Association 2008; By-product classification allocatable product; CPC 4153: Semi-finished products of aluminium or aluminium alloys; pedigree (1,1,1,1,1)
  production volume 1.8513e-11 kg
  property price 1.44 EUR2005; name secondaryAluminiumOutput_price_EUR2005
    Estimated based on literature values and expert judgement. Aluminium ccast alloys are about 90% of the price of aluminium wrought alloys.
  property carbon content 0
    carbon content on a dry matter basis (reserved; not for manual entry)
  property true value 1.00196e-9
    allocation property applied in "true value" allocation // value calculated from revenue
  properties: wet mass 1 kg, water content 0, carbon content, fossil 0, water in wet mass 0 kg, carbon content, non-fossil 0, dry mass 1 kg, carbon allocation 0 kg
- copper: 0 kg; source Rentz O. 1999; By-product classification allocatable product; CPC 41413: Refined copper and copper alloys, unwrought; master alloys of copper
  Literature value. Copper uses: Before end-use copper is manufactured into semi fabricated products, such as shapes and ingots (known as 'semis'). These manufacturing processes are subdivided into hot working, cold working and, if necessary, process annealing. Few of the semis are ready for use as such. They more typically travel to first-stage manufacturers, who make metal rods, wire, and casting, and then to component manufacturers who produce such things as motors, valves, and insulated cables The components in turn are incorporated by final-stage manufacturers into a variety of finished products - automobiles, commercial buildings, residential housing, and so forth. These uses account for about 79% of the world-wide consumption of copper.
  production volume 4.92632e-12 kg
  property price 5.52 EUR2005
    Literature value (http://www.economist.com/news/business/21576714-mining-industry-has-enriched-chile-its-future-precarious-copper-solution). Average price between 20015 and 2013.
  property carbon content 0
    carbon content on a dry matter basis (reserved; not for manual entry)
  property true value 1.02205e-9
    allocation property applied in "true value" allocation // value calculated from revenue
  properties: dry mass 1 kg, water in wet mass 0 kg, wet mass 1 kg, carbon content, non-fossil 0, water content 0, carbon content, fossil 0, carbon allocation 0 kg
- zinc concentrate: 0 kg; CPC 14290: Other non-ferrous metal ores and concentrates (other than uranium or thorium ores and concentrates); By-product classification allocatable product
  Calculated value from the knowledge of the properties of both products.
  production volume 3.91015e-21 kg
  property price 0.38 EUR2005; name ByP_price_EUR2005
    Temporary price data. Calculated as 90% of purchasers price based on: Zinc content in concentrate 53%. Concentrate price per kg Zn 86.5% of refined Zn price (13.5% treatment charges according to CHR Metals Limited 2005: Dynamic cost curves. http://www.minecost.com/dynamic.pdf). 2004 zinc price from USGS (2007) Mineral commodity summaries 2007. <http://minerals.usgs.gov/minerals/pubs/mcs/2007/mcs2007.pdf> [Accessed 25 May 2010]
  property zinc content 0.53; name zinc_C_zinc_concentrate
    Zinc content on a dry matter basis. Value taken from teh "zinc mine operation" /GLO dataset.
  property dry mass 1 kg; name DM_zinc_concentrate
  property carbon content 0
    carbon content on a dry matter basis (reserved; not for manual entry)
  property true value 5.58457e-20
    allocation property applied in "true value" allocation // value calculated from revenue
  properties: wet mass 1 kg, water content 0, carbon content, non-fossil 0, carbon content, fossil 0, water in wet mass 0 kg, carbon allocation 0 kg

## Inputs from technosphere
- spent solvent mixture: -7.08971e-7 kg; name ByP_01; lognormal variance with pedigree 0.0587, pedigree (2,1,5,3,3)
  Norwegian data
  EcoSpold01Location=CH
  Uncertainty: Norwegian data
  production volume 1.8864e-8 kg; = ByP_01/ drying_RP* drying_RP_PV
    Calculated from the production volume of drying, natural gas in proportion to the respective output amounts.
  property price 0 EUR2005; name ByP_01_price_EUR2005
  properties: water content 0.197605, wet mass 1 kg, dry mass 0.835 kg, carbon content, fossil 0.571257
  note on carbon content, fossil: Tab A.7, ecoinvent v2.2 report 13_I. C content has been calculated after data in the tables, and then referred to 1 kg DM
- waste textile, soiled: -1.38994e-7 kg; name ByP_06; lognormal variance with pedigree 0.0587, pedigree (2,1,5,3,3)
  Norwegian data
  EcoSpold01Location=CH
  Uncertainty: Norwegian data
  production volume 3.6983e-9 kg; = ByP_06/ drying_RP* drying_RP_PV
    (same comment as for spent solvent mixture)
  property price 0 EUR2005; name ByP_06_price_EUR2005
  properties: carbon content, non-fossil 0.570519, dry mass 0.75 kg, wet mass 1 kg, water content 0.333333
  note on carbon content, non-fossil: C content of 1 kg DM was calculated after data in Tab A.4, ecoinvent v2.2 report 13_I,
- chemical, organic: 2.64989e-6 kg; lognormal variance with pedigree 0.058, pedigree (1,1,5,1,3)
  Environmental report
  EcoSpold01Location=GLO
  Uncertainty: environmental report
  properties: carbon content, fossil 0.628, wet mass 1 kg, dry mass 1 kg
  note on carbon content, fossil: This dataset is an unweighted average of 20 organic substances (listed in Tab 88.1, ecoinvent v2.2 report 8, part II), being part of the top100 chemicals included in this database. The C-content has also been calculated as an unweighted average of the C content of the substances composing this dataset.
- waste emulsion paint: -4.15983e-8 kg; name ByP_05; lognormal variance with pedigree 0.0587, pedigree (2,1,5,3,3)
  Norwegian data
  EcoSpold01Location=CH
  Uncertainty: Norwegian data
  production volume 1.10683e-9 kg; = ByP_05/ drying_RP* drying_RP_PV
    (same comment as for spent solvent mixture)
  property price 0 EUR2005; name ByP_05_price_EUR2005
  properties: carbon content, fossil 0.27, dry mass 1 kg, wet mass 1 kg
  note on carbon content, fossil: Tab A.4, ecoinvent v2.2 report 13_I. C content has been calculated after data in the tables, and then referred to 1 kg DM
- chemical, inorganic: 2.64989e-6 kg; lognormal variance with pedigree 0.058, pedigree (1,1,5,1,3)
  Environmental report
  EcoSpold01Location=GLO
  Uncertainty: environmental report
  properties: carbon content, fossil 0.003, wet mass 1 kg, dry mass 1 kg
  note on carbon content, fossil: This dataset is an unweighted average of 20 inorganic substances (listed in Tab 88.1, ecoinvent v2.2 report 8, part II), being part of the top100 chemicals included in this database. The C-content has also been calculated as an unweighted average of the C content of the substances composing this dataset.
- average incineration residue: -2.16991e-8 kg; name ByP_04; lognormal variance with pedigree 0.0587, pedigree (2,1,5,3,3)
  EcoSpold01Location=CH
  Norwegian data
  Uncertainty: Norwegian data
  production volume 5.77361e-10 kg; = ByP_04/ drying_RP* drying_RP_PV
    (same comment as for spent solvent mixture)
  property price 0 EUR2005; name ByP_04_price_EUR2005
  properties: dry mass 1 kg, carbon content, non-fossil 0.0511208, carbon content, fossil 0.0325466, wet mass 1 kg
  note on carbon content, non-fossil: Tab A.1, ecoinvent v2.2 report 13_I. It is considered that 61.1% of the C has a biogenic origin
- natural gas, high pressure: 0.0074597 m3; lognormal variance with pedigree 0.058, pedigree (1,1,5,1,3)
  Environmental report, aggregation of different processes
  EcoSpold01Location=NO
  Uncertainty: environmental report, aggregation of different processes
  properties: dry mass 0.84 kg, wet mass 0.84 kg, carbon content, fossil 0.602381
  note on carbon content, fossil: An average C content of 0.506 kg C/ m3 has been assumed (this average has been calculated using data in Tab 3.5, ecoinvent v2.2 report 6_V
- soda ash, light, crystalline, heptahydrate: 2.10992e-6 kg; lognormal variance with pedigree 0.058, pedigree (1,1,5,1,3)
  Environmental report
  EcoSpold01Location=RER
  Uncertainty: environmental report
  properties: carbon content, fossil 0.0517241, wet mass 1 kg, dry mass 1 kg
- diesel: 5.98976e-6 kg; lognormal variance with pedigree 0.058, pedigree (1,1,5,1,3)
  EcoSpold01Location=RER
  Environmental report, aggregation of different processes
  Uncertainty: environmental report, aggregation of different processes
  properties: dry mass 1 kg, carbon content, fossil 0.865, wet mass 1 kg
  note on carbon content, fossil: C-content of diesel is 86.5% (ecoinvent v2.2 report 6_IV, Tab 3.14)
- waste mineral oil: -4.37982e-6 kg; name ByP_03; lognormal variance with pedigree 0.0587, pedigree (2,1,5,3,3)
  Norwegian data
  EcoSpold01Location=CH
  Uncertainty: Norwegian data
  production volume 1.16536e-7 kg; = ByP_03/ drying_RP* drying_RP_PV
    (same comment as for spent solvent mixture)
  property price 0 EUR2005; name ByP_03_price_EUR2005
  properties: carbon content, fossil 0.864444, water content 0.111111, wet mass 1 kg, dry mass 0.9 kg
  note on carbon content, fossil: Tab A.6, ecoinvent v2.2 report 13_I. C content has been calculated after data in the tables, and then referred to 1 kg DM
- natural gas processing plant: 3.93984e-13 unit; lognormal variance with pedigree 0.058, pedigree (1,1,5,1,3)
  EcoSpold01Location=GLO
  Environmental report, standard module
  Uncertainty: environmental report, standard module
- electricity, medium voltage: 0.0203992 kWh; lognormal variance with pedigree 0.058025, pedigree (1,1,5,2,3)
  EcoSpold01Location=NO
  Environmental report, standard module
  Uncertainty: environmental report, standard module
- ethylene glycol: 1.81993e-6 kg; lognormal variance with pedigree 0.058, pedigree (1,1,5,1,3)
  EcoSpold01Location=RER
  Environmental report
  Uncertainty: environmental report
  properties: carbon content, fossil 0.387097, wet mass 1 kg, dry mass 1 kg
- municipal solid waste: -2.12991e-6 kg; name ByP_02; lognormal variance with pedigree 0.0587, pedigree (2,1,5,3,3)
  EcoSpold01Location=CH
  Norwegian data
  Uncertainty: Norwegian data
  production volume 5.66718e-8 kg; = ByP_02/ drying_RP* drying_RP_PV
    (same comment as for spent solvent mixture)
  properties: carbon content, fossil 0.171549, wet mass 1 kg, water content 0.297017, dry mass 0.771 kg, carbon content, non-fossil 0.261655
  note on carbon content, fossil: MSW composition in tab 4.1, ecoinvent v2.2 report 13_I. C content referred to 1 kg DM
- waste wood, untreated: -3.84984e-7 kg; name ByP_08; lognormal variance with pedigree 0.0587, pedigree (2,1,5,3,3)
  EcoSpold01Location=CH
  Norwegian data
  Uncertainty: Norwegian data
  production volume 1.02435e-8 kg; = ByP_08/ drying_RP* drying_RP_PV
    (same comment as for spent solvent mixture)
  property price 0 EUR2005; name ByP_08_price_EUR2005
  properties: wet mass 1 kg, dry mass 0.8 kg, carbon content, non-fossil 0.48632, water content 0.25
  note on carbon content, non-fossil: Tab A.4, ecoinvent v2.2 report 13_I. C content has been referred to 1 kg DM,
- spent antifreezer liquid: -4.03984e-6 kg; name ByP_07; lognormal variance with pedigree 0.0587, pedigree (2,1,5,3,3)
  Norwegian data
  EcoSpold01Location=CH
  Uncertainty: Norwegian data
  production volume 1.0749e-7 kg; = ByP_07/ drying_RP* drying_RP_PV
    (same comment as for spent solvent mixture)
  property price 0 EUR2005; name ByP_07_price_EUR2005
  properties: wet mass 1 kg, carbon content, fossil 0.431328, water content 1.07469, dry mass 0.482 kg

## Emissions to nature
- COD, Chemical Oxygen Demand [water, ocean]: 2.71989e-7 kg; lognormal variance with pedigree 0.0901, pedigree (3,5,5,3,1)
  Extrapolation for sum parameter
  Uncertainty: Extrapolation for sum parameter
- Carbon dioxide, fossil [air, non-urban air or from high stacks]: 0.0166993 kg; lognormal variance with pedigree 0.058, pedigree (1,1,5,1,3)
  Environmental report, aggregation of different processes
  Uncertainty: environmental report, aggregation of different processes
- NMVOC, non-methane volatile organic compounds, unspecified origin [air, non-urban air or from high stacks]: 6.71973e-5 kg; lognormal variance with pedigree 0.178, pedigree (1,1,5,1,3)
  (same comment as for Carbon dioxide, fossil)
- Nitrogen oxides [air, non-urban air or from high stacks]: 1.53994e-5 kg; lognormal variance with pedigree 0.098, pedigree (1,1,5,1,3)
  (same comment as for Carbon dioxide, fossil)
- Triethylene glycol [water, ocean]: 1.20995e-7 kg; lognormal variance with pedigree 0.358, pedigree (1,1,5,1,3)
  (same comment as for Carbon dioxide, fossil)
- BOD5, Biological Oxygen Demand [water, ocean]: 2.71989e-7 kg; lognormal variance with pedigree 0.0901, pedigree (3,5,5,3,1)
  Extrapolation for sum parameter
  Uncertainty: Extrapolation for sum parameter
- Phenol [water, ocean]: 4.72981e-10 kg; lognormal variance with pedigree 0.358, pedigree (1,1,5,1,3)
  (same comment as for Carbon dioxide, fossil)
- Sulfur [water, ocean]: 2.3999e-11 kg; lognormal variance with pedigree 0.0901, pedigree (3,5,5,3,1)
  Extrapolation for sum parameter
  Uncertainty: Extrapolation for sum parameter
- Methane, fossil [air, non-urban air or from high stacks]: 1.63993e-5 kg; lognormal variance with pedigree 0.098, pedigree (1,1,5,1,3)
  (same comment as for Carbon dioxide, fossil)
- Oils, unspecified [water, ocean]: 8.96964e-9 kg; lognormal variance with pedigree 0.358, pedigree (1,1,5,1,3)
  (same comment as for Carbon dioxide, fossil)
- Sulfur dioxide [air, non-urban air or from high stacks]: 4.72981e-8 kg; lognormal variance with pedigree 0.058, pedigree (1,1,5,1,3)
  (same comment as for Carbon dioxide, fossil)
- Methanol [water, ocean]: 4.01984e-8 kg; lognormal variance with pedigree 0.358, pedigree (1,1,5,1,3)
  (same comment as for Carbon dioxide, fossil)
- Nitrogen [water, ocean]: 6.92972e-12 kg; lognormal variance with pedigree 0.0901, pedigree (3,5,5,3,1)
  Extrapolation for sum parameter
  Uncertainty: Extrapolation for sum parameter
- Ammonium, ion [water, ocean]: 9.46962e-10 kg; lognormal variance with pedigree 0.098, pedigree (1,1,5,1,3)
  (same comment as for Carbon dioxide, fossil)
- AOX, Adsorbable Organic Halogen as Cl [water, ocean]: 9.23963e-14 kg; lognormal variance with pedigree 0.0901, pedigree (3,5,5,3,1)
  Extrapolation for sum parameter
  Uncertainty: Extrapolation for sum parameter
- TOC, Total Organic Carbon [water, ocean]: 6.66973e-7 kg; lognormal variance with pedigree 0.098, pedigree (1,1,5,1,3)
  (same comment as for Carbon dioxide, fossil)
- DOC, Dissolved Organic Carbon [water, ocean]: 6.66973e-7 kg; lognormal variance with pedigree 0.0901, pedigree (3,5,5,3,1)
  Extrapolation for sum parameter
  Uncertainty: Extrapolation for sum parameter

## Sampling procedure
Data is based on environmental report. No information about the sampling procedure.

## Extrapolations
The figures are based on the data for the Norwegian gas processing plants Karsto and Kollsnes. About 60% of the Norwegian gas is processed either at Kårstø or at Kollsnes. The rest is processed on the platforms. An average of both plants was taken. Kollsnes is the onshore processing plant for the offshore Troll gas field. Part of the processing (mainly water separation) of the Troll gas is performed on the Troll platform, where as the final processing is performed at Kollsnes. The Troll gas contains very little liquids (condensate and oil) compared to the other fields on the Norwegian Shelf. Kårstø is a complex facility. The main energy consumption for processing is for distillation, i.e. heating of the gas to distill off its various components. The emissions of flared gas and of use of fuel gas are included in the process. The Norwegian data can be extrapolated for European processing of gas

## Review by Michael Spielmann (obsolete) 2003-09-22
Passed.
