# containerboard production, linerboard, testliner

Dataset: EcoSpold 2, unit process
Geography: CA-QC
Time period: 2007-01-01 to 2019-12-31
Technology level: current
Classification: ISIC rev.4 ecoinvent: 1702:Manufacture of corrugated paper and paperboard and of containers of paper a
Classification: EcoSpold01Categories: paper & cardboard/cardboard & corrugated board
Tags: single enterprise data
Scenario: Business-as-Usual
System model: Allocation at the point of substitution
Share of production covered: 36 %
Generated by: Hugues Imbeault-Tétreault
Database: ecoinvent
isCopyrightProtected: true
accessRestrictedTo: 1

## General comment
This dataset describes the production of unbleached testliner.
Stock preparation is done in accordance with specific recipe for brown and white top testliners. The grades of recovered paper are used in the ratio mentioned in the recipe. The structure of testliner mostly consists of multiple plies of paper.

## Included activities start
The process starts with the reception of the recovered paper, heat from fossil fuels, consumables and chemicals at the gate of the mill, and water input from river. Heat is provided by a separated cogeneration facility, which is outside the system boundaries.

## Included activities end
This activity ends with the production of corrugated board base paper (testliner). The dataset includes the pulping of the recovered paper (submerging the bales of dry recovered paper in water in a pulper and vigorously agitating the mixture so that the paper is wetted and broken up to form a pumpable suspension of fibers of about 10-15% solid content), the cleaning of the pulp, and transfer to the paper machine to form and dry the sheet. Wastewater treatment is included in the dataset.

## Geography
Data from a factory located in the province of Québec, Canada.

## Time period
Data for year 2007.

## Reference product
- containerboard, linerboard: 1 kg; name linerboardAmount; By-product classification allocatable product; CPC 32151: Corrugated paper and paperboard
  Net saleable product (NSP)
  production volume 2.78e8 kg; name linerboardProductionVolume
    Estimation.
  property price 0.598 EUR2005; name linerboardAmount_price_EUR2005
    Export prices for the World+ according to: http://faostat.fao.org/site/626/DesktopDefault.aspx?PageID=626#ancor downloaded 28 April 2009; calculated as export value divided by export volume.
  property carbon content 0.46
    carbon content on a dry matter basis (reserved; not for manual entry)
  property true value 598; name linerboardAmount_true_value
    allocation property applied in "true value" allocation // value calculated from revenue
  properties: carbon content, non-fossil 0.46, dry mass 0.925926 kg, water in wet mass 0.0740741 kg, wet mass 1 kg, water content 0.08, carbon allocation 0.425926 kg

## By-products
All rows: By-product classification allocatable product; pedigree (1,1,1,1,1)
- potassium fertiliser, as K2O: 0 kg; source CRAAQ 2010; CPC 3463: Mineral or chemical fertilizers, potassic
  This is the potassium (as K2O) output (organic and mineral forms of potassium contained) from organic origin. In practice, only a part of this total amount is available to the plants and the available amount has to be calculated considering efficiency of organic potassium (to replace mineral potassium ), which also depends on many factors, such as climate, soil, crop, timing and technique of application, etc. Since this dataset includes field emissions from the application of sludge, potassium availability has been accounted for in the calculation of direct field emissions.
  Uncertainty: The uncertainty of calculated values is determined from propagation of uncertainty factors of underlying variables.
  production volume 3741.36 kg
  property price 0.188 EUR2005; name K2O_fertiliser_price_EUR2005
    Temporary price data. Calculated as 90% of purchasers price based on: 2004 import price calulated from FAOSTAT (http://faostat.fao.org/site/575/DesktopDefault.aspx?PageID=575#ancor [accessed 2011.01.27] Potash Fertilizers (K20 total nutrients) in kUSD/Mg
  property carbon content 0
    carbon content on a dry matter basis (reserved; not for manual entry)
  property true value 0.00253013
    allocation property applied in "true value" allocation // value calculated from revenue
  properties: carbon content, fossil 0, dry mass 1 kg, water in wet mass 0 kg, water content 0, wet mass 1 kg, carbon content, non-fossil 0, carbon allocation 0 kg
- nitrogen fertiliser, as N: 0 kg; source CRAAQ 2010; CPC 3461: Mineral or chemical fertilizers, nitrogenous
  This is the total nitrogen (as N) output (organic and mineral forms of nitrogen contained) from organic origin. In practice, only a part of this total amount is available to the plants and the available amount has to be calculated considering nitrogen efficiency (to replace mineral nitrogen), which also depends on many factors, such as climate, soil, crop, timing and technique of application, etc. Since this dataset includes field emissions from the application of sludge, nitrogen availability has been accounted for in the calculation of direct field emissions.
  Uncertainty: The uncertainty of calculated values is determined from propagation of uncertainty factors of underlying variables.
  production volume 23138.5 kg
  property price 0.473 EUR2005; name N_fertiliser_price_EUR2005
    Temporary price data. Calculated as 90% of purchasers price based on: 2004 prices are calculated on basis of Import/Export data (tonnes and US$) from UN Trade Statistics Database (http://data.un.org/Browse.aspx?d=ComTrade, accessed 7/7-2010). N, P2O5, or K2O content (http://www.fertilizer.org/ifa/Home-Page/STATISTICS/Conversions-factors)
  property carbon content 0
    carbon content on a dry matter basis (reserved; not for manual entry)
  property true value 0.0393687
    allocation property applied in "true value" allocation // value calculated from revenue
  properties: water content 0, wet mass 1 kg, dry mass 1 kg, carbon content, non-fossil 0, water in wet mass 0 kg, carbon content, fossil 0, carbon allocation 0 kg
- phosphate fertiliser, as P2O5: 0 kg; source CRAAQ 2010; CPC 3462: Mineral or chemical fertilizers, phosphatic
  This is the total phosphate (as P2O5) output (organic and mineral forms of phosphate contained) from organic origin. In practice, only a part of this total amount is available to the plants and the available amount has to be calculated considering efficiency of organic phosphate (to replace mineral phosphate), which also depends on many factors, such as climate, soil, crop, timing and technique of application, etc. Since this dataset includes field emissions from the application of sludge, phosphate availability has been accounted for in the calculation of direct field emissions.
  Uncertainty: The uncertainty of calculated values is determined from propagation of uncertainty factors of underlying variables.
  production volume 15487.3 kg
  property price 0.241 EUR2005; name P2O5_fertiliser_price_EUR2005
    (same comment as for nitrogen fertiliser, as N)
  property carbon content 0
    carbon content on a dry matter basis (reserved; not for manual entry)
  property true value 0.013426
    allocation property applied in "true value" allocation // value calculated from revenue
  properties: dry mass 1 kg, water content 0, carbon content, fossil 0, wet mass 1 kg, carbon content, non-fossil 0, water in wet mass 0 kg, carbon allocation 0 kg
- soil pH raising agent, as CaCO3: 0 kg; source Marianne Lemieux 2013; CPC 34659: Fertilizers n.e.c.
  Calculated value of the amount of CaCO3 that can be substituted considered the liming efficiency of the sludge.
  Uncertainty: The uncertainty of calculated values is determined from propagation of uncertainty factors of underlying variables.
  production volume 431351 kg
  property carbon content, fossil 0.12; name soil_pH_raising_agent_C_content_fossil_0; = 12/(40+12+3*16)
    Stoichiometric calculation. Fossil carbon content on a dry matter basis.
  property carbon content, non-fossil 0; name soil_pH_raising_a_C_content_non_fossil_0
    biogene carbon content on a dry matter basis
  property price 0.117 EUR2005; name soil_pH_raising_agent_as_CaCO3_price_EUR
    The price is estimated to be the same as for lime.
  property carbon content 0.12
    carbon content on a dry matter basis (reserved; not for manual entry)
  property true value 0.18154
    allocation property applied in "true value" allocation // value calculated from revenue
  properties: wet mass 1 kg, water in wet mass 0 kg, water content 0, dry mass 1 kg, carbon allocation 0.12 kg
- heat, for reuse in municipal waste incineration only: 0 MJ; CPC 17300: Steam and hot water
  Net electricity generated from this waste and used in internal MSWI plant energy redistribution.
  Uncertainty: uncertainty is calculated from uncertainties in waste composition and uncertainties in energy efficiency and the uncertainty in internal energy demand
  production volume 1025.43 MJ
  property exergy 0.1842 MJ; name E_th_prod_MSWI_exergy
    This exergy property is based on the exergy content of the product.
  property price 0.0106 EUR2005; name E_th_prod_MSWI_price_EUR2005
    Average European district heat price from Ecoheatcool and Euroheat 2005-2006, Ecoheat Work package 1: The European heat market. Final report. 10.6 EUR/GJ i s the price of district heat. http://www.solarthermalworld.org/files/Ecoheatcool%20WP1%20Web.pdf?download
  property true value relation 0.1842; name E_th_prod_MSWI_true_value_relation
    property to calculate "true value" from
  property true value 2.42624e-5
    allocation property applied in "true value" allocation // value calculated from true value relation
- electricity, for reuse in municipal waste incineration only: 0 kWh; CPC 17100: Electrical energy
  (same comment as for heat, for reuse in municipal waste incineration only)
  production volume 144.455 kWh
  property true value relation 3.6; name E_el_prod_MSWI_true_value_relation
    property to calculate "true value" from
  property price 0.1 EUR2005; name E_el_prod_MSWI_price_EUR2005
    Estimated to be the same price as in case of electricity, medium voltage.
  property exergy 3.6 MJ; name E_el_prod_MSWI_exergy
    This exergy property is based on the exergy content of the product.
  property true value 6.6799e-5
    (same comment as for heat, for reuse in municipal waste incineration only)

## Inputs from technosphere
- calcium nitrate: 1.89725e-5 kg; name Ca_NO3_2; = ( Ca_NO3_2_amount_1* Ca_NO3_2_concentration); lognormal variance with pedigree 0.008, pedigree (1,1,4,1,1)
  For wastewater treatment. Reported as 65% solution.
  Uncertainty: Calculated variable. Uncertainty will be determined from propagation of uncertainty factors of underlying variables. Uncertainty of actual relation between variables not accounted at this time, although this could be included in a future update.
  property concentration of solution 0.65; name Ca_NO3_2_concentration
  property amount of flow 1 in kg 0.0292 kg; name Ca_NO3_2_amount_1
  properties: wet mass 1 kg, dry mass 1 kg
- wood chips, dry, measured as dry mass: 0 kg
  properties: carbon content, non-fossil 0.494, water content 0.4, wet mass 1.4 kg, dry mass 1 kg
  note on carbon content, non-fossil: C content of dry mass is 0.494 kgC/kg dry wood (ecoinvent v2.2 report 9).
- waste mineral oil: -0.000119952 kg; name wasteLubricantsOilAmount; lognormal variance with pedigree 0.0106, pedigree (1,4,4,1,1)
  Reported as residue, lubricants and oil.
  production volume 33360 kg; = linerboardProductionVolume*wasteLubricantsOilAmount/linerboardAmount
    Calculated from production volume of linerboard.
  property price 0 EUR2005; name wasteLubricantsOilAmount_price_EUR2005
  property wet mass 1 kg; name wasteLubricantsOilAmount_WM
  property carbon content, fossil 0.864444; name wasteLubricantsOilAmo_C_content_fossil_0
  property water content 0.111111; name wasteLubricantsOilAmount_water_content
  property water in wet mass 0.1 kg; name wasteLubricantsOilAmount_WWM
  property dry mass 0.9 kg; name wasteLubricantsOilAmount_DM
- ammonium chloride: 2.31672e-5 kg; name CH4Cl; = ( CH4Cl_amount_1* CH4Cl_concentration); lognormal variance with pedigree 0.008, pedigree (1,1,4,1,1)
  3.33% and 4% solutions
  Uncertainty: Calculated variable. Uncertainty will be determined from propagation of uncertainty factors of underlying variables. Uncertainty of actual relation between variables not accounted at this time, although this could be included in a future update.
  property concentration of solution 0.033849; name CH4Cl_concentration; = (0.0333*0.6286+0.04*0.0561)/(0.6286+0.0561)
  property amount of flow 1 in kg 0.6847 kg; name CH4Cl_amount_1; = 0.6286+0.0561
  properties: wet mass 1 kg, dry mass 1 kg
  note on concentration of solution: Weighted average concentration of ammonium chloride (0.6286 kg at 3.33% and 0.0561 at 4%).
- sludge from pulp and paper production: -0.0145277 kg; name sludgeAmount; = (( sludgeAmount_amount_1 + sludgeAmount_amount_2 + sludgeAmount_amount_3 + sludgeAmount_amount_4) )*-1; lognormal variance with pedigree 0.008, pedigree (1,1,4,1,1)
  Reported as sludge sent to landfill (1.2 g/kg NSP), landfarming (6.8 g/kg NSP), cogeneration (5,8 g/kg NSP) and composting (0.7 g/kg NSP).
  production volume 4.04029e6 kg; = linerboardProductionVolume*sludgeAmount/linerboardAmount
    Calculated from production volume of reference product using the relative outputs.
  property water in wet mass 0.71 kg; name sludgeAmount_WWM
  property water content 2.44828; name sludgeAmount_water_content; = sludgeAmount_WWM / sludgeAmount_DM
  property amount of flow 3 in kg 6.75251 kg; name sludgeAmount_amount_3
  property dry mass 0.29 kg; name sludgeAmount_DM
  property wet mass 1 kg; name sludgeAmount_WM
  property amount of flow 4 in kg 5.84729 kg; name sludgeAmount_amount_4
  property amount of flow 1 in kg 1.18813 kg; name sludgeAmount_amount_1
  property price 0 EUR2005; name sludgeAmount_price_EUR2005
  property amount of flow 2 in kg 0.745493 kg; name sludgeAmount_amount_2
  property carbon content, non-fossil 0.21; name sludgeAmount_C_content_non_fossil
- methanol: 6.84429e-6 kg; name CH4O; = ( CH4O_amount_1* CH4O_concentration); lognormal variance with pedigree 0.008, pedigree (1,1,4,1,1)
  1% solution
  Uncertainty: Calculated variable. Uncertainty will be determined from propagation of uncertainty factors of underlying variables. Uncertainty of actual relation between variables not accounted at this time, although this could be included in a future update.
  property concentration of solution 0.01; name CH4O_concentration
  property amount of flow 1 in kg 0.6847 kg; name CH4O_amount_1; = 0.6286+0.0561
  properties: dry mass 1 kg, wet mass 1 kg, carbon content, fossil 0.375
- sodium hydroxide, without water, in 50% solution state: 8.34669e-6 kg; name NaOH; = (NaOH_amount_1* NaOH_concentration); lognormal variance with pedigree 0.008, pedigree (1,1,4,1,1)
  For wastewater treatment.
  property amount of flow 1 in kg 0.0167 kg; name NaOH_amount_1
  property concentration of solution 0.5; name NaOH_concentration
  properties: dry mass 1 kg, wet mass 1 kg
- heat, district or industrial, natural gas: 4.12752 MJ; name heatNatGas; = ( heatNatGas_amountMJ1 + heatNatGas_MJFuel_input / heatNatGas_fuel_use ); lognormal variance with pedigree 0.0106, pedigree (1,4,4,1,1)
  Energy input from separate natural gas cogeneration power plant (3.79 GJ /ton NSP). Also included 0.357 GJ /ton NSP of natural gas burned on-site. This last quantity was divided by the fuel use (1.0526) from the underlying ecoinvent process.
  property heat of fuel used 357 MJ; name heatNatGas_MJFuel_input
  property amount of exchange in MJ 1 3790 MJ; name heatNatGas_amountMJ1
  property Corresponding fuel use 1.0526 MJ; name heatNatGas_fuel_use
  note on Corresponding fuel use: Lower heating value of the fuel input related to the heat/electricity output
- alkylketene dimer sizing agent, for paper production: 0.000748968 kg; name sizingAgent; = ( sizingAgent_amount_1* sizingAgent_concentration); lognormal variance with pedigree 0.008, pedigree (1,1,4,1,1)
  15% solution.
  property amount of flow 1 in kg 4.9951 kg; name sizingAgent_amount_1
  property concentration of solution 0.15; name sizingAgent_concentration
  properties: carbon content, non-fossil 0.538229, wet mass 1 kg, dry mass 1 kg
- core board: 0.00123671 kg; lognormal variance with pedigree 0.0106, pedigree (1,4,4,1,1)
  Cores.
  properties: dry mass 0.945 kg, water content 0.0582011, wet mass 1 kg, carbon content, non-fossil 0.430314
- triazine-compound, unspecified: 0.000129049 kg; name biocide; = biocide_amount1 * biocide_concentration1; lognormal variance with pedigree 0.008, pedigree (1,1,4,1,1)
  Reported as "biocide". Assumed equal split between dithiocarbamate and triazine-compound.
  property concentration of amount 1 0.5; name biocide_concentration1
  property amount of exchange 1 0.2582 kg; name biocide_amount1
  properties: wet mass 1 kg, carbon content, fossil 0.475616, dry mass 1 kg
- formaldehyde: 2.31672e-5 kg; name CH2O; = ( CH2O_amount_1* CH2O_concentration); lognormal variance with pedigree 0.008, pedigree (1,1,4,1,1)
  (same comment as for ammonium chloride)
  property amount of flow 1 in kg 0.6847 kg; name CH2O_amount_1; = 0.6286+0.0561
  property concentration of solution 0.033849; name CH2O_concentration; = (0.0333*0.6286+0.04*0.0561)/(0.6286+0.0561)
  properties: dry mass 1 kg, carbon content, fossil 0.4, wet mass 1 kg
  note on concentration of solution: Weighted average of three different concentrations used in different stages of the process
- ethoxylated alcohol (AE3): 0.00047851 kg; name AE3; = ( AE3_amount1 + AE3_amount2 ); lognormal variance with pedigree 0.0106, pedigree (1,4,4,1,1)
  Proxy for defoamer.
  property amount of exchange 2 0.0073 kg; name AE3_amount2
  property amount of exchange 1 0.4714 kg; name AE3_amount1
  properties: carbon content, fossil 0.207952, wet mass 1 kg, dry mass 1 kg, carbon content, non-fossil 0.485221
- nylon 6: 2.39905e-5 kg; name cloth; = cloth_amount1 * clothNylon_concentration1 + cloth_amount2 * clothNylon_concentration2; lognormal variance with pedigree 0.008, pedigree (1,1,4,1,1)
  Felt and cloth component.
  property amount of exchange 2 0.025 kg; name cloth_amount2
  property amount of exchange 1 0.023 kg; name cloth_amount1
  property concentration of amount 2 0.5; name clothNylon_concentration2
  property concentration of amount 1 0.5; name clothNylon_concentration1
  properties: dry mass 1 kg, carbon content, fossil 0.637168, wet mass 1 kg
  note on carbon content, fossil: It is a chain of caprolactam molecules, originating from aminocarboxylic acids - here caproic acid or caprolactam. The structure of nylon 6 is -(NH-(CH2)5-CO)n-, C6H11NO (ecoinvent v2.2 report 11_II). MW=113 g/mol
- chemical, organic: 0.00175039 kg; name chemicalOrganic; = ( chemicalOrganic_amount_1* chemicalOrganic_concentration); lognormal variance with pedigree 0.008, pedigree (1,1,4,1,1)
  Proxy for polyvinylamin.
  Uncertainty: Calculated variable. Uncertainty will be determined from propagation of uncertainty factors of underlying variables. Uncertainty of actual relation between variables not accounted at this time, although this could be included in a future update.
  property concentration of solution 0.125; name chemicalOrganic_concentration
  property amount of flow 1 in kg 14.0087 kg; name chemicalOrganic_amount_1
  properties: carbon content, fossil 0.628, wet mass 1 kg, dry mass 1 kg
- tap water: 0.0699723 kg; source FEFCO 2009; lognormal variance with pedigree 0.0112, pedigree (1,3,4,5,1)
  Data from the global dataset. Reported as network water drinkable.
  property water in wet mass 0.999663 kg; name tapwater_WWM
  property dry mass 0.000337476 kg; name tapwater_DM
  properties: carbon content, fossil 0.00178991, water content 2962.17, wet mass 1 kg
- electricity, medium voltage: 0.457219 kWh; lognormal variance with pedigree 0.0106, pedigree (1,4,4,1,1)
- lubricating oil: 0.000229909 kg; source FEFCO 2009; lognormal variance with pedigree 0.0112, pedigree (1,3,4,5,1)
  Data from the global dataset. Reported as lubricants.
  properties: wet mass 1 kg, carbon content, fossil 0.75, dry mass 1 kg
- dithiocarbamate-compound: 0.000129049 kg; = biocide_amount1 * ( 1 - biocide_concentration1 ); lognormal variance with pedigree 0.008, pedigree (1,1,4,1,1)
  Reported as "biocide". Assumed equal split between dithiocarbamate and triazine-compound.
  properties: dry mass 1 kg, carbon content, fossil 0.179339, wet mass 1 kg
- EUR-flat pallet: 4.5482e-7 unit; source FEFCO 2009; lognormal variance with pedigree 0.0132, pedigree (3,3,4,5,1)
  Data from the global dataset. Assumption that the weight of a pallet is 22 kg. 0,01 kg is used in the dataset.
  properties: dry mass 18.3333 kg, carbon content, non-fossil 0.58833, wet mass 22 kg, carbon content, fossil 0.0311351, water content 0.2
- retention aid, for paper production: 0.00129249 kg; name retentionAid; = ( retentionAid_amount1 + retentionAid_amount2 + retentionAid_amount3 + retentionAid_amount4 + retentionAid_amount5); lognormal variance with pedigree 0.0106, pedigree (1,4,4,1,1)
  Proxy for retention agents.
  property amount of exchange 1 0.449 kg; name retentionAid_amount1
  property amount of exchange 3 0.1796 kg; name retentionAid_amount3
  property amount of exchange 4 0.0134 kg; name retentionAid_amount4
  property amount of exchange 2 0.2357 kg; name retentionAid_amount2
  property amount of exchange 5 0.4153 kg; name retentionAid_amount5
  properties: dry mass 1 kg, wet mass 1 kg, carbon content, fossil 0.5
- waste paperboard, sorted: 1.16254 kg; name recoveredPaperAmount; lognormal variance with pedigree 0.0106, pedigree (1,4,4,1,1)
- water, deionised: 0.0238009 kg; = ((chemicalOrganic_amount_1*(1- chemicalOrganic_concentration))+( FeSO4_amount_1*(1- FeSO4_concentration))+( starch_amount_1*(1- starch_concentration))+( sizingAgent_amount_1*(1- sizingAgent_concentration))+((1- CH4Cl_concentration)* CH4Cl_amount_1)+((1- Ca_NO3_2_concentration)* Ca_NO3_2_amount_1)*((1- CH2O_concentration )* CH2O_amount_1)+((1-CH4O_concentration)* CH4O_amount_1)+ ((1-H3PO4_concentration)* H3PO4_amount_1)+((1- NaOH_concentration ) *NaOH_amount_1)+((1-NaClO_concentration)* NaClO_amount_1)+((1- urea_concentration)* urea_amount_1)); lognormal variance with pedigree 0.008, pedigree (1,1,4,1,1)
  Water for chemical products whose ingredients are not in solution state (potato starch, chemical, organic, sizing agent and iron sulfate).
  Uncertainty: Calculated variable. Uncertainty will be determined from propagation of uncertainty factors of underlying variables. Uncertainty of actual relation between variables not accounted at this time, although this could be included in a future update.
  properties: wet mass 1 kg
- textile, woven cotton: 2.39905e-5 kg; = cloth_amount1 * ( 1 - clothNylon_concentration1) + cloth_amount2 * ( 1 - clothNylon_concentration2); lognormal variance with pedigree 0.008, pedigree (1,1,4,1,1)
  Felt and cloth component.
  properties: carbon content, non-fossil 0.46, wet mass 1 kg, dry mass 1 kg
  note on carbon content, non-fossil: Cotton fibers are considered to have a 46% C-content in dry mass ("Evolutionary and Biochemical Aspects", A.D. Kay and T. Vrede (in Global Ecology, 2010, Elsevier B.V., S.E. Jørgensen Ed.)
- potato starch: 0.000174759 kg; name starch; = ( starch_amount_1* starch_concentration); lognormal variance with pedigree 0.0106, pedigree (1,4,4,1,1)
  3.5% solution.
  property amount of flow 1 in kg 4.9951 kg; name starch_amount_1
  property concentration of solution 0.035; name starch_concentration
  properties: water content 0.25, wet mass 1 kg, dry mass 0.8 kg, carbon content, non-fossil 0.46
- propane, burned in building machine: 0.0129949 MJ; lognormal variance with pedigree 0.0106, pedigree (1,4,4,1,1)
- urea, as N: 0.000209836 kg; name urea; = (( urea_amount_1* urea_concentration) * 28 /(12 + 16 + 2 * (14 + 2))); lognormal variance with pedigree 0.008, pedigree (1,1,4,1,1)
  CO(NH2)2. For wastewater treatment. 28%, 3.33% and 4% solutions.
  Uncertainty: Calculated variable. Uncertainty will be determined from propagation of uncertainty factors of underlying variables. Uncertainty of actual relation between variables not accounted at this time, although this could be included in a future update.
  property concentration of solution 0.292475; name urea_concentration; = (0.8533 * 0.5 + 0.6286 * 0.0333 + 0.0561 * 0.04)/(0.8533 + 0.6286 + 0.0561)
  property amount of flow 1 in kg 1.538 kg; name urea_amount_1; = (0.8533 + 0.6286 + 0.0561)
  properties: carbon content, fossil 0.2, wet mass 1 kg, dry mass 1 kg
- paper mill, integrated: 5.43785e-11 unit; lognormal variance with pedigree 0.1712, pedigree (4,3,5,5,5)
  Assumption. Value from the global dataset.
- sodium hypochlorite, without water, in 15% solution state: 1.48341e-6 kg; name NaClO; = ( NaClO_amount_1* NaClO_concentration); lognormal variance with pedigree 0.008, pedigree (1,1,4,1,1)
  For wastewater treatment. Reported as 14% solution.
  Uncertainty: Calculated variable. Uncertainty will be determined from propagation of uncertainty factors of underlying variables. Uncertainty of actual relation between variables not accounted at this time, although this could be included in a future update.
  property amount of flow 1 in kg 0.0106 kg; name NaClO_amount_1
  property concentration of solution 0.14; name NaClO_concentration
  properties: wet mass 1 kg, dry mass 1 kg
- municipal solid waste: -0.0743405 kg; name MSWAmount; lognormal variance with pedigree 0.0106, pedigree (1,4,4,1,1)
  Rejects from waste paper input. The average dry mass of the rejects is about 45%.
  production volume 2.06749e7 kg; = linerboardProductionVolume*MSWAmount/linerboardAmount
    Calculated from production volume of reference product using the relative outputs.
  property water in wet mass 0.55 kg; name MSW_WWM
  property water content 1.22222; name MSW_water_content; = MSW_WWM / MSW_DM
  property dry mass 0.45 kg; name MSW_DM
  property price 0 EUR2005; name MSWAmount_price_EUR2005
  properties: carbon content, non-fossil 0.261655, wet mass 1 kg, carbon content, fossil 0.171549
  note on carbon content, non-fossil: MSW composition in tab 4.1, ecoinvent v2.2 report 13_I. C content referred to 1 kg DM
- iron sulfate: 8.97344e-6 kg; name FeSO4; = ( FeSO4_amount_1* FeSO4_concentration); lognormal variance with pedigree 0.008, pedigree (1,1,4,1,1)
  For wastewater treatment. Reported as 47% solution.
  Uncertainty: Calculated variable. Uncertainty will be determined from propagation of uncertainty factors of underlying variables. Uncertainty of actual relation between variables not accounted at this time, although this could be included in a future update.
  property amount of flow 1 in kg 0.0191 kg; name FeSO4_amount_1
  property concentration of solution 0.47; name FeSO4_concentration
  properties: wet mass 1 kg, dry mass 1 kg
- phosphoric acid, fertiliser grade, without water, in 70% solution state: 9.86809e-5 kg; name H3PO4; = ( H3PO4_amount_1* H3PO4_concentration); lognormal variance with pedigree 0.008, pedigree (1,1,4,1,1)
  ( H3PO4_amount_1* H3PO4_concentration)
  Uncertainty: Calculated variable. Uncertainty will be determined from propagation of uncertainty factors of underlying variables. Uncertainty of actual relation between variables not accounted at this time, although this could be included in a future update.
  property amount of flow 1 in kg 0.1234 kg; name H3PO4_amount_1
  property concentration of solution 0.8; name H3PO4_concentration
  properties: dry mass 1 kg, wet mass 1 kg
- fatty alcohol: 0.000291684 kg; lognormal variance with pedigree 0.0106, pedigree (1,4,4,1,1)
  Proxy for release agent.
  properties: dry mass 1 kg, wet mass 1 kg, carbon content, non-fossil 0.743434, carbon content, fossil 0.0408973

## Inputs from nature
- Water, river [natural resource, in water]: 0.00408438 m3; lognormal variance with pedigree 0.0112, pedigree (2,4,4,1,1)
  Balance betwee inputs of water from waste paper and river, and water output from evaporation, effluent, byproducts and linerboard.

## Emissions to nature
- Nickel, ion [water, unspecified]: 2.91884e-5 kg; lognormal variance with pedigree 0.66, pedigree (1,4,4,1,1)
  Effluent characterisation.
- Water [air, unspecified]: 0.0015104 m3; lognormal variance with pedigree 0.0112, pedigree (2,4,4,1,1)
  Value calculated considering a water content on wet mass basis of 42% and 93,5% for linerboard.
- Beryllium [water, unspecified]: 2.59897e-6 kg; lognormal variance with pedigree 0.05, pedigree (1,4,4,1,1)
  Effluent characterisation.
- AOX, Adsorbable Organic Halogen as Cl [water, unspecified]: 6.19754e-7 kg; source FEFCO 2009; lognormal variance with pedigree 0.0586, pedigree (2,5,4,5,1)
  Data from the global dataset. Qualified as "not representative" in original report.
- Arsenic, ion [water, unspecified]: 1.93923e-5 kg; lognormal variance with pedigree 0.66, pedigree (1,4,4,1,1)
  Effluent characterisation.
- Nitrogen [water, unspecified]: 4.09838e-5 kg; source FEFCO 2009; lognormal variance with pedigree 0.0506, pedigree (1,3,4,5,1)
  Data from the global dataset. Reported as total nitrogen.
- Antimony [water, unspecified]: 2.79889e-6 kg; lognormal variance with pedigree 0.05, pedigree (1,4,4,1,1)
  Effluent characterisation.
- Chlorides, unspecified [water, unspecified]: 0.000759699 kg; source FEFCO 2009; lognormal variance with pedigree 0.0586, pedigree (2,5,4,5,1)
  Data from the global dataset. Qualified as "not representative" in original report.
- Selenium [water, unspecified]: 7.74693e-5 kg; lognormal variance with pedigree 0.05, pedigree (1,4,4,1,1)
  Effluent characterisation.
- Silver, ion [water, unspecified]: 4.99802e-7 kg; lognormal variance with pedigree 0.66, pedigree (1,4,4,1,1)
  Effluent characterization.
- Ammonium, ion [water, unspecified]: 2.03879e-6 kg; lognormal variance with pedigree 0.12, pedigree (1,1,5,1,4)
  Caculated value with mean ammonium content in effluent of Quebec pulp mills.
- Chromium, ion [water, unspecified]: 2.57898e-5 kg; lognormal variance with pedigree 0.66, pedigree (1,4,4,1,1)
  Effluent characterisation.
- Phosphorus [water, unspecified]: 3.61297e-6 kg; source FEFCO 2009; lognormal variance with pedigree 0.12, pedigree (1,1,5,1,4)
  Caculated value with mean total phosphorus content in effluent of Quebec pulp mills.
- Cadmium, ion [water, unspecified]: 4.09838e-6 kg; lognormal variance with pedigree 0.66, pedigree (1,4,4,1,1)
  Effluent characterisation.
- Suspended solids, unspecified [water, unspecified]: 0.000111956 kg; lognormal variance with pedigree 0.05, pedigree (1,4,4,1,1)
  Effluent characterisation.
- Barium [water, unspecified]: 0.000165135 kg; lognormal variance with pedigree 0.05, pedigree (1,4,4,1,1)
  Effluent characterisation.
- DOC, Dissolved Organic Carbon [water, unspecified]: 0.000149607 kg; = TOC; lognormal variance with pedigree 0.008, pedigree (1,1,4,1,1)
  No data available for DOC. DOC=TOC as proposed by ecoinvent Data Quality Guidelines.
- Mercury [water, unspecified]: 1.29949e-6 kg; lognormal variance with pedigree 0.66, pedigree (1,4,4,1,1)
  Effluent characterisation.
- BOD5, Biological Oxygen Demand [water, unspecified]: 0.000111956 kg; lognormal variance with pedigree 0.05, pedigree (1,4,4,1,1)
  Effluent characterisation.
- Polychlorinated biphenyls [water, unspecified]: 2.99881e-7 kg; lognormal variance with pedigree 0.05, pedigree (1,4,4,1,1)
  Effluent characterisation.
- Hydrocarbons, unspecified [water, unspecified]: 6.44745e-5 kg; lognormal variance with pedigree 0.31, pedigree (1,4,4,1,1)
  Effluent characterisation.
- COD, Chemical Oxygen Demand [water, unspecified]: 0.00040394 kg; name COD; lognormal variance with pedigree 0.05, pedigree (1,4,4,1,1)
  Effluent characterisation.
- Aluminium [water, unspecified]: 0.000116154 kg; lognormal variance with pedigree 0.05, pedigree (1,4,4,1,1)
  Effluent characterisation.
- Water [water, surface water]: 0.00257268 m3; lognormal variance with pedigree 0.0106, pedigree (1,4,4,1,1)
  Effluent to river. Measured.
- Lead [water, unspecified]: 2.06918e-6 kg; lognormal variance with pedigree 0.66, pedigree (1,4,4,1,1)
  Effluent characterisation.
- Copper, ion [water, unspecified]: 4.64816e-6 kg; lognormal variance with pedigree 0.66, pedigree (1,4,4,1,1)
  Effluent characterisation.
- TOC, Total Organic Carbon [water, unspecified]: 0.000149607 kg; name TOC; = COD/2.7; lognormal variance with pedigree 0.008, pedigree (1,1,4,1,1)
  No data available for TOC. TOC=COD/2.7 as proposed by ecoinvent Data Quality Guidelines.
- Manganese [water, unspecified]: 0.00149041 kg; lognormal variance with pedigree 0.66, pedigree (1,4,4,1,1)
  Effluent characterisation.
- Zinc, ion [water, unspecified]: 0.000266594 kg; lognormal variance with pedigree 0.66, pedigree (1,4,4,1,1)
  Effluent characterisation.

## Sampling procedure
Most data are primary data from a factory located in the province of Québec. Note on representativeness percent, value based on Québec production capacity.
