# softwood forestry, mixed species, sustainable forest management

Dataset: EcoSpold 2, unit process
Geography: CH
Time period: 2010-01-01 to 2019-12-31
Technology level: current
Classification: EcoSpold01Categories: wooden materials/extraction
Classification: ISIC rev.4 ecoinvent: 0220:Logging
Tags: combined production
Scenario: Business-as-Usual
System model: Allocation at the point of substitution
Generated by: Frank Werner
Database: ecoinvent
isCopyrightProtected: true
accessRestrictedTo: 1

## General comment
The dataset represents sustainable forest management practices and covers the weighted average of several harvesting systems employed in Switzerland related to the harvesting of an average m3 of solid softwood under bark. Three main assortments are distinguished as reference products of Swiss wood production: sawlogs, industrial wood (pulp wood) and wood fuel, which can be processed to chips (at forest road or in the stand), to bundles of energy wood, or cleft timber.
The harvested volumes and the relative share of assortments represent the average of the years 2008 to 2010 according to Swiss Forestry Statistics (Bafu 2011: Wald und Holz 2012). Wood chips (for which no distinction is made between soft- and hardwood in the statistics) are attributed to the assortment "energy wood" in proportion to the assortment "energy wood" as reported in the Swiss forestry statistics:
The technology mix for the harvesting operations for 1 m3 of solid wood has was determined starting from the types of haulings as reported in the Swiss National Forest Inventory (LFI 3) for each of the production regions in Switzerland. The following table documents the hauling methods applied and their relative share to the total harvested volume. To each of the relevant hauling methods, a generic harvesting method was developed and assigned proportionally to 1 m3 of harvested wood at the forest road:
The definition of 6 generic standard harvesting methods is a simplification that is owed to practicability. It is acknoledged that in practice, large deviations from these standard methods can occur; the grouping, however, seems acceptable and meaningful in view of comparable fuel consumptions and grey energy of the machinery.
The parameters of the following harvesting methods have been derived of several sources such as productivity tables, the productivity model HeProMo, KWF documentation, other literature and expert judgments from practical experiences. The parameter values are valid for medium sized machinery and average conditions for a specific harvesting method.
The final values for the use of each machine for the harvesting of 1 m3 of solid wood is calculated via the PMH/m3 for each harvesting method and then weighted via the share of the harvesting method to the total harvested volume (see above).
This dataset refers to 1 m3 of softwood under bark with an average dry wood density of 440 kg o.d/m3.
Densities of specific softwood species, however, can differ considerably, e.g. (Sell 1997): European spruce (Picea abies): 400 - 430 kg o.d/m3, Silver fir (Abies alba): 400 - 450 kg o.d./m3, Swiss pine (Pinus cembra): 350 - 450 kg o.d./m3, European larch (Larix decidua): 500 - 580 kg o.d./m3, Scots pine (Pinus silvatica): 460 - 510 kg o.d./m3, Maritime pine (Pinus pinaster): 450 kg - 550/m3.
CO2 uptake is based on 49.4% carbon in the wood and includes 10% of bark.
Swiss forestry is by law a multifunctional forestry and resulting restrictions on the extractive use of wood. The land use aspects are related to the productive function of forestry are therefore determined based on the income structure of the forestry units in Switzerland, distinguishing the production function and other forest functions, i.e. the protective function and biodiversity.
This dataset includes the service of stand establishment as well as cleaning and tending as site development activities, attributable to 1 m3 softwood under bark, harvested from Swiss forests. The stand establishment process covers the natural regneration of trees as the prevailing practice in Switzerland as well as several forestry interventions of clearing and tending for weed control and adequate conditions for tree growth.
The data is mainly based on literature values.
BAFU (2007): CO2-Effekte der Schweizer Wald- und Holzwirtschaft. Umwelt-Wissen Nr. 0739, Bundesamt für Umwelt (BAFU), Bern.

## Included activities start
The activity starts with site preparation assuming natural regeneration and includes all process related to forest management, including clearing, tending pruning, thinnings and harvesting operations including the processing of wood fuel to chips, bundles and chopped wood (logs for energy) over one rotation period. It covers also the maintenance of forest roads.

## Included activities end
This activity ends with the assortments at the forest road and includes eventual drying before transportation.

## Technology
This dataset considers sustainable forest management practices and covers the weighted average of several harvesting systems employed in Switzerland.

## Parameters
- share of cleft timber of total wood fuel: 0.61 dimensionless; name share_cleft_timber; lognormal variance with pedigree 0.2506, pedigree (2,1,1,1,1)
  Share of cleft timber as wood fuel of total wood fuel harvested (referring consistently to volume under bark or volume over bark for all types of wood fuel); share_bundles + share_cleft_timber+share_chips = 100% wood fuel
- gravel for maintenance of forest roads: 40.5291 kg/m3; name m_gravel; = thickness_new_gravel*a_forest_road_gravel*d_gravel*rotation_period/interval_road_maintenance/yield_wood_ub
  adding up all gravel input over one rotation period per m3 of total yield of wood
- forwarding with helikopter per m3: 0.00129 PMH/m3; name forwarding_helicopter; lognormal variance with pedigree 0.2506, pedigree (2,1,1,1,1)
  IMPORTANT NOTE: When considering several harvesting systems, e.g. in datasets on national forestry, this parameter is NOT the productivity of the harvesting system but the productivity of the system weighted with the share of the amount harvested by the respective system. This has to be calculated outside EcoEditor.
- area forest road per m3 wood: 0.124714 m2/m3; name a_transformation_road; = a_forest_road/yield_wood_ub
  area of forest road per ha divided by total harvest over one rotation period per hectare
- area forest per m3 wood: 7.00518 m2/m3; name a_transformation_forest; = (10000-a_forest_road)*share_revenues_wood/yield_wood_ub
  area of forest per ha divided by total harvest over one rotation period per hectare
- productivity mobile chipper: 120 m3/PMH; name productivity_mobile_chipper; lognormal variance with pedigree 0.2506, pedigree (2,1,1,1,1)
  as m3 bulked/ productive machine hour
- sum of reference products in volume: 1 m3; name sum_RP_m3; lognormal variance with pedigree 0.005, pedigree (1,1,1,1,1)
  volume under bark
- share, revenues wood production: 0.619 dimensionless; name share_revenues_wood; lognormal variance with pedigree 0.2506, pedigree (2,1,1,1,1)
  Used to determine the share of land used for the productive function of forestry covered in this dataset
- forwarding with forwarder per m3: 0.0107 PMH/m3; name forwarding_forwarder; lognormal variance with pedigree 0.2506, pedigree (2,1,1,1,1)
  IMPORTANT NOTE: When considering several harvesting systems, e.g. in datasets on national forestry, this parameter is NOT the inverse productivity of the harvesting system but the inverse productivity of the system weighted with the share of the amount harvested by the respective system. This has to be calculated outside EcoEditor.
- ratio bulk density / solid density of cleft timber: 1.4 dimensionless; name ratio_bulk_solid_cleft_timber; lognormal variance with pedigree 0.2506, pedigree (2,1,1,1,1)
  as m3 bulked / m3 solid
- moisture content sawlogs and veneer logs: 0.6 dimensionless; name moisture_sawlogs; lognormal variance with pedigree 0.2506, pedigree (2,1,1,1,1)
  amount of water/kg dry mass
- area forest road: 109 m2/ha; name a_forest_road; lognormal variance with pedigree 0.2506, pedigree (2,1,1,1,1)
  area of covered by forest roads of one hectare of forest. Source: Kaufmann, E. WSL, personal written communication; based on 3rd national forest inventory
- delimbing/sorging with excavator based processor per m3: 0.00921 PMH/m3; name delimbing_excavator; lognormal variance with pedigree 0.2506, pedigree (2,1,1,1,1)
  (same comment as for forwarding with forwarder per m3)
- Bark ratio: 0.12 dimensionless; name bark; lognormal variance with pedigree 0.025, pedigree (1,1,1,1,1)
  share of bark of total volume of trunk (solid wood + bark); U. Luginbühl, personal written communication, HIS
- cable yarding & processing with mobile cable yarder per m3: 0.00336 PMH/m3; name cable_yarding_mobile_yarder; lognormal variance with pedigree 0.2506, pedigree (2,1,1,1,1)
  (same comment as for forwarding with forwarder per m3)
- shrinkage ratio: 0.004 dimensionless; name shrinkage_ratio; lognormal variance with pedigree 0.2506, pedigree (2,1,1,1,1)
  for wood: % of volume lost per % of humidity lowered; usually applicable for humidity u < 30%
- cable yarding with sled yarder per m3: 0.00151 PMH/m3; name cable_yarding_sled_yarder; lognormal variance with pedigree 0.2506, pedigree (2,1,1,1,1)
  (same comment as for forwarding with forwarder per m3)
- wood density, dry: 440 kg/m3; name dry_wood_d; lognormal variance with pedigree 0.2506, pedigree (2,1,1,1,1)
  kg oven-dry matter/dry volume
- moisture content cleft timber: 0.35 dimensionless; name moisture_cleft_timber; lognormal variance with pedigree 0.2506, pedigree (2,1,1,1,1)
  amount of water/kg dry mass
- power sawing without catalytic converter per m3: 0.56 PMH/m3; name power_sawing; lognormal variance with pedigree 0.2506, pedigree (2,1,1,1,1)
  (same comment as for forwarding with forwarder per m3)
- area forest road in gravel: 85.15 m2/ha; name a_forest_road_gravel; lognormal variance with pedigree 0.2506, pedigree (2,1,1,1,1)
  area of covered by forest roads in gravel of one hectare of forest. Source: Kaufmann, E. WSL, personal written communication; based on 3rd national forest inventory
- periodicity of maintenance of forest roads: 10 year; name interval_road_maintenance; lognormal variance with pedigree 0.2506, pedigree (2,1,1,1,1)
  time period between two maintenance activities of forest roads. Source: Werner, F., T. Künniger, H.-J. Althaus and K. Richter (2007): Life cycle inventories of wood as fuel and construction material, Duebendorf, November 2002. Centre for life cycle inventories in the ETH domain, Duebendorf.
- yield wood over rotation period: 874 m3; name yield_wood_ub; lognormal variance with pedigree 0.252, pedigree (3,1,1,1,1)
  yield of wood under bark per ha over one rotation period
- harvesting with forestry harvester: 0.00804 year; name harvesting; lognormal variance with pedigree 0.2506, pedigree (2,1,1,1,1)
  (same comment as for forwarding with forwarder per m3)
- share of sawlogs and veneer logs of total wood harvest: 0.78 dimensionless; name share_sawlogs; lognormal variance with pedigree 0.2506, pedigree (2,1,1,1,1)
  Share of sawlogs and veneer logs of total wood harvest (referring to volume below bark); share_sawlogs + share_pulpwood + share_wood_fuel = 100%
- cable yarding with mobile cable yarder on trailer per m3: 0.00818 PMH/m3; name cable_yarding_trailer; lognormal variance with pedigree 0.2506, pedigree (2,1,1,1,1)
  (same comment as for forwarding with forwarder per m3)
- share of wood fuel of total wood harvest: 0.13 dimensionless; name share_wood_fuel; lognormal variance with pedigree 0.2506, pedigree (2,1,1,1,1)
  Share of wood fuel of total wood harvest (referring to volume below bark); share_sawlogs + share_pulpwood + share_wood_fuel = 100%
- diesel consumption per kg of gravel used for maintenance of forest roads: 0.043 MJ/kg; name diesel_per_gravel; lognormal variance with pedigree 0.2506, pedigree (2,1,1,1,1)
  Werner, F., T. Künniger, H.-J. Althaus and K. Richter (2007): Life cycle inventories of wood as fuel and construction material, Duebendorf, November 2002. Centre for life cycle inventories in the ETH domain, Duebendorf.
- share of chips of total wood fuel: 0.39 dimensionless; name share_chips; lognormal variance with pedigree 0.2506, pedigree (2,1,1,1,1)
  Share of chips of total wood fuel harvested (referring consistently to volume under bark or volume over bark for all types of wood fuel)share_bundles + share_chopped_wood+share_chips = 100% wood fuel
- rotation period: 130 year; name rotation_period; lognormal variance with pedigree 0.252, pedigree (3,1,1,1,1)
  number of years from planting to final harvest. Source: Kaufmann, E. WSL, personal written communication
- share of pulpwood of total wood harvest: 0.09 dimensionless; name share_pulpwood; lognormal variance with pedigree 0.2506, pedigree (2,1,1,1,1)
  Share of pulpwood of total wood harvest (referring to volume below bark); share_sawlogs + share_pulpwood + share_wood_fuel = 100%
- thickness of new gravel layer: 0.02 m; name thickness_new_gravel; lognormal variance with pedigree 0.252, pedigree (3,1,1,1,1)
  thickness of the new gravel layer that is added for the maintenance of forest roads: Source: Werner, F., T. Künniger, H.-J. Althaus and K. Richter (2007): Life cycle inventories of wood as fuel and construction material, Duebendorf, November 2002. Centre for life cycle inventories in the ETH domain, Duebendorf.
- skidding with skidder per m3: 0.0762 PMH/m3; name skidding; lognormal variance with pedigree 0.2506, pedigree (2,1,1,1,1)
  (same comment as for forwarding with helikopter per m3)
- moisture content wood chips: 0.7 dimensionless; name moisture_wood_chips; lognormal variance with pedigree 0.2506, pedigree (2,1,1,1,1)
  amount of water/kg dry mass
- moisture content pulpwood: 0.6 dimensionless; name moisture_pulpwood; lognormal variance with pedigree 0.2506, pedigree (2,1,1,1,1)
  amount of water/kg dry mass
- bulk density gravel: 1600 kg/m3; name d_gravel; lognormal variance with pedigree 0.2506, pedigree (2,1,1,1,1)
  (same comment as for diesel consumption per kg of gravel used for maintenance of forest roa)
- ratio bulk density / solid density of chips: 2.8 dimensionless; name ratio_bulk_solid_chips; lognormal variance with pedigree 0.2506, pedigree (2,1,1,1,1)
  as m3 bulked / m3 solid
- productivity, clefting device: 5.26 m3/PMH; name productivity_clefting_device; lognormal variance with pedigree 0.2506, pedigree (2,1,1,1,1)
  as m3 bulked/ productive machine hour
- wood density, basic: 387.2 kg/m3; name basic_wood_d; = dry_wood_d*(1-30*shrinkage_ratio); lognormal variance with pedigree 0.252, pedigree (3,1,1,1,1)
  kg oven-dry matter/wet volume

## Reference product
- cleft timber, measured as dry mass: 0 kg; name cleft_timber; source Kaufmann E. 2012; By-product classification allocatable product; CPC 031: Wood in the rough
  average composition of 1 m3 solid wood under bark, harvested in Switzerland according to forest statistics Bafu (2011): Wald und Holz 2011, Bern. The wood of wood chips (indicated as a sum of chips from soft- and hardwood) are asigned to energy wood from softwood and hardwood in relation to the respective shares of energy wood (i.e. cleft/split wood).
  production volume 0 kg
    calculated from forest statistics Bafu (2011): Wald und Holz 2011, Bern. The wood of wood chips (indicated as a sum of chips from soft- and hardwood) are assigned to energy wood from softwood and hardwood in relation to the respective shares of energy wood (i.e. chopped/split wood).
  property water content 0.35; name cleft_timber_water_content; = moisture_cleft_timber
  property carbon content, non-fossil 0.494; name cleft_timber_C_content_non_fossil
    biogene carbon content on a dry matter basis
  property carbon content, fossil 0; name cleft_timber_C_content_fossil
    fossil carbon content on a dry matter basis
  property water in wet mass 0.35 kg; name cleft_timber_WWM; = cleft_timber_WM-cleft_timber_DM
  property price 0.073 EUR2005; name cleft_timber_price_EUR2005
    Calculated value based on data from United Nations Commodity Trade Statistics Database (comtrade.un.org). UN comtrade category: 250810 Bentonite. Year 2005. Using exchange rate of 1EURO = 1.209 USD. Average of price of import into 5 main markets (EU, US, JP, IN and CN).
  property wet mass 1.35 kg; name cleft_timber_WM; = 1+moisture_cleft_timber
  property dry wood density 440 kg/m3; name cleft_timber_dry_wood_d; = dry_wood_d
    kg dry matter/ dry volume
  property apparent wood density 522.72 kg/m3; name cleft_timber_apparent_wood_d; = cleft_timber_basic_wood_d*(1+moisture_cleft_timber)
    wet mass/wet volume
  property basic wood density 387.2; name cleft_timber_basic_wood_d; = dry_wood_d*(1-30*shrinkage_ratio)
    dry mass/wet volume
  property dry mass 1 kg; name cleft_timber_DM
  property heating value, gross 20.4 MJ; name cleft_timber_Gross_Heat_Value
    gross (upper) heating (calorific) value
  property heating value, net 13.8948 MJ; name cleft_timber_Net_Heat_Value; = cleft_timber_Gross_Heat_Value-1.32-(20*moisture_cleft_timber/(1+moisture_cleft_timber))
    net (lower) heating (calorific) value
  property carbon content 0.494
    carbon content on a dry matter basis (reserved; not for manual entry)
  properties: carbon allocation 0.494 kg
- wood chips, wet, measured as dry mass: 0 kg; name wood_chips; source Kaufmann E. 2012; By-product classification allocatable product; CPC 31230: Wood in chips or particles
  (same comment as for cleft timber, measured as dry mass)
  production volume 0 kg
    (same comment as for cleft timber, measured as dry mass)
  property water in wet mass 0.7 kg; = wood_chips_WM-wood_chips_DM
  property heating value, gross 20.4 MJ; name wood_chips_Gross_Heat_Value
    gross (upper) heating (calorific) value
  property dry wood density 440 kg/m3; name wood_chips_dry_wood_d; = dry_wood_d
    kg dry matter/ dry volume
  property price 0.107 EUR2005; name wood_chips_price_EUR2005
    Expert judgement (Urs Luginbühl, Swiss Sawmilling industry, personal communication in June 2014). Wood chips from softwood should have a price of 0.101 EUR/kg. Woodchips from hardwood should have a price of 0.112 EUR/kg. Average of these two values is used. Cross-reference; FAOSTAT database; http://faostat.fao.org/site/626/DesktopDefault.aspx?PageID=626#ancor; Average import/export prices of EU for 'chips and particles'. Price: 48.76 Euro/m3. The density of the wood chips is 650 kg/m3. The price is recalculated accordingly.
  property water content 0.7; = moisture_wood_chips
  property basic wood density 387.2; name wood_chips_basic_wood_d; = dry_wood_d*(1-30*shrinkage_ratio)
    dry mass/wet volume
  property carbon content, non-fossil 0.494; name chips_C_content_non_fossil
  property apparent wood density 658.24 kg/m3; name wood_chips_apparent_wood_d; = wood_chips_basic_wood_d*(1+moisture_wood_chips)
    wet mass/wet volume
  property heating value, net 10.8447 MJ; name wood_chips_Net_Heat_Value; = wood_chips_Gross_Heat_Value-1.32-(20*moisture_wood_chips/(1+moisture_wood_chips))
    net (lower) heating (calorific) value
  property wet mass 1.7 kg; name wood_chips_WM; = wood_chips_DM*(1+moisture_wood_chips)
  property dry mass 1 kg; name wood_chips_DM
  property carbon content 0.494
    carbon content on a dry matter basis (reserved; not for manual entry)
  properties: carbon content, fossil 0, carbon allocation 0.494 kg
- pulpwood, softwood, measured as solid wood under bark: 0 m3; name pulpwood; source Kaufmann E. 2012; CPC 031: Wood in the rough; By-product classification allocatable product
  (same comment as for cleft timber, measured as dry mass)
  production volume 0 m3
    (same comment as for cleft timber, measured as dry mass)
  property dry wood density 440 kg/m3; name pulpwood_dry_wood_d; = dry_wood_d
    kg dry matter/ dry volume
  property price 168 EUR2005; name pulpwood_price_EUR2005
    Convert from EU 27 price to the world by currency exchange rate.
  property basic wood density 387.2; name pulpwood_basic_wood_d; = dry_wood_d*(1-30*shrinkage_ratio)
    dry mass/wet volume
  property heating value, net 11.58 MJ; name pulpwood_Net_Heat_Value; = pulpwood_Gross_Heat_Value-1.32-(20*moisture_pulpwood/(1+moisture_pulpwood))
    net (lower) heating (calorific) value; referring to 1 m3 solid wood as the reference flow, excluding bark
  property dry mass 387.2 kg; name pulpwood_DM; = pulpwood_basic_wood_d
  property wet mass 619.52 kg; name pulpwood_WM; = pulpwood_apparent_wood_d
  property water in wet mass 232.32 kg; = pulpwood_WM-pulpwood_DM
  property heating value, gross 20.4 MJ; name pulpwood_Gross_Heat_Value
    gross (upper) heating (calorific) value; referring to 1 m3 solid wood as the reference flow, excluding bark
  property carbon content, non-fossil 0.494; name pulpwood_C_content_non_fossil
  property water content 0.6; = moisture_pulpwood
  property apparent wood density 619.52 kg/m3; name pulpwood_apparent_wood_d; = pulpwood_basic_wood_d*(1+moisture_pulpwood)
    wet mass/wet volume
  property carbon content 0.494
    carbon content on a dry matter basis (reserved; not for manual entry)
  properties: carbon content, fossil 0, price CHF 51 CHF2011, carbon allocation 191.277 kg
- sawlog and veneer log, softwood, measured as solid wood under bark: 1 m3; name saw_veneer_logs; = share_sawlogs; source Kaufmann E. 2012; CPC 031: Wood in the rough; By-product classification allocatable product
  (same comment as for cleft timber, measured as dry mass)
  production volume 2.713e6 m3
    (same comment as for cleft timber, measured as dry mass)
  property heating value, net 11.58 MJ; name saw_veneer_logs_Net_Heat_Value; = saw_veneer_logs_Gross_Heat_Value-1.32-(20*moisture_sawlogs/(1+moisture_sawlogs))
    net (lower) heating (calorific) value
  property wet mass 619.52 kg; name saw_veneer_logs_WM; = saw_veneer_logs_apparent_wood_d
  property water content 0.6; = moisture_sawlogs
  property apparent wood density 619.52 kg/m3; name saw_veneer_logs_apparent_wood_d; = saw_veneer_logs_basic_wood_d*(1+moisture_sawlogs)
    wet mass/wet volume
  property carbon content, non-fossil 0.494; name saw_veneer_logs_C_content_non_fossil
  property dry wood density 440 kg/m3; name saw_veneer_logs_dry_wood_d; = dry_wood_d
    kg dry matter/ dry volume
  property heating value, gross 20.4 MJ; name saw_veneer_logs_Gross_Heat_Value
    gross (upper) heating (calorific) value
  property dry mass 387.2 kg; name saw_veneer_logs_DM; = saw_veneer_logs_basic_wood_d
  property basic wood density 387.2; name saw_veneer_logs_basic_wood_d; = dry_wood_d*(1-30*shrinkage_ratio)
    dry mass/wet volume
  property price 80 EUR2005; name saw_veneer_logs_price_EUR2005
    Expert judgement (Urs Luginbühl, Swiss Sawmilling industry, personal communication in June 2014). Cross-reference; FAOSTAT database; http://faostat.fao.org/site/626/DesktopDefault.aspx?PageID=626#ancor; Average import/export prices of EU for 'chips and particles'. Price: 48.76 Euro/m3. The density of the wood chips is 650 kg/m3. The price is calculated to be 0.075 EUR/kg.
  property water in wet mass 232.32 kg; = saw_veneer_logs_WM-saw_veneer_logs_DM
  property carbon content 0.494
    carbon content on a dry matter basis (reserved; not for manual entry)
  properties: price CHF 99 CHF2011, carbon content, fossil 0, carbon allocation 191.277 kg

## Inputs from technosphere
- clefting of energy wood: 0 hour; name clefting; = cleft_timber/cleft_timber_basic_wood_d* ratio_bulk_solid_cleft_timber/productivity_clefting_device; pedigree (1,1,1,1,1)
  no comment
- cable yarding: 0.00151 hour; = saw_veneer_logs*cable_yarding_sled_yarder/sum_RP_m3+pulpwood*cable_yarding_sled_yarder/sum_RP_m3+wood_chips*(1-bark)/basic_wood_d*cable_yarding_sled_yarder/sum_RP_m3+cleft_timber*(1-bark)/ cleft_timber_basic_wood_d*cable_yarding_sled_yarder/sum_RP_m3; source Kaufmann E. 2012; lognormal variance with pedigree 0.2526, pedigree (2,1,3,1,1)
  average input per m3; see general comment for details
- transport, helicopter: 0.00129 hour; = saw_veneer_logs*forwarding_helicopter/sum_RP_m3+pulpwood*forwarding_helicopter/sum_RP_m3+wood_chips*(1-bark)/basic_wood_d*forwarding_helicopter/sum_RP_m3+cleft_timber*(1-bark)/ cleft_timber_basic_wood_d*forwarding_helicopter/sum_RP_m3; source Kaufmann E. 2012; lognormal variance with pedigree 0.2526, pedigree (2,1,3,1,1)
  average input per m3; see general comment for details
- wood chipping, chipper, mobile, diesel, at forest road: 0 hour; name chipping_mobile; = wood_chips/basic_wood_d*ratio_bulk_solid_chips/productivity_mobile_chipper; pedigree (1,1,1,1,1)
  no comment
- cable yarding: 0.00818 hour; = saw_veneer_logs*cable_yarding_trailer/sum_RP_m3+pulpwood*cable_yarding_trailer/sum_RP_m3+wood_chips*(1-bark)/basic_wood_d*cable_yarding_trailer/sum_RP_m3+cleft_timber*(1-bark)/ cleft_timber_basic_wood_d*cable_yarding_trailer/sum_RP_m3; source Kaufmann E. 2012; lognormal variance with pedigree 0.2526, pedigree (2,1,3,1,1)
  average input per m3; see general comment for details
- skidding, skidder: 0.0762 hour; = saw_veneer_logs*skidding/sum_RP_m3+pulpwood*skidding/sum_RP_m3+wood_chips*(1-bark)/basic_wood_d*skidding/sum_RP_m3+cleft_timber*(1-bark)/ cleft_timber_basic_wood_d*skidding/sum_RP_m3; source Kaufmann E. 2012; lognormal variance with pedigree 0.2526, pedigree (2,1,3,1,1)
  average input per m3; see general comment for details
- harvesting, forestry harvester: 0.00804 hour; = saw_veneer_logs*harvesting/sum_RP_m3+pulpwood*harvesting/sum_RP_m3+wood_chips*(1-bark)/basic_wood_d*harvesting/sum_RP_m3+ cleft_timber*(1-bark)/ cleft_timber_basic_wood_d*harvesting/sum_RP_m3; source Kaufmann E. 2012; lognormal variance with pedigree 0.2526, pedigree (2,1,3,1,1)
  average input per m3; see general comment for details
- diesel, burned in building machine: 1.74275 MJ; = saw_veneer_logs*(diesel_per_gravel*m_gravel)/sum_RP_m3+pulpwood*(diesel_per_gravel*m_gravel)/sum_RP_m3+wood_chips*(1-bark)/basic_wood_d*(diesel_per_gravel*m_gravel)/sum_RP_m3+cleft_timber*(1-bark)/cleft_timber_basic_wood_d*(diesel_per_gravel*m_gravel)/sum_RP_m3; source Werner F. 2007; lognormal variance with pedigree 0.2526, pedigree (2,1,3,1,1)
  for distribution of gravel for maintenance of forest road over rotation period
- cable yarding: 0.00336 hour; = saw_veneer_logs*cable_yarding_mobile_yarder/sum_RP_m3+pulpwood*cable_yarding_mobile_yarder/sum_RP_m3+wood_chips*(1-bark)/basic_wood_d*cable_yarding_mobile_yarder/sum_RP_m3+cleft_timber*(1-bark)/ cleft_timber_basic_wood_d*cable_yarding_mobile_yarder/sum_RP_m3; source Kaufmann E. 2012; lognormal variance with pedigree 0.2526, pedigree (2,1,3,1,1)
  average input per m3; see general comment for details
- power sawing, without catalytic converter: 0.626362 hour; = saw_veneer_logs*power_sawing/sum_RP_m3+pulpwood*power_sawing/sum_RP_m3+wood_chips*(1-bark)/basic_wood_d*power_sawing/sum_RP_m3+ cleft_timber*(1-bark)/cleft_timber_basic_wood_d*power_sawing/sum_RP_m3+saw_veneer_logs*(2*14+2*15)/yield_wood_ub/sum_RP_m3+pulpwood*(2*14+2*15)/yield_wood_ub/sum_RP_m3+wood_chips*(1-bark)/basic_wood_d*(2*14+2*15)/yield_wood_ub/sum_RP_m3+ cleft_timber*(1-bark)/cleft_timber_basic_wood_d*(2*14+2*15)/yield_wood_ub/sum_RP_m3; source Kaufmann E. 2012; lognormal variance with pedigree 0.2526, pedigree (2,1,3,1,1)
  average input per m3 covering hand-held gasoline-driven equipment used for site preparation, tending and pruning (attributing per ha values to total amount of wood harvested) as well as the amount of power sawing per harvested m3; see general comment for details
- forwarding, forwarder: 0.0107 hour; = saw_veneer_logs*forwarding_forwarder/sum_RP_m3+pulpwood*forwarding_forwarder/sum_RP_m3+wood_chips*(1-bark)/basic_wood_d*forwarding_forwarder/sum_RP_m3+cleft_timber*(1-bark)/ cleft_timber_basic_wood_d*forwarding_forwarder/sum_RP_m3; source Kaufmann E. 2012; lognormal variance with pedigree 0.2526, pedigree (2,1,3,1,1)
  average input per m3; see general comment for details
- gravel, crushed: 40.5291 kg; = saw_veneer_logs*m_gravel/sum_RP_m3+pulpwood*m_gravel/sum_RP_m3+wood_chips*(1-bark)/basic_wood_d*m_gravel/sum_RP_m3+cleft_timber*(1-bark)/ cleft_timber_basic_wood_d*m_gravel/sum_RP_m3; source Werner F. 2007; lognormal variance with pedigree 0.2526, pedigree (2,1,3,1,1)
  gravel for maintenance of forest road over rotation period
  properties: wet mass 1 kg, dry mass 1 kg
- delimbing/sorting, excavator-based processor: 0.00921 hour; = saw_veneer_logs*delimbing_excavator/sum_RP_m3+pulpwood*delimbing_excavator/sum_RP_m3+wood_chips*(1-bark)/basic_wood_d*delimbing_excavator/sum_RP_m3+cleft_timber*(1-bark)/ cleft_timber_basic_wood_d*delimbing_excavator/sum_RP_m3; source Kaufmann E. 2012; lognormal variance with pedigree 0.2526, pedigree (2,1,3,1,1)
  average input per m3; see general comment for details

## Inputs from nature
- Occupation, traffic area, rail/road embankment [natural resource, land]: 16.2128 m2*year; = saw_veneer_logs*a_transformation_road*rotation_period/sum_RP_m3+pulpwood*a_transformation_road*rotation_period/sum_RP_m3+wood_chips*(1-bark)/basic_wood_d*a_transformation_road*rotation_period/sum_RP_m3+cleft_timber*(1-bark)/ cleft_timber_basic_wood_d*a_transformation_road*rotation_period/sum_RP_m3; source Kaufmann E. 2012; lognormal variance with pedigree 0.202, pedigree (1,1,3,1,1)
  Area occupied by forest roeads over one roation period
- Occupation, forest, extensive [natural resource, land]: 910.674 m2*year; = saw_veneer_logs*(a_transformation_forest*rotation_period)/sum_RP_m3+pulpwood*(a_transformation_forest*rotation_period)/sum_RP_m3+wood_chips*(1-bark)/basic_wood_d*(a_transformation_forest*rotation_period)/sum_RP_m3+cleft_timber*(1-bark)/ cleft_timber_basic_wood_d*(a_transformation_forest*rotation_period)/sum_RP_m3; source Kaufmann E. 2012; lognormal variance with pedigree 0.202, pedigree (1,1,3,1,1)
  Area occupied for the production of wood over one rotation period
- Transformation, from forest, extensive [natural resource, land]: 7.00518 m2; = saw_veneer_logs*((10000-a_forest_road)/yield_wood_ub*share_revenues_wood)/sum_RP_m3+pulpwood*((10000-a_forest_road)/yield_wood_ub*share_revenues_wood)/sum_RP_m3+wood_chips*(1-bark)/basic_wood_d*((10000-a_forest_road)/yield_wood_ub*share_revenues_wood)/sum_RP_m3+cleft_timber*(1-bark)/ cleft_timber_basic_wood_d*((10000-a_forest_road)/yield_wood_ub*share_revenues_wood)/sum_RP_m3; source Kaufmann E. 2012; lognormal variance with pedigree 0.352, pedigree (1,1,3,1,1)
  Area of forest, excluding forest roads per ha
- Transformation, to traffic area, rail/road embankment [natural resource, land]: 0.124714 m2; = saw_veneer_logs*a_forest_road/yield_wood_ub/sum_RP_m3+pulpwood*a_forest_road/yield_wood_ub/sum_RP_m3+wood_chips*(1-bark)/basic_wood_d*a_forest_road/yield_wood_ub/sum_RP_m3+cleft_timber*(1-bark)/ cleft_timber_basic_wood_d*a_forest_road/yield_wood_ub/sum_RP_m3; source Kaufmann E. 2012; lognormal variance with pedigree 0.352, pedigree (1,1,3,1,1)
  no comment
- Transformation, from traffic area, rail/road embankment [natural resource, land]: 0.124714 m2; = saw_veneer_logs*a_forest_road/yield_wood_ub/sum_RP_m3+pulpwood*a_forest_road/yield_wood_ub/sum_RP_m3+wood_chips*(1-bark)/basic_wood_d*a_forest_road/yield_wood_ub/sum_RP_m3+cleft_timber*(1-bark)/ cleft_timber_basic_wood_d*a_forest_road/yield_wood_ub/sum_RP_m3; source Kaufmann E. 2012; lognormal variance with pedigree 0.352, pedigree (1,1,3,1,1)
  Area of forest roads per ha
- Carbon dioxide, in air [natural resource, in air]: 796.987 kg; = saw_veneer_logs/(1-bark)*basic_wood_d* saw_veneer_logs_C_content_non_fossil/12*44/sum_RP_m3+pulpwood/(1-bark)*basic_wood_d* pulpwood_C_content_non_fossil/12*44/sum_RP_m3+wood_chips* chips_C_content_non_fossil/12*44/sum_RP_m3+cleft_timber* cleft_timber_C_content_non_fossil/12*44/sum_RP_m3; lognormal variance with pedigree 0.027, pedigree (1,1,3,1,1)
  Resource input, referring to total biomass harvested, i.e. wood including bark
- Wood, soft, standing [natural resource, biotic]: 1 m3; name v_wood_standing; = saw_veneer_logs/sum_RP_m3+pulpwood/sum_RP_m3+wood_chips*(1-bark)/basic_wood_d/sum_RP_m3+cleft_timber*(1-bark)/ cleft_timber_basic_wood_d/sum_RP_m3; lognormal variance with pedigree 0.027, pedigree (1,1,3,1,1)
  Resource input, referring to wood under bark
- Energy, gross calorific value, in biomass [natural resource, biotic]: 8976 MJ; = saw_veneer_logs/(1-bark)*saw_veneer_logs_basic_wood_d*saw_veneer_logs_Gross_Heat_Value/sum_RP_m3+pulpwood/(1-bark)*pulpwood_basic_wood_d*pulpwood_Gross_Heat_Value/sum_RP_m3+wood_chips*wood_chips_Gross_Heat_Value/sum_RP_m3+cleft_timber*cleft_timber_Gross_Heat_Value/sum_RP_m3; lognormal variance with pedigree 0.0045, pedigree (1,1,3,1,1)
  Energy content of wood
- Transformation, to forest, extensive [natural resource, land]: 7.00518 m2; = saw_veneer_logs*((10000-a_forest_road)/yield_wood_ub*share_revenues_wood)/sum_RP_m3+pulpwood*((10000-a_forest_road)/yield_wood_ub*share_revenues_wood)/sum_RP_m3+wood_chips*(1-bark)/basic_wood_d*((10000-a_forest_road)/yield_wood_ub*share_revenues_wood)/sum_RP_m3+cleft_timber*(1-bark)/ cleft_timber_basic_wood_d*((10000-a_forest_road)/yield_wood_ub*share_revenues_wood)/sum_RP_m3; source Kaufmann E. 2012; lognormal variance with pedigree 0.352, pedigree (1,1,3,1,1)
  no comment

## Sampling procedure
Literature

## Extrapolations
see Geography and Technology
