# yarn production, cotton, open end spinning

Dataset: EcoSpold 2, unit process
Geography: IN
Time period: 2015-04-01 to 2019-03-31
Technology level: current
Classification: EcoSpold01Categories: textiles/processing
Classification: ISIC rev.4 ecoinvent: 1311:Preparation and spinning of textile fibres
Scenario: Business-as-Usual
System model: Allocation at the point of substitution
Generated by: Madhuri Nigam
Published in: Faist Emmenegger, M. 2018
Database: ecoinvent
isCopyrightProtected: true
accessRestrictedTo: 1

## General comment
This dataset represents the process of spinning of 1 kg of cotton yarn by Open end spinning from the raw cotton. Yarn production activity includes Opening, Mixing, Carding, Drawing, combing, roving, spinning and winding.
Open end spinning is technology for creating yarn without spindle. In this process the fibrous material is highly drafted to seperate out individual fibres which are subsequently collected into open end of the yarn. This is rotated to twist the fibre into yarn structure to form a continous strand of yarn.
The following processes are used to convert cotton fibre to cotton yarn. The bales are opened and fibres are cleaned of trash and dust and mixed in the blowroom. the fibres then undergo carding and drawing to orient the fibres to prepare for spinning. In the next step the spinning takes place on Open end spinning machines.The yarn is wound on cones and conditioned before packaging.

## Included activities start
The activity starts from opening of bales

## Included activities end
The activity ends with spinning and winding after which yarn is conditioned for packaging.

## Geography
Annual average based on inputs from Indian manufacturer. Uttarkhand (North India).

## Reference product
- yarn, cotton: 1 kg; By-product classification allocatable product; CPC 26360: Cotton yarn (other than sewing thread), containing 85% or more by weight of cotton
  production volume 9.744e8 kg; name PV; = 2436000000*(40/100)
    Considering 40% production by open end spinning process Source: http://texmin.nic.in/sites/default/files/prod_variety_yarn.pdf
  property price 2.265 EUR2005
    Estimated value. Various souces report a value around 3 USD per kg of cotton yarn (YarnsandFibers.com, 2018. Pakistan textile exports hit by rise in prices, retrieved from: http://www.yarnsandfibers.com/news/news-tags/cotton-yarn-prices, accessed 1Feb2018; Alibaba.com, 2018. Retrieved from: https://www.alibaba.com/showroom/100%2525-cotton-yarn-price.html, accessed 1Feb2018). The price was checked also against the values reported from the Indian Ministry of Textile, Price Data for textile, Prices (Month End) for 2018 (retrieved from: http://texmin.nic.in/sites/default/files/monthend_jan2018_1.pdf, accessed 6March 2018).
  property carbon content 0.46
    carbon content on a dry matter basis (reserved; not for manual entry)
  property true value 2.265
    allocation property applied in "true value" allocation // value calculated from revenue
  properties: wet mass 1 kg, dry mass 0.94 kg, water in wet mass 0.06 kg, water content 0.0638298, carbon content, non-fossil 0.46, carbon content, fossil 0, carbon allocation 0.4324 kg

## By-products
- heat, for reuse in municipal waste incineration only: 0 MJ; CPC 17300: Steam and hot water; By-product classification allocatable product; pedigree (1,1,1,1,1)
  Net electricity generated from this waste and used in internal MSWI plant energy redistribution.
  Uncertainty: uncertainty is calculated from uncertainties in waste composition and uncertainties in energy efficiency and the uncertainty in internal energy demand
  production volume 722968 MJ
  property exergy 0.1842 MJ; name E_th_prod_MSWI_exergy
    This exergy property is based on the exergy content of the product.
  property price 0.0106 EUR2005; name E_th_prod_MSWI_price_EUR2005
    Average European district heat price from Ecoheatcool and Euroheat 2005-2006, Ecoheat Work package 1: The European heat market. Final report. 10.6 EUR/GJ i s the price of district heat. http://www.solarthermalworld.org/files/Ecoheatcool%20WP1%20Web.pdf?download
  property true value relation 0.1842; name E_th_prod_MSWI_true_value_relation
    property to calculate "true value" from
  property true value 4.895e-6
    allocation property applied in "true value" allocation // value calculated from true value relation
- electricity, for reuse in municipal waste incineration only: 0 kWh; CPC 17100: Electrical energy; By-product classification allocatable product; pedigree (1,1,1,1,1)
  (same comment as for heat, for reuse in municipal waste incineration only)
  production volume 99996.5 kWh
  property price 0.1 EUR2005; name E_el_prod_MSWI_price_EUR2005
    Estimated to be the same price as in case of electricity, medium voltage.
  property exergy 3.6 MJ; name E_el_prod_MSWI_exergy
    This exergy property is based on the exergy content of the product.
  property true value relation 3.6; name E_el_prod_MSWI_true_value_relation
    property to calculate "true value" from
  property true value 1.32322e-5
    (same comment as for heat, for reuse in municipal waste incineration only)

## Inputs from technosphere
- waste yarn and waste textile: -0.0499996 kg; lognormal variance with pedigree 0.0134, pedigree (4,4,2,5,2)
  This represents the quantum of waste that is ultimately landfilled. Estimates on expert judgement based on company data
  production volume 4.872e7 kg; = Ref('84db0f38-4baa-4caf-9582-7ffac6849d12', 'ProductionVolume') * ((Ref('f045a3b5-4d6f-45f3-8ba3-9d9af659133c')*-1) / Ref('84db0f38-4baa-4caf-9582-7ffac6849d12'))
    Calculated from production volume of reference product using the relative outputs.
  properties: dry mass 0.97917 kg, wet mass 1 kg, carbon content, non-fossil 0.44455, water content 0.0212731
- fibre, cotton: 1.04999 kg; lognormal variance with pedigree 0.0028, pedigree (1,4,2,1,1)
  waste cotton fibre and fibre noil co-product are resued in the process, hence not included in the inventory
  properties: carbon content, non-fossil 0.46, water content 0.0638298, dry mass 0.94 kg, wet mass 1 kg
- waste mineral oil: -9.99992e-5 kg; name bp1; lognormal variance with pedigree 0.0048, pedigree (1,4,2,5,1)
  This is produced dues to the use of lubricating oil necessary for the operation of machinery.
  production volume 97440 kg; = PV*bp1
    Calculated based on the amount of yarn.
  property price 0 EUR2005; name bp1_price_EUR2005
  properties: carbon content, fossil 0.864444, dry mass 0.9 kg, water content 0.111111, wet mass 1 kg
  note on carbon content, fossil: Tab A.6, ecoinvent v2.2 report 13_I. C content has been calculated after data in the tables, and then referred to 1 kg DM
- lubricating oil: 9.99992e-5 kg; lognormal variance with pedigree 0.0028, pedigree (1,4,2,1,1)
  This is sum of greese and mobil oil used for lubircating machines
  properties: wet mass 1 kg, carbon content, fossil 0.75, dry mass 1 kg
  note on carbon content, fossil: Lubricating oil is produced from diesel. C-content/dry mass of fats and oils considered 75%, from: ecoinvent v2.2 report, n 15a, pg 40
- wastewater, average: -0.0135359 m3; = (Water*.8)*-1; lognormal variance with pedigree 0.0108, pedigree (4,4,2,1,1)
  considering 80% default wastewater generation
  production volume 1.31895e7 m3; = Ref('84db0f38-4baa-4caf-9582-7ffac6849d12', 'ProductionVolume') * ((Ref('4e1a57d3-34a1-4a84-847b-01fbbc698bfb')*-1) / Ref('84db0f38-4baa-4caf-9582-7ffac6849d12'))
    Calculated from production volume of reference product using the relative outputs.
  properties: wet mass 1000 kg, water content 2882.2, dry mass 0.346837 kg, carbon content, non-fossil 0.194039
  note on carbon content, non-fossil: 0.0673 kg TOC/m3 (Tab A.17, ecoinvent v2.2 report 13_I). TOC was considered as Total Carbon.
- diesel, burned in diesel-electric generating set, 10MW: 0.222948 MJ; = 0.0049*45.5; lognormal variance with pedigree 0.0108, pedigree (4,4,2,1,1)
  Diesel used for power backup. Forumula includes diesel consumption in kg multiplied with calorific value
- electricity, low voltage: 1.64999 kWh; lognormal variance with pedigree 0.0028, pedigree (1,4,2,1,1)
  sum of electricity used for:
  Blowroom, Carding; Breaker Drawing and Compressors; Illumination and air conditioning are not considered here.
- building, hall: 1.55663e-5 m2; = 8000/(10278500*50); lognormal variance with pedigree 0.3008, pedigree (2,1,2,1,1)
  total building area (square meters) divided by production per year and life time of the plant

## Inputs from nature
- Water, well, in ground [natural resource, in water]: 0.0169199 m3; name Water; lognormal variance with pedigree 0.0108, pedigree (4,4,2,1,1)
  water is used for humidification

## Emissions to nature
- Water [air, urban air close to ground]: 0.00338397 m3; = Water*.20; lognormal variance with pedigree 0.0108, pedigree (4,4,2,1,1)
  Considering default value of 20% evaporation rate

## Sampling procedure
Industry data. Spinning mill in Uttarakhand, North India was chosen to provide data based on its technical representation of the current state of business and its willingness to participate.Industry data has been supplemented with some details from literature.
