# flat glass production, coated

Dataset: EcoSpold 2, unit process
Geography: RER
Time period: 2000-01-01 to 2019-12-31
Technology level: current
Classification: ISIC rev.4 ecoinvent: 2310:Manufacture of glass and glass products
Classification: EcoSpold01Categories: glass/construction
Synonyms: Wärmeschutzschicht; Vergütungsschicht; plate; bedampfen; sputtering; Kathodenzerstäubung; sputtern
Tags: ConvertedDataset
Scenario: Business-as-Usual
System model: Allocation at the point of substitution
Generated by: Daniel Kellenberger (obsolete)
Published in: Kellenberger D. 2007
Database: ecoinvent
isCopyrightProtected: true
accessRestrictedTo: 1

## General comment
All data are based on the environmental report of the company "Interpane" (DE) for the year 2000. The Targets used for sputtering are bismuth, silver and nickel-chromium. Only nickel-chromium is modelled for missing silver and bismuth modules in the database.
[This dataset was already contained in the ecoinvent database version 2. It was not individually updated during the transfer to ecoinvent version 3. Life Cycle Impact Assessment results may still have changed, as they are affected by changes in the supply chain, i.e. in other datasets. This dataset was generated following the ecoinvent quality guidelines for version 2. It may have been subject to central changes described in the ecoinvent version 3 change report (http://www.ecoinvent.org/database/ecoinvent-version-3/reports-of-changes/), and the results of the central updates were reviewed extensively. The changes added e.g. consistent water flows and other information throughout the database. The documentation of this dataset can be found in the ecoinvent reports of version 2, which are still available via the ecoinvent website. The change report linked above covers all central changes that were made during the conversion process.]

## Included activities end
Includes all measured In- and Output materials and energy carriers reported for a German glass coating plant during ist operation (coating process, internal transports, packing and administration).

## Geography
Data from one company in Germany is extrapolated to RER. For some exchanges CH-modules are used as proxy

## Technology
Metal coating (mainly Bismuth, Silver and Nickel-Chrome) are applied on float glass by cathodic sputtering in vacuum. The installation is fed in batch quantities. At ambient pressure the vessel is charged and then vacuum is generated. The sputtering process works by passing an electrical current through ionised gas, thus bombarding the surface of a metal cathode with ions. The atoms of the desired metal are vaporised and then deposited in a thin film on the surface of glass

## Parameters
- fraction, process water, to air: 0.15 dimensionless; name fraction_PW_to_air; lognormal variance with pedigree 0.092025, pedigree (4,4,3,2,4)
  Literature value. In case when no industry/process specific data are available, default evaporation fraction value is used. This value is 15% and is based on literature (Statistics Canada, 2007 & Shaffer, K.H., 2008, Consumptive water use in the Great Lakes Basin, USGS & Shiklomanov, 2003, World Water Resources at the Beginning of the 21st Century) and has been approved by an expert.
- fraction, tap water, to air: 0.15; name fraction_TW_to_air; = fraction_PW_to_air; lognormal variance with pedigree 0.092025, pedigree (4,4,3,2,4)
  Calculated value. See comment in the other parametres present in this dataset. Tap water is considered to be always used as process water, thus process water fractions to air are applied to all tap water input flows to calculate the amount of water consumed in the processes.

## Reference product
- flat glass, coated: 1 kg; CPC 37114: Glass in sheets, bent, edge-worked, engraved, drilled, enamelled or otherwise worked, but not framed, etc.; By-product classification allocatable product
  EcoSpold01Location=RER
  production volume 1.32237 kg
    This is a placeholder value that does not reflect real-world production volumes. This dataset does not currently require a real-world production volume to work in the database framework, and no actual data were collected yet. This has no negative effect on the results of the ecoinvent database. The placeholder value of this activity was scaled according to the nominal GDP of 2005 (source: United Nations, http://data.un.org/Glossary.aspx?q=GDP+%28current+US%24%29, accessed 20130726) to reflect an appropriate share of the global production volume, which is also a placeholder value.
  property price 3.16 EUR2005
    Upscale from EU by exchange rate. Afterwards apply the PPP (Purchasing power parity) factor of 0.83.
  property carbon content, fossil 0
    Tab 5.1, ecoinvent v2.2 report 7, part XI, for Flat glass composition. Coating: 50% Ni, 50% Cr (ecoinvent v2.2 report 7, part XI, pg 18)
  property carbon content, non-fossil 0
    (same comment as for flat glass, coated)
  property carbon content 0
    carbon content on a dry matter basis (reserved; not for manual entry)
  property true value 3.16
    allocation property applied in "true value" allocation // value calculated from revenue
  properties: water in wet mass 0 kg, wet mass 1 kg, water content 0, dry mass 1 kg, carbon allocation 0 kg

## By-products
- electricity, for reuse in municipal waste incineration only: 0 kWh; CPC 17100: Electrical energy; By-product classification allocatable product; pedigree (1,1,1,1,1)
  Net electricity generated from this waste and used in internal MSWI plant energy redistribution.
  Uncertainty: uncertainty is calculated from uncertainties in waste composition and uncertainties in energy efficiency and the uncertainty in internal energy demand
  production volume 4.62071e-7 kWh
  property exergy 3.6 MJ; name E_el_prod_MSWI_exergy
    This exergy property is based on the exergy content of the product.
  property true value relation 3.6; name E_el_prod_MSWI_true_value_relation
    property to calculate "true value" from
  property price 0.1 EUR2005; name E_el_prod_MSWI_price_EUR2005
    Estimated to be the same price as in case of electricity, medium voltage.
  property true value 5.95346e-8
    allocation property applied in "true value" allocation // value calculated from true value relation
- heat, for reuse in municipal waste incineration only: 0 MJ; CPC 17300: Steam and hot water; By-product classification allocatable product; pedigree (1,1,1,1,1)
  Net useful heat generated from this waste and used in internal MSWI plant energy redistribution.
  Uncertainty: uncertainty is calculated from uncertainties in waste composition and uncertainties in energy efficiency and the uncertainty in internal energy demand
  production volume 3.32561e-6 MJ
  property true value relation 0.1842; name E_th_prod_MSWI_true_value_relation
    property to calculate "true value" from
  property exergy 0.1842 MJ; name E_th_prod_MSWI_exergy
    This exergy property is based on the exergy content of the product.
  property price 0.0106 EUR2005; name E_th_prod_MSWI_price_EUR2005
    Average European district heat price from Ecoheatcool and Euroheat 2005-2006, Ecoheat Work package 1: The European heat market. Final report. 10.6 EUR/GJ i s the price of district heat. http://www.solarthermalworld.org/files/Ecoheatcool%20WP1%20Web.pdf?download
  property true value 2.1924e-8
    (same comment as for electricity, for reuse in municipal waste incineration only)
- zinc concentrate: 0 kg; CPC 14290: Other non-ferrous metal ores and concentrates (other than uranium or thorium ores and concentrates); By-product classification allocatable product
  Calculated value from the knowledge of the properties of both products.
  production volume 2.62034e-12 kg
  property price 0.38 EUR2005; name ByP_price_EUR2005
    Temporary price data. Calculated as 90% of purchasers price based on: Zinc content in concentrate 53%. Concentrate price per kg Zn 86.5% of refined Zn price (13.5% treatment charges according to CHR Metals Limited 2005: Dynamic cost curves. http://www.minecost.com/dynamic.pdf). 2004 zinc price from USGS (2007) Mineral commodity summaries 2007. <http://minerals.usgs.gov/minerals/pubs/mcs/2007/mcs2007.pdf> [Accessed 25 May 2010]
  property zinc content 0.53; name zinc_C_zinc_concentrate
    Zinc content on a dry matter basis. Value taken from teh "zinc mine operation" /GLO dataset.
  property dry mass 1 kg; name DM_zinc_concentrate
  property carbon content 0
    carbon content on a dry matter basis (reserved; not for manual entry)
  property true value 9.9573e-13
    allocation property applied in "true value" allocation // value calculated from revenue
  properties: wet mass 1 kg, water content 0, carbon content, non-fossil 0, carbon content, fossil 0, water in wet mass 0 kg, carbon allocation 0 kg

## Inputs from technosphere
- waste graphical paper: -7.48e-5 kg; lognormal variance with pedigree 0.058, pedigree (1,5,5,1,1)
  EcoSpold01Location=CH
  production volume 7.48e-5 kg
    Calculated from the production volume of flat glass, coated in proportion to the respective output amounts.
  properties: water content 0.126126, carbon content, non-fossil 0.454955, dry mass 0.888 kg, wet mass 1 kg
- packaging film, low density polyethylene: 0.000202 kg; lognormal variance with pedigree 0.058, pedigree (1,5,5,1,1)
  EcoSpold01Location=RER
  properties: dry mass 1 kg, wet mass 1 kg, carbon content, fossil 0.857143
  note on carbon content, fossil: Polyethylene is formed out of a huge amount of ethylene monomers (C2H4) (ecoinvent v2.2 report 11_II). MW=28 g/mol
- waste glass: -0.0196 kg; lognormal variance with pedigree 0.058, pedigree (1,5,5,1,1)
  EcoSpold01Location=CH
  production volume 0.0196 kg
    (same comment as for waste graphical paper)
  properties: dry mass 1 kg, wet mass 1 kg
- argon, liquid: 0.000446 kg; lognormal variance with pedigree 0.058, pedigree (1,5,5,1,1)
  EcoSpold01Location=RER
  properties: dry mass 1 kg, wet mass 1 kg
- waste paperboard: -7.48e-5 kg; lognormal variance with pedigree 0.058, pedigree (1,5,5,1,1)
  EcoSpold01Location=CH
  production volume 7.48e-5 kg
    (same comment as for waste graphical paper)
  properties: carbon content, non-fossil 0.483259, dry mass 0.804 kg, water content 0.243781, wet mass 1 kg
  note on carbon content, non-fossil: C content was calculated for 1 kg DM, using data in Tab A.3, ecoinvent v2.2 report 13_I.
- chromium: 5.97e-5 kg; lognormal variance with pedigree 0.058, pedigree (1,5,5,1,1)
  EcoSpold01Location=RER
  properties: wet mass 1 kg, dry mass 1 kg
- waste wood, untreated: -0.000104 kg; lognormal variance with pedigree 0.058, pedigree (1,5,5,1,1)
  EcoSpold01Location=CH
  production volume 0.000104 kg
    (same comment as for waste graphical paper)
  properties: carbon content, non-fossil 0.48632, water content 0.25, dry mass 0.8 kg, wet mass 1 kg
  note on carbon content, non-fossil: Tab A.4, ecoinvent v2.2 report 13_I. C content has been referred to 1 kg DM,
- heat, district or industrial, natural gas: 5.3958e-5 MJ; lognormal variance with pedigree 0.058, pedigree (1,5,5,1,1)
  EcoSpold01Location=RER
- transport, passenger car: 0.0022 km; lognormal variance with pedigree 0.178, pedigree (1,5,5,1,1)
- waste mineral oil: 0 kg; pedigree (1,1,1,1,1)
  EcoSpold01Location=CH
  production volume 0 kg
    (same comment as for waste graphical paper)
  properties: wet mass 1 kg, dry mass 0.9 kg, water content 0.111111, carbon content, fossil 0.864444
  note on carbon content, fossil: Tab A.6, ecoinvent v2.2 report 13_I. C content has been calculated after data in the tables, and then referred to 1 kg DM
- diesel, burned in building machine: 0.0192 MJ; lognormal variance with pedigree 0.058, pedigree (1,5,5,1,1)
  EcoSpold01Location=GLO
- polymethyl methacrylate, beads: 3.2e-5 kg; lognormal variance with pedigree 0.058, pedigree (1,5,5,1,1)
  EcoSpold01Location=RER
  properties: carbon content, fossil 0.6, dry mass 1 kg, wet mass 1 kg
  note on carbon content, fossil: Monomer is methyl methacrylate (MMA; CH2-C(CH3)COOCH3) is also called a-methylacrylic acid or 2-methylpropenoic acid (ecoinvent v2.2 report 11_II). MW=100 g/mol
- oxygen, liquid: 0.00143 kg; lognormal variance with pedigree 0.058, pedigree (1,5,5,1,1)
  EcoSpold01Location=RER
  properties: dry mass 1 kg, wet mass 1 kg
- electricity, medium voltage: 0.0679 kWh; lognormal variance with pedigree 0.058, pedigree (1,5,5,1,1)
  EcoSpold01Location=UCTE
- wastewater from glass production: -5.11e-5 m3; name wastewater_output; lognormal variance with pedigree 0.058, pedigree (1,5,5,1,1)
  EcoSpold01Location=CH
  production volume 5.11e-5 m3
    (same comment as for waste graphical paper)
  property price 0 EUR2005; name wastewater_output_price_EUR2005
  properties: water content 913.443, wet mass 1000 kg, dry mass 1.09356 kg, carbon content, fossil 0.0455242
  note on carbon content, fossil: COD= 0.115 kg/m3 (Tab A.18, ecoinvent v2.2 report 13_I). COD was converted to TOC, using conversion factors in Tab 4.10 (ecoinvent v2.2 report 13_IV). TOC was considered as Total Carbon.
- acetylene: 0.000202 kg; lognormal variance with pedigree 0.058, pedigree (1,5,5,1,1)
  EcoSpold01Location=CH
  properties: dry mass 1 kg, wet mass 1 kg, carbon content, fossil 0.923077
  note on carbon content, fossil: C2H2. ecoinvent v2.2 report n 8. Produced from partial oxidation of natural gas
- nickel, 99.5%: 5.97e-5 kg; lognormal variance with pedigree 0.058, pedigree (1,5,5,1,1)
  EcoSpold01Location=GLO
  properties: wet mass 1 kg, dry mass 1 kg
- solvent, organic: 2.66e-6 kg; lognormal variance with pedigree 0.058, pedigree (1,5,5,1,1)
  EcoSpold01Location=GLO
  properties: carbon content, fossil 0.63072, dry mass 1 kg, wet mass 1 kg
  note on carbon content, fossil: Mixture of 15 of the most often used solvents (list in ecoinvent v2.2 report 11-III, pg 293). C content was calculated as an unweighted average of C content of the different solvents
- municipal solid waste: -0.000209 kg; lognormal variance with pedigree 0.058, pedigree (1,5,5,1,1)
  EcoSpold01Location=CH
  production volume 0.000209 kg
    (same comment as for waste graphical paper)
  properties: dry mass 0.771 kg, water content 0.297017, carbon content, fossil 0.171549, wet mass 1 kg, carbon content, non-fossil 0.261655
  note on carbon content, fossil: MSW composition in tab 4.1, ecoinvent v2.2 report 13_I. C content referred to 1 kg DM
- flat glass factory: 3.55e-10 unit; lognormal variance with pedigree 1.48, pedigree (5,5,5,5,5)
  EcoSpold01Location=RER
  Estimation of standard deviation
  Uncertainty: Estimation of standard deviation
- paper, woodfree, uncoated: 0.000181 kg; lognormal variance with pedigree 0.058, pedigree (1,5,5,1,1)
  EcoSpold01Location=RER
  properties: carbon content, fossil 0.0251406, water content 0.0582011, carbon content, non-fossil 0.281215, wet mass 1 kg, dry mass 0.945 kg
  note on carbon content, fossil: Fossil C content was calculated after fossil C contents of chemicals used in the production of the paper (in Tab 8.54 & 8.55 ecoinvent v2.2 report 11_III, part 8).
  note on carbon content, non-fossil: Biogenic C content was calculated after biogenic C contents of chemicals used in the production of the paper (in Tab 8.54 & 8.55 ecoinvent v2.2 report 11_III, part 8). The cellulose content in 1 kg of paper (on a wet mas basis) was estimated as (1-chemical content), C content of cellulose was considered 0.44 kgC/kg dry mass (ecoinvent v2.2 report, n 15a, pg 40)
- tap water: 0.0001 kg; name tap_water_input; lognormal variance with pedigree 0.058, pedigree (1,5,5,1,1)
  EcoSpold01Location=RER
  properties: carbon content, fossil 0.00178991, water content 2962.17, dry mass 0.000337476 kg, wet mass 1 kg
  note on carbon content, fossil: Bicarbonate content is 2.93 mol/m3. CO2 content is 0.1 mol/m3 (ecoinvent v2.2 report 8, Tab 93.1).
- liquefied petroleum gas: 0 kg; pedigree (1,1,1,1,1)
  EcoSpold01Location=RER
  properties: wet mass 1 kg, carbon content, fossil 0.821863, dry mass 1 kg
- lubricating oil: 0.000202 kg; lognormal variance with pedigree 0.058, pedigree (1,5,5,1,1)
  EcoSpold01Location=RER
  properties: dry mass 1 kg, wet mass 1 kg, carbon content, fossil 0.75
  note on carbon content, fossil: Lubricating oil is produced from diesel. C-content/dry mass of fats and oils considered 75%, from: ecoinvent v2.2 report, n 15a, pg 40
- flat glass, uncoated: 1.02 kg; lognormal variance with pedigree 0.058, pedigree (1,5,5,1,1)
  EcoSpold01Location=RER
  properties: dry mass 1 kg, wet mass 1 kg
- nitrogen, liquid: 2.87e-6 kg; lognormal variance with pedigree 0.058, pedigree (1,5,5,1,1)
  EcoSpold01Location=RER
  properties: wet mass 1 kg, dry mass 1 kg
- waste mineral oil: -2.22844e-5, -5.15637e-7 kg (2 entries); lognormal variance with pedigree 0.058, pedigree (1,5,5,1,1)
  EcoSpold01Location=CH
  production volume 2.28e-5 kg
- liquefied petroleum gas: 0.000200978, 1.02213e-6 kg (2 entries); lognormal variance with pedigree 0.058, pedigree (1,5,5,1,1)
  EcoSpold01Location=RER

## Inputs from nature
- Water, unspecified natural origin [natural resource, in water]: 5.1e-5 m3; name water_UNO_input; lognormal variance with pedigree 0.058, pedigree (1,5,5,1,1)
  Calculated value. The amount of water in this flow (input) to the process as provided by the data provider for eiv2 was approximatelly 0.0000111m3. This amount is adjusted, so the water balance is achieved.

## Sampling procedure
Environmental report 2000 of the company Interpane

## Extrapolations
See geography

## Review by Bo Weidema 2012-09-19
corrected input of production mix to specific product

## Review by Roberto Dones 2007-11-07
passed
