# melamine impregnated paper production

Dataset: EcoSpold 2, unit process
Geography: RoW
Time period: 2012-01-01 to 2019-12-31
Technology level: current
Classification: ISIC rev.4 ecoinvent: 1621:Manufacture of veneer sheets and wood-based panels
Scenario: Business-as-Usual
System model: Allocation at the point of substitution
Generated by: Frank Werner
Database: ecoinvent
isCopyrightProtected: true
accessRestrictedTo: 1

## General comment
Both particleboard and medium density fibreboard are frequently coated with melamine-impregnated paper. Such coated boards are particularly used for interior works such as for furniture or in kitchens. The datasets describes the production of melamine impregnated paper for the coating of such boards.
The data stems from several plants in Europe that start from different states of pre-produced resins.
The area weight of the inventoried melamine impregnated paper is 302 gr/m2, corresponding to a paper weight of 104 gr/m2

## Included activities start
From the reception of the raw materials at the factory gate

## Included activities end
The activity ends with the melamine coated paper at the factory. Eventual airborne emissions are not included due to the lack of specific data. As for the infrastructure it may be assumed that it is included in the dataset of the production of the wood based boards as the production of melamine faced paper is often produced at the same site.

## Parameters
- scaling factor: 4.32832 dimensionless; name scaling_factor

## Reference product
- paper, melamine impregnated: 1 kg; name r_impregnated_paper; = 0.231036529680365 * scaling_factor; CPC 32149: Other paper and paperboard, cellulose wadding and webs of cellulose fibres, coated, impregnated, gummed or adh[…]; By-product classification allocatable product
  Amount was scaled to 1.
  production volume 3.36806e12 kg; name p_impregnated_paper
    extrapolated from RER dataset via ratio GDP
  property price 0.729 EUR2005; name r_impregnated_paper_price_EUR2005
    Estimated to be the same as the price for paper, woodfree, coated (export prices for the World+ according to: http://faostat.fao.org/site/626/DesktopDefault.aspx?PageID=626#ancor downloaded 28 April 2009; calculated as export value divided by export volume).
  property carbon content 0.5067
    carbon content on a dry matter basis (reserved; not for manual entry)
  property true value 0.729; name r_impregnated_paper_true_value
    allocation property applied in "true value" allocation // value calculated from revenue
  properties: water in wet mass 0 kg, water content 0, carbon content, fossil 0.3635, wet mass 1 kg, carbon content, non-fossil 0.1432, dry mass 1 kg, carbon allocation 0.5067 kg

## By-products
- heat, for reuse in municipal waste incineration only: 0 MJ; CPC 17300: Steam and hot water; By-product classification allocatable product; pedigree (1,1,1,1,1)
  Net electricity generated from this waste and used in internal MSWI plant energy redistribution.
  Uncertainty: uncertainty is calculated from uncertainties in waste composition and uncertainties in energy efficiency and the uncertainty in internal energy demand
  production volume 8.92848e9 MJ
  property price 0.0106 EUR2005; name E_th_prod_MSWI_price_EUR2005
    Average European district heat price from Ecoheatcool and Euroheat 2005-2006, Ecoheat Work package 1: The European heat market. Final report. 10.6 EUR/GJ i s the price of district heat. http://www.solarthermalworld.org/files/Ecoheatcool%20WP1%20Web.pdf?download
  property true value relation 0.1842; name E_th_prod_MSWI_true_value_relation
    property to calculate "true value" from
  property exergy 0.1842 MJ; name E_th_prod_MSWI_exergy
    This exergy property is based on the exergy content of the product.
  property true value 1.54101e-5
    allocation property applied in "true value" allocation // value calculated from true value relation
- electricity, for reuse in municipal waste incineration only: 0 kWh; CPC 17100: Electrical energy; By-product classification allocatable product; pedigree (1,1,1,1,1)
  (same comment as for heat, for reuse in municipal waste incineration only)
  production volume 1.23259e9 kWh
  property true value relation 3.6; name E_el_prod_MSWI_true_value_relation
    property to calculate "true value" from
  property exergy 3.6 MJ; name E_el_prod_MSWI_exergy
    This exergy property is based on the exergy content of the product.
  property price 0.1 EUR2005; name E_el_prod_MSWI_price_EUR2005
    Estimated to be the same price as in case of electricity, medium voltage.
  property true value 4.15693e-5
    (same comment as for heat, for reuse in municipal waste incineration only)
- iron scrap, sorted, pressed: 0 kg; By-product classification Recyclable; CPC 39310: Slag, dross, scalings and other waste from the manufacture of iron or steel; pedigree (1,1,1,1,1)
  metallic iron scrap removed from ash reamains and recycled.
  Uncertainty: uncertainty is calculated from uncertainties in waste composition and transfer coefficients to soild residues
  production volume 1.19301e7 kg
  property price 0.175 EUR2005
    Temporary price data. Calculated as 90% of purchasers price based on: 2005 import and export prices (total trades (USD) divided by total weight (kg) in biggest economies of the world: EU27, USA, Brasil, China, India, Japan and Russia) from UN Commodity Trade Statistics Database (http://data.un.org/Explorer.aspxDatabase [Accessed 2011.06.20]). Commodity: Waste or scrap, of cast iron
  property carbon content 0
    carbon content on a dry matter basis (reserved; not for manual entry)
  property true value 5.75111e-7
    allocation property applied in "true value" allocation // value calculated from revenue
  properties: carbon content, non-fossil 0, wet mass 1 kg, dry mass 1 kg, water content 0, carbon content, fossil 0, water in wet mass 0 kg, carbon allocation 0 kg
- copper: 0 kg; source Rentz O. 1999; By-product classification allocatable product; CPC 41413: Refined copper and copper alloys, unwrought; master alloys of copper
  Literature value. Copper uses: Before end-use copper is manufactured into semi fabricated products, such as shapes and ingots (known as 'semis'). These manufacturing processes are subdivided into hot working, cold working and, if necessary, process annealing. Few of the semis are ready for use as such. They more typically travel to first-stage manufacturers, who make metal rods, wire, and casting, and then to component manufacturers who produce such things as motors, valves, and insulated cables The components in turn are incorporated by final-stage manufacturers into a variety of finished products - automobiles, commercial buildings, residential housing, and so forth. These uses account for about 79% of the world-wide consumption of copper.
  production volume 384429 kg
  property price 5.52 EUR2005
    Literature value (http://www.economist.com/news/business/21576714-mining-industry-has-enriched-chile-its-future-precarious-copper-solution). Average price between 20015 and 2013.
  property carbon content 0
    carbon content on a dry matter basis (reserved; not for manual entry)
  property true value 5.7742e-7
    allocation property applied in "true value" allocation // value calculated from revenue
  properties: dry mass 1 kg, water in wet mass 0 kg, wet mass 1 kg, carbon content, non-fossil 0, water content 0, carbon content, fossil 0, carbon allocation 0 kg
- zinc concentrate: 0 kg; CPC 14290: Other non-ferrous metal ores and concentrates (other than uranium or thorium ores and concentrates); By-product classification allocatable product
  Calculated value from the knowledge of the properties of both products.
  production volume 0.000305132 kg
  property price 0.38 EUR2005; name ByP_price_EUR2005
    Temporary price data. Calculated as 90% of purchasers price based on: Zinc content in concentrate 53%. Concentrate price per kg Zn 86.5% of refined Zn price (13.5% treatment charges according to CHR Metals Limited 2005: Dynamic cost curves. http://www.minecost.com/dynamic.pdf). 2004 zinc price from USGS (2007) Mineral commodity summaries 2007. <http://minerals.usgs.gov/minerals/pubs/mcs/2007/mcs2007.pdf> [Accessed 25 May 2010]
  property zinc content 0.53; name zinc_C_zinc_concentrate
    Zinc content on a dry matter basis. Value taken from teh "zinc mine operation" /GLO dataset.
  property dry mass 1 kg; name DM_zinc_concentrate
  property carbon content 0
    carbon content on a dry matter basis (reserved; not for manual entry)
  property true value 3.15506e-17
    allocation property applied in "true value" allocation // value calculated from revenue
  properties: wet mass 1 kg, water content 0, carbon content, non-fossil 0, carbon content, fossil 0, water in wet mass 0 kg, carbon allocation 0 kg
- iron scrap, unsorted: 0 kg; source European Aluminium Association 2008; CPC 39310: Slag, dross, scalings and other waste from the manufacture of iron or steel; By-product classification Recyclable; pedigree (1,1,1,1,1)
  production volume 315.623 kg
  property price 0.149 EUR2005; name ironScrapAmount_price_EUR2005
    Temporary price data. Calculated as 90% of purchasers price based on: estimated at 85% of sorted scrap
  property carbon content 0
    carbon content on a dry matter basis (reserved; not for manual entry)
  property true value 1.39311e-11
    allocation property applied in "true value" allocation // value calculated from revenue
  properties: water in wet mass 0 kg, water content 0, carbon content, fossil 0, carbon content, non-fossil 0, dry mass 1 kg, wet mass 1 kg, carbon allocation 0 kg
- aluminium oxide, non-metallurgical: 0 kg; source European Aluminium Association 2008; CPC 41432: Alumina (aluminium oxide), except artificial corundum; By-product classification allocatable product; CAS 1344-28-1; pedigree (1,1,1,1,1)
  production volume 19861 kg
  property carbon content, non-fossil 0; name C_content_non_fossil
  property price 0.28 EUR2005; name Al2O3Amount_price_EUR2005
    From UN trade database. http://data.un.org/ Import data from the largest economies of the world are used (Brazil, India, USA, China, Japan and EU-27).
  property dry mass 1 kg; name DM
  property water content 0; name water_content
  property wet mass 1 kg; name WM
  property water in wet mass 0 kg; name WWM
  property carbon content, fossil 0; name C_content_fossil
  property carbon content 0
    carbon content on a dry matter basis (reserved; not for manual entry)
  property true value 1.64737e-9
    allocation property applied in "true value" allocation // value calculated from revenue
  properties: carbon allocation 0 kg
- aluminium, cast alloy: 0 kg; source European Aluminium Association 2008; By-product classification allocatable product; CPC 41431: Unwrought aluminium; pedigree (1,1,1,1,1)
  EcoSpold01Location=RER
  production volume 185656 kg
  property price 1.3 EUR2005; name castAlloyAmount_price_EUR2005
    Temporary price data. Calculated as 90% of purchasers price based on: Source: London Metal Exchange, Aluminium alloy price for 2005
  property carbon content 0
    carbon content on a dry matter basis (reserved; not for manual entry)
  property true value 7.14964e-8
    allocation property applied in "true value" allocation // value calculated from revenue
  properties: water in wet mass 0 kg, carbon content, non-fossil 0, water content 0, dry mass 1 kg, carbon content, fossil 0, wet mass 1 kg, carbon allocation 0 kg
- aluminium, wrought alloy: 0 kg; source European Aluminium Association 2008; By-product classification allocatable product; CPC 4153: Semi-finished products of aluminium or aluminium alloys; pedigree (1,1,1,1,1)
  production volume 81276.7 kg
  property price 1.44 EUR2005; name secondaryAluminiumOutput_price_EUR2005
    Estimated based on literature values and expert judgement. Aluminium ccast alloys are about 90% of the price of aluminium wrought alloys.
  property carbon content 0
    carbon content on a dry matter basis (reserved; not for manual entry)
  property true value 3.46705e-8
    allocation property applied in "true value" allocation // value calculated from revenue
  properties: wet mass 1 kg, water content 0, carbon content, fossil 0, water in wet mass 0 kg, carbon content, non-fossil 0, dry mass 1 kg, carbon allocation 0 kg

## Inputs from technosphere
- electricity, medium voltage: 0 kWh; pedigree (1,1,1,1,1)
  MJ converted to kWh
  Amount was scaled to the amount of reference product.
- tap water: 0 kg; pedigree (1,1,1,1,1)
  Amount was scaled to the amount of reference product.
  properties: carbon content, fossil 0.00178991, water content 2962.17, dry mass 0.000337476 kg, wet mass 1 kg
  note on carbon content, fossil: Bicarbonate content is 2.93 mol/m3. CO2 content is 0.1 mol/m3 (ecoinvent v2.2 report 8, Tab 93.1).
- heat, district or industrial, natural gas: 0 MJ; pedigree (1,1,1,1,1)
  input of natural gas; assumed efficiency: 90%
  Amount was scaled to the amount of reference product.
- kraft paper, unbleached: 0.343973 kg; = 0.0794765662100457 * scaling_factor; lognormal variance with pedigree 0.0296, pedigree (1,3,3,5,1)
  Amount was scaled to the amount of reference product.
  properties: water content 0.0582011, dry mass 0.945 kg, carbon content, fossil 0.00202191, wet mass 1 kg, carbon content, non-fossil 0.416625
- heat, district or industrial, other than natural gas: 2.88977 MJ
  heat from wood chips
- chemical, inorganic: 0.0209983 kg; = 0.00485176712328767 * scaling_factor; lognormal variance with pedigree 0.0296, pedigree (1,3,3,5,1)
  pigments
  Amount was scaled to the amount of reference product.
  properties: wet mass 1 kg, carbon content, fossil 0.003, dry mass 1 kg
  note on carbon content, fossil: This dataset is an unweighted average of 20 inorganic substances (listed in Tab 88.1, ecoinvent v2.2 report 8, part II), being part of the top100 chemicals included in this database. The C-content has also been calculated as an unweighted average of the C content of the substances composing this dataset.
- waste packaging paper: 0 kg; name w_packaging_paper; pedigree (1,1,1,1,1)
  paper waste
  Amount was scaled to the amount of reference product.
  production volume 0 kg
    extrapolated by system when creating GLO dataset
  property price 0.1 EUR2005; name w_packaging_paper_price_EUR2005
- melamine formaldehyde resin: 0.37697 kg; = 0.0871007716894977 * scaling_factor; lognormal variance with pedigree 0.0296, pedigree (1,3,3,5,1)
  Amount was scaled to the amount of reference product.
  properties: carbon content, fossil 0.311708, wet mass 1 kg, dry mass 1 kg
- hazardous waste, for incineration: -0.0108991 kg; name w_hazardous; = (0.00251829817351598 * scaling_factor)*-1; lognormal variance with pedigree 0.0296, pedigree (1,3,3,5,1)
  resin waste
  Amount was scaled to the amount of reference product.
  production volume 3.67119e10 kg; = w_hazardous*p_impregnated_paper/r_impregnated_paper
    extrapolated by system when creating GLO dataset
  property price 0 EUR2005; name w_hazardous_price_EUR2005
  properties: water content 0.333333, carbon content, fossil 0.554667, dry mass 0.75 kg, wet mass 1 kg
  note on carbon content, fossil: Tab A.6, ecoinvent v2.2 report 13_I. C content has been calculated after data in the tables, and then referred to 1 kg DM
- urea formaldehyde resin: 0.217983 kg; = 0.0503659634703196 * scaling_factor; lognormal variance with pedigree 0.0296, pedigree (1,3,3,5,1)
  Amount was scaled to the amount of reference product.
  properties: dry mass 1 kg, wet mass 1 kg, carbon content, fossil 0.408958
- urea, as N: 0.0173586 kg; = 0.00401079415525114 * scaling_factor; lognormal variance with pedigree 0.0296, pedigree (1,3,3,5,1)
  input of urea converted to N via molar relations
  Amount was scaled to the amount of reference product.
  properties: wet mass 1 kg, carbon content, fossil 0.2, dry mass 1 kg
- municipal solid waste: 0 kg; name w_municipal_waste; pedigree (1,1,1,1,1)
  unspecified waste
  Amount was scaled to the amount of reference product.
  production volume 0 kg
    extrapolated by system when creating GLO dataset
  property price 0 EUR2005; name w_municipal_waste_price_EUR2005
  properties: carbon content, fossil 0.171549, carbon content, non-fossil 0.261655, water content 0.297017, dry mass 0.771 kg, wet mass 1 kg
  note on carbon content, fossil: MSW composition in tab 4.1, ecoinvent v2.2 report 13_I. C content referred to 1 kg DM
- formaldehyde: 0.388069 kg; = 0.0896652771689498 * scaling_factor; lognormal variance with pedigree 0.0296, pedigree (1,3,3,5,1)
  Amount was scaled to the amount of reference product.
  properties: carbon content, fossil 0.4, wet mass 1 kg, dry mass 1 kg
- electricity, medium voltage: 0.00275611, 0.000501496, 0.0085046, 0.123308, 0.0176477, 0.057821 kWh (6 entries); lognormal variance with pedigree 0.0296, pedigree (1,3,3,5,1)
  MJ converted to kWh
  Amount was scaled to the amount of reference product.
- tap water: 0.00063327, 0.00526089, 0.00104658, 0.0263907, 0.000686547, 0.00195287, 0.302002 kg (7 entries); lognormal variance with pedigree 0.0296, pedigree (1,3,3,5,1)
  Amount was scaled to the amount of reference product.
- heat, district or industrial, natural gas: 0.0523117, 2.95745 MJ (2 entries); lognormal variance with pedigree 0.0296, pedigree (1,3,3,5,1)
  (same comment as for heat, district or industrial, natural gas)
- waste packaging paper: -0.000263087, -4.01746e-5, -3.51291e-6, -0.000145168, -1.41551e-5, -2.62025e-5, -0.00488727 kg (7 entries); lognormal variance with pedigree 0.0296, pedigree (1,3,3,5,1)
  paper waste
  Amount was scaled to the amount of reference product.
  production volume 1.81202e10 kg
  properties: price 0.1 EUR2005
- municipal solid waste: -1.50936e-6, -3.80322e-7, -5.43502e-7, -0.00106748 kg (4 entries); lognormal variance with pedigree 0.0296, pedigree (1,3,3,5,1)
  unspecified waste
  Amount was scaled to the amount of reference product.
  production volume 3.60382e9 kg

## Emissions to nature
- Water [air, unspecified]: 0.000704644 m3; = 0.000162811442465753 * scaling_factor; lognormal variance with pedigree 0.0296, pedigree (1,3,3,5,1)
  water from chemical reaction of adhesives plus tap water; kg converted to m3
  Amount was scaled to the amount of reference product.

## Sampling procedure
The life cycle inventory has been compiled based on survey data from several plants producing coated wood based panels (plus melamine impregnated paper) and completed with additional information from e.g. environmental product declarations. As such, the LCI does not represent a statistical average but a best guess based on the available information.

## Review by Emilia Moreno Ruiz 2014-06-12
AL in heat input corrected to the most recent activity
