# treatment of waste polyvinylchloride, unsanitary landfill, hyperarid infiltration class (-250mm)

Dataset: EcoSpold 2, unit process
Geography: GLO
Time period: 2006-01-01 to 2019-12-31
Technology level: current
Classification: ISIC rev.4 ecoinvent: 3821:Treatment and disposal of non-hazardous waste
Synonyms: municipal waste landfill
Scenario: Business-as-Usual
System model: Allocation at the point of substitution
Share of production covered: 1 %
Generated by: Avraam Symeonidis
Database: ecoinvent
isCopyrightProtected: true
accessRestrictedTo: 1

## General comment
This dataset represents the activity of waste disposal of waste polyvinylchloride in a unsanitary landfill. Recommended use of this dataset: For PVC, which goes to disposal as part of managed communal waste mixture. // Waste composition (wet, in ppm): upper heating value 21.67 MJ/kg; lower heating value 21.51 MJ/kg; H2O 2000; O 16911; H 54921; C 440610; S 1057; N 1057; P n.a.; B n.a.; Cl 475290; Br 73.839; F 15.506; I n.a.; Ag n.a.; As 2.0042; Ba 196.73; Cd 2.7546; Co 33.322; Cr 43.106; Cu 28.223; Hg 0.89569; Mn 84.301; Mo n.a.; Ni 21.729; Pb 16.002; Sb 45.323; Se 2.2152; Sn 391.41; V 303.95; Zn 59.775; Be 0.52742; Sc n.a.; Sr 93.353; Ti 1054.8; Tl 0.42194; W n.a.; Si n.a.; Fe 3930; Ca n.a.; Al 210.97; K n.a.; Mg n.a.; Na 1545.9; . // Share of carbon in waste that is biogenic 0%. Share of metals in waste not oxidised and bulk-recyclable (exclude very small or thin parts) Iron: 0%; Alu: 0%; Copper: 0%. Overall degradability of waste during 100 years: 1%.

## Included activities start
from final waste deposition (without transports to the site)

## Included activities end
Waste-specific short-term emissions to air via landfill gas and landfill leachate. Waste-specific long-term emissions from landfill.

## Geography
Given name of landfill location is 'infiltration class 1 hyperarid (2018)'. Landfill site with mean annual temperature (MAT) of 8 degC, mean annual precipitation (MAP) of 350 mm/year, and net infiltration of -250 mm/year. Negative infiltration means that leachate flow is reversed and flows upward to the surface, where water is evaporated and dissolved solids become solid evaporites.
Climate adjustments result in an alpha t (temperature) for permafrost areas of 0.999. Total climate adjustments with alpha pt of 0.999.

## Technology
This is an inventory for an unsanitary, sub-controlled landfill for municipal solid waste. Ultimate average landfill height is 15 meters. Operation phase duration is 25 years.Percentage of landfill gas directly emitted is 100w%.
Leachate of the landfill is not treated. Leachate flow is upward to the surface due to net negative infiltration. No leachate treatment can be performed. Based on average waste composition and climate data the end of carbonate phase is estimated to be reached 6681 years after waste deposition. Arid conditions at this location prompt formation of evaporites from landfill contents which are partially eroded by wind. It is assumed that 10% of these evaporites are eroded by wind and airborne. Initial decay in the first 100 years of this waste results in a wind erosion rate corresponding to 184.4 g/m2.year and long-term decay corresponds to wind erosion of 24.69 g/m2.year.

## Reference product
- waste polyvinylchloride: -1 kg; By-product classification Waste; CPC 39270: Waste, parings and scrap of plastics; CAS 9002-86-2; pedigree (1,1,1,1,1)
  main reference product of this activity (supply of disposal service).
  Uncertainty: Uncertainty is not adjusted, as this is the refence product
  production volume 1 kg
    The amount of the annual production volume is a placeholder value. The contribution of this technology to the different local markets can be found in the markets themselves.
  property price 0 EUR2005
    Waste products are assigned a price of zero as they are assumed to require further treatment.
  property carbon content 0.44149
    carbon content on a dry matter basis (reserved; not for manual entry)
  properties: aluminium content 0.00021139, carbon content, fossil 0.44149, iron content 0.0039379, water in wet mass 0.002 kg, wet mass 1 kg, sodium content 0.001549, water content 0.002004, dry mass 0.998 kg, beryllium content 5.2848e-7, heating value, net 21.513 MJ, selenium content 2.2196e-6, strontium content 9.354e-5, tin content 0.0003922, nitrogen content 0.0010591, chromium content 4.3192e-5, oxygen content 0.016945, thallium content 4.2278e-7, vanadium content 0.00030456, cadmium content 2.7601e-6, fluorine content 1.5537e-5, mercury content 8.9749e-7, lead content 1.6034e-5, titanium content 0.001057, cobalt content 3.3389e-5, copper content 2.828e-5, barium content 0.00019712, zinc content 5.9894e-5, bromine content 7.3987e-5, antimony content 4.5414e-5, hydrogen content 0.055031, nickel content 2.1772e-5, chlorine content 0.47624, arsenic content 2.0082e-6, manganese content 8.447e-5, heating value, gross 21.673 MJ, sulfur content 0.0010591, carbon allocation 0.440607 kg

## Inputs from technosphere
- diesel, burned in building machine: 0.046738 MJ; lognormal variance with pedigree 0.082256, pedigree (1,1,3,1,1)
  for waste distribution and compaction.
  Uncertainty: Uncertainty calculated from uncertainty in base parameters.
- excavation, skid-steer loader: 0.00031708 m3; lognormal variance with pedigree 0.082256, pedigree (1,1,3,1,1)
  application of daily cover.
  Uncertainty: Uncertainty calculated from uncertainty in base parameters.

## Emissions to nature
- Vanadium [air, non-urban air or from high stacks]: 3.2094e-8 kg; lognormal variance with pedigree 0.36548, pedigree (1,1,3,1,1)
  burden from direct release or incineration of landfill biogas; or windblown leachate evaporite in arid climates.
  Uncertainty: Uncertainty calculated from unertainty of the waste composition of this waste, uncertainty in waste decomposition and short-term leaching in landfill
- Particulates, > 2.5 um, and < 10um [air, low population density, long-term]: 0.029581 kg; lognormal variance with pedigree 0.078324, pedigree (1,1,3,1,1)
  burden from windblown long-term leachate evaporite in arid climates.
  Uncertainty: Uncertainty calculated from unertainty of the waste composition of this waste, uncertainty in waste decomposition and short-term leaching in landfill
- Zinc [air, non-urban air or from high stacks]: 2.8345e-9 kg; lognormal variance with pedigree 0.44567, pedigree (1,1,3,1,1)
  (same comment as for Vanadium)
- Particulates, < 2.5 um [air, low population density, long-term]: 0.019721 kg; lognormal variance with pedigree 0.12373, pedigree (1,1,3,1,1)
  (same comment as for Particulates, > 2.5 um, and < 10um)
- Tin [air, non-urban air or from high stacks]: 2.3094e-9 kg; lognormal variance with pedigree 0.45189, pedigree (1,1,3,1,1)
  (same comment as for Vanadium)
- Sodium [soil, industrial]: 0.0013913 kg; lognormal variance with pedigree 0.14239, pedigree (1,1,3,1,1)
  burden from leachate evaporite in arid climates deposited on landflill surface.
  Uncertainty: Uncertainty calculated from unertainty of the waste composition of this waste, uncertainty in waste decomposition and short-term leaching in landfill
- Lead [air, non-urban air or from high stacks]: 9.4486e-11 kg; lognormal variance with pedigree 0.5574, pedigree (1,1,3,1,1)
  (same comment as for Vanadium)
- Aluminium [soil, industrial]: 0.00018987 kg; lognormal variance with pedigree 0.21748, pedigree (1,1,3,1,1)
  (same comment as for Sodium)
- Selenium [air, non-urban air or from high stacks]: 2.339e-10 kg; lognormal variance with pedigree 0.52815, pedigree (1,1,3,1,1)
  (same comment as for Vanadium)
- Strontium [soil, industrial]: 8.4018e-5 kg; lognormal variance with pedigree 0.24454, pedigree (1,1,3,1,1)
  (same comment as for Sodium)
- Antimony [air, non-urban air or from high stacks]: 4.7856e-9 kg; lognormal variance with pedigree 0.42863, pedigree (1,1,3,1,1)
  (same comment as for Vanadium)
- Iron [soil, industrial]: 0.003537 kg; lognormal variance with pedigree 0.12248, pedigree (1,1,3,1,1)
  (same comment as for Sodium)
- Manganese [air, non-urban air or from high stacks]: 9.6672e-8 kg; lognormal variance with pedigree 0.33378, pedigree (1,1,3,1,1)
  (same comment as for Vanadium)
- Thallium [soil, industrial]: 3.7974e-7 kg; lognormal variance with pedigree 0.42183, pedigree (1,1,3,1,1)
  (same comment as for Sodium)
- Nickel [air, non-urban air or from high stacks]: 1.2649e-9 kg; lognormal variance with pedigree 0.47238, pedigree (1,1,3,1,1)
  (same comment as for Vanadium)
- Titanium [soil, industrial]: 0.00094936 kg; lognormal variance with pedigree 0.16449, pedigree (1,1,3,1,1)
  (same comment as for Sodium)
- Mercury [air, non-urban air or from high stacks]: 3.064e-10 kg; lognormal variance with pedigree 0.51975, pedigree (1,1,3,1,1)
  (same comment as for Vanadium)
- Beryllium [soil, industrial]: 4.7468e-7 kg; lognormal variance with pedigree 0.41467, pedigree (1,1,3,1,1)
  (same comment as for Sodium)
- Copper [air, non-urban air or from high stacks]: 1.3843e-10 kg; lognormal variance with pedigree 0.54504, pedigree (1,1,3,1,1)
  (same comment as for Vanadium)
- Zinc [soil, industrial]: 5.3797e-5 kg; lognormal variance with pedigree 0.25941, pedigree (1,1,3,1,1)
  (same comment as for Sodium)
- Cobalt [air, non-urban air or from high stacks]: 1.0724e-8 kg; lognormal variance with pedigree 0.4033, pedigree (1,1,3,1,1)
  (same comment as for Vanadium)
- Vanadium [soil, industrial]: 0.00010586 kg; lognormal variance with pedigree 0.26113, pedigree (1,1,3,1,1)
  (same comment as for Sodium)
- Chromium [air, non-urban air or from high stacks]: 4.9197e-10 kg; lognormal variance with pedigree 0.50327, pedigree (1,1,3,1,1)
  (same comment as for Vanadium)
- Tin [soil, industrial]: 0.00035227 kg; lognormal variance with pedigree 0.19719, pedigree (1,1,3,1,1)
  (same comment as for Sodium)
- Sodium [air, low population density, long-term]: 0.0001482 kg; lognormal variance with pedigree 0.1523, pedigree (1,1,3,1,1)
  (same comment as for Particulates, > 2.5 um, and < 10um)
- Barium [air, non-urban air or from high stacks]: 2.256e-7 kg; lognormal variance with pedigree 0.30566, pedigree (1,1,3,1,1)
  (same comment as for Vanadium)
- Selenium [soil, industrial]: 7.4868e-7 kg; lognormal variance with pedigree 0.42736, pedigree (1,1,3,1,1)
  (same comment as for Sodium)
- Aluminium [air, low population density, long-term]: 2.1086e-5 kg; lognormal variance with pedigree 0.21769, pedigree (1,1,3,1,1)
  (same comment as for Particulates, > 2.5 um, and < 10um)
- Cadmium [air, non-urban air or from high stacks]: 5.1638e-10 kg; lognormal variance with pedigree 0.47221, pedigree (1,1,3,1,1)
  (same comment as for Vanadium)
- Lead [soil, industrial]: 1.4402e-5 kg; lognormal variance with pedigree 0.30338, pedigree (1,1,3,1,1)
  (same comment as for Sodium)
- Iron [air, low population density, long-term]: 0.00039294 kg; lognormal variance with pedigree 0.12252, pedigree (1,1,3,1,1)
  (same comment as for Particulates, > 2.5 um, and < 10um)
- Arsenic [air, non-urban air or from high stacks]: 4.0994e-10 kg; lognormal variance with pedigree 0.45663, pedigree (1,1,3,1,1)
  (same comment as for Vanadium)
- Antimony [soil, industrial]: 5.7157e-6 kg; lognormal variance with pedigree 0.50925, pedigree (1,1,3,1,1)
  (same comment as for Sodium)
- Strontium [air, low population density, long-term]: 9.3299e-6 kg; lognormal variance with pedigree 0.2448, pedigree (1,1,3,1,1)
  (same comment as for Particulates, > 2.5 um, and < 10um)
- Hydrogen fluoride [air, non-urban air or from high stacks]: 6.2871e-8 kg; lognormal variance with pedigree 0.41713, pedigree (1,1,3,1,1)
  (same comment as for Vanadium)
- Manganese [soil, industrial]: 7.587e-5 kg; lognormal variance with pedigree 0.24398, pedigree (1,1,3,1,1)
  (same comment as for Sodium)
- Thallium [air, low population density, long-term]: 4.2169e-8 kg; lognormal variance with pedigree 0.42217, pedigree (1,1,3,1,1)
  (same comment as for Particulates, > 2.5 um, and < 10um)
- Bromine [air, non-urban air or from high stacks]: 2.1175e-7 kg; lognormal variance with pedigree 0.27051, pedigree (1,1,3,1,1)
  (same comment as for Vanadium)
- Mercury [soil, industrial]: 8.059e-7 kg; lognormal variance with pedigree 0.39753, pedigree (1,1,3,1,1)
  (same comment as for Sodium)
- Beryllium [air, low population density, long-term]: 5.2711e-8 kg; lognormal variance with pedigree 0.415, pedigree (1,1,3,1,1)
  (same comment as for Particulates, > 2.5 um, and < 10um)
- Hydrogen chloride [air, non-urban air or from high stacks]: 0.0013677 kg; lognormal variance with pedigree 0.058759, pedigree (1,1,3,1,1)
  (same comment as for Vanadium)
- Nickel [soil, industrial]: 1.9556e-5 kg; lognormal variance with pedigree 0.29299, pedigree (1,1,3,1,1)
  (same comment as for Sodium)
- Titanium [air, low population density, long-term]: 0.00010543 kg; lognormal variance with pedigree 0.16466, pedigree (1,1,3,1,1)
  (same comment as for Particulates, > 2.5 um, and < 10um)
- Nitrate [air, non-urban air or from high stacks]: 1.0925e-5 kg; lognormal variance with pedigree 0.23132, pedigree (1,1,3,1,1)
  burden from windblown leachate evaporite in arid climates.
  Uncertainty: Uncertainty calculated from unertainty of the waste composition of this waste, uncertainty in waste decomposition and short-term leaching in landfill
- Copper [soil, industrial]: 2.5401e-5 kg; lognormal variance with pedigree 0.28456, pedigree (1,1,3,1,1)
  (same comment as for Sodium)
- Vanadium [air, low population density, long-term]: 1.173e-5 kg; lognormal variance with pedigree 0.26221, pedigree (1,1,3,1,1)
  (same comment as for Particulates, > 2.5 um, and < 10um)
- Nitrogen oxides [air, non-urban air or from high stacks]: 1.4478e-8 kg; lognormal variance with pedigree 0.32355, pedigree (1,1,3,1,1)
  burden from direct release or incineration of landfill biogas.
  Uncertainty: Uncertainty calculated from unertainty of the waste composition of this waste, uncertainty in waste decomposition and short-term leaching in landfill
- Chromium [soil, industrial]: 2.5341e-7 kg; lognormal variance with pedigree 1.863, pedigree (1,1,3,1,1)
  (same comment as for Sodium)
- Zinc [air, low population density, long-term]: 5.9746e-6 kg; lognormal variance with pedigree 0.25963, pedigree (1,1,3,1,1)
  (same comment as for Particulates, > 2.5 um, and < 10um)
- Sulfate [air, non-urban air or from high stacks]: 1.1794e-6 kg; lognormal variance with pedigree 0.28592, pedigree (1,1,3,1,1)
  (same comment as for Nitrate)
- Cadmium [soil, industrial]: 2.4791e-6 kg; lognormal variance with pedigree 0.36048, pedigree (1,1,3,1,1)
  (same comment as for Sodium)
- Antimony [air, low population density, long-term]: 6.303e-7 kg; lognormal variance with pedigree 0.51203, pedigree (1,1,3,1,1)
  (same comment as for Particulates, > 2.5 um, and < 10um)
- Sulfur dioxide [air, non-urban air or from high stacks]: 1.3776e-6 kg; lognormal variance with pedigree 0.34174, pedigree (1,1,3,1,1)
  (same comment as for Nitrogen oxides)
- Cobalt [soil, industrial]: 2.999e-5 kg; lognormal variance with pedigree 0.27769, pedigree (1,1,3,1,1)
  (same comment as for Sodium)
- Selenium [air, low population density, long-term]: 8.2953e-8 kg; lognormal variance with pedigree 0.42877, pedigree (1,1,3,1,1)
  (same comment as for Particulates, > 2.5 um, and < 10um)
- Particulates, > 2.5 um, and < 10um [air, non-urban air or from high stacks]: 0.00036885 kg; lognormal variance with pedigree 0.14063, pedigree (1,1,3,1,1)
  (same comment as for Vanadium)
- Barium [soil, industrial]: 0.00017705 kg; lognormal variance with pedigree 0.2161, pedigree (1,1,3,1,1)
  (same comment as for Sodium)
- Tin [air, low population density, long-term]: 3.9139e-5 kg; lognormal variance with pedigree 0.19721, pedigree (1,1,3,1,1)
  (same comment as for Particulates, > 2.5 um, and < 10um)
- Particulates, < 2.5 um [air, non-urban air or from high stacks]: 0.0002459 kg; lognormal variance with pedigree 0.18604, pedigree (1,1,3,1,1)
  (same comment as for Vanadium)
- Arsenic [soil, industrial]: 1.8037e-6 kg; lognormal variance with pedigree 0.37084, pedigree (1,1,3,1,1)
  (same comment as for Sodium)
- Lead [air, low population density, long-term]: 1.6001e-6 kg; lognormal variance with pedigree 0.30342, pedigree (1,1,3,1,1)
  (same comment as for Particulates, > 2.5 um, and < 10um)
- Methane, fossil [air, non-urban air or from high stacks]: 0.0031874 kg; lognormal variance with pedigree 0.10984, pedigree (1,1,3,1,1)
  (same comment as for Nitrogen oxides)
- Bromine [soil, industrial]: 6.6432e-5 kg; lognormal variance with pedigree 0.24375, pedigree (1,1,3,1,1)
  (same comment as for Sodium)
- Manganese [air, low population density, long-term]: 8.3336e-6 kg; lognormal variance with pedigree 0.24819, pedigree (1,1,3,1,1)
  (same comment as for Particulates, > 2.5 um, and < 10um)
- Particulates, > 10 um [air, non-urban air or from high stacks]: 0.00061475 kg; lognormal variance with pedigree 0.12088, pedigree (1,1,3,1,1)
  (same comment as for Vanadium)
- Fluoride [soil, industrial]: 1.3903e-5 kg; lognormal variance with pedigree 0.3041, pedigree (1,1,3,1,1)
  (same comment as for Sodium)
- Nickel [air, low population density, long-term]: 2.1716e-6 kg; lognormal variance with pedigree 0.29327, pedigree (1,1,3,1,1)
  (same comment as for Particulates, > 2.5 um, and < 10um)
- Carbon dioxide, fossil [air, non-urban air or from high stacks]: 0.0069007 kg; lognormal variance with pedigree 0.099709, pedigree (1,1,3,1,1)
  (same comment as for Nitrogen oxides)
- Chloride [soil, industrial]: 0.42761 kg; lognormal variance with pedigree 0.0058439, pedigree (1,1,3,1,1)
  (same comment as for Sodium)
- Copper [air, low population density, long-term]: 2.8222e-6 kg; lognormal variance with pedigree 0.28459, pedigree (1,1,3,1,1)
  (same comment as for Particulates, > 2.5 um, and < 10um)
- Occupation, dump site [natural resource, land]: 0.0023333 m2*year; lognormal variance with pedigree 0.082256, pedigree (1,1,3,1,1)
  for landfill operation phase and spontaneous renaturation.
  Uncertainty: Uncertainty calculated from uncertainty in base parameters.
- Nitrogen [soil, industrial]: 0.00094973 kg; lognormal variance with pedigree 0.15839, pedigree (1,1,3,1,1)
  (same comment as for Sodium)
- Chromium [air, low population density, long-term]: 2.7665e-8 kg; lognormal variance with pedigree 1.8636, pedigree (1,1,3,1,1)
  (same comment as for Particulates, > 2.5 um, and < 10um)
- Sulfur [soil, industrial]: 0.00095064 kg; lognormal variance with pedigree 0.16347, pedigree (1,1,3,1,1)
  (same comment as for Sodium)
- Mercury [air, low population density, long-term]: 8.9483e-8 kg; lognormal variance with pedigree 0.39792, pedigree (1,1,3,1,1)
  (same comment as for Particulates, > 2.5 um, and < 10um)
- Carbon [soil, industrial]: 0.3927 kg; lognormal variance with pedigree 0.0067802, pedigree (1,1,3,1,1)
  (same comment as for Sodium)
- Cadmium [air, low population density, long-term]: 2.7497e-7 kg; lognormal variance with pedigree 0.36137, pedigree (1,1,3,1,1)
  (same comment as for Particulates, > 2.5 um, and < 10um)
- Sodium [air, non-urban air or from high stacks]: 6.4054e-6 kg; lognormal variance with pedigree 0.20248, pedigree (1,1,3,1,1)
  (same comment as for Vanadium)
- Cobalt [air, low population density, long-term]: 3.3215e-6 kg; lognormal variance with pedigree 0.27907, pedigree (1,1,3,1,1)
  (same comment as for Particulates, > 2.5 um, and < 10um)
- Heat, waste [water, ground-, long-term]: 21.457 MJ; lognormal variance with pedigree 0.014651, pedigree (1,1,3,1,1)
  burden from long-term decomposition of waste (>100a).
  Uncertainty: Uncertainty calculated from unertainty of the waste composition of this waste, uncertainty in waste decomposition and short-term leaching in landfill
- Barium [air, low population density, long-term]: 1.9448e-5 kg; lognormal variance with pedigree 0.22001, pedigree (1,1,3,1,1)
  (same comment as for Particulates, > 2.5 um, and < 10um)
- Aluminium [air, non-urban air or from high stacks]: 1.0559e-8 kg; lognormal variance with pedigree 0.40185, pedigree (1,1,3,1,1)
  (same comment as for Vanadium)
- Arsenic [air, low population density, long-term]: 2.0006e-7 kg; lognormal variance with pedigree 0.37176, pedigree (1,1,3,1,1)
  (same comment as for Particulates, > 2.5 um, and < 10um)
- Heat, waste [soil, industrial]: 0.14513 MJ; lognormal variance with pedigree 0.073371, pedigree (1,1,3,1,1)
  burden from short-term decomposition of waste (0-100a).
  Uncertainty: Uncertainty calculated from unertainty of the waste composition of this waste, uncertainty in waste decomposition and short-term leaching in landfill
- Hydrogen fluoride [air, low population density, long-term]: 1.5436e-6 kg; lognormal variance with pedigree 0.30446, pedigree (1,1,3,1,1)
  (same comment as for Particulates, > 2.5 um, and < 10um)
- Thallium [air, non-urban air or from high stacks]: 2.4561e-11 kg; lognormal variance with pedigree 0.60115, pedigree (1,1,3,1,1)
  (same comment as for Vanadium)
- Bromine [air, low population density, long-term]: 7.1956e-6 kg; lognormal variance with pedigree 0.25262, pedigree (1,1,3,1,1)
  (same comment as for Particulates, > 2.5 um, and < 10um)
- Iron [air, non-urban air or from high stacks]: 5.4048e-8 kg; lognormal variance with pedigree 0.34935, pedigree (1,1,3,1,1)
  (same comment as for Vanadium)
- Hydrogen chloride [air, low population density, long-term]: 0.046316 kg; lognormal variance with pedigree 0.0060041, pedigree (1,1,3,1,1)
  (same comment as for Particulates, > 2.5 um, and < 10um)
- Beryllium [air, non-urban air or from high stacks]: 3.0702e-11 kg; lognormal variance with pedigree 0.59399, pedigree (1,1,3,1,1)
  (same comment as for Vanadium)
- Sulfate [air, low population density, long-term]: 0.0003157 kg; lognormal variance with pedigree 0.1646, pedigree (1,1,3,1,1)
  (same comment as for Particulates, > 2.5 um, and < 10um)
- Strontium [air, non-urban air or from high stacks]: 5.4342e-9 kg; lognormal variance with pedigree 0.42397, pedigree (1,1,3,1,1)
  (same comment as for Vanadium)
- Nitrate [air, low population density, long-term]: 0.0004564 kg; lognormal variance with pedigree 0.16461, pedigree (1,1,3,1,1)
  (same comment as for Particulates, > 2.5 um, and < 10um)
- Titanium [air, non-urban air or from high stacks]: 5.2796e-8 kg; lognormal variance with pedigree 0.34892, pedigree (1,1,3,1,1)
  (same comment as for Vanadium)
- Particulates, > 10 um [air, low population density, long-term]: 0.049301 kg; lognormal variance with pedigree 0.058571, pedigree (1,1,3,1,1)
  (same comment as for Particulates, > 2.5 um, and < 10um)

## Extrapolations
This dataset has been extrapolated from year 2012 to the year of the calculation (2019). The uncertainty has been adjusted accordingly.
