# electricity production, lignite

Dataset: EcoSpold 2, unit process
Geography: IN-TN
Time period: 1980-01-01 to 2019-12-31
Technology level: modern
Classification: ISIC rev.4 ecoinvent: 3510:Electric power generation, transmission and distribution
Classification: EcoSpold01Categories: lignite/power plants
Synonyms: sub-bituminous coal; brown coal
Tags: coal power; lignite power; fossil fuels
Scenario: Business-as-Usual
System model: Allocation at the point of substitution
Generated by: Muhammed Noor Hossain
Published in: Hossain, Muhammed Noor 2016
Database: ecoinvent
isCopyrightProtected: true
accessRestrictedTo: 1

## General comment
This dataset represents the production of high voltage electricity in an average lignite power plant in India - Tamil Nadu (a state/union territory in India) in 2012. 'Lignite' is used as representant for 'brown coal', which includes sub-bituminous coal and lignite according to the definition of the IEA electricity information 2014. This dataset is created as a child of the global dataset, i.e. some of the values are inherited from the global dataset and some are country-specific. Following values are edited, because they are country specific: the annual production volume, input of fuel, thermal efficiency of the power plant, emissions of CO2, CO, CH4, NO2, SO2, NMVOC, and Particulates.
Parameter data were used as an average value to represent a state/union territory.
Comments on the inventory data of emissions:
Emission data were used as an average value to represent a state/unioin territory. CO2, SOx, NOx, CO, CH4, VOC and Particulate Matter (PM) emission data were calculated using India specific parameter data (emission factor and input of fuel). All the other emissions were production-weighted averages of the figures in the datasets in ecoinvent version two, which are valid for the following 14 countries: AT, BE, ES, FR, IT, NL, PT, DE, CZ, HR, PL, SK, CN, US.
- Halogene emissions have been estimated on the basis of the content of the species in the country-specific coal input mix, assuming average retention rates.
Indian thermal electricity plants usually do not use De-SOx and De-NOx filter technologies. Therefore, the SOx retained and NOx retained exchanges in the inventory have been set to 0.
- Emission of uranium and thorium radioactive isotopes were assumed proportional to the corresponding element emitted with particles; the other non-gaseous radioactive isotopes of the uranium and thorium decay chain were assumed proportional to the emitted U-238 or Th-232.
- The emission of gaseous radon and K-40 are taken from the literature.
Sources:
IEA. 2009. Coal information, 2009 edition. Documentation for beyond 2020 files. International Energy Agency.
(IEA. 2014. Electricity Information 2014. ISBN 978-92-64-21692-1. International Energy Agency (IEA), Paris Cedex (FR).)
[This dataset is meant to replace the following datasets:
- electricity production, lignite, IN, 1980 - 2015]

## Included activities start
From the constructed lignite power plant ready to produce electricity.

From reception of lignite and operating materials at power plant gate.

## Included activities end
This activity ends with 1kWh of high voltage electricity produced at the power plant and arrived at the busbar.

This dataset includes:
- all operation and maintenance activities and materials of the power plants.

- Desulfurisation and denitrification. These processes are described in separate modules; it can be decided by changing the values of NOx and SOx retained whether and how much DeNOx and DeSOx are installed.
- Cooling: It is assumed that all plants use wet cooling with a cooling tower. No cooling tower is included in this dataset (will be implemented in future versions)
- Loss of feed water
- Losses from gross electricity production, e.g. for internal use

This dataset doesn't include
- raw materials extraction, decommissioning and waste treatment as these activities are already included in the infrastructure datasets
- transformation of the electricity produced
- The disposal of non-recycled ashes is modelled separately.
- Use of fuel oil for startup, as this can be neglected for lignite power plants because these are run for a long time (2-3 years) without being shut down.

## Technology
POWER PLANT:
Lignite power plant input is a dataset which consists of a mix of 30% 100MW power plant and 70% 500MW power plant. The plants are used for basic load with 6000 hours of operation at full capacity per year. The plants are assumed to operate 200000 hours during its lifetime.

## Time period
The Annual Production Volume data for the period 01.04.2012 - 31.03.2013.

## Parameters
- efficiency: 0.285273 dimensionless; = 3412/ (net_heat_rate*3.968312); lognormal variance with pedigree 0.003325, pedigree (3,2,1,2,2)
  Calculated value. Efficiency is calculated as 3412 (btu/kWh)/net heat rate (btu/kWh)
- gross electricity production: 2.04278e10 kWh; name gross_electricity; lognormal variance with pedigree 0.003325, pedigree (3,2,1,2,2)
  Literature and calculated value. Annual production volume data were extracted from the annual thermal electricity generation report of Central Electricity Authority, India (CEA, 2013). The Annual Production Volume is for the time period of 01.04.2012 - 31.03.2013 since CEA documents annual electricity production data for the mentioned time period.
  CEA. (2013). Region Wise, State Wise, Sector Wise, Type Wise, Station Wise, Unit Wise Generation Report For 31-Mar-2013. Central Electricity Authority (CEA). Retrieved from 04 December, 2016 http://cea.nic.in/reports/daily/dgr/2013/March/31/dgr2.pdf
- losses from gross electricity production: 0.1 dimensionless; name gross_net_electricity; lognormal variance with pedigree 0.003325, pedigree (3,2,1,2,2)
  Literature value. Own use of electricity plants in this State/Union Territory in 2012. The default loss as described by the CEA CO2 Baseline Database for the Indian Power Sector is applied, which is 10%. CEA. (2014). CO2 Baseline Database for the Indian Power Sector. User Guide, Ministry of Power, Government of India, New Delhi. Retrieved 12 04, 2016, from http://cea.nic.in/reports/others/thermal/tpece/cdm_co2/user_guide_ver10.pdf
- net heat rate: 3014 kcal/kWh; name net_heat_rate; lognormal variance with pedigree 0.003325, pedigree (3,2,1,2,2)
  A measure of the energy input to a system divided by the electricity generated. Literature value. Net heat rate of electricity plants in this State/Union Territory in 2012. The default net heat rate as described by the CEA CO2 Baseline Database for the Indian Power Sector is applied, which is 3014 kcal/kWh. CEA. (2014). CO2 Baseline Database for the Indian Power Sector. User Guide, Ministry of Power, Government of India, New Delhi. Retrieved 12 04, 2016, from http://cea.nic.in/reports/others/thermal/tpece/cdm_co2/user_guide_ver10.pdf
- factor: input of MJ for the production of 1 kWh: 12.6195 MJ/kWh; name factor_MJ_kWh; = 1*3.6/efficiency; undefined min 11.1801, max 11.1801, standardDeviation95 0, pedigree (3,2,1,2,2)
  Calculated value. 3.6 MJ = 1kWh.
  nan
- fraction, water, completely softened, to air: 0.15; name fraction_WCS_to_air; = fraction_PW_to_air; lognormal variance with pedigree 0.092025, pedigree (4,4,3,2,4)
  Calculated value. See comment in the other parametres present in this dataset. Water, completely softened is considered to be always used as process water, thus process water fractions to air are applied to all water, completely softened input flows to calculate the amount of water consumed in the processes.
  nan
- fraction, process water, to air: 0.15 dimensionless; name fraction_PW_to_air; lognormal variance with pedigree 0.092025, pedigree (4,4,3,2,4)
  Literature value. In case when no industry/process specific data are available, default evaporation fraction value is used. This value is 15% and is based on literature (Statistics Canada, 2007 & Shaffer, K.H., 2008, Consumptive water use in the Great Lakes Basin, USGS & Shiklomanov, 2003, World Water Resources at the Beginning of the 21st Century) and has been approved by an expert.
  nan
- water consumption, electricity production from hard coal, recirculating CS: 0.0018 m3/kWh; name WConsumption_EP_HC_recirculatingCS; lognormal variance with pedigree 0.092025, pedigree (4,4,3,2,4)
  Estimated based on literature (Scown, 2011, Water Footprint of U.S. Transportation Fuels, SI). The amount of water consumed while burning lignite and peat is assumed to be the same as in case of coal.
  nan
- recirculating cooling system as a fraction of all cooling systems: 0.375 dimensionless; name recirculating_CS_fraction_from_allCS; lognormal variance with pedigree 0.092025, pedigree (4,4,3,2,4)
  Calculated as an average of data available for Europe (Floerke, 2008, Future changes of freshwater needs in the electricity production sector) and USA (NERL, 2011, Estimating freshwater needs to meet future thermoelectric generation requirements).
  nan
- water withdrawal, electricity production from hard coal, recirculating CS: 0.0021 m3/kWh; name WWithdrawal_EP_HC_recirculating_CS; lognormal variance with pedigree 0.092025, pedigree (4,4,3,2,4)
  Estimated based on literature (Scown, 2011, Water Footprint of U.S. Transportation Fuels, SI). The amount of water withdrawn while burning lignite and peat is assumed to be the same as in case of coal.
  nan
- water withdrawal, electricity production from hard coal, once-through and coolin: 0.0815 m3/kWh; name WWithdrawal_EP_HC_once_through_andCP_CS; lognormal variance with pedigree 0.092025, pedigree (4,4,3,2,4)
  (same comment as for water withdrawal, electricity production from hard coal, recirculating)
- fraction, cooling water, to air: 0.0299662; name fraction_CW_to_air; = (WConsumption_EP_HC_recirculatingCS*recirculating_CS_fraction_from_allCS+WConsumption_EP_HC_once_through_andCP_CS*once_through_andCP_CS_fractio_from_allCS)/(WWithdrawal_EP_HC_recirculating_CS*recirculating_CS_fraction_from_allCS+WWithdrawal_EP_HC_once_through_andCP_CS*once_through_andCP_CS_fractio_from_allCS); lognormal variance with pedigree 0.092025, pedigree (4,4,3,2,4)
  Calculated
  nan
- once-through and cooling pond cooling systems as a fraction of all cooling syste: 0.625 dimensionless; name once_through_andCP_CS_fractio_from_allCS; lognormal variance with pedigree 0.092025, pedigree (4,4,3,2,4)
  (same comment as for recirculating cooling system as a fraction of all cooling systems)
- water consumption, electricity production from hard coal, once-through and cooli: 0.0014 m3/kWh; name WConsumption_EP_HC_once_through_andCP_CS; lognormal variance with pedigree 0.092025, pedigree (4,4,3,2,4)
  (same comment as for water consumption, electricity production from hard coal, recirculatin)
- fraction, water, decarbonised, to air: 0.0299662; name fraction_WDC_to_air; = fraction_CW_to_air; lognormal variance with pedigree 0.092025, pedigree (4,4,3,2,4)
  Calculated value. See comments in the other parametres present in this dataset. Decarbonised water is considered to be always used as cooling water, thus cooling water fractions to air are applied to all carbonised water input flows to calculate the amount of water consumed in the processes.
  nan

## Reference product
- electricity, high voltage: 1 kWh; name electricity; CPC 17100: Electrical energy; By-product classification allocatable product
  production volume 1.8385e10 kWh; name electricity_apv; = gross_electricity*(1- gross_net_electricity)
    Literature and calculated value. Annual production volume data were extracted from the annual thermal electricity generation report of Central Electricity Authority, India (CEA, 2013). The Annual Production Volume is for the time period of 01.04.2012 - 31.03.2013 since CEA documents annual electricity production data for the mentioned time period.
  property price 0.0977 EUR2005
    Temporary price data. Calculated as 90% of purchasers price based on: 94% of the average price (to account for a 6% loss in transformation and transmission) for electricity for industrial consumersin 2005 (excluded taxes). From IEA.
  property true value 0.0977; name electricity_true_value
    allocation property applied in "true value" allocation // value calculated from revenue

## By-products
- heat, for reuse in municipal waste incineration only: 0 MJ; CPC 17300: Steam and hot water; By-product classification allocatable product; pedigree (1,1,1,1,1)
  Net electricity generated from this waste and used in internal MSWI plant energy redistribution.
  Uncertainty: uncertainty is calculated from uncertainties in waste composition and uncertainties in energy efficiency and the uncertainty in internal energy demand
  production volume 2010.83 MJ
  property exergy 0.1842 MJ; name E_th_prod_MSWI_exergy
    This exergy property is based on the exergy content of the product.
  property price 0.0106 EUR2005; name E_th_prod_MSWI_price_EUR2005
    Average European district heat price from Ecoheatcool and Euroheat 2005-2006, Ecoheat Work package 1: The European heat market. Final report. 10.6 EUR/GJ i s the price of district heat. http://www.solarthermalworld.org/files/Ecoheatcool%20WP1%20Web.pdf?download
  property true value relation 0.1842; name E_th_prod_MSWI_true_value_relation
    property to calculate "true value" from
  property true value 7.19445e-10
    allocation property applied in "true value" allocation // value calculated from true value relation
- electricity, for reuse in municipal waste incineration only: 0 kWh; CPC 17100: Electrical energy; By-product classification allocatable product; pedigree (1,1,1,1,1)
  (same comment as for heat, for reuse in municipal waste incineration only)
  production volume 283.201 kWh
  property true value relation 3.6; name E_el_prod_MSWI_true_value_relation
    property to calculate "true value" from
  property price 0.1 EUR2005; name E_el_prod_MSWI_price_EUR2005
    Estimated to be the same price as in case of electricity, medium voltage.
  property exergy 3.6 MJ; name E_el_prod_MSWI_exergy
    This exergy property is based on the exergy content of the product.
  property true value 1.9803e-9
    (same comment as for heat, for reuse in municipal waste incineration only)

## Inputs from technosphere
- water, decarbonised: 2.5239 kg; name water_decarbonised_user; = factor_MJ_kWh*0.2; lognormal variance with pedigree 0.054, pedigree (4,5,4,5,3)
  Literature value/calculated value. Cooling water, decarbonised, for the cooling water circuit lost when producing 1kWh of electricity from lignite, based on the value for burning 1MJ of lignite. Röder et al. 2007, Tab. 9.65 and Tab. 9.66, p. 160f. These tables give an amount of 0.15 kg/MJ burned, which is valid for the assumption of 75% wet cooling and 25% run-through cooling. However, this revised dataset assumes 100% wet cooling.
  properties: wet mass 1 kg
- lignite: 1.35029 kg; = factor_MJ_kWh*0.107; source Central Statistics Office 2015; lognormal variance with pedigree 0.013025, pedigree (3,1,3,2,3)
  Literature/Calculated value. According to the Indian Energy Statistics, brown coal with a gross calorific value (moist, ash-free basis) less than 20 MJ/kg is considered as lignite (CSO, 2015). The same source takes 9.546 MJ/kg as the net calorific value of the Indian lignite.
  properties: carbon content, fossil 0.655, wet mass 1 kg, dry mass 0.42 kg, water content 1.38095
  note on carbon content, fossil: C content of dry lignite is 58-73% (specified in Tab 1.1, report 6, part VI). A mean content of 0.655 kg C/kg dry lignite was considered.
- lignite ash: -0.185507 kg; name lignite_ash; = (factor_MJ_kWh*0.0147)*-1; source Röder, A. 2007, p. Tab. 9.69, p.165; lognormal variance with pedigree 0.0986, pedigree (5,3,4,5,3)
  Literature value/calculated value. Ash remaining when producing 1kWh of electricity from lignite, based on the value for burning 1MJ of lignite. Weighted average with electricity production data (Itten&Frischknecht 2012) and ash values 10 countries
  (AT, BA, CZ, DE, ES, FR, HU, PL, SI, SK). These values were valid for the ash being disposed off. Now, total amount of ash has been calculated (disposed+recycled) with the data in Tab. 9.69 p. 165 in Röder et al. 2007. Country ash values calculated from mass balance. Globally, 6% of the lignite ash are recycled, 94% go to disposal.
  Source:
  Itten R. and Frischknecht R. (2012) Life Cycle Inventories of Electricity Mixes and Grid. ESU-services Ltd., Uster, Switzerland.
  production volume 3.41055e9 kg; = lignite_ash/electricity*electricity_apv
    Calculated from the production volume of lignite, burned in power plant in proportion to the respective output amounts.
  property price 0 EUR2005; name lignite_ash_price_EUR2005
  properties: wet mass 1 kg, dry mass 1 kg
- NOx retained, by selective catalytic reduction: 0 kg; name nox_retained; source Chikkatur, A.P. 2011; uniform min 0, max 0, pedigree (3,1,3,2,3)
  No/negligible De-NOx filter installed in Indian power plants as in 2012.
  properties: dry mass 1 kg, wet mass 1 kg
- residue from cooling tower: -6.30976e-5 kg; name cooling_tower_residue; = (factor_MJ_kWh*0.000005)*-1; lognormal variance with pedigree 0.0812, pedigree (5,3,4,5,2)
  Literature value/calculated value. Amount of resuidue from cooling tower in relation to producing 1kWh of electricity from lignite, based on the value for burning 1MJ of lignite. Weighted average with electricity production data (Itten&Frischknecht 2012) and values of 10 countries
  (AT, BA, CZ, DE, ES, FR, HU, PL, SI, SK).
  Source:
  Itten R. and Frischknecht R. (2012) Life Cycle Inventories of Electricity Mixes and Grid. ESU-services Ltd., Uster, Switzerland.
  production volume 1.16005e6 kg; = cooling_tower_residue/electricity*electricity_apv
    Calculated from production volume of reference product using the relative outputs.
  property price 0 EUR2005; name cooling_tower_residue_price_EUR2005
  properties: water content 0.428571, dry mass 0.7 kg, wet mass 1 kg, carbon content, fossil 0.0544233
- water, completely softened: 0.0757171 kg; name water_completely_softened; = factor_MJ_kWh*0.006; lognormal variance with pedigree 0.054, pedigree (4,5,4,5,3)
  Literature value/calculated value. Feed water for the steam circuit lost when producing 1kWh of electricity from lignite, based on the value for burning 1MJ of lignite. Röder et al. 2007, Tab. 9.65 and Tab. 9.66, p. 160f.
  properties: wet mass 1 kg
- petroleum coke: 0.00175411 kg; name petroleum_coke; = factor_MJ_kWh*0.000139; lognormal variance with pedigree 0.0046, pedigree (2,1,3,5,1)
  Literature value/calculated value. Petroleum coke use when producing 1kWh of electricity from lignite, based on the value for burning 1MJ of lignite. Weighted average with electricity production data (Itten&Frischknecht 2012) and values of 10 countries
  (AT, BA, CZ, DE, ES, FR, HU, PL, SI, SK) (Röder et al. 2007)
  Source:
  Itten R. and Frischknecht R. (2012) Life Cycle Inventories of Electricity Mixes and Grid. ESU-services Ltd., Uster, Switzerland.
  properties: carbon content, fossil 0.885, dry mass 1 kg, wet mass 1 kg
- SOx retained, in lignite flue gas desulfurisation: 0 kg; name sox_retained; source Itten R. 2012; uniform min 0, max 0, pedigree (4,4,5,5,4)
  No/negligible De-SOx filter installed in Indian power plants as in 2012.
  properties: dry mass 1 kg, wet mass 1 kg
- chlorine, liquid: 0 kg; pedigree (1,1,3,1,1)
  Exchange present due to parent child relationship
- lignite power plant: 1e-11 unit; name lignite_power_plant; = 1/(200000*500*1000); source Röder, A. 2007, p. p.99; lognormal variance with pedigree 0.3686, pedigree (5,3,4,5,3)
  Calculated value. At the moment, the lignite power plant input consists out of mix of a 100MWe power plant (30%) and a 500MWe power plant (70%).
  For this calculation, 6000 load hours per year are assumed. It is assumed that a total of 200'000h is reached during the lifetime. A capacity of 500MW is taken for the calculation.

## Inputs from nature
- Water, cooling, unspecified natural origin [natural resource, in water]: 0.0566618 m3; name water_cooling_UNO_input; = ((recirculating_CS_fraction_from_allCS*WWithdrawal_EP_HC_recirculating_CS)+(once_through_andCP_CS_fractio_from_allCS*WWithdrawal_EP_HC_once_through_andCP_CS))/11.52*factor_MJ_kWh; lognormal variance with pedigree 0.098025, pedigree (4,4,4,2,4)
  Calculated based on literature data.

## Emissions to nature
- Sulfur dioxide [air, non-urban air or from high stacks]: 0.00242295 kg; name sulfur_dioxide; = factor_MJ_kWh*0.000192; source Guttikunda, S. K. 2014; lognormal variance with pedigree 0.013025, pedigree (3,1,3,2,3)
  Calculated value. The emission is calculated as a product of input of fuel and corresponding emission factor (0.000192 kg/MJ).
- Thorium-228 [air, non-urban air or from high stacks]: 8.7958e-6 kBq; name thorium_228; = factor_MJ_kWh*0.000000697; lognormal variance with pedigree 0.3986, pedigree (5,3,4,5,3)
  Literature value/calculated value. Emissions when producing 1kWh of electricity from lignite, based on the value for burning 1MJ of lignite. Weighted average with electricity production data (Itten&Frischknecht 2012) and emission values of 10 countries
  (AT, BA, CZ, DE, ES, FR, HU, PL, SI, SK) (Röder et al. 2007)
  Country emissions values calculated from trace element balance, input uncertain
  Source:
  Itten R. and Frischknecht R. (2012) Life Cycle Inventories of Electricity Mixes and Grid. ESU-services Ltd., Uster, Switzerland.
- Boron [air, non-urban air or from high stacks]: 2.35985e-5 kg; name boron; = factor_MJ_kWh*0.00000187; lognormal variance with pedigree 0.7486, pedigree (5,3,4,5,3)
  (same comment as for Thorium-228)
- Selenium [air, non-urban air or from high stacks]: 1.5522e-7 kg; name selenium; = factor_MJ_kWh*0.0000000123; lognormal variance with pedigree 0.7486, pedigree (5,3,4,5,3)
  (same comment as for Thorium-228)
- Manganese [air, non-urban air or from high stacks]: 1.06761e-7 kg; name manganese; = factor_MJ_kWh*0.00000000846; lognormal variance with pedigree 0.7486, pedigree (5,3,4,5,3)
  (same comment as for Thorium-228)
- Potassium-40 [air, non-urban air or from high stacks]: 3.65966e-5 kBq; name potassium_40; = factor_MJ_kWh*0.0000029; lognormal variance with pedigree 0.3986, pedigree (5,3,4,5,3)
  Literature value/calculated value. Emissions when producing 1kWh of electricity from lignite, based on the value for burning 1MJ of lignite. Weighted average with electricity production data (Itten&Frischknecht 2012) and emission values of 10 countries
  (AT, BA, CZ, DE, ES, FR, HU, PL, SI, SK) (Röder et al. 2007)
  Source:
  Itten R. and Frischknecht R. (2012) Life Cycle Inventories of Electricity Mixes and Grid. ESU-services Ltd., Uster, Switzerland.
- Benzo(a)pyrene [air, non-urban air or from high stacks]: 2.5239e-12 kg; name benzo_a_pyrene; = factor_MJ_kWh*0.0000000000002; lognormal variance with pedigree 0.08, pedigree (3,5,4,5,1)
  Literature value/calculated value. Emissions when producing 1kWh of electricity from lignite, based on the value for burning 1MJ of lignite. Weighted average with electricity production data (Itten&Frischknecht 2012) and emission values of 10 countries
  (AT, BA, CZ, DE, ES, FR, HU, PL, SI, SK) (Röder et al. 2007)
  Country emissions values based on literature.
  Source:
  Itten R. and Frischknecht R. (2012) Life Cycle Inventories of Electricity Mixes and Grid. ESU-services Ltd., Uster, Switzerland.
- Carbon dioxide, fossil [air, non-urban air or from high stacks]: 1.34019 kg; name carbon_dioxide_fossil; = factor_MJ_kWh*0.1062; source Guttikunda, S. K. 2014; lognormal variance with pedigree 0.013025, pedigree (3,1,3,2,3)
  Calculated value. The emission is calculated as a product of input of fuel and corresponding emission factor (0.1062 kg/MJ).
- Xylene [air, non-urban air or from high stacks]: 1.16352e-5 kg; name xylene; = factor_MJ_kWh*0.000000922; lognormal variance with pedigree 0.08, pedigree (3,5,4,5,1)
  (same comment as for Benzo(a)pyrene)
- Radon-220 [air, non-urban air or from high stacks]: 0.00160268 kBq; name radon_220; = factor_MJ_kWh*0.000127; lognormal variance with pedigree 0.3986, pedigree (5,3,4,5,3)
  (same comment as for Thorium-228)
- Ethane [air, non-urban air or from high stacks]: 5.174e-7 kg; name ethane; = factor_MJ_kWh*0.000000041; lognormal variance with pedigree 0.08, pedigree (3,5,4,5,1)
  (same comment as for Benzo(a)pyrene)
- Water [water, unspecified]: 0.0574765 m3; name water_to_water_unspecified; = (water_completely_softened/1000)*(1-fraction_WCS_to_air)+(water_decarbonised_user/1000)*(1-fraction_WDC_to_air)+water_cooling_UNO_input*(1-fraction_CW_to_air); lognormal variance with pedigree 0.098025, pedigree (4,4,4,2,4)
  Calculated value based on literature values and expert opinion. See comments in the parametres' comment field.
  property fraction, origin: salt water 0; name fraction_origin_salt_water_Ww
  property fraction, origin: unspecified 0.956282; name fraction_origin_unspecified_Ww
  property fraction, origin: fresh water 0.0437175; name fraction_origin_fresh_water_Ww
- Particulates, > 2.5 um, and < 10um [air, non-urban air or from high stacks]: 0.000259962 kg; name particulates_2_5_to_10; = (factor_MJ_kWh*0.000068+ factor_MJ_kWh*0.000138)*0.10; source Röder, A. 2007; lognormal variance with pedigree 0.013025, pedigree (3,1,3,2,3)
  Calculated value. The emission is calculated as a product of input of fuel and corresponding emission factor of particulates. However, emission factors were available only for particulates >10 um (0.000138 kg/MJ) and particulates <2.5 um (0.000068 kg/MJ). Total calculated particulate emission is again distributed among the three classes such as PM<2.5, PM 2.5-10, and PM>10 in the proportion of 85%, 10%, and 5% respectively according to the ecoinvent report “Kohle” for v2.2 (Röder, Bauer, & Dones). Guttikunda, S. K., & Jawahar, P. (2014). Atmospheric emissions and pollution from the coal-fired thermal power plants in India. Atmospheric Environment (92), 449-460.
- Water [air, unspecified]: 0.00178493 m3; name water_to_air_unspecified; = (water_completely_softened/1000)*fraction_WCS_to_air+(water_decarbonised_user/1000)*fraction_WDC_to_air+water_cooling_UNO_input*fraction_CW_to_air; lognormal variance with pedigree 0.098025, pedigree (4,4,4,2,4)
  (same comment as for Water)
  property fraction, origin: unspecified 0.951263; name fraction_origin_unspecified
  property fraction, origin: salt water 0; name fraction_origin_salt_water
  property fraction, origin: fresh water 0.0487374; name fraction_origin_fresh_water
- Nickel [air, non-urban air or from high stacks]: 1.28719e-7 kg; name nickel; = factor_MJ_kWh*0.0000000102; lognormal variance with pedigree 0.7486, pedigree (5,3,4,5,3)
  (same comment as for Thorium-228)
- Radon-222 [air, non-urban air or from high stacks]: 0.00283939 kBq; name radon_222; = factor_MJ_kWh*0.000225; lognormal variance with pedigree 0.3986, pedigree (5,3,4,5,3)
  (same comment as for Thorium-228)
- Dinitrogen monoxide [air, non-urban air or from high stacks]: 1.82983e-5 kg; name dinitrogen_monoxide; = factor_MJ_kWh*0.00000145; lognormal variance with pedigree 0.074, pedigree (3,4,4,5,1)
  (same comment as for Benzo(a)pyrene)
- Carbon monoxide, fossil [air, non-urban air or from high stacks]: 0.00126195 kg; name carbon_monoxide_fossil; = factor_MJ_kWh*0.0001; source Guttikunda, S. K. 2014; lognormal variance with pedigree 0.013025, pedigree (3,1,3,2,3)
  Calculated value. The emission is calculated as a product of input of fuel and corresponding emission factor (0.0001 kg/MJ).
- Benzene [air, non-urban air or from high stacks]: 2.73843e-6 kg; name benzene; = factor_MJ_kWh*0.000000217; lognormal variance with pedigree 0.088, pedigree (3,5,4,5,3)
  (same comment as for Benzo(a)pyrene)
- Chromium VI [air, non-urban air or from high stacks]: 4.05086e-9 kg; name chromium_vi; = factor_MJ_kWh*0.000000000321; lognormal variance with pedigree 0.5006, pedigree (3,3,4,5,3)
  Literature value/calculated value. Emissions when producing 1kWh of electricity from lignite, based on the value for burning 1MJ of lignite. Weighted average with electricity production data (Itten&Frischknecht 2012) and emission values of 10 countries
  (AT, BA, CZ, DE, ES, FR, HU, PL, SI, SK) (Röder et al. 2007)
  Country emissions values based on range of data.
  Source:
  Itten R. and Frischknecht R. (2012) Life Cycle Inventories of Electricity Mixes and Grid. ESU-services Ltd., Uster, Switzerland.
- Copper [air, non-urban air or from high stacks]: 9.33844e-8 kg; name copper; = factor_MJ_kWh*0.0000000074; lognormal variance with pedigree 0.7486, pedigree (5,3,4,5,3)
  (same comment as for Thorium-228)
- Hydrogen fluoride [air, non-urban air or from high stacks]: 1.70363e-5 kg; name hydrogen_fluoride; = factor_MJ_kWh*0.00000135; lognormal variance with pedigree 0.2186, pedigree (5,3,4,5,3)
  (same comment as for Thorium-228)
- Iodine [air, non-urban air or from high stacks]: 6.05737e-7 kg; name iodine; = factor_MJ_kWh*0.000000048; lognormal variance with pedigree 0.2186, pedigree (5,3,4,5,3)
  (same comment as for Thorium-228)
- Barium [air, non-urban air or from high stacks]: 1.95602e-7 kg; name barium; = factor_MJ_kWh*0.0000000155; lognormal variance with pedigree 0.7486, pedigree (5,3,4,5,3)
  (same comment as for Thorium-228)
- Methane, fossil [air, non-urban air or from high stacks]: 1.00956e-5 kg; name methane_fossil; = factor_MJ_kWh*0.0000008; source Guttikunda, S. K. 2014; lognormal variance with pedigree 0.013025, pedigree (3,1,3,2,3)
  Calculated value. The emission is calculated as a product of input of fuel and corresponding emission factor (0.0000008 kg/MJ).
- Particulates, < 2.5 um [air, non-urban air or from high stacks]: 0.00220968 kg; name particulates_lt2_5; = (factor_MJ_kWh*0.000068+ factor_MJ_kWh*0.000138)*0.85; source Guttikunda, S. K. 2014; lognormal variance with pedigree 0.013025, pedigree (3,1,3,2,3)
  (same comment as for Particulates, > 2.5 um, and < 10um)
- Hydrocarbons, aliphatic, alkanes, unspecified [air, non-urban air or from high stacks]: 2.76367e-6 kg; name hydrocarbons_al_al_unspec; = factor_MJ_kWh*0.000000219; lognormal variance with pedigree 0.08, pedigree (3,5,4,5,1)
  (same comment as for Benzo(a)pyrene)
- Strontium [air, non-urban air or from high stacks]: 1.72887e-7 kg; name strontium; = factor_MJ_kWh*0.0000000137; lognormal variance with pedigree 0.7486, pedigree (5,3,4,5,3)
  (same comment as for Thorium-228)
- Cobalt [air, non-urban air or from high stacks]: 6.7893e-9 kg; name cobalt; = factor_MJ_kWh*0.000000000538; lognormal variance with pedigree 0.7486, pedigree (5,3,4,5,3)
  (same comment as for Thorium-228)
- Bromine [air, non-urban air or from high stacks]: 8.3415e-7 kg; name bromine; = factor_MJ_kWh*0.0000000661; lognormal variance with pedigree 0.1806, pedigree (3,3,4,5,3)
  (same comment as for Thorium-228)
- Dioxins, measured as 2,3,7,8-tetrachlorodibenzo-p-dioxin [air, non-urban air or from high stacks]: 8.83366e-14 kg; name dioxins; = factor_MJ_kWh*0.000000000000007; lognormal variance with pedigree 0.34, pedigree (3,5,4,5,1)
  (same comment as for Benzo(a)pyrene)
- Cadmium [air, non-urban air or from high stacks]: 8.48031e-9 kg; name cadmium; = factor_MJ_kWh*0.000000000672; lognormal variance with pedigree 0.7486, pedigree (5,3,4,5,3)
  (same comment as for Thorium-228)
- Propane [air, non-urban air or from high stacks]: 4.41683e-7 kg; name propane; = factor_MJ_kWh*0.000000035; lognormal variance with pedigree 0.08, pedigree (3,5,4,5,1)
  (same comment as for Potassium-40)
- Formaldehyde [air, non-urban air or from high stacks]: 7.31932e-7 kg; name formaldehyde; = factor_MJ_kWh*0.000000058; lognormal variance with pedigree 0.08, pedigree (3,5,4,5,1)
  (same comment as for Benzo(a)pyrene)
- Particulates, > 10 um [air, non-urban air or from high stacks]: 0.000129981 kg; name particulates_gt10; = (factor_MJ_kWh*0.000068+ factor_MJ_kWh*0.000138)*0.05; source Röder, A. 2007; lognormal variance with pedigree 0.013025, pedigree (3,1,3,2,3)
  (same comment as for Particulates, > 2.5 um, and < 10um)
- Butane [air, non-urban air or from high stacks]: 2.39771e-7 kg; name butane; = factor_MJ_kWh*0.000000019; lognormal variance with pedigree 0.08, pedigree (3,5,4,5,1)
  (same comment as for Benzo(a)pyrene)
- Arsenic [air, non-urban air or from high stacks]: 3.73538e-8 kg; name arsenic; = factor_MJ_kWh*0.00000000296; lognormal variance with pedigree 0.7486, pedigree (5,3,4,5,3)
  (same comment as for Thorium-228)
- Zinc [air, non-urban air or from high stacks]: 2.19579e-7 kg; name zinc; = factor_MJ_kWh*0.0000000174; lognormal variance with pedigree 0.7486, pedigree (5,3,4,5,3)
  (same comment as for Thorium-228)
- Pentane [air, non-urban air or from high stacks]: 1.85507e-6 kg; name pentane; = factor_MJ_kWh*0.000000147; lognormal variance with pedigree 0.08, pedigree (3,5,4,5,1)
  (same comment as for Benzo(a)pyrene)
- Chromium [air, non-urban air or from high stacks]: 3.35679e-8 kg; name chromium; = factor_MJ_kWh*0.00000000266; lognormal variance with pedigree 0.7486, pedigree (5,3,4,5,3)
  (same comment as for Thorium-228)
- Thorium-232 [air, non-urban air or from high stacks]: 1.38815e-5 kBq; name thorium_232; = factor_MJ_kWh*0.0000011; lognormal variance with pedigree 0.3986, pedigree (5,3,4,5,3)
  (same comment as for Thorium-228)
- Nitrogen oxides [air, non-urban air or from high stacks]: 0.00238509 kg; name nitrogen_oxides; = factor_MJ_kWh*0.000189; source Guttikunda, S. K. 2014; lognormal variance with pedigree 0.013025, pedigree (3,1,3,2,3)
  Calculated value. The emission is calculated as a product of input of fuel and corresponding emission factor (0.000189 kg/MJ).
- Hydrocarbons, aliphatic, unsaturated [air, non-urban air or from high stacks]: 2.72581e-6 kg; name hydrocarbons_aliphatic_unsaturated; = factor_MJ_kWh*0.000000216; lognormal variance with pedigree 0.08, pedigree (3,5,4,5,1)
  (same comment as for Benzo(a)pyrene)
- Toluene [air, non-urban air or from high stacks]: 1.37553e-6 kg; name toluene; = factor_MJ_kWh*0.000000109; lognormal variance with pedigree 0.08, pedigree (3,5,4,5,1)
  (same comment as for Benzo(a)pyrene)
- Mercury [air, non-urban air or from high stacks]: 6.82716e-8 kg; name mercury; = factor_MJ_kWh*0.00000000541; lognormal variance with pedigree 0.7486, pedigree (5,3,4,5,3)
  (same comment as for Thorium-228)
- Lead-210 [air, non-urban air or from high stacks]: 0.000105625 kBq; name lead_210; = factor_MJ_kWh*0.00000837; lognormal variance with pedigree 0.3986, pedigree (5,3,4,5,3)
  (same comment as for Thorium-228)
- Hydrogen chloride [air, non-urban air or from high stacks]: 7.13002e-5 kg; name hydrogen_chloride; = factor_MJ_kWh*0.00000565; lognormal variance with pedigree 0.2186, pedigree (5,3,4,5,3)
  (same comment as for Thorium-228)
- Uranium-238 [air, non-urban air or from high stacks]: 2.27151e-5 kBq; name uranium_238; = factor_MJ_kWh*0.0000018; lognormal variance with pedigree 0.3986, pedigree (5,3,4,5,3)
  (same comment as for Thorium-228)
- PAH, polycyclic aromatic hydrocarbons [air, non-urban air or from high stacks]: 1.26195e-8 kg; name pah; = factor_MJ_kWh*0.000000001; lognormal variance with pedigree 0.34, pedigree (3,5,4,5,1)
  (same comment as for Benzo(a)pyrene)
- Polonium-210 [air, non-urban air or from high stacks]: 0.000193079 kBq; name polonium_210; = factor_MJ_kWh*0.0000153; lognormal variance with pedigree 0.3986, pedigree (5,3,4,5,3)
  (same comment as for Potassium-40)
- Antimony [air, non-urban air or from high stacks]: 6.58738e-9 kg; name antimony; = factor_MJ_kWh*0.000000000522; lognormal variance with pedigree 0.7486, pedigree (5,3,4,5,3)
  (same comment as for Thorium-228)
- Propene [air, non-urban air or from high stacks]: 2.01912e-7 kg; name propene; = factor_MJ_kWh*0.000000016; lognormal variance with pedigree 0.08, pedigree (3,5,4,5,1)
  (same comment as for Potassium-40)
- Lead [air, non-urban air or from high stacks]: 3.28107e-8 kg; name lead; = factor_MJ_kWh*0.0000000026; lognormal variance with pedigree 0.7486, pedigree (5,3,4,5,3)
  (same comment as for Thorium-228)
- Molybdenum [air, non-urban air or from high stacks]: 2.03174e-8 kg; name molybdenum; = factor_MJ_kWh*0.00000000161; lognormal variance with pedigree 0.7486, pedigree (5,3,4,5,3)
  (same comment as for Thorium-228)
- Radium-226 [air, non-urban air or from high stacks]: 2.72581e-5 kBq; name radium_226; = factor_MJ_kWh*0.00000216; lognormal variance with pedigree 0.3907, pedigree (3,3,5,3,3)
  (same comment as for Thorium-228)
- Vanadium [air, non-urban air or from high stacks]: 4.25278e-8 kg; name vanadium; = factor_MJ_kWh*0.00000000337; lognormal variance with pedigree 0.7486, pedigree (5,3,4,5,3)
  (same comment as for Thorium-228)
- Radium-228 [air, non-urban air or from high stacks]: 1.62792e-5 kBq; name radium_228; = factor_MJ_kWh*0.00000129; lognormal variance with pedigree 0.3986, pedigree (5,3,4,5,3)
  (same comment as for Thorium-228)

## Sampling procedure
The inventory is generated using statistical data, literature data and modelling.

## Extrapolations
Data from 1993 have been updated for the years 2000 (v1.0), and 2004-2005 (v2.0). Uncertainty was adjusted accordingly.

Most of the exchanges were extrapolated through production-weighted averages of the datasets of the following 14 countries: AT, BE, ES, FR, IT, NL, PT, DE, CZ, HR, PL, SK, CN, US.

The original data were valid for the burning of 1MJ of lignite. In this dataset, the values are scaled to the net output of 1kWh of electricity, based on the electrical efficiency.The inventory is generated using statistical data, literature data and modelling.

## Review by Karin Treyer 2016-12-20
This dataset has been produced in a project on regionalisation of the Indian electricity mix on a states level.
In general, only key parameters have been adjusted to region-specific conditions, such as the electrical efficiency or power plants own use of electricity (losses from gross to net electricity). In the case of lignite, the value for the electrical efficiency is the same for all states. Whenever more accurate data will be available on this efficiency value or e.g. region-specific emissions from power plants, these should be included in this dataset.

## Review by Carl Vadenbo 2015-06-20
The update of the whole electricity sector for the ecoinvent v3.2 database consist of hundreds of datasets. All these datasets have passed through a streamlined review processes where the underlying modelling of production volumes, technology shares and efficiencies was reviewed in detail prior to the datasets being submitted to the database.
