# white spirit production, petroleum refinery operation

Dataset: EcoSpold 2, unit process
Geography: IN
Time period: 2014-01-01 to 2019-12-31
Technology level: current
Classification: ISIC rev.4 ecoinvent: 1920:Manufacture of refined petroleum products
Scenario: Business-as-Usual
System model: Allocation at the point of substitution
Generated by: Axel Liebich
Published in: Fehrenbach, H. 2018
Database: ecoinvent
isCopyrightProtected: true
accessRestrictedTo: 1

## General comment
This dataset describes the operation of a typical oil refinery in the given geography. Since refineries are very complex the actual unit process modeling is done in a separate refinery model by ifeu and this is a subdivided product-specific dataset.
The ifeu refinery model reproduces the complexity of petroleum refinery plants in which the combination and sequence of processes are usually very specific to the characteristics of the raw materials (i.e. the close relation between the composition of the crude oil and the products to be produced). Refineries differ not only in their configurations, process integration, feedstocks, product mixes, unit sizes, designs, and control systems but also the market situations, locations and ages of the refinery or environmental regulations can result in a wide variety of refinery concepts. It represents the current European state-of-the-art. The basic setting of the model reflects the technical characteristics of European refineries as described in the BREF - BAT reference document for the Refining of Mineral Oil and Gas. Further specific data was collected from companies and production plants and was incorporated in order to elaborate a comprehensive and robust model of a refinery.
The BREF contains not only aggregated numbers or weighted averages of emission and energy or water consumptions, but also encompasses primary data of the majority of refineries in Europe in anonymous form. The data quality is excellent. This data source has been complemented by various specific confidential refinery datasets, by values from Eurostat (e.g. in the case of the energy source mix or process energy), and by literature data. In the case of the BREF, a range of values were mentioned as process parameters for which the arithmetic averages were applied. After adapting the model to the up-to-date mass and energy flows within the European refineries, it has been validated and calibrated by comparing the results to the dataset of the BREF, the Eurostat and the European Pollutant Release and Transfer Register (E-PRTR).
Despite the default settings (weighted EU average), the refinery model was adjusted to fit typical refinery production data in the special geographies. In order to do this data from the refineries in the countries was analysed and an assessment of the refinery complexity (according to the BREF classes) was done. Furthermore crude oil qualities were researched an adjusted (e.g. sulphur content and API class) to fit the specified geography.
Documentation for this model can be found in the ecoinvent refinery report by Fehrenbach et al. (2018).

## Included activities start
Activity starts with crude oil entering the petroleum refinery. Waste water treatment, fresh water supply (from nature), refinery infrastructure, crude oil and product storage on refinery grounds and energy provision is included.

## Included activities end
Activity ends with refinery products leaving the petroleum refinery.

## Allocation
Mineral oil refineries are highly integrated multi-output production plants where nearly each process step creates a few co-products.
Unlike many other refinery models, which tend to consider a refinery as a black-box, here a step by step calculation of the complex network of refinery processes was done and gives an integrated sum of all connected processes. The allocation is executed within each of these steps allowing the implementation of the allocation rules at process step level separately and globally, over the system of all steps.
The allocation approach implemented within the ifeu refinery model is designed to consider the complexity of the production system, the valuation of the products (upgrading/downgrading of feedstock material during a specific process), real physical mass flows. The combined allocation procedure is stated by the following sequence of four rules:
1. the general allocation rule refers to the energy content (Rationale: the majority of refinery products are used for energy purposes.)
2. The expenditures for the first step of separation (atmospheric distillation) are allocated to all co-products, including the atmospheric residue (Rationale: all co-products from atmospheric distillation will end up in marketable final products.)
3. The expenditures for any subsequent process step intended to reduce the quantity of non-intended products (i.e. vacuum distillation and cracking) are allocated to all co-products except for the non-intended products (residues). (Rationale: all these downstream processes within the refinery are intended to reduce non-intended products in favour to increase the yield of non-residual co-products; hence, the expenditures are only allocated to the yielded products.)
4. Retention of feedstock: The 3rd rule refers to the allocation of the respective process expenditures; it does not include the allocation of feedstocks. The input material (feedstock) into a refinery process step is always allocated according to the 1st rule: e.g. visbreaker residue takes 40 % energy content of the totalized co-product output of a visbreaker cracker output therefore 40 % of the visbreaker input (vacuum distillate) and its upstream burden is allocated to the visbreaker residue . (Rationale: Although the downstream processing steps are not intended to produce residues only to reduce them, the residual final products derived from residues (e.g. heavy fuel oil, petroleum coke) are defined as refinery products and not as wastes; if the 3rd rule would apply also for the allocation of feedstock, all final products from non-intended products (residues) would finally achieve LCIs with zero expenditures and emission; de facto they would be treated the same way as waste.)
The combined allocation procedure involves following consequences:
• The LCI of every refinery product encloses at least 1 MJ crude oil per MJ product feedstock; considering that some refinery products have lower LHVs than crude oil (e.g. petroleum coke or heavy fuel oil), such refinery products enclose less than 1 kg crude oil per kg product;
• Final products with relevant shares derived from sequential processing accumulate higher loads than products predominantly derived from straight-run;
• An exception is the heavy products derived from non-intended products, even if they pass a cascade of cracking processes; without rule 3 and 4 heavy fuel oil would turn out to be the product with the highest burden, which would contradict any value-based perception of the refining business.

## Geography
Global model calibrated with country specific information.

## Technology
The technology represents a weighted average of BREF types II and IV refineries; API 35; sulfur content 1.39%

## Reference product
- white spirit: 1 kg; name RP_amount; CPC 33350: White spirit and special boiling point industrial spirits; By-product classification allocatable product
  production volume 1.03121e8 kg; name RP_PV; = 245526607334*0.42/1000
    The annual production volume of the reference product was revised by setting it equal to the annual crude petroleum throughput in India (2.46E11 kg in 2016 according to BP (2017)) multiplied by the relative output amount of the reference product (as found in this inventory).
    Reference(s): BP, 2017, BP Statistical Review of World Energy June 2017, online at https://www.bp.com/content/dam/bp-country/de_ch/PDF/bp-statistical-review-of-world-energy-2017-full-report.pdf, accessed March 2019)
  property carbon content, fossil 0.863404
    The most common variety of white spirit is a mixture of saturated aliphatic and alicyclic C7-C12 hydrocarbons with a content of 15-20% (by weight) of aromatic C7-C12 hydrocarbons (ecoinvent v2.2 report 8-part 94). The average composition was assumed as being 82.5% C9.5 saturated aliphatic and alicyclic hydrocarbons (average formula C9.5H20), and 17.5% C9.5 aromatic hydrocarbons (average formula C9.5H9.5).
  property price 0.281208 EUR2005
    Calculated based on inputs: The price of the product has been calculated as a sum of the values of the material and energy inputs for this product. This value is therefore a rough estimation. It may underestimate the real price since there are additional expenses when producing any product. These expences can include for example labour costs, treatment of waste materials and profit for the producer. Please consider carefully whether this level of data quality is acceptable for your application. Cross-reference: The consumer price for white spirit is 6.8 EURO for 4kg. (http://www.homebase.co.uk/en/homebaseuk/value-white-spirit---4l-074430 , accessed 20160421)
  property carbon content 0.863404
    carbon content on a dry matter basis (reserved; not for manual entry)
  property true value 0.119096; name RP_amount_true_value
    allocation property applied in "true value" allocation // value calculated from revenue
  properties: dry mass 1 kg, water in wet mass 0 kg, wet mass 1 kg, water content 0, carbon content, non-fossil 0, carbon allocation 0.863404 kg

## By-products
- heat, for reuse in municipal waste incineration only: 0 MJ; CPC 17300: Steam and hot water; By-product classification allocatable product; pedigree (1,1,1,1,1)
  Net electricity generated from this waste and used in internal MSWI plant energy redistribution.
  Uncertainty: uncertainty is calculated from uncertainties in waste composition and uncertainties in energy efficiency and the uncertainty in internal energy demand
  production volume 0.305824 MJ
  property exergy 0.1842 MJ; name E_th_prod_MSWI_exergy
    This exergy property is based on the exergy content of the product.
  property price 0.0106 EUR2005; name E_th_prod_MSWI_price_EUR2005
    Average European district heat price from Ecoheatcool and Euroheat 2005-2006, Ecoheat Work package 1: The European heat market. Final report. 10.6 EUR/GJ i s the price of district heat. http://www.solarthermalworld.org/files/Ecoheatcool%20WP1%20Web.pdf?download
  property true value relation 0.1842; name E_th_prod_MSWI_true_value_relation
    property to calculate "true value" from
  property true value 8.26199e-12
    allocation property applied in "true value" allocation // value calculated from true value relation
- electricity, for reuse in municipal waste incineration only: 0 kWh; CPC 17100: Electrical energy; By-product classification allocatable product; pedigree (1,1,1,1,1)
  (same comment as for heat, for reuse in municipal waste incineration only)
  production volume 0.0430683 kWh
  property true value relation 3.6; name E_el_prod_MSWI_true_value_relation
    property to calculate "true value" from
  property price 0.1 EUR2005; name E_el_prod_MSWI_price_EUR2005
    Estimated to be the same price as in case of electricity, medium voltage.
  property exergy 3.6 MJ; name E_el_prod_MSWI_exergy
    This exergy property is based on the exergy content of the product.
  property true value 2.27396e-11
    (same comment as for heat, for reuse in municipal waste incineration only)

## Inputs from technosphere
- kaolin: 4.3965e-5 kg; lognormal variance with pedigree 0.0053, pedigree (3,2,3,1,2)
  properties: dry mass 1 kg, wet mass 1 kg
- petroleum: 1.0821 kg; lognormal variance with pedigree 0.0053, pedigree (3,2,3,1,2)
  domestic share 16%; imports mainly from Saudi Arabia, Iraq, Iran and Nigeria
  properties: wet mass 1 kg, dry mass 1 kg, carbon content, fossil 0.85
- silicone product: 4.3965e-5 kg; lognormal variance with pedigree 0.0053, pedigree (3,2,3,1,2)
  properties: wet mass 1 kg, dry mass 1 kg, carbon content, fossil 0.324324
- nickel, 99.5%: 4.3965e-6 kg; lognormal variance with pedigree 0.0053, pedigree (3,2,3,1,2)
  properties: dry mass 1 kg, wet mass 1 kg
- waste gypsum: -9.09804e-5 kg; name BP3_amount
  production volume 9382.01 kg; = RP_PV*(BP3_amount/RP_amount)
    Production volume was calculated with the reference product production volume and amount, and the byproduct amount.
  properties: water content 0.240695, dry mass 0.806 kg, wet mass 1 kg
- natural gas, high pressure: 0.000215053 m3; lognormal variance with pedigree 0.0053, pedigree (3,2,3,1,2)
  properties: dry mass 0.84 kg, wet mass 0.84 kg, carbon content, fossil 0.602381
  note on carbon content, fossil: An average C content of 0.506 kg C/ m3 has been assumed (this average has been calculated using data in Tab 3.5, ecoinvent v2.2 report 6_V
- hazardous waste, for underground deposit: -0.000427595 kg; name BP1_amount
  production volume 44094.1 kg; = RP_PV*(BP1_amount/RP_amount)
    (same comment as for waste gypsum)
  properties: wet mass 1 kg, carbon content, fossil 0.554667, dry mass 1 kg
  note on carbon content, fossil: Tab A.6, ecoinvent v2.2 report 13_I, average hazardous waste composition was used, and referred to 0% water mass. No waste-specific emission are currently inventoried for underground deposits. Accordingly, no waste composition must be specified. For generic, average waste to underground deposit deposition in a 200 liter steel drum without cement solidification is assumed (ecoinvent v2.2 report 13_I).
- lanthanum oxide: 4.3965e-6 kg; lognormal variance with pedigree 0.0053, pedigree (3,2,3,1,2)
  properties: dry mass 1 kg, wet mass 1 kg
- sodium hydroxide, without water, in 50% solution state: 5.88287e-5 kg; lognormal variance with pedigree 0.0053, pedigree (3,2,3,1,2)
  properties: dry mass 1 kg, wet mass 1 kg
- hydrochloric acid, without water, in 30% solution state: 8.13803e-5 kg; lognormal variance with pedigree 0.0053, pedigree (3,2,3,1,2)
  properties: wet mass 1 kg, dry mass 1 kg
- hazardous waste, for incineration: -0.000311773 kg; name BP2_amount
  production volume 32150.4 kg; = RP_PV*(BP2_amount/RP_amount)
    (same comment as for waste gypsum)
  properties: dry mass 0.75 kg, wet mass 1 kg, water content 0.333333, carbon content, fossil 0.554667
  note on carbon content, fossil: Tab A.6, ecoinvent v2.2 report 13_I. C content has been calculated after data in the tables, and then referred to 1 kg DM
- lime, hydrated, packed: 0.000112934 kg; lognormal variance with pedigree 0.0053, pedigree (3,2,3,1,2)
  properties: wet mass 1 kg, dry mass 0.997 kg, water content 0.00300903
- aluminium oxide, non-metallurgical: 0.000210966 kg; lognormal variance with pedigree 0.0053, pedigree (3,2,3,1,2)
  properties: wet mass 1 kg, dry mass 1 kg
- refinery sludge: -0.000641687 kg; name BP4_amount
  production volume 66171.6 kg; = RP_PV*(BP4_amount/RP_amount)
    (same comment as for waste gypsum)
  properties: carbon content, fossil 0.767857, dry mass 0.105 kg, wet mass 1 kg, water content 8.52381
- petroleum refinery: 5.90196e-12 unit; lognormal variance with pedigree 0.3047, pedigree (3,2,3,1,2)
  properties: lifetime capacity [kg] 3e10 kg
- molybdenum trioxide: 4.3965e-6 kg; lognormal variance with pedigree 0.0053, pedigree (3,2,3,1,2)
  properties: bismuth content 8e-5, iron content 0.0044, copper content 0.0006, oxygen content 0.29, lead content 0.00015, sulfur content 0.0003, molecular weight 143.9 g/mol, molybdenum content 0.62
- quicklime, milled, packed: 2.52524e-5 kg; lognormal variance with pedigree 0.0053, pedigree (3,2,3,1,2)
  properties: dry mass 0.99 kg, water content 0.010101, wet mass 1 kg
- zeolite, powder: 0.000123102 kg; lognormal variance with pedigree 0.0053, pedigree (3,2,3,1,2)
  properties: wet mass 1 kg, dry mass 1 kg
- cobalt: 4.3965e-6 kg; lognormal variance with pedigree 0.0053, pedigree (3,2,3,1,2)
  properties: dry mass 1 kg, wet mass 1 kg
- platinum: 6.59475e-8 kg; lognormal variance with pedigree 0.0053, pedigree (3,2,3,1,2)
  properties: wet mass 1 kg, dry mass 1 kg

## Inputs from nature
- Water, cooling, unspecified natural origin [natural resource, in water]: 0.00558527 m3; lognormal variance with pedigree 0.0053, pedigree (3,2,3,1,2)
- Water, unspecified natural origin [natural resource, in water]: 0.000358588 m3; lognormal variance with pedigree 0.0053, pedigree (3,2,3,1,2)

## Emissions to nature
- Aluminium [water, unspecified]: 3.23417e-8 kg; lognormal variance with pedigree 0.0447, pedigree (3,2,3,1,2)
- Vanadium, ion [water, unspecified]: 7.65712e-9 kg; lognormal variance with pedigree 0.6547, pedigree (3,2,3,1,2)
- Cyanide [water, unspecified]: 5.74284e-9 kg; lognormal variance with pedigree 0.0447, pedigree (3,2,3,1,2)
- Cadmium, ion [water, unspecified]: 3.82856e-10 kg; lognormal variance with pedigree 0.0447, pedigree (3,2,3,1,2)
- Vanadium [air, unspecified]: 5.44102e-6 kg; lognormal variance with pedigree 0.6547, pedigree (3,2,3,1,2)
- Heat, waste [water, unspecified]: 0.0306321 MJ
- Water [water, ocean]: 0.00129361 m3; lognormal variance with pedigree 0.0447, pedigree (3,2,3,1,2)
- Toluene [air, unspecified]: 6.1028e-6 kg; lognormal variance with pedigree 0.0447, pedigree (3,2,3,1,2)
- Benzene [air, unspecified]: 3.77615e-6 kg; lognormal variance with pedigree 0.0447, pedigree (3,2,3,1,2)
- BOD5, Biological Oxygen Demand [water, unspecified]: 3.82856e-6 kg; lognormal variance with pedigree 0.0447, pedigree (3,2,3,1,2)
- Benzo(a)pyrene [air, unspecified]: 7.03563e-11 kg; lognormal variance with pedigree 0.0447, pedigree (3,2,3,1,2)
- Ammonium, ion [water, unspecified]: 8.03998e-7 kg; lognormal variance with pedigree 0.0447, pedigree (3,2,3,1,2)
- Tin [air, unspecified]: 5.48595e-8 kg; lognormal variance with pedigree 0.6547, pedigree (3,2,3,1,2)
- Water [water, surface water]: 0.000323402 m3; lognormal variance with pedigree 0.0447, pedigree (3,2,3,1,2)
- Zinc [air, unspecified]: 1.35771e-7 kg; lognormal variance with pedigree 0.0447, pedigree (3,2,3,1,2)
- Antimony [air, unspecified]: 5.7363e-9 kg; lognormal variance with pedigree 0.0447, pedigree (3,2,3,1,2)
- Boron [water, unspecified]: 1.53142e-7 kg; lognormal variance with pedigree 0.0447, pedigree (3,2,3,1,2)
- Ammonia [air, unspecified]: 2.08646e-6 kg; lognormal variance with pedigree 0.0447, pedigree (3,2,3,1,2)
- Arsenic [air, unspecified]: 3.83546e-8 kg; lognormal variance with pedigree 0.0447, pedigree (3,2,3,1,2)
- Arsenic, ion [water, unspecified]: 1.14857e-9 kg; lognormal variance with pedigree 0.0447, pedigree (3,2,3,1,2)
- AOX, Adsorbable Organic Halogen as Cl [water, unspecified]: 7.65712e-8 kg; lognormal variance with pedigree 0.0447, pedigree (3,2,3,1,2)
- Copper [air, unspecified]: 1.64427e-7 kg; lognormal variance with pedigree 0.6547, pedigree (3,2,3,1,2)
- Chromium, ion [water, unspecified]: 3.82856e-10 kg; lognormal variance with pedigree 0.6547, pedigree (3,2,3,1,2)
- COD, Chemical Oxygen Demand [water, unspecified]: 2.52685e-5 kg; lognormal variance with pedigree 0.6547, pedigree (3,2,3,1,2)
- DOC, Dissolved Organic Carbon [water, unspecified]: 5.25279e-6 kg; lognormal variance with pedigree 0.0447, pedigree (3,2,3,1,2)
  share of DOC to TOC is estimated with 98%
- Chromium [air, unspecified]: 5.47243e-8 kg; lognormal variance with pedigree 0.6547, pedigree (3,2,3,1,2)
- Mercury [water, unspecified]: 7.65712e-11 kg; lognormal variance with pedigree 0.6547, pedigree (3,2,3,1,2)
- Cobalt [air, unspecified]: 1.09449e-7 kg; lognormal variance with pedigree 0.6547, pedigree (3,2,3,1,2)
- Fluoride [water, unspecified]: 3.06285e-7 kg; lognormal variance with pedigree 0.0447, pedigree (3,2,3,1,2)
- Beryllium [air, unspecified]: 3.20747e-10 kg; lognormal variance with pedigree 0.0447, pedigree (3,2,3,1,2)
- Manganese [water, unspecified]: 3.06285e-8 kg; lognormal variance with pedigree 0.6547, pedigree (3,2,3,1,2)
- Manganese [air, unspecified]: 2.63224e-8 kg; lognormal variance with pedigree 0.6547, pedigree (3,2,3,1,2)
- Nickel, ion [water, unspecified]: 3.82856e-9 kg; lognormal variance with pedigree 0.6547, pedigree (3,2,3,1,2)
- Carbon monoxide, fossil [air, unspecified]: 0.000130204 kg; lognormal variance with pedigree 0.6547, pedigree (3,2,3,1,2)
- Lead [water, unspecified]: 3.82856e-10 kg; lognormal variance with pedigree 0.6547, pedigree (3,2,3,1,2)
- Cadmium [air, unspecified]: 5.32473e-8 kg; lognormal variance with pedigree 0.6547, pedigree (3,2,3,1,2)
- Iron, ion [water, unspecified]: 1.53142e-7 kg; lognormal variance with pedigree 0.0447, pedigree (3,2,3,1,2)
- Formaldehyde [air, unspecified]: 4.59072e-7 kg; lognormal variance with pedigree 0.0447, pedigree (3,2,3,1,2)
- PAH, polycyclic aromatic hydrocarbons [water, unspecified]: 2.67999e-10 kg; lognormal variance with pedigree 0.3047, pedigree (3,2,3,1,2)
- Barium [water, unspecified]: 7.69209e-8 kg; lognormal variance with pedigree 0.0447, pedigree (3,2,3,1,2)
- Hydrogen fluoride [air, unspecified]: 4.02531e-7 kg; lognormal variance with pedigree 0.0447, pedigree (3,2,3,1,2)
- Chloride [water, unspecified]: 0.000234808 kg; lognormal variance with pedigree 0.0447, pedigree (3,2,3,1,2)
- Phenol [water, unspecified]: 3.82856e-8 kg; lognormal variance with pedigree 0.0447, pedigree (3,2,3,1,2)
- Cobalt [water, unspecified]: 3.82856e-10 kg; lognormal variance with pedigree 0.0447, pedigree (3,2,3,1,2)
- Heat, waste [air, unspecified]: 0.515674 MJ; lognormal variance with pedigree 0.0447, pedigree (3,2,3,1,2)
- Nitrite [water, unspecified]: 2.33043e-8 kg; lognormal variance with pedigree 0.0447, pedigree (3,2,3,1,2)
- Hydrogen chloride [air, unspecified]: 4.28242e-6 kg; lognormal variance with pedigree 0.0447, pedigree (3,2,3,1,2)
- Nitrogen [water, unspecified]: 2.08858e-6 kg; lognormal variance with pedigree 0.0447, pedigree (3,2,3,1,2)
- Dinitrogen monoxide [air, unspecified]: 5.3684e-6 kg; lognormal variance with pedigree 0.0447, pedigree (3,2,3,1,2)
- Suspended solids, unspecified [water, unspecified]: 5.74284e-6 kg; lognormal variance with pedigree 0.0447, pedigree (3,2,3,1,2)
- Mercury [air, unspecified]: 1.57231e-9 kg; lognormal variance with pedigree 0.6547, pedigree (3,2,3,1,2)
- Molybdenum [water, unspecified]: 3.82856e-9 kg; lognormal variance with pedigree 0.6547, pedigree (3,2,3,1,2)
- Methane, fossil [air, unspecified]: 1.39879e-5 kg; lognormal variance with pedigree 0.0447, pedigree (3,2,3,1,2)
- Sulfide [water, unspecified]: 1.91428e-8 kg; lognormal variance with pedigree 0.0447, pedigree (3,2,3,1,2)
- Nickel [air, unspecified]: 2.19236e-6 kg; lognormal variance with pedigree 0.6547, pedigree (3,2,3,1,2)
- Sulfate [water, unspecified]: 0.000199557 kg; lognormal variance with pedigree 0.0447, pedigree (3,2,3,1,2)
- Lead [air, unspecified]: 2.18206e-7 kg; lognormal variance with pedigree 0.6547, pedigree (3,2,3,1,2)
- Nitrate [water, unspecified]: 1.46967e-7 kg; lognormal variance with pedigree 0.0447, pedigree (3,2,3,1,2)
- Benzene [water, unspecified]: 3.82856e-10 kg; lognormal variance with pedigree 0.0447, pedigree (3,2,3,1,2)
- NMVOC, non-methane volatile organic compounds, unspecified origin [air, unspecified]: 0.000250549 kg; lognormal variance with pedigree 0.0447, pedigree (3,2,3,1,2)
- Hydrocarbons, unspecified [water, unspecified]: 5.74284e-7 kg; lognormal variance with pedigree 0.3047, pedigree (3,2,3,1,2)
- Selenium [water, unspecified]: 1.53142e-8 kg; lognormal variance with pedigree 0.6547, pedigree (3,2,3,1,2)
- Hydrogen sulfide [air, unspecified]: 1.82523e-7 kg; lognormal variance with pedigree 0.0447, pedigree (3,2,3,1,2)
- Phosphorus [water, unspecified]: 2.29714e-7 kg; lognormal variance with pedigree 0.0447, pedigree (3,2,3,1,2)
- Particulates, < 2.5 um [air, unspecified]: 1.60339e-5 kg; lognormal variance with pedigree 0.3047, pedigree (3,2,3,1,2)
- Toluene [water, unspecified]: 1.14857e-9 kg; lognormal variance with pedigree 0.0447, pedigree (3,2,3,1,2)
- Particulates, > 2.5 um, and < 10um [air, unspecified]: 1.06562e-5 kg; lognormal variance with pedigree 0.1247, pedigree (3,2,3,1,2)
- Sodium, ion [water, unspecified]: 2.33881e-5 kg; lognormal variance with pedigree 0.0447, pedigree (3,2,3,1,2)
- Particulates, > 10 um [air, unspecified]: 0.000193423 kg; lognormal variance with pedigree 0.0447, pedigree (3,2,3,1,2)
- Zinc, ion [water, unspecified]: 1.14857e-8 kg; lognormal variance with pedigree 0.6547, pedigree (3,2,3,1,2)
- Nitrogen oxides [air, unspecified]: 0.000236971 kg; lognormal variance with pedigree 0.0447, pedigree (3,2,3,1,2)
- TOC, Total Organic Carbon [water, unspecified]: 5.35999e-6 kg; lognormal variance with pedigree 0.0447, pedigree (3,2,3,1,2)
- Sulfur dioxide [air, unspecified]: 0.000785684 kg; lognormal variance with pedigree 0.0107, pedigree (3,2,3,1,2)
- Xylene [water, unspecified]: 3.82856e-10 kg; lognormal variance with pedigree 0.6547, pedigree (3,2,3,1,2)
- Palladium [air, unspecified]: 3.18508e-10 kg; lognormal variance with pedigree 0.6547, pedigree (3,2,3,1,2)
- Tin, ion [water, unspecified]: 3.82856e-9 kg; lognormal variance with pedigree 0.6547, pedigree (3,2,3,1,2)
- Chromium VI [water, unspecified]: 7.65712e-10 kg; lognormal variance with pedigree 0.6547, pedigree (3,2,3,1,2)
- Tellurium [air, unspecified]: 3.35501e-10 kg; lognormal variance with pedigree 0.0447, pedigree (3,2,3,1,2)
- Copper, ion [water, unspecified]: 1.91428e-8 kg; lognormal variance with pedigree 0.0447, pedigree (3,2,3,1,2)
- t-Butyl methyl ether [water, unspecified]: 7.65712e-9 kg; lognormal variance with pedigree 0.0447, pedigree (3,2,3,1,2)
- Thallium [air, unspecified]: 1.63479e-8 kg; lognormal variance with pedigree 0.6547, pedigree (3,2,3,1,2)
- Dioxins, measured as 2,3,7,8-tetrachlorodibenzo-p-dioxin [air, unspecified]: 1.18474e-15 kg; lognormal variance with pedigree 0.0447, pedigree (3,2,3,1,2)
- Platinum [air, unspecified]: 3.18508e-10 kg; lognormal variance with pedigree 0.6547, pedigree (3,2,3,1,2)
- Water [air, unspecified]: 3.95631e-5 m3; lognormal variance with pedigree 0.0447, pedigree (3,2,3,1,2)
- PAH, polycyclic aromatic hydrocarbons [air, unspecified]: 8.77321e-9 kg; lognormal variance with pedigree 0.3047, pedigree (3,2,3,1,2)
- Carbon dioxide, non-fossil [air, unspecified]: 7.79894e-5 kg; lognormal variance with pedigree 0.0053, pedigree (3,2,3,1,2)
- Rhodium [air, unspecified]: 3.18508e-10 kg; lognormal variance with pedigree 0.6547, pedigree (3,2,3,1,2)
- Carbonyl sulfide [air, unspecified]: 5.04083e-10 kg; lognormal variance with pedigree 0.0447, pedigree (3,2,3,1,2)
- Selenium [air, unspecified]: 2.51626e-8 kg; lognormal variance with pedigree 0.0447, pedigree (3,2,3,1,2)
- Cyanide [air, unspecified]: 1.07332e-10 kg; lognormal variance with pedigree 0.0447, pedigree (3,2,3,1,2)
- Xylene [air, unspecified]: 7.05847e-6 kg; lognormal variance with pedigree 0.0447, pedigree (3,2,3,1,2)
- Carbon dioxide, fossil [air, unspecified]: 0.182168 kg; lognormal variance with pedigree 0.0053, pedigree (3,2,3,1,2)
