# cement mortar production

Dataset: EcoSpold 2, unit process
Geography: CH
Time period: 1994-01-01 to 2019-12-31
Technology level: current
Classification: EcoSpold01Categories: mortar and plaster/production
Classification: ISIC rev.4 ecoinvent: 2394:Manufacture of cement, lime and plaster
Synonyms: compo
Tags: ConvertedDataset
Scenario: Business-as-Usual
System model: Allocation at the point of substitution
Generated by: Daniel Kellenberger (obsolete)
Published in: Kellenberger D. 2004
Database: ecoinvent
isCopyrightProtected: true
accessRestrictedTo: 1

## General comment
The raw materials are mixed in a certain ratio, transported to the packing installation and packed. No direct process emissions are taken into account as they play a subordinate role compared to the emissions of the raw material production (e.g. drying of silica sand) and because no data are available. For inventoring the infrastructure, a yearly production amount of 150'000 tons of an Austrian producer is assumed. The lifespan of the machines is assumed to be 20 years.
[This dataset was already contained in the ecoinvent database version 2. It was not individually updated during the transfer to ecoinvent version 3. Life Cycle Impact Assessment results may still have changed, as they are affected by changes in the supply chain, i.e. in other datasets. This dataset was generated following the ecoinvent quality guidelines for version 2. It may have been subject to central changes described in the ecoinvent version 3 change report (http://www.ecoinvent.org/database/ecoinvent-version-3/reports-of-changes/), and the results of the central updates were reviewed extensively. The changes added e.g. consistent water flows and other information throughout the database. The documentation of this dataset can be found in the ecoinvent reports of version 2, which are still available via the ecoinvent website. The change report linked above covers all central changes that were made during the conversion process.]

## Included activities end
Includes the whole manufacturing process to produce cement mortar (raw material provision, raw material mixing, packing, and storage), transports to plant, and infrastructure. No requirements for administration are included. No additional buildings and land-use have been taken into account as it is assumed that the mixing process takes place in an existing building of the sand/cement industry or on the construction site

## Geography
The amount of raw materials is based on the definition of the group of mortar III (cement mortar). The transportation distances are based on an average of four Swiss companies. For the infrastructure RER-modules are used as proxy

## Technology
Assumed average current technology. The raw materials are mixed in a certain ratio, transported to the packing installation and packed.

## Reference product
- cement mortar: 1 kg; CPC 37: Glass and glass products and other non-metallic products n.e.c.; By-product classification allocatable product
  production volume 1.0306e7 kg; = 59E+09*14%*0.001247696
    The production volume of pre-mixed dry mortars worldwide is estimated to be: "Total production of cement/gypsum/lime based dry mortars worldwide is 59,0 million tons, of which 57% is produced in Western Europe, 14% in Eastern Europe, 10% in Asia/Pacific, and about 6% each in North America, Latin America and Middle East/Africa."(Schinski, E., n.d. Dry mortars - Markets and Trends. Hercules GmbH, Aqualon Division, Düsseldorf, Germany. Retrieved from: http://www.apfac.pt/congresso2005/comunicacoes/Paper%2056.pdf, accessed 20171025). According to Schinski (n.d.), 35% of dry mix mortars are cement based renders, 32% are cement tiles, 17% are gypsum plasters and 14% are cement based mortars. Based on expert judgement the global production volume is therefore calculated as 59 million tons *14%. The Swiss production volume is scaled based on the proportion of Portland cement production in CH (880000000) and GLO (7.053E+11).
  property carbon content, fossil 0
    Raw materials are listed in Tab 5.2, ecoinvent v2.2 report 7, part XVII. C content is calculated after C content of raw materials
  property carbon content, non-fossil 0
    (same comment as for cement mortar)
  property price 0.094 EUR2005
    Calculated value based on data from United Nations Commodity Trade Statistics Database (comtrade.un.org). UN comtrade category: 252321 Portland cement, white or white artificially coloured. Year 2005. Using exchange rate of 1EURO = 1.209 USD. Average of price of import into 5 main markets (EU, US, JP, IN and CN).
  property carbon content 0
    carbon content on a dry matter basis (reserved; not for manual entry)
  properties: wet mass 1 kg, water in wet mass 0 kg, water content 0, dry mass 1 kg, carbon allocation 0 kg

## Inputs from technosphere
- electricity, medium voltage: 0.0278 kWh; lognormal variance with pedigree 0.0592, pedigree (2,3,5,1,3)
- industrial machine, heavy, unspecified: 6.67e-6 kg; lognormal variance with pedigree 0.508, pedigree (5,5,5,1,4)
  activityLink introduced to establish a direct link to the corresponding regional supply of this product
- conveyor belt: 3.33e-8 m; lognormal variance with pedigree 0.508, pedigree (5,5,5,1,4)
  (same comment as for industrial machine, heavy, unspecified)
- packing, cement: 1 kg; lognormal variance with pedigree 0.0666, pedigree (4,3,5,1,3)
  This exchange has an activity link directly to the producing activity because the product is primarily consumed in the same geographical area where it is produced.
- silica sand: 0.8 kg; lognormal variance with pedigree 0.0941, pedigree (4,5,5,3,3)
  properties: dry mass 0.99 kg, wet mass 1 kg, water content 0.010101
- cement, Portland: 0.2 kg; lognormal variance with pedigree 0.0941, pedigree (4,5,5,3,3)
  properties: dry mass 1 kg, wet mass 1 kg

## Sampling procedure
Literature and environmental report

## Extrapolations
This dataset has been extrapolated from year 2001 to the year of the calculation (2019). The uncertainty has been adjusted accordingly.

## Review by Roberto Dones 2004-04-01
passed
