# solid unbleached board production

Dataset: EcoSpold 2, unit process
Geography: RoW
Time period: 2000-01-01 to 2019-12-31
Technology level: current
Classification: EcoSpold01Categories: paper & cardboard/cardboard & corrugated board
Classification: ISIC rev.4 ecoinvent: 1701:Manufacture of pulp, paper and paperboard
Tags: ConvertedDataset
Scenario: Business-as-Usual
System model: Allocation at the point of substitution
Generated by: Roland Hischier
Published in: Hischier R. 2007
Database: ecoinvent
isCopyrightProtected: true
accessRestrictedTo: 1

## General comment
[This dataset was already contained in the ecoinvent database version 2. It was not individually updated during the transfer to ecoinvent version 3. Life Cycle Impact Assessment results may still have changed, as they are affected by changes in the supply chain, i.e. in other datasets. This dataset was generated following the ecoinvent quality guidelines for version 2. It may have been subject to central changes described in the ecoinvent version 3 change report (http://www.ecoinvent.org/database/ecoinvent-version-3/reports-of-changes/), and the results of the central updates were reviewed extensively. The changes added e.g. consistent water flows and other information throughout the database. The documentation of this dataset can be found in the ecoinvent reports of version 2, which are still available via the ecoinvent website. The change report linked above covers all central changes that were made during the conversion process.]

## Included activities end
This module includes the European production of solid unbleached board (SUB) in an integrated mill - including transports to paper mill, wood handling, chemical pulping, board production, energy production on-site and internal waste water treatment.

## Geography
Estimation of European average data, based on data about unbleached sulphate pulp production and kraft paper production

## Technology
Average of present used technology

## Parameters
- fraction, cooling water, cooling pond system, to air: 0.032; name fraction_CW_CP_to_air; lognormal variance with pedigree 0.0413, pedigree (2,3,1,3,1)
  Calculated based on literature value (Scown, C.D., 2011, Water Footprint of U.S. Transportation Fuels and supplying information of the article) (Vionnet, S., Quantis Water Database - Technical Report, 2012).
- fraction, process water, to air: 0.15 dimensionless; name fraction_PW_to_air; lognormal variance with pedigree 0.092025, pedigree (4,4,3,2,4)
- fraction, cooling water, recirculating system, to air: 0.771; name fraction_CW_R_to_air; lognormal variance with pedigree 0.0413, pedigree (2,3,1,3,1)
  (same comment as for fraction, cooling water, cooling pond system, to air)
- fraction, cooling water, to air: 0.3875; name fraction_CW_to_air; = (0.5*fraction_CW_OT_to_air)+(0.5*fraction_CW_R_to_air); lognormal variance with pedigree 0.092025, pedigree (4,4,3,2,4)
  Calculated value based on literature value (see comments of the other parametres present in this dataset) and expert opinion. In the case when no industry/literature data are available about the type of cooling or directly fraction, cooling water, to air specific for the process a default assumption is applied. It is assumed that the once-through cooling system is used in 50% of all cases and recirculating system is used in another 50% of all cases.
- fraction, cooling water, once-through system, to air: 0.004; name fraction_CW_OT_to_air; lognormal variance with pedigree 0.0413, pedigree (2,3,1,3,1)
  (same comment as for fraction, cooling water, cooling pond system, to air)

## Reference product
- solid unbleached board: 1 kg; By-product classification allocatable product; CPC 321: Pulp, paper and paperboard
  EcoSpold01Location=RER
  production volume 2.67763 kg
    This is a placeholder value that does not reflect real-world production volumes. This dataset does not currently require a real-world production volume to work in the database framework, and no actual data were collected yet. This has no negative effect on the results of the ecoinvent database.
  property carbon content, fossil 0.0207076
    Fossil C content was calculated after fossil C contents of chemicals used in the production of board (Tab 11.25 ecoinvent v2.2 report 11_III, part 11)
  property carbon content, non-fossil 0.353395
    Biogenic C content was calculated after biogenic C contents of chemicals used in the production of board (Tab 11.25 ecoinvent v2.2 report 11_III, part 11). The cellulose content in 1 kg of paper (on a wet mas basis) was estimated as (1-chemical content), C content of cellulose was considered 0.44 kgC/kg dry mass (ecoinvent v2.2 report, n 15a, pg 40)
  property carbon content 0.374103
    carbon content on a dry matter basis (reserved; not for manual entry)
  property true value 0.844
    allocation property applied in "true value" allocation // value calculated from revenue
  properties: price 0.844 EUR2005, water content 0.0582011, water in wet mass 0.055 kg, wet mass 1 kg, dry mass 0.945 kg, carbon allocation 0.353527 kg

## By-products
All rows: By-product classification allocatable product; pedigree (1,1,1,1,1)
- heat, for reuse in municipal waste incineration only: 0 MJ; CPC 17300: Steam and hot water
  Net electricity generated from this waste and used in internal MSWI plant energy redistribution.
  Uncertainty: uncertainty is calculated from uncertainties in waste composition and uncertainties in energy efficiency and the uncertainty in internal energy demand
  production volume 1.50769e-6 MJ
  property exergy 0.1842 MJ; name E_th_prod_MSWI_exergy
    This exergy property is based on the exergy content of the product.
  property price 0.0106 EUR2005; name E_th_prod_MSWI_price_EUR2005
    Average European district heat price from Ecoheatcool and Euroheat 2005-2006, Ecoheat Work package 1: The European heat market. Final report. 10.6 EUR/GJ i s the price of district heat. http://www.solarthermalworld.org/files/Ecoheatcool%20WP1%20Web.pdf?download
  property true value relation 0.1842; name E_th_prod_MSWI_true_value_relation
    property to calculate "true value" from
  property true value 3.30585e-9
    allocation property applied in "true value" allocation // value calculated from true value relation
- electricity, for reuse in municipal waste incineration only: 0 kWh; CPC 17100: Electrical energy
  (same comment as for heat, for reuse in municipal waste incineration only)
  production volume 2.12323e-7 kWh
  property price 0.1 EUR2005; name E_el_prod_MSWI_price_EUR2005
    Estimated to be the same price as in case of electricity, medium voltage.
  property exergy 3.6 MJ; name E_el_prod_MSWI_exergy
    This exergy property is based on the exergy content of the product.
  property true value relation 3.6; name E_el_prod_MSWI_true_value_relation
    property to calculate "true value" from
  property true value 9.09876e-9
    (same comment as for heat, for reuse in municipal waste incineration only)
- potassium fertiliser, as K2O: 0 kg; source CRAAQ 2010; CPC 3463: Mineral or chemical fertilizers, potassic
  This is the potassium (as K2O) output (organic and mineral forms of potassium contained) from organic origin. In practice, only a part of this total amount is available to the plants and the available amount has to be calculated considering efficiency of organic potassium (to replace mineral potassium ), which also depends on many factors, such as climate, soil, crop, timing and technique of application, etc. Since this dataset includes field emissions from the application of sludge, potassium availability has been accounted for in the calculation of direct field emissions.
  Uncertainty: The uncertainty of calculated values is determined from propagation of uncertainty factors of underlying variables.
  production volume 3.00028e-5 kg
  property price 0.188 EUR2005; name K2O_fertiliser_price_EUR2005
    Temporary price data. Calculated as 90% of purchasers price based on: 2004 import price calulated from FAOSTAT (http://faostat.fao.org/site/575/DesktopDefault.aspx?PageID=575#ancor [accessed 2011.01.27] Potash Fertilizers (K20 total nutrients) in kUSD/Mg
  property carbon content 0
    carbon content on a dry matter basis (reserved; not for manual entry)
  property true value 1.88018e-6
    allocation property applied in "true value" allocation // value calculated from revenue
  properties: carbon content, fossil 0, dry mass 1 kg, water in wet mass 0 kg, water content 0, wet mass 1 kg, carbon content, non-fossil 0, carbon allocation 0 kg
- nitrogen fertiliser, as N: 0 kg; source CRAAQ 2010; CPC 3461: Mineral or chemical fertilizers, nitrogenous
  This is the total nitrogen (as N) output (organic and mineral forms of nitrogen contained) from organic origin. In practice, only a part of this total amount is available to the plants and the available amount has to be calculated considering nitrogen efficiency (to replace mineral nitrogen), which also depends on many factors, such as climate, soil, crop, timing and technique of application, etc. Since this dataset includes field emissions from the application of sludge, nitrogen availability has been accounted for in the calculation of direct field emissions.
  Uncertainty: The uncertainty of calculated values is determined from propagation of uncertainty factors of underlying variables.
  production volume 0.000185553 kg
  property price 0.473 EUR2005; name N_fertiliser_price_EUR2005
    Temporary price data. Calculated as 90% of purchasers price based on: 2004 prices are calculated on basis of Import/Export data (tonnes and US$) from UN Trade Statistics Database (http://data.un.org/Browse.aspx?d=ComTrade, accessed 7/7-2010). N, P2O5, or K2O content (http://www.fertilizer.org/ifa/Home-Page/STATISTICS/Conversions-factors)
  property carbon content 0
    carbon content on a dry matter basis (reserved; not for manual entry)
  property true value 2.92555e-5
    allocation property applied in "true value" allocation // value calculated from revenue
  properties: water content 0, wet mass 1 kg, dry mass 1 kg, carbon content, non-fossil 0, water in wet mass 0 kg, carbon content, fossil 0, carbon allocation 0 kg
- phosphate fertiliser, as P2O5: 0 kg; source CRAAQ 2010; CPC 3462: Mineral or chemical fertilizers, phosphatic
  This is the total phosphate (as P2O5) output (organic and mineral forms of phosphate contained) from organic origin. In practice, only a part of this total amount is available to the plants and the available amount has to be calculated considering efficiency of organic phosphate (to replace mineral phosphate), which also depends on many factors, such as climate, soil, crop, timing and technique of application, etc. Since this dataset includes field emissions from the application of sludge, phosphate availability has been accounted for in the calculation of direct field emissions.
  Uncertainty: The uncertainty of calculated values is determined from propagation of uncertainty factors of underlying variables.
  production volume 0.000124196 kg
  property price 0.241 EUR2005; name P2O5_fertiliser_price_EUR2005
    (same comment as for nitrogen fertiliser, as N)
  property carbon content 0
    carbon content on a dry matter basis (reserved; not for manual entry)
  property true value 9.97709e-6
    allocation property applied in "true value" allocation // value calculated from revenue
  properties: dry mass 1 kg, water content 0, carbon content, fossil 0, wet mass 1 kg, carbon content, non-fossil 0, water in wet mass 0 kg, carbon allocation 0 kg
- soil pH raising agent, as CaCO3: 0 kg; source Marianne Lemieux 2013; CPC 34659: Fertilizers n.e.c.
  Calculated value of the amount of CaCO3 that can be substituted considered the liming efficiency of the sludge.
  Uncertainty: The uncertainty of calculated values is determined from propagation of uncertainty factors of underlying variables.
  production volume 0.0034591 kg
  property carbon content, fossil 0.12; name soil_pH_raising_agent_C_content_fossil_0; = 12/(40+12+3*16)
    Stoichiometric calculation. Fossil carbon content on a dry matter basis.
  property carbon content, non-fossil 0; name soil_pH_raising_a_C_content_non_fossil_0
    biogene carbon content on a dry matter basis
  property price 0.117 EUR2005; name soil_pH_raising_agent_as_CaCO3_price_EUR
    The price is estimated to be the same as for lime.
  property carbon content 0.12
    carbon content on a dry matter basis (reserved; not for manual entry)
  property true value 0.000134905
    allocation property applied in "true value" allocation // value calculated from revenue
  properties: wet mass 1 kg, water in wet mass 0 kg, water content 0, dry mass 1 kg, carbon allocation 0.12 kg

## Inputs from technosphere
- phosphorus, white, liquid: 9.99791e-6 kg; lognormal variance with pedigree 0.142, pedigree (3,5,5,5,4)
  EcoSpold01Location=RER
  Estimated from solid bleached board data
  Uncertainty: estimated from solid bleached board data
  properties: dry mass 1 kg, wet mass 1 kg
- alkylketene dimer sizing agent, for paper production: 0.000199958 kg; lognormal variance with pedigree 0.142, pedigree (3,5,5,5,4)
  (same comment as for phosphorus, white, liquid)
  properties: wet mass 1 kg, dry mass 1 kg, carbon content, non-fossil 0.538229
  note on carbon content, non-fossil: Chemical formula of alkyl ketene dimer was considered as C38H72O20, and the molecular weight 848g/mol. It is produced from Fatty acids, from vegetarian oil
- sulfur dioxide, liquid: 0.000899812 kg; lognormal variance with pedigree 0.142, pedigree (3,5,5,5,4)
  (same comment as for phosphorus, white, liquid)
  properties: wet mass 1 kg, dry mass 1 kg
- electricity, medium voltage: 0 kWh; pedigree (1,1,1,1,1)
  Estimated from unbleached kraft paper data
  EcoSpold01Location=NORDEL
  Uncertainty: estimated from unbleached kraft paper data
- chemical, inorganic: 0.0139971 kg; lognormal variance with pedigree 0.142, pedigree (3,5,5,5,4)
  EcoSpold01Location=GLO
  Estimated from solid bleached board data
  Uncertainty: estimated from solid bleached board data
  properties: carbon content, fossil 0.003, wet mass 1 kg, dry mass 1 kg
  note on carbon content, fossil: This dataset is an unweighted average of 20 inorganic substances (listed in Tab 88.1, ecoinvent v2.2 report 8, part II), being part of the top100 chemicals included in this database. The C-content has also been calculated as an unweighted average of the C content of the substances composing this dataset.
- potato starch: 0.0132972 kg; lognormal variance with pedigree 0.142, pedigree (3,5,5,5,4)
  EcoSpold01Location=DE
  Estimated from solid bleached board data
  Uncertainty: estimated from solid bleached board data
  properties: carbon content, non-fossil 0.46, dry mass 0.8 kg, wet mass 1 kg, water content 0.25
  note on carbon content, non-fossil: C-content of starch is considered 46% on dry mass basis (from "Evolutionary and Biochemical Aspects", A.D. Kay and T. Vrede (in Global Ecology, 2010, Elsevier B.V., S.E. Jørgensen Ed.)).
- wood ash mixture, pure: -0.0276942 kg; lognormal variance with pedigree 0.142, pedigree (3,5,5,5,4)
  EcoSpold01Location=CH
  Estimated from unbleached kraft paper data
  Uncertainty: estimated from unbleached kraft paper data
  production volume 0.0831 kg
    Calculated from the production volume of solid unbleached board in proportion to the respective output amounts.
  properties: dry mass 1 kg, carbon content, non-fossil 0.012, wet mass 1 kg
- hard coal: 0 kg; pedigree (1,1,1,1,1)
  Estimated from unbleached kraft paper data
  EcoSpold01Location=WEU
  Uncertainty: estimated from unbleached kraft paper data
  properties: dry mass 0.94 kg, carbon content, fossil 0.845, water content 0.0638298, wet mass 1 kg
  note on carbon content, fossil: C content 75-94% (specified in Tab 1.1, report 6, part VI). A mean content of 0.845 kg C/ kg dry hard coal was considered
- natural gas, high pressure: 0 m3; pedigree (1,1,1,1,1)
  EcoSpold01Location=RER
  Estimated from unbleached kraft paper data
  Uncertainty: estimated from unbleached kraft paper data
  properties: wet mass 0.84 kg, heating value, gross 39 MJ, carbon content, fossil 0.602381, dry mass 0.84 kg
  note on carbon content, fossil: An average C content of 0.506 kg C/ m3 has been assumed (this average has been calculated using data in Tab 3.5, ecoinvent v2.2 report 6_V
- nitrogen, liquid: 0.000269944 kg; lognormal variance with pedigree 0.142, pedigree (3,5,5,5,4)
  (same comment as for phosphorus, white, liquid)
  properties: wet mass 1 kg, dry mass 1 kg
- sodium dithionite, anhydrous: 0.00419912 kg; lognormal variance with pedigree 0.142, pedigree (3,5,5,5,4)
  Estimated from solid bleached board data
  EcoSpold01Location=RER
  Uncertainty: estimated from solid bleached board data
  properties: wet mass 1 kg, dry mass 1 kg
- sodium hydroxide, without water, in 50% solution state: 0.0109977 kg; lognormal variance with pedigree 0.142, pedigree (3,5,5,5,4)
  (same comment as for phosphorus, white, liquid)
  properties: dry mass 1 kg, wet mass 1 kg
- paper mill, integrated: 5.43887e-11 unit; lognormal variance with pedigree 0.448, pedigree (4,5,5,5,5)
  Own assumption
  EcoSpold01Location=RER
  Uncertainty: own assumption
- ash from paper production sludge: -0.00303937 kg; lognormal variance with pedigree 0.142, pedigree (3,5,5,5,4)
  (same comment as for wood ash mixture, pure)
  production volume 0.00912 kg
    (same comment as for wood ash mixture, pure)
  properties: dry mass 1 kg, wet mass 1 kg, carbon content, non-fossil 0.0092
- chemical, organic: 0.00299937 kg; lognormal variance with pedigree 0.142, pedigree (3,5,5,5,4)
  Estimated from solid bleached board data
  EcoSpold01Location=GLO
  Uncertainty: estimated from solid bleached board data
  properties: carbon content, fossil 0.628, dry mass 1 kg, wet mass 1 kg
  note on carbon content, fossil: This dataset is an unweighted average of 20 organic substances (listed in Tab 88.1, ecoinvent v2.2 report 8, part II), being part of the top100 chemicals included in this database. The C-content has also been calculated as an unweighted average of the C content of the substances composing this dataset.
- pulpwood, softwood, measured as solid wood under bark: 0.00424911 m3; lognormal variance with pedigree 0.142, pedigree (3,5,5,5,4)
  (same comment as for natural gas, high pressure)
  properties: carbon content, non-fossil 0.494, water content 1.4, wet mass 1080 kg, dry mass 450 kg
  note on carbon content, non-fossil: C content of dry mass is 0.494 kgC/kg dry wood (ecoinvent v2.2 report 9)
- bilge oil: -0.000399917 kg; lognormal variance with pedigree 0.142, pedigree (3,5,5,5,4)
  Estimated from unbleached kraft paper data
  EcoSpold01Location=CH
  Uncertainty: estimated from unbleached kraft paper data
  production volume 0.0012 kg
    (same comment as for wood ash mixture, pure)
  properties: water content 9, carbon content, fossil 0.84, wet mass 1 kg, dry mass 0.1 kg
  note on carbon content, fossil: Tab A.6, ecoinvent v2.2 report 13_I. C content has been calculated after data in the tables, and then referred to 1 kg DM
- carboxymethyl cellulose, powder: 0.000399917 kg; lognormal variance with pedigree 0.142, pedigree (3,5,5,5,4)
  (same comment as for phosphorus, white, liquid)
  properties: carbon content, non-fossil 0.293878, carbon content, fossil 0.0979592, dry mass 1 kg, wet mass 1 kg
  note on carbon content, non-fossil: Chemical structure: Cellulose-O-CH2-COO-Na+. CMC is produced by the processing of alkaline cellulose with mono acetic acid (ecoinvent v2.2 report 12, pg 76 & 81). MW Acetic acid is 60 g/mol. The degree of carboxymethyl substitution in CMC is variable. It was considered that every molecule of glucose (monomers of cellulose) had a carboxymethyl substitution. MW of glucose (C6H10O5) is 162 g/mol; cellulose is (C6H10O5)n.
  note on carbon content, fossil: Chemical structure: Cellulose-O-CH2-COO-Na+. CMC is produced by the processing of alkaline cellulose with mono acetic acid (ecoinvent v2.2 report 12, pg 76 & 81). MW Acetic acid (CH3-COOH) is 60 g/mol. The degree of carboxymethyl substitution in CMC is variable. It was considered that every molecule of glucose (monomers of cellulose) had a carboxymethyl substitution. MW of glucose (C6H10O5) is 162 g/mol; cellulose is (C6H10O5)n. MW of Na is 23
- heavy fuel oil: 0 kg; pedigree (1,1,1,1,1)
  (same comment as for natural gas, high pressure)
  properties: dry mass 1 kg, carbon content, fossil 0.849, wet mass 1 kg
- quicklime, milled, loose: 0.00659862 kg; lognormal variance with pedigree 0.142, pedigree (3,5,5,5,4)
  EcoSpold01Location=CH
  Estimated from solid bleached board data
  Uncertainty: estimated from solid bleached board data
  properties: water content 0.010101, dry mass 0.99 kg, wet mass 1 kg
- lime: 0.0704853 kg; lognormal variance with pedigree 0.142, pedigree (3,5,5,5,4)
  Estimated from solid bleached board data
  EcoSpold01Location=CH
  Uncertainty: estimated from solid bleached board data
  properties: carbon content, fossil 0.120005, dry mass 1 kg, wet mass 1 kg
- kaolin: 0.0674859 kg; lognormal variance with pedigree 0.142, pedigree (3,5,5,5,4)
  (same comment as for sodium dithionite, anhydrous)
  properties: wet mass 1 kg, dry mass 1 kg
- sludge from pulp and paper production: -0.0107977 kg; lognormal variance with pedigree 0.142, pedigree (3,5,5,5,4)
  (same comment as for wood ash mixture, pure)
  production volume 0.0324 kg
    (same comment as for wood ash mixture, pure)
  properties: water content 0.333333, carbon content, non-fossil 0.21, dry mass 0.75 kg, wet mass 1 kg
  note on carbon content, non-fossil: Tab 6.21, ecoinvent v2.2 report 11_III & Tab A.9, ecoinvent v2.2 report 13_I. Sludge from pulp and paper contains 15.75% carbon
- light fuel oil: 0 kg; pedigree (1,1,1,1,1)
  (same comment as for natural gas, high pressure)
  properties: carbon content, fossil 0.862, wet mass 1 kg, dry mass 1 kg
- latex: 0.0119975 kg; lognormal variance with pedigree 0.142, pedigree (3,5,5,5,4)
  (same comment as for phosphorus, white, liquid)
  properties: carbon content, fossil 0.872983, wet mass 1 kg, dry mass 1 kg
  note on carbon content, fossil: The Styrene-butadiene dispersion is based on styrene and 1,3-butadiene plus co-monomers like i.e. ac-rylonitrile or (meth-)acrylic acid (ecoinvent v2.2 report 11_III). Following specifications in US Patent 3,875,101 (1971), the dispersion was considered as: 52.5% 1.3-butadiene (0.8571 kg C/kg dry mass); 43% styrene (0.9231 kg C/kg dry mass); 2% acrylic acid (0.5 kg C/kg dry mass); 2.5% acrolein (C3H4O, MW=56; 0.6429 kg C/kg dry mass)
- sulfuric acid: 0.00409915 kg; lognormal variance with pedigree 0.142, pedigree (3,5,5,5,4)
  (same comment as for sodium dithionite, anhydrous)
  properties: wet mass 1 kg, dry mass 1 kg
- electricity, medium voltage: 0.0123813, 0.00225287, 0.0382052, 0.553936, 0.0792787, 0.259749 kWh (6 entries); lognormal variance with pedigree 0.142, pedigree (3,5,5,5,4)
  (same comment as for electricity, medium voltage)
- hard coal: 0.000280117, 0.000171985, 0.00119275, 0.000168534, 3.99919e-5, 0.000251264, 7.31384e-5, 0.000371683 kg (8 entries); lognormal variance with pedigree 0.142, pedigree (3,5,5,5,4)
  (same comment as for hard coal)
- natural gas, high pressure: 0.000280132, 0.00046634, 0.0038076, 0.000642751, 0.00892844 m3 (5 entries); lognormal variance with pedigree 0.142, pedigree (3,5,5,5,4)
  (same comment as for natural gas, high pressure)
- heavy fuel oil: 0.00171479, 0.000446727, 0.00132248, 0.000260135, 0.000333715, 0.0309149 kg (6 entries); lognormal variance with pedigree 0.142, pedigree (3,5,5,5,4)
  (same comment as for natural gas, high pressure)
- light fuel oil: 0.000333212, 4.80545e-5, 0.000672501, 4.46264e-5, 6.4662e-5, 0.00677529 kg (6 entries); lognormal variance with pedigree 0.142, pedigree (3,5,5,5,4)
  (same comment as for natural gas, high pressure)

## Inputs from nature
- Water, cooling, unspecified natural origin [natural resource, in water]: 0.102979 m3; name water_cooling_UNO_input; lognormal variance with pedigree 0.142, pedigree (3,5,5,5,4)
  Estimated from unbleached kraft paper data
  Uncertainty: estimated from unbleached kraft paper data
- Water, unspecified natural origin [natural resource, in water]: 0.023995 m3; name water_UNO_input; lognormal variance with pedigree 0.142, pedigree (3,5,5,5,4)
  (same comment as for Water, cooling, unspecified natural origin)

## Emissions to nature
- Water [water, unspecified]: 0.0834701 m3; name water_to_water_unspecified; lognormal variance with pedigree 0.0827, pedigree (2,2,5,5,1)
  Calculated value based on literature values and expert opinion. See comments in the parametres' comment field.
  property wet mass 1000 kg; name WM
  property fraction, origin: unspecified 1; name fraction_origin_unspecified_Ww
  property fraction, origin: fresh water 0; name fraction_origin_fresh_water_Ww
  property fraction, origin: salt water 0; name fraction_origin_salt_water_Ww
  property carbon content, fossil 0; name C_content_fossil
  property water in wet mass 1000 kg; name WWM
  property dry mass 0 kg; name DM
  property carbon content, non-fossil 0; name C_content_non_fossil
- Antimony [air, urban air close to ground]: 1.15976e-10 kg; lognormal variance with pedigree 0.1806, pedigree (2,5,5,5,4)
  Estimation - based on respective heating modules
  Uncertainty: estimation - based on respective heating modules
- Sodium [air, urban air close to ground]: 2.8894e-5 kg; lognormal variance with pedigree 0.7806, pedigree (2,5,5,5,4)
  (same comment as for Antimony)
- Benzo(a)pyrene [air, urban air close to ground]: 1.06978e-8 kg; lognormal variance with pedigree 0.1806, pedigree (2,5,5,5,4)
  (same comment as for Antimony)
- Dinitrogen monoxide [air, urban air close to ground]: 5.60883e-5 kg; lognormal variance with pedigree 0.1806, pedigree (2,5,5,5,4)
  (same comment as for Antimony)
- Barium [air, urban air close to ground]: 9.28806e-9 kg; lognormal variance with pedigree 0.7806, pedigree (2,5,5,5,4)
  (same comment as for Antimony)
- Cobalt [air, urban air close to ground]: 4.779e-8 kg; lognormal variance with pedigree 0.7806, pedigree (2,5,5,5,4)
  (same comment as for Antimony)
- Manganese [air, urban air close to ground]: 3.63924e-6 kg; lognormal variance with pedigree 0.7806, pedigree (2,5,5,5,4)
  (same comment as for Antimony)
- Phosphorus [water, surface water]: 1.99958e-5 kg; lognormal variance with pedigree 0.182, pedigree (3,5,5,5,4)
  (same comment as for Water, cooling, unspecified natural origin)
- Propionic acid [air, urban air close to ground]: 1.09977e-8 kg; lognormal variance with pedigree 0.1806, pedigree (2,5,5,5,4)
  (same comment as for Antimony)
- Boron [air, urban air close to ground]: 3.48927e-8 kg; lognormal variance with pedigree 0.7806, pedigree (2,5,5,5,4)
  (same comment as for Antimony)
- Cadmium [air, urban air close to ground]: 6.26869e-8 kg; lognormal variance with pedigree 0.7806, pedigree (2,5,5,5,4)
  (same comment as for Antimony)
- Hydrocarbons, aliphatic, unsaturated [air, urban air close to ground]: 6.63862e-5 kg; lognormal variance with pedigree 0.1806, pedigree (2,5,5,5,4)
  (same comment as for Antimony)
- TOC, Total Organic Carbon [water, surface water]: 0.000681339 kg; lognormal variance with pedigree 0.182, pedigree (3,5,5,5,4)
  Calculated by default as TOC (gC) = COD/2.7 (COD measured in g O2). Should more correctly be calculated from the carbon content of the specified emissions to water.
  Uncertainty: estimated from unbleached kraft paper data
- Butane [air, urban air close to ground]: 4.91897e-7 kg; lognormal variance with pedigree 0.4406, pedigree (2,5,5,5,4)
  (same comment as for Antimony)
- Particulates, < 2.5 um [air, urban air close to ground]: 0.000414913 kg; lognormal variance with pedigree 0.442, pedigree (3,5,5,5,4)
  (same comment as for Water, cooling, unspecified natural origin)
- Particulates, > 10 um [air, urban air close to ground]: 3.99917e-5 kg; lognormal variance with pedigree 0.182, pedigree (3,5,5,5,4)
  (same comment as for Water, cooling, unspecified natural origin)
- m-Xylene [air, urban air close to ground]: 2.56946e-6 kg; lognormal variance with pedigree 0.1806, pedigree (2,5,5,5,4)
  (same comment as for Antimony)
- Thorium-232 [air, urban air close to ground]: 2.57946e-7 kBq; lognormal variance with pedigree 0.4406, pedigree (2,5,5,5,4)
  (same comment as for Antimony)
- Propane [air, urban air close to ground]: 2.33951e-7 kg; lognormal variance with pedigree 0.1806, pedigree (2,5,5,5,4)
  (same comment as for Antimony)
- Acetaldehyde [air, urban air close to ground]: 1.51968e-6 kg; lognormal variance with pedigree 0.1806, pedigree (2,5,5,5,4)
  (same comment as for Antimony)
- Methanol [air, urban air close to ground]: 7.35847e-7 kg; lognormal variance with pedigree 0.1806, pedigree (2,5,5,5,4)
  (same comment as for Antimony)
- Arsenic [air, urban air close to ground]: 4.19912e-8 kg; lognormal variance with pedigree 0.1806, pedigree (2,5,5,5,4)
  (same comment as for Antimony)
- Carbon monoxide, fossil [air, urban air close to ground]: 1.99958e-5 kg; lognormal variance with pedigree 0.7806, pedigree (2,5,5,5,4)
  (same comment as for Antimony)
- PAH, polycyclic aromatic hydrocarbons [air, urban air close to ground]: 2.43949e-7 kg; lognormal variance with pedigree 0.1806, pedigree (2,5,5,5,4)
  (same comment as for Antimony)
- Lead-210 [air, urban air close to ground]: 3.42928e-6 kBq; lognormal variance with pedigree 0.4406, pedigree (2,5,5,5,4)
  (same comment as for Antimony)
- Xylene [air, urban air close to ground]: 7.36846e-9 kg; lognormal variance with pedigree 0.1806, pedigree (2,5,5,5,4)
  (same comment as for Antimony)
- Formaldehyde [air, urban air close to ground]: 3.78921e-6 kg; lognormal variance with pedigree 0.1806, pedigree (2,5,5,5,4)
  (same comment as for Antimony)
- Sulfur dioxide [air, urban air close to ground]: 0.000849823 kg; lognormal variance with pedigree 0.142, pedigree (3,5,5,5,4)
  (same comment as for Water, cooling, unspecified natural origin)
- Methane, fossil [air, urban air close to ground]: 6.50864e-6 kg; lognormal variance with pedigree 0.1806, pedigree (2,5,5,5,4)
  (same comment as for Antimony)
- Chlorine [air, urban air close to ground]: 3.8492e-6 kg; lognormal variance with pedigree 0.4406, pedigree (2,5,5,5,4)
  (same comment as for Antimony)
- Suspended solids, unspecified [water, surface water]: 0.000999791 kg; lognormal variance with pedigree 0.182, pedigree (3,5,5,5,4)
  (same comment as for Water, cooling, unspecified natural origin)
- Silicon [air, urban air close to ground]: 1.15976e-6 kg; lognormal variance with pedigree 0.7806, pedigree (2,5,5,5,4)
  (same comment as for Antimony)
- Aluminium [air, urban air close to ground]: 7.88835e-7 kg; lognormal variance with pedigree 0.1806, pedigree (2,5,5,5,4)
  (same comment as for Antimony)
- Uranium [air, urban air close to ground]: 1.85961e-10 kg; lognormal variance with pedigree 0.7806, pedigree (2,5,5,5,4)
  (same comment as for Antimony)
- Thorium-228 [air, urban air close to ground]: 4.04916e-7 kBq; lognormal variance with pedigree 0.4406, pedigree (2,5,5,5,4)
  (same comment as for Antimony)
- Uranium-238 [air, urban air close to ground]: 7.36846e-7 kBq; lognormal variance with pedigree 0.4406, pedigree (2,5,5,5,4)
  (same comment as for Antimony)
- Copper [air, urban air close to ground]: 7.78838e-7 kg; lognormal variance with pedigree 0.7806, pedigree (2,5,5,5,4)
  (same comment as for Antimony)
- Thallium [air, urban air close to ground]: 1.15976e-10 kg; lognormal variance with pedigree 0.7806, pedigree (2,5,5,5,4)
  (same comment as for Antimony)
- Iodine [air, urban air close to ground]: 8.39825e-10 kg; lognormal variance with pedigree 0.1806, pedigree (2,5,5,5,4)
  (same comment as for Antimony)
- Nitrogen [water, surface water]: 0.000199958 kg; lognormal variance with pedigree 0.182, pedigree (3,5,5,5,4)
  (same comment as for Water, cooling, unspecified natural origin)
- Ethyne [air, urban air close to ground]: 3.67923e-8 kg; lognormal variance with pedigree 0.1806, pedigree (2,5,5,5,4)
  (same comment as for Antimony)
- Chromium VI [air, urban air close to ground]: 1.28973e-9 kg; lognormal variance with pedigree 0.7806, pedigree (2,5,5,5,4)
  (same comment as for Antimony)
- Carbon monoxide, non-fossil [air, urban air close to ground]: 0.00102979 kg; lognormal variance with pedigree 0.7806, pedigree (2,5,5,5,4)
  (same comment as for Antimony)
- Acetic acid [air, urban air close to ground]: 9.47802e-7 kg; lognormal variance with pedigree 0.1806, pedigree (2,5,5,5,4)
  (same comment as for Antimony)
- Carbon dioxide, fossil [air, urban air close to ground]: 0.174964 kg; lognormal variance with pedigree 0.142, pedigree (3,5,5,5,4)
  (same comment as for Water, cooling, unspecified natural origin)
- Bromine [air, urban air close to ground]: 1.27973e-6 kg; lognormal variance with pedigree 0.1806, pedigree (2,5,5,5,4)
  (same comment as for Antimony)
- Scandium [air, urban air close to ground]: 9.28806e-11 kg; lognormal variance with pedigree 0.7806, pedigree (2,5,5,5,4)
  (same comment as for Antimony)
- Dioxins, measured as 2,3,7,8-tetrachlorodibenzo-p-dioxin [air, urban air close to ground]: 2.13955e-12 kg; lognormal variance with pedigree 0.1806, pedigree (2,5,5,5,4)
  (same comment as for Antimony)
- Nitrogen oxides [air, urban air close to ground]: 0.00157967 kg; lognormal variance with pedigree 0.182, pedigree (3,5,5,5,4)
  (same comment as for Water, cooling, unspecified natural origin)
- Polonium-210 [air, urban air close to ground]: 6.25869e-6 kBq; lognormal variance with pedigree 0.4406, pedigree (2,5,5,5,4)
  (same comment as for Antimony)
- Ammonia [air, urban air close to ground]: 3.70923e-5 kg; lognormal variance with pedigree 0.1806, pedigree (2,5,5,5,4)
  (same comment as for Antimony)
- Methane, non-fossil [air, urban air close to ground]: 8.54822e-6 kg; lognormal variance with pedigree 0.1806, pedigree (2,5,5,5,4)
  (same comment as for Antimony)
- Magnesium [air, urban air close to ground]: 7.97834e-6 kg; lognormal variance with pedigree 0.7806, pedigree (2,5,5,5,4)
  (same comment as for Antimony)
- Hydrogen chloride [air, urban air close to ground]: 5.09894e-6 kg; lognormal variance with pedigree 0.1806, pedigree (2,5,5,5,4)
  (same comment as for Antimony)
- Calcium [air, urban air close to ground]: 0.000124974 kg; lognormal variance with pedigree 0.4406, pedigree (2,5,5,5,4)
  (same comment as for Antimony)
- Pentane [air, urban air close to ground]: 7.31847e-7 kg; lognormal variance with pedigree 0.1806, pedigree (2,5,5,5,4)
  (same comment as for Antimony)
- Vanadium [air, urban air close to ground]: 3.74922e-6 kg; lognormal variance with pedigree 0.7806, pedigree (2,5,5,5,4)
  (same comment as for Antimony)
- Radon-222 [air, urban air close to ground]: 7.36846e-8 kBq; lognormal variance with pedigree 0.4406, pedigree (2,5,5,5,4)
  (same comment as for Antimony)
- Strontium [air, urban air close to ground]: 1.39971e-8 kg; lognormal variance with pedigree 0.7806, pedigree (2,5,5,5,4)
  (same comment as for Antimony)
- Chromium [air, urban air close to ground]: 1.08977e-7 kg; lognormal variance with pedigree 0.7806, pedigree (2,5,5,5,4)
  (same comment as for Antimony)
- Radium-226 [air, urban air close to ground]: 8.83816e-7 kBq; lognormal variance with pedigree 0.4406, pedigree (2,5,5,5,4)
  (same comment as for Antimony)
- Hydrocarbons, aromatic [air, urban air close to ground]: 2.26953e-7 kg; lognormal variance with pedigree 0.1806, pedigree (2,5,5,5,4)
  (same comment as for Antimony)
- COD, Chemical Oxygen Demand [water, surface water]: 0.00183962 kg; lognormal variance with pedigree 0.182, pedigree (3,5,5,5,4)
  (same comment as for Water, cooling, unspecified natural origin)
- Nickel [air, urban air close to ground]: 1.06978e-6 kg; lognormal variance with pedigree 0.7806, pedigree (2,5,5,5,4)
  (same comment as for Antimony)
- Lead [air, urban air close to ground]: 6.2187e-7 kg; lognormal variance with pedigree 0.7806, pedigree (2,5,5,5,4)
  (same comment as for Antimony)
- Thorium [air, urban air close to ground]: 1.39971e-10 kg; lognormal variance with pedigree 0.7806, pedigree (2,5,5,5,4)
  (same comment as for Antimony)
- Hydrogen fluoride [air, urban air close to ground]: 3.03937e-7 kg; lognormal variance with pedigree 0.1806, pedigree (2,5,5,5,4)
  (same comment as for Antimony)
- Fluorine [air, urban air close to ground]: 1.06978e-6 kg; lognormal variance with pedigree 0.1806, pedigree (2,5,5,5,4)
  (same comment as for Antimony)
- Carbon dioxide, non-fossil [air, urban air close to ground]: 2.02958 kg; lognormal variance with pedigree 0.142, pedigree (3,5,5,5,4)
  (same comment as for Water, cooling, unspecified natural origin)
- Toluene [air, urban air close to ground]: 6.58863e-6 kg; lognormal variance with pedigree 0.1806, pedigree (2,5,5,5,4)
  (same comment as for Antimony)
- Ethanol [air, urban air close to ground]: 4.3291e-7 kg; lognormal variance with pedigree 0.1806, pedigree (2,5,5,5,4)
  (same comment as for Antimony)
- Tin [air, urban air close to ground]: 4.65903e-11 kg; lognormal variance with pedigree 0.7806, pedigree (2,5,5,5,4)
  (same comment as for Antimony)
- Potassium-40 [air, urban air close to ground]: 9.94793e-7 kBq; lognormal variance with pedigree 0.4406, pedigree (2,5,5,5,4)
  (same comment as for Antimony)
- Benzene, hexachloro- [air, urban air close to ground]: 1.53968e-13 kg; lognormal variance with pedigree 0.1806, pedigree (2,5,5,5,4)
  (same comment as for Antimony)
- NMVOC, non-methane volatile organic compounds, unspecified origin [air, urban air close to ground]: 1.29973e-5 kg; lognormal variance with pedigree 0.1806, pedigree (2,5,5,5,4)
  (same comment as for Antimony)
- Benzene [air, urban air close to ground]: 1.96959e-5 kg; lognormal variance with pedigree 0.1806, pedigree (2,5,5,5,4)
  (same comment as for Antimony)
- Selenium [air, urban air close to ground]: 1.79962e-8 kg; lognormal variance with pedigree 0.7806, pedigree (2,5,5,5,4)
  (same comment as for Antimony)
- Radium-228 [air, urban air close to ground]: 4.789e-6 kBq; lognormal variance with pedigree 0.4406, pedigree (2,5,5,5,4)
  (same comment as for Antimony)
- Ethene [air, urban air close to ground]: 2.20954e-7 kg; lognormal variance with pedigree 0.7806, pedigree (2,5,5,5,4)
  (same comment as for Antimony)
- Radon-220 [air, urban air close to ground]: 7.36846e-8 kBq; lognormal variance with pedigree 0.4406, pedigree (2,5,5,5,4)
  (same comment as for Antimony)
- Particulates, > 2.5 um, and < 10um [air, urban air close to ground]: 4.49906e-5 kg; lognormal variance with pedigree 0.262, pedigree (3,5,5,5,4)
  (same comment as for Water, cooling, unspecified natural origin)
- Mercury [air, urban air close to ground]: 7.02853e-9 kg; lognormal variance with pedigree 0.7806, pedigree (2,5,5,5,4)
  (same comment as for Antimony)
- Hydrocarbons, aliphatic, alkanes, unspecified [air, urban air close to ground]: 2.04957e-5 kg; lognormal variance with pedigree 0.1806, pedigree (2,5,5,5,4)
  (same comment as for Antimony)
- Titanium [air, urban air close to ground]: 2.78942e-8 kg; lognormal variance with pedigree 0.7806, pedigree (2,5,5,5,4)
  (same comment as for Antimony)
- Phosphorus [air, urban air close to ground]: 6.41866e-6 kg; lognormal variance with pedigree 0.1806, pedigree (2,5,5,5,4)
  (same comment as for Antimony)
- Potassium [air, urban air close to ground]: 0.000500896 kg; lognormal variance with pedigree 0.7806, pedigree (2,5,5,5,4)
  (same comment as for Antimony)
- DOC, Dissolved Organic Carbon [water, surface water]: 0.000681339 kg; lognormal variance with pedigree 0.182, pedigree (3,5,5,5,4)
  Calculated as equal to TOC.
  Uncertainty: estimated from unbleached kraft paper data
- Zinc [air, urban air close to ground]: 6.7086e-6 kg; lognormal variance with pedigree 0.7806, pedigree (2,5,5,5,4)
  (same comment as for Antimony)
- Ethane [air, urban air close to ground]: 1.10977e-7 kg; lognormal variance with pedigree 0.1806, pedigree (2,5,5,5,4)
  (same comment as for Antimony)
- Beryllium [air, urban air close to ground]: 9.28806e-11 kg; lognormal variance with pedigree 0.7806, pedigree (2,5,5,5,4)
  (same comment as for Antimony)
- BOD5, Biological Oxygen Demand [water, surface water]: 0.000229952 kg; lognormal variance with pedigree 0.182, pedigree (3,5,5,5,4)
  (same comment as for Water, cooling, unspecified natural origin)
- Phenol, pentachloro- [air, urban air close to ground]: 1.72964e-10 kg; lognormal variance with pedigree 0.1806, pedigree (2,5,5,5,4)
  (same comment as for Antimony)
- Benzene, ethyl- [air, urban air close to ground]: 6.41866e-7 kg; lognormal variance with pedigree 0.1806, pedigree (2,5,5,5,4)
  (same comment as for Antimony)
- Molybdenum [air, urban air close to ground]: 2.33951e-8 kg; lognormal variance with pedigree 0.7806, pedigree (2,5,5,5,4)
  (same comment as for Antimony)
- Acetone [air, urban air close to ground]: 2.15955e-7 kg; lognormal variance with pedigree 0.1806, pedigree (2,5,5,5,4)
  (same comment as for Antimony)
- Water [air, unspecified]: 0.0435034 m3; name water_to_air_unspecified; lognormal variance with pedigree 0.0827, pedigree (2,2,5,5,1)
  (same comment as for Water)
  property fraction, origin: fresh water 0; name fraction_origin_fresh_water
  property fraction, origin: unspecified 1; name fraction_origin_unspecified
  property fraction, origin: salt water 0; name fraction_origin_salt_water
- Propene [air, urban air close to ground]: 3.67923e-8 kg; lognormal variance with pedigree 0.1806, pedigree (2,5,5,5,4)
  (same comment as for Antimony)
- Iron [air, urban air close to ground]: 5.84878e-7 kg; lognormal variance with pedigree 0.7806, pedigree (2,5,5,5,4)
  (same comment as for Antimony)

## Extrapolations
see Geography This dataset has been copied from an original dataset covering the geography RER. The uncertainty has been adjusted accordingly.

## Review by Hans-Jörg Althaus 2003-08-26
passed
