# esterification of soybean oil

Dataset: EcoSpold 2, unit process
Geography: BR
Time period: 1996-01-01 to 2019-12-31
Technology level: current
Classification: EcoSpold01Categories: biomass/fuels
Classification: ISIC rev.4 ecoinvent: 19a: Liquid and gaseous fuels from biomass
Synonyms: soybean biodiesel production; biodiesel production; methyl soyate production
Tags: ConvertedDataset
Scenario: Business-as-Usual
System model: Allocation at the point of substitution
Share of production covered: 0 %
Generated by: Edgard Gnansounou
Published in: Jungbluth N. 2007
Database: ecoinvent
isCopyrightProtected: true
accessRestrictedTo: 1

## General comment
This dataset represents the production of soybean methyl ester, respectively glycerine, from crude soybean oil. Density of methyl ester = 0.88 kg/l

## Included activities start
From reception of raw materials at the factory gate through esterification of crude soybean oil.

## Included activities end
The dataset includes intermediate storage of the oil and products. System boundary is at the esterification plant.

## Geography
Data from different plants worldwide (incl. literature data)

## Technology
Typical vegetable oil esterification plant designed for the production of methyl ester (for use in the vehicle fuels market), global context. Base-catalyzed transesterification.

## Time period
Data from 1996 to 2003, current technology for large scale biodiesel plants worldwide

## Parameters
- fraction, cooling water, cooling pond system, to air: 0.032; name fraction_CW_CP_to_air; lognormal variance with pedigree 0.0413, pedigree (2,3,1,3,1)
  Calculated based on literature value (Scown, C.D., 2011, Water Footprint of U.S. Transportation Fuels and supplying information of the article) (Vionnet, S., Quantis Water Database - Technical Report, 2012).
- fraction, cooling water, to air: 0.3875; name fraction_CW_to_air; = (0.5*fraction_CW_OT_to_air)+(0.5*fraction_CW_R_to_air); lognormal variance with pedigree 0.092025, pedigree (4,4,3,2,4)
  Calculated value based on literature value (see comments of the other parametres present in this dataset) and expert opinion. In the case when no industry/literature data are available about the type of cooling or directly fraction, cooling water, to air specific for the process a default assumption is applied. It is assumed that the once-through cooling system is used in 50% of all cases and recirculating system is used in another 50% of all cases.
- fraction, cooling water, once-through system, to air: 0.004; name fraction_CW_OT_to_air; lognormal variance with pedigree 0.0413, pedigree (2,3,1,3,1)
  (same comment as for fraction, cooling water, cooling pond system, to air)
- fraction, cooling water, recirculating system, to air: 0.771; name fraction_CW_R_to_air; lognormal variance with pedigree 0.0413, pedigree (2,3,1,3,1)
  (same comment as for fraction, cooling water, cooling pond system, to air)
- fraction, process water, to air: 0.205 dimensionless; name fraction_PW_to_air; lognormal variance with pedigree 0.092025, pedigree (4,4,3,2,4)
  Literature value (Statistics Canada, 2007 & Shaffer, K.H., 2008, Consumptive water use in the Great Lakes Basin, USGS) (Vionnet, S., Quantis Water Database - Technical Report, 2012).
- fraction, tap water, to air: 0.205; name fraction_TW_to_air; = fraction_PW_to_air; lognormal variance with pedigree 0.092025, pedigree (4,4,3,2,4)
  Calculated value. See comment in the other parametres present in this dataset. Tap water is considered to be always used as process water, thus process water fractions to air are applied to all tap water input flows to calculate the amount of water consumed in the processes.
  Calculated value. See comment in the other parametres present in this dataset. Tap water is considered to be always used as process water, thus process water fractions to air are applied to all tap water input flows to calculate the amount of water consumed in the processes.

## Reference product
- vegetable oil methyl ester: 0 kg; By-product classification allocatable product; CPC 35491: Biodiesel
  production volume 6.1e7 kg
    Production of soybean methyl ester marginal in 2005 in BR
    Estimated as all production in Brazil. Source: F. O. Licht World Ethanol and Biofuels Report, vol. 4, no. 17 (9 May 2006), p. 395.
  property price 0.817 EUR2005
    Temporary price data. Calculated as 90% of purchasers price based on: 2004 import and export prices (total trades (USD) divided by total weight (kg) in EU27, USA, China, Japan and India) from UN Commodity Trade Statistics Database (http://data.un.org/Explorer.aspxDatabase [Accessed 2 July 2010]). Commodity: 'Veg fats, oils or fractions hydrogenated, esterified'.
  property carbon content 0.773
    carbon content on a dry matter basis (reserved; not for manual entry)
  property true value 0.794696
    allocation property applied in "true value" allocation // value calculated from revenue
  properties: wet mass 1 kg, water content 0, carbon content, non-fossil 0.732, dry mass 1 kg, water in wet mass 0 kg, carbon content, fossil 0.041, carbon allocation 0.773 kg
- glycerine: 1 kg; By-product classification allocatable product; CPC 34570: Glycerol; CAS 56-81-5
  EcoSpold01Location=BR
  production volume 6.649e6 kg
    Production of soybean methyl ester marginal in 2005 in BR
    Calculated relative to output of methyl ester (0.109 kg / kg PME)
  property price 0.792 EUR2005
    Temporary price data. Calculated as 90% of purchasers price based on: 2004 import and export prices (total trades (USD) divided by total weight (kg) in EU27, USA, China, Japan and India) from UN data - Glycerol (glycerine), nes including synthetic glycerol (http://data.un.org/Data.aspx?q=glycerine&d=ComTrade&f=_l1Code%3a16%3bcmdCode%3a152090; accessed 1 July 10)
  property carbon content 0.391304
    carbon content on a dry matter basis (reserved; not for manual entry)
  property true value 0.0840312
    allocation property applied in "true value" allocation // value calculated from revenue
  properties: carbon content, non-fossil 0.391304, water content 0, wet mass 1 kg, dry mass 1 kg, water in wet mass 0 kg, carbon content, fossil 0, carbon allocation 0.391304 kg

## By-products
- heat, for reuse in municipal waste incineration only: 0 MJ; CPC 17300: Steam and hot water; By-product classification allocatable product; pedigree (1,1,1,1,1)
  Net electricity generated from this waste and used in internal MSWI plant energy redistribution.
  Uncertainty: uncertainty is calculated from uncertainties in waste composition and uncertainties in energy efficiency and the uncertainty in internal energy demand
  production volume 209.082 MJ
  property exergy 0.1842 MJ; name E_th_prod_MSWI_exergy
    This exergy property is based on the exergy content of the product.
  property price 0.0106 EUR2005; name E_th_prod_MSWI_price_EUR2005
    Average European district heat price from Ecoheatcool and Euroheat 2005-2006, Ecoheat Work package 1: The European heat market. Final report. 10.6 EUR/GJ i s the price of district heat. http://www.solarthermalworld.org/files/Ecoheatcool%20WP1%20Web.pdf?download
  property true value relation 0.1842; name E_th_prod_MSWI_true_value_relation
    property to calculate "true value" from
  property true value 2.19957e-8
    allocation property applied in "true value" allocation // value calculated from true value relation
- electricity, for reuse in municipal waste incineration only: 0 kWh; CPC 17100: Electrical energy; By-product classification allocatable product; pedigree (1,1,1,1,1)
  (same comment as for heat, for reuse in municipal waste incineration only)
  production volume 28.919 kWh
  property price 0.1 EUR2005; name E_el_prod_MSWI_price_EUR2005
    Estimated to be the same price as in case of electricity, medium voltage.
  property exergy 3.6 MJ; name E_el_prod_MSWI_exergy
    This exergy property is based on the exergy content of the product.
  property true value relation 3.6; name E_el_prod_MSWI_true_value_relation
    property to calculate "true value" from
  property true value 5.94587e-8
    (same comment as for heat, for reuse in municipal waste incineration only)

## Inputs from technosphere
- heat, district or industrial, other than natural gas: 0.14659 MJ; lognormal variance with pedigree 0.040025, pedigree (1,1,5,2,1)
  EcoSpold01Location=RER
  Literature data & biodiesel producer
  Uncertainty: Literature data & biodiesel producer
- heat, district or industrial, natural gas: 0.663287 MJ; lognormal variance with pedigree 0.040025, pedigree (1,1,5,2,1)
  Literature data & biodiesel producer
  EcoSpold01Location=RER
  Uncertainty: Literature data & biodiesel producer
- hydrochloric acid, without water, in 30% solution state: 0.00403496 kg; lognormal variance with pedigree 0.040725, pedigree (2,2,5,2,1)
  (same comment as for heat, district or industrial, natural gas)
  properties: dry mass 1 kg, wet mass 1 kg
- vegetable oil esterification facility: 8.19366e-10 unit; lognormal variance with pedigree 0.3521, pedigree (1,4,5,3,1)
  Calculation, according to feed capacity and lifetime of the plant
  EcoSpold01Location=CH
  Uncertainty: Calculation, according to feed capacity and lifetime of the plant
- wastewater, average: -5.48209e-5 m3; name wastewater_output
  production volume 3814.4 m3; = Ref('ad983243-bce5-47a5-b1c4-7cf9f9913311', 'ProductionVolume') * ((Ref('b3ff56fa-f06f-4b50-8fa2-034c36d202e9')*-1) / Ref('ad983243-bce5-47a5-b1c4-7cf9f9913311'))
    Calculated from production volume of reference product using the relative outputs.
  property water content 2882.2; name water_content
  property price 0 EUR2005; name wastewater_output_price_EUR2005
  property wet mass 1000 kg; name WM
  property carbon content, fossil 0; name C_content_fossil
  property dry mass 0.346837 kg; name DM
  property carbon content, non-fossil 0.194039; name C_content_non_fossil
  property water in wet mass 999.653 kg; name WWM
- methanol: 0.0995941 kg; lognormal variance with pedigree 0.040025, pedigree (1,1,5,2,1)
  EcoSpold01Location=GLO
  Literature data & biodiesel producer
  Uncertainty: Literature data & biodiesel producer
  properties: dry mass 1 kg, carbon content, fossil 0.375, wet mass 1 kg
- electricity, medium voltage: 0.0370805 kWh; lognormal variance with pedigree 0.040025, pedigree (1,1,5,2,1)
  EcoSpold01Location=BR
  Literature data & biodiesel producer
  Uncertainty: Literature data & biodiesel producer
- phosphoric acid, industrial grade, without water, in 85% solution state: 0.0797829 kg; = 0.3055*0.9727/3.357; lognormal variance with pedigree 0.040725, pedigree (2,2,5,2,1)
  EcoSpold01Location=RER
  Previous value 0.011 kg, reduced to the same value as the global dataset to avoid negative values in the Rest-of-World dataset
  Uncertainty: Literature data & biodiesel producer
  properties: dry mass 1 kg, wet mass 1 kg
- soybean oil, crude: 0.901304 kg; lognormal variance with pedigree 0.050125, pedigree (1,2,5,2,1)
  Literature data & biodiesel producer
  EcoSpold01Location=BR
  Uncertainty: Literature data & biodiesel producer
  properties: wet mass 1 kg, carbon content, non-fossil 0.768, dry mass 1 kg
- tap water: 0.0147207 kg; name tap_water_input; source Sheenhan, J. 1998; lognormal variance with pedigree 0.052625, pedigree (3,3,5,2,1)
  EcoSpold01Location=RER
  Literature, environmental report
  Calculated based on literature (Sheenhan, J., 18, An Overview of Biodiesel and Petroleum Diesel Life Cycles; Omni Tech International, 2010, Life Cycle Impact of Soybean Production and Soy Industrial Products), (Vionnet, S., Quantis Water Database - Technical Report, 2012). The process starts when refined soybean oil enters the plant. It includes the processes: prepurification, deacidification, transesterification, destilation, etc. It is assumed that 95% of water use is allocated to cooling water and 5% of water is allocated as process water.
  Literature, environmental report
  Calculated based on literature (Sheenhan, J., 18, An Overview of Biodiesel and Petroleum Diesel Life Cycles; Omni Tech International, 2010, Life Cycle Impact of Soybean Production and Soy Industrial Products), (Vionnet, S., Quantis Water Database - Technical Report, 2012). The process starts when refined soybean oil enters the plant. It includes the processes: prepurification, deacidification, transesterification, destilation, etc. It is assumed that 95% of water use is allocated to cooling water and 5% of water is allocated as process water.
  Uncertainty: Literature, environmental report
  properties: dry mass 0.000337476 kg, water content 2962.17, carbon content, fossil 0.00178991, wet mass 1 kg
  note on carbon content, fossil: Bicarbonate content is 2.93 mol/m3. CO2 content is 0.1 mol/m3 (ecoinvent v2.2 report 8, Tab 93.1).

## Inputs from nature
- Water, cooling, unspecified natural origin [natural resource, in water]: 0.000279693 m3; name water_cooling_UNO_input; source Sheenhan, J. 1998; lognormal variance with pedigree 0.0593, pedigree (2,3,5,3,3)
  Calculated based on literature (Sheenhan, J., 18, An Overview of Biodiesel and Petroleum Diesel Life Cycles; Omni Tech International, 2010, Life Cycle Impact of Soybean Production and Soy Industrial Products), (Vionnet, S., Quantis Water Database - Technical Report, 2012). The process starts when refined soybean oil enters the plant. It includes the processes: prepurification, deacidification, transesterification, destilation, etc. The process ends when soybean methyl ester leaves the plant. It is assumed that 95% of water use is allocated to cooling water and 5% of water is allocated as process water.

## Emissions to nature
- Water [water, unspecified]: 0.000183015 m3; name water_to_water_unspecified; = (tap_water_input/1000)*(1-fraction_TW_to_air)+water_cooling_UNO_input*(1-fraction_CW_to_air); lognormal variance with pedigree 0.130025, pedigree (4,4,5,2,4)
  Calculated value based on literature values and expert opinion. See comments in the parametres' comment field.
  property fraction, origin: fresh water 0.0639453; name fraction_origin_fresh_water_Ww
  property fraction, origin: salt water 0; name fraction_origin_salt_water_Ww
  property fraction, origin: unspecified 0.936055; name fraction_origin_unspecified_Ww
- Water [air, unspecified]: 0.000111399 m3; name water_to_air_unspecified; = (tap_water_input/1000*fraction_TW_to_air)+(water_cooling_UNO_input*fraction_CW_to_air); lognormal variance with pedigree 0.0807, pedigree (2,2,5,1,1)
  (same comment as for Water)
  property fraction, origin: salt water 0; name fraction_origin_salt_water
  property fraction, origin: unspecified 0.97291; name fraction_origin_unspecified
  property fraction, origin: fresh water 0.0270895; name fraction_origin_fresh_water

## Sampling procedure
Cross-checking of various literature sources from 1998 to 2006

## Review by Niels Jungbluth 2006-08-15
Passed.
none

## Review by Emilia Moreno Ruiz 2012-03-16
name change from "soybean methyl ester" to "vegetable oil methyl ester"
