# pipeline construction, natural gas, low pressure distribution network

Dataset: EcoSpold 2, unit process
Geography: RoW
Time period: 1988-01-01 to 2019-12-31
Technology level: current
Classification: EcoSpold01Categories: natural gas/fuels
Classification: ISIC rev.4 ecoinvent: 4220:Construction of utility projects
Tags: ConvertedDataset
Scenario: Business-as-Usual
System model: Allocation at the point of substitution
Share of production covered: 100 %
Generated by: Mireille Faist Emmenegger (obsolete)
Published in: Faist Emmenegger, M. 2007
Database: ecoinvent
isCopyrightProtected: true
accessRestrictedTo: 1

## General comment
Pipeline infrastructure for gas distribution. Life time 40 years. Annual transport of 30 TJ/km/a.
[This dataset was already contained in the ecoinvent database version 2. It was not individually updated during the transfer to ecoinvent version 3. Life Cycle Impact Assessment results may still have changed, as they are affected by changes in the supply chain, i.e. in other datasets. This dataset was generated following the ecoinvent quality guidelines for version 2. It may have been subject to central changes described in the ecoinvent version 3 change report (http://www.ecoinvent.org/database/ecoinvent-version-3/reports-of-changes/), and the results of the central updates were reviewed extensively. The changes added e.g. consistent water flows and other information throughout the database. The documentation of this dataset can be found in the ecoinvent reports of version 2, which are still available via the ecoinvent website. The change report linked above covers all central changes that were made during the conversion process.]

## Included activities end
This dataset describes the infrastructure needed for the Swiss low (<0.1 bar) pressure distribution network.

## Geography
Data is based on Swiss data.

## Technology
The length of the pipelines is based on statistics, whereas the thickness of the pipeline is estimated.

## Reference product
- pipeline, natural gas, low pressure distribution network: 1 km; name pipeline_amount; CPC 53251: Local pipelines; By-product classification allocatable product
  EcoSpold01Location=CH
  production volume 87100 km; name pipeline_PV; = 3.5E6/40
    Data in 2014, gives a total of around 3,500,000 km of pipeline in 120 countries of the world. Divided by the 40 year lifespan of the pipeline, this gives an estimation of the number of km of pipeline constructed yearly.
  property price 44038 EUR2005
    UNdata;(Average prices of EU27; 1.291 EUR/kg) http://data.un.org/Data.aspx?q=pipeline&d=ComTrade&f=_l1Code%3a74%3bcmdCode%3a730410. Pipes, line, iron or steel, for oil or gas pipelines. Weight 42.6 t (excl. sand).
  property true value 44038; name pipeline_amount_true_value
    allocation property applied in "true value" allocation // value calculated from revenue

## By-products
- heat, for reuse in municipal waste incineration only: 0 MJ; CPC 17300: Steam and hot water; By-product classification allocatable product; pedigree (1,1,1,1,1)
  Net electricity generated from this waste and used in internal MSWI plant energy redistribution.
  Uncertainty: uncertainty is calculated from uncertainties in waste composition and uncertainties in energy efficiency and the uncertainty in internal energy demand
  production volume 3.20395e8 MJ
  property exergy 0.1842 MJ; name E_th_prod_MSWI_exergy
    This exergy property is based on the exergy content of the product.
  property price 0.0106 EUR2005; name E_th_prod_MSWI_price_EUR2005
    Average European district heat price from Ecoheatcool and Euroheat 2005-2006, Ecoheat Work package 1: The European heat market. Final report. 10.6 EUR/GJ i s the price of district heat. http://www.solarthermalworld.org/files/Ecoheatcool%20WP1%20Web.pdf?download
  property true value relation 0.1842; name E_th_prod_MSWI_true_value_relation
    property to calculate "true value" from
  property true value 18.0146
    allocation property applied in "true value" allocation // value calculated from true value relation
- electricity, for reuse in municipal waste incineration only: 0 kWh; CPC 17100: Electrical energy; By-product classification allocatable product; pedigree (1,1,1,1,1)
  (same comment as for heat, for reuse in municipal waste incineration only)
  production volume 4.55777e7 kWh
  property true value relation 3.6; name E_el_prod_MSWI_true_value_relation
    property to calculate "true value" from
  property price 0.1 EUR2005; name E_el_prod_MSWI_price_EUR2005
    Estimated to be the same price as in case of electricity, medium voltage.
  property exergy 3.6 MJ; name E_el_prod_MSWI_exergy
    This exergy property is based on the exergy content of the product.
  property true value 50.0847
    (same comment as for heat, for reuse in municipal waste incineration only)
- iron scrap, sorted, pressed: 0 kg; By-product classification Recyclable; CPC 39310: Slag, dross, scalings and other waste from the manufacture of iron or steel; pedigree (1,1,1,1,1)
  Iron scrap recovered from this waste.
  production volume 241087 kg
  property price 0.175 EUR2005
    Temporary price data. Calculated as 90% of purchasers price based on: 2005 import and export prices (total trades (USD) divided by total weight (kg) in biggest economies of the world: EU27, USA, Brasil, China, India, Japan and Russia) from UN Commodity Trade Statistics Database (http://data.un.org/Explorer.aspxDatabase [Accessed 2011.06.20]). Commodity: Waste or scrap, of cast iron
  property carbon content 0
    carbon content on a dry matter basis (reserved; not for manual entry)
  property true value 0.484388
    allocation property applied in "true value" allocation // value calculated from revenue
  properties: water content 0, water in wet mass 0 kg, carbon content, fossil 0, dry mass 1 kg, carbon content, non-fossil 0, wet mass 1 kg, carbon allocation 0 kg

## Inputs from technosphere
- building, multi-storey: 49.9223 m3; lognormal variance with pedigree 0.3706, pedigree (4,3,5,5,1)
  Qualified estimate
  EcoSpold01Location=RER
  Uncertainty: qualified estimate
- drawing of pipe, steel: 11482.1 kg; lognormal variance with pedigree 0.1106, pedigree (4,3,5,5,1)
  Qualified estimate
  EcoSpold01Location=RER
  Uncertainty: qualified estimate
- concrete, normal: 0 m3; name concrete_amount; pedigree (1,1,1,1,1)
  Qualified estimate
  EcoSpold01Location=CH
  Uncertainty: qualified estimate
  properties: water content 0.086758, dry mass 2190 kg, wet mass 2380 kg
- waste concrete, not reinforced: 0 kg; name waste_concrete_not_reinf_amount
  Amount in m3 of concrete multiplied by density (2400 kg/m3)
  production volume 0 kg
    Calculated from production volume of reference product using the relative outputs.
  property price 0 EUR2005; name waste_concrete_not_reinf_a_price_EUR2005
  properties: wet mass 1 kg, dry mass 1 kg
- cement, unspecified: 0 kg; pedigree (1,1,1,1,1)
  EcoSpold01Location=CH
  Qualified estimate
  Uncertainty: qualified estimate
  properties: wet mass 1 kg, dry mass 1 kg
- polyethylene, low density, granulate: 489.238 kg; lognormal variance with pedigree 0.1106, pedigree (4,3,5,5,1)
  Qualified estimate
  EcoSpold01Location=RER
  Uncertainty: qualified estimate
  properties: dry mass 1 kg, carbon content, fossil 0.857143, wet mass 1 kg
  note on carbon content, fossil: Polyethylene is formed out of a huge amount of ethylene monomers (C2H4) (ecoinvent v2.2 report 11_II). MW=28 g/mol
- transport, passenger car: 37641.4 km; lognormal variance with pedigree 0.2306, pedigree (4,3,5,5,1)
  EcoSpold01Location=CH
  Qualified estimate
  Uncertainty: qualified estimate
- waste concrete gravel: -26796.3 kg; name waste_concrete_gravel_amount
  Qualified estimate for CH based on new statistics for material share in network.
  production volume 2.33759e9 kg; = pipeline_PV * waste_concrete_gravel_amount / pipeline_amount
    Calculated from production volume of reference product using the relative outputs.
  property price 0 EUR2005; name waste_concrete_gravel_amou_price_EUR2005
  properties: dry mass 1 kg, wet mass 1 kg
- gravel, round: 27956.5 kg; lognormal variance with pedigree 0.1106, pedigree (4,3,5,5,1)
  Qualified estimate
  EcoSpold01Location=CH
  Uncertainty: qualified estimate
  properties: wet mass 1 kg, dry mass 1 kg
- waste reinforcement steel: -9413.01 kg; name waste_reinf_steel_amount; lognormal variance with pedigree 0.1286, pedigree (4,3,5,1,1)
  Qualified estimate for CH. Steel and iron pipelines are assumed to be recycled.
  production volume 8.2115e8 kg; = pipeline_PV * waste_reinf_steel_amount / pipeline_amount
    Calculated from production volume of reference product using the relative outputs.
  property price 0 EUR2005; name waste_reinf_steel_amount_price_EUR2005
  properties: dry mass 1 kg, wet mass 1 kg
- sand: 0 kg; pedigree (1,1,1,1,1)
  Qualified estimate
  EcoSpold01Location=CH
  Uncertainty: qualified estimate
  properties: wet mass 1 kg, dry mass 1 kg
- waste plastic, mixture: 0 kg; name waste_plastic_mix_amount; pedigree (1,1,1,1,1)
  EcoSpold01Location=CH
  Qualified estimate
  Uncertainty: qualified estimate
  production volume 0 kg
    Calculated from the production volume of pipeline, natural gas, low pressure distribution network in proportion to the respective output amounts.
  property price 0 EUR2005; name waste_plastic_mix_amount_price_EUR2005
  properties: wet mass 1 kg, dry mass 0.847 kg, carbon content, fossil 0.747344, water content 0.180638
  note on carbon content, fossil: C content in 1 kg DM was calculated using data in Tab A.2, ecoinvent v2.2 report 13_I
- pitch: 0 kg; name bitume_amount; pedigree (1,1,1,1,1)
  Qualified estimate
  EcoSpold01Location=RER
  Uncertainty: qualified estimate
  properties: carbon content, fossil 0.83, wet mass 1 kg, dry mass 1 kg
- waste bitumen: 0 kg; name waste_bitumen_amount; pedigree (1,1,1,1,1)
  Qualified estimate
  EcoSpold01Location=CH
  Uncertainty: qualified estimate
  production volume 0 kg
    (same comment as for waste plastic, mixture)
  property price 0 EUR2005; name waste_bitumen_amount_price_EUR2005
  properties: wet mass 1 kg, carbon content, fossil 0.842657, dry mass 0.986 kg, water content 0.0141988
- polyethylene, high density, granulate: 4622.8 kg; lognormal variance with pedigree 0.1106, pedigree (4,3,5,5,1)
  EcoSpold01Location=RER
  Qualified estimate
  Uncertainty: qualified estimate
  properties: wet mass 1 kg, carbon content, fossil 0.857143, dry mass 1 kg
- reinforcing steel: 5231.85 kg; lognormal variance with pedigree 0.1106, pedigree (4,3,5,5,1)
  Qualified estimate
  EcoSpold01Location=RER
  Uncertainty: qualified estimate
  properties: carbon content, fossil 0.004, dry mass 1 kg, wet mass 1 kg
- excavation, skid-steer loader: 674.949 m3; lognormal variance with pedigree 0.2306, pedigree (4,3,5,5,1)
  Qualified estimate
  EcoSpold01Location=RER
  Uncertainty: qualified estimate
- cast iron: 6290.2 kg; lognormal variance with pedigree 0.1106, pedigree (4,3,5,5,1)
  EcoSpold01Location=RER
  Qualified estimate
  Uncertainty: qualified estimate
  properties: dry mass 1 kg, wet mass 1 kg, carbon content, fossil 0.04
  note on carbon content, fossil: Cast iron is made by remelting pig iron in small furnaces (e.g. cupola furnaces or electric arc furnaces) and poured into moulds to make castings. It usually contains 2% to 6% carbon (ecoinvent v2.2 report 10_partII). An average content of 4% was considered
- concrete, normal: 0.0625834, 0.0065211, 0.0527929, 0.029696, 0.125754, 0.00424162, 2.44417 m3 (7 entries); lognormal variance with pedigree 0.1106, pedigree (4,3,5,5,1)
  Qualified estimate
  EcoSpold01Location=CH
  Uncertainty: qualified estimate
- waste concrete, not reinforced: -428.36, -6113.45 kg (2 entries)
  Amount in m3 of concrete multiplied by density (2400 kg/m3)
  production volume 5.70679e8 kg
- cement, unspecified: 85.1936, 6.23985, 17.7856, 409.446, 402.227, 11.8387, 130.024, 15.7315, 1757.1 kg (9 entries); lognormal variance with pedigree 0.1106, pedigree (4,3,5,5,1)
  EcoSpold01Location=CH
  Qualified estimate
  Uncertainty: qualified estimate
- sand: 29.4938, 5681.14, 369705 kg (3 entries); lognormal variance with pedigree 0.1106, pedigree (4,3,5,5,1)
  Qualified estimate
  EcoSpold01Location=CH
  Uncertainty: qualified estimate
- waste plastic, mixture: -471.043, -31.4733, -2.38027, -12.9996, -5.25169, -12.3443, -401.351, -3297.56 kg (8 entries); lognormal variance with pedigree 0.1106, pedigree (4,3,5,5,1)
  EcoSpold01Location=CH
  Qualified estimate
  Uncertainty: qualified estimate
  production volume 3.69391e8 kg
- pitch: 55.8438, 3.18264, 185.053, 144.045, 6.45671, 9.21757, 814.304 kg (7 entries); lognormal variance with pedigree 0.1106, pedigree (4,3,5,5,1)
  Qualified estimate
  EcoSpold01Location=RER
  Uncertainty: qualified estimate
- waste bitumen: -395.559, -822.544 kg (2 entries); lognormal variance with pedigree 0.1106, pedigree (4,3,5,5,1)
  Qualified estimate
  EcoSpold01Location=CH
  Uncertainty: qualified estimate
  production volume 1.06262e8 kg

## Inputs from nature
- Transformation, from unspecified [natural resource, land]: 7.1289 m2; lognormal variance with pedigree 0.1906, pedigree (4,3,5,5,1)
  Qualified estimate
  Uncertainty: qualified estimate
- Transformation, to industrial area [natural resource, land]: 7.1289 m2; lognormal variance with pedigree 0.1906, pedigree (4,3,5,5,1)
  Qualified estimate
  Uncertainty: qualified estimate
- Occupation, construction site [natural resource, land]: 3324.82 m2*year; lognormal variance with pedigree 0.1706, pedigree (4,3,5,5,1)
  Qualified estimate for CH
  Uncertainty: qualified estimate for CH
- Occupation, industrial area [natural resource, land]: 142.778 m2*year; lognormal variance with pedigree 0.1106, pedigree (4,3,5,5,1)
  Qualified estimate
  Uncertainty: qualified estimate

## Sampling procedure
statistics

## Extrapolations
none This dataset has been copied from an original dataset covering the geography CH. The uncertainty has been adjusted accordingly.

## Review by Michael Spielmann (obsolete) 2003-08-10
Passed.
