# heat and power co-generation, lignite

Dataset: EcoSpold 2, unit process
Geography: PL
Time period: 1980-01-01 to 2019-12-31
Technology level: modern
Classification: ISIC rev.4 ecoinvent: 3510:Electric power generation, transmission and distribution
Classification: EcoSpold01Categories: hard coal/power plants
Synonyms: sub-bituminous coal; brown coal
Tags: coal power; lignite power; fossil fuels
Scenario: Business-as-Usual
System model: Allocation at the point of substitution
Generated by: Karin Treyer
Published in: Röder, A. 2007
Database: ecoinvent
isCopyrightProtected: true
accessRestrictedTo: 1

## General comment
This dataset represents the production of high voltage electricity and district heat in an average combined heat and power lignite power plant in Poland in 2012. 'Lignite' is used as representant for 'brown coal', which includes sub-bituminous coal and lignite according to the definition of the IEA electricity information 2014. (IEA. 2014. Electricity Information 2014. ISBN 978-92-64-21692-1. International Energy Agency (IEA), Paris Cedex (FR).)
All exchanges in this dataset except for emissions of SO2, NOx and particles are production-weighted averages of the figures in the datasets in ecoinvent version two, which are valid for the following 10 countries: AT, BA, CZ, DE, ES, FR, HU, PL, SI, SK. The exception values are production-weighted averages of version 2 countries and the new countries in version 3 (AU, CA, CL, ID, IN, KR, MX, MY, PE, RU, TH, TR, TW, TZ, UA, ZA)
Comments on the inventory data of emissions:
- for the assessment of main characteristics (sulphur and ash content of coal, efficiency of the plant) and CO2 a bottom-up approach has been used. It consists in the collection of information about single plants.
- Halogene emissions have been estimated on the basis of the content of the species in the country-specific coal input mix, assuming average retention rates.
- For CO and particle emissions average values for the former UCTE are included (Union for the Coordination of the Transmission of Electricity, since 2009 replaced by ENTSO-E European Network of Transmission System Operators for Electricity).
- The country specific emissions of N2O depend on the share of DeNOx. - Emissions of trace elements were calculated by means of a formula (CORINAIR) using the ash content in the country-specific coal input mix and average transfer coefficients for coal power plants, taking into account the share of DeSOx installed.
- Emission of uranium and thorium radioactive isotopes were assumed proportional to the corresponding element emitted with particles; the other non-gaseous radioactive isotopes of the uranium and thorium decay chain were assumed proportional to the emitted U-238 or Th-232.
- The emission of gaseous radon and K-40 are taken from the literature.
IEA. 2009. Coal information, 2009 edition. Documentation for beyond 2020 files. International Energy Agency.
European Environment Agency (1991) CORINAIR Inventory; VOC's Default Emission Factors
[This dataset is meant to replace the following datasets:
- electricity production, lignite, PL, 1993 - 2005]

## Included activities start
From the constructed lignite power plant ready to produce heat and electricity.

From reception of lignite and operating materials at power plant gate. Functional unit is "1MJ of lignite input to combustion".

## Included activities end
This activity ends with 1MJ of lignite in a combined heat and power power plant. .
Energy conversion for electricity production. Particle removal is included in this module. DeSOx is described in a different module; it is applied here according to the actual use in the country; SOx emission is the reduced one. There is no information about the use of DeNOx in the country. It is assumed that 25 % of the plants are river cooled, 75 % use cooling tower (average UCTE). The water treatment is described in separate modules. The disposal of non-recycled ashes is modelled separately.

## Geography
Country-specific data.

## Technology
POWER PLANT:
Lignite power plant input is a dataset which consists of a mix of 30% 100MW power plant and 70% 500MW power plant. The plants are used for basic load with 6000 hours of operation at full capacity per year. The plants are assumed to operate 200000 hours during its lifetime.

## Time period
The Annual Production Volume is valid for the year 2012.

## Parameters
- fraction, water, decarbonised, to air: 0.0251074; name fraction_WDC_to_air; = fraction_CW_to_air; lognormal variance with pedigree 0.041425, pedigree (2,3,2,2,1)
  Calculated value. See comments in the other parametres present in this dataset. Decarbonised water is considered to be always used as cooling water, thus cooling water fractions to air are applied to all carbonised water input flows to calculate the amount of water consumed in the processes.
  nan
- losses from gross electricity production: 0.09 dimensionless; name losses_gross_net; lognormal variance with pedigree 0.003525, pedigree (3,2,2,2,2)
  Calculated value. Own use of electricity plants in this country in 2012. For the OECD countries, the OECD iLibrary provides gross and net electricity values for the specific sector \'Total Fuel Combustion\', from which the loss value is being calculated. This value is then applied to all fossil fuel datasets, as no data on a more detailed level were available.
  OECD. 2014. IEA Electricity Information Statistics: OECD - Electricity and heat generation. OECD iLibrary. Online database. DOI : 10.1787/elect-data-en
  nan
  Uncertainty: generic IEA value used
- fraction, cooling water, to air: 0.0251074; name fraction_CW_to_air; lognormal variance with pedigree 0.092025, pedigree (4,4,3,2,4)
  Calculated value based on literature value (Scown, 2011 & Floerke, 2009, Future changes of freshwater needs in the electricity production sector & Stiegel, 2008, Estimating Freshwater Needs to Meet Future Thermoelectric Generation Requirements) (Vionnet, S., Quantis Water Database - Technical Report, 2012).
  nan
- water consumption, electricity production from hard coal, recirculating CS: 0.0018 m3/kWh; name WConsumption_EP_HC_recirculatingCS; lognormal variance with pedigree 0.092025, pedigree (4,4,3,2,4)
  Estimated based on literature (Scown, 2011, Water Footprint of U.S. Transportation Fuels, SI). The amount of water consumed while burning lignite and peat is assumed to be the same as in case of coal.
  nan
- water withdrawal, electricity production from hard coal, recirculating CS: 0.0021 m3/kWh; name WWithdrawal_EP_HC_recirculating_CS; lognormal variance with pedigree 0.092025, pedigree (4,4,3,2,4)
  Estimated based on literature (Scown, 2011, Water Footprint of U.S. Transportation Fuels, SI). The amount of water withdrawn while burning lignite and peat is assumed to be the same as in case of coal.
  nan
- fraction, process water, to air: 0.15 dimensionless; name fraction_PW_to_air; lognormal variance with pedigree 0.092025, pedigree (4,4,3,2,4)
  Literature value. In case when no industry/process specific data are available, default evaporation fraction value is used. This value is 15% and is based on literature (Statistics Canada, 2007 & Shaffer, K.H., 2008, Consumptive water use in the Great Lakes Basin, USGS & Shiklomanov, 2003, World Water Resources at the Beginning of the 21st Century) and has been approved by an expert.
  nan
- water consumption, electricity production from hard coal, once-through and cooli: 0.0014 m3/kWh; name WConsumption_EP_HC_once_through_andCP_CS; lognormal variance with pedigree 0.092025, pedigree (4,4,3,2,4)
  (same comment as for water consumption, electricity production from hard coal, recirculatin)
- water withdrawal, electricity production from hard coal, once-through and coolin: 0.0815 m3/kWh; name WWithdrawal_EP_HC_once_through_andCP_CS; lognormal variance with pedigree 0.092025, pedigree (4,4,3,2,4)
  (same comment as for water withdrawal, electricity production from hard coal, recirculating)
- factor: input of MJ for the production of 1 kWh: 10.7143 MJ/kWh; name factor_MJ_kWh; = 1*3.6/efficiency; lognormal variance with pedigree 0.0532, pedigree (4,4,3,4,4)
  Calculated value. 3.6 MJ = 1kWh.
  nan
- gross electricity production: 5.4054e10 kWh; name gross_electricity; lognormal variance with pedigree 0.001225, pedigree (2,1,1,2,1)
  Literature value/statistics. Taken from the IEA electricity information 2014.
  IEA. 2014. Electricity Information 2014. ISBN 978-92-64-21692-1. International Energy Agency (IEA), Paris Cedex (FR).
  nan
- once-through and cooling pond cooling systems as a fraction of all cooling syste: 0.73 dimensionless; name once_through_andCP_CS_fractio_from_allCS; lognormal variance with pedigree 0.092025, pedigree (4,4,3,2,4)
  Calculated as an average of data available for Europe (Floerke, 2008, Future changes of freshwater needs in the electricity production sector) and USA (NERL, 2011, Estimating freshwater needs to meet future thermoelectric generation requirements).
  nan
- fraction, water, completely softened, to air: 0.15; name fraction_WCS_to_air; = fraction_PW_to_air; lognormal variance with pedigree 0.092025, pedigree (4,4,3,2,4)
  Calculated value. See comment in the other parametres present in this dataset. Water, completely softened is considered to be always used as process water, thus process water fractions to air are applied to all water, completely softened input flows to calculate the amount of water consumed in the processes.
  nan
- recirculating cooling system as a fraction of all cooling systems: 0.27 dimensionless; name recirculating_CS_fraction_from_allCS; lognormal variance with pedigree 0.092025, pedigree (4,4,3,2,4)
  (same comment as for once-through and cooling pond cooling systems as a fraction of all coo)
- efficiency: 0.336 dimensionless; lognormal variance with pedigree 0.003325, pedigree (3,2,1,2,2)
  Literature value/calculated value. Net electrical efficiency based on the lower heating value (LHV).
  For all OECD countries, the IEA Electricity information 2014 provides data for the year 2012 on fuel input (TJ, Net calorific value NCV) and gross electricity production (GWh) as well as heat production (TJ) in tables 8 and 9 for each country for electricity only and Combined Heat and Power (CHP) plants each. Together with the information on own use (see parameter 'losses'), the net electrical efficiency based on the NCV is calculated.
  For all non-OECD countries, data from the IEA Energy balances of non-OECD countries 2014 have been used. These tables do not always provide information on how much of the electricity has been produced in electricity only and in CHP plants, but often give the total value only.
  IEA. 2014. Electricity Information 2014. ISBN 978-92-64-21692-1. International Energy Agency (IEA), Paris Cedex (FR).
  IEA/OECD. 2014. Energy balances of non-OECD countries 2014. International Energy Agency (IEA), Paris Cedex (FR).
  output relative to input (requires additional specification)

## Reference product
- heat, district or industrial, other than natural gas: 1 MJ; CPC 17300: Steam and hot water; By-product classification allocatable product
  Literature value/calculated value. Net thermal efficiency based on the lower heating value (LHV).
  For all OECD countries, the IEA Electricity information 2014 provides data for the year 2012 on fuel input (TJ, Net calorific value NCV) and gross electricity production (GWh) as well as heat production (TJ) in tables 8 and 9 for each country for electricity only and Combined Heat and Power (CHP) plants each. Together with the information on own use (see parameter 'losses'), the net electrical efficiency based on the NCV is calculated.
  For all non-OECD countries, data from the IEA Energy balances of non-OECD countries 2014 have been used. These tables do not always provide information on how much of the electricity has been produced in electricity only and in CHP plants, but often give the total value only.
  IEA. 2014. Electricity Information 2014. ISBN 978-92-64-21692-1. International Energy Agency (IEA), Paris Cedex (FR).
  IEA/OECD. 2014. Energy balances of non-OECD countries 2014. International Energy Agency (IEA), Paris Cedex (FR).
  production volume 5.482e9 MJ
    Literature value/statistics. Taken from the IEA electricity information 2014. The global value is the sum of all lignite CHP datasets in ecoinvent.
    IEA. 2014. Electricity Information 2014. ISBN 978-92-64-21692-1. International Energy Agency (IEA), Paris Cedex (FR).
  property exergy 0.1842 MJ
    This exergy property is based on the exergy content of the product.
  property price 0.0106 EUR2005
    Average European district heat price from Ecoheatcool and Euroheat 2005-2006, Ecoheat Work package 1: The European heat market. Final report. 10.6 EUR/GJ i s the price of district heat. http://www.solarthermalworld.org/files/Ecoheatcool%20WP1%20Web.pdf?download
  property true value 5.02952e-5
    allocation property applied in "true value" allocation // value calculated from true value relation
  properties: corresponding fuel use, propane, furnace >100kW 0 MJ, true value relation 0.1842

## By-products
- electricity, high voltage: 0 kWh; name electricity; = efficiency/3.6; CPC 17100: Electrical energy; By-product classification allocatable product; undefined min 1, max 1, standardDeviation95 0, pedigree (1,1,3,1,1)
  Electricity output per MJ of hard coal burned.
  production volume 4.91891e10 kWh; name apv_el; = gross_electricity*(1- losses_gross_net)
    Calculated value
  property price 0.0977 EUR2005; name electricity_price_EUR2005
    Temporary price data. Calculated as 90% of purchasers price based on: 94% of the average price (to account for a 6% loss in transformation and transmission) for electricity for industrial consumersin 2005 (excluded taxes). From IEA.
  property true value relation 3.6; name electricity_true_value_relation
    property to calculate "true value" from
  property exergy 3.6 MJ; name electricity_exergy
    This exergy property is based on the exergy content of the product.
  property true value 0.00917437; name electricity_true_value
    (same comment as for heat, district or industrial, other than natural gas)
- heat, for reuse in municipal waste incineration only: 0 MJ; CPC 17300: Steam and hot water; By-product classification allocatable product; pedigree (1,1,1,1,1)
  Net electricity generated from this waste and used in internal MSWI plant energy redistribution.
  Uncertainty: uncertainty is calculated from uncertainties in waste composition and uncertainties in energy efficiency and the uncertainty in internal energy demand
  production volume 358.28 MJ
  property exergy 0.1842 MJ; name E_th_prod_MSWI_exergy
    This exergy property is based on the exergy content of the product.
  property price 0.0106 EUR2005; name E_th_prod_MSWI_price_EUR2005
    (same comment as for heat, district or industrial, other than natural gas)
  property true value relation 0.1842; name E_th_prod_MSWI_true_value_relation
    property to calculate "true value" from
  property true value 3.66337e-11
    (same comment as for heat, district or industrial, other than natural gas)
- electricity, for reuse in municipal waste incineration only: 0 kWh; CPC 17100: Electrical energy; By-product classification allocatable product; pedigree (1,1,1,1,1)
  (same comment as for heat, for reuse in municipal waste incineration only)
  production volume 50.4595 kWh
  property true value relation 3.6; name E_el_prod_MSWI_true_value_relation
    property to calculate "true value" from
  property price 0.1 EUR2005; name E_el_prod_MSWI_price_EUR2005
    Estimated to be the same price as in case of electricity, medium voltage.
  property exergy 3.6 MJ; name E_el_prod_MSWI_exergy
    This exergy property is based on the exergy content of the product.
  property true value 1.00835e-10
    (same comment as for heat, district or industrial, other than natural gas)

## Inputs from technosphere
- NOx retained, by selective catalytic reduction: 0 kg; name nox_retained; source Itten R. 2012; pedigree (1,1,3,1,1)
  Exchange present due to parent child relationship
  properties: dry mass 1 kg, wet mass 1 kg
- petroleum coke: 0 kg; name petroleum_coke; pedigree (1,1,3,1,1)
  Literature value/calculated value. Petroleum coke use when burning 1MJ of lignite. Weighted average with electricity production data (Itten&Frischknecht 2012) and values of 10 countries
  (AT, BA, CZ, DE, ES, FR, HU, PL, SI, SK) (Röder et al. 2007)
  Source:
  Itten R. and Frischknecht R. (2012) Life Cycle Inventories of Electricity Mixes and Grid. ESU-services Ltd., Uster, Switzerland.
  properties: dry mass 1 kg, carbon content, fossil 0.885, wet mass 1 kg
- SOx retained, in lignite flue gas desulfurisation: 0.000318957 kg; name sox_retained; source Itten R. 2012; lognormal variance with pedigree 0.004, pedigree (3,1,3,1,1)
  see power plant data base for details
  Amount was scaled to the amount of reference product.
  properties: wet mass 1 kg, dry mass 1 kg
- residue from cooling tower: -2.72613e-6 kg; name cooling_tower_residue; pedigree (1,1,3,1,1)
  Exchange present due to parent child relationship
  production volume 245946 kg; = apv_el*cooling_tower_residue
    Calculated from production volume of reference product using the relative outputs.
  property price 0 EUR2005; name cooling_tower_residue_price_EUR2005
  properties: carbon content, fossil 0.0544233, water content 0.428571, dry mass 0.7 kg, wet mass 1 kg
- water, decarbonised: 0.0817838 kg; name water_decarbonised_input; lognormal variance with pedigree 0.052025, pedigree (4,5,4,2,3)
  Literature value/calculated value. Cooling water, decarbonised, for the cooling water circuit lost when burning 1MJ of lignite. Röder et al. 2007, Tab. 9.65 and Tab. 9.66, p. 160f. These tables give an amount of 0.15 kg/MJ burned, which is valid for the assumption of 75% wet cooling and 25% run-through cooling. However, this revised dataset assumes 100% wet cooling.
  properties: wet mass 1 kg
- lignite: 0.065427 kg; lognormal variance with pedigree 0.0026, pedigree (2,1,3,1,1)
  (same comment as for SOx retained, in lignite flue gas desulfurisation)
  properties: water content 1.38095, wet mass 1 kg, dry mass 0.42 kg, carbon content, fossil 0.655
  note on carbon content, fossil: C content of dry lignite is 58-73% (specified in Tab 1.1, report 6, part VI). A mean content of 0.655 kg C/kg dry lignite was considered.
- lignite power plant: 5.08877e-13 unit; name lignite_power_plant; = 1/(200000*500*1000)*(efficiency/3.6); source Röder, A. 2007, p. p.99; lognormal variance with pedigree 0.3686, pedigree (5,3,4,5,3)
  Calculated value. At the moment, the lignite power plant input consists of mix of a 100MWe power plant (30%) and a 500MWe power plant (70%).
  For this calculation, 6000 load hours per year are assumed. It is assumed that a total of 200'000h is reached during the lifetime. A capacity of 500MW is taken for the calculation.
- chlorine, liquid: 5.45225e-6 kg; lognormal variance with pedigree 0.108025, pedigree (5,4,4,2,3)
  Rough guess
  properties: wet mass 1 kg, dry mass 1 kg
- lignite power plant: 0 unit; name dummy123; source Röder, A. 2007, p. p.99; uniform min 0, max 0, pedigree (1,1,3,1,1)
  (same comment as for lignite power plant)
- lignite ash: -0.00670627 kg; name lignite_ash; source Röder, A. 2007, p. Tab. 9.69, p.165; lognormal variance with pedigree 0.072, pedigree (5,1,3,1,1)
  calculated from mass balance
  Amount was scaled to the amount of reference product.
  production volume 6.05026e8 kg; = apv_el*lignite_ash
    Calculated from the electricity production with lignite in proportion to the respective output amounts.
  property price 0 EUR2005; name ash_price_EUR2005
  properties: wet mass 1 kg, dry mass 1 kg
- water, completely softened: 0.00327135 kg; name water_softened_input; lognormal variance with pedigree 0.052025, pedigree (4,5,4,2,3)
  Literature value/calculated value. Feed water for the steam circuit lost when burning 1MJ of lignite. Röder et al. 2007, Tab. 9.65 and Tab. 9.66, p. 160f.
  properties: wet mass 1 kg

## Inputs from nature
- Water, cooling, unspecified natural origin [natural resource, in water]: 0.030457 m3; name water_cooling_UNO_input; = ((recirculating_CS_fraction_from_allCS*WWithdrawal_EP_HC_recirculating_CS)+(once_through_andCP_CS_fractio_from_allCS*WWithdrawal_EP_HC_once_through_andCP_CS))/11.52*factor_MJ_kWh; source Scown, C.D., et al. 2011; lognormal variance with pedigree 0.098025, pedigree (4,4,4,2,4)
  Calculated based on literature data.

## Emissions to nature
- Strontium [air, non-urban air or from high stacks]: 2.44806e-8 kg; name strontium; lognormal variance with pedigree 0.732, pedigree (5,1,3,1,1)
  calculated from trace element balance, input uncertain
  Amount was scaled to the amount of reference product.
- Water [water, unspecified]: 0.0297748 m3; name water_to_water_unspecified; = (water_softened_input/1000)*(1-fraction_WCS_to_air)+(water_decarbonised_input/1000)*(1-fraction_WDC_to_air)+water_cooling_UNO_input*(1-fraction_CW_to_air); lognormal variance with pedigree 0.098025, pedigree (4,4,4,2,4)
  Calculated value based on literature values and expert opinion. See comments in the parametres' comment field.
  property fraction, origin: salt water 0; name fraction_origin_salt_water_Ww
  property carbon content, fossil 0; name C_content_fossil
  property dry mass 0 kg; name DM
  property wet mass 1000 kg; name WM
  property fraction, origin: unspecified 0.971087; name fraction_origin_unspecified_Ww
  property carbon content, non-fossil 0; name C_content_non_fossil
  property fraction, origin: fresh water 0.0289128; name fraction_origin_fresh_water_Ww
  property water in wet mass 1000 kg; name WWM
- Dinitrogen monoxide [air, non-urban air or from high stacks]: 2.72613e-7 kg; name dinitrogen_monoxide; lognormal variance with pedigree 0.072025, pedigree (3,4,4,2,1)
  based on available literature
  Amount was scaled to the amount of reference product.
- Potassium-40 [air, non-urban air or from high stacks]: 4.53082e-6 kBq; name potassium_40; lognormal variance with pedigree 0.382, pedigree (5,1,3,1,1)
  (same comment as for Strontium)
- Particulates, > 10 um [air, non-urban air or from high stacks]: 3.77296e-6 kg; name particulates_gt10; source Itten R. 2012; lognormal variance with pedigree 0.122, pedigree (5,1,3,1,1)
  (same comment as for SOx retained, in lignite flue gas desulfurisation)
- Copper [air, non-urban air or from high stacks]: 1.45575e-8 kg; name copper; lognormal variance with pedigree 0.732, pedigree (5,1,3,1,1)
  (same comment as for Strontium)
- Carbon dioxide, fossil [air, non-urban air or from high stacks]: 0.0572487 kg; name carbon_dioxide_fossil; lognormal variance with pedigree 0.004, pedigree (3,1,3,1,1)
  based on available literature
  Amount was scaled to the amount of reference product.
- Methane, fossil [air, non-urban air or from high stacks]: 5.45225e-7 kg; name methane_fossil; lognormal variance with pedigree 0.072025, pedigree (3,4,4,2,1)
  based on available literature
  Amount was scaled to the amount of reference product.
- Radon-220 [air, non-urban air or from high stacks]: 7.90577e-5 kBq; name radon_220; lognormal variance with pedigree 0.382, pedigree (5,1,3,1,1)
  (same comment as for Strontium)
- Hydrocarbons, aliphatic, unsaturated [air, non-urban air or from high stacks]: 1.17769e-7 kg; name hydrocarbons_aliphatic_unsaturated; lognormal variance with pedigree 0.078025, pedigree (3,5,4,2,1)
  based on available literature
  Amount was scaled to the amount of reference product.
- Dioxins, measured as 2,3,7,8-tetrachlorodibenzo-p-dioxin [air, non-urban air or from high stacks]: 3.81658e-15 kg; name dioxins; lognormal variance with pedigree 0.338025, pedigree (3,5,4,2,1)
  based on available literature
  Amount was scaled to the amount of reference product.
- Chromium VI [air, non-urban air or from high stacks]: 5.94296e-10 kg; name chromium_vi; lognormal variance with pedigree 0.482, pedigree (1,1,3,1,1)
  based on range of data
  Amount was scaled to the amount of reference product.
- Cobalt [air, non-urban air or from high stacks]: 4.20914e-10 kg; name cobalt; lognormal variance with pedigree 0.732, pedigree (5,1,3,1,1)
  (same comment as for Strontium)
- Radon-222 [air, non-urban air or from high stacks]: 0.000140123 kBq; name radon_222; lognormal variance with pedigree 0.382, pedigree (5,1,3,1,1)
  (same comment as for Strontium)
- Hydrogen fluoride [air, non-urban air or from high stacks]: 1.12316e-6 kg; name hydrogen_fluoride; lognormal variance with pedigree 0.202, pedigree (5,1,3,1,1)
  (same comment as for Strontium)
- Hydrocarbons, aliphatic, alkanes, unspecified [air, non-urban air or from high stacks]: 1.19404e-7 kg; name hydrocarbons_al_al_unspec; lognormal variance with pedigree 0.078025, pedigree (3,5,4,2,1)
  based on available literature
  Amount was scaled to the amount of reference product.
- Water [air, unspecified]: 0.000767239 m3; name water_to_air_unspecified; = (water_softened_input/1000)*fraction_WCS_to_air+(water_decarbonised_input/1000)*fraction_WDC_to_air+water_cooling_UNO_input*fraction_CW_to_air; lognormal variance with pedigree 0.098025, pedigree (4,4,4,2,4)
  (same comment as for Water)
  property fraction, origin: salt water 0; name fraction_origin_salt_water
  property fraction, origin: unspecified 0.965581; name fraction_origin_unspecified
  property fraction, origin: fresh water 0.0344187; name fraction_origin_fresh_water
- Lead-210 [air, non-urban air or from high stacks]: 1.23221e-5 kBq; name lead_210; lognormal variance with pedigree 0.382, pedigree (5,1,3,1,1)
  (same comment as for Strontium)
- Carbon monoxide, fossil [air, non-urban air or from high stacks]: 1.09045e-5 kg; name carbon_monoxide_fossil; lognormal variance with pedigree 0.672025, pedigree (3,4,4,2,1)
  based on available literature
  Amount was scaled to the amount of reference product.
- Thorium-232 [air, non-urban air or from high stacks]: 1.71746e-6 kBq; name thorium_232; lognormal variance with pedigree 0.382, pedigree (5,1,3,1,1)
  (same comment as for Strontium)
- Zinc [air, non-urban air or from high stacks]: 2.81336e-8 kg; name zinc; lognormal variance with pedigree 0.732, pedigree (5,1,3,1,1)
  (same comment as for Strontium)
- Molybdenum [air, non-urban air or from high stacks]: 2.71522e-9 kg; name molybdenum; lognormal variance with pedigree 0.732, pedigree (5,1,3,1,1)
  (same comment as for Strontium)
- Cadmium [air, non-urban air or from high stacks]: 1.20495e-9 kg; name cadmium; lognormal variance with pedigree 0.732, pedigree (5,1,3,1,1)
  (same comment as for Strontium)
- Propane [air, non-urban air or from high stacks]: 1.90829e-8 kg; name propane; lognormal variance with pedigree 0.078025, pedigree (3,5,4,2,1)
  based on available literature
  Amount was scaled to the amount of reference product.
- Propene [air, non-urban air or from high stacks]: 8.7236e-9 kg; name propene; lognormal variance with pedigree 0.078025, pedigree (3,5,4,2,1)
  based on available literature
  Amount was scaled to the amount of reference product.
- Chromium [air, non-urban air or from high stacks]: 4.80889e-9 kg; name chromium; lognormal variance with pedigree 0.732, pedigree (5,1,3,1,1)
  (same comment as for Strontium)
- Polonium-210 [air, non-urban air or from high stacks]: 2.24633e-5 kBq; name polonium_210; lognormal variance with pedigree 0.382, pedigree (5,1,3,1,1)
  (same comment as for Strontium)
- Uranium-238 [air, non-urban air or from high stacks]: 2.64434e-6 kBq; name uranium_238; lognormal variance with pedigree 0.382, pedigree (5,1,3,1,1)
  (same comment as for Strontium)
- Arsenic [air, non-urban air or from high stacks]: 3.75115e-9 kg; name arsenic; lognormal variance with pedigree 0.732, pedigree (5,1,3,1,1)
  (same comment as for Strontium)
- Manganese [air, non-urban air or from high stacks]: 1.58115e-8 kg; name manganese; lognormal variance with pedigree 0.732, pedigree (5,1,3,1,1)
  (same comment as for Strontium)
- Nitrogen oxides [air, non-urban air or from high stacks]: 7.7422e-5 kg; name nitrogen_oxides; source Itten R. 2012; lognormal variance with pedigree 0.044, pedigree (3,1,3,1,1)
  (same comment as for SOx retained, in lignite flue gas desulfurisation)
- Particulates, < 2.5 um [air, non-urban air or from high stacks]: 1.78289e-5 kg; name particulates_lt2_5; source Itten R. 2012; lognormal variance with pedigree 0.382, pedigree (5,1,3,1,1)
  (same comment as for SOx retained, in lignite flue gas desulfurisation)
- PAH, polycyclic aromatic hydrocarbons [air, non-urban air or from high stacks]: 5.45225e-10 kg; name pah; lognormal variance with pedigree 0.338025, pedigree (3,5,4,2,1)
  based on available literature
  Amount was scaled to the amount of reference product.
- Toluene [air, non-urban air or from high stacks]: 5.94296e-8 kg; name toluene; lognormal variance with pedigree 0.078025, pedigree (3,5,4,2,1)
  based on available literature
  Amount was scaled to the amount of reference product.
- Boron [air, non-urban air or from high stacks]: 1.49937e-7 kg; name boron; lognormal variance with pedigree 0.732, pedigree (5,1,3,1,1)
  (same comment as for Strontium)
- Mercury [air, non-urban air or from high stacks]: 6.92436e-9 kg; name mercury; lognormal variance with pedigree 0.732, pedigree (5,1,3,1,1)
  (same comment as for Strontium)
- Benzo(a)pyrene [air, non-urban air or from high stacks]: 1.09045e-13 kg; name benzo_a_pyrene; lognormal variance with pedigree 0.078025, pedigree (3,5,4,2,1)
  based on available literature
  Amount was scaled to the amount of reference product.
- Butane [air, non-urban air or from high stacks]: 1.03593e-8 kg; name butane; lognormal variance with pedigree 0.078025, pedigree (3,5,4,2,1)
  based on available literature
  Amount was scaled to the amount of reference product.
- Radium-226 [air, non-urban air or from high stacks]: 3.17321e-6 kBq; name radium_226; lognormal variance with pedigree 0.382, pedigree (5,1,3,1,1)
  (same comment as for Strontium)
- Sulfur dioxide [air, non-urban air or from high stacks]: 0.000280791 kg; name sulfur_dioxide; source Itten R. 2012; lognormal variance with pedigree 0.004, pedigree (3,1,3,1,1)
  (same comment as for SOx retained, in lignite flue gas desulfurisation)
- Antimony [air, non-urban air or from high stacks]: 4.89067e-10 kg; name antimony; lognormal variance with pedigree 0.732, pedigree (5,1,3,1,1)
  (same comment as for Strontium)
- Particulates, > 2.5 um, and < 10um [air, non-urban air or from high stacks]: 2.09912e-6 kg; name particulates_2_5_to_10; source Itten R. 2012; lognormal variance with pedigree 0.202, pedigree (5,1,3,1,1)
  (same comment as for SOx retained, in lignite flue gas desulfurisation)
- Hydrogen chloride [air, non-urban air or from high stacks]: 1.11226e-6 kg; name hydrogen_chloride; lognormal variance with pedigree 0.202, pedigree (5,1,3,1,1)
  (same comment as for Strontium)
- Xylene [air, non-urban air or from high stacks]: 5.02698e-7 kg; name xylene; lognormal variance with pedigree 0.078025, pedigree (3,5,4,2,1)
  based on available literature
  Amount was scaled to the amount of reference product.
- Barium [air, non-urban air or from high stacks]: 2.40444e-8 kg; name barium; lognormal variance with pedigree 0.732, pedigree (5,1,3,1,1)
  (same comment as for Strontium)
- Selenium [air, non-urban air or from high stacks]: 1.52118e-8 kg; name selenium; lognormal variance with pedigree 0.732, pedigree (5,1,3,1,1)
  (same comment as for Strontium)
- Ethane [air, non-urban air or from high stacks]: 2.23542e-8 kg; name ethane; lognormal variance with pedigree 0.078025, pedigree (3,5,4,2,1)
  based on available literature
  Amount was scaled to the amount of reference product.
- Vanadium [air, non-urban air or from high stacks]: 4.51992e-9 kg; name vanadium; lognormal variance with pedigree 0.732, pedigree (5,1,3,1,1)
  (same comment as for Strontium)
- Thorium-228 [air, non-urban air or from high stacks]: 1.09045e-6 kBq; name thorium_228; lognormal variance with pedigree 0.382, pedigree (5,1,3,1,1)
  (same comment as for Strontium)
- Benzene [air, non-urban air or from high stacks]: 1.18314e-7 kg; name benzene; lognormal variance with pedigree 0.078025, pedigree (3,5,4,2,1)
  based on available literature
  Amount was scaled to the amount of reference product.
- Bromine [air, non-urban air or from high stacks]: 6.70627e-8 kg; name bromine; lognormal variance with pedigree 0.202, pedigree (5,1,3,1,1)
  (same comment as for Strontium)
- Lead [air, non-urban air or from high stacks]: 3.69118e-9 kg; name lead; lognormal variance with pedigree 0.732, pedigree (5,1,3,1,1)
  (same comment as for Strontium)
- Formaldehyde [air, non-urban air or from high stacks]: 3.16231e-8 kg; name formaldehyde; lognormal variance with pedigree 0.078025, pedigree (3,5,4,2,1)
  based on available literature
  Amount was scaled to the amount of reference product.
- Nickel [air, non-urban air or from high stacks]: 1.87557e-8 kg; name nickel; lognormal variance with pedigree 0.732, pedigree (5,1,3,1,1)
  (same comment as for Strontium)
- Pentane [air, non-urban air or from high stacks]: 8.01481e-8 kg; name pentane; lognormal variance with pedigree 0.078025, pedigree (3,5,4,2,1)
  based on available literature
  Amount was scaled to the amount of reference product.
- Radium-228 [air, non-urban air or from high stacks]: 2.02824e-6 kBq; name radium_228; lognormal variance with pedigree 0.382, pedigree (5,1,3,1,1)
  (same comment as for Strontium)
- Iodine [air, non-urban air or from high stacks]: 4.14371e-8 kg; name iodine; lognormal variance with pedigree 0.202, pedigree (5,1,3,1,1)
  (same comment as for Strontium)

## Sampling procedure
literature and statistics

## Extrapolations
Data from 1993 have been updated for year 2000. No changes were made for this dataset, but uncertainty was adjusted.

## Review by Carl Vadenbo 2015-07-02
The update of the whole electricity sector for the ecoinvent v3.2 database consist of hundreds of datasets. All these datasets have passed through a streamlined review processes where the underlying modelling of production volumes, technology shares and efficiencies was reviewed in detail prior to the datasets being submitted to the database.
