# ethylene hydration

Dataset: EcoSpold 2, unit process
Geography: RER
Time period: 1986-01-01 to 2019-12-31
Technology level: current
Classification: ISIC rev.4 ecoinvent: 2011:Manufacture of basic chemicals
Synonyms: Grain alcohol; Ethyl alcohol; Methylcarbinol; Ethyl hydroxide; Alcohol
Scenario: Business-as-Usual
System model: Allocation at the point of substitution
Share of production covered: 100 %
Generated by: Jürgen Sutter
Published in: Sutter, J. 2007
Database: ecoinvent
isCopyrightProtected: true
accessRestrictedTo: 1

## General comment
This dataset represents the hydration of 1 kg of ethylene, which is a multi-output process which delivers the co-products ethanol 99.7% in H2O and diethyl ether 99.95% in H2O.
Depending on its water content, preparation, and final use, several ethanol products exist on the market. The 99.7% alcohol (often referred to as absolute alcohol) is used extensively for tinctures and pharmaceutical preparations, as a solvent and preservative, as an antiseptic, and in perfume. Ethanol is an important functional component of alcoholic beverages, which are produced by fermentation of fermentable carbohydrates. The fermentation broth itself may constitute (after processing and aging) a beverage, e.g., in the case of beer or wine, or the alcohol can be concentrated from the broth to produce high-alcohol-containing spirits. If the alcohol is used for purposes other than as a beverage, it is denatured by the addition of substances such as methanol, pyridine, formaldehyde, or sublimate. The denatured alcohol is then used by industry and commerce, principally as a solvent, as a raw material for manufacturing chemicals, or as a fuel.
Diethyl ether (CH3CH2–O–CH2CH3) is one of the most important ethers. It is a clear, mobile liquid with a sweetish, slightly pungent, characteristic odor. It is completeley miscible with common organic solvents, but only partially miscible with water. Two grades of diethyl ether are commercially available: technical-grade ether and anesthetic ether. There are no universally accepted specifications for technical-grade ether, but it is conventionally free of peroxides. Anhydrous technical-grade ether has a maximum water content of 500 mg/kg. Anesthetic ether has a neutral reaction, is free from foreign odors, passes the tests for peroxides and aldehydes, and has a maximum water content of 0.2 %. Diethyl ether is a good solvent for many oils, fats, resins, alkaloids, odorants, and dyes and, therefore, is widely used as a solvent and as an extractant. When mixed with ethanol, diethyl ether is used to gel nitrocellulose and to dissolve collodion wool. Ether is used as a reaction medium in the laboratory and in industry due to its chemical stability, low boiling point, and solvent properties for organometallic compounds (Grignard reagents).
Ethylene can be hydrated in two ways: by indirect hydration or by direct hydration. This dataset represents the direct hydration process. The data for raw materials, energy consumption and emissions are based on literature data. The infrastructure is included with a default value.
References:
Sutter, J. (2007) Life Cycle Inventories of Petrochemical Solvents. ecoinvent report No. 22. Swiss Centre for Life Cycle Inventories, Dübendorf, 2007.

## Included activities start
From the reception of ethylene at the factory gate.

## Included activities end
This activity ends with the production of the co-products ethanol, 99.7%, and diethyl ether, 99.95%. This dataset includes the materials, energy uses, infrastructure and emissions.

## Geography
The inventory is modelled with data from plants in Europe and India.

## Technology
The catalytic hydration of ethylene is a heterogeneous process in gaseous phase on acid catalyst, where the catalyst is H3PO4, and takes place at a temperature of 300°C and pressure of 70 bars. The ethylene conversion is only of 4% per passage. The reaction gas is recycled many times to increase total efficiency. The ethylene has to be of high purity to avoid inert gases concentration. The reaction gas is cooled to condense the liquid products and separate it from the ethylene to be recycled. Ethanol solution is concentrated and purified by extractive distillation. The ethanol selectivity is about 98%. Co-products of the direct hydration are diethyl ether (1 %), butene (0.6 %), and acetaldehyde (0.2 %). The diethyl ether is purificated in the ether distillation column. The other organic byproducts are recovered and fed into the steam generator.
The figure below represents the production of ethanol by means of the direct hydration of ethanol.
a) Circulation compressor; b) Heat exchanger; c) Superheater; d) Reactor; e) Washer; f) Crude ethanol tank; g) Extractive distillation column; h) Concentration column; i) Dehydration; j) Concentration column
Reference:
Heitmann, W., Strehlke, G., Mayer, D.: Ethers, aliphatic, Chapter 2,4. In: Ullmann's Encyclopedia of Industrial Chemistry, Seventh Edition, 2004 Elec-tronic Release (ed. Fiedler E., Grossmann G., Kersebohm D., Weiss G. and Witte C.). 7 th Electronic Release Edition. Wiley InterScience, New York, Online-Version under: http://www.mrw.interscience.wiley.com/ueic/articles/ arti-cles/a10_023/

## Time period
Time of publications.

## Parameters
- fraction, cooling water, to air: 0.3875; name fraction_CW_to_air; = (0.5*fraction_CW_OT_to_air)+(0.5*fraction_CW_R_to_air); lognormal variance with pedigree 0.092025, pedigree (4,4,3,2,4)
  Calculated value based on literature value (see comments of the other parametres present in this dataset) and expert opinion. In the case when no industry/literature data are available about the type of cooling or directly fraction, cooling water, to air specific for the process a default assumption is applied. It is assumed that the once-through cooling system is used in 50% of all cases and recirculating system is used in another 50% of all cases.
- fraction, cooling water, once-through system, to air: 0.004; name fraction_CW_OT_to_air; lognormal variance with pedigree 0.0413, pedigree (2,3,1,3,1)
  Calculated based on literature value (Scown, C.D., 2011, Water Footprint of U.S. Transportation Fuels and supplying information of the article) (Vionnet, S., Quantis Water Database - Technical Report, 2012).
- fraction, water, deionised, to air: 0.205; name fraction_WDI_to_air; = fraction_PW_to_air; lognormal variance with pedigree 0.092025, pedigree (4,4,3,2,4)
  Calculated value. See comment in the other parametres present in this dataset. Deionised water is considered to be always used as process water, thus process water fractions to air are applied to all deionised water input flows to calculate the amount of water consumed in the processes.
- fraction, cooling water, cooling pond system, to air: 0.032; name fraction_CW_CP_to_air; lognormal variance with pedigree 0.0413, pedigree (2,3,1,3,1)
  (same comment as for fraction, cooling water, once-through system, to air)
- fraction, process water, to air: 0.205 dimensionless; name fraction_PW_to_air; lognormal variance with pedigree 0.092025, pedigree (4,4,3,2,4)
  Literature value (Statistics Canada, 2007 & Shaffer, K.H., 2008, Consumptive water use in the Great Lakes Basin, USGS) (Vionnet, S., Quantis Water Database - Technical Report, 2012).
- fraction, cooling water, recirculating system, to air: 0.771; name fraction_CW_R_to_air; lognormal variance with pedigree 0.0413, pedigree (2,3,1,3,1)
  (same comment as for fraction, cooling water, once-through system, to air)

## Reference product
- ethanol, without water, in 99.7% solution state, from ethylene: 1 kg; name RP; CPC 34: Basic chemicals; By-product classification allocatable product; CAS 64-17-5
  Ethanol in its pure form (absolute alcohol) is a clear, colorless liquid. It is miscible in all proportions with water and also with ether, acetone, benzene, and some other organic solvents. Anhydrous alcohol is hygroscopic; at a water uptake of 0.3 - 0.4 %, a certain stability does occur.
  Depending on its water content, preparation, and final use, several ethanol products exist on the market. The 99.7% alcohol (often referred to as absolute alcohol) is used extensively for tinctures and pharmaceutical preparations, as a solvent and preservative, as an antiseptic, and in perfume. Ethanol is an important functional component of alcoholic beverages, which are produced by fermentation of fermentable carbohydrates. The fermentation broth itself may constitute (after processing and aging) a beverage, e.g., in the case of beer or wine, or the alcohol can be concentrated from the broth to produce high-alcohol-containing spirits. If the alcohol is used for purposes other than as a beverage, it is denatured by the addition of substances such as methanol, pyridine, formaldehyde, or sublimate. The denatured alcohol is then used by industry and commerce, principally as a solvent, as a raw material for manufacturing chemicals, or as a fuel.
  production volume 5.25e8 kg; name RP_PV
    Estimated at approximately 1/3 of global production volume.
  property price 0.365 EUR2005
    Using world prices in FAPRI2007, 2009. Agricultural outlook. The prices in 2003 and 2004 were assumed to be the same as the most recent year (2005). (http://www.fapri.missouri.edu/outreach/publications/ag_outlook.asp?current_page=outreach; accessed 22/06/10). Unit conversion from US gallon to kg - 1 gallon = 3.7856 liter * 0.789 kg/liter (ethanol density) = 2.9868 kg (from http://www.peteducation.com/category.cfm?c=0+1305 and http://en.wikipedia.org/wiki/Ethanol accessed 25/6/10).
  property carbon content 0.521739
    carbon content on a dry matter basis (reserved; not for manual entry)
  property true value 0.365; name RP_true_value
    allocation property applied in "true value" allocation // value calculated from revenue
  properties: wet mass 1 kg, dry mass 1 kg, water in wet mass 0 kg, water content 0, carbon content, non-fossil 0, carbon content, fossil 0.521739, carbon allocation 0.521739 kg

## By-products
- diethyl ether, without water, in 99.95% solution state: 0 kg; name BP_diethyl_ether_without_water_in_9995; By-product classification allocatable product; CPC 34170: Ethers, alcohol peroxides, ether peroxides, epoxides, acetals and hemiacetals, and their halogenated, sulphona[…]; CAS 60-29-7
  Diethyl ether is one of the most important ethers. It is a clear, mobile liquid with a sweetish, slightly pungent, characteristic odor. It is completeley miscible with common organic solvents, but only partially miscible with water.
  Two grades of diethyl ether are commercially available: technical-grade ether and anesthetic ether. There are no universally accepted specifications for technical-grade ether, but it is conventionally free of peroxides. Anhydrous technical-grade ether has a maximum water content of 500 mg/kg. Anesthetic ether has a neutral reaction, is free from foreign odors, passes the tests for peroxides and aldehydes, and has a maximum water content of 0.2 %.
  Diethyl ether is a good solvent for many oils, fats, resins, alkaloids, odorants, and dyes and, therefore, is widely used as a solvent and as an extractant. When mixed with ethanol, diethyl ether is used to gel nitrocellulose and to dissolve collodion wool.
  Ether is used as a reaction medium in the laboratory and in industry due to its chemical stability, low boiling point, and solvent properties for organometallic compounds (Grignard reagents). It is also employed as an anesthetic in medicine, but this use is declining.
  production volume 4.27861e6 kg; = RP_PV*BP_diethyl_ether_without_water_in_9995/ABS(RP)
    Calculated from the production volume of ethanol, without water, in 99.7% solution state, from ethylene in proportion to the respective output amounts.
  property price 1.12 EUR2005
    Temporary price data. Calculated as 90% of purchasers price based on: 2004 import and export prices (total trades (USD) divided by total weight (kg) in EU27, USA, China, Japan and India) from UN data - 'Diethyl ether' (http://data.un.org/Data.aspx; accessed 2 July 10)
  property carbon content 0.648649
    carbon content on a dry matter basis (reserved; not for manual entry)
  property true value 0.00912769; name BP_diethyl_ether_without_wa_true_value_0
    allocation property applied in "true value" allocation // value calculated from revenue
  properties: wet mass 1 kg, water in wet mass 0 kg, dry mass 1 kg, carbon content, fossil 0.648649, carbon content, non-fossil 0, water content 0, carbon allocation 0.648649 kg
- electricity, for reuse in municipal waste incineration only: 0 kWh; CPC 17100: Electrical energy; By-product classification allocatable product; pedigree (1,1,1,1,1)
  Net electricity generated from this waste and used in internal MSWI plant energy redistribution.
  Uncertainty: uncertainty is calculated from uncertainties in waste composition and uncertainties in energy efficiency and the uncertainty in internal energy demand
  production volume 166620 kWh
  property exergy 3.6 MJ; name E_el_prod_MSWI_exergy
    This exergy property is based on the exergy content of the product.
  property true value relation 3.6; name E_el_prod_MSWI_true_value_relation
    property to calculate "true value" from
  property price 0.1 EUR2005; name E_el_prod_MSWI_price_EUR2005
    Estimated to be the same price as in case of electricity, medium voltage.
  property true value 4.07767e-5
    allocation property applied in "true value" allocation // value calculated from true value relation
- heat, for reuse in municipal waste incineration only: 0 MJ; CPC 17300: Steam and hot water; By-product classification allocatable product; pedigree (1,1,1,1,1)
  Net useful heat generated from this waste and used in internal MSWI plant energy redistribution.
  Uncertainty: uncertainty is calculated from uncertainties in waste composition and uncertainties in energy efficiency and the uncertainty in internal energy demand
  production volume 1.17881e6 MJ
  property true value relation 0.1842; name E_th_prod_MSWI_true_value_relation
    property to calculate "true value" from
  property exergy 0.1842 MJ; name E_th_prod_MSWI_exergy
    This exergy property is based on the exergy content of the product.
  property price 0.0106 EUR2005; name E_th_prod_MSWI_price_EUR2005
    Average European district heat price from Ecoheatcool and Euroheat 2005-2006, Ecoheat Work package 1: The European heat market. Final report. 10.6 EUR/GJ i s the price of district heat. http://www.solarthermalworld.org/files/Ecoheatcool%20WP1%20Web.pdf?download
  property true value 1.47611e-5
    (same comment as for electricity, for reuse in municipal waste incineration only)
- zinc concentrate: 0 kg; CPC 14290: Other non-ferrous metal ores and concentrates (other than uranium or thorium ores and concentrates); By-product classification allocatable product
  Calculated value from the knowledge of the properties of both products.
  production volume 29.4917 kg
  property price 0.38 EUR2005; name ByP_price_EUR2005
    Temporary price data. Calculated as 90% of purchasers price based on: Zinc content in concentrate 53%. Concentrate price per kg Zn 86.5% of refined Zn price (13.5% treatment charges according to CHR Metals Limited 2005: Dynamic cost curves. http://www.minecost.com/dynamic.pdf). 2004 zinc price from USGS (2007) Mineral commodity summaries 2007. <http://minerals.usgs.gov/minerals/pubs/mcs/2007/mcs2007.pdf> [Accessed 25 May 2010]
  property zinc content 0.53; name zinc_C_zinc_concentrate
    Zinc content on a dry matter basis. Value taken from teh "zinc mine operation" /GLO dataset.
  property dry mass 1 kg; name DM_zinc_concentrate
  property carbon content 0
    carbon content on a dry matter basis (reserved; not for manual entry)
  property true value 2.13464e-8
    allocation property applied in "true value" allocation // value calculated from revenue
  properties: wet mass 1 kg, water content 0, carbon content, non-fossil 0, carbon content, fossil 0, water in wet mass 0 kg, carbon allocation 0 kg

## Inputs from technosphere
- ethylene, average: 0.611611 kg; source Wells, M. 1991; lognormal variance with pedigree 0.0401, pedigree (1,2,5,1,1)
  Estimation.
  Further references:
  Meyer, Robert (ed.): Handbook of chemical production processes. McGraw-Hill, New York 1986
  properties: wet mass 1 kg, dry mass 1 kg, carbon content, fossil 0.857143
- electricity, medium voltage: 0.0395971 kWh; source Meyer, Robert 1986; lognormal variance with pedigree 0.0426, pedigree (1,3,5,5,1)
  Estimation.
  Further references:
  Ethanol plant. Naran Lala PVT Ltd., Gujarat, India. Retrieved 10.11.2004 from http://www.naranlala.com/clabs.htm
  Uncertainty: N
- water, deionised: 0 kg; name water_deionised_input; source Meyer, Robert 1986; pedigree (1,1,1,1,1)
  Estimation.
  Uncertainty: M
  properties: wet mass 1 kg
- heat, district or industrial, natural gas: 2.16473 MJ; source Meyer, Robert 1986; lognormal variance with pedigree 0.0426, pedigree (1,3,5,5,1)
  (same comment as for electricity, medium voltage)
- chemical factory, organics: 3.90183e-10 unit; lognormal variance with pedigree 0.349225, pedigree (2,3,5,2,3)
  Calculated based on literature data published by the industry. For this activity, no information was readily available concerning infrastructure and land-use. Therefore, the infrastructure is estimated based on data from two chemical factories, the BASF site of Ludwigshafen and the chemical factory in Gendorf (which are both located in Germany), which produce a wide range of chemical substances. Based on this data, the following assumptions are made: the built area amounts to about 4.2 ha, the plant has an average output of 50'000 t/a and a lifespan of fifty years. The estimated infrastructure amount is therefore 4.00 E-10 units per kg of produced chemical.
  References:
  Althaus H.-J., Chudacoff M., Hischier R., Jungbluth N., Osses M. and Primas A. (2007) Life Cycle Inventories of Chemicals. ecoinvent report No. 8, v2.0. EMPA Dübendorf, Swiss Centre for Life Cycle Inventories, Dübendorf, CH.
  Gendorf (2000) Umwelterklärung 2000, Werk Gendorf. Werk Gendorf, Burgkirchen.
- sodium hydroxide, without water, in 50% solution state: 0.00175581 kg; source Meyer, Robert 1986; lognormal variance with pedigree 0.0401, pedigree (1,2,5,1,1)
  Estimation.
  Further references:
  Del Borghi, M., Ciraolo, L., Macchiavello, A., Del Borghi, A.: Life cycle risk assessment appiled to chemical and biotechnological product processes. 11th World Clean Air and Environment Congress and Exhibition, Vol. II. Sect. 6D-3, Durban, 13-18 Settembre 1998
  Uncertainty: M
  properties: dry mass 1 kg, wet mass 1 kg
- benzene: 0.00333603 kg; source Naran Lala 2004; lognormal variance with pedigree 0.0426, pedigree (1,3,5,5,1)
  Estimation.
  Uncertainty: N
  properties: wet mass 1 kg, dry mass 1 kg, carbon content, fossil 0.923077
- phosphoric acid, industrial grade, without water, in 85% solution state: 0.000682802 kg; source Meyer, Robert 1986; lognormal variance with pedigree 0.0401, pedigree (1,2,5,1,1)
  Estimation.
  Further references:
  Wells, G. Margaret: Handbook of petrochemicals and processes. Aldershot, Hampshire 1991
  Del Borghi, M., Ciraolo, L., Macchiavello, A., Del Borghi, A.: Life cycle risk assessment appiled to chemical and biotechnological product processes. 11th World Clean Air and Environment Congress and Exhibition, Vol. II. Sect. 6D-3, Durban, 13-18 Settembre 1998
  Uncertainty: M
  properties: wet mass 1 kg, dry mass 1 kg
- wastewater, unpolluted: -0.012749 m3; name BP_wastewater_unpolluted; lognormal variance with pedigree 0.1786, pedigree (4,5,5,5,5)
  Uncertainty: C
  production volume 6.86164e6 m3; = RP_PV*BP_wastewater_unpolluted/ABS(RP)
    (same comment as for diethyl ether, without water, in 99.95% solution state)
  property price 0 EUR2005; name BP_wastewater_unpolluted_price_EUR2005
  properties: wet mass 1000 kg, carbon content, fossil 0.00178991, dry mass 0.337476 kg, water content 2962.17, carbon content, non-fossil 0.00178991
  note on carbon content, fossil: Assumed to be like in tap water. Bicarbonate content is 2.93 mol/m3. CO2 content is 0.1 mol/m3 (ecoinvent v2.2 report 8, Tab 93.1).
- hydrochloric acid, without water, in 30% solution state: 0.00117056 kg; source Meyer, Robert 1986; lognormal variance with pedigree 0.0401, pedigree (1,2,5,1,1)
  Literature value.
  Uncertainty: M
  properties: wet mass 1 kg, dry mass 1 kg
- heat, district or industrial, other than natural gas: 1.20826 MJ; source Meyer, Robert 1986; lognormal variance with pedigree 0.0426, pedigree (1,3,5,5,1)
  (same comment as for electricity, medium voltage)
- water, deionised: 0.680353, 0.0024491 kg (2 entries); source Meyer, Robert 1986; lognormal variance with pedigree 0.0401, pedigree (1,2,5,1,1)
  Estimation.
  Uncertainty: M

## Inputs from nature
- Water, cooling, unspecified natural origin [natural resource, in water]: 0.0126811 m3; name water_cooling_UNO_input; source Meyer, Robert 1986; lognormal variance with pedigree 0.0401, pedigree (1,2,5,1,1)
  Estimation.
  Further references:
  Del Borghi, M., Ciraolo, L., Macchiavello, A., Del Borghi, A.: Life cycle risk assessment appiled to chemical and biotechnological product processes. 11th World Clean Air and Environment Congress and Exhibition, Vol. II. Sect. 6D-3, Durban, 13-18 Settembre 1998
  Estimation.
  Further references:
  Del Borghi, M., Ciraolo, L., Macchiavello, A., Del Borghi, A.: Life cycle risk assessment appiled to chemical and biotechnological product processes. 11th World Clean Air and Environment Congress and Exhibition, Vol. II. Sect. 6D-3, Durban, 13-18 Settembre 1998
  Uncertainty: M

## Emissions to nature
- Ethene [air, urban air close to ground]: 0.00122322 kg; lognormal variance with pedigree 0.188, pedigree (4,5,5,5,5)
  Estimation. Air emissions occurring from the purge vent, the distillation vent and fugitive emission sources were estimated to 0.2% of the raw material input.
  It is assumed that the manufacturing plants are located in an urban/industrial area and consequently the emissions are categorised as emanating in a high population density area.
  Uncertainty: E
- Water [air, unspecified]: 0.00505391 m3; = (water_deionised_input/1000*fraction_WDI_to_air)+(water_cooling_UNO_input*fraction_CW_to_air); lognormal variance with pedigree 0.0807, pedigree (2,2,5,1,1)
  Calculated as a fraction of the input of water. For more details, refer to the mathematical relation and the parameters.
  property fraction, origin: salt water 0; name fraction_origin_salt_water
  property fraction, origin: unspecified 0.972304; name fraction_origin_unspecified
  property fraction, origin: fresh water 0.0276962; name fraction_origin_fresh_water
- Chloride [water, surface water]: 0.00185336 kg; source Meyer, Robert 1986; lognormal variance with pedigree 0.3401, pedigree (1,2,5,1,1)
  Literature value.
  Uncertainty: M
- Sodium, ion [water, surface water]: 0.00165826 kg; source Meyer, Robert 1986; lognormal variance with pedigree 0.6901, pedigree (1,2,5,1,1)
  Literature value.
  Uncertainty: M
- Carbon dioxide, fossil [air, urban air close to ground]: 0.0113307 kg; lognormal variance with pedigree 0.0401, pedigree (1,2,5,1,1)
  Estimation. Calculated from the burning of the co-products in the steam generator.
  It is assumed that the manufacturing plants are located in an urban/industrial area and consequently the emissions are categorised as emanating in a high population density area.
  Uncertainty: f
- Phosphate [water, surface water]: 0.00107301 kg; source Meyer, Robert 1986; lognormal variance with pedigree 0.0801, pedigree (1,2,5,1,1)
  Literature value.
  Uncertainty: M

## Sampling procedure
Literature data.

## Review by Gregor Wernet 2017-08-04
This dataset was additionally reviewed in a separate review process by Eric Johnson of Atlantic Consulting as well as Emilia Moreno Ruiz and Gregor Wernet of ecoinvent.
