# treatment of decommissioned airport infrastructure, contaminated gravel

Dataset: EcoSpold 2, unit process
Geography: RoW
Time period: 1990-01-01 to 2019-12-31
Technology level: current
Classification: ISIC rev.4 ecoinvent: 3830:Materials recovery
Classification: EcoSpold01Categories: transport systems/airplane
Tags: Treatment; ConvertedDataset
Scenario: Business-as-Usual
System model: Allocation at the point of substitution
Generated by: Michael Spielmann (obsolete)
Published in: Spielmann M. 2007
Database: ecoinvent
isCopyrightProtected: true
accessRestrictedTo: 1

## General comment
The data represents the airport in Zurich (uniqueairport). It has been assumed that after 100 years the entire construction material will be disposed. For the disposal a distance of 20 km has been applied.
[This dataset was already contained in the ecoinvent database version 2. It was not individually updated during the transfer to ecoinvent version 3. Life Cycle Impact Assessment results may still have changed, as they are affected by changes in the supply chain, i.e. in other datasets. This dataset was generated following the ecoinvent quality guidelines for version 2. It may have been subject to central changes described in the ecoinvent version 3 change report (http://www.ecoinvent.org/database/ecoinvent-version-3/reports-of-changes/), and the results of the central updates were reviewed extensively. The changes added e.g. consistent water flows and other information throughout the database. The documentation of this dataset can be found in the ecoinvent reports of version 2, which are still available via the ecoinvent website. The change report linked above covers all central changes that were made during the conversion process.]

## Included activities end
The inventory includes the disposal of contaminated gravel. Transport from the airport to disposal and disposal are accounted for. The disposal of buildings are not accounted for, but included in the module 'airport'.

## Geography
Data refers the conditions at the major airport in Switzerland.

## Technology
disposal modules represent Swiss standards.

## Time period
The data represents the condition in the early 1990’ties. However, the data presented is adjusted by a factor of 1.5 to represent current conditions.

## Reference product
- decommissioned airport infrastructure, contaminated gravel: -1 unit; By-product classification Waste; CPC 39990: Other wastes n.e.c.
  EcoSpold01Location=RER
  production volume 2.67763 unit
    This is a placeholder value that does not reflect real-world production volumes. This dataset does not currently require a real-world production volume to work in the database framework, and no actual data were collected yet. This has no negative effect on the results of the ecoinvent database.
  property price 0 EUR2005
    Waste products are assigned a price of zero as they are assumed to require further treatment.
  property carbon content, non-fossil 0.009271
    Calculated from C content in input materials in the infrastructure
  property carbon content, fossil 0.00149419
    Calculated from C content in input materials in the infrastructure
  property carbon content 0.0107652
    carbon content on a dry matter basis (reserved; not for manual entry)
  properties: wet mass 1.13322e9 kg, water in wet mass 0 kg, dry mass 1.13322e9 kg, water content 0, carbon allocation 1.21993e7 kg

## Inputs from technosphere
- inert waste, for final disposal: -4.83e7 kg; lognormal variance with pedigree 0.162, pedigree (1,1,5,5,1)
  EcoSpold01Location=CH
  literatre and own adjustments
  production volume 1.449e8 kg
    Calculated from the production volume of decommissioned airport infrastructure, contaminated gravel in proportion to the respective output amounts.
  properties: dry mass 0.995 kg, water content 0.00502513, wet mass 1 kg
- excavation, skid-steer loader: 21000 m3; lognormal variance with pedigree 0.1806, pedigree (4,3,5,5,1)
  EcoSpold01Location=RER
  Literatre and own adjustments
  Uncertainty: literatre and own adjustments

## Sampling procedure
literature studies and oral communication.

## Extrapolations
none This dataset has been copied from an original dataset covering the geography RER. The uncertainty has been adjusted accordingly.

## Review by Niels Jungbluth 2003-09-23
passed.
