# nutrient supply from ash, from combustion of bagasse from sugarcane

Dataset: EcoSpold 2, unit process
Geography: GLO
Time period: 2000-01-01 to 2019-12-31
Technology level: current
Classification: ISIC rev.4 ecoinvent: 0161:Support activities for crop production
Scenario: Business-as-Usual
System model: Allocation at the point of substitution
Generated by: Sofia Parada Tur
Database: ecoinvent
isCopyrightProtected: true
accessRestrictedTo: 1

## General comment
This inventory describes the application of ash from combustion of bagasse from sugarcane. This application provides the nutrients K2O and P2O5 contained in the ash, namely, 1.67% K2O and 0.87% P2O5 on a wet mass basis. No emissions are considered.

## Included activities start
Activity starting with the application ash from combustion of bagasse from sugar cane

## Included activities end
The activity ends with the provision of P-fertiliser and K-fertiliser

## Geography
inventory based on composition of ash from combustion of bagasse from sugar cane

## Time period
Time validity adopted from dataset producing ash, from combustion of bagasse from sugar cane in the ecoinvent database

## Reference product
- potassium fertiliser, as K2O: 1 kg; name potassium_fertiliser_output; = (1.67/100)* ash; CPC 3463: Mineral or chemical fertilizers, potassic; By-product classification allocatable product; pedigree (1,1,1,1,1)
  ash from bagasse combustion contains 1.67% K2O
  production volume 6.47635e7 kg; name PV_RP; = 3878051354*potassium_fertiliser_output
    Production volume calculated based on the production volume of ash, from combustion of bagasse from sugarcane that is produced in various datasets.
  property price 0.188 EUR2005; name potassium_fertiliser_outpu_price_EUR2005
    Temporary price data. Calculated as 90% of purchasers price based on: 2004 import price calulated from FAOSTAT (http://faostat.fao.org/site/575/DesktopDefault.aspx?PageID=575#ancor [accessed 2011.01.27] Potash Fertilizers (K20 total nutrients) in kUSD/Mg
  property carbon content 0
    carbon content on a dry matter basis (reserved; not for manual entry)
  property true value 0.0031396; name potassium_fertiliser_output_true_value
    allocation property applied in "true value" allocation // value calculated from revenue
  properties: carbon content, non-fossil 0, dry mass 1 kg, carbon content, fossil 0, water content 0, water in wet mass 0 kg, wet mass 1 kg, carbon allocation 0 kg

## By-products
- phosphate fertiliser, as P2O5: 0 kg; name phosphate_fertiliser_output; = (0.87/100)* ash; CPC 3462: Mineral or chemical fertilizers, phosphatic; By-product classification allocatable product; pedigree (1,1,1,1,1)
  ash from bagasse combustion contains 0.87% P2O5
  production volume 563442 kg; name phosphate_fertiliser_production; = phosphate_fertiliser_output*PV_RP
    Calculated from production volume of reference product using the relative outputs.
  property price 0.241 EUR2005; name phosphate_fertiliser_output_price_EUR200
    Temporary price data. Calculated as 90% of purchasers price based on: 2004 prices are calculated on basis of Import/Export data (tonnes and US$) from UN Trade Statistics Database (http://data.un.org/Browse.aspx?d=ComTrade, accessed 7/7-2010). N, P2O5, or K2O content (http://www.fertilizer.org/ifa/Home-Page/STATISTICS/Conversions-factors)
  property carbon content 0
    carbon content on a dry matter basis (reserved; not for manual entry)
  property true value 0.0020967; name phosphate_fertiliser_output_true_value
    allocation property applied in "true value" allocation // value calculated from revenue
  properties: dry mass 1 kg, water in wet mass 0 kg, carbon content, fossil 0, carbon content, non-fossil 0, wet mass 1 kg, water content 0, carbon allocation 0 kg

## Inputs from technosphere
- ash, from combustion of bagasse from sugarcane: 35.9032 kg; name ash
  Application of ash, from combustion of bagasse from sugarcane.
  property zinc content 9.59e-5; name ash_Zn_content
  property copper content 9.43e-5; name ash_Cu_content
  property lead content 5.025e-5; name ash_Pb_content
  property chromium content 3.41e-5; name ash_Cr_content
  property mercury content 1.35e-7; name ash_Hg_content
  property cadmium content 1.85e-6; name ash_Cd_content
  property nickel content 2.515e-5; name ash_Ni_content
  properties: dry mass 1 kg, wet mass 1 kg
  note on zinc content: zinc content on a dry matter basis. Zandersons et al. Biomass and Energy 17 (1999) 209-219. Original value in mg/kg. Calculated average of 2 bagasse ash specimens
  note on copper content: copper content on a dry matter basis. Zandersons et al. Biomass and Energy 17 (1999) 209-219. Original value in mg/kg. Calculated average of 2 bagasse ash specimens
  note on lead content: lead content on a dry matter basis. Zandersons et al. Biomass and Energy 17 (1999) 209-219. Original value in mg/kg. Calculated average of 2 bagasse ash specimens
  note on chromium content: chromium content on a dry matter basis. . Zandersons et al. Biomass and Energy 17 (1999) 209-219. Original value in mg/kg. Calculated average of 2 bagasse ash specimens
  note on mercury content: mercury content on a dry matter basis. . Zandersons et al. Biomass and Energy 17 (1999) 209-219. Original value in mg/kg. Calculated average of 2 bagasse ash specimens
  note on cadmium content: cadmium content on a dry matter basis. Zandersons et al. Biomass and Energy 17 (1999) 209-219. Original value in mg/kg. Calculated average of 2 bagasse ash specimens
  note on nickel content: nickel content on a dry matter basis. Zandersons et al. Biomass and Energy 17 (1999) 209-219. Original value in mg/kg. Calculated average of 2 bagasse ash specimens

## Sampling procedure
Dataset based on nutrient content of ash, from combustion of bagasse from sugar cane for fertiliser use
