# stone wool production

Dataset: EcoSpold 2, unit process
Geography: CH
Time period: 2000-01-01 to 2019-12-31
Technology level: current
Classification: EcoSpold01Categories: insulation materials/production
Classification: ISIC rev.4 ecoinvent: 2399:Manufacture of other non-metallic mineral products n.e.c.
Tags: ConvertedDataset
Scenario: Business-as-Usual
System model: Allocation at the point of substitution
Share of production covered: 40 %
Generated by: Hans-Jörg Althaus
Published in: Hischier, R. 2010
Database: ecoinvent
isCopyrightProtected: true
accessRestrictedTo: 1

## General comment
This product is not available on the market as it is not packed. It has been defined for internal use in this database as input for the packaging module. Inputs and outputs are not balanced in the unit process since some are included in the unit proces 'rock woll, packed, at plant'. This dataset is not to be used to describe rock wool in other inventories.
[This dataset was already contained in the ecoinvent database version 2. It was not individually updated during the transfer to ecoinvent version 3. Life Cycle Impact Assessment results may still have changed, as they are affected by changes in the supply chain, i.e. in other datasets. This dataset was generated following the ecoinvent quality guidelines for version 2. It may have been subject to central changes described in the ecoinvent version 3 change report (http://www.ecoinvent.org/database/ecoinvent-version-3/reports-of-changes/), and the results of the central updates were reviewed extensively. The changes added e.g. consistent water flows and other information throughout the database. The documentation of this dataset can be found in the ecoinvent reports of version 2, which are still available via the ecoinvent website. The change report linked above covers all central changes that were made during the conversion process.]

## Included activities end
Included processes: melting, fiber forming & collecting, hardening & curing furnace, and internal processes (workshop, etc.). Transport of raw materials and energy carrier for furnace are also included. Not included are administration, packing and infrastructure.

## Geography
Data are only from one company in Switzerland (Flumroc AG). For some exchanges RER-modules have been used as proxy

## Technology
The company works on a technically very high level. The fuel for the melting process is coke. The furnace is a cupola melting furnace. The emissions are abated by post-combustion with energy recuperation. The partition of the total dust emission to the categories of particulate sizes is based on an uncontrolled mineral wool cupola (EPA 1998) which only partly represent this case.

## Parameters
- fraction, process water, to air: 0.29 dimensionless; name fraction_PW_to_air; lognormal variance with pedigree 0.092025, pedigree (4,4,3,2,4)
  Literature value (Statistics Canada, 2007 & Shaffer, K.H., 2008, Consumptive water use in the Great Lakes Basin, USGS) (Vionnet, S., Quantis Water Database - Technical Report, 2012).
- fraction, tap water, to air: 0.29; name fraction_TW_to_air; = fraction_PW_to_air; lognormal variance with pedigree 0.092025, pedigree (4,4,3,2,4)
  Calculated value. See comment in the other parametres present in this dataset. Tap water is considered to be always used as process water, thus process water fractions to air are applied to all tap water input flows to calculate the amount of water consumed in the processes.

## Reference product
- stone wool: 1 kg; By-product classification allocatable product; CPC 37990: Non-metallic mineral products n.e.c. (including mineral wool, expanded mineral materials, worked mica, article[…]
  production volume 0.0336675 kg
    This is a placeholder value that does not reflect real-world production volumes. This dataset does not currently require a real-world production volume to work in the database framework, and no actual data were collected yet. This has no negative effect on the results of the ecoinvent database. The placeholder value of this activity was scaled according to the nominal GDP of 2005 (source: United Nations, http://data.un.org/Glossary.aspx?q=GDP+%28current+US%24%29, accessed 20130726) to reflect an appropriate share of the global production volume, which is also a placeholder value.
  property carbon content, fossil 0.015401
    The chemical composition of the glass fibres used in the rock wool production is similar to the composition of naturally cooled volcano basalt and has a composition listed in Tab.
    3.1 and 3.2 in ecoinvent v2.2 report 16, part XIV. Rock wool contains: a minimum of 96% mineral fibres,between 0.5 and 3.0 weight percent of phenolic resin depending on the specific product characteristics, and about 0.2 percent mineral oil (ecoinvent v2.2 report 16, part XIV). An average composition of 1.8% phenolic resin, 0.2% mineral oil, and 98% mineral fibres has been assumed and used to calculate C content of the rock wool
  property price 0.65 EUR2005
    Expert judgement; communication with Georg Schöner from Rockwool International.
  property carbon content 0.015401
    carbon content on a dry matter basis (reserved; not for manual entry)
  property true value 0.65
    allocation property applied in "true value" allocation // value calculated from revenue
  properties: dry mass 1 kg, wet mass 1 kg, water in wet mass 0 kg, carbon content, non-fossil 0, water content 0, carbon allocation 0.015401 kg

## By-products
- electricity, for reuse in municipal waste incineration only: 0 kWh; CPC 17100: Electrical energy; By-product classification allocatable product; pedigree (1,1,1,1,1)
  Net electricity generated from this waste and used in internal MSWI plant energy redistribution.
  Uncertainty: uncertainty is calculated from uncertainties in waste composition and uncertainties in energy efficiency and the uncertainty in internal energy demand
  production volume 0.000658826 kWh
  property exergy 3.6 MJ; name E_el_prod_MSWI_exergy
    This exergy property is based on the exergy content of the product.
  property true value relation 3.6; name E_el_prod_MSWI_true_value_relation
    property to calculate "true value" from
  property price 0.1 EUR2005; name E_el_prod_MSWI_price_EUR2005
    Estimated to be the same price as in case of electricity, medium voltage.
  property true value 8.51884e-5
    allocation property applied in "true value" allocation // value calculated from true value relation
- iron scrap, sorted, pressed: 0 kg; By-product classification Recyclable; CPC 39310: Slag, dross, scalings and other waste from the manufacture of iron or steel; pedigree (1,1,1,1,1)
  Iron scrap recovered from this waste.
  Uncertainty: uncertainty calculated from uncertainty in waste composition, uncertainty of share of recyclable metal, uncertainty of transfer coefficient to bottom ash, uncertainty of the efficiency of scrap removal in MSWI plant.
  production volume 1.62052e-5 kg
  property price 0.175 EUR2005
    Temporary price data. Calculated as 90% of purchasers price based on: 2005 import and export prices (total trades (USD) divided by total weight (kg) in biggest economies of the world: EU27, USA, Brasil, China, India, Japan and Russia) from UN Commodity Trade Statistics Database (http://data.un.org/Explorer.aspxDatabase [Accessed 2011.06.20]). Commodity: Waste or scrap, of cast iron
  property carbon content 0
    carbon content on a dry matter basis (reserved; not for manual entry)
  property true value 2.83592e-6
    allocation property applied in "true value" allocation // value calculated from revenue
  properties: carbon content, fossil 0, dry mass 1 kg, carbon content, non-fossil 0, water in wet mass 0 kg, wet mass 1 kg, water content 0, carbon allocation 0 kg
- heat, for reuse in municipal waste incineration only: 0 MJ; CPC 17300: Steam and hot water; By-product classification allocatable product; pedigree (1,1,1,1,1)
  Net useful heat generated from this waste and used in internal MSWI plant energy redistribution.
  Uncertainty: uncertainty is calculated from uncertainties in waste composition and uncertainties in energy efficiency and the uncertainty in internal energy demand
  production volume 0.00484588 MJ
  property exergy 0.1842 MJ; name E_th_prod_MSWI_exergy
    This exergy property is based on the exergy content of the product.
  property true value relation 0.1842; name E_th_prod_MSWI_true_value_relation
    property to calculate "true value" from
  property price 0.0106 EUR2005; name E_th_prod_MSWI_price_EUR2005
    Average European district heat price from Ecoheatcool and Euroheat 2005-2006, Ecoheat Work package 1: The European heat market. Final report. 10.6 EUR/GJ i s the price of district heat. http://www.solarthermalworld.org/files/Ecoheatcool%20WP1%20Web.pdf?download
  property true value 3.20605e-5
    (same comment as for electricity, for reuse in municipal waste incineration only)
- iron scrap, unsorted: 0 kg; source European Aluminium Association 2008; CPC 39310: Slag, dross, scalings and other waste from the manufacture of iron or steel; By-product classification Recyclable; pedigree (1,1,1,1,1)
  production volume 2.2859e-9 kg
  property price 0.149 EUR2005; name ironScrapAmount_price_EUR2005
    Temporary price data. Calculated as 90% of purchasers price based on: estimated at 85% of sorted scrap
  property carbon content 0
    carbon content on a dry matter basis (reserved; not for manual entry)
  property true value 3.40599e-10
    allocation property applied in "true value" allocation // value calculated from revenue
  properties: water in wet mass 0 kg, water content 0, carbon content, fossil 0, carbon content, non-fossil 0, dry mass 1 kg, wet mass 1 kg, carbon allocation 0 kg
- aluminium oxide, non-metallurgical: 0 kg; source European Aluminium Association 2008; CPC 41432: Alumina (aluminium oxide), except artificial corundum; By-product classification allocatable product; CAS 1344-28-1; pedigree (1,1,1,1,1)
  production volume 1.43843e-7 kg
  property carbon content, non-fossil 0; name C_content_non_fossil
  property price 0.28 EUR2005; name Al2O3Amount_price_EUR2005
    From UN trade database. http://data.un.org/ Import data from the largest economies of the world are used (Brazil, India, USA, China, Japan and EU-27).
  property dry mass 1 kg; name DM
  property water content 0; name water_content
  property wet mass 1 kg; name WM
  property water in wet mass 0 kg; name WWM
  property carbon content, fossil 0; name C_content_fossil
  property carbon content 0
    carbon content on a dry matter basis (reserved; not for manual entry)
  property true value 4.0276e-8
    allocation property applied in "true value" allocation // value calculated from revenue
  properties: carbon allocation 0 kg
- aluminium, cast alloy: 0 kg; source European Aluminium Association 2008; By-product classification allocatable product; CPC 41431: Unwrought aluminium; pedigree (1,1,1,1,1)
  EcoSpold01Location=RER
  production volume 1.34461e-6 kg
  property price 1.3 EUR2005; name castAlloyAmount_price_EUR2005
    Temporary price data. Calculated as 90% of purchasers price based on: Source: London Metal Exchange, Aluminium alloy price for 2005
  property carbon content 0
    carbon content on a dry matter basis (reserved; not for manual entry)
  property true value 1.748e-6
    allocation property applied in "true value" allocation // value calculated from revenue
  properties: water in wet mass 0 kg, carbon content, non-fossil 0, water content 0, dry mass 1 kg, carbon content, fossil 0, wet mass 1 kg, carbon allocation 0 kg
- aluminium, wrought alloy: 0 kg; source European Aluminium Association 2008; By-product classification allocatable product; CPC 4153: Semi-finished products of aluminium or aluminium alloys; pedigree (1,1,1,1,1)
  production volume 5.88646e-7 kg
  property price 1.44 EUR2005; name secondaryAluminiumOutput_price_EUR2005
  properties: wet mass 1 kg, water content 0, carbon content, fossil 0, water in wet mass 0 kg, carbon content, non-fossil 0, dry mass 1 kg, carbon content 0, carbon allocation 0 kg, true value 8.4765e-7
- copper: 0 kg; source Rentz O. 1999; By-product classification allocatable product; CPC 41413: Refined copper and copper alloys, unwrought; master alloys of copper
  Literature value. Copper uses: Before end-use copper is manufactured into semi fabricated products, such as shapes and ingots (known as 'semis'). These manufacturing processes are subdivided into hot working, cold working and, if necessary, process annealing. Few of the semis are ready for use as such. They more typically travel to first-stage manufacturers, who make metal rods, wire, and casting, and then to component manufacturers who produce such things as motors, valves, and insulated cables The components in turn are incorporated by final-stage manufacturers into a variety of finished products - automobiles, commercial buildings, residential housing, and so forth. These uses account for about 79% of the world-wide consumption of copper.
  production volume 1.56064e-7 kg
  property price 5.52 EUR2005
    Literature value (http://www.economist.com/news/business/21576714-mining-industry-has-enriched-chile-its-future-precarious-copper-solution). Average price between 20015 and 2013.
  property carbon content 0
    carbon content on a dry matter basis (reserved; not for manual entry)
  property true value 8.61476e-7
    allocation property applied in "true value" allocation // value calculated from revenue
  properties: dry mass 1 kg, water in wet mass 0 kg, wet mass 1 kg, carbon content, non-fossil 0, water content 0, carbon content, fossil 0, carbon allocation 0 kg
- zinc concentrate: 0 kg; CPC 14290: Other non-ferrous metal ores and concentrates (other than uranium or thorium ores and concentrates); By-product classification allocatable product
  Calculated value from the knowledge of the properties of both products.
  production volume 3.97874e-7 kg
  property price 0.38 EUR2005; name ByP_price_EUR2005
    Temporary price data. Calculated as 90% of purchasers price based on: Zinc content in concentrate 53%. Concentrate price per kg Zn 86.5% of refined Zn price (13.5% treatment charges according to CHR Metals Limited 2005: Dynamic cost curves. http://www.minecost.com/dynamic.pdf). 2004 zinc price from USGS (2007) Mineral commodity summaries 2007. <http://minerals.usgs.gov/minerals/pubs/mcs/2007/mcs2007.pdf> [Accessed 25 May 2010]
  property zinc content 0.53; name zinc_C_zinc_concentrate
    Zinc content on a dry matter basis. Value taken from teh "zinc mine operation" /GLO dataset.
  property dry mass 1 kg; name DM_zinc_concentrate
  property carbon content 0
    carbon content on a dry matter basis (reserved; not for manual entry)
  property true value 1.51192e-7
    allocation property applied in "true value" allocation // value calculated from revenue
  properties: wet mass 1 kg, water content 0, carbon content, non-fossil 0, carbon content, fossil 0, water in wet mass 0 kg, carbon allocation 0 kg

## Inputs from technosphere
- natural gas, high pressure: 0.0216325 m3; lognormal variance with pedigree 0.0266, pedigree (1,3,4,1,3)
  properties: dry mass 0.84 kg, wet mass 0.84 kg, heating value, gross 39 MJ, carbon content, fossil 0.602381
  note on carbon content, fossil: An average C content of 0.506 kg C/ m3 has been assumed (this average has been calculated using data in Tab 3.5, ecoinvent v2.2 report 6_V
- electricity, medium voltage: 0.285526 kWh; lognormal variance with pedigree 0.0266, pedigree (1,3,4,1,3)
- hexamethyldisilazane: 0.000212989 kg; lognormal variance with pedigree 0.0086, pedigree (1,3,4,1,1)
  properties: wet mass 1 kg, carbon content, fossil 0.447205, dry mass 1 kg
- sheet rolling, aluminium: 0.000573981 kg; lognormal variance with pedigree 0.008625, pedigree (1,3,4,2,1)
  activityLink introduced to establish a direct link to the corresponding regional supply of this product
- aluminium, wrought alloy: 0.000573981 kg; lognormal variance with pedigree 0.026625, pedigree (1,3,4,2,3)
  properties: wet mass 1 kg, dry mass 1 kg
- cement, Portland: 0.144982 kg; lognormal variance with pedigree 0.0086, pedigree (1,3,4,1,1)
  properties: wet mass 1 kg, dry mass 1 kg
- kraft paper, unbleached: 0.00309161 kg; lognormal variance with pedigree 0.026625, pedigree (1,3,4,2,3)
  properties: wet mass 1 kg, dry mass 0.945 kg, water content 0.0582011, carbon content, non-fossil 0.416625, carbon content, fossil 0.00202191
  note on carbon content, non-fossil: Biogenic C content was calculated after biogenic C contents of chemicals used in the production of the paper (in Tab 9.4 ecoinvent v2.2 report 11_III, part 9). The cellulose content in 1 kg of paper (on a wet mas basis) was estimated as (1-chemical content), C content of cellulose was considered 0.44 kgC/kg dry mass (ecoinvent v2.2 report, n 15a, pg 40)
  note on carbon content, fossil: Fossil C content was calculated after fossil C contents of chemicals used in the production of the paper (in Tab 9.4 ecoinvent v2.2 report 11_III, part 9).
- oxygen, liquid: 5.84439e-5 kg; lognormal variance with pedigree 0.026625, pedigree (1,3,4,2,3)
  properties: dry mass 1 kg, wet mass 1 kg
- ammonia, liquid: 0.00341055 kg; lognormal variance with pedigree 0.008625, pedigree (1,3,4,2,1)
  properties: dry mass 1 kg, wet mass 1 kg
- dolomite: 0.0819674 kg; lognormal variance with pedigree 0.0092, pedigree (1,3,4,1,1)
  properties: wet mass 1 kg, carbon content, fossil 0.130435, dry mass 1 kg
- lime, hydrated, packed: 0.00114238 kg; lognormal variance with pedigree 0.7686, pedigree (1,3,4,1,1)
  properties: dry mass 0.997 kg, wet mass 1 kg, water content 0.00300903
- lime, packed: 0.0933892 kg; lognormal variance with pedigree 0.0106, pedigree (3,3,4,1,1)
  properties: carbon content, fossil 0.117492, wet mass 1 kg, water content 0.00200401, dry mass 0.998 kg
  note on carbon content, fossil: Table 3.1, ecoinvent v2.2 report 7, part VII, pg 3. MW CaCO3=100, MW MgCO3=84
- basalt: 0.704606 kg; lognormal variance with pedigree 0.0086, pedigree (1,3,4,1,1)
  properties: wet mass 1 kg, dry mass 1 kg
- urea, as N: 0.0133895 kg; lognormal variance with pedigree 0.008625, pedigree (1,3,4,2,1)
  properties: carbon content, fossil 0.2, dry mass 1 kg, wet mass 1 kg
- phenol: 0.0216899 kg; lognormal variance with pedigree 0.008625, pedigree (1,3,4,2,1)
  properties: wet mass 1 kg, dry mass 1 kg, carbon content, fossil 0.765957
- ammonium bicarbonate: 0.00130855 kg; lognormal variance with pedigree 0.008625, pedigree (1,3,4,2,1)
  properties: wet mass 1 kg, carbon content, fossil 0.151899, dry mass 1 kg
- tap water: 0.126856 kg; name tap_water_input; lognormal variance with pedigree 2.6286, pedigree (1,3,4,1,1)
  properties: carbon content, fossil 0.00178991, wet mass 1 kg, dry mass 0.000337476 kg, water content 2962.17
  note on carbon content, fossil: Bicarbonate content is 2.93 mol/m3. CO2 content is 0.1 mol/m3 (ecoinvent v2.2 report 8, Tab 93.1).
- spent solvent mixture: -1.26356e-5 kg; lognormal variance with pedigree 0.0266, pedigree (1,3,4,1,3)
  production volume 1.2638e-5 kg
    Calculated from the production volume of rock wool in proportion to the respective output amounts.
  properties: dry mass 0.835 kg, carbon content, fossil 0.571257, water content 0.197605, wet mass 1 kg
  note on carbon content, fossil: Tab A.7, ecoinvent v2.2 report 13_I. C content has been calculated after data in the tables, and then referred to 1 kg DM
- diesel, burned in building machine: 0.0496815 MJ; lognormal variance with pedigree 0.026625, pedigree (1,3,4,2,3)
- waste mineral oil: -6.3179e-5 kg; lognormal variance with pedigree 0.8266, pedigree (1,3,4,1,3)
  production volume 6.3191e-5 kg
    (same comment as for spent solvent mixture)
  properties: dry mass 0.9 kg, water content 0.111111, carbon content, fossil 0.864444, wet mass 1 kg
  note on carbon content, fossil: Tab A.6, ecoinvent v2.2 report 13_I. C content has been calculated after data in the tables, and then referred to 1 kg DM
- formaldehyde: 0.0604405 kg; lognormal variance with pedigree 0.008625, pedigree (1,3,4,2,1)
  properties: wet mass 1 kg, carbon content, fossil 0.4, dry mass 1 kg
- municipal solid waste: -0.00166998 kg; lognormal variance with pedigree 0.0266, pedigree (1,3,4,1,3)
  production volume 0.0016703 kg
    (same comment as for spent solvent mixture)
  properties: carbon content, non-fossil 0.261655, wet mass 1 kg, carbon content, fossil 0.171549, water content 0.297017, dry mass 0.771 kg
  note on carbon content, non-fossil: MSW composition in tab 4.1, ecoinvent v2.2 report 13_I. C content referred to 1 kg DM
- coke: 5.2443 MJ; lognormal variance with pedigree 0.008625, pedigree (1,3,4,2,1)
  properties: dry mass 0.0328671 kg, carbon content, fossil 0.869149, water content 0.0638298, wet mass 0.034965 kg
  note on carbon content, fossil: 81.7% C and 6% water in wet mass (ecoinvent v2.1 report 6_VI Table 7.1)
- wastewater, average: -0.000767904 m3; lognormal variance with pedigree 0.0266, pedigree (1,3,4,1,3)
  Specific type of wastewater treatment is chosen by using the activity link.
  production volume 0.00076805 m3
    (same comment as for spent solvent mixture)
  properties: water content 2882.2, wet mass 1000 kg, carbon content, non-fossil 0.194039, dry mass 0.346837 kg
  note on carbon content, non-fossil: 0.0673 kg TOC/m3 (Tab A.17, ecoinvent v2.2 report 13_I). TOC was considered as Total Carbon.
- glass wool mat: 0.000329227 kg; lognormal variance with pedigree 0.026625, pedigree (1,3,4,2,3)
  properties: wet mass 1 kg, carbon content, fossil 0.0107327, dry mass 1 kg
  note on carbon content, fossil: A share of 16 w-% for the binders is taken into account. The binder used in this study is a mixture of phenol, formaldehyde and urea resins (ecoinvent v2.2 report 16_part XIV), and the C content was calculated as a weigthed average of phenol, formaldehyde and urea C content.
- lubricating oil: 0.00282296 kg; lognormal variance with pedigree 0.008625, pedigree (1,3,4,2,1)
  properties: dry mass 1 kg, wet mass 1 kg, carbon content, fossil 0.75
  note on carbon content, fossil: Lubricating oil is produced from diesel. C-content/dry mass of fats and oils considered 75%, from: ecoinvent v2.2 report, n 15a, pg 40
- bauxite: 0.0622591 kg; lognormal variance with pedigree 0.0106, pedigree (3,3,4,1,1)
  properties: dry mass 1 kg, wet mass 1 kg
- stone wool factory: 4.42786e-10 unit; lognormal variance with pedigree 0.3086, pedigree (1,3,4,1,1)
  This exchange has an activity link directly to the producing activity because the product is primarily consumed in the same geographical area where it is produced.
- refractory, fireclay, packed: 0.000793059 kg; lognormal variance with pedigree 0.018, pedigree (1,1,4,1,1)
  composite
  properties: wet mass 1 kg, dry mass 1 kg

## Inputs from nature
- Water, well, in ground [natural resource, in water]: 0.00533558 m3; name water_well_in_ground_input; lognormal variance with pedigree 0.0266, pedigree (1,3,4,1,3)

## Emissions to nature
- Formaldehyde [air, non-urban air or from high stacks]: 0.00010533 kg; lognormal variance with pedigree 0.1466, pedigree (1,3,4,1,3)
- NMVOC, non-methane volatile organic compounds, unspecified origin [air, non-urban air or from high stacks]: 0.000380448 kg; lognormal variance with pedigree 0.1986, pedigree (1,3,4,1,4)
- Phenol [air, non-urban air or from high stacks]: 0.00010533 kg; lognormal variance with pedigree 0.0486, pedigree (1,3,4,1,1)
- Particulates, > 10 um [air, non-urban air or from high stacks]: 8.45149e-6 kg; lognormal variance with pedigree 0.1186, pedigree (1,3,4,1,4)
- Hydrogen chloride [air, non-urban air or from high stacks]: 1.76746e-5 kg; lognormal variance with pedigree 0.0486, pedigree (1,3,4,1,1)
- Zinc [air, non-urban air or from high stacks]: 2.44583e-8 kg; lognormal variance with pedigree 0.6586, pedigree (1,3,4,1,1)
- Particulates, < 2.5 um [air, non-urban air or from high stacks]: 0.000126776 kg; lognormal variance with pedigree 0.3786, pedigree (1,3,4,1,4)
- Hydrogen fluoride [air, non-urban air or from high stacks]: 9.24774e-8 kg; lognormal variance with pedigree 0.0486, pedigree (1,3,4,1,1)
- Carbon dioxide, fossil [air, non-urban air or from high stacks]: 0.538368 kg; lognormal variance with pedigree 0.0266, pedigree (1,3,4,1,3)
- Nitrogen oxides [air, non-urban air or from high stacks]: 0.000882822 kg; lognormal variance with pedigree 0.0486, pedigree (1,3,4,1,1)
- Carbon monoxide, fossil [air, non-urban air or from high stacks]: 4.2133e-5 kg; lognormal variance with pedigree 0.6586, pedigree (1,3,4,1,1)
- Chromium [air, non-urban air or from high stacks]: 4.57033e-9 kg; lognormal variance with pedigree 0.6586, pedigree (1,3,4,1,1)
- Particulates, > 2.5 um, and < 10um [air, non-urban air or from high stacks]: 5.63433e-6 kg; lognormal variance with pedigree 0.1986, pedigree (1,3,4,1,4)
- Ammonia [air, non-urban air or from high stacks]: 0.000562363 kg; lognormal variance with pedigree 0.0486, pedigree (1,3,4,1,1)
- Water [water, unspecified]: 0.00311043 m3; name water_to_water_unspecified; = (tap_water_input/1000)*(1-fraction_TW_to_air)+water_well_in_ground_input*(1-fraction_PW_to_air)-0.00076805; lognormal variance with pedigree 0.0487, pedigree (2,2,4,1,1)
  Calculated value based on literature values and expert opinion. See comments in the parametres' comment field.
  property fraction, origin: fresh water 1; name fraction_origin_fresh_water_Ww
  property fraction, origin: salt water 0; name fraction_origin_salt_water_Ww
  property wet mass 1000 kg; name WM
  property dry mass 0 kg; name DM
  property carbon content, non-fossil 0; name C_content_non_fossil
  property carbon content, fossil 0; name C_content_fossil
  property fraction, origin: unspecified 0; name fraction_origin_unspecified_Ww
  property water in wet mass 1000 kg; name WWM
- Copper [air, non-urban air or from high stacks]: 8.64076e-9 kg; lognormal variance with pedigree 0.6586, pedigree (1,3,4,1,1)
- Water [air, unspecified]: 0.00158411 m3; name water_to_air_unspecified; = (tap_water_input/1000*fraction_TW_to_air)+(water_well_in_ground_input*fraction_PW_to_air); lognormal variance with pedigree 0.0487, pedigree (2,2,4,1,1)
  (same comment as for Water)
  property fraction, origin: salt water 0; name fraction_origin_salt_water
  property fraction, origin: unspecified 0; name fraction_origin_unspecified
  property fraction, origin: fresh water 1; name fraction_origin_fresh_water
- Sulfur dioxide [air, non-urban air or from high stacks]: 0.00396155 kg; lognormal variance with pedigree 0.0086, pedigree (1,3,4,1,1)
- Lead [air, non-urban air or from high stacks]: 5.69502e-8 kg; lognormal variance with pedigree 0.6586, pedigree (1,3,4,1,1)
- Cadmium [air, non-urban air or from high stacks]: 9.15846e-9 kg; lognormal variance with pedigree 0.6586, pedigree (1,3,4,1,1)

## Sampling procedure
environmental report

## Extrapolations
see geography and technology

## Review by Daniel Kellenberger (obsolete) 2010-02-07
passed
