# methane production, 96% by volume, from biogas, high pressure, at user

Dataset: EcoSpold 2, unit process
Geography: CH
Time period: 2000-01-01 to 2019-12-31
Technology level: current
Classification: EcoSpold01Categories: biomass/fuels
Classification: ISIC rev.4 ecoinvent: 3520:Manufacture of gas; distribution of gaseous fuels through mains
Synonyms: Kompogas, Naturgas
Tags: ConvertedDataset
Scenario: Business-as-Usual
System model: Allocation at the point of substitution
Share of production covered: 100 %
Generated by: Mireille Faist Emmenegger (obsolete)
Published in: Jungbluth N. 2007
Database: ecoinvent
isCopyrightProtected: true
accessRestrictedTo: 1

## General comment
Total network losses are based on published data, repartition of losses on high and low pressure network on calculations with data for other countries.
[This dataset was already contained in the ecoinvent database version 2. It was not individually updated during the transfer to ecoinvent version 3. Life Cycle Impact Assessment results may still have changed, as they are affected by changes in the supply chain, i.e. in other datasets. This dataset was generated following the ecoinvent quality guidelines for version 2. It may have been subject to central changes described in the ecoinvent version 3 change report (http://www.ecoinvent.org/database/ecoinvent-version-3/reports-of-changes/), and the results of the central updates were reviewed extensively. The changes added e.g. consistent water flows and other information throughout the database. The documentation of this dataset can be found in the ecoinvent reports of version 2, which are still available via the ecoinvent website. The change report linked above covers all central changes that were made during the conversion process.]

## Included activities end
This dataset describes the energy requirement and the emissions of the high pressure distribution network in Switzerland.

## Geography
Energy requirements is based on environmental report of Italian company. Total leakages are specific for CH, HD-leakages are calculated out of the total with German data.

## Technology
The quantity of gas delivered in the high and medium pressure network is estimated. Industry, power plants and half of commercial and of others are assumed to be connected to the high and medium pressure network .

## Reference product
- methane, 96% by volume, from biogas, high pressure, at user: 1 MJ; CPC 17200: Coal gas, water gas, producer gas and similar gases, other than petroleum gases and other gaseous hydrocarbons; By-product classification allocatable product; CAS 74-82-8
  EcoSpold01Location=CH
  production volume 0.0336675 MJ
    This is a placeholder value that does not reflect real-world production volumes. This dataset does not currently require a real-world production volume to work in the database framework, and no actual data were collected yet. This has no negative effect on the results of the ecoinvent database. The placeholder value of this activity was scaled according to the nominal GDP of 2005 (source: United Nations, http://data.un.org/Glossary.aspx?q=GDP+%28current+US%24%29, accessed 20130726) to reflect an appropriate share of the global production volume, which is also a placeholder value.
  property carbon content, non-fossil 0.695496
    C content is 0.7 kg C/kg methane 96%vol (tab 19.1, ecoinvent v2.2 report 17, part 19). This can be obtained from the composition of the gas, 96% (in vol) methane, 2% (in vol) CO2. The composition in %vol was converted in % weight using density data of the different gases from tab 19.1, ecoinvent v2.2 report 17, part 19.
  property price 0.00433815 EUR2005
    Calculated based on inputs: The price of the product has been calculated as a sum of the values of the material and energy inputs for this product. This value is therefore a rough estimation. It may underestimate the real price since there are additional expenses when producing any product. These expences can include for example labour costs, treatment of waste materials and profit for the producer. Please consider carefully whether this level of data quality is acceptable for your application.
  property carbon content 0.695496
    carbon content on a dry matter basis (reserved; not for manual entry)
  properties: water content 0, water in wet mass 0 kg, wet mass 0.0218341 kg, dry mass 0.0218341 kg, carbon content, fossil 0, carbon allocation 0.0151855 kg

## Inputs from technosphere
- electricity, medium voltage: 7.2431e-5 kWh; lognormal variance with pedigree 0.0407, pedigree (1,3,5,3,1)
  Environmental report of an Italian company
  EcoSpold01Location=CH
  Uncertainty: environmental report of an Italian company
- pipeline, natural gas, high pressure distribution network: 9.503e-10 km; lognormal variance with pedigree 0.3406, pedigree (2,1,5,1,1)
  Based on statistics
  EcoSpold01Location=CH
  Uncertainty: based on statistics
- methane, 96% by volume: 0.029042 m3; lognormal variance with pedigree 0.0407, pedigree (2,1,5,3,1)
  EcoSpold01Location=CH
  Leakage based on German data
  Uncertainty: leakage based on German data
  properties: carbon content, non-fossil 0.695496, wet mass 0.752 kg, dry mass 0.752 kg
  note on carbon content, non-fossil: Carbon content calculated from composition of the gas, 96% (in vol) methane, 2% (in vol) CO2 (Tab 13.3, ecoinvent v2.2 report 17). The composition in %vol was converted in % weight using density data of the different gases from tab 19.1, ecoinvent v2.2 report 17, part 19.
- heat, central or small-scale, natural gas: 0.0016685 MJ; lognormal variance with pedigree 0.0407, pedigree (1,3,5,3,1)
  Environmental report of an Italian company
  EcoSpold01Location=RER
  Uncertainty: environmental report of an Italian company

## Emissions to nature
- Methane, non-fossil [air, urban air close to ground]: 9.9524e-6 kg; lognormal variance with pedigree 0.162, pedigree (3,1,5,1,1)
  Calculation based on gas composition and leakages
  Uncertainty: calculation based on gas composition and leakages
- Hydrogen sulfide [air, urban air close to ground]: 2.2016e-10 kg; lognormal variance with pedigree 0.082, pedigree (3,1,5,1,1)
  (same comment as for Methane, non-fossil)
- Carbon dioxide, non-fossil [air, urban air close to ground]: 5.6977e-7 kg; lognormal variance with pedigree 0.042, pedigree (3,1,5,1,1)
  (same comment as for Methane, non-fossil)

## Sampling procedure
statistics

## Extrapolations
This dataset has been extrapolated from year 2000 to the year of the calculation (2019). The uncertainty has been adjusted accordingly.

## Review by Arnaud Dauriat 2005-08-04
Passed.
