# potassium chloride production, from salar brine

Dataset: EcoSpold 2, unit process
Geography: CL
Time period: 2015-01-01 to 2019-12-31
Technology level: current
Classification: ISIC rev.4 ecoinvent: 2012:Manufacture of fertilizers and nitrogen compounds
Scenario: Business-as-Usual
System model: Allocation at the point of substitution
Generated by: Yvonne Baeuerle
Database: ecoinvent
isCopyrightProtected: true
accessRestrictedTo: 1

## General comment
This activity represents the production of potassium chloride from salar brine in Chile. The Atacama Desert in northern Chile is rich in Salar brines which are formed through a natural leaching process in underground halite aquifers where increasing concentrations of lithium and potassium from the Andes Mountains are accumulated.

## Included activities start
The activity starts with the pumping of Salar brines via standard wells from approximately 0.5 – 30 m below a salt crust into large evaporation ponds (plastic-lined) to concentrate the salts. This site in the Atacama Desert is best suited for solar drying (8 – 10 months) since it offers very dry atmospheric conditions. The initial phase chemistry is controlled by mixing brines from separate evaporation ponds to remove the magnesium and sulfate at the early stages of the evaporation.

## Included activities end
The activity ends with the harvesting of the salts rich in potassium chloride by excavators ready for use at a purity of min. 95%. Other chemical components are sodium (typical 0.9), sulfate (2.0) magnesium (<0.1), calcium (<0.8), insolubles (<0.1) and moisture (0.3).

## Geography
The production facilitiy is located in the Atacama Desert in northern Chile where the chemical is produced from natural resources by the global producer and supplier SQM.

## Time period
Process data provided are from 2014/2015 and are valid for today's and near future production at SQM in Chile.

## Reference product
- potassium chloride, industrial grade: 1 kg; CPC 34631: Potassium chloride (muriate of potash); By-product classification allocatable product; CAS 7447-40-7
  production volume 2e9 kg
    Effective annual production capacity including potassium chloride production for direct internal use to produce potassium nitrate. Data provided by the SQM corporation press report from 2017.
  property price 0.184 EUR2005
    Temporary price data. Calculated as 90% of purchasers price based on: ecoinvent v2 report 'Bioenergy', chapter 'Biogas', page 188
  property true value 0.184
    allocation property applied in "true value" allocation // value calculated from revenue

## By-products
- electricity, for reuse in municipal waste incineration only: 0 kWh; CPC 17100: Electrical energy; By-product classification allocatable product; pedigree (1,1,1,1,1)
  Net electricity generated from this waste and used in internal MSWI plant energy redistribution.
  Uncertainty: uncertainty is calculated from uncertainties in waste composition and uncertainties in energy efficiency and the uncertainty in internal energy demand
  production volume 3.5298e7 kWh
  property price 0.1 EUR2005; name E_el_prod_MSWI_price_EUR2005
    Estimated to be the same price as in case of electricity, medium voltage.
  property true value relation 3.6; name E_el_prod_MSWI_true_value_relation
    property to calculate "true value" from
  property exergy 3.6 MJ; name E_el_prod_MSWI_exergy
    This exergy property is based on the exergy content of the product.
  property true value 0.00226542
    allocation property applied in "true value" allocation // value calculated from true value relation
- heat, for reuse in municipal waste incineration only: 0 MJ; CPC 17300: Steam and hot water; By-product classification allocatable product; pedigree (1,1,1,1,1)
  (same comment as for electricity, for reuse in municipal waste incineration only)
  production volume 2.48256e8 MJ
  property exergy 0.1842 MJ; name E_th_prod_MSWI_exergy
    This exergy property is based on the exergy content of the product.
  property price 0.0106 EUR2005; name E_th_prod_MSWI_price_EUR2005
    Average European district heat price from Ecoheatcool and Euroheat 2005-2006, Ecoheat Work package 1: The European heat market. Final report. 10.6 EUR/GJ i s the price of district heat. http://www.solarthermalworld.org/files/Ecoheatcool%20WP1%20Web.pdf?download
  property true value relation 0.1842; name E_th_prod_MSWI_true_value_relation
    property to calculate "true value" from
  property true value 0.000815239
    (same comment as for electricity, for reuse in municipal waste incineration only)

## Inputs from technosphere
- waste polyvinylfluoride: -0.0177036 kg; lognormal variance with pedigree 0.0082, pedigree (3,1,2,1,1)
  Waste treatment of vinyl layer in evaporation ponds
  production volume 3.6e7 kg; = Ref('a7126a00-8567-43bb-9730-285e45ec9bdb', 'ProductionVolume') * ((Ref('4218242f-b86d-4fc7-93bd-c789a7d1d234')*-1) / Ref('a7126a00-8567-43bb-9730-285e45ec9bdb'))
    Calculated from production volume of reference product using the relative outputs.
  properties: dry mass 0.998 kg, water content 0.00200401, carbon content, fossil 0.571142, wet mass 1 kg
- electricity, medium voltage: 0.0786826 kWh; lognormal variance with pedigree 0.0028, pedigree (3,1,2,1,1)
  Pumping of the Salar brine in standard wells from 0.5-15 m underground
- polyvinylfluoride, film: 0.0177036 kg; lognormal variance with pedigree 0.0028, pedigree (3,1,2,1,1)
  Vinyl layer in evaporation ponds to avoid percolation of the brine from the evaporation ponds
  properties: dry mass 1 kg, carbon content, fossil 0.521739, wet mass 1 kg
- diesel, burned in building machine: 0.00983533 MJ; lognormal variance with pedigree 0.0008, pedigree (1,1,2,1,1)
  Fuel used in machines to harvest the salts

## Inputs from nature
- Transformation, to mineral extraction site [natural resource, land]: 0.101304 m2; lognormal variance with pedigree 0.1222, pedigree (3,1,2,1,1)
  Salar bine is pumped from undertround aquifers into large evaporation ponds. This site in the Atacama Desert is best suited for solar drying (8 – 10 months) since it offers very dry atmospheric conditions all year around.
- Occupation, mineral extraction site [natural resource, land]: 3.03912 m2*year; = land_transformation*30; lognormal variance with pedigree 0.1222, pedigree (3,1,2,1,1)
  Communication by SQM: If production levels are equivalent to current ones, confirmed reserves of the salar that belong to SQM will last at least for 30 more years.
  http://sqm.com/en-us/acercadesqm/recursosnaturales/salmuera.aspx
- Transformation, from unspecified, natural (non-use) [natural resource, land]: 0.101304 m2; name land_transformation; lognormal variance with pedigree 0.1222, pedigree (3,1,2,1,1)
  (same comment as for Transformation, to mineral extraction site)
- Water, salt, sole [natural resource, in water]: 0.0265554 m3; name water; lognormal variance with pedigree 0.0008, pedigree (1,1,2,1,1)
  Natural ressource in the Atacama Dessert in Chile found in underground aquifers. 0.027m3 is required to produce 1kg of potassium chloride, 95% purity. The brine density is estimated to be 1200 kg/m3.

## Emissions to nature
- Water [air, unspecified]: 0.0257587 m3; = water*0.97; lognormal variance with pedigree 0.1602, pedigree (5,1,2,1,1)
  Estimated amount of evaporated water from the evaporation ponds.

## Sampling procedure
Data have been provided by the producer SQM in Chile. SQM is a global producer and supplier of plant nutrients, iodine, lithium and industrial chemicals. The production facilities are located in the Atacama Desert where the chemicals are produced from natural resources via mining, crystalization and refining processes. Initially, some data and process information has been exchanged via questionaires. Further, more specific data were provided via intensive direct contact with experts at SQM.

## Review by Eric Johnson 2019-01-28
The mass balances look plausible. Thanks to the author for providing separate flow sheets that aided understanding greatly.

As previously noted, it is difficult to review the energy balances, because I don't have an ready benchmarks or guidelines.

All in all, a valuable addition to ecoinvent.
