# treatment of waste reinforced concrete, sorting plant

Dataset: EcoSpold 2, unit process
Geography: RoW
Time period: 1994-01-01 to 2019-12-31
Technology level: current
Classification: EcoSpold01Categories: waste management/recycling
Classification: ISIC rev.4 ecoinvent: 3830:Materials recovery
Tags: Treatment; ConvertedDataset
Scenario: Business-as-Usual
System model: Allocation at the point of substitution
Generated by: Gabor Doka (obsolete)
Published in: Doka G. 2007
Database: ecoinvent
isCopyrightProtected: true
accessRestrictedTo: 1

## General comment
The waste contains 0.97kg inert material (GSD=100.1%) and 0.03kg steel (GSD=107.9%). Waste density is 2300 kg/m3.
[This dataset was already contained in the ecoinvent database version 2. It was not individually updated during the transfer to ecoinvent version 3. Life Cycle Impact Assessment results may still have changed, as they are affected by changes in the supply chain, i.e. in other datasets. This dataset was generated following the ecoinvent quality guidelines for version 2. It may have been subject to central changes described in the ecoinvent version 3 change report (http://www.ecoinvent.org/database/ecoinvent-version-3/reports-of-changes/), and the results of the central updates were reviewed extensively. The changes added e.g. consistent water flows and other information throughout the database. The documentation of this dataset can be found in the ecoinvent reports of version 2, which are still available via the ecoinvent website. The change report linked above covers all central changes that were made during the conversion process.]

## Included activities end
energy for dismantling, particulate matter emissions from dismantling and handling, machines for handling in sorting plant, electricity demand for sorting plant, transport to dismantling facilities, final disposal of waste material,

## Geography
Specific to the technology mix encountered in Switzerland in late 1990ies

## Technology
Building demolition with skid-steer loaders. Dry sorting plant for building wastes with pre-sorting of mixed waste, crushing and manual sorting.

## Reference product
- waste reinforced concrete: -1 kg; name RP; CPC 39: Wastes or scraps; By-product classification Waste
  EcoSpold01Location=CH
  production volume 1.83351e11 kg; name RP_PV; = 2.50E+13*0.15*0.18/3
    Estimated value. Word production of concrete amounts to 25 billion tonnes (WBCSD 2009). The waste generation is estimated to be 15% (taken from the estimated value for gypsum, source: WRAP "International practice in plasterboard recycling: Canada", n.d). 1/3 of total waste is assumed to be concrete not reinforced, 1/3 concrete reinforced, and 1/3 concrete. From ecoinvent version 2, 41% of waste goes to landfill, 41% goes directly to recycling, and 18% is first sorted and then sent to disposal or recycled.
    WBCSD (2009) Recycling concrete. The Cement Sustainability Initiative. Retrieved from: http://www.wbcsdcement.org/index.php/en/publications, accessed 3 May 2016
    WRAP(n.d.) International practice in plasterboard recycling: Canada. Retrieved from: http://www.wrap.org.uk/sites/files/wrap/Case%20study%20-%20Plasterboard%20recycling%20in%20Canada.pdf, accessed 3 May 2016
  property price 0 EUR2005; name RP_price_EUR2005
    Waste products are assigned a price of zero as they are assumed to require further treatment.
  property carbon content 0
    carbon content on a dry matter basis (reserved; not for manual entry)
  properties: water in wet mass 0.00582 kg, wet mass 1 kg, carbon content, non-fossil 0, water content 0.00585407, carbon content, fossil 0, dry mass 0.99418 kg, carbon allocation 0 kg

## By-products
- heat, for reuse in municipal waste incineration only: 0 MJ; CPC 17300: Steam and hot water; By-product classification allocatable product; pedigree (1,1,1,1,1)
  Net electricity generated from this waste and used in internal MSWI plant energy redistribution.
  Uncertainty: uncertainty is calculated from uncertainties in waste composition and uncertainties in energy efficiency and the uncertainty in internal energy demand
  property exergy 0.1842 MJ; name E_th_prod_MSWI_exergy
    This exergy property is based on the exergy content of the product.
  property price 0.0106 EUR2005; name E_th_prod_MSWI_price_EUR2005
    Average European district heat price from Ecoheatcool and Euroheat 2005-2006, Ecoheat Work package 1: The European heat market. Final report. 10.6 EUR/GJ i s the price of district heat. http://www.solarthermalworld.org/files/Ecoheatcool%20WP1%20Web.pdf?download
  property true value relation 0.1842; name E_th_prod_MSWI_true_value_relation
    property to calculate "true value" from
- electricity, for reuse in municipal waste incineration only: 0 kWh; CPC 17100: Electrical energy; By-product classification allocatable product; pedigree (1,1,1,1,1)
  (same comment as for heat, for reuse in municipal waste incineration only)
  property true value relation 3.6; name E_el_prod_MSWI_true_value_relation
    property to calculate "true value" from
  property price 0.1 EUR2005; name E_el_prod_MSWI_price_EUR2005
    Estimated to be the same price as in case of electricity, medium voltage.
  property exergy 3.6 MJ; name E_el_prod_MSWI_exergy
    This exergy property is based on the exergy content of the product.

## Inputs from technosphere
- diesel, burned in building machine: 0.0612 MJ; lognormal variance with pedigree 0.112, pedigree (1,1,5,5,1)
  energy for demolition. Uncertainty from range in (DAFSTB 1996)
  EcoSpold01Location=GLO
- excavation, hydraulic digger: 0.000483 m3; lognormal variance with pedigree 0.052, pedigree (1,1,5,5,1)
  handling in sorting plant. Uncertainty from range in literature
  EcoSpold01Location=RER
- inert waste: -0.388 kg; name inert_waste; lognormal variance with pedigree 0.082, pedigree (1,1,5,5,1)
  EcoSpold01Location=CH
  disposed masses. Uncertainty calculated from uncertainty in transfer coefficients and uncertainty of waste fractions
  production volume 7.11402e10 kg; = inert_waste*RP_PV/ABS(RP)
    Calculated from the production volume of waste reinforced concrete in proportion to the respective output amounts.
  property price 0 EUR2005; name inert_waste_price_EUR2005
  properties: wet mass 1 kg, dry mass 1 kg
- sorting facility, for construction waste: 1e-10 unit; lognormal variance with pedigree 0.042, pedigree (1,1,5,5,1)
  EcoSpold01Location=CH
  Uncertainty heeded in exchanges, 1kg = 1kg
- electricity, low voltage: 0 kWh; pedigree (1,1,1,1,1)
  demand in sorting plant. Uncertainty from range in literature
  EcoSpold01Location=CH
- electricity, low voltage: 4.9109e-5, 8.6131e-6, 0.000141634, 0.00214192, 0.000353057, 0.00100567 kWh (6 entries); lognormal variance with pedigree 0.052, pedigree (1,1,5,5,1)
  demand in sorting plant. Uncertainty from range in literature
  EcoSpold01Location=CH

## Emissions to nature
- Particulates, > 2.5 um, and < 10um [air, urban air close to ground]: 6.34e-5 kg; lognormal variance with pedigree 0.1832, pedigree (2,3,5,5,1)
  Emission from dismantling and handling. from one extrapolated PM10 emission factor and generic PM fractions from measurements
  Uncertainty: & basic uncertainty of 2; from one extrapolated PM10 emission factor and generic PM fractions from measurements
- Particulates, > 10 um [air, urban air close to ground]: 8.35e-5 kg; lognormal variance with pedigree 0.0932, pedigree (2,3,5,5,1)
  Emission from dismantling and handling. from one extrapolated PM10 emission factor and generic PM fractions from measurements
  Uncertainty: & basic uncertainty of 1.5; from one extrapolated PM10 emission factor and generic PM fractions from measurements
- Particulates, < 2.5 um [air, urban air close to ground]: 1.66e-5 kg; lognormal variance with pedigree 0.3632, pedigree (2,3,5,5,1)
  Emission from dismantling and handling. from one extrapolated PM10 emission factor and generic PM fractions from measurements
  Uncertainty: & basic uncertainty of 3; from one extrapolated PM10 emission factor and generic PM fractions from measurements

## Sampling procedure
waste-specific calculation based on literature data

## Extrapolations
none This dataset has been copied from an original dataset covering the geography CH. The uncertainty has been adjusted accordingly.

## Review by Niels Jungbluth 2003-05-22
Passed. Calculation for standard deviation 95 of transport services differs from standard Pedigree approach in this project and figure obtained by this procedure (2.09). Uncertainty for estimation of distance is not included.
