# treatment of wastewater from black chrome coating, capacity 1.1E10l/year

Dataset: EcoSpold 2, unit process
Geography: CH
Time period: 1994-01-01 to 2019-12-31
Technology level: current
Classification: EcoSpold01Categories: waste management/wastewater treatment
Classification: ISIC rev.4 ecoinvent: 3700:Sewerage
Tags: ConvertedDataset; Treatment
Scenario: Business-as-Usual
System model: Allocation at the point of substitution
Generated by: Gabor Doka (obsolete)
Published in: Doka G. 2008
Database: ecoinvent
isCopyrightProtected: true
accessRestrictedTo: 1

## General comment
Wastewater purified in a moderatly large municipal wastewater treatment plant (capacity class 2), with an average capacity size of 71100 per-captia-equivalents PCE.
Wastewater contains (in kg/m3): COD: 0.002 (GSD=123.5%); BOD: 0.001 (GSD=123.5%); Ag: 0.000005 (GSD=224.1%); Cd: 0.000005 (GSD=224.1%); Cr: 0.00035 (GSD=224.1%); Cu: 0.00049 (GSD=224.1%); Ni: 0.0003 (GSD=224.1%); Pb: 0.00005 (GSD=224.1%); Zn: 0.00021 (GSD=224.1%);
[This dataset was already contained in the ecoinvent database version 2. It was not individually updated during the transfer to ecoinvent version 3. Life Cycle Impact Assessment results may still have changed, as they are affected by changes in the supply chain, i.e. in other datasets. This dataset was generated following the ecoinvent quality guidelines for version 2. It may have been subject to central changes described in the ecoinvent version 3 change report (http://www.ecoinvent.org/database/ecoinvent-version-3/reports-of-changes/), and the results of the central updates were reviewed extensively. The changes added e.g. consistent water flows and other information throughout the database. The documentation of this dataset can be found in the ecoinvent reports of version 2, which are still available via the ecoinvent website. The change report linked above covers all central changes that were made during the conversion process.]

## Included activities end
Infrastructure materials for municipal wastewater treatment plant, transports, dismantling. Land use burdens.

## Geography
Specific to the technology mix encountered in Switzerland in 2000. Well applicable to modern treatment practices in Europe, North America or Japan.

## Technology
Three stage wastewater treatment (mechanical, biological, chemical) including sludge digestion (fermentation) according to the average technology in Switzerland

## Parameters
- fraction, process water, to air: 0.1 dimensionless; name fraction_PW_to_air; lognormal variance with pedigree 0.092025, pedigree (4,4,3,2,4)
  Literature value (Statistics Canada, 2007 & Shaffer, K.H., 2008, Consumptive water use in the Great Lakes Basin, USGS) (Vionnet, S., Quantis Water Database - Technical Report, 2012).

## Reference product
- wastewater from black chrome coating: -1 m3; CPC 39920: Sewage sludge; By-product classification Waste
  production volume 0.0336675 m3
    This is a placeholder value that does not reflect real-world production volumes. This dataset does not currently require a real-world production volume to work in the database framework, and no actual data were collected yet. This has no negative effect on the results of the ecoinvent database. The placeholder value of this activity was scaled according to the nominal GDP of 2005 (source: United Nations, http://data.un.org/Glossary.aspx?q=GDP+%28current+US%24%29, accessed 20130726) to reflect an appropriate share of the global production volume, which is also a placeholder value.
  property price 0 EUR2005
    Waste products are assigned a price of zero as they are assumed to require further treatment.
  property carbon content, fossil 0.00256552
    COD= 0.002 kg/m3 (Tab A.18, ecoinvent v2.2 report 13_I). COD was converted to TOC, using conversion factors in Tab 4.10 (ecoinvent v2.2 report 13_IV). TOC was considered as Total Carbon.
  property carbon content 0.00256552
    carbon content on a dry matter basis (reserved; not for manual entry)
  properties: wet mass 1000 kg, water in wet mass 999.663 kg, dry mass 0.337476 kg, carbon content, non-fossil 0, water content 2962.17, carbon allocation 0.000865801 kg

## By-products
- electricity, for reuse in municipal waste incineration only: 0 kWh; CPC 17100: Electrical energy; By-product classification allocatable product; pedigree (1,1,1,1,1)
  Net electricity generated from this waste and used in internal MSWI plant energy redistribution.
  Uncertainty: uncertainty is calculated from uncertainties in waste composition and uncertainties in energy efficiency and the uncertainty in internal energy demand
  property exergy 3.6 MJ; name E_el_prod_MSWI_exergy
    This exergy property is based on the exergy content of the product.
  property true value relation 3.6; name E_el_prod_MSWI_true_value_relation
    property to calculate "true value" from
  property price 0.1 EUR2005; name E_el_prod_MSWI_price_EUR2005
    Estimated to be the same price as in case of electricity, medium voltage.
- heat, for reuse in municipal waste incineration only: 0 MJ; CPC 17300: Steam and hot water; By-product classification allocatable product; pedigree (1,1,1,1,1)
  Net useful heat generated from this waste and used in internal MSWI plant energy redistribution.
  Uncertainty: uncertainty is calculated from uncertainties in waste composition and uncertainties in energy efficiency and the uncertainty in internal energy demand
  property true value relation 0.1842; name E_th_prod_MSWI_true_value_relation
    property to calculate "true value" from
  property exergy 0.1842 MJ; name E_th_prod_MSWI_exergy
    This exergy property is based on the exergy content of the product.
  property price 0.0106 EUR2005; name E_th_prod_MSWI_price_EUR2005
    Average European district heat price from Ecoheatcool and Euroheat 2005-2006, Ecoheat Work package 1: The European heat market. Final report. 10.6 EUR/GJ i s the price of district heat. http://www.solarthermalworld.org/files/Ecoheatcool%20WP1%20Web.pdf?download
- zinc concentrate: 0 kg; CPC 14290: Other non-ferrous metal ores and concentrates (other than uranium or thorium ores and concentrates); By-product classification allocatable product
  Calculated value from the knowledge of the properties of both products.
  property price 0.38 EUR2005; name ByP_price_EUR2005
    Temporary price data. Calculated as 90% of purchasers price based on: Zinc content in concentrate 53%. Concentrate price per kg Zn 86.5% of refined Zn price (13.5% treatment charges according to CHR Metals Limited 2005: Dynamic cost curves. http://www.minecost.com/dynamic.pdf). 2004 zinc price from USGS (2007) Mineral commodity summaries 2007. <http://minerals.usgs.gov/minerals/pubs/mcs/2007/mcs2007.pdf> [Accessed 25 May 2010]
  property zinc content 0.53; name zinc_C_zinc_concentrate
    Zinc content on a dry matter basis. Value taken from teh "zinc mine operation" /GLO dataset.
  property dry mass 1 kg; name DM_zinc_concentrate
  property carbon content 0
    carbon content on a dry matter basis (reserved; not for manual entry)
  properties: wet mass 1 kg, water content 0, carbon content, non-fossil 0, carbon content, fossil 0, water in wet mass 0 kg, carbon allocation 0 kg

## Inputs from technosphere
- iron (III) chloride, without water, in 40% solution state: 1.7323e-5 kg; lognormal variance with pedigree 0.35, pedigree (1,1,5,1,1)
  direct wastewater treatment plant burden plus burden from sludge incineration. Uncertainty calculated from wastewater composition and treatment model
  properties: dry mass 1 kg, wet mass 1 kg
- waste plastic, mixture: -0.0155 kg; lognormal variance with pedigree 0.04, pedigree (1,1,5,1,1)
  direct wastewater treatment plant burden. Uncertainty calculated from wastewater composition and treatment model
  production volume 0.000521847 kg; = (Ref('672d6209-05bc-465e-ae49-a95e225e336c')*-1)* Ref('b106e152-79c7-49b9-9ce9-6ff3ed61898a', 'ProductionVolume')/ABS( Ref('b106e152-79c7-49b9-9ce9-6ff3ed61898a'))
    Calculated from the production volume of wastewater from black chrome coating in proportion to the respective output amounts.
  properties: wet mass 1 kg, carbon content, fossil 0.747344, dry mass 0.847 kg, water content 0.180638
  note on carbon content, fossil: C content in 1 kg DM was calculated using data in Tab A.2, ecoinvent v2.2 report 13_I
- slag landfill: 6.7118e-13 unit; lognormal variance with pedigree 0.07, pedigree (1,1,5,1,1)
  burden from sludge incineration. Uncertainty calculated from wastewater composition and treatment model
- electricity, low voltage: 0.028779 kWh; lognormal variance with pedigree 0.04, pedigree (1,1,5,1,1)
  (same comment as for waste plastic, mixture)
- hydrochloric acid, without water, in 30% solution state: 5.6954e-8 kg; lognormal variance with pedigree 0.35, pedigree (1,1,5,1,1)
  (same comment as for slag landfill)
  properties: wet mass 1 kg, dry mass 1 kg
- process-specific burdens, slag landfill: 0.00037754 kg; lognormal variance with pedigree 0.07, pedigree (1,1,5,1,1)
  burden from sludge incineration. Uncertainty calculated from wastewater composition and treatment model;activityLink introduced to establish a direct link to the corresponding regional supply of this product
- sewer grid, 1.1E10l/year, 242 km: 1.6832e-7 km; lognormal variance with pedigree 0.04, pedigree (1,1,5,1,1)
  uncertainty heeded in exchanges of the module
  This exchange has an activity link directly to the producing activity because the product is primarily consumed in the same geographical area where it is produced.
- residual material landfill: 6.0273e-13 unit; lognormal variance with pedigree 0.07, pedigree (1,1,5,1,1)
  (same comment as for slag landfill)
- electricity, high voltage: 0.00042956 kWh; lognormal variance with pedigree 0.51, pedigree (1,1,5,1,1)
  (same comment as for slag landfill)
- heat, central or small-scale, other than natural gas: 0.00874952 MJ; lognormal variance with pedigree 0.05, pedigree (1,1,5,1,1)
  (same comment as for waste plastic, mixture)
- heat, district or industrial, other than natural gas: 0.0025059 MJ; lognormal variance with pedigree 0.07, pedigree (1,1,5,1,1)
  (same comment as for slag landfill)
- process-specific burdens, municipal waste incineration: 0.0029879 kg; lognormal variance with pedigree 0.07, pedigree (1,1,5,1,1)
  (same comment as for process-specific burdens, slag landfill)
- cement, unspecified: 0.00011572 kg; lognormal variance with pedigree 0.08, pedigree (1,1,5,1,1)
  (same comment as for slag landfill)
  properties: wet mass 1 kg, dry mass 1 kg
- chemical, organic: 4.6881e-6 kg; lognormal variance with pedigree 0.72, pedigree (1,1,5,1,1)
  (same comment as for slag landfill)
  properties: carbon content, fossil 0.628, wet mass 1 kg, dry mass 1 kg
  note on carbon content, fossil: This dataset is an unweighted average of 20 organic substances (listed in Tab 88.1, ecoinvent v2.2 report 8, part II), being part of the top100 chemicals included in this database. The C-content has also been calculated as an unweighted average of the C content of the substances composing this dataset.
- chemical, inorganic: 9.4923e-8 kg; lognormal variance with pedigree 0.35, pedigree (1,1,5,1,1)
  (same comment as for slag landfill)
  properties: carbon content, fossil 0.003, dry mass 1 kg, wet mass 1 kg
  note on carbon content, fossil: This dataset is an unweighted average of 20 inorganic substances (listed in Tab 88.1, ecoinvent v2.2 report 8, part II), being part of the top100 chemicals included in this database. The C-content has also been calculated as an unweighted average of the C content of the substances composing this dataset.
- municipal waste incineration facility: 7.4696e-13 unit; lognormal variance with pedigree 0.07, pedigree (1,1,5,1,1)
  (same comment as for slag landfill)
- heat, district or industrial, natural gas: 0.0120586 MJ; lognormal variance with pedigree 0.05, pedigree (1,1,5,1,1)
  (same comment as for waste plastic, mixture)
- waste cement, hydrated: -0.00028931 kg; lognormal variance with pedigree 0.08, pedigree (1,1,5,1,1)
  (same comment as for slag landfill)
  production volume 9.74036e-6 kg; = (Ref('3ed23b31-408d-4a9d-939a-a25d40cec6b7')*-1)* Ref('b106e152-79c7-49b9-9ce9-6ff3ed61898a', 'ProductionVolume')/ABS( Ref('b106e152-79c7-49b9-9ce9-6ff3ed61898a'))
    (same comment as for waste plastic, mixture)
  properties: wet mass 1 kg, dry mass 1 kg
- process-specific burdens, residual material landfill: 0.00028931 kg; lognormal variance with pedigree 0.07, pedigree (1,1,5,1,1)
  (same comment as for process-specific burdens, slag landfill)
- liquid manure spreading, by vacuum tanker: 6.8904e-6 m3; lognormal variance with pedigree 0.04, pedigree (1,1,5,1,1)
  burden from sludge spreading. Uncertainty calculated from wastewater composition and treatment model
  This exchange has an activity link directly to the producing activity because the product is primarily consumed in the same geographical area where it is produced.
- waste graphical paper: -0.0155 kg; lognormal variance with pedigree 0.04, pedigree (1,1,5,1,1)
  (same comment as for waste plastic, mixture)
  production volume 0.000521847 kg; = (Ref('56fd97cd-0cfe-47f8-9fdf-88955ba8a8f2')*-1)* Ref('b106e152-79c7-49b9-9ce9-6ff3ed61898a', 'ProductionVolume')/ABS( Ref('b106e152-79c7-49b9-9ce9-6ff3ed61898a'))
    (same comment as for waste plastic, mixture)
  properties: carbon content, non-fossil 0.454955, water content 0.126126, dry mass 0.888 kg, wet mass 1 kg
- wastewater treatment facility, capacity 1.1E10l/year: 1.9883e-9 unit; lognormal variance with pedigree 0.04, pedigree (1,1,5,1,1)
  (same comment as for sewer grid, 1.1E10l/year, 242 km)

## Emissions to nature
- Lead [water, ground-, long-term]: 1.9445e-6 kg; lognormal variance with pedigree 6.92, pedigree (1,1,5,1,1)
  emission from sludge incineration. Uncertainty calculated from wastewater composition and treatment model
- Methane, fossil [air, urban air close to ground]: 6.6037e-6 kg; lognormal variance with pedigree 0.14, pedigree (1,1,5,1,1)
  (same comment as for Lead)
- Silver, ion [water, ground-, long-term]: 1.4313e-6 kg; lognormal variance with pedigree 0.8, pedigree (1,1,5,1,1)
  (same comment as for Lead)
- Lead [soil, agricultural]: 1.7212e-5 kg; lognormal variance with pedigree 0.71, pedigree (1,1,5,1,1)
  emission from sludge spreading. Uncertainty calculated from wastewater composition and treatment model
- Nickel [soil, agricultural]: 4.5667e-5 kg; lognormal variance with pedigree 0.71, pedigree (1,1,5,1,1)
  (same comment as for Lead)
- Zinc [soil, agricultural]: 5.6112e-5 kg; lognormal variance with pedigree 0.71, pedigree (1,1,5,1,1)
  (same comment as for Lead)
- COD, Chemical Oxygen Demand [water, ground-, long-term]: 3.4369e-6 kg; lognormal variance with pedigree 0.12, pedigree (1,1,5,1,1)
  (same comment as for Lead)
- Copper, ion [water, surface water]: 0.0001271 kg; lognormal variance with pedigree 0.65, pedigree (1,1,5,1,1)
  sewer overload discharge plus direct wastewater treatment plant emission plus emission from sludge incineration. Uncertainty calculated from wastewater composition and treatment model
- Nickel [air, urban air close to ground]: 3.1253e-12 kg; lognormal variance with pedigree 0.81, pedigree (1,1,5,1,1)
  direct digester gas emission plus emission from sludge incineration. Uncertainty calculated from wastewater composition and treatment model
- NMVOC, non-methane volatile organic compounds, unspecified origin [air, urban air close to ground]: 2.9962e-8 kg; lognormal variance with pedigree 0.26, pedigree (1,1,5,1,1)
  direct digester gas emission. Uncertainty calculated from wastewater composition and treatment model
- Nickel, ion [water, surface water]: 0.00018197 kg; lognormal variance with pedigree 0.67, pedigree (1,1,5,1,1)
  (same comment as for Copper, ion)
- Zinc, ion [water, surface water]: 6.4927e-5 kg; lognormal variance with pedigree 0.65, pedigree (1,1,5,1,1)
  (same comment as for Copper, ion)
- Nickel, ion [water, ground-, long-term]: 6.7798e-5 kg; lognormal variance with pedigree 0.71, pedigree (1,1,5,1,1)
  (same comment as for Lead)
- Water [air, unspecified]: 0.1 m3; name water_to_air_unspecified; lognormal variance with pedigree 0.0807, pedigree (2,2,5,1,1)
  Calculated value based on water balance.
  property fraction, origin: salt water 0; name fraction_origin_salt_water
  property fraction, origin: unspecified 1; name fraction_origin_unspecified
  property fraction, origin: fresh water 0; name fraction_origin_fresh_water
- Zinc, ion [water, ground-, long-term]: 1.3795e-6 kg; lognormal variance with pedigree 5.51, pedigree (1,1,5,1,1)
  (same comment as for Lead)
- Cadmium, ion [water, surface water]: 2.5382e-6 kg; lognormal variance with pedigree 0.66, pedigree (1,1,5,1,1)
  (same comment as for Copper, ion)
- Lead [air, urban air close to ground]: 1.0147e-9 kg; lognormal variance with pedigree 0.75, pedigree (1,1,5,1,1)
  (same comment as for Nickel)
- Cadmium, ion [water, ground-, long-term]: 1.5153e-8 kg; lognormal variance with pedigree 6.9, pedigree (1,1,5,1,1)
  (same comment as for Lead)
- BOD5, Biological Oxygen Demand [water, surface water]: 9.4817e-5 kg; lognormal variance with pedigree 0.08, pedigree (1,1,5,1,1)
  (same comment as for Copper, ion)
- Silver [air, urban air close to ground]: 2.9502e-11 kg; lognormal variance with pedigree 0.76, pedigree (1,1,5,1,1)
  (same comment as for Nickel)
- Chromium VI [water, ground-, long-term]: 1.119e-5 kg; lognormal variance with pedigree 1.09, pedigree (1,1,5,1,1)
  (same comment as for Lead)
- Chromium [soil, agricultural]: 6.6665e-5 kg; lognormal variance with pedigree 0.71, pedigree (1,1,5,1,1)
  (same comment as for Lead)
- TOC, Total Organic Carbon [water, ground-, long-term]: 1.36e-6 kg; lognormal variance with pedigree 0.12, pedigree (1,1,5,1,1)
  (same comment as for Lead)
- Chromium [air, urban air close to ground]: 7.8163e-12 kg; lognormal variance with pedigree 0.8, pedigree (1,1,5,1,1)
  (same comment as for Nickel)
- Carbon [soil, agricultural]: 8.7831e-5 kg; lognormal variance with pedigree 0.11, pedigree (1,1,5,1,1)
  (same comment as for Lead)
- DOC, Dissolved Organic Carbon [water, ground-, long-term]: 1.36e-6 kg; lognormal variance with pedigree 0.12, pedigree (1,1,5,1,1)
  (same comment as for Lead)
- Silver, ion [water, surface water]: 1.2971e-6 kg; lognormal variance with pedigree 0.65, pedigree (1,1,5,1,1)
  (same comment as for Copper, ion)
- Chromium VI [water, surface water]: 0.00018107 kg; lognormal variance with pedigree 0.65, pedigree (1,1,5,1,1)
  (same comment as for Copper, ion)
- Copper [soil, agricultural]: 0.00014035 kg; lognormal variance with pedigree 0.71, pedigree (1,1,5,1,1)
  (same comment as for Lead)
- Lead [water, surface water]: 5.4958e-6 kg; lognormal variance with pedigree 0.61, pedigree (1,1,5,1,1)
  (same comment as for Copper, ion)
- BOD5, Biological Oxygen Demand [water, ground-, long-term]: 1.1242e-6 kg; lognormal variance with pedigree 0.12, pedigree (1,1,5,1,1)
  (same comment as for Lead)
- Chromium, ion [water, surface water]: 3.3691e-7 kg; lognormal variance with pedigree 0.72, pedigree (1,1,5,1,1)
  (same comment as for Lead)
- Zinc [air, urban air close to ground]: 1.4536e-9 kg; lognormal variance with pedigree 0.76, pedigree (1,1,5,1,1)
  (same comment as for Nickel)
- COD, Chemical Oxygen Demand [water, surface water]: 0.00038756 kg; lognormal variance with pedigree 0.08, pedigree (1,1,5,1,1)
  (same comment as for Copper, ion)
- Carbon dioxide, fossil [air, urban air close to ground]: 0.0024702 kg; lognormal variance with pedigree 0.06, pedigree (1,1,5,1,1)
  (same comment as for Lead)
- Silver [soil, agricultural]: 1.4322e-6 kg; lognormal variance with pedigree 0.71, pedigree (1,1,5,1,1)
  (same comment as for Lead)
- Copper [air, urban air close to ground]: 1.6429e-9 kg; lognormal variance with pedigree 0.76, pedigree (1,1,5,1,1)
  (same comment as for Nickel)
- Cadmium [air, urban air close to ground]: 8.4265e-11 kg; lognormal variance with pedigree 0.74, pedigree (1,1,5,1,1)
  (same comment as for Nickel)
- TOC, Total Organic Carbon [water, surface water]: 0.00010384 kg; lognormal variance with pedigree 0.07, pedigree (1,1,5,1,1)
  (same comment as for Copper, ion)
- Cadmium [soil, agricultural]: 9.5235e-7 kg; lognormal variance with pedigree 0.71, pedigree (1,1,5,1,1)
  (same comment as for Lead)
- Copper, ion [water, ground-, long-term]: 0.0001799 kg; lognormal variance with pedigree 0.73, pedigree (1,1,5,1,1)
  (same comment as for Lead)
- Water [water, unspecified]: 0.9 m3; name water_to_water_unspecified; lognormal variance with pedigree 0.0807, pedigree (2,2,5,1,1)
  Calculated value based on water balance.
  property fraction, origin: salt water 0; name fraction_origin_salt_water_Ww
  property dry mass 0 kg; name DM
  property fraction, origin: unspecified 0; name fraction_origin_unspecified_Ww
  property water in wet mass 1000 kg; name WWM
  property fraction, origin: fresh water 1; name fraction_origin_fresh_water_Ww
  property carbon content, fossil 0; name C_content_fossil
  property wet mass 1000 kg; name WM
  property carbon content, non-fossil 0; name C_content_non_fossil
- Carbon monoxide, fossil [air, urban air close to ground]: 2.4249e-6 kg; lognormal variance with pedigree 0.17, pedigree (1,1,5,1,1)
  (same comment as for Lead)
- DOC, Dissolved Organic Carbon [water, surface water]: 9.6992e-5 kg; lognormal variance with pedigree 0.08, pedigree (1,1,5,1,1)
  (same comment as for Copper, ion)

## Extrapolations
This dataset has been extrapolated from year 2000 to the year of the calculation (2019). The uncertainty has been adjusted accordingly.

## Review by Niels Jungbluth 2009-01-22
passed.
