# electricity, high voltage, production mix

Dataset: EcoSpold 2, unit process, production mix
Geography: CA-QC
Time period: 2014-01-01 to 2019-12-31
Scenario: Business-as-Usual
System model: Allocation at the point of substitution
Generated by: [System]
Database: ecoinvent
isCopyrightProtected: false
accessRestrictedTo: 1

## General comment
The shares of electricity technologies on this market are valid for the year 2016. They have been calculated by the data provider and don't necessarily correspond with the production volumes entered in the undefined datasets of the different electricity producers. The shares have been calculated based on statistics from 2016: IEA World Energy Statistics and Balances. OECD iLibrary, eISSN: 1683-4240, DOI: 10.1787/enestats-data-en and Government of Canada - Statistics Canada: StatCAN, https://www.statcan.gc.ca/eng/start. Electricity import statistics have been calculated for 2016 by Pablo Tirado (CIRAIG). Further information can be found in a report available on ecoQuery, section 'Files'.

## Technology
Average technology used to transmit and distribute electricity. Includes underground and overhead lines. Electricity production according to related technology datasets.
Definition of the voltage levels (according to Hydro-Quebec):
- High voltage level above 35 kV (large scale industry)
- Medium voltage level nominal voltage between phases is 750 V- 34.5 kV (medium to small scale industry, service sector
- Low voltage level below 750 V (Households)
- Low voltage level below 1 kV (Households)

## Reference product
- electricity, high voltage: 1 kWh; CPC 17100: Electrical energy; By-product classification allocatable product
  production volume 1.52022e11 kWh
  properties: price 0.0977 EUR2005

## Inputs from technosphere
- electricity, high voltage: 0 kWh; pedigree (1,1,1,1,1)
  Calculated value
- electricity, high voltage: 0, 0, 0, 0, 0, 0, 0, 0, 0, 0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 kWh (24 entries)
- electricity, high voltage: 0.0249323 kWh
  production volume 3.60383e9 kWh
- electricity, high voltage: 0, 0, 0, 0, 0 kWh (5 entries)
  properties: price 0.0977 EUR2005, exergy 3.6 MJ
  note on exergy: allocation factor for electricity (=1) vs. heat, where heat is calculated as the termodynamic mean temperature Tm = (Tfeed-Treturn)/ln(Tfeed/Treturn), relative to the application temperature (Tu, typically = 293 K), i.e. (Tm-Tu)/Tm
- electricity, high voltage: 5.87206e-6 kWh
  production volume 848775 kWh
- electricity, high voltage: 0.601862 kWh
  production volume 8.69959e10 kWh
- electricity, high voltage: 0.353475 kWh
  production volume 5.10929e10 kWh
- electricity, high voltage: 0.00228071 kWh
  production volume 3.29664e8 kWh
- electricity, high voltage: 0.0113329 kWh
  production volume 1.6381e9 kWh
- electricity, high voltage: 0.00151105 kWh
  production volume 2.18414e8 kWh
- electricity, high voltage: 0.000351015 kWh
  production volume 5.07373e7 kWh
- electricity, high voltage: 0.00424965 kWh
  production volume 6.14264e8 kWh

## Extrapolations
This dataset has been extrapolated from year 2017 to the year of the calculation (2019). The uncertainty has been adjusted accordingly.
