# treatment of road wear emissions, lorry

Dataset: EcoSpold 2, unit process
Geography: RER
Time period: 2009-01-01 to 2019-12-31
Technology level: current
Classification: ISIC rev.4 ecoinvent: 3821:Treatment and disposal of non-hazardous waste
Scenario: Business-as-Usual
System model: Allocation at the point of substitution
Generated by: Andrew Simons
Published in: Ntziachristos L., Paul P. 2009
Database: ecoinvent
isCopyrightProtected: true
accessRestrictedTo: 1

## General comment
This dataset represents the treatment of non-exhaust emissions produced by road abrasion from road freight transport. The datasets are treatments because they represent a removal of substances from the technosphere (removal of tyre material).

This dataset and the emission factors within it relate to 1kg road wear. It is valid for Europe and represents the average data for road freight transport.

Calculation of non-exhaust emissions (tyre, brake and road wear emissions) are based on EMEP/EEA (2013) and values for net vehicle weights and average load factors. Net vehicle weights are taken from the EcoTransIT (2011) report whilst the average load factors are taken from the Tremove model v2.7b (2009) and EcoTransIT (2011) report.

The road wear emissions are to air only. All particulates are accounted for as emissions to air and have particle sizes below 100um. Anything above this does not remain airborne over longer periods.

In order to use the treatment of non-exhaust emissions in a transport dataset the quantity of emissions per tkm must be calculated. This must then be devided by the specific load factor of the transport in question.Non-exhaust emissions are considered to be linearly scalable to gross vehicle weight (GVW). For road wear emissions from lorries the specific quantity is 7E-9 kg/kg GVW*km.

Main data sources:

De Ceuster, G., et al. (2009) TREMOVE: Final Report. Model code v2.7b, 2009. European Commission, Brussels, BE.

Knörr, W. et al. (2011) Ecological Transport Information Tool for Worldwide Transports (EcoTransIT): Methodology and data update. Berlin, Hannover, Heidelberg, DE.

Ntziachristos, L., Boulter, P. (2013) EMEP/EEA air pollutant emissions inventory guidebook 2009: Road vehicle tyre and brake wear; Road surface wear. European Environment Agency, Copenhagen, DK.

## Included activities start
The activity starts with the road abrasion

## Included activities end
The activity ends with emissions of road abrasion

## Reference product
- road wear emissions, lorry: -1 kg; source Ntziachristos, L. 2013; By-product classification Waste; CPC 53211: Highways (except elevated highways), streets and roads
  Road freight specific non-exhaust emissions.
  This dataset and the emission factors within it relate to 1kg road wear. In order to use the treatment of non-exhaust emissions in a transport dataset the quantity of emissions per km must be calculated. This must then be devided by the specific load factor of the transport in question. Non-exhaust emissions are considered to be linearly scalable to gross vehicle weight (GVW). For road wear emissions from lorries the specific quantity is 7.0E-9 kg/kg GVW*km.
  production volume 4.158e7 kg; = 5.94E+12*7E-09*1000
    Estimation. Calculated from production volume of reference product using the relative outputs.
    Annual production volume of non-exhaust road wear emissions = total Gtkm/yr * t emission/t gross vehicle weight and km = 5.94E+12 Gtkm/yr * 8.27E-09 t/Gtkm * 1000
    Gtkm expresses the transport of freight and vehicle over one kilometer. Source for total tkm/yr in Europe (EU 19 + CH & NO): TREMOVE (2009) v2.7b. Amount of emissions per tkm taken from Ntziachristos, L., Boulter, P. (2009b). EMEP/EEA air pollutant emissions inventory guidebook 2009: Road vehicle tyre and brake wear; Road surface wear. Copenhagen, European Environment Agency.
    Net vehicle weights taken from ecoinvent v2 with minor alteration.
  property carbon content, fossil 0.75
    fossil carbon content on a dry matter basis. Assumption on carbon content of bitumen road surface.
  property price 0 EUR2005
    Waste products are assigned a price of zero as they are assumed to require further treatment.
  property carbon content 0.75
    carbon content on a dry matter basis (reserved; not for manual entry)
  properties: carbon content, non-fossil 0, dry mass 0 kg, wet mass 0 kg, carbon allocation 0 kg

## Emissions to nature
- Particulates, > 2.5 um, and < 10um [air, unspecified]: 0.23 kg; source Ntziachristos, L. 2013; lognormal variance with pedigree 0.0413, pedigree (2,2,5,1,1)
  Calculated value. Derived from EMEP/EEA (2013) and based on an average gross vehicle weight (GVW) of all truck categories and load factors.
- Particulates, < 2.5 um [air, unspecified]: 0.27 kg; source Ntziachristos, L. 2013; lognormal variance with pedigree 0.0413, pedigree (2,2,5,1,1)
  (same comment as for Particulates, > 2.5 um, and < 10um)
- Particulates, > 10 um [air, unspecified]: 0.5 kg; source Ntziachristos, L. 2013; lognormal variance with pedigree 0.0413, pedigree (2,2,5,1,1)
  (same comment as for Particulates, > 2.5 um, and < 10um)

## Sampling procedure
Literature

## Extrapolations
This dataset has been extrapolated from year 2013 to the year of the calculation (2019). The uncertainty has been adjusted accordingly.
