# dust collector production, electrostatic precipitator, for domestic use

Dataset: EcoSpold 2, unit process
Geography: RoW
Time period: 2010-01-01 to 2019-12-31
Technology level: current
Classification: EcoSpold01Categories: wood energy/heating systems
Classification: ISIC rev.4 ecoinvent: 2819:Manufacture of other general-purpose machinery
Synonyms: particulate filter; exhaust aftertreatment control system; dust precipitator; dust collector
Tags: biomass power
Scenario: Business-as-Usual
System model: Allocation at the point of substitution
Generated by: Christian Bauer
Database: ecoinvent
isCopyrightProtected: true
accessRestrictedTo: 1

## General comment
This dataset represent the production and the disposal of an electrostatic precipitator for domestic use, dimensioned to be connected to a stove or furnaces for residential wood combustion (with thermal capacity less than 35kW). Its air flow capacity is 1.4 liters per second.

## Included activities start
From reception of furnace components at the factory gate

## Included activities end
This activity ends with the disposal of the device in the end of its lifetime.The dataset includes includes the most important materials used for the fabrication of a particle separator (electrostatic precipitator, ESP) to be applied in residential wood combustiondevices: stainless steel, nylon, copper, electronic control. The dataset includes electricity for the construction and the disposal of the device.

## Technology
Particle separator for kindling fires. Model of reference developed by Ruegg Cheminee (Switzerland) in co-operation with EMPA (Swiss material testing institute). Model: Zumikron

## Reference product
- dust collector, electrostatic precipitator, for domestic use: 1 unit; By-product classification allocatable product; CPC 4393: General-purpose machinery n.e.c.
  production volume 355951 unit
    extrapolated from estimation from local dataset (Switzerland) - high uncertainty
  property lifetime 20 year; name lifetime
  property capacity [l/hour] 5000 l/hour; name capacity_l_per_hour
    capacity in litres per hour - converted literature value from the modeled device (5 m3/hour)
  property price 37.1812 EUR2005
    Calculated based on inputs: The price of the product has been calculated as a sum of the values of the material and energy inputs for this product. This value is therefore a rough estimation. It may underestimate the real price since there are additional expenses when producing any product. These expences can include for example labour costs, treatment of waste materials and profit for the producer. Please consider carefully whether this level of data quality is acceptable for your application.
  property lifetime capacity [l] 8.76e8 l; name lifetime_capacity_l; = (20*365*24*60*60)* (capacity_l_per_hour/3600)
    lifetime capacity in litres - (lifetime in s*capacity in l/s)
  property carbon content 1.99072
    carbon content on a dry matter basis (reserved; not for manual entry)
  property true value 37.1812
    allocation property applied in "true value" allocation // value calculated from revenue
  properties: water in wet mass 0 kg, carbon content, non-fossil 6.721e-5, carbon content, fossil 1.99066, dry mass 0 kg, wet mass 0 kg, carbon allocation 0 kg

## By-products
- electricity, for reuse in municipal waste incineration only: 0 kWh; CPC 17100: Electrical energy; By-product classification allocatable product; pedigree (1,1,1,1,1)
  Net electricity generated from this waste and used in internal MSWI plant energy redistribution.
  Uncertainty: uncertainty is calculated from uncertainties in waste composition and uncertainties in energy efficiency and the uncertainty in internal energy demand
  production volume 75057.9 kWh
  property true value relation 3.6; name E_el_prod_MSWI_true_value_relation
    property to calculate "true value" from
  property exergy 3.6 MJ; name E_el_prod_MSWI_exergy
    This exergy property is based on the exergy content of the product.
  property price 0.1 EUR2005; name E_el_prod_MSWI_price_EUR2005
    Estimated to be the same price as in case of electricity, medium voltage.
  property true value 0.0270522
    allocation property applied in "true value" allocation // value calculated from true value relation
- heat, for reuse in municipal waste incineration only: 0 MJ; CPC 17300: Steam and hot water; By-product classification allocatable product; pedigree (1,1,1,1,1)
  Net useful heat generated from this waste and used in internal MSWI plant energy redistribution.
  Uncertainty: uncertainty is calculated from uncertainties in waste composition and uncertainties in energy efficiency and the uncertainty in internal energy demand
  production volume 526257 MJ
  property true value relation 0.1842; name E_th_prod_MSWI_true_value_relation
    property to calculate "true value" from
  property exergy 0.1842 MJ; name E_th_prod_MSWI_exergy
    This exergy property is based on the exergy content of the product.
  property price 0.0106 EUR2005; name E_th_prod_MSWI_price_EUR2005
    Average European district heat price from Ecoheatcool and Euroheat 2005-2006, Ecoheat Work package 1: The European heat market. Final report. 10.6 EUR/GJ i s the price of district heat. http://www.solarthermalworld.org/files/Ecoheatcool%20WP1%20Web.pdf?download
  property true value 0.0097049
    (same comment as for electricity, for reuse in municipal waste incineration only)
- zinc concentrate: 0 kg; CPC 14290: Other non-ferrous metal ores and concentrates (other than uranium or thorium ores and concentrates); By-product classification allocatable product
  Calculated value from the knowledge of the properties of both products.
  production volume 4.1428 kg
  property price 0.38 EUR2005; name ByP_price_EUR2005
    Temporary price data. Calculated as 90% of purchasers price based on: Zinc content in concentrate 53%. Concentrate price per kg Zn 86.5% of refined Zn price (13.5% treatment charges according to CHR Metals Limited 2005: Dynamic cost curves. http://www.minecost.com/dynamic.pdf). 2004 zinc price from USGS (2007) Mineral commodity summaries 2007. <http://minerals.usgs.gov/minerals/pubs/mcs/2007/mcs2007.pdf> [Accessed 25 May 2010]
  property zinc content 0.53; name zinc_C_zinc_concentrate
    Zinc content on a dry matter basis. Value taken from teh "zinc mine operation" /GLO dataset.
  property dry mass 1 kg; name DM_zinc_concentrate
  property carbon content 0
    carbon content on a dry matter basis (reserved; not for manual entry)
  property true value 4.42254e-6
    allocation property applied in "true value" allocation // value calculated from revenue
  properties: wet mass 1 kg, water content 0, carbon content, non-fossil 0, carbon content, fossil 0, water in wet mass 0 kg, carbon allocation 0 kg
- copper: 0 kg; By-product classification allocatable product; CPC 41413: Refined copper and copper alloys, unwrought; master alloys of copper
  production volume 385928 kg
  properties: water in wet mass 0 kg, water content 0, carbon content, non-fossil 0, dry mass 1 kg, carbon content, fossil 0, price 5.52 EUR2005, wet mass 1 kg, carbon content 0, carbon allocation 0 kg, true value 3.1111
- lead: 0 kg; CPC 41441: Lead, unwrought; By-product classification allocatable product
  EcoSpold01Location=SE
  production volume 398.725 kg
  property price 0.744 EUR2005
    Temporary price data. Calculated as 90% of purchasers price based on: Source: ecoinvent v2 report 10-part IX, Tab 5.10 & 2.5
  property carbon content 0
    carbon content on a dry matter basis (reserved; not for manual entry)
  property true value 0.000833406
    allocation property applied in "true value" allocation // value calculated from revenue
  properties: wet mass 1 kg, water content 0, carbon content, non-fossil 0, carbon content, fossil 0, dry mass 1 kg, water in wet mass 0 kg, carbon allocation 0 kg
- nickel, 99.5%: 0 kg; CPC 41422: Unwrought nickel; By-product classification allocatable product
  EcoSpold01Location=SE
  production volume 832.329 kg
  property price 10.4 EUR2005
    Temporary price data. Calculated as 90% of purchasers price based on: 2004 nickel price from USGS (2007) Mineral commodity summaries 2007. <http://minerals.usgs.gov/minerals/pubs/mcs/2007/mcs2007.pdf> [Accessed 25 May 2010]
  property carbon content 0
    carbon content on a dry matter basis (reserved; not for manual entry)
  property true value 0.0243186
    allocation property applied in "true value" allocation // value calculated from revenue
  properties: water in wet mass 0 kg, wet mass 1 kg, carbon content, non-fossil 0, dry mass 1 kg, water content 0, carbon content, fossil 0, carbon allocation 0 kg
- silver: 0 kg; CPC 41310: Silver (including silver plated with gold or platinum), unwrought or in semi-manufactured forms, or in powder […]; By-product classification allocatable product; CAS 7440-22-4
  EcoSpold01Location=SE
  production volume 137.451 kg
  property price 178 EUR2005
    (same comment as for lead)
  property carbon content 0
    carbon content on a dry matter basis (reserved; not for manual entry)
  property true value 0.0687348
    allocation property applied in "true value" allocation // value calculated from revenue
  properties: wet mass 1 kg, carbon content, non-fossil 0, dry mass 1 kg, water content 0, carbon content, fossil 0, water in wet mass 0 kg, carbon allocation 0 kg
- palladium: 0 kg; CPC 4160: Other non-ferrous metals and articles thereof (including waste and scrap of some metals); cermets and articles […]; By-product classification allocatable product
  EcoSpold01Location=SE
  production volume 7.6088 kg
  property price 5640 EUR2005
    Temporary price data. Calculated as 90% of purchasers price based on: 2004 price from USGS (2007) Mineral commodity summaries 2007. <http://minerals.usgs.gov/minerals/pubs/mcs/2007/mcs2007.pdf> [Accessed 25 May 2010]
  property carbon content 0
    carbon content on a dry matter basis (reserved; not for manual entry)
  property true value 0.12056
    allocation property applied in "true value" allocation // value calculated from revenue
  properties: wet mass 1 kg, carbon content, fossil 0, water in wet mass 0 kg, water content 0, carbon content, non-fossil 0, dry mass 1 kg, carbon allocation 0 kg
- gold: 0 kg; CPC 41320: Gold (including gold plated with platinum), unwrought or in semi-manufactured forms, or in powder form; By-product classification allocatable product; CAS 7440-57-5
  EcoSpold01Location=SE
  production volume 4.17263 kg
  property price 10600 EUR2005
    Temporary price data. Calculated as 90% of purchasers price based on: Source: ecoinvent v2 report 10-part IX, Tab 2.5
  property carbon content 0
    carbon content on a dry matter basis (reserved; not for manual entry)
  property true value 0.124258
    allocation property applied in "true value" allocation // value calculated from revenue
  properties: wet mass 1 kg, carbon content, fossil 0, dry mass 1 kg, carbon content, non-fossil 0, water content 0, water in wet mass 0 kg, carbon allocation 0 kg
- iron scrap, sorted, pressed: 0 kg; By-product classification Recyclable; CPC 39310: Slag, dross, scalings and other waste from the manufacture of iron or steel; pedigree (1,1,1,1,1)
  Iron scrap recovered from this waste.
  production volume 5315.22 kg
  property price 0.175 EUR2005
    Temporary price data. Calculated as 90% of purchasers price based on: 2005 import and export prices (total trades (USD) divided by total weight (kg) in biggest economies of the world: EU27, USA, Brasil, China, India, Japan and Russia) from UN Commodity Trade Statistics Database (http://data.un.org/Explorer.aspxDatabase [Accessed 2011.06.20]). Commodity: Waste or scrap, of cast iron
  property carbon content 0
    carbon content on a dry matter basis (reserved; not for manual entry)
  property true value 0.000667418
    allocation property applied in "true value" allocation // value calculated from revenue
  properties: water content 0, water in wet mass 0 kg, carbon content, fossil 0, dry mass 1 kg, carbon content, non-fossil 0, wet mass 1 kg, carbon allocation 0 kg

## Inputs from technosphere
- nylon 6: 0.018285 kg; source Ruegg Cheminèe company 2011; lognormal variance with pedigree 0.0358, pedigree (2,5,4,5,1)
  estimation (high voltage insulation)
  EcoSpold01Location=RER
  properties: carbon content, fossil 0.637168, dry mass 1 kg, wet mass 1 kg
  note on carbon content, fossil: It is a chain of caprolactam molecules, originating from aminocarboxylic acids - here caproic acid or caprolactam. The structure of nylon 6 is -(NH-(CH2)5-CO)n-, C6H11NO (ecoinvent v2.2 report 11_II). MW=113 g/mol
- electricity, low voltage: 0 kWh; source Ruegg Cheminèe company 2011; pedigree (1,1,1,1,1)
  EcoSpold01Location=CH
  estimation
- sheet rolling, chromium steel: 4.57126 kg; source Ruegg Cheminèe company 2011; lognormal variance with pedigree 0.0432, pedigree (4,5,4,5,1)
  EcoSpold01Location=RER
  estimation (manufacturing of the body of precipitator, for inline models)
- steel, chromium steel 18/8: 4.57126 kg; source Ruegg Cheminèe company 2011; lognormal variance with pedigree 0.0432, pedigree (4,5,4,5,1)
  literature value (body of precipitator, for inline models)
  properties: carbon content, fossil 0.0008, dry mass 1 kg, wet mass 1 kg
  note on carbon content, fossil: Stainless steel model is the grade 304 steel (18/8 stainless, 18% chromium 8% nickel; max. 0.08% C)
- electronics scrap from control units: -0.457126 kg; lognormal variance with pedigree 0.0186, pedigree (1,5,4,5,1)
  electronic parts
  EcoSpold01Location=RER
  production volume 177976 kg; = Ref('62420d92-a811-4fe6-a09d-be587eee9ca8', 'ProductionVolume')* (Ref('53965b26-6302-4f7b-99ad-0daa332a911c')*-1)
    Calculated from production volume of reference product using the relative outputs.
  properties: carbon content, fossil 0.337146, carbon content, non-fossil 0.00013442, dry mass 1 kg, wet mass 1 kg, lifetime 20 year
- scrap steel: 0 kg; pedigree (1,1,1,1,1)
  steel and chromium steel
  EcoSpold01Location=CH
  production volume 0 kg
    Calculated from production volume of reference product using the relative outputs.
  properties: wet mass 1 kg, lifetime 20 year, dry mass 1 kg
- copper: 0.18285 kg; source Ruegg Cheminèe company 2011; lognormal variance with pedigree 0.0358, pedigree (2,5,4,5,1)
  estimation (windings for the blower)
  properties: wet mass 1 kg, dry mass 1 kg
- cable, three-conductor cable: 3.65701 m; source Ruegg Cheminèe company 2011; lognormal variance with pedigree 0.0358, pedigree (2,5,4,5,1)
  EcoSpold01Location=GLO
  estimation
  properties: carbon content, fossil 0.451335, wet mass 1.04 kg, dry mass 1.04 kg
  note on carbon content, fossil: Calculated as the addition of C contents in the product composition. Then referred to 1 kg DM
- electronics, for control units: 0.457126 kg; source Ruegg Cheminèe company 2011; lognormal variance with pedigree 0.0358, pedigree (2,5,4,5,1)
  EcoSpold01Location=RER
  estimation (blower and control unit electronics)
  properties: carbon content, fossil 0.337146, dry mass 1 kg, wet mass 1 kg, carbon content, non-fossil 0.00013442
  note on carbon content, fossil: The control unit has a composition of 46% steel (housing), 32% plastics, 14% printed wiring boards and 8% cables (various types).;
- wire drawing, copper: 0.18285 kg; source Ruegg Cheminèe company 2011; lognormal variance with pedigree 0.0432, pedigree (4,5,4,5,1)
  estimation (windings for the blower)
  EcoSpold01Location=RER
- metal working, average for chromium steel product manufacturing: 0.0457126 kg; source Ruegg Cheminèe company 2011; lognormal variance with pedigree 0.0432, pedigree (4,5,4,5,1)
  EcoSpold01Location=RER
  estimation (stainless steel electrode)
- scrap copper: 0 kg; pedigree (1,1,1,1,1)
  EcoSpold01Location=CH
  disposal of the cable (4 meter cable = about 2 kg copper) and of the copper for the wire (0.2 kg)
  production volume 0 kg
    Calculated from production volume of reference product using the relative outputs.
  properties: wet mass 1 kg, dry mass 1 kg, lifetime 20 year
- electricity, low voltage: 0.0488478, 0.00856728, 0.194306, 0.696637, 0.14088, 2.13052, 0.351178, 1.00032 kWh (8 entries); source Ruegg Cheminèe company 2011; lognormal variance with pedigree 0.164, pedigree (3,5,5,5,3)
  EcoSpold01Location=CH
  estimation
- scrap steel: -1.11342, -3.45784 kg (2 entries); lognormal variance with pedigree 0.0186, pedigree (1,5,4,5,1)
  steel and chromium steel
  EcoSpold01Location=CH
  production volume 1.77976e6 kg
- scrap copper: -0.647656, -1.3637 kg (2 entries); lognormal variance with pedigree 0.0186, pedigree (1,5,4,5,1)
  (same comment as for scrap copper)
  production volume 783092 kg

## Sampling procedure
literature, personal communications from technicians and producers, technical data available

## Extrapolations
Extrapolated from Swiss data

## Review by Bo Weidema 2012-02-01
This dataset has only been reviewed by two editors. Since this is an infrastructure dataset, this deviation from normal procedures is acceptable.

## Review by Bo Weidema 2012-02-01
Passed. Documentation adequate, inputs relevant, mass balance correct, and correct handling of capacity utilisation.
