# heat production, straw, at furnace 300kW

Dataset: EcoSpold 2, unit process
Geography: RoW
Time period: 1983-01-01 to 2019-12-31
Technology level: current
Classification: EcoSpold01Categories: wood energy/heating systems
Classification: ISIC rev.4 ecoinvent: 3530:Steam and air conditioning supply
Scenario: Business-as-Usual
System model: Allocation at the point of substitution
Generated by: Tereza Levova
Database: ecoinvent
isCopyrightProtected: true
accessRestrictedTo: 1

## General comment
Production of heat by burning straw, in a furnace of 300kw capacity for heat production. The infrastructure, and the electricity inputs were obtained from the dataset wood chips, hard wood, burned in furnace 300kw. The emissions were obtained from literature.

## Included activities start
From reception of straw at the furnace

## Included activities end
This module describes the combustion of straw. Included are the infrastructure, the straw requirements , the emissions to air, the electricity needed for operation, and the disposal of the ashes.

## Geography
based on geography of production of straw from barley, rye and wheat.

## Technology
based on technology from wood chips burning dataset and several studies with experimental burning in different furnaces.

## Time period
from oldest to newest publication date of litarature sources

## Reference product
- heat, district or industrial, other than natural gas: 1 MJ; name heat_output; = ABS(straw_input)* 0.85* 15* 0.82; CPC 17300: Steam and hot water; By-product classification allocatable product
  Calculation based on furnace calorific efficiency (82%) )and low calorific value of straw (15MJ/kg dry mass)
  production volume 5.75572e9 MJ; name heat_RP_PV; = (heat_output/ straw_input)*((2.9825E+08+1.2647E+08+2.3142E+09)*0.3)
    The Production Volume is the sum of the amounts of straw, organic produced in the crop inventories in the Ecoinvent database (rye production, wheat production, barley production). It is estimated, that 30% of this straw is burned to produce heat.
  property price 0.0106 EUR2005; name heat_output_price_EUR2005
    Average European district heat price from Ecoheatcool and Euroheat 2005-2006, Ecoheat Work package 1: The European heat market. Final report. 10.6 EUR/GJ i s the price of district heat. http://www.solarthermalworld.org/files/Ecoheatcool%20WP1%20Web.pdf?download
  property corresponding fuel use, propane, furnace >100kW 1.05263 MJ; = 1/0.95
    Lower heating value of the fuel input related to the heat/electricity output, taken directly from ecoinvent v3.0 dataset "heat production, natural gas, at industrial furnace >100kW, GLO 2000".
  property true value 0.110823; name heat_output_true_value
    allocation property applied in "true value" allocation // value calculated from revenue

## By-products
- nitrogen fertiliser, as N: 0 kg; = ABS(straw_input)*54/1E3*((0.05+0.08)/2/100); source H. Nielsen 2004; CPC 3461: Mineral or chemical fertilizers, nitrogenous; By-product classification allocatable product
  54 kg of slag are produced per 1 ton of straw burned. The slag is returned to farmland (Nielsen, 2004).This flow is expressed as phosphate fertiliser, as P2O5 and nitrogen fertiliser, as N.
  The slag produced during straw combustion contains 0,8-2.1% P2O5 and 0,05-0,08% N . (http://www.lcafood.dk/processes/energyconversion/heatandpowerfromstraw.htm)
  The average values are used for this inventory.
  production volume 19323.4 kg; = Ref('3ef36982-00ca-4df2-a617-be863da8c1fe')/ heat_output* heat_RP_PV
    Calculated from production volume of reference product using the relative outputs.
  property price 0.473 EUR2005
    Temporary price data. Calculated as 90% of purchasers price based on: 2004 prices are calculated on basis of Import/Export data (tonnes and US$) from UN Trade Statistics Database (http://data.un.org/Browse.aspx?d=ComTrade, accessed 7/7-2010). N, P2O5, or K2O content (http://www.fertilizer.org/ifa/Home-Page/STATISTICS/Conversions-factors)
  property carbon content 0
    carbon content on a dry matter basis (reserved; not for manual entry)
  property true value 1.66023e-5
    allocation property applied in "true value" allocation // value calculated from revenue
  properties: water in wet mass 0 kg, water content 0, carbon content, fossil 0, dry mass 1 kg, wet mass 1 kg, carbon content, non-fossil 0, carbon allocation 0 kg
- phosphate fertiliser, as P2O5: 0 kg; name basic_slag_output; = ABS(straw_input)*54/1E3*((0.8+2.1)/2/100); source H. Nielsen 2004; CPC 3462: Mineral or chemical fertilizers, phosphatic; By-product classification allocatable product; pedigree (1,1,1,1,1)
  (same comment as for nitrogen fertiliser, as N)
  production volume 431059 kg; = basic_slag_output/ heat_output* heat_RP_PV
    Calculated from production volume of reference product using the relative outputs.
  property water content 0; name water_content
  property carbon content, non-fossil 0; name C_content_non_fossil
  property carbon content, fossil 0; name C_content_fossil
  property price 0.241 EUR2005; name basic_slag_output_price_EUR2005
    (same comment as for nitrogen fertiliser, as N)
  property wet mass 1 kg; name WM
  property water in wet mass 0 kg; name WWM
  property dry mass 1 kg; name DM
  property carbon content 0
    carbon content on a dry matter basis (reserved; not for manual entry)
  property true value 0.000188703; name basic_slag_output_true_value
    allocation property applied in "true value" allocation // value calculated from revenue
  properties: carbon allocation 0 kg
- heat, for reuse in municipal waste incineration only: 0 MJ; CPC 17300: Steam and hot water; By-product classification allocatable product; pedigree (1,1,1,1,1)
  Net electricity generated from this waste and used in internal MSWI plant energy redistribution.
  Uncertainty: uncertainty is calculated from uncertainties in waste composition and uncertainties in energy efficiency and the uncertainty in internal energy demand
  production volume 77.0216 MJ
  property exergy 0.1842 MJ; name E_th_prod_MSWI_exergy
    This exergy property is based on the exergy content of the product.
  property price 0.0106 EUR2005; name E_th_prod_MSWI_price_EUR2005
    (same comment as for heat, district or industrial, other than natural gas)
  property true value relation 0.1842; name E_th_prod_MSWI_true_value_relation
    property to calculate "true value" from
  property true value 9.20301e-10
    allocation property applied in "true value" allocation // value calculated from true value relation
- electricity, for reuse in municipal waste incineration only: 0 kWh; CPC 17100: Electrical energy; By-product classification allocatable product; pedigree (1,1,1,1,1)
  (same comment as for heat, for reuse in municipal waste incineration only)
  production volume 10.8467 kWh
  property price 0.1 EUR2005; name E_el_prod_MSWI_price_EUR2005
    Estimated to be the same price as in case of electricity, medium voltage.
  property exergy 3.6 MJ; name E_el_prod_MSWI_exergy
    This exergy property is based on the exergy content of the product.
  property true value relation 3.6; name E_el_prod_MSWI_true_value_relation
    property to calculate "true value" from
  property true value 2.53296e-9
    (same comment as for heat, for reuse in municipal waste incineration only)

## Inputs from technosphere
- wood ash mixture, pure: -0.000792411 kg; name wood_ash_output; = (8.3/1E3* ABS(straw_input))*-1; source H. Nielsen 2004; lognormal variance with pedigree 0.01, pedigree (1,1,4,5,1)
  The data refer to heat and power production at Masnedo heat and power plant (Denmark) in 1999. The plant is dimensioned to 10MW electricity and 23 MJ heat/sec and is primarily fired with straw (about 400000 t/year).
  Data on slag/ash generation have been derived from the plant's green account in 2002 (from 1999, where input from other biomass than straw was relatifvely low - 10% in terms of mass). As an approximation, all biomass entering the plant has been considered as straw. Data on emissions to air have been determined from emission factors (Gasteknisk Center, 2003).
  8.3 kg of ash are produced per 1 ton of straw burned.
  EcoSpold01Location=CH
  production volume 4.56934e6 kg; name ash_production; = wood_ash_output/ heat_output* heat_RP_PV
    Calculated from production volume of reference product using the relative outputs.
  property price 0 EUR2005; name wood_ash_output_price_EUR2005
  properties: carbon content, non-fossil 0.012, wet mass 1 kg, dry mass 1 kg
- furnace, wood chips, hardwood storage area, 300kW: 2.20051e-8 unit; = (1/(0.82*20*2765854))* heat_output; source Bauer, C. 2007; lognormal variance with pedigree 0.02, pedigree (1,1,4,5,1)
  EcoSpold01Location=CH
  due to lack of process specific emission data, it has been adapted from the emission factor (kg/MJ input) given for the combustion of mixed wood chips in a cogen 300KW.
  property thermal efficiency 0.82; name furnace_input_thermal_efficiency
- straw: 0.0954711 kg; name straw_input; lognormal variance with pedigree 0.0106, pedigree (1,1,4,5,1)
  properties: wet mass 1 kg, carbon content, non-fossil 0.437377, water content 0.176471, dry mass 0.85 kg
- electricity, low voltage: 0 kWh; source Bauer, C. 2007; pedigree (1,1,1,1,1)
  EcoSpold01Location=CH
  general assumption, obtained from dataset "wood chips burned in furnace, 300kW". It is assumed that wood-chips furnace needs energy inputs in the order of 1.5% of the fuel energy input.
  The conversion from MJ to Kwh is 3.6kWh/MJ
- electricity, low voltage: 6.73179e-5, 1.18067e-5, 0.00019415, 0.00293611, 0.000483965, 0.00137856 kWh (6 entries); source Bauer, C. 2007; lognormal variance with pedigree 0.02, pedigree (1,1,4,5,1)
  (same comment as for electricity, low voltage)

## Emissions to nature
- Iodine [air, unspecified]: 2.43451e-9 kg; = 0.030/1E6* ABS(straw_input)* 0.85; source Turn, SQ and Jenkins, BM 1997; lognormal variance with pedigree 0.0892, pedigree (1,5,5,4,4)
  Based on experimental study. Average emission factor (mg/kg dry fuel) for several herbacious fuels (rice, wheat, barley straws; corn stover and sugarcane trash).
  The study reports elemental and water soluble species concentrations and emissions factors obtained from PM collected during test burns. The tests were conducted in a combustion wind tunnel at the University of California, Davis.
  The emission factor of iodine is 0.03
- Dinitrogen monoxide [air, unspecified]: 1.90942e-6 kg; = 20/1E6* ABS(straw_input); source H. Nielsen 2004; lognormal variance with pedigree 0.112, pedigree (4,4,5,5,1)
  20 gr of N2O are produced per 1 ton of straw burned (http://www.lcafood.dk/processes/energyconversion/heatandpowerfromstraw.htm)
  Uncertainty: Adapted from the dataset 'wood chips, in cogen 6400kWth, wood', according to actual water, carbon and energy content of the fuel (wood chips u=40%)
- Selenium [air, unspecified]: 2.27221e-9 kg; = 0.028/1E6*ABS(straw_input)* 0.85; source Turn, SQ and Jenkins, BM 1997; lognormal variance with pedigree 0.0892, pedigree (1,5,5,4,4)
  Based on experimental study. Average emission factor (mg/kg dry fuel) for several herbacious fuels (rice, wheat, barley straws; corn stover and sugarcane trash).
  The study reports elemental and water soluble species concentrations and emissions factors obtained from PM collected during test burns. The tests were conducted in a combustion wind tunnel at the University of California, Davis.
  The emission factor of selenium is 0.028
- Benzo(a)pyrene [air, unspecified]: 7.15747e-10 kg; = 5.88E-10* ABS(straw_input)*15*0.85; source Bauer, C. 2007; lognormal variance with pedigree 0.372, pedigree (4,4,5,5,1)
  due to lack of process specific emission data, it has been adapted from the emission factor (kg/MJ input) given for the combustion of mixed wood chips in a cogen 300KW.
  Uncertainty: Adapted from the dataset 'wood chips, in cogen 6400kWth, wood', according to actual water, carbon and energy content of the fuel (wood chips u=40%)
- Benzene, hexachloro- [air, unspecified]: 1.06875e-14 kg; = 8.78E-15* ABS(straw_input)*15*0.85; source Bauer, C. 2007; lognormal variance with pedigree 0.372, pedigree (4,4,5,5,1)
  (same comment as for Benzo(a)pyrene)
- m-Xylene [air, unspecified]: 1.7772e-7 kg; = 1.46E-7* ABS(straw_input)*15*0.85; source Bauer, C. 2007; lognormal variance with pedigree 0.112, pedigree (4,4,5,5,1)
  (same comment as for Benzo(a)pyrene)
- Lead [air, unspecified]: 3.24602e-9 kg; = 0.040/1E6* ABS(straw_input)* 0.85; source Turn, SQ and Jenkins, BM 1997; lognormal variance with pedigree 0.0892, pedigree (1,5,5,4,4)
  Based on experimental study. Average emission factor (mg/kg dry fuel) for several herbacious fuels (rice, wheat, barley straws; corn stover and sugarcane trash).
  The study reports elemental and water soluble species concentrations and emissions factors obtained from PM collected during test burns. The tests were conducted in a combustion wind tunnel at the University of California, Davis.
  The emission factor of lead is 0.04
- Cadmium [air, unspecified]: 2.27221e-8 kg; = 0.28/1E6* ABS(straw_input)* 0.85; source Turn, SQ and Jenkins, BM 1997; lognormal variance with pedigree 0.0892, pedigree (1,5,5,4,4)
  Based on experimental study. Average emission factor (mg/kg dry fuel) for several herbacious fuels (rice, wheat, barley straws; corn stover and sugarcane trash).
  The study reports elemental and water soluble species concentrations and emissions factors obtained from PM collected during test burns. The tests were conducted in a combustion wind tunnel at the University of California, Davis.
  The emission factor of cadmium is 0.28
- Calcium [air, unspecified]: 8.92655e-7 kg; = 11/1E6* ABS(straw_input)* 0.85; source Turn, SQ and Jenkins, BM 1997; lognormal variance with pedigree 0.0892, pedigree (1,5,5,4,4)
  Based on experimental study. Average emission factor (mg/kg dry fuel) for several herbacious fuels (rice, wheat, barley straws; corn stover and sugarcane trash).
  The study reports elemental and water soluble species concentrations and emissions factors obtained from particulate matter collected during test burns. The tests were conducted in a combustion wind tunnel at the University of California, Davis.
  The emission factor of calcium is 11
- Magnesium [air, unspecified]: 5.34376e-7 kg; = 4.39E-7* ABS(straw_input)*15*0.85; source Bauer, C. 2007; lognormal variance with pedigree 0.112, pedigree (4,4,5,5,1)
  (same comment as for Benzo(a)pyrene)
- Benzene [air, unspecified]: 1.30247e-6 kg; = 1.07E-6* ABS(straw_input)*15*0.85; source Bauer, C. 2007; lognormal variance with pedigree 0.112, pedigree (4,4,5,5,1)
  (same comment as for Benzo(a)pyrene)
- Iron [air, unspecified]: 3.32717e-7 kg; = 4.1/1E6* ABS(straw_input)* 0.85; source Turn, SQ and Jenkins, BM 1997; lognormal variance with pedigree 0.0892, pedigree (1,5,5,4,4)
  Based on experimental study. Average emission factor (mg/kg dry fuel) for several herbacious fuels (rice, wheat, barley straws; corn stover and sugarcane trash).
  The study reports elemental and water soluble species concentrations and emissions factors obtained from PM collected during test burns. The tests were conducted in a combustion wind tunnel at the University of California, Davis.
  The emission factor of iron is 4.1
- Tin [air, unspecified]: 8.92655e-9 kg; = 0.11/1E6*ABS(straw_input)* 0.85; source Turn, SQ and Jenkins, BM 1997; lognormal variance with pedigree 0.0892, pedigree (1,5,5,4,4)
  Based on experimental study. Average emission factor (mg/kg dry fuel) for several herbacious fuels (rice, wheat, barley straws; corn stover and sugarcane trash).
  The study reports elemental and water soluble species concentrations and emissions factors obtained from PM collected during test burns. The tests were conducted in a combustion wind tunnel at the University of California, Davis.
  The emission factor of tin is 0.11
- Hydrogen chloride [air, unspecified]: 6.39657e-5 kg; = (670/1E6)* ABS(straw_input); source H. Nielsen 2004; lognormal variance with pedigree 0.0586, pedigree (1,5,5,5,3)
  670 g of HCl are produced per 1 ton of straw burned.(http://www.lcafood.dk/processes/energyconversion/heatandpowerfromstraw.htm)
- Arsenic [air, unspecified]: 1.78531e-9 kg; = 0.022/1E6* ABS(straw_input)* 0.85; source Turn, SQ and Jenkins, BM 1997; lognormal variance with pedigree 0.0892, pedigree (1,5,5,4,4)
  Based on experimental study. Average emission factor (mg/kg dry fuel) for several herbacious fuels (rice, wheat, barley straws; corn stover and sugarcane trash).
  The study reports elemental and water soluble species concentrations and emissions factors obtained from PM collected during test burns. The tests were conducted in a combustion wind tunnel at the University of California, Davis.
  The emission factor of arsenic is 0.022
- Bromine [air, unspecified]: 4.78788e-7 kg; = 5.9/1E6* ABS(straw_input)* 0.85; source Turn, SQ and Jenkins, BM 1997; lognormal variance with pedigree 0.0892, pedigree (1,5,5,4,4)
  Based on experimental study. Average emission factor (mg/kg dry fuel) for several herbacious fuels (rice, wheat, barley straws; corn stover and sugarcane trash).
  The study reports elemental and water soluble species concentrations and emissions factors obtained from PM collected during test burns. The tests were conducted in a combustion wind tunnel at the University of California, Davis.
  The emission factor of bromine is 5.9
- Fluorine [air, unspecified]: 7.42527e-8 kg; = 6.10E-8* ABS(straw_input)*15*0.85; source Bauer, C. 2007; lognormal variance with pedigree 0.112, pedigree (4,4,5,5,1)
  (same comment as for Benzo(a)pyrene)
- Sulfate [air, unspecified]: 1.94761e-5 kg; = 240/1E6* ABS(straw_input)* 0.85; source Turn, SQ and Jenkins, BM 1997; lognormal variance with pedigree 0.0892, pedigree (1,5,5,4,4)
  Based on experimental study. Average emission factor (mg/kg dry fuel) for several herbacious fuels (rice, wheat, barley straws; corn stover and sugarcane trash).
  The study reports elemental and water soluble species concentrations and emissions factors obtained from particulate matter collected during test burns. The tests were conducted in a combustion wind tunnel at the University of California, Davis.
  The emission factor of sulfate is 240.
- Ammonia [air, unspecified]: 2.56841e-6 kg; = 2.11E-06* ABS(straw_input)*15*0.85; source Bauer, C. 2007; lognormal variance with pedigree 0.082, pedigree (4,4,5,5,1)
  (same comment as for Benzo(a)pyrene)
- Copper [air, unspecified]: 4.86903e-9 kg; = 0.060/1E6* ABS(straw_input)* 0.85; source Turn, SQ and Jenkins, BM 1997; lognormal variance with pedigree 0.0892, pedigree (1,5,5,4,4)
  Based on experimental study. Average emission factor (mg/kg dry fuel) for several herbacious fuels (rice, wheat, barley straws; corn stover and sugarcane trash).
  The study reports elemental and water soluble species concentrations and emissions factors obtained from PM collected during test burns. The tests were conducted in a combustion wind tunnel at the University of California, Davis.
  The emission factor of copper is 0.06
- PAH, polycyclic aromatic hydrocarbons [air, unspecified]: 3.5057e-6 kg; = ((64.3+58.6+43.1+26.0+24.0)/5)*1E-6 * ABS(straw_input)*0.85; source Ramdahl, T. et al. 1983; lognormal variance with pedigree 0.0892, pedigree (1,5,5,4,4)
  Based on average of 5 tests on straw burning. In each test, there has been a chemical analysis for PAH due to emissions from straw incineration, expressed as mg/kg dry fuel burned.
  The burning process took place in a commercial stoker-fed trough-burning furnace with a minimum heat output of 75kW. In this study straw from barley was used as a fuel.
- Nitrogen oxides [air, unspecified]: 1.90942e-6 kg; = (20/1E6)* ABS(straw_input); source H. Nielsen 2004; lognormal variance with pedigree 0.0586, pedigree (1,5,5,5,3)
  20 gr N2O are produced per 1 ton of straw burned.(http://www.lcafood.dk/processes/energyconversion/heatandpowerfromstraw.htm)
- Antimony [air, unspecified]: 1.78531e-8 kg; = 0.22/1E6* ABS(straw_input)*0.85; source Turn, SQ and Jenkins, BM 1997; lognormal variance with pedigree 0.0892, pedigree (1,5,5,4,4)
  Based on experimental study. Average emission factor (mg/kg dry fuel) for several herbacious fuels (rice, wheat, barley straws; corn stover and sugarcane trash).
  The study reports elemental and water soluble species concentrations and emissions factors obtained from PM collected during test burns. The tests were conducted in a combustion wind tunnel at the University of California, Davis.
  The emission factor of antimony is 0.22
- Carbon dioxide, non-fossil [air, unspecified]: 6.55887e-5 kg; = (687/1E6)* ABS(straw_input); source Nielsen, H. 2004; lognormal variance with pedigree 0.0892, pedigree (1,5,5,4,4)
  687 g of CO2 are produced per 1 ton of straw burned (http://www.lcafood.dk/processes/energyconversion/heatandpowerfromstraw.htm)
- Phosphorus [air, unspecified]: 1.46071e-7 kg; = 1.8/1E6* ABS(straw_input)* 0.85; source Turn, SQ and Jenkins, BM 1997; lognormal variance with pedigree 0.0892, pedigree (1,5,5,4,4)
  Based on experimental study. Average emission factor (mg/kg dry fuel) for several herbacious fuels (rice, wheat, barley straws; corn stover and sugarcane trash).
  The study reports elemental and water soluble species concentrations and emissions factors obtained from particulate matter collected during test burns. The tests were conducted in a combustion wind tunnel at the University of California, Davis.
  The emission factor of phosphorous is 29
- Formaldehyde [air, unspecified]: 6.24859e-7 kg; = (30.3+3.5+0.7+2.4+1.6)/5*1E-6* ABS(straw_input)*0.85; source Ramdahl, T. et al. 1983; lognormal variance with pedigree 0.0892, pedigree (1,5,5,4,4)
  Based on average of 5 tests on straw burning. In each test, there has been a chemical analysis for formaldehyde due to emissions from straw incineration, expressed as mg/kg dry fuel burned.
  The burning process took place in a commercial stoker-fed trough-burning furnace with a minimum heat output of 75kW. In this study straw from barley was used as a fuel.
- Sulfur dioxide [air, unspecified]: 6.49204e-5 kg; = (680/1E6)* ABS(straw_input); source H. Nielsen 2004; lognormal variance with pedigree 0.0586, pedigree (1,5,5,5,3)
  680 g of SO2 are produced per 1 ton of straw burned.(http://www.lcafood.dk/processes/energyconversion/heatandpowerfromstraw.htm)
- Chromium [air, unspecified]: 7.54699e-9 kg; = 0.093/1E6* ABS(straw_input)* 0.85; source Turn, SQ and Jenkins, BM 1997; lognormal variance with pedigree 0.0892, pedigree (1,5,5,4,4)
  Based on experimental study. Average emission factor (mg/kg dry fuel) for several herbacious fuels (rice, wheat, barley straws; corn stover and sugarcane trash).
  The study reports elemental and water soluble species concentrations and emissions factors obtained from particulate matter collected during test burns. The tests were conducted in a combustion wind tunnel at the University of California, Davis.
  The emission factor of chromium is 0.093
- Manganese [air, unspecified]: 1.05496e-7 kg; = 1.3/1E6* ABS(straw_input)* 0.85; source Turn, SQ and Jenkins, BM 1997; lognormal variance with pedigree 0.0892, pedigree (1,5,5,4,4)
  Based on experimental study. Average emission factor (mg/kg dry fuel) for several herbacious fuels (rice, wheat, barley straws; corn stover and sugarcane trash).
  The study reports elemental and water soluble species concentrations and emissions factors obtained from particulate matter collected during test burns. The tests were conducted in a combustion wind tunnel at the University of California, Davis.
  The emission factor of manganese is 1.3
- Zinc [air, unspecified]: 5.27478e-8 kg; = 0.65/1E6* ABS(straw_input)* 0.85; source Turn, SQ and Jenkins, BM 1997; lognormal variance with pedigree 0.0892, pedigree (1,5,5,4,4)
  Based on experimental study. Average emission factor (mg/kg dry fuel) for several herbacious fuels (rice, wheat, barley straws; corn stover and sugarcane trash).
  The study reports elemental and water soluble species concentrations and emissions factors obtained from PM collected during test burns. The tests were conducted in a combustion wind tunnel at the University of California, Davis.
  The emission factor of zinc is 0.65
- Molybdenum [air, unspecified]: 3.24602e-9 kg; = 0.040/1E6* ABS(straw_input)* 0.85; source Turn, SQ and Jenkins, BM 1997; lognormal variance with pedigree 0.0892, pedigree (1,5,5,4,4)
  Based on experimental study. Average emission factor (mg/kg dry fuel) for several herbacious fuels (rice, wheat, barley straws; corn stover and sugarcane trash).
  The study reports elemental and water soluble species concentrations and emissions factors obtained from PM collected during test burns. The tests were conducted in a combustion wind tunnel at the University of California, Davis.
  The emission factor of molybdenum is 0.04
- Mercury [air, unspecified]: 4.78788e-9 kg; = 0.059/1E6* ABS(straw_input)* 0.85; source Turn, SQ and Jenkins, BM 1997; lognormal variance with pedigree 0.0892, pedigree (1,5,5,4,4)
  Based on experimental study. Average emission factor (mg/kg dry fuel) for several herbacious fuels (rice, wheat, barley straws; corn stover and sugarcane trash).
  The study reports elemental and water soluble species concentrations and emissions factors obtained from PM collected during test burns. The tests were conducted in a combustion wind tunnel at the University of California, Davis.
  The emission factor of mercury is 0.059
- Aluminium [air, unspecified]: 4.54443e-7 kg; = 5.6/1E6* ABS(straw_input)* 0.85; source Turn, SQ and Jenkins, BM 1997; lognormal variance with pedigree 0.0892, pedigree (1,5,5,4,4)
  Based on experimental study. Average emission factor (mg/kg dry fuel) for several herbacious fuels (rice, wheat, barley straws; corn stover and sugarcane trash).
  The study reports elemental and water soluble species concentrations and emissions factors obtained from particulate matter collected during test burns. The tests were conducted in a combustion wind tunnel at the University of California, Davis.
  The emission factor of aluminium is 5.6
- Hydrocarbons, aliphatic, unsaturated [air, unspecified]: 4.60123e-6 kg; = 3.78E-6* ABS(straw_input)*15*0.85; source Bauer, C. 2007; lognormal variance with pedigree 0.112, pedigree (4,4,5,5,1)
  (same comment as for Benzo(a)pyrene)
- Silicon [air, unspecified]: 2.35336e-6 kg; = 29/1E6* ABS(straw_input)* 0.85; source Turn, SQ and Jenkins, BM 1997; lognormal variance with pedigree 0.0892, pedigree (1,5,5,4,4)
  Based on experimental study. Average emission factor (mg/kg dry fuel) for several herbacious fuels (rice, wheat, barley straws; corn stover and sugarcane trash). The particulates identified have a diameter of <10 micrometers (PM10) and larger than 2.5 micrometers. The study reports elemental and water soluble species concentrations and emissions factors obtained from PM collected during test burns. The tests were conducted in a combustion wind tunnel at the University of California, Davis.
- Phenol, pentachloro- [air, unspecified]: 1.20265e-11 kg; = 9.88E-12* ABS(straw_input)*15*0.85; source Bauer, C. 2007; lognormal variance with pedigree 0.112, pedigree (4,4,5,5,1)
  (same comment as for Benzo(a)pyrene)
- Sodium [air, unspecified]: 1.94761e-6 kg; = 24/1E6* ABS(straw_input)* 0.85; source Turn, SQ and Jenkins, BM 1997; lognormal variance with pedigree 0.0892, pedigree (1,5,5,4,4)
  Based on experimental study. Average emission factor (mg/kg dry fuel) for several herbacious fuels (rice, wheat, barley straws; corn stover and sugarcane trash). The study reports elemental and water soluble species concentrations and emissions factors obtained from particulate matter collected during test burns. The tests were conducted in a combustion wind tunnel at the University of California, Davis.
  The emission factor of sodium is 24.
- Chromium VI [air, unspecified]: 5.94021e-11 kg; = 4.88E-11* ABS(straw_input)*15*0.85; source Bauer, C. 2007; lognormal variance with pedigree 0.722, pedigree (4,4,5,5,1)
  (same comment as for Benzo(a)pyrene)
- Toluene [air, unspecified]: 4.45516e-7 kg; = 3.66E-7* ABS(straw_input)*15*0.85; source Bauer, C. 2007; lognormal variance with pedigree 0.112, pedigree (4,4,5,5,1)
  (same comment as for Benzo(a)pyrene)
- Nickel [air, unspecified]: 2.92142e-9 kg; = 0.036/1E6* ABS(straw_input)* 0.85; source Turn, SQ and Jenkins, BM 1997; lognormal variance with pedigree 0.0892, pedigree (1,5,5,4,4)
  Based on experimental study. Average emission factor (mg/kg dry fuel) for several herbacious fuels (rice, wheat, barley straws; corn stover and sugarcane trash).
  The study reports elemental and water soluble species concentrations and emissions factors obtained from PM collected during test burns. The tests were conducted in a combustion wind tunnel at the University of California, Davis.
  The emission factor of nickel is 0.04
- Cobalt [air, unspecified]: 1.13611e-9 kg; = 0.014/1E6* ABS(straw_input)* 0.85; source Turn, SQ and Jenkins, BM 1997; lognormal variance with pedigree 0.0892, pedigree (1,5,5,4,4)
  Based on experimental study. Average emission factor (mg/kg dry fuel) for several herbacious fuels (rice, wheat, barley straws; corn stover and sugarcane trash).
  The study reports elemental and water soluble species concentrations and emissions factors obtained from PM collected during test burns. The tests were conducted in a combustion wind tunnel at the University of California, Davis.
  The emission factor of cobalt is 0.014
- Silver [air, unspecified]: 2.02876e-8 kg; = 0.25/1E6* ABS(straw_input)* 0.85; source Turn, SQ and Jenkins, BM 1997; lognormal variance with pedigree 0.0892, pedigree (1,5,5,4,4)
  Based on experimental study. Average emission factor (mg/kg dry fuel) for several herbacious fuels (rice, wheat, barley straws; corn stover and sugarcane trash).
  The study reports elemental and water soluble species concentrations and emissions factors obtained from PM collected during test burns. The tests were conducted in a combustion wind tunnel at the University of California, Davis.
  The emission factor of silver is 0.25
- Carbon monoxide, non-fossil [air, unspecified]: 8.68787e-5 kg; = (910/1E6)* ABS(straw_input); source H. Nielsen 2004; lognormal variance with pedigree 0.0892, pedigree (1,5,5,4,4)
  910 g of CO are produced per 1 ton of straw burned.(http://www.lcafood.dk/processes/energyconversion/heatandpowerfromstraw.htm)
- Dioxins, measured as 2,3,7,8-tetrachlorodibenzo-p-dioxin [air, unspecified]: 3.05508e-14 kg; = (0.32/1E12* ABS(straw_input)); source H. Nielsen 2004; lognormal variance with pedigree 0.0586, pedigree (1,5,5,5,3)
  0.32 micrograms of dioxin are produced per 1 ton of straw burned.(http://www.lcafood.dk/processes/energyconversion/heatandpowerfromstraw.htm)
- NMVOC, non-methane volatile organic compounds, unspecified origin [air, unspecified]: 8.91032e-7 kg; = 7.32E-7* ABS(straw_input)*15*0.85; source Bauer, C. 2007; lognormal variance with pedigree 0.112, pedigree (4,4,5,5,1)
  (same comment as for Benzo(a)pyrene)
- Benzene, ethyl- [air, unspecified]: 4.45516e-8 kg; = 3.66E-08* ABS(straw_input)*15*0.85; source Bauer, C. 2007; lognormal variance with pedigree 0.112, pedigree (4,4,5,5,1)
  (same comment as for Benzo(a)pyrene)
- Acetaldehyde [air, unspecified]: 9.05639e-8 kg; = 7.44E-08* ABS(straw_input)*15*0.85; source Bauer, C. 2007; lognormal variance with pedigree 0.112, pedigree (4,4,5,5,1)
  (same comment as for Benzo(a)pyrene)
- Hydrocarbons, aliphatic, alkanes, unspecified [air, unspecified]: 1.35116e-6 kg; = 1.11E-6* ABS(straw_input)*15*0.85; source Bauer, C. 2007; lognormal variance with pedigree 0.112, pedigree (4,4,5,5,1)
  (same comment as for Benzo(a)pyrene)
- Potassium [air, unspecified]: 6.24859e-5 kg; = 770/1E6* ABS(straw_input)* 0.85; source Turn, SQ and Jenkins, BM 1997; lognormal variance with pedigree 0.0892, pedigree (1,5,5,4,4)
  Based on experimental study. Average emission factor (mg/kg dry fuel) for several herbacious fuels (rice, wheat, barley straws; corn stover and sugarcane trash).
  The study reports elemental and water soluble species concentrations and emissions factors obtained from PM collected during test burns. The tests were conducted in a combustion wind tunnel at the University of California, Davis.
  The emission factor of potassium is770.
- Particulates, < 2.5 um [air, unspecified]: 6.82881e-5 kg; = 5.61E-5* ABS(straw_input)*15*0.85; source Bauer, C. 2007; lognormal variance with pedigree 0.112, pedigree (4,4,5,5,1)
  (same comment as for Benzo(a)pyrene)
- Chlorine [air, unspecified]: 7.46584e-5 kg; = 920/1E6* ABS(straw_input)* 0.85; source Turn, SQ and Jenkins, BM 1997; lognormal variance with pedigree 0.0892, pedigree (1,5,5,4,4)
  Based on average emission factor (mg/kg dry fuel) for several herbacious fuels (rice, wheat, barley straws; corn stover and sugarcane trash).
  The study reports elemental and water soluble species concentrations and emissions factors obtained from particulate matter collected during test burns. The tests were conducted in a combustion wind tunnel at the University of California, Davis.
  The emission factor of chlorine is 920.
- Methane, non-fossil [air, unspecified]: 5.94021e-7 kg; = 4.88E-7* ABS(straw_input)*15*0.85; source Bauer, C. 2007; lognormal variance with pedigree 0.112, pedigree (4,4,5,5,1)
  (same comment as for Benzo(a)pyrene)

## Extrapolations
The data on emissions are extrapolated from a power plant using straw as an energy source and from several experimental studies found in literature review. Due to a lack of specific emissions for organic straw, these are obtained from data on emissions for regular straw burning.
