# miscanthus rhizome production, for planting

Dataset: EcoSpold 2, unit process
Geography: DE
Time period: 2005-01-01 to 2019-12-31
Technology level: current
Classification: ISIC rev.4 ecoinvent: 0130:Plant propagation
Scenario: Business-as-Usual
System model: Allocation at the point of substitution
Generated by: Thomas Nemecek
Published in: Hölscher T. 2007
Database: ecoinvent
isCopyrightProtected: true
accessRestrictedTo: 1

## General comment
This dataset represents the production of 1 piece of miscanthus rhizome and 0.08 kg of chopped miscanthus as a by-product. Rhizomes are harvested 4 years after establishment of the plantation, miscanthus is harvested annually from second to fourth year. Moisture content of rhizomes at storage is 73.9%, number of harvested rhizomes is 500'000 (10'000 rhizomes planted; multiplication factor: 50), average weight of a rhizome is 70 g. Moisture content of chopped miscanthus at storage is 14% (= 15% water on a dry mass basis), dry matter yield at first harvest is 6'000 kg/ha, 17'000 kg/ha at second and third harvest.

## Included activities start
This activity assumes miscanthus rhizome production for planting on a plantation with a lifetime of 4 years and represents the average expenditures of the production of 1 piece of miscanthus rhizome for planting (average weight 70 g). The inputs of mineral fertilisers, seed and pesticides are considered. It is assumed that no organic fertilisers are applied.

## Included activities end
The dataset includes all machine operations and corresponding inputs of machine infrastructure and sheds. Machine operations are: soil cultivation, planting, fertilisation, weed control, pest and pathogen control, harvest and chopping of miscanthus as a by-product, breaking up of rhizomes into pieces by a rotary tiller and harvest of rhizome pieces by an adjusted potato harvester, transport of all harvested goods from field to farm (2 km), and storage of rhizomes in a cold storage house during 1 month. Further, direct field emissions are included. This activity ends after cold storage of rhizomes at the farm gate.

## Technology
conventional production

## Reference product
- miscanthus rhizome, for planting: 1 unit; name REF_PRODUCT; CPC 01961: Live plants; bulbs, tubers and roots; cuttings and slips; mushroom spawn; By-product classification allocatable product; ISIC rev.4 ecoinvent 012:Growing of perennial crops
  production volume 2e7 unit
    Estimate based on the required rhizome supply for 2000 ha (http://www.energiepflanzen.info/pflanzen/miscanthus/) at a planting density of 10000 rhizomes/ha ("Miscanthus: Global denken - lokal handeln" presentation by R. Hayer, MBR Trier-Wittlich e.V., 02.02.2010).
  property energy content 0.35 MJ; name REF_PRODUCT_energy_content
    as gross calorific value (when relevant). Approximated by miscanthus above ground biomass: Average of all entries for "miscanthus" > gross calorific value in BIOBIB - A Database for biofuels (http://www.vt.tuwien.ac.at/biobib/biobib.html).
  property carbon content, non-fossil 0.46; name REF_PRODUCT_C_content_non_fossil
    biogene carbon content on a dry matter basis
  property dry mass 0.01827 kg; name REF_PRODUCT_DM; = REF_PRODUCT_WM*0.261
  property water in wet mass 0.05173 kg; name REF_PRODUCT_WWM; = REF_PRODUCT_WM- REF_PRODUCT_DM
  property wet mass 0.07 kg; name REF_PRODUCT_WM
  property water content 2.83142; name REF_PRODUCT_water_content; = REF_PRODUCT_WWM/ REF_PRODUCT_DM
  property price 0.175 EUR2005; name REF_PRODUCT_price_EUR2005
    Price for rizome lays between 0,15 and 0.20 EUR/rizome. Information based on prices at producer in Germany, main producer in Europe (Fachagentur Nachwachsende Rohstoffe) http://www.bio-energie.de/heizen-mit-holz/miscanthus/
  property carbon content 0.46
    carbon content on a dry matter basis (reserved; not for manual entry)
  property true value 0.175; name REF_PRODUCT_true_value
    allocation property applied in "true value" allocation // value calculated from revenue
  properties: carbon allocation 0.0084042 kg

## By-products
- miscanthus, chopped: 0 kg; name BY_PRODUCT; CPC 01990: Other raw vegetable materials, n.e.c.; By-product classification allocatable product; ISIC rev.4 ecoinvent 012:Growing of perennial crops
  This exchange refers to the variety Miscanthus giganteus, which is mainly grown as a biofuel.
  production volume 1.6e6 kg; = Ref('59da22d0-1806-43b6-96a6-9b1f3ad415fb', 'ProductionVolume')* BY_PRODUCT
    Production volume calculated relative to that of reference product.
  property price 0.175 EUR2005; name BY_PRODUCT_price_EUR2005
    Price for rhizome lays between 0,15 and 0.20 EUR/rhizome. Information based on prices at producer in Germany (Fachagentur Nachwachsende Rohstoffe) http://www.bio-energie.de/heizen-mit-holz/miscanthus/
  property energy content 19.2123 MJ; name BY_PRODUCT_energy_content
    as gross calorific value (when relevant). Average of all entries for "miscanthus" > gross calorific value in BIOBIB - A Database for biofuels (http://www.vt.tuwien.ac.at/biobib/biobib.html).
  property wet mass 1.16279 kg; name BY_PRODUCT_WM; = BY_PRODUCT_DM/0.86
  property carbon content, non-fossil 0.48; name BY_PRODUCT_C_content_non_fossil
    biogene carbon content on a dry matter basis; obtained from BIOBIB - A Database for biofuels. http://www.vt.tuwien.ac.at/biobib/biobib.html.
  property water in wet mass 0.162791 kg; name BY_PRODUCT_WWM; = BY_PRODUCT_WM- BY_PRODUCT_DM
  property dry mass 1 kg; name BY_PRODUCT_DM
  property water content 0.162791; name BY_PRODUCT_water_content; = BY_PRODUCT_WWM/ BY_PRODUCT_DM
  property carbon content 0.48
    carbon content on a dry matter basis (reserved; not for manual entry)
  property true value 0.014; name BY_PRODUCT_true_value
    allocation property applied in "true value" allocation // value calculated from revenue
  properties: carbon allocation 0.48 kg

## Inputs from technosphere
- fertilising, by broadcaster: 1.85185e-6 ha; source Hölscher T. 2007; lognormal variance with pedigree 0.0412, pedigree (2,1,5,1,1)
  One application in the third year.
- nitrogen fertiliser, as N: 9.25926e-5 kg; source Hölscher T. 2007; lognormal variance with pedigree 0.0412, pedigree (2,1,5,1,1)
  50 kg N/(ha*a) in the third year.
  properties: wet mass 1 kg, dry mass 1 kg
- tillage, harrowing, by spring tine harrow: 3.7037e-6 ha; source Hölscher T. 2007; lognormal variance with pedigree 0.0412, pedigree (2,1,5,1,1)
  Two passes in the year of establishment.
- packaging, for pesticides: 6.66667e-6 kg; lognormal variance with pedigree 0.0912, pedigree (4,3,5,5,4)
  Total amount of active substance/s of pesticides needed for the production of miscanthus rhizome, for planting is calculated to be circa 3.60E-06 kg. Pesticide/s used in this dataset is/are: 'glyphosate'. The total amount of active substance/s is doubled in order to account for the packaging of the dilluted product of pesticide/s that is/are applied. Therefore, 7.20E-06 kg of packaging for pesticides is justified with this exchange.
  properties: price 0.0642 EUR2005, dry mass 1 kg, carbon content, fossil 0.85714, wet mass 1 kg
- miscanthus rhizome, for planting: 0.0185185 unit; name SEED; source Hölscher T. 2007; lognormal variance with pedigree 0.0413, pedigree (2,2,5,1,1)
  10000 pcs/ha.
  property dry mass 0.01827 kg; name SEED_DM; = SEED_WM*0.261
  property water content 2.83142; name SEED_water_content; = SEED_WWM/ SEED_DM
  property wet mass 0.07 kg; name SEED_WM
  property carbon content, non-fossil 0.46; name SEED_C_content_non_fossil
  property water in wet mass 0.05173 kg; name SEED_WWM; = SEED_WM- SEED_DM
- tillage, currying, by weeder: 1.85185e-6 ha; source Hölscher T. 2007; lognormal variance with pedigree 0.0412, pedigree (2,1,5,1,1)
  One pass in the year of establishment.
- combine harvesting: 5.55556e-6 ha; source Hölscher T. 2007; lognormal variance with pedigree 0.0412, pedigree (2,1,5,1,1)
  Approximation for the harvest of miscanthus above ground biomass. One pass per year from second to last year.
- tillage, rotary cultivator: 3.7037e-6 ha; source Hölscher T. 2007; lognormal variance with pedigree 0.0412, pedigree (2,1,5,1,1)
  Two passes for breaking rhizomes into pieces before rhizome harvest.
- hoeing: 5.55556e-6 ha; source Hölscher T. 2007; lognormal variance with pedigree 0.0412, pedigree (2,1,5,1,1)
  Two passes in the year of establishment, one pass in the second year.
- potassium sulfate, as K2O: 0.00022037 kg; source Hölscher T. 2007; lognormal variance with pedigree 0.0412, pedigree (2,1,5,1,1)
  119 kg K2O/(ha*a) in the third year.
  properties: wet mass 1 kg, dry mass 1 kg
- application of plant protection product, by field sprayer: 1.85185e-6 ha; source Hölscher T. 2007; lognormal variance with pedigree 0.0413, pedigree (2,2,5,1,1)
  Application of glyphosate before planting.
- tillage, rolling: 1.85185e-6 ha; source Hölscher T. 2007; lognormal variance with pedigree 0.0412, pedigree (2,1,5,1,1)
  One pass in the year of establishment.
- harvesting, by complete harvester, ground crops: 1.85185e-6 ha; source Hölscher T. 2007; lognormal variance with pedigree 0.0412, pedigree (2,1,5,1,1)
  Approximation for harvest of miscanthus rhizomes.
- phosphate rock, as P2O5, beneficiated, dry: 7.87037e-5 kg; source Hölscher T. 2007; lognormal variance with pedigree 0.0412, pedigree (2,1,5,1,1)
  42.5 kg P2O5/(ha*a) in the third year.
  properties: wet mass 1 kg, dry mass 1 kg
- mulching: 1.85185e-6 ha; source Hölscher T. 2007; lognormal variance with pedigree 0.0412, pedigree (2,1,5,1,1)
  One pass before establishment.
- fodder loading, by self-loading trailer: 0.000788889 m3; source Hölscher T. 2007; lognormal variance with pedigree 0.0412, pedigree (2,1,5,1,1)
  Approximation for the loading and transport to the farm of chopped miscanthus.
- glyphosate: 3.33333e-6 kg; source Hölscher T. 2007; lognormal variance with pedigree 0.0413, pedigree (2,2,5,1,1)
  Application before planting.
  properties: dry mass 1 kg, wet mass 1 kg, carbon content, fossil 0.214286
- tillage, ploughing: 1.85185e-6 ha; source Hölscher T. 2007; lognormal variance with pedigree 0.0412, pedigree (2,1,5,1,1)
  One pass in the year of establishment.
- potato planting: 1.85185e-6 ha; source Hölscher T. 2007; lognormal variance with pedigree 0.0412, pedigree (2,1,5,1,1)
  Approximation for planting of miscanthus rhizome pieces. 10000 pcs/ha.
- building, hall, steel construction: 1.62037e-7 m2; source Hölscher T. 2007; lognormal variance with pedigree 0.3689, pedigree (5,5,5,3,4)
  Required infrastructure for cool house storage; estimated based on storage of potatoes ("potatoe seed production, Swiss integrated production, for setting"), scaled assuming a storage of 35 t/ha during one month, with the same bulk density as for potatoes (2m3/t), a stacking height of 6 m, and half of the area of the buliding being occupied by corridors.
- transport, tractor and trailer, agricultural: 0.000132222 metric ton*km; source Hölscher T. 2007; lognormal variance with pedigree 0.1684, pedigree (4,1,5,1,1)
  Transport of miscanthus rhizomes to field for planting and of harvested rhizomes from field to farm. Distance: 2 km.
- packaging, for fertilisers: 0.000871606 kg; lognormal variance with pedigree 0.0912, pedigree (4,3,5,5,4)
  Total amount of active substance/s of fertilisers needed for the production of 'miscanthus rhizome, for planting' is calculated to be circa 4.71E-04 kg. Fertiliser/s used in this dataset is/are: 'magnesium oxide', 'nitrogen fertiliser, as N', 'phosphate rock, as P2O5, beneficiated, dry', 'potassium sulfate, as K2O'. The total amount of active substance/s is doubled in order to account for the packaging of the dilluted product of fertiliser/s that is/are applied. Therefore, 9.41E-04 kg of packaging for fertilisers is justified with this exchange.
  properties: dry mass 1 kg, carbon content, fossil 0.825301, price 0.0642 EUR2005, wet mass 1 kg
  note on carbon content, fossil: Considering a chemical formula (C2H4)n for polyethylene, carbon content-fossil is calculated to be 0.856286 kg of Carbon per kg of dry mass.
- electricity, low voltage: 0.000394287 kWh; source Hölscher T. 2007; lognormal variance with pedigree 0.0906, pedigree (5,5,5,5,1)
  Electricity for storage in cool house; estimate based on storage of potato ("potato seed production, Swiss integrated production, for setting"), scaled assuming storaage of 35 t/ha during one month, with the same bulk density as for potato (2 m3/t), a stacking height of 6 m, and half of the area of the buliding being occupied by corridors.
- magnesium oxide: 4.41361e-5 kg; source Hölscher T. 2007; lognormal variance with pedigree 0.0412, pedigree (2,1,5,1,1)
  24 kg of magnesium oxide ha and year in the third year.
  properties: dry mass 1 kg, wet mass 1 kg

## Inputs from nature
- Energy, gross calorific value, in biomass [natural resource, biotic]: 17.7889 MJ; lognormal variance with pedigree 0.0819, pedigree (2,3,5,3,4)
  Average of all entries for "miscanthus" > gross calorific value in BIOBIB - A Database for biofuels (http://www.vt.tuwien.ac.at/biobib/biobib.html).
- Occupation, permanent crop, non-irrigated, intensive [natural resource, land]: 0.0694574 m2*year; lognormal variance with pedigree 0.0429, pedigree (2,1,5,1,1)
  Modelled, see chapter 'Land use' in "01_crop production_direct field emissions and natural resources_v1.0.pdf" - pdf-document on the dedicated talk page of ecoinvent (www.ecoinvent.org/documentation)
- Transformation, from arable land, unspecified use [natural resource, land]: 0.0185185 m2; lognormal variance with pedigree 0.0489, pedigree (2,1,5,1,1)
  (same comment as for Occupation, permanent crop, non-irrigated, intensive)
- Transformation, to permanent crop, non-irrigated, intensive [natural resource, land]: 0.0185185 m2; lognormal variance with pedigree 0.0489, pedigree (2,1,5,1,1)
  (same comment as for Occupation, permanent crop, non-irrigated, intensive)
- Carbon dioxide, in air [natural resource, in air]: 0.158332 kg; = 44/12 * (REF_PRODUCT_C_content_non_fossil * REF_PRODUCT * REF_PRODUCT_DM + BY_PRODUCT_C_content_non_fossil * BY_PRODUCT * BY_PRODUCT_DM - SEED_C_content_non_fossil * SEED * SEED_DM); lognormal variance with pedigree 0.0818, pedigree (2,2,5,1,1)
  Modelled, see chapter 'Release of fossil CO2 after urea applications' in "01_crop production_assessment methods of direct field emissions_v1.0.pdf" - pdf-document on the dedicated talk page of ecoinvent (www.ecoinvent.org/documentation)

## Emissions to nature
- Dinitrogen monoxide [air, non-urban air or from high stacks]: 1.81713e-6 kg; lognormal variance with pedigree 0.0818, pedigree (2,2,5,1,1)
  Modelled, see chapter 'Emissions of N2O to the air' in "01_crop production_direct field emissions and natural resources_v1.0.pdf" - pdf-document on the dedicated talk page of ecoinvent (www.ecoinvent.org/documentation)
- Lead [soil, agricultural]: 9.95e-10 kg; lognormal variance with pedigree 0.0818, pedigree (2,2,5,1,1)
  Modelled, see chapter 'Emissions of heavy metals to agricultural soil, surface water and ground water' in "01_crop production_direct field emissions and natural resources_v1.0.pdf" - pdf-document on the dedicated talk page of ecoinvent (www.ecoinvent.org/documentation)
- Cadmium, ion [water, surface water]: 7.56824e-11 kg; lognormal variance with pedigree 0.1271, pedigree (2,2,5,1,1)
  (same comment as for Lead)
- Phosphate [water, ground-]: 1.49e-6 kg; lognormal variance with pedigree 0.0818, pedigree (2,2,5,1,1)
  Modelled, see chapter 'Emissions of phosphorous to the water' in "01_crop production_direct field emissions and natural resources_v1.0.pdf" - pdf-document on the dedicated talk page of ecoinvent (www.ecoinvent.org/documentation)
- Copper, ion [water, ground-]: 7.36981e-9 kg; lognormal variance with pedigree 0.1271, pedigree (2,2,5,1,1)
  (same comment as for Lead)
- Mercury [water, ground-]: 1.13222e-12 kg; lognormal variance with pedigree 0.1271, pedigree (2,2,5,1,1)
  (same comment as for Lead)
- Nitrate [water, ground-]: 0.000125102 kg; lognormal variance with pedigree 0.0818, pedigree (2,2,5,1,1)
  Modelled with the 'SALCA-NO3 model' described in "01_crop production_direct field emissions and natural resources_v1.0.pdf" - pdf-document on the dedicated talk page of ecoinvent (www.ecoinvent.org/documentation)
- Chromium, ion [water, surface water]: 9.11102e-9 kg; lognormal variance with pedigree 0.1271, pedigree (2,2,5,1,1)
  (same comment as for Lead)
- Cadmium, ion [water, ground-]: 7.6012e-11 kg; lognormal variance with pedigree 0.1271, pedigree (2,2,5,1,1)
  (same comment as for Lead)
- Nickel [soil, agricultural]: -3.48204e-8 kg
  (same comment as for Lead)
- Mercury [soil, agricultural]: 2.64694e-12 kg; lognormal variance with pedigree 0.0818, pedigree (2,2,5,1,1)
  (same comment as for Lead)
- Lead [water, ground-]: 1.47389e-10 kg; lognormal variance with pedigree 0.1271, pedigree (2,2,5,1,1)
  (same comment as for Lead)
- Lead [water, surface water]: 9.93611e-10 kg; lognormal variance with pedigree 0.1271, pedigree (2,2,5,1,1)
  (same comment as for Lead)
- Cadmium [soil, agricultural]: 2.06093e-9 kg; lognormal variance with pedigree 0.0818, pedigree (2,2,5,1,1)
  (same comment as for Lead)
- Copper [soil, agricultural]: -5.70593e-8 kg
  (same comment as for Lead)
- Mercury [water, surface water]: 1.51722e-12 kg; lognormal variance with pedigree 0.1271, pedigree (2,2,5,1,1)
  (same comment as for Lead)
- Copper, ion [water, surface water]: 8.53528e-9 kg; lognormal variance with pedigree 0.1271, pedigree (2,2,5,1,1)
  (same comment as for Lead)
- Zinc, ion [water, ground-]: 5.06481e-8 kg; lognormal variance with pedigree 0.1271, pedigree (2,2,5,1,1)
  (same comment as for Lead)
- Chromium, ion [water, ground-]: 3.8638e-8 kg; lognormal variance with pedigree 0.1271, pedigree (2,2,5,1,1)
  (same comment as for Lead)
- Zinc, ion [water, surface water]: 1.57907e-8 kg; lognormal variance with pedigree 0.1271, pedigree (2,2,5,1,1)
  (same comment as for Lead)
- Glyphosate [soil, agricultural]: 3.33333e-6 kg; lognormal variance with pedigree 0.049, pedigree (2,2,5,1,1)
  Modelled, see chapter 'Emissions of pesticides to agricultural soil' in "01_crop production_direct field emissions and natural resources_v1.0.pdf" - pdf-document on the dedicated talk page of ecoinvent (www.ecoinvent.org/documentation)
- Phosphorus [water, surface water]: 1.3687e-6 kg; lognormal variance with pedigree 0.0818, pedigree (2,2,5,1,1)
  (same comment as for Phosphate)
- Nickel, ion [water, surface water]: 6.1075e-9 kg; lognormal variance with pedigree 0.1271, pedigree (2,2,5,1,1)
  (same comment as for Lead)
- Chromium [soil, agricultural]: -5.23111e-9 kg
  (same comment as for Lead)
- Ammonia [air, non-urban air or from high stacks]: 2.25167e-6 kg; lognormal variance with pedigree 0.049, pedigree (2,2,5,1,1)
  Modelled with the 'AGRAMMON model' described in "01_crop production_direct field emissions and natural resources_v1.0.pdf" - pdf-document on the dedicated talk page of ecoinvent (www.ecoinvent.org/documentation)
- Phosphate [water, surface water]: 5.47204e-6 kg; lognormal variance with pedigree 0.0818, pedigree (2,2,5,1,1)
  (same comment as for Phosphate)
- Nitrogen oxides [air, non-urban air or from high stacks]: 3.81593e-7 kg; lognormal variance with pedigree 0.0818, pedigree (2,2,5,1,1)
  Modelled, see chapter 'Emissions of NOx to the air' in "01_crop production_direct field emissions and natural resources_v1.0.pdf" - pdf-document on the dedicated talk page of ecoinvent (www.ecoinvent.org/documentation)
- Zinc [soil, agricultural]: -1.23222e-6 kg
  (same comment as for Lead)

## Sampling procedure
The inventories were generated on the basis of data from the 'GruBE' project (Hölscher et al. 2007) and complemented with information from expert estimates, extension service documents and literature. The sources used in the project were KTBL (2006) and personal communications from producers. --- Sources: Hölscher T., Deinmling S., Freiermuth Knuchel R., Gaillard G., Kägi T. & Müller-Sämann K. (2007) Energieoptionen aus landwirtschaftlicher Biomasse am Oberrhein - Auswirkungen für Landwirtschaft und Umwelt - Endbericht zum Projekt. Agentur für Nachhaltige Nutzung von Agrarlandschaften (ANNA). Müllheim, Germany. --- KTBL (2006) Energiepflanzen. Daten für die Planung des Energiepflanzenanbaus. Kuratorium für Technik und Bauwesen in der Landwirtschaft, Darmstadt, 372 p.

## Extrapolations
The amounts of the flows are averages across all years of the plantation lifetime. Electricity consumption and infrastructure for cold storage house were extrapolated from the dataset 'potato seed production, Swiss integrated production, for setting".

## Review by Thomas Nemecek 2011-11-25
Passed internally.

## Review by Christian Bauer 2011-12-02
passed
