# dairy construction

Dataset: EcoSpold 2, unit process
Geography: GLO
Time period: 2005-01-01 to 2019-12-31
Technology level: current
Classification: EcoSpold01Categories: construction processes/buildings
Classification: ISIC rev.4 ecoinvent: 4100:Construction of buildings
Scenario: Business-as-Usual
System model: Allocation at the point of substitution
Generated by: Tereza Levova
Published in: Schmid, A. 2010
Database: ecoinvent
isCopyrightProtected: true
accessRestrictedTo: 1

## General comment
This datasets represents construction of average dairy wich have production facilities to produce different dairy products, such as milk, cheese and butter.

## Included activities end
Includes the building and the equipment (cooling and heating equipment, tanks, storage room).

## Reference product
- dairy: 1 m3; CPC 53121: Industrial buildings; By-product classification allocatable product
  production volume 4 m3
    This is a placeholder value that does not reflect real-world production volumes. This dataset does not currently require a real-world production volume to work in the database framework, and no actual data were collected yet. This has no negative effect on the results of the ecoinvent database.
  property price 146.019 EUR2005
    Calculated based on inputs: The price of the product has been calculated as a sum of the values of the material and energy inputs for this product. This value is therefore a rough estimation. It may underestimate the real price since there are additional expenses when producing any product. These expences can include for example labour costs, treatment of waste materials and profit for the producer. Please consider carefully whether this level of data quality is acceptable for your application.
  property lifetime 20 year; name dairy_lifetime
    Literature value.
  property lifetime capacity [kg] 4074.07 kg; name dairy_lifetime_capacity; = 2.2E6/(10*18*3)
    Calculated based on literature value.
    The lifetime capacity might vary a lot dipending on the size of the dairy. This dairy of volume of (18*10*3=) 540m3 has a capacity of 2.2E6 kg of process milk/year. This milk can be processed to many different products such as cheese, butter or yogurt.
  property true value 146.019
    allocation property applied in "true value" allocation // value calculated from revenue

## By-products
- copper: 0 kg; source Rentz O. 1999; By-product classification allocatable product; CPC 41413: Refined copper and copper alloys, unwrought; master alloys of copper
  Literature value. Copper uses: Before end-use copper is manufactured into semi fabricated products, such as shapes and ingots (known as 'semis'). These manufacturing processes are subdivided into hot working, cold working and, if necessary, process annealing. Few of the semis are ready for use as such. They more typically travel to first-stage manufacturers, who make metal rods, wire, and casting, and then to component manufacturers who produce such things as motors, valves, and insulated cables The components in turn are incorporated by final-stage manufacturers into a variety of finished products - automobiles, commercial buildings, residential housing, and so forth. These uses account for about 79% of the world-wide consumption of copper.
  production volume 5.55444 kg
  properties: dry mass 1 kg, water in wet mass 0 kg, wet mass 1 kg, carbon content, non-fossil 0, water content 0, price 5.52 EUR2005, carbon content, fossil 0, carbon content 0, carbon allocation 0 kg, true value 2.55504
- electricity, for reuse in municipal waste incineration only: 0 kWh; CPC 17100: Electrical energy; By-product classification allocatable product; pedigree (1,1,1,1,1)
  Net electricity generated from this waste and used in internal MSWI plant energy redistribution.
  Uncertainty: uncertainty is calculated from uncertainties in waste composition and uncertainties in energy efficiency and the uncertainty in internal energy demand
  production volume 1.95042 kWh
  property exergy 3.6 MJ; name E_el_prod_MSWI_exergy
    This exergy property is based on the exergy content of the product.
  property true value relation 3.6; name E_el_prod_MSWI_true_value_relation
    property to calculate "true value" from
  property price 0.1 EUR2005; name E_el_prod_MSWI_price_EUR2005
    Estimated to be the same price as in case of electricity, medium voltage.
  property true value 0.0441237
    allocation property applied in "true value" allocation // value calculated from true value relation
- heat, for reuse in municipal waste incineration only: 0 MJ; CPC 17300: Steam and hot water; By-product classification allocatable product; pedigree (1,1,1,1,1)
  Net useful heat generated from this waste and used in internal MSWI plant energy redistribution.
  Uncertainty: uncertainty is calculated from uncertainties in waste composition and uncertainties in energy efficiency and the uncertainty in internal energy demand
  production volume 13.6077 MJ
  property true value relation 0.1842; name E_th_prod_MSWI_true_value_relation
    property to calculate "true value" from
  property exergy 0.1842 MJ; name E_th_prod_MSWI_exergy
    This exergy property is based on the exergy content of the product.
  property price 0.0106 EUR2005; name E_th_prod_MSWI_price_EUR2005
    Average European district heat price from Ecoheatcool and Euroheat 2005-2006, Ecoheat Work package 1: The European heat market. Final report. 10.6 EUR/GJ i s the price of district heat. http://www.solarthermalworld.org/files/Ecoheatcool%20WP1%20Web.pdf?download
  property true value 0.0157562
    (same comment as for electricity, for reuse in municipal waste incineration only)
- zinc concentrate: 0 kg; CPC 14290: Other non-ferrous metal ores and concentrates (other than uranium or thorium ores and concentrates); By-product classification allocatable product
  Calculated value from the knowledge of the properties of both products.
  production volume 4.40871e-9 kg
  property price 0.38 EUR2005; name ByP_price_EUR2005
    Temporary price data. Calculated as 90% of purchasers price based on: Zinc content in concentrate 53%. Concentrate price per kg Zn 86.5% of refined Zn price (13.5% treatment charges according to CHR Metals Limited 2005: Dynamic cost curves. http://www.minecost.com/dynamic.pdf). 2004 zinc price from USGS (2007) Mineral commodity summaries 2007. <http://minerals.usgs.gov/minerals/pubs/mcs/2007/mcs2007.pdf> [Accessed 25 May 2010]
  property zinc content 0.53; name zinc_C_zinc_concentrate
    Zinc content on a dry matter basis. Value taken from teh "zinc mine operation" /GLO dataset.
  property dry mass 1 kg; name DM_zinc_concentrate
  property carbon content 0
    carbon content on a dry matter basis (reserved; not for manual entry)
  property true value 1.39609e-10
    allocation property applied in "true value" allocation // value calculated from revenue
  properties: wet mass 1 kg, water content 0, carbon content, non-fossil 0, carbon content, fossil 0, water in wet mass 0 kg, carbon allocation 0 kg
- iron scrap, unsorted: 0 kg; source European Aluminium Association 2008; CPC 39310: Slag, dross, scalings and other waste from the manufacture of iron or steel; By-product classification Recyclable; pedigree (1,1,1,1,1)
  production volume 0.00809115 kg
  property price 0.149 EUR2005; name ironScrapAmount_price_EUR2005
    Temporary price data. Calculated as 90% of purchasers price based on: estimated at 85% of sorted scrap
  property carbon content 0
    carbon content on a dry matter basis (reserved; not for manual entry)
  property true value 0.000100465
    allocation property applied in "true value" allocation // value calculated from revenue
  properties: water in wet mass 0 kg, water content 0, carbon content, fossil 0, carbon content, non-fossil 0, dry mass 1 kg, wet mass 1 kg, carbon allocation 0 kg
- aluminium oxide, non-metallurgical: 0 kg; source European Aluminium Association 2008; CPC 41432: Alumina (aluminium oxide), except artificial corundum; By-product classification allocatable product; CAS 1344-28-1; pedigree (1,1,1,1,1)
  production volume 0.509145 kg
  property carbon content, non-fossil 0; name C_content_non_fossil
  property price 0.28 EUR2005; name Al2O3Amount_price_EUR2005
    From UN trade database. http://data.un.org/ Import data from the largest economies of the world are used (Brazil, India, USA, China, Japan and EU-27).
  property dry mass 1 kg; name DM
  property water content 0; name water_content
  property wet mass 1 kg; name WM
  property water in wet mass 0 kg; name WWM
  property carbon content, fossil 0; name C_content_fossil
  property carbon content 0
    carbon content on a dry matter basis (reserved; not for manual entry)
  property true value 0.0118801
    allocation property applied in "true value" allocation // value calculated from revenue
  properties: carbon allocation 0 kg
- aluminium, cast alloy: 0 kg; source European Aluminium Association 2008; By-product classification allocatable product; CPC 41431: Unwrought aluminium; pedigree (1,1,1,1,1)
  EcoSpold01Location=RER
  production volume 4.75938 kg
  property price 1.3 EUR2005; name castAlloyAmount_price_EUR2005
  properties: water in wet mass 0 kg, carbon content, non-fossil 0, water content 0, dry mass 1 kg, carbon content, fossil 0, wet mass 1 kg, carbon content 0, carbon allocation 0 kg, true value 0.515599
- aluminium, wrought alloy: 0 kg; source European Aluminium Association 2008; By-product classification allocatable product; CPC 4153: Semi-finished products of aluminium or aluminium alloys; pedigree (1,1,1,1,1)
  production volume 2.08357 kg
  property price 1.44 EUR2005; name secondaryAluminiumOutput_price_EUR2005
  properties: wet mass 1 kg, water content 0, carbon content, fossil 0, water in wet mass 0 kg, carbon content, non-fossil 0, dry mass 1 kg, carbon content 0, carbon allocation 0 kg, true value 0.250028
- iron scrap, sorted, pressed: 0 kg; By-product classification Recyclable; CPC 39310: Slag, dross, scalings and other waste from the manufacture of iron or steel; pedigree (1,1,1,1,1)
  Iron scrap recovered from this waste.
  production volume 1.80078 kg
  property price 0.175 EUR2005
    Temporary price data. Calculated as 90% of purchasers price based on: 2005 import and export prices (total trades (USD) divided by total weight (kg) in biggest economies of the world: EU27, USA, Brasil, China, India, Japan and Russia) from UN Commodity Trade Statistics Database (http://data.un.org/Explorer.aspxDatabase [Accessed 2011.06.20]). Commodity: Waste or scrap, of cast iron
  property carbon content 0
    carbon content on a dry matter basis (reserved; not for manual entry)
  property true value 0.000531573
    allocation property applied in "true value" allocation // value calculated from revenue
  properties: water content 0, water in wet mass 0 kg, carbon content, fossil 0, dry mass 1 kg, carbon content, non-fossil 0, wet mass 1 kg, carbon allocation 0 kg

## Inputs from technosphere
- scrap copper: 0 kg; pedigree (1,1,1,1,1)
  Calculated based on inputs.
  production volume 0 kg
    Calculated from production volume of reference product using the relative outputs.
  properties: dry mass 1 kg, wet mass 1 kg
- copper: 1.91158 kg; name copper_input; lognormal variance with pedigree 0.0592, pedigree (4,4,4,4,4)
  Literature data (Schmid, A.; 2010, Bachelor-Thesis; Carbon Footprint von Schweizer Käse, supervised by T.Nemecek, Agroscope).
  properties: wet mass 1 kg, dry mass 1 kg
- scrap aluminium: 0 kg; pedigree (1,1,1,1,1)
  Calculated based on inputs.
  production volume 0 kg
    Calculated from production volume of reference product using the relative outputs.
  properties: wet mass 1 kg, dry mass 1 kg
- steel, low-alloyed: 2.05426 kg; name steel_LA_input; lognormal variance with pedigree 0.0592, pedigree (4,4,4,4,4)
  (same comment as for copper)
  properties: dry mass 1 kg, carbon content, fossil 0.005, wet mass 1 kg
- scrap steel: 0 kg; pedigree (1,1,1,1,1)
  Calculated based on inputs.
  production volume 0 kg
    Calculated from production volume of reference product using the relative outputs.
  properties: wet mass 1 kg, dry mass 1 kg
- polypropylene, granulate: 3.26513 kg; name PP_input; lognormal variance with pedigree 0.0592, pedigree (4,4,4,4,4)
  (same comment as for copper)
  properties: wet mass 1 kg, dry mass 1 kg, carbon content, fossil 0.857143
- waste polypropylene: 0 kg; pedigree (1,1,1,1,1)
  Calculated based on inputs.
  production volume 0 kg
    Calculated from production volume of reference product using the relative outputs.
  properties: dry mass 0.841 kg, water content 0.189061, carbon content, fossil 0.825208, wet mass 1 kg
- glass wool mat: 1.77085 kg; name glasswoolmat_input; lognormal variance with pedigree 0.0592, pedigree (4,4,4,4,4)
  (same comment as for copper)
  properties: dry mass 1 kg, wet mass 1 kg, carbon content, fossil 0.0107327
  note on carbon content, fossil: A share of 16 w-% for the binders is taken into account. The binder used in this study is a mixture of phenol, formaldehyde and urea resins (ecoinvent v2.2 report 16_part XIV), and the C content was calculated as a weigthed average of phenol, formaldehyde and urea C content.
- aluminium, wrought alloy: 0.939665 kg; name aluminium_WA_input; = 1.923/2; lognormal variance with pedigree 0.0592, pedigree (4,4,4,4,4)
  (same comment as for copper)
  properties: wet mass 1 kg, dry mass 1 kg
- aluminium, cast alloy: 0.939665 kg; name aluminium_CA_input; = 1.923/2; lognormal variance with pedigree 0.0592, pedigree (4,4,4,4,4)
  (same comment as for copper)
  properties: dry mass 1 kg, wet mass 1 kg
- building, multi-storey: 0.977291 m3; lognormal variance with pedigree 0.0592, pedigree (4,4,4,4,4)
  (same comment as for copper)
- waste mineral wool: 0 kg; pedigree (1,1,1,1,1)
  Calculated based on inputs.
  production volume 0 kg
    Calculated from production volume of reference product using the relative outputs.
  properties: wet mass 1 kg, dry mass 1 kg
- steel, chromium steel 18/8: 1.90865 kg; name steel_CH_input; lognormal variance with pedigree 0.0592, pedigree (4,4,4,4,4)
  (same comment as for copper)
  properties: dry mass 1 kg, carbon content, fossil 0.0008, wet mass 1 kg
  note on carbon content, fossil: Stainless steel model is the grade 304 steel (18/8 stainless, 18% chromium 8% nickel; max. 0.08% C)
- scrap copper: -0.606368, -0.0284495, -1.27676 kg (3 entries); lognormal variance with pedigree 0.0592, pedigree (4,4,4,4,4)
  Calculated based on inputs.
  production volume 7.824 kg
- scrap aluminium: -0.596138, -0.0279694, -1.25522 kg (3 entries); lognormal variance with pedigree 0.0592, pedigree (4,4,4,4,4)
  Calculated based on inputs.
  production volume 7.692 kg
- scrap steel: -0.964951, -0.00121994, -2.99674 kg (3 entries); lognormal variance with pedigree 0.0592, pedigree (4,4,4,4,4)
  Calculated based on inputs.
  production volume 16.22 kg
- waste polypropylene: -0.314284, -0.0242294, -0.0100076, -0.00950318, -0.362628, -0.00404297, -0.00183243, -2.5386 kg (8 entries); lognormal variance with pedigree 0.0592, pedigree (4,4,4,4,4)
  Calculated based on inputs.
  production volume 13.364 kg
- waste mineral wool: -0.51329, -0.00585703, -1.2517 kg (3 entries); lognormal variance with pedigree 0.0592, pedigree (4,4,4,4,4)
  Calculated based on inputs.
  production volume 7.248 kg

## Sampling procedure
Data collected from three different dairies in Switzerland.
