# potato starch production

Dataset: EcoSpold 2, unit process
Geography: DE
Time period: 2002-01-01 to 2019-12-31
Technology level: current
Classification: EcoSpold01Categories: agricultural production/plant production
Classification: ISIC rev.4 ecoinvent: 1062:Manufacture of starches and starch products
Tags: ConvertedDataset
Scenario: Business-as-Usual
System model: Allocation at the point of substitution
Share of production covered: 100 %
Generated by: Thomas Nemecek
Published in: Nemecek, T. 2007
Database: ecoinvent
isCopyrightProtected: true
accessRestrictedTo: 1

## General comment
This dataset represents the production of 1 kg of potato starch with a water content of 20% by weight.
[This dataset was already contained in the ecoinvent database version 2. It was not individually updated during the transfer to ecoinvent version 3. Life Cycle Impact Assessment results may still have changed, as they are affected by changes in the supply chain, i.e. in other datasets. This dataset was generated following the ecoinvent quality guidelines for version 2. It may have been subject to central changes described in the ecoinvent version 3 change report (http://www.ecoinvent.org/database/ecoinvent-version-3/reports-of-changes/), and the results of the central updates were reviewed extensively. The changes added e.g. consistent water flows and other information throughout the database. The documentation of this dataset can be found in the ecoinvent reports of version 2, which are still available via the ecoinvent website. The change report linked above covers all central changes that were made during the conversion process.]

## Included activities start
From reception of the potato at the factory gate.

## Included activities end
This activity ends with the production of starch from potato. This dataset includes the production steps required to obtain potato starch from potato tubers including washing of the potatoes, chopping, separation of the potato fruit water, washing, refinering and finally drying of the starch. Processing of process water infrastructure use were included. This dataset doesn't include emissions to air and waste generation as no data related to these emissions was found.

## Geography
Values refer to the situation in Germany.

## Technology
Refers to typical potato starch production in Germany. This technology includes the following manufacturing steps: washing of the potatoes; chopping of the potatoes; separation of the potato juice, which is subsequently used to produce potato protein. The remaining juice is either evaporated or subjected to waste-water treatment; washing, refining, and finally, drying of the starch. At the end of the transformation process, the potato starch is left with a water content of 20% by weight.
References
Würdinger E., Roth U., Wegener A. & Peche R. (2003) Kunststoffe aus Nachwachsenden Rohstoffen: Vergleichende Ökobilanz für Loose-fill-Packmittel aus Stärke bzw. aus Polystyrol". Final report. BIfA, IFEU, Flo-Pak (eds.), Projektförderung: Deutsche Bundesstiftung Umwelt; Augsburg, März 2003, 514 p.

## Time period
Year when the data for this inventory was delivered.

## Parameters
- fraction, process water, to air: 0.9 dimensionless; name fraction_PW_to_air; lognormal variance with pedigree 0.092025, pedigree (4,4,3,2,4)
  Literature value (Statistics Canada, 2007 & Shaffer, K.H., 2008, Consumptive water use in the Great Lakes Basin, USGS) (Vionnet, S., Quantis Water Database - Technical Report, 2012).
- fraction, tap water, to air: 0.9; name fraction_TW_to_air; = fraction_PW_to_air; lognormal variance with pedigree 0.092025, pedigree (4,4,3,2,4)
  Calculated value. See comment in the other parametres present in this dataset. Tap water is considered to be always used as process water, thus process water fractions to air are applied to all tap water input flows to calculate the amount of water consumed in the processes.

## Reference product
- potato starch: 1 kg; source Würdinger E. 2003; CPC 23220: Starches; inulin; wheat gluten; dextrins and other modified starches; By-product classification allocatable product
  EcoSpold01Location=DE
  Literature Value.
  production volume 0.242058 kg
    This is a placeholder value that does not reflect real-world production volumes. This dataset does not currently require a real-world production volume to work in the database framework, and no actual data were collected yet. This has no negative effect on the results of the ecoinvent database. The placeholder value of this activity was scaled according to the nominal GDP of 2005 (source: United Nations, http://data.un.org/Glossary.aspx?q=GDP+%28current+US%24%29, accessed 20130726) to reflect an appropriate share of the global production volume, which is also a placeholder value.
  property carbon content, non-fossil 0.46
    C-content of starch is considered 46% on dry mass basis (from "Evolutionary and Biochemical Aspects", A.D. Kay and T. Vrede (in Global Ecology, 2010, Elsevier B.V., S.E. Jørgensen Ed.)).
  property price 0.357 EUR2005
    Calculated value based on data from United Nations Commodity Trade Statistics Database (comtrade.un.org). UN comtrade category: 110813 Potato starch. Year: 2005. Using exchange rate of 1EURO = 1.209 USD. Average of price of import into 5 main markets (EU, US, JP, IN and CN).
  property carbon content 0.46
    carbon content on a dry matter basis (reserved; not for manual entry)
  property true value 0.357
    allocation property applied in "true value" allocation // value calculated from revenue
  properties: wet mass 1 kg, dry mass 0.8 kg, water in wet mass 0.2 kg, carbon content, fossil 0, water content 0.25, carbon allocation 0.368 kg

## By-products
- electricity, for reuse in municipal waste incineration only: 0 kWh; CPC 17100: Electrical energy; By-product classification allocatable product; pedigree (1,1,1,1,1)
  Net electricity generated from this waste and used in internal MSWI plant energy redistribution.
  Uncertainty: uncertainty is calculated from uncertainties in waste composition and uncertainties in energy efficiency and the uncertainty in internal energy demand
  production volume 5.25459e-5 kWh
  property exergy 3.6 MJ; name E_el_prod_MSWI_exergy
    This exergy property is based on the exergy content of the product.
  property true value relation 3.6; name E_el_prod_MSWI_true_value_relation
    property to calculate "true value" from
  property price 0.1 EUR2005; name E_el_prod_MSWI_price_EUR2005
    Estimated to be the same price as in case of electricity, medium voltage.
  property true value 6.77016e-6
    allocation property applied in "true value" allocation // value calculated from true value relation
- heat, for reuse in municipal waste incineration only: 0 MJ; CPC 17300: Steam and hot water; By-product classification allocatable product; pedigree (1,1,1,1,1)
  Net useful heat generated from this waste and used in internal MSWI plant energy redistribution.
  Uncertainty: uncertainty is calculated from uncertainties in waste composition and uncertainties in energy efficiency and the uncertainty in internal energy demand
  production volume 0.000378182 MJ
  property true value relation 0.1842; name E_th_prod_MSWI_true_value_relation
    property to calculate "true value" from
  property exergy 0.1842 MJ; name E_th_prod_MSWI_exergy
    This exergy property is based on the exergy content of the product.
  property price 0.0106 EUR2005; name E_th_prod_MSWI_price_EUR2005
    Average European district heat price from Ecoheatcool and Euroheat 2005-2006, Ecoheat Work package 1: The European heat market. Final report. 10.6 EUR/GJ i s the price of district heat. http://www.solarthermalworld.org/files/Ecoheatcool%20WP1%20Web.pdf?download
  property true value 2.49315e-6
    (same comment as for electricity, for reuse in municipal waste incineration only)
- zinc concentrate: 0 kg; CPC 14290: Other non-ferrous metal ores and concentrates (other than uranium or thorium ores and concentrates); By-product classification allocatable product
  Calculated value from the knowledge of the properties of both products.
  production volume 2.97981e-10 kg
  property price 0.38 EUR2005; name ByP_price_EUR2005
    Temporary price data. Calculated as 90% of purchasers price based on: Zinc content in concentrate 53%. Concentrate price per kg Zn 86.5% of refined Zn price (13.5% treatment charges according to CHR Metals Limited 2005: Dynamic cost curves. http://www.minecost.com/dynamic.pdf). 2004 zinc price from USGS (2007) Mineral commodity summaries 2007. <http://minerals.usgs.gov/minerals/pubs/mcs/2007/mcs2007.pdf> [Accessed 25 May 2010]
  property zinc content 0.53; name zinc_C_zinc_concentrate
    Zinc content on a dry matter basis. Value taken from teh "zinc mine operation" /GLO dataset.
  property dry mass 1 kg; name DM_zinc_concentrate
  property carbon content 0
    carbon content on a dry matter basis (reserved; not for manual entry)
  property true value 1.13233e-10
    allocation property applied in "true value" allocation // value calculated from revenue
  properties: wet mass 1 kg, water content 0, carbon content, non-fossil 0, carbon content, fossil 0, water in wet mass 0 kg, carbon allocation 0 kg

## Inputs from technosphere
- wastewater from potato starch production: -0.00581085 m3; name wastewater_output; source Würdinger E. 2003; lognormal variance with pedigree 0.0407, pedigree (2,2,5,1,1)
  EcoSpold01Location=CH
  Literature Value.
  production volume 0.005811 m3
    Calculated from the production volume of potato starch in proportion to the respective output amounts.
  property price 0 EUR2005; name wastewater_output_price_EUR2005
  properties: wet mass 1000 kg, water content 1146.05, dry mass 0.871801 kg, carbon content, non-fossil 0.993118
  note on carbon content, non-fossil: COD= 2 kg/m3 (Tab A.19, ecoinvent v2.2 report 13_I). COD was converted to TOC, using conversion factors in Tab 4.10 (ecoinvent v2.2 report 13_IV). TOC was considered as Total Carbon.
- tap water: 3.7269 kg; name tap_water_input; source Würdinger E. 2003; lognormal variance with pedigree 0.0407, pedigree (2,2,5,1,1)
  Literature Value.
  EcoSpold01Location=RER
  properties: water content 2962.17, dry mass 0.000337476 kg, wet mass 1 kg, carbon content, fossil 0.00178991
  note on carbon content, fossil: Bicarbonate content is 2.93 mol/m3. CO2 content is 0.1 mol/m3 (ecoinvent v2.2 report 8, Tab 93.1).
- potato: 3.9199 kg; lognormal variance with pedigree 0.0407, pedigree (2,2,5,1,1)
  Literature Value.
  properties: wet mass 1 kg, carbon content, non-fossil 0.4282, dry mass 0.22 kg, water content 3.54545
- electricity, medium voltage: 0.167496 kWh; source Würdinger E. 2003; lognormal variance with pedigree 0.0407, pedigree (2,2,5,1,1)
  EcoSpold01Location=DE
  Literature Value.
- heat, district or industrial, natural gas: 1.62396 MJ; source Würdinger E. 2003; lognormal variance with pedigree 0.0407, pedigree (2,2,5,1,1)
  EcoSpold01Location=RER
  Literature Value.
- chemical factory, organics: 3.9999e-10 unit; lognormal variance with pedigree 0.3407, pedigree (2,2,5,1,1)
  Estimation. No data was found on the use of infrastructure. Therefore “chemical factory, organics” was used as a proxy.
  EcoSpold01Location=RER

## Emissions to nature
- Water [air, unspecified]: 0.000696222 m3; name water_to_air_unspecified; lognormal variance with pedigree 0.0807, pedigree (2,2,5,1,1)
  Calculated value based on literature values and expert opinion. See comments in the parametres' comment field. The potatoes entering the process from technosphare have 0.2 water in wet mass, i.e. 3.92kg of potatoes contain (3.92*0.2=) 0.784kg of water. Part of this amount of water evaporates, part is released back to environment as water emission to water.
  property fraction, origin: fresh water 1; name fraction_origin_fresh_water
  property fraction, origin: salt water 0; name fraction_origin_salt_water
  property fraction, origin: unspecified 0; name fraction_origin_unspecified

## Sampling procedure
Data based on a detailed literature study.

## Extrapolations
Potato production in Germany approximated by Swiss data.

## Review by Emilia Moreno Ruiz 2012-03-29
trainee DS; ok, Diego Lima Medeiros

## Review by Maggie Osses 2007-10-24
Passed.
