# packing, fibre cement product

Dataset: EcoSpold 2, unit process
Geography: CH
Time period: 2000-01-01 to 2019-12-31
Technology level: current
Classification: EcoSpold01Categories: construction materials/others
Classification: ISIC rev.4 ecoinvent: 8292:Packaging activities
Tags: ConvertedDataset
Scenario: Business-as-Usual
System model: Allocation at the point of substitution
Generated by: Daniel Kellenberger (obsolete)
Published in: Kellenberger D. 2007
Database: ecoinvent
isCopyrightProtected: true
accessRestrictedTo: 1

## General comment
This dataset represents the packing process of 1 kg of fibre cement products. Data is normalized toa a production of 20'000t/a, but it is assumed to be valid also for plants up to 100'000t/a. The lifespan of the infrastructure and the land occupation are assumed to be 50 years.
[This dataset was already contained in the ecoinvent database version 2. It was not individually updated during the transfer to ecoinvent version 3. Life Cycle Impact Assessment results may still have changed, as they are affected by changes in the supply chain, i.e. in other datasets. This dataset was generated following the ecoinvent quality guidelines for version 2. It may have been subject to central changes described in the ecoinvent version 3 change report (http://www.ecoinvent.org/database/ecoinvent-version-3/reports-of-changes/), and the results of the central updates were reviewed extensively. The changes added e.g. consistent water flows and other information throughout the database. The documentation of this dataset can be found in the ecoinvent reports of version 2, which are still available via the ecoinvent website. The change report linked above covers all central changes that were made during the conversion process.]

## Included activities start
Packing process starting from fibre cement products, unpacked.

## Included activities end
The activity ends with the packed product loaded in a pallet. The dataset includes the process (packing, transportation, and loading of the bags on paletts), the machines, the waste treatment after use by the end-user of the fibre cement products and the transports of the packing materials.

## Geography
Data is based on a Swiss company.

## Technology
The current Swiss technology is considered. The same packaging for lime products is assumed.

## Reference product
- packing, fibre cement product: 1 kg; CPC 85400: Packaging services; By-product classification allocatable product
  EcoSpold01Location=CH
  This modules considers the packing process for fibre cement products. Data is normalized to a production of 20'000t/a.
  production volume 0.0336675 kg
    This is a placeholder value that does not reflect real-world production volumes. This dataset does not currently require a real-world production volume to work in the database framework, and no actual data were collected yet. This has no negative effect on the results of the ecoinvent database. The placeholder value of this activity was scaled according to the nominal GDP of 2005 (source: United Nations, http://data.un.org/Glossary.aspx?q=GDP+%28current+US%24%29, accessed 20130726) to reflect an appropriate share of the global production volume, which is also a placeholder value.
  property price 0.00663083 EUR2005
    Calculated based on inputs: The price of the product has been calculated as a sum of the values of the material and energy inputs for this product. This value is therefore a rough estimation. It may underestimate the real price since there are additional expenses when producing any product. These expences can include for example labour costs, treatment of waste materials and profit for the producer. Please consider carefully whether this level of data quality is acceptable for your application.
  property true value 0.00663083
    allocation property applied in "true value" allocation // value calculated from revenue

## By-products
- electricity, for reuse in municipal waste incineration only: 0 kWh; CPC 17100: Electrical energy; By-product classification allocatable product; pedigree (1,1,1,1,1)
  Net electricity generated from this waste and used in internal MSWI plant energy redistribution.
  Uncertainty: uncertainty is calculated from uncertainties in waste composition and uncertainties in energy efficiency and the uncertainty in internal energy demand
  production volume 0.00536547 kWh
  property exergy 3.6 MJ; name E_el_prod_MSWI_exergy
    This exergy property is based on the exergy content of the product.
  property true value relation 3.6; name E_el_prod_MSWI_true_value_relation
    property to calculate "true value" from
  property price 0.1 EUR2005; name E_el_prod_MSWI_price_EUR2005
    Estimated to be the same price as in case of electricity, medium voltage.
  property true value 0.000691561
    allocation property applied in "true value" allocation // value calculated from true value relation
- heat, for reuse in municipal waste incineration only: 0 MJ; CPC 17300: Steam and hot water; By-product classification allocatable product; pedigree (1,1,1,1,1)
  Net useful heat generated from this waste and used in internal MSWI plant energy redistribution.
  Uncertainty: uncertainty is calculated from uncertainties in waste composition and uncertainties in energy efficiency and the uncertainty in internal energy demand
  production volume 0.0387046 MJ
  property true value relation 0.1842; name E_th_prod_MSWI_true_value_relation
    property to calculate "true value" from
  property exergy 0.1842 MJ; name E_th_prod_MSWI_exergy
    This exergy property is based on the exergy content of the product.
  property price 0.0106 EUR2005; name E_th_prod_MSWI_price_EUR2005
    Average European district heat price from Ecoheatcool and Euroheat 2005-2006, Ecoheat Work package 1: The European heat market. Final report. 10.6 EUR/GJ i s the price of district heat. http://www.solarthermalworld.org/files/Ecoheatcool%20WP1%20Web.pdf?download
  property true value 0.000255254
    (same comment as for electricity, for reuse in municipal waste incineration only)
- zinc concentrate: 0 kg; CPC 14290: Other non-ferrous metal ores and concentrates (other than uranium or thorium ores and concentrates); By-product classification allocatable product
  Calculated value from the knowledge of the properties of both products.
  production volume 9.91412e-7 kg
  property price 0.38 EUR2005; name ByP_price_EUR2005
    Temporary price data. Calculated as 90% of purchasers price based on: Zinc content in concentrate 53%. Concentrate price per kg Zn 86.5% of refined Zn price (13.5% treatment charges according to CHR Metals Limited 2005: Dynamic cost curves. http://www.minecost.com/dynamic.pdf). 2004 zinc price from USGS (2007) Mineral commodity summaries 2007. <http://minerals.usgs.gov/minerals/pubs/mcs/2007/mcs2007.pdf> [Accessed 25 May 2010]
  property zinc content 0.53; name zinc_C_zinc_concentrate
    Zinc content on a dry matter basis. Value taken from teh "zinc mine operation" /GLO dataset.
  property dry mass 1 kg; name DM_zinc_concentrate
  property carbon content 0
    carbon content on a dry matter basis (reserved; not for manual entry)
  property true value 3.76737e-7
    allocation property applied in "true value" allocation // value calculated from revenue
  properties: wet mass 1 kg, water content 0, carbon content, non-fossil 0, carbon content, fossil 0, water in wet mass 0 kg, carbon allocation 0 kg

## Inputs from technosphere
- kraft paper, unbleached: 0.00688631 kg; lognormal variance with pedigree 0.052025, pedigree (1,4,5,2,1)
  Estimation, based on company information. An average density of 800 kg/m3 is assumed.
  Information is from the company "Frantschach" by email at 05.06.02.
  EcoSpold01Location=RER
  properties: dry mass 0.945 kg, water content 0.0582011, wet mass 1 kg, carbon content, fossil 0.00202191, carbon content, non-fossil 0.416625
  note on carbon content, fossil: Fossil C content was calculated after fossil C contents of chemicals used in the production of the paper (in Tab 9.4 ecoinvent v2.2 report 11_III, part 9).
  note on carbon content, non-fossil: Biogenic C content was calculated after biogenic C contents of chemicals used in the production of the paper (in Tab 9.4 ecoinvent v2.2 report 11_III, part 9). The cellulose content in 1 kg of paper (on a wet mas basis) was estimated as (1-chemical content), C content of cellulose was considered 0.44 kgC/kg dry mass (ecoinvent v2.2 report, n 15a, pg 40)
- EUR-flat pallet: 8.75008e-5 unit; lognormal variance with pedigree 0.094, pedigree (4,5,5,1,3)
  EcoSpold01Location=RER
  Estimation, based on company information. An average density of 800 kg/m3 is assumed. The pallet is assumed to be used 10 times before being disposed. A loaded pallet has an area of 1m2 and a height of 1 m, having a loading weight of 800 kg. The weight of the pallet is 22 kg.
  Information is from the company "Frantschach" by email at 05.06.02.
  properties: carbon content, fossil 0.0311351, water content 0.2, carbon content, non-fossil 0.58833, wet mass 22 kg, dry mass 18.3333 kg
  note on carbon content, fossil: C content in components of the pallet (ecoinvent v2.2 report 7_part XVIII)
- section bar rolling, steel: 0.000962509 kg; source Weibel T. and Stritz A. 1995; lognormal variance with pedigree 0.0506, pedigree (2,1,5,1,1)
  EcoSpold01Location=RER
  Literature value.
- waste polyethylene: -0.000107626 kg; lognormal variance with pedigree 0.1786, pedigree (4,5,5,5,5)
  Estimation, based on company data. Waste plastic foil is incinerated.
  EcoSpold01Location=CH
  production volume 0.000123 kg
    Calculated from the production volume of packing, fibre cement product in proportion to the respective output amounts.
  properties: water content 0.00401606, dry mass 0.996 kg, wet mass 1 kg, carbon content, fossil 0.825301
  note on carbon content, fossil: C content in 1 kg DM was calculated using data in Tab A.1, ecoinvent v2.2 report 13_I
- steel, low-alloyed, hot rolled: 0.000962509 kg; source Weibel T. and Stritz A. 1995; lognormal variance with pedigree 0.0506, pedigree (2,1,5,1,1)
  Literature value.
  EcoSpold01Location=RER
  properties: carbon content, fossil 0.005, wet mass 1 kg, dry mass 1 kg
  note on carbon content, fossil: Low alloyed steel composition given in Tab. 3.2 ecoinvent v2.2 report 10_partII. Steel assumed to have a C content of 0.5%
- waste wood, untreated: -0.00255975 kg; lognormal variance with pedigree 0.094, pedigree (4,5,5,1,3)
  Estimation. The disposal of the pallets is considered.
  EcoSpold01Location=CH
  production volume 0.0029254 kg
    (same comment as for waste polyethylene)
  properties: water content 0.25, carbon content, non-fossil 0.48632, dry mass 0.8 kg, wet mass 1 kg
  note on carbon content, non-fossil: Tab A.4, ecoinvent v2.2 report 13_I. C content has been referred to 1 kg DM,
- industrial machine, heavy, unspecified: 5.25005e-5 kg; lognormal variance with pedigree 0.5, pedigree (5,5,5,5,5)
  Estimation, based on a visiting tour. A total weight of the machines of 30 t is assumed. The lifespan considered is 25 years. A total amount of 20.000t of packed material is assumed.
  EcoSpold01Location=RER
- packaging film, low density polyethylene: 8.61008e-5 kg; lognormal variance with pedigree 0.1786, pedigree (4,5,5,5,5)
  EcoSpold01Location=RER
  Estimation. An average density of 800 kg/m3 is assumed. The pallet is assumed to be used 10 times before being disposed. A loaded pallet has an area of 1m2 and a height of 1 m, having a loading weight of 1.000 kg. The weight of the pallet is 22 kg.
  Data is based on the information from the following website (accessed October 2003):
  http://www.dm-folien.de/hpage.htm
  properties: carbon content, fossil 0.857143, wet mass 1 kg, dry mass 1 kg
  note on carbon content, fossil: Polyethylene is formed out of a huge amount of ethylene monomers (C2H4) (ecoinvent v2.2 report 11_II). MW=28 g/mol
- conveyor belt: 2.18752e-8 m; lognormal variance with pedigree 0.5, pedigree (5,5,5,5,5)
  EcoSpold01Location=RER
  Estimation, based on a visiting tour. A length of conveyor belt of 10 m and a lifetime of 25 years are assumed.
- waste graphical paper: -0.00688631 kg; lognormal variance with pedigree 0.052025, pedigree (1,4,5,2,1)
  EcoSpold01Location=CH
  Estimation, based on company data. Waste paper bags are incinerated.
  production volume 0.00787 kg
    (same comment as for waste polyethylene)
  properties: water content 0.126126, dry mass 0.888 kg, wet mass 1 kg, carbon content, non-fossil 0.454955
- electricity, medium voltage: 0.00270377 kWh; lognormal variance with pedigree 0.0401, pedigree (1,2,5,1,1)
  EcoSpold01Location=CH
  Estimation, based on company information. Data is from the company KFN for the year 2001.

## Sampling procedure
Assumption

## Review by Roland Hischier 2011-09-22
Transfer of documentation done.

## Review by Roberto Dones 2005-07-19
passed
