# wind turbine network connection construction, 2MW, onshore

Dataset: EcoSpold 2, unit process
Geography: CA-QC
Time period: 2008-01-01 to 2019-12-31
Technology level: modern
Classification: ISIC rev.4 ecoinvent: 4220a: Construction of utility projects for electricity production, except for liquid fuels
Synonyms: grid connection
Tags: wind power; infrastructure
Scenario: Business-as-Usual
System model: Allocation at the point of substitution
Generated by: Pablo Tirado
Published in: Elsam Engineering A/S,Fredericia,Denmark 2004
Database: ecoinvent
isCopyrightProtected: true
accessRestrictedTo: 1

## General comment
This dataset represents the construction of the network connection for wind turbines with 2MW and 2.3MW capacities. This is a child dataset for Quebec based on the global dataset.
This connection connects one turbine to the electricity network.
The main components of a network connection of a wind turbine are the cables, the transformer and the sub-station with the circuit breaker and the electricity meter inside it. According to (European Communities 2001), electricity produced with wind turbines is connected to medium voltage or high voltage systems, depending on the size of the windfarm.

Sources:
European Communities. 2001. Wind Turbine Grid Connection and Interaction. Deutsches Windenergie-Institut /Tech-wise A/S /DM Energy, p. 7 Tab.2.1

## Included activities start
From the transformation of pasture land to industrial site, and from the reception and treatment of building materials.

## Included activities end
This activity ends with the decommissioning of the network connection and the treatment of the resulting materials at the end of the lifetime.

This dataset includes
- all main materials for the construcion of the network connection and their treatment
- excavation of the cable trench
- land transformation and use
- It is assumed that all parts will hold for the lifetime of 20 years and don't have to be replaced.

This dataset doesn't include
- neither the energy use for assembly of the different wind turbine parts nor their transportation from manufacture to the construction site
- auxiliary materials such as packaging materials or vacuum fleece.
- any losses of materials (waste) during the processing of the different wind turbine parts

## Geography
Global data used. Uncertainty has been adjusted accordingly

## Technology
10 kV-cables with a total length of 1000 m per turbine are assumed to be used for the connection to the electricity network. Image: Cable trench and characteristics of the onshore cable used for the connection of the offshore wind park [Ilskov H. (2003) Offshore work on the 150 kV substation and the submarine cable. In proceedings from: Eltra Day, October 22nd, 2003, Billund, Denmark]

## Parameters
- Percentage of onshore wind power plant class capacity on total: 1; name percentage_onshore_class_1to3; lognormal variance with pedigree 0.009325, pedigree (2,2,1,2,2)
  Statistics
- Installed capacity: 838.6 MW; name capacity_installed_new; = 253.6+585; lognormal variance with pedigree 0.0014, pedigree (2,1,2,1,1)
  Statistics. Total installed capacity in Quebec in 1999-2012 period
  Monteregie wind project 44turbinesX 2.3MW=101,2 MW
  Le Plateau wind power 60turbinesX 2.3MW=138,6 MW
  New Richmond 6turbines x 2.3MW= 13,8 MW
  Mont Louis 67 turbines x 2.05MW= 137MW
  Saint-Robert-Bellarmin Wind Farm 40 turbines x 2MW= 80MW
  Parc éolien du Massif du Sud 75 turbines x 2MW= 150MW
  Lac-Alfred wind farm (Phase I) 75 turbines x 2MW= 150MW
  New Richmond 33 turbines x 2.05MW= 68MW
  Source: http://www.canwea.ca/farms/wind-farms_e.php

## Reference product
- wind turbine network connection, 2MW, onshore: 1 unit; name network_connection; CPC 462: Electricity distribution and control apparatus, and parts thereof; By-product classification allocatable product
  production volume 419.3 unit; name apv_networkconn2MW; = capacity_installed_new* percentage_onshore_class_1to3/ network_connection_capacity_MW
    Calculated value. See parameters for a closer look at the values used.
  property price 546040 EUR2005; name network_connection_price_EUR2005
    Data from the report by PSI entitled "Ganzheitliche Betrachtung von Energiesystemen" dated 2005 (http://gabe.web.psi.ch/pdfs/PSI_Report/PSI-Bericht_05-04sc.pdf). The reports presents in Fig 5.7 (pg 146) the weight of the different system components in the wind power plant system. The network connection accounts for 14% of the total price while the the wind turbine itself represents 71% of the costs. The price of the wind turbine has already been calculated in ecoinvent (refer to product wind turbine, 2MW, onshore). Based on the ratio and the price of the wind turbine, the network connection is calculated.
  property capacity [MW] 2 MW; name network_connection_capacity_MW
    Literature value
  property true value 546040; name network_connection_true_value
    allocation property applied in "true value" allocation // value calculated from revenue

## By-products
- electricity, for reuse in municipal waste incineration only: 0 kWh; CPC 17100: Electrical energy; By-product classification allocatable product; pedigree (1,1,1,1,1)
  Net electricity generated from this waste and used in internal MSWI plant energy redistribution.
  Uncertainty: uncertainty is calculated from uncertainties in waste composition and uncertainties in energy efficiency and the uncertainty in internal energy demand
  production volume 575804 kWh
  property exergy 3.6 MJ; name E_el_prod_MSWI_exergy
    This exergy property is based on the exergy content of the product.
  property true value relation 3.6; name E_el_prod_MSWI_true_value_relation
    property to calculate "true value" from
  property price 0.1 EUR2005; name E_el_prod_MSWI_price_EUR2005
    Estimated to be the same price as in case of electricity, medium voltage.
  property true value 178.829
    allocation property applied in "true value" allocation // value calculated from true value relation
- heat, for reuse in municipal waste incineration only: 0 MJ; CPC 17300: Steam and hot water; By-product classification allocatable product; pedigree (1,1,1,1,1)
  (same comment as for electricity, for reuse in municipal waste incineration only)
  production volume 4.42044e6 MJ
  property true value relation 0.1842; name E_th_prod_MSWI_true_value_relation
    property to calculate "true value" from
  property exergy 0.1842 MJ; name E_th_prod_MSWI_exergy
    This exergy property is based on the exergy content of the product.
  property price 0.0106 EUR2005; name E_th_prod_MSWI_price_EUR2005
    Average European district heat price from Ecoheatcool and Euroheat 2005-2006, Ecoheat Work package 1: The European heat market. Final report. 10.6 EUR/GJ i s the price of district heat. http://www.solarthermalworld.org/files/Ecoheatcool%20WP1%20Web.pdf?download
  property true value 70.2453
    (same comment as for electricity, for reuse in municipal waste incineration only)
- iron scrap, unsorted: 0 kg; source European Aluminium Association 2008; CPC 39310: Slag, dross, scalings and other waste from the manufacture of iron or steel; By-product classification Recyclable; pedigree (1,1,1,1,1)
  Reported as "Iron scrap"
  production volume 848.609 kg
  property price 0.149 EUR2005; name ironScrapAmount_price_EUR2005
    Temporary price data. Calculated as 90% of purchasers price based on: estimated at 85% of sorted scrap
  property carbon content 0
    carbon content on a dry matter basis (reserved; not for manual entry)
  property true value 0.301557
    allocation property applied in "true value" allocation // value calculated from revenue
  properties: water content 0, water in wet mass 0 kg, dry mass 1 kg, carbon content, non-fossil 0, wet mass 1 kg, carbon content, fossil 0, carbon allocation 0 kg
- aluminium oxide, non-metallurgical: 0 kg; source European Aluminium Association 2008; CPC 41432: Alumina (aluminium oxide), except artificial corundum; By-product classification allocatable product; CAS 1344-28-1; pedigree (1,1,1,1,1)
  production volume 1727.43 kg
  property carbon content, non-fossil 0; name C_content_non_fossil
  property price 0.28 EUR2005; name Al2O3Amount_price_EUR2005
    From UN trade database. http://data.un.org/ Import data from the largest economies of the world are used (Brazil, India, USA, China, Japan and EU-27).
  property dry mass 1 kg; name DM
  property water content 0; name water_content
  property wet mass 1 kg; name WM
  property water in wet mass 0 kg; name WWM
  property carbon content, fossil 0; name C_content_fossil
  property carbon content 0
    carbon content on a dry matter basis (reserved; not for manual entry)
  property true value 1.15355
    allocation property applied in "true value" allocation // value calculated from revenue
  properties: carbon allocation 0 kg
- aluminium, cast alloy: 0 kg; source European Aluminium Association 2008; By-product classification allocatable product; CPC 41431: Unwrought aluminium; pedigree (1,1,1,1,1)
  EcoSpold01Location=RER
  production volume 16147.7 kg
  property price 1.3 EUR2005; name castAlloyAmount_price_EUR2005
  properties: water in wet mass 0 kg, carbon content, non-fossil 0, water content 0, dry mass 1 kg, carbon content, fossil 0, wet mass 1 kg, carbon content 0, carbon allocation 0 kg, true value 50.0644
- aluminium, wrought alloy: 0 kg; source European Aluminium Association 2008; By-product classification allocatable product; CPC 4153: Semi-finished products of aluminium or aluminium alloys; pedigree (1,1,1,1,1)
  production volume 7069.15 kg
  property price 1.44 EUR2005; name secondaryAluminiumOutput_price_EUR2005
  properties: wet mass 1 kg, water content 0, carbon content, fossil 0, water in wet mass 0 kg, carbon content, non-fossil 0, dry mass 1 kg, carbon content 0, carbon allocation 0 kg, true value 24.2775
- copper: 0 kg; source Rentz O. 1999; By-product classification allocatable product; CPC 41413: Refined copper and copper alloys, unwrought; master alloys of copper
  Literature value. Copper uses: Before end-use copper is manufactured into semi fabricated products, such as shapes and ingots (known as 'semis'). These manufacturing processes are subdivided into hot working, cold working and, if necessary, process annealing. Few of the semis are ready for use as such. They more typically travel to first-stage manufacturers, who make metal rods, wire, and casting, and then to component manufacturers who produce such things as motors, valves, and insulated cables The components in turn are incorporated by final-stage manufacturers into a variety of finished products - automobiles, commercial buildings, residential housing, and so forth. These uses account for about 79% of the world-wide consumption of copper.
  production volume 25860.1 kg
  properties: dry mass 1 kg, water in wet mass 0 kg, wet mass 1 kg, carbon content, non-fossil 0, water content 0, price 5.52 EUR2005, carbon content, fossil 0, carbon content 0, carbon allocation 0 kg, true value 340.443
- zinc concentrate: 0 kg; CPC 14290: Other non-ferrous metal ores and concentrates (other than uranium or thorium ores and concentrates); By-product classification allocatable product
  Calculated value from the knowledge of the properties of both products.
  production volume 0.0144857 kg
  property price 0.38 EUR2005; name ByP_price_EUR2005
    Temporary price data. Calculated as 90% of purchasers price based on: Zinc content in concentrate 53%. Concentrate price per kg Zn 86.5% of refined Zn price (13.5% treatment charges according to CHR Metals Limited 2005: Dynamic cost curves. http://www.minecost.com/dynamic.pdf). 2004 zinc price from USGS (2007) Mineral commodity summaries 2007. <http://minerals.usgs.gov/minerals/pubs/mcs/2007/mcs2007.pdf> [Accessed 25 May 2010]
  property zinc content 0.53; name zinc_C_zinc_concentrate
    Zinc content on a dry matter basis. Value taken from teh "zinc mine operation" /GLO dataset.
  property dry mass 1 kg; name DM_zinc_concentrate
  property carbon content 0
    carbon content on a dry matter basis (reserved; not for manual entry)
  property true value 1.3128e-5
    allocation property applied in "true value" allocation // value calculated from revenue
  properties: wet mass 1 kg, water content 0, carbon content, non-fossil 0, carbon content, fossil 0, water in wet mass 0 kg, carbon allocation 0 kg
- iron scrap, sorted, pressed: 0 kg; By-product classification Recyclable; CPC 39310: Slag, dross, scalings and other waste from the manufacture of iron or steel; pedigree (1,1,1,1,1)
  metallic iron scrap removed from ash reamains and recycled.
  Uncertainty: uncertainty is calculated from uncertainties in waste composition and transfer coefficients to soild residues
  production volume 0.0885918 kg
  property price 0.175 EUR2005
    Temporary price data. Calculated as 90% of purchasers price based on: 2005 import and export prices (total trades (USD) divided by total weight (kg) in biggest economies of the world: EU27, USA, Brasil, China, India, Japan and Russia) from UN Commodity Trade Statistics Database (http://data.un.org/Explorer.aspxDatabase [Accessed 2011.06.20]). Commodity: Waste or scrap, of cast iron
  property carbon content 0
    carbon content on a dry matter basis (reserved; not for manual entry)
  property true value 3.69749e-5
    allocation property applied in "true value" allocation // value calculated from revenue
  properties: carbon content, non-fossil 0, wet mass 1 kg, dry mass 1 kg, water content 0, carbon content, fossil 0, water in wet mass 0 kg, carbon allocation 0 kg

## Inputs from technosphere
- aluminium, cast alloy: 23.012 kg; name alu_cast; = 0.32*1000*0.072; source Elsam Engineering A/S,Fredericia,Denmark 2004, p. p. 25, Tab. 5.3; lognormal variance with pedigree 0.051625, pedigree (2,4,5,2,3)
  Literature value/calculated value and own assumptions. Elements of the 1000m cable (0.072 kg/m).
  The shares of cast alloy and wrought alloy aluminium in the cancelled ecoinvent v2 "aluminium production mix" dataset amounted to 32% (cast alloy) and 68% (wrought alloy) respectively. These shares have been overtaken to distribute the original amount of 72 kg aluminium.
  Uncertainty: estimated variance. slightly higher technological score because of the split of the aluminium use in the two aluminium types.
  properties: dry mass 1 kg, wet mass 1 kg
- aluminium, wrought alloy: 48.9004 kg; name alu_wrought; = 0.68*1000*0.072; source Elsam Engineering A/S,Fredericia,Denmark 2004, p. p. 25, Tab. 5.3; lognormal variance with pedigree 0.051625, pedigree (2,4,5,2,3)
  (same comment as for aluminium, cast alloy)
  properties: dry mass 1 kg, wet mass 1 kg
- waste wire plastic: -1375.32 kg; name waste_wirepla; = (hdpe)*-1; lognormal variance with pedigree 0.008, pedigree (1,1,4,1,1)
  Calculated value
  production volume 577376 kg; = apv_networkconn2MW * waste_wirepla/ network_connection
    Calculated from production volume of reference product using the relative outputs.
  property lifetime 20 year; name waste_wirepla_lifetime
  property price 0 EUR2005; name waste_wirepla_price_EUR2005
  properties: dry mass 0.9645 kg, wet mass 1 kg, water content 0.0368066, carbon content, fossil 0.549508
  note on carbon content, fossil: C content in 1 kg DM was calculated using data in Tab A.6, ecoinvent v2.2 report 13_I
- wire drawing, copper: 253.691 kg; = copper; source Elsam Engineering A/S,Fredericia,Denmark 2004; lognormal variance with pedigree 0.008, pedigree (1,1,4,1,1)
  Calculated value
- aluminium scrap, post-consumer: -71.9124 kg; name scrap_alu; = (alu_cast+alu_wrought)*-1; lognormal variance with pedigree 0.008, pedigree (1,1,4,1,1)
  Calculated value
  production volume 30189.6 kg; = apv_networkconn2MW * (scrap_alu / network_connection)
    Calculated from production volume of reference product using the relative outputs.
  property price 0.685 EUR2005; name scrap_alu_price_EUR2005
  property lifetime 20 year; name scrap_alu_lifetime
  properties: wet mass 1 kg, dry mass 1 kg
- polyethylene, high density, granulate: 1375.32 kg; name hdpe; = 11016/8; source Elsam Engineering A/S,Fredericia,Denmark 2004, p. p. 25, Tab. 5.3; lognormal variance with pedigree 0.051625, pedigree (2,4,5,2,3)
  Literature value. One element of the cable are unspecified plastics, assumed to be polyethylene (1.38 kg/m)
  The original value in the given source is valid for a whole wind power plant with 8 wind turbines and therefore has to be divided by 8.
  Uncertainty: estimated variance
  properties: carbon content, fossil 0.857143, dry mass 1 kg, wet mass 1 kg
  note on carbon content, fossil: Polyethylene is formed out of a huge amount of ethylene monomers (C2H4) (ecoinvent v2.2 report 11_II). MW=28 g/mol
- sheet rolling, aluminium: 71.9124 kg; = alu_cast+alu_wrought; source Elsam Engineering A/S,Fredericia,Denmark 2004; lognormal variance with pedigree 0.008, pedigree (1,1,4,1,1)
  Proxy for wire drawing of aluminium.
- waste polyethylene: -1375.32 kg; name waste_polyethylene; = (hdpe)*-1; lognormal variance with pedigree 0.008, pedigree (1,1,4,1,1)
  production volume 577376 kg; = apv_networkconn2MW * ( waste_polyethylene) / network_connection
    Calculated from production volume of reference product using the relative outputs.
  property price 0 EUR2005; name waste_polyethylene_price_EUR2005
  property lifetime 20 year; name waste_polyethylene_lifetime
  properties: water content 0.00401606, carbon content, fossil 0.825301, dry mass 0.996 kg, wet mass 1 kg
  note on carbon content, fossil: C content in 1 kg DM was calculated using data in Tab A.1, ecoinvent v2.2 report 13_I
- scrap copper: -253.691 kg; name scrap_copper; = (copper)*-1; lognormal variance with pedigree 0.008, pedigree (1,1,4,1,1)
  Calculated value
  production volume 106502 kg; = apv_networkconn2MW * (scrap_copper/ network_connection)
    Calculated from production volume of reference product using the relative outputs.
  property lifetime 20 year; name lifetime
  property price 0 EUR2005; name scrap_copper_price_EUR2005
  properties: dry mass 1 kg, wet mass 1 kg
- copper: 253.691 kg; = 2032/8; source Elsam Engineering A/S,Fredericia,Denmark 2004, p. p. 25, Tab. 5.3; lognormal variance with pedigree 0.051625, pedigree (2,4,5,2,3)
  Literature value and own assumptions. Used in the cables. The conductor of the cable is made of copper with a diameter of 6.4 mm, which gives a conductor cross-section of 32.2 mm2 and a weight of 0.25 kg/m.
  The original value in the given source is valid for a whole wind power plant with 8 wind turbines and therefore has to be divided by 8.
  Uncertainty: estimated variance
  properties: wet mass 1 kg, dry mass 1 kg
- excavation, hydraulic digger: 1398.3 m3; = 1*1.4*1000; source Elsam Engineering A/S,Fredericia,Denmark 2004; lognormal variance with pedigree 0.059025, pedigree (4,4,5,2,3)
  Literature value and own assumptions. The excavated cable channel is assumed to have a width of 1 m and a depth of 1.4 m for a length of 1000 m
  Uncertainty: estimated variance

## Inputs from nature
- Transformation, to industrial area [natural resource, land]: 998.783 m2; = land_from; lognormal variance with pedigree 0.008, pedigree (1,1,4,1,1)
  Literature value
- Occupation, industrial area [natural resource, land]: 19975.7 m2*year; = land_from*lifetime; lognormal variance with pedigree 0.008, pedigree (1,1,4,1,1)
  Literature value
- Transformation, from pasture, man made [natural resource, land]: 998.783 m2; name land_from; source Elsam Engineering A/S,Fredericia,Denmark 2004; lognormal variance with pedigree 0.059025, pedigree (4,4,5,2,3)
  Literature value. The excavated cable channel is assumed to have a width of 1 m and a depth of 1.4 m for a length of 1000m.
  Uncertainty: estimated variance

## Sampling procedure
Estimations

## Extrapolations
This is a child dataset for Quebec based on the global dataset. Uncertainty has been adjusted accordingly

This dataset valid for 2MW onshore wind turbine network connections is based on one single type of a 2MW onshore wind turbine (Vestas 2MW wind turbine; where Vestas held a market share of ca.20% in the wind turbine market in 2001/02 (Chataignère et al. 2003)).

[Chataignere A. and Le Boulch D. (2003) Wind Turbine Systems. Final report ECLIPSE. EDF R&D, Clamart Cedex, France.]

## Review by Christian Bauer 2014-02-20
This dataset was thoroughfully reviewed and complies with the Data Quality Guidelines.

## Review by Bo Weidema 2012-02-23
This dataset has only been reviewed by two editors.

## Review by Carl Vadenbo 2012-02-23
The dataset were found to meet the quality guidelines for the ecoinvent database on 2012.04.06.

Improvements in the following areas/aspects are recommended for future revisions in order to strenghen the overall quality of the dataset:
-energy use and emissions arising during the manufacturing process of the components and during the final assembly;
-material losses during manufacturing
-packaging materials;
-transport of components between the location of the manufacturing processes and the site of the installation;
