# treatment of waste polystyrene, unsanitary landfill, dry infiltration class (100mm)

Dataset: EcoSpold 2, unit process
Geography: GLO
Time period: 2006-01-01 to 2019-12-31
Technology level: current
Classification: ISIC rev.4 ecoinvent: 3821:Treatment and disposal of non-hazardous waste
Synonyms: municipal waste landfill
Scenario: Business-as-Usual
System model: Allocation at the point of substitution
Share of production covered: 1 %
Generated by: Avraam Symeonidis
Database: ecoinvent
isCopyrightProtected: true
accessRestrictedTo: 1

## General comment
This dataset represents the activity of waste disposal of waste polystyrene in a unsanitary landfill. Recommended use of this dataset: For PS, which goes to disposal as part of managed communal waste mixture. For Expanded PS (EPS) use other dataset. // Waste composition (wet, in ppm): upper heating value 38.88 MJ/kg; lower heating value 38.67 MJ/kg; H2O 2000; O 38852; H 78046; C 868490; S 678.75; N 1942.6; P n.a.; B n.a.; Cl 1132.1; Br 882.12; F 14.25; I n.a.; Ag n.a.; As 1.8418; Ba 180.79; Cd 23.336; Co 30.622; Cr 39.613; Cu 107.56; Hg 0.82311; Mn 77.469; Mo n.a.; Ni 19.968; Pb 14.935; Sb 41.65; Se 2.0357; Sn 25.403; V 279.32; Zn 834.61; Be 0.48468; Sc n.a.; Sr 85.789; Ti 969.36; Tl 0.38774; W n.a.; Si n.a.; Fe 3611.5; Ca n.a.; Al 193.87; K n.a.; Mg n.a.; Na 1420.6; . // Share of carbon in waste that is biogenic 0%. Share of metals in waste not oxidised and bulk-recyclable (exclude very small or thin parts) Iron: 0%; Alu: 0%; Copper: 0%. Overall degradability of waste during 100 years: 1%.

## Included activities start
from final waste deposition (without transports to the site)

## Included activities end
Waste-specific short-term emissions to air via landfill gas and landfill leachate. Waste-specific long-term emissions from landfill.

## Geography
Given name of landfill location is 'infiltration class 2 dry (2018)'. Landfill site with mean annual temperature (MAT) of 8 degC, mean annual precipitation (MAP) of 550 mm/year, and net infiltration of 100 mm/year.
Climate adjustments result in an alpha t (temperature) for permafrost areas of 0.999. Total climate adjustments with alpha pt of 0.999.

## Technology
This is an inventory for an unsanitary, sub-controlled landfill for municipal solid waste. Ultimate average landfill height is 15 meters. Operation phase duration is 25 years.Percentage of landfill gas directly emitted is 100w%.
Leachate of the landfill is not treated. Based on average waste composition and climate data the end of carbonate phase is estimated to be reached 16577 years after waste deposition.

## Reference product
- waste polystyrene: -1 kg; By-product classification Waste; CPC 39270: Waste, parings and scrap of plastics; CAS 9003-53-6; pedigree (1,1,1,1,1)
  main reference product of this activity (supply of disposal service).
  Uncertainty: Uncertainty is not adjusted, as this is the refence product
  production volume 1 kg
    The amount of the annual production volume is a placeholder value. The contribution of this technology to the different local markets can be found in the markets themselves.
  property price 0 EUR2005
    Waste products are assigned a price of zero as they are assumed to require further treatment.
  property carbon content 0.87023
    carbon content on a dry matter basis (reserved; not for manual entry)
  properties: thallium content 3.8852e-7, oxygen content 0.03893, lead content 1.4965e-5, mercury content 8.2476e-7, water content 0.002004, chromium content 3.9692e-5, antimony content 4.1734e-5, sodium content 0.0014234, dry mass 0.998 kg, water in wet mass 0.002 kg, cobalt content 3.0684e-5, aluminium content 0.00019426, tin content 2.5454e-5, strontium content 8.596e-5, vanadium content 0.00027988, wet mass 1 kg, hydrogen content 0.078203, beryllium content 4.8565e-7, titanium content 0.0009713, carbon content, fossil 0.87023, chlorine content 0.0011344, arsenic content 1.8455e-6, iron content 0.0036188, bromine content 0.00088389, cadmium content 2.3383e-5, nickel content 2.0008e-5, barium content 0.00018115, fluorine content 1.4278e-5, zinc content 0.00083628, nitrogen content 0.0019465, heating value, net 38.673 MJ, heating value, gross 38.884 MJ, manganese content 7.7625e-5, copper content 0.00010778, selenium content 2.0397e-6, sulfur content 0.00068011, carbon allocation 0.86849 kg

## Inputs from technosphere
- excavation, skid-steer loader: 0.00031708 m3; lognormal variance with pedigree 0.082256, pedigree (1,1,3,1,1)
  application of daily cover.
  Uncertainty: Uncertainty calculated from uncertainty in base parameters.
- diesel, burned in building machine: 0.046738 MJ; lognormal variance with pedigree 0.082256, pedigree (1,1,3,1,1)
  for waste distribution and compaction.
  Uncertainty: Uncertainty calculated from uncertainty in base parameters.

## Emissions to nature
- Thallium [water, ground-, long-term]: 3.8752e-7 kg; lognormal variance with pedigree 0.42488, pedigree (1,1,3,1,1)
  Emissions from long-term leachate (>100a) directly from MSW landfill and indirectly via incineration of treatement sludge from leachate treatement.
  Uncertainty: Uncertainty calculated depending on waste input and uncertainty of long-term transfer coefficents in landfill.
- TOC, Total Organic Carbon [water, ground-]: 0.00025266 kg; lognormal variance with pedigree 0.20576, pedigree (1,1,3,1,1)
  burden from short-term leachate to groundwater in uncontrolled landfill in moist cimate.
  Uncertainty: Uncertainty calculated from unertainty of the waste composition of this waste, uncertainty in waste decomposition and short-term leaching in landfill
- Strontium [water, ground-, long-term]: 8.5739e-5 kg; lognormal variance with pedigree 0.24761, pedigree (1,1,3,1,1)
  (same comment as for Thallium)
- BOD5, Biological Oxygen Demand [water, ground-]: 6.542e-5 kg; lognormal variance with pedigree 0.20576, pedigree (1,1,3,1,1)
  (same comment as for TOC, Total Organic Carbon)
- Beryllium [water, ground-, long-term]: 4.844e-7 kg; lognormal variance with pedigree 0.41772, pedigree (1,1,3,1,1)
  (same comment as for Thallium)
- Heat, waste [water, ground-, long-term]: 38.496 MJ; lognormal variance with pedigree 0.014651, pedigree (1,1,3,1,1)
  burden from long-term decomposition of waste (>100a).
  Uncertainty: Uncertainty calculated from unertainty of the waste composition of this waste, uncertainty in waste decomposition and short-term leaching in landfill
- Zinc, ion [water, ground-, long-term]: 0.00083421 kg; lognormal variance with pedigree 0.17231, pedigree (1,1,3,1,1)
  (same comment as for Thallium)
- Heat, waste [soil, industrial]: 0.24777 MJ; lognormal variance with pedigree 0.077834, pedigree (1,1,3,1,1)
  burden from short-term decomposition of waste (0-100a).
  Uncertainty: Uncertainty calculated from unertainty of the waste composition of this waste, uncertainty in waste decomposition and short-term leaching in landfill
- Vanadium, ion [water, ground-, long-term]: 0.00019245 kg; lognormal variance with pedigree 0.21704, pedigree (1,1,3,1,1)
  (same comment as for Thallium)
- COD, Chemical Oxygen Demand [water, ground-]: 0.00027634 kg; lognormal variance with pedigree 0.20576, pedigree (1,1,3,1,1)
  (same comment as for TOC, Total Organic Carbon)
- Selenium [water, ground-, long-term]: 1.374e-6 kg; lognormal variance with pedigree 0.3809, pedigree (1,1,3,1,1)
  (same comment as for Thallium)
- Thallium [air, non-urban air or from high stacks]: 5.6289e-14 kg; lognormal variance with pedigree 0.87643, pedigree (1,1,3,1,1)
  burden from direct release or incineration of landfill biogas; or windblown leachate evaporite in arid climates.
  Uncertainty: Uncertainty calculated from unertainty of the waste composition of this waste, uncertainty in waste decomposition and short-term leaching in landfill
- Tin, ion [water, ground-, long-term]: 2.5401e-5 kg; lognormal variance with pedigree 0.28809, pedigree (1,1,3,1,1)
  (same comment as for Thallium)
- Iron [air, non-urban air or from high stacks]: 1.2387e-10 kg; lognormal variance with pedigree 0.62184, pedigree (1,1,3,1,1)
  (same comment as for Thallium)
- Antimony [water, ground-, long-term]: 1.2558e-5 kg; lognormal variance with pedigree 0.36146, pedigree (1,1,3,1,1)
  (same comment as for Thallium)
- Aluminium [air, non-urban air or from high stacks]: 2.4199e-11 kg; lognormal variance with pedigree 0.6768, pedigree (1,1,3,1,1)
  (same comment as for Thallium)
- Sodium, ion [water, ground-]: 5.8719e-5 kg; lognormal variance with pedigree 0.20636, pedigree (1,1,3,1,1)
  (same comment as for TOC, Total Organic Carbon)
- Manganese [water, ground-, long-term]: 7.6583e-5 kg; lognormal variance with pedigree 0.25101, pedigree (1,1,3,1,1)
  (same comment as for Thallium)
- Sodium [air, non-urban air or from high stacks]: 1.468e-8 kg; lognormal variance with pedigree 0.46888, pedigree (1,1,3,1,1)
  (same comment as for Thallium)
- Iron, ion [water, ground-]: 4.9547e-7 kg; lognormal variance with pedigree 0.3536, pedigree (1,1,3,1,1)
  (same comment as for TOC, Total Organic Carbon)
- Nickel, ion [water, ground-, long-term]: 1.9956e-5 kg; lognormal variance with pedigree 0.29608, pedigree (1,1,3,1,1)
  (same comment as for Thallium)
- Strontium [air, non-urban air or from high stacks]: 1.2454e-11 kg; lognormal variance with pedigree 0.69916, pedigree (1,1,3,1,1)
  (same comment as for Thallium)
- Aluminium [water, ground-]: 9.6797e-8 kg; lognormal variance with pedigree 0.40635, pedigree (1,1,3,1,1)
  (same comment as for TOC, Total Organic Carbon)
- Lead [water, ground-, long-term]: 1.4934e-5 kg; lognormal variance with pedigree 0.3057, pedigree (1,1,3,1,1)
  (same comment as for Thallium)
- Titanium [air, non-urban air or from high stacks]: 1.21e-10 kg; lognormal variance with pedigree 0.62373, pedigree (1,1,3,1,1)
  (same comment as for Thallium)
- Thallium [water, ground-]: 2.2516e-10 kg; lognormal variance with pedigree 0.60579, pedigree (1,1,3,1,1)
  (same comment as for TOC, Total Organic Carbon)
- Mercury [water, ground-, long-term]: 8.2232e-7 kg; lognormal variance with pedigree 0.40065, pedigree (1,1,3,1,1)
  (same comment as for Thallium)
- Beryllium [air, non-urban air or from high stacks]: 7.0362e-14 kg; lognormal variance with pedigree 0.86927, pedigree (1,1,3,1,1)
  (same comment as for Thallium)
- Titanium, ion [water, ground-]: 4.8398e-7 kg; lognormal variance with pedigree 0.35327, pedigree (1,1,3,1,1)
  (same comment as for TOC, Total Organic Carbon)
- Copper, ion [water, ground-, long-term]: 0.00010756 kg; lognormal variance with pedigree 0.24008, pedigree (1,1,3,1,1)
  (same comment as for Thallium)
- Zinc [air, non-urban air or from high stacks]: 8.7758e-11 kg; lognormal variance with pedigree 0.63401, pedigree (1,1,3,1,1)
  (same comment as for Thallium)
- Vanadium, ion [water, ground-]: 2.9421e-7 kg; lognormal variance with pedigree 0.36991, pedigree (1,1,3,1,1)
  (same comment as for TOC, Total Organic Carbon)
- Barium [water, ground-, long-term]: 0.00017872 kg; lognormal variance with pedigree 0.22282, pedigree (1,1,3,1,1)
  (same comment as for Thallium)
- Vanadium [air, non-urban air or from high stacks]: 7.3552e-11 kg; lognormal variance with pedigree 0.64108, pedigree (1,1,3,1,1)
  (same comment as for Thallium)
- Beryllium [water, ground-]: 2.8145e-10 kg; lognormal variance with pedigree 0.59863, pedigree (1,1,3,1,1)
  (same comment as for TOC, Total Organic Carbon)
- Cadmium, ion [water, ground-, long-term]: 2.3295e-5 kg; lognormal variance with pedigree 0.2909, pedigree (1,1,3,1,1)
  (same comment as for Thallium)
- Tin [air, non-urban air or from high stacks]: 3.7378e-13 kg; lognormal variance with pedigree 0.81084, pedigree (1,1,3,1,1)
  (same comment as for Thallium)
- Zinc, ion [water, ground-]: 3.9491e-7 kg; lognormal variance with pedigree 0.35993, pedigree (1,1,3,1,1)
  (same comment as for TOC, Total Organic Carbon)
- Chromium VI [water, ground-, long-term]: 6.0661e-7 kg; lognormal variance with pedigree 1.3648, pedigree (1,1,3,1,1)
  (same comment as for Thallium)
- Selenium [air, non-urban air or from high stacks]: 5.3604e-13 kg; lognormal variance with pedigree 0.80395, pedigree (1,1,3,1,1)
  (same comment as for Thallium)
- Strontium [water, ground-]: 4.9816e-8 kg; lognormal variance with pedigree 0.42852, pedigree (1,1,3,1,1)
  (same comment as for TOC, Total Organic Carbon)
- Cobalt [water, ground-, long-term]: 3.0524e-5 kg; lognormal variance with pedigree 0.28188, pedigree (1,1,3,1,1)
  (same comment as for Thallium)
- Antimony [air, non-urban air or from high stacks]: 1.0967e-11 kg; lognormal variance with pedigree 0.70435, pedigree (1,1,3,1,1)
  (same comment as for Thallium)
- Tin, ion [water, ground-]: 1.4951e-9 kg; lognormal variance with pedigree 0.54452, pedigree (1,1,3,1,1)
  (same comment as for TOC, Total Organic Carbon)
- Arsenic, ion [water, ground-, long-term]: 1.8384e-6 kg; lognormal variance with pedigree 0.37451, pedigree (1,1,3,1,1)
  (same comment as for Thallium)
- Lead [air, non-urban air or from high stacks]: 2.9299e-13 kg; lognormal variance with pedigree 0.81962, pedigree (1,1,3,1,1)
  (same comment as for Thallium)
- Selenium [water, ground-]: 2.1441e-9 kg; lognormal variance with pedigree 0.53278, pedigree (1,1,3,1,1)
  (same comment as for TOC, Total Organic Carbon)
- Fluoride [water, ground-, long-term]: 1.4185e-5 kg; lognormal variance with pedigree 0.30726, pedigree (1,1,3,1,1)
  (same comment as for Thallium)
- Manganese [air, non-urban air or from high stacks]: 2.2155e-10 kg; lognormal variance with pedigree 0.60694, pedigree (1,1,3,1,1)
  (same comment as for Thallium)
- Lead [water, ground-]: 8.7897e-10 kg; lognormal variance with pedigree 0.56214, pedigree (1,1,3,1,1)
  (same comment as for TOC, Total Organic Carbon)
- Nitrate [water, ground-, long-term]: 8.1222e-5 kg; lognormal variance with pedigree 0.14492, pedigree (1,1,3,1,1)
  (same comment as for Thallium)
- Nickel [air, non-urban air or from high stacks]: 2.8988e-12 kg; lognormal variance with pedigree 0.74763, pedigree (1,1,3,1,1)
  (same comment as for Thallium)
- Antimony [water, ground-]: 4.387e-8 kg; lognormal variance with pedigree 0.43318, pedigree (1,1,3,1,1)
  (same comment as for TOC, Total Organic Carbon)
- Bromine [water, ground-, long-term]: 0.00085962 kg; lognormal variance with pedigree 0.17051, pedigree (1,1,3,1,1)
  (same comment as for Thallium)
- Mercury [air, non-urban air or from high stacks]: 2.2527e-10 kg; lognormal variance with pedigree 0.60627, pedigree (1,1,3,1,1)
  (same comment as for Thallium)
- Manganese [water, ground-]: 8.862e-7 kg; lognormal variance with pedigree 0.33815, pedigree (1,1,3,1,1)
  (same comment as for TOC, Total Organic Carbon)
- Chloride [water, ground-, long-term]: 0.0011032 kg; lognormal variance with pedigree 0.16238, pedigree (1,1,3,1,1)
  (same comment as for Thallium)
- Copper [air, non-urban air or from high stacks]: 1.5031e-12 kg; lognormal variance with pedigree 0.76441, pedigree (1,1,3,1,1)
  (same comment as for Thallium)
- Mercury [water, ground-]: 5.6317e-10 kg; lognormal variance with pedigree 0.57621, pedigree (1,1,3,1,1)
  (same comment as for TOC, Total Organic Carbon)
- Nitrite [water, ground-, long-term]: 4.2036e-5 kg; lognormal variance with pedigree 0.14492, pedigree (1,1,3,1,1)
  (same comment as for Thallium)
- Barium [air, non-urban air or from high stacks]: 5.1702e-10 kg; lognormal variance with pedigree 0.57875, pedigree (1,1,3,1,1)
  (same comment as for Thallium)
- Nickel, ion [water, ground-]: 1.1595e-8 kg; lognormal variance with pedigree 0.47699, pedigree (1,1,3,1,1)
  (same comment as for TOC, Total Organic Carbon)
- Ammonium, ion [water, ground-, long-term]: 0.00077233 kg; lognormal variance with pedigree 0.14492, pedigree (1,1,3,1,1)
  (same comment as for Thallium)
- Chromium [air, non-urban air or from high stacks]: 1.1275e-12 kg; lognormal variance with pedigree 0.77576, pedigree (1,1,3,1,1)
  (same comment as for Thallium)
- Copper, ion [water, ground-]: 5.261e-9 kg; lognormal variance with pedigree 0.50264, pedigree (1,1,3,1,1)
  (same comment as for TOC, Total Organic Carbon)
- Nitrogen, organic bound [water, ground-, long-term]: 0.0012623 kg; lognormal variance with pedigree 0.14492, pedigree (1,1,3,1,1)
  (same comment as for Thallium)
- Cadmium [air, non-urban air or from high stacks]: 2.7343e-10 kg; lognormal variance with pedigree 0.60066, pedigree (1,1,3,1,1)
  (same comment as for Thallium)
- Chromium VI [water, ground-]: 4.51e-9 kg; lognormal variance with pedigree 0.50792, pedigree (1,1,3,1,1)
  (same comment as for TOC, Total Organic Carbon)
- Hydrogen sulfide [water, ground-, long-term]: 4.9224e-5 kg; lognormal variance with pedigree 0.17908, pedigree (1,1,3,1,1)
  (same comment as for Thallium)
- Cobalt [air, non-urban air or from high stacks]: 2.4577e-11 kg; lognormal variance with pedigree 0.67895, pedigree (1,1,3,1,1)
  (same comment as for Thallium)
- Cadmium, ion [water, ground-]: 4.1014e-8 kg; lognormal variance with pedigree 0.43595, pedigree (1,1,3,1,1)
  (same comment as for TOC, Total Organic Carbon)
- Sulfate [water, ground-, long-term]: 0.0018884 kg; lognormal variance with pedigree 0.17908, pedigree (1,1,3,1,1)
  (same comment as for Thallium)
- Arsenic [air, non-urban air or from high stacks]: 4.632e-11 kg; lognormal variance with pedigree 0.65908, pedigree (1,1,3,1,1)
  (same comment as for Thallium)
- Arsenic, ion [water, ground-]: 3.3042e-9 kg; lognormal variance with pedigree 0.5189, pedigree (1,1,3,1,1)
  (same comment as for TOC, Total Organic Carbon)
- DOC, Dissolved Organic Carbon [water, ground-, long-term]: 0.85982 kg; lognormal variance with pedigree 0.00216185, pedigree (1,1,3,1,1)
  (same comment as for Thallium)
- Hydrogen fluoride [air, non-urban air or from high stacks]: 5.6733e-8 kg; lognormal variance with pedigree 0.42806, pedigree (1,1,3,1,1)
  (same comment as for Thallium)
- Barium [water, ground-]: 2.0681e-6 kg; lognormal variance with pedigree 0.30996, pedigree (1,1,3,1,1)
  (same comment as for TOC, Total Organic Carbon)
- COD, Chemical Oxygen Demand [water, ground-, long-term]: 0.94042 kg; lognormal variance with pedigree 0.00216185, pedigree (1,1,3,1,1)
  (same comment as for Thallium)
- Bromine [air, non-urban air or from high stacks]: 3.1104e-7 kg; lognormal variance with pedigree 0.36777, pedigree (1,1,3,1,1)
  (same comment as for Thallium)
- Cobalt [water, ground-]: 9.8309e-8 kg; lognormal variance with pedigree 0.40781, pedigree (1,1,3,1,1)
  (same comment as for TOC, Total Organic Carbon)
- BOD5, Biological Oxygen Demand [water, ground-, long-term]: 0.22263 kg; lognormal variance with pedigree 0.00216185, pedigree (1,1,3,1,1)
  (same comment as for Thallium)
- Nitrogen oxides [air, non-urban air or from high stacks]: 2.6612e-8 kg; lognormal variance with pedigree 0.30385, pedigree (1,1,3,1,1)
  burden from direct release or incineration of landfill biogas.
  Uncertainty: Uncertainty calculated from unertainty of the waste composition of this waste, uncertainty in waste decomposition and short-term leaching in landfill
- Fluoride [water, ground-]: 1.0456e-8 kg; lognormal variance with pedigree 0.48054, pedigree (1,1,3,1,1)
  (same comment as for TOC, Total Organic Carbon)
- TOC, Total Organic Carbon [water, ground-, long-term]: 0.85982 kg; lognormal variance with pedigree 0.00216185, pedigree (1,1,3,1,1)
  (same comment as for Thallium)
- Hydrogen chloride [air, non-urban air or from high stacks]: 4.1045e-7 kg; lognormal variance with pedigree 0.35964, pedigree (1,1,3,1,1)
  (same comment as for Thallium)
- Bromine [water, ground-]: 2.2187e-5 kg; lognormal variance with pedigree 0.23516, pedigree (1,1,3,1,1)
  (same comment as for TOC, Total Organic Carbon)
- Carbon dioxide, fossil [air, non-urban air or from high stacks]: 0.013603 kg; lognormal variance with pedigree 0.095086, pedigree (1,1,3,1,1)
  (same comment as for Nitrogen oxides)
- Nitrite [water, ground-]: 1.0062e-6 kg; lognormal variance with pedigree 0.21163, pedigree (1,1,3,1,1)
  (same comment as for TOC, Total Organic Carbon)
- Sulfur dioxide [air, non-urban air or from high stacks]: 8.8472e-7 kg; lognormal variance with pedigree 0.35622, pedigree (1,1,3,1,1)
  (same comment as for Nitrogen oxides)
- Chloride [water, ground-]: 2.8476e-5 kg; lognormal variance with pedigree 0.22702, pedigree (1,1,3,1,1)
  (same comment as for TOC, Total Organic Carbon)
- Methane, fossil [air, non-urban air or from high stacks]: 0.0062829 kg; lognormal variance with pedigree 0.10522, pedigree (1,1,3,1,1)
  (same comment as for Nitrogen oxides)
- Nitrate [water, ground-]: 1.9443e-6 kg; lognormal variance with pedigree 0.21163, pedigree (1,1,3,1,1)
  (same comment as for TOC, Total Organic Carbon)
- Aluminium [water, ground-, long-term]: 0.00019378 kg; lognormal variance with pedigree 0.22049, pedigree (1,1,3,1,1)
  (same comment as for Thallium)
- Ammonium, ion [water, ground-]: 1.8488e-5 kg; lognormal variance with pedigree 0.21163, pedigree (1,1,3,1,1)
  (same comment as for TOC, Total Organic Carbon)
- Occupation, dump site [natural resource, land]: 0.0023333 m2*year; lognormal variance with pedigree 0.082256, pedigree (1,1,3,1,1)
  for landfill operation phase and spontaneous renaturation.
  Uncertainty: Uncertainty calculated from uncertainty in base parameters.
- Nitrogen, organic bound [water, ground-]: 3.0217e-5 kg; lognormal variance with pedigree 0.21163, pedigree (1,1,3,1,1)
  (same comment as for TOC, Total Organic Carbon)
- Sodium, ion [water, ground-, long-term]: 0.0013619 kg; lognormal variance with pedigree 0.15503, pedigree (1,1,3,1,1)
  (same comment as for Thallium)
- Hydrogen sulfide [water, ground-]: 1.839e-7 kg; lognormal variance with pedigree 0.3004, pedigree (1,1,3,1,1)
  (same comment as for TOC, Total Organic Carbon)
- Titanium, ion [water, ground-, long-term]: 0.00096888 kg; lognormal variance with pedigree 0.16742, pedigree (1,1,3,1,1)
  (same comment as for Thallium)
- Sulfate [water, ground-]: 7.0547e-6 kg; lognormal variance with pedigree 0.3004, pedigree (1,1,3,1,1)
  (same comment as for TOC, Total Organic Carbon)
- Iron, ion [water, ground-, long-term]: 0.003611 kg; lognormal variance with pedigree 0.12517, pedigree (1,1,3,1,1)
  (same comment as for Thallium)
- DOC, Dissolved Organic Carbon [water, ground-]: 0.00025266 kg; lognormal variance with pedigree 0.20576, pedigree (1,1,3,1,1)
  (same comment as for TOC, Total Organic Carbon)

## Extrapolations
This dataset has been extrapolated from year 2012 to the year of the calculation (2019). The uncertainty has been adjusted accordingly.
