# petroleum and gas production, off-shore

Dataset: EcoSpold 2, unit process
Geography: RoW
Time period: 2000-01-01 to 2019-12-31
Technology level: current
Classification: EcoSpold01Categories: natural gas/production
Classification: ISIC rev.4 ecoinvent: 0610:Extraction of crude petroleum
Tags: combined production; Combined Production
Scenario: Business-as-Usual
System model: Allocation at the point of substitution
Share of production covered: 100 %
Generated by: Mireille Faist Emmenegger (obsolete)
Published in: Faist Emmenegger, M. 2007
Database: ecoinvent
isCopyrightProtected: true
accessRestrictedTo: 1

## General comment
The data are valid for the Norway offshore production. It can be assumed that they are valid for production in the North Sea in mature fields. The weighted parts of ethane, butane etc. in Kollsnes and Karsto gas has been used to break down NMVOC emissions in their different parts. The multioutput-process 'combined offshore gas and oil production' delivers the co-products 'natural gas' and 'crude oil'.

## Included activities end
exploration and production of oil and gas on the Norwegian Continental Shelf (offshore). Data doesn't include combusted fuels for turbines, motors etc. It includes well testing (fuel requirements and emissions). Natural gas is partly dried on the platforms, the rest is dried in a special production plant.

## Geography
Can be extrapolated for North Sea offshore production

## Technology
Emissions and discharges from 49 producing fields and 178 exploration and production/injection wells are included. All fields with production facilities located on the NCS (Norwegian Continental Shelf) have been included. Produced water and oil discharges grew strongly in the last decade with the maturation of fields. Fuel consumption and emissions were stable. The processing of gas is performed in the plants of Kollsnes and Karsto, which are assessed separately.

## Time period
All data for year 2000. As production is changing, no average is built with other years.

## Parameters
- fraction, process water, to air: 0.15 dimensionless; name fraction_PW_to_air; lognormal variance with pedigree 0.092025, pedigree (4,4,3,2,4)

## Reference product
- petroleum: 1 kg; name petroleum_RP; CPC 12010: Petroleum oils and oils obtained from bituminous minerals, crude; By-product classification allocatable product
  EcoSpold01Location=NO
  production volume 6.25917e11 kg; name petroleum_RP_PV
    Calculated based on literature values and estimates. The global production of petroleum was 4.12+E12kg in 2012 (BP, 2014). It is estimated that 50% is extracted in activities where both natural gas and petroleum are produced. 33% of the production is off-shore and 67% is on-shore (http://www.gaselectricpartnership.com/HOffshore%20Infield.pdf). Refrence(s): BP (2014). Statistical Review of World Energy, June 2014. Retrieved online from http://www.bp.com/content/dam/bp/excel/energy-economics/statistical-review-2015/bp-statistical-review-of-world-energy-2015-workbook.xlsx, 30 August, 2017
  property carbon content, fossil 0.85
    C-content of crude oil is 83-87% (ecoinven report 6_IV, Tab 3.2). An average C-content of 0.85 kg C/kg crude oil was considered
  property price 0.192 EUR2005
    Temporary price data. Calculated as 90% of purchasers price based on: Source: International Energy Agency (http://wds.iea.org/WDS/TableViewer/tableView.aspx downloaded 4 July 2009) for Germany and excl. taxes, applying diesel density of 0.844 kg/litre
  property amount in multioutput activity_kg 1 kg; name petroleum_RP_amount_MO_kg
  property carbon content 0.85
    carbon content on a dry matter basis (reserved; not for manual entry)
  property true value 0.192; name petroleum_RP_true_value
    allocation property applied in "true value" allocation // value calculated from revenue
  properties: carbon content, non-fossil 0, water in wet mass 0 kg, water content 0, dry mass 1 kg, wet mass 1 kg, carbon allocation 0.85 kg
- natural gas, high pressure: 0 m3; name natural_gas; CPC 12020: Natural gas, liquefied or in the gaseous state; By-product classification allocatable product
  production volume 0 m3; name natural_gas_PV
    Calculated based on literature values and estimates. The global production of natural gas was 3343.3 bn m3 in 2012 (BP, 2014). 33% of the production is off-shore and 67% is on-shore (http://www.gaselectricpartnership.com/HOffshore%20Infield.pdf). Further it is estimated that approximately 70% of natural gas is produced in stand alone production activities and the rest is produced in activities where both natural gas and petroleum are produced. Value converted from BP LHV (1 cubic meter natural gas in (BP, 2014) corresponds to 0.9 kg oil equivalent. 1 kg oil equivalent corresponds to 42 MJ) to ecoinvent standard LHV of 39MJ/m3. (The source does not specify if the cubic meters are standard or norm cubic meters. See 2015, Faist Emmenegger, Mireille, Del Duce, Andrea; Zah, Rainer, Update and extension of the inventory data for energy gases, 3 - SeparatePublication.)Refrence(s): BP (2014). Statistical Review of World Energy, June 2014. Retrieved online from http://www.bp.com/content/dam/bp/excel/energy-economics/statistical-review-2015/bp-statistical-review-of-world-energy-2015-workbook.xlsx, 30 August, 2017
  property carbon content, fossil 0.602381
    An average C content of 0.506 kg C/ m3 has been assumed (this average has been calculated using data in Tab 3.5, ecoinvent v2.2 report 6_V
  property price 0.166 EUR2005; name natural_gas_price_EUR2005
    Temporary price data. Calculated as 90% of purchasers price based on: 2005 price for Europe-27 Import (US$ and kg) in UN Commodity Trade Statistics Database - Natural gas in gaseous state (http://data.un.org/Data.aspx?q=natural+gas&d=ComTrade&f=_l1Code%3a28%3bcmdCode%3a271121; accessed 4 January 2011), using density of natural gas of 0.8 kg/m3 for unit conversion.
  property amount in multioutput activity_m3 0.310922 m3; name natural_gas_amount_MO_m3
  property carbon content 0.602381
    carbon content on a dry matter basis (reserved; not for manual entry)
  properties: heating value, gross 0 MJ, water in wet mass 0 kg, wet mass 0.84 kg, water content 0, dry mass 0.84 kg, carbon content, non-fossil 0, carbon allocation 0.506 kg

## By-products
- electricity, for reuse in municipal waste incineration only: 0 kWh; CPC 17100: Electrical energy; By-product classification allocatable product; pedigree (1,1,1,1,1)
  Net electricity generated from this waste and used in internal MSWI plant energy redistribution.
  Uncertainty: uncertainty is calculated from uncertainties in waste composition and uncertainties in energy efficiency and the uncertainty in internal energy demand
  production volume 1.68e8 kWh
  property exergy 3.6 MJ; name E_el_prod_MSWI_exergy
    This exergy property is based on the exergy content of the product.
  property true value relation 3.6; name E_el_prod_MSWI_true_value_relation
    property to calculate "true value" from
  property price 0.1 EUR2005; name E_el_prod_MSWI_price_EUR2005
    Estimated to be the same price as in case of electricity, medium voltage.
  property true value 2.11051e-7
    allocation property applied in "true value" allocation // value calculated from true value relation
- heat, for reuse in municipal waste incineration only: 0 MJ; CPC 17300: Steam and hot water; By-product classification allocatable product; pedigree (1,1,1,1,1)
  Net useful heat generated from this waste and used in internal MSWI plant energy redistribution.
  Uncertainty: uncertainty is calculated from uncertainties in waste composition and uncertainties in energy efficiency and the uncertainty in internal energy demand
  production volume 1.23529e9 MJ
  property true value relation 0.1842; name E_th_prod_MSWI_true_value_relation
    property to calculate "true value" from
  property exergy 0.1842 MJ; name E_th_prod_MSWI_exergy
    This exergy property is based on the exergy content of the product.
  property price 0.0106 EUR2005; name E_th_prod_MSWI_price_EUR2005
    Average European district heat price from Ecoheatcool and Euroheat 2005-2006, Ecoheat Work package 1: The European heat market. Final report. 10.6 EUR/GJ i s the price of district heat. http://www.solarthermalworld.org/files/Ecoheatcool%20WP1%20Web.pdf?download
  property true value 7.94363e-8
    (same comment as for electricity, for reuse in municipal waste incineration only)
- zinc concentrate: 0 kg; CPC 14290: Other non-ferrous metal ores and concentrates (other than uranium or thorium ores and concentrates); By-product classification allocatable product
  Calculated value from the knowledge of the properties of both products.
  production volume 7224.5 kg
  property price 0.38 EUR2005; name ByP_price_EUR2005
    Temporary price data. Calculated as 90% of purchasers price based on: Zinc content in concentrate 53%. Concentrate price per kg Zn 86.5% of refined Zn price (13.5% treatment charges according to CHR Metals Limited 2005: Dynamic cost curves. http://www.minecost.com/dynamic.pdf). 2004 zinc price from USGS (2007) Mineral commodity summaries 2007. <http://minerals.usgs.gov/minerals/pubs/mcs/2007/mcs2007.pdf> [Accessed 25 May 2010]
  property zinc content 0.53; name zinc_C_zinc_concentrate
    Zinc content on a dry matter basis. Value taken from teh "zinc mine operation" /GLO dataset.
  property dry mass 1 kg; name DM_zinc_concentrate
  property carbon content 0
    carbon content on a dry matter basis (reserved; not for manual entry)
  property true value 4.51282e-12
    allocation property applied in "true value" allocation // value calculated from revenue
  properties: wet mass 1 kg, water content 0, carbon content, non-fossil 0, carbon content, fossil 0, water in wet mass 0 kg, carbon allocation 0 kg
- iron scrap, sorted, pressed: 0 kg; By-product classification Recyclable; CPC 39310: Slag, dross, scalings and other waste from the manufacture of iron or steel; pedigree (1,1,1,1,1)
  Iron scrap recovered from this waste.
  Uncertainty: uncertainty calculated from uncertainty in waste composition, uncertainty of share of recyclable metal, uncertainty of transfer coefficient to bottom ash, uncertainty of the efficiency of scrap removal in MSWI plant.
  production volume 3.90499e6 kg
  property price 0.175 EUR2005
    Temporary price data. Calculated as 90% of purchasers price based on: 2005 import and export prices (total trades (USD) divided by total weight (kg) in biggest economies of the world: EU27, USA, Brasil, China, India, Japan and Russia) from UN Commodity Trade Statistics Database (http://data.un.org/Explorer.aspxDatabase [Accessed 2011.06.20]). Commodity: Waste or scrap, of cast iron
  property carbon content 0
    carbon content on a dry matter basis (reserved; not for manual entry)
  property true value 1.87384e-8
    allocation property applied in "true value" allocation // value calculated from revenue
  properties: dry mass 1 kg, water content 0, carbon content, non-fossil 0, water in wet mass 0 kg, carbon content, fossil 0, wet mass 1 kg, carbon allocation 0 kg
- iron scrap, unsorted: 0 kg; source European Aluminium Association 2008; CPC 39310: Slag, dross, scalings and other waste from the manufacture of iron or steel; By-product classification Recyclable; pedigree (1,1,1,1,1)
  production volume 471.608 kg
  property price 0.149 EUR2005; name ironScrapAmount_price_EUR2005
    Temporary price data. Calculated as 90% of purchasers price based on: estimated at 85% of sorted scrap
  property carbon content 0
    carbon content on a dry matter basis (reserved; not for manual entry)
  property true value 6.23535e-13
    allocation property applied in "true value" allocation // value calculated from revenue
  properties: water in wet mass 0 kg, water content 0, carbon content, fossil 0, carbon content, non-fossil 0, dry mass 1 kg, wet mass 1 kg, carbon allocation 0 kg
- aluminium oxide, non-metallurgical: 0 kg; source European Aluminium Association 2008; CPC 41432: Alumina (aluminium oxide), except artificial corundum; By-product classification allocatable product; CAS 1344-28-1; pedigree (1,1,1,1,1)
  production volume 29676.5 kg
  property carbon content, non-fossil 0; name C_content_non_fossil
  property price 0.28 EUR2005; name Al2O3Amount_price_EUR2005
    From UN trade database. http://data.un.org/ Import data from the largest economies of the world are used (Brazil, India, USA, China, Japan and EU-27).
  property dry mass 1 kg; name DM
  property water content 0; name water_content
  property wet mass 1 kg; name WM
  property water in wet mass 0 kg; name WWM
  property carbon content, fossil 0; name C_content_fossil
  property carbon content 0
    carbon content on a dry matter basis (reserved; not for manual entry)
  property true value 7.37334e-11
    allocation property applied in "true value" allocation // value calculated from revenue
  properties: carbon allocation 0 kg
- aluminium, cast alloy: 0 kg; source European Aluminium Association 2008; By-product classification allocatable product; CPC 41431: Unwrought aluminium; pedigree (1,1,1,1,1)
  EcoSpold01Location=RER
  production volume 277410 kg
  property price 1.3 EUR2005; name castAlloyAmount_price_EUR2005
    Temporary price data. Calculated as 90% of purchasers price based on: Source: London Metal Exchange, Aluminium alloy price for 2005
  property carbon content 0
    carbon content on a dry matter basis (reserved; not for manual entry)
  property true value 3.20006e-9
    allocation property applied in "true value" allocation // value calculated from revenue
  properties: water in wet mass 0 kg, carbon content, non-fossil 0, water content 0, dry mass 1 kg, carbon content, fossil 0, wet mass 1 kg, carbon allocation 0 kg
- aluminium, wrought alloy: 0 kg; source European Aluminium Association 2008; By-product classification allocatable product; CPC 4153: Semi-finished products of aluminium or aluminium alloys; pedigree (1,1,1,1,1)
  production volume 121445 kg
  property price 1.44 EUR2005; name secondaryAluminiumOutput_price_EUR2005
    Estimated based on literature values and expert judgement. Aluminium ccast alloys are about 90% of the price of aluminium wrought alloys.
  property carbon content 0
    carbon content on a dry matter basis (reserved; not for manual entry)
  property true value 1.55179e-9
    allocation property applied in "true value" allocation // value calculated from revenue
  properties: wet mass 1 kg, water content 0, carbon content, fossil 0, water in wet mass 0 kg, carbon content, non-fossil 0, dry mass 1 kg, carbon allocation 0 kg
- copper: 0 kg; source Rentz O. 1999; By-product classification allocatable product; CPC 41413: Refined copper and copper alloys, unwrought; master alloys of copper
  Literature value. Copper uses: Before end-use copper is manufactured into semi fabricated products, such as shapes and ingots (known as 'semis'). These manufacturing processes are subdivided into hot working, cold working and, if necessary, process annealing. Few of the semis are ready for use as such. They more typically travel to first-stage manufacturers, who make metal rods, wire, and casting, and then to component manufacturers who produce such things as motors, valves, and insulated cables The components in turn are incorporated by final-stage manufacturers into a variety of finished products - automobiles, commercial buildings, residential housing, and so forth. These uses account for about 79% of the world-wide consumption of copper.
  production volume 53225.7 kg
  property price 5.52 EUR2005
    Literature value (http://www.economist.com/news/business/21576714-mining-industry-has-enriched-chile-its-future-precarious-copper-solution). Average price between 20015 and 2013.
  property carbon content 0
    carbon content on a dry matter basis (reserved; not for manual entry)
  property true value 1.75747e-8
    allocation property applied in "true value" allocation // value calculated from revenue
  properties: dry mass 1 kg, water in wet mass 0 kg, wet mass 1 kg, carbon content, non-fossil 0, water content 0, carbon content, fossil 0, carbon allocation 0 kg

## Inputs from technosphere
- waste emulsion paint: 0 kg; name waste_emul_paint; pedigree (1,1,1,1,1)
  environmental report for the total Norwegian production, standard module
  EcoSpold01Location=CH
  Uncertainty: environmental report for the total Norwegian production, standard module
  production volume 0 kg
    Calculated from the production volume of reference products
  property amount in multioutput activity_kg 5.70211e-7 kg; name waste_emul_paint_amount_MO_kg
  properties: carbon content, fossil 0.27, wet mass 1 kg, dry mass 1 kg
  note on carbon content, fossil: Tab A.4, ecoinvent v2.2 report 13_I. C content has been calculated after data in the tables, and then referred to 1 kg DM
- diesel: 0 kg; pedigree (1,1,1,1,1)
  EcoSpold01Location=RER
  environmental report for the total Norwegian production, partly with standard factors.
  Uncertainty: environmental report for the total Norwegian production, partly with standard factors.
  property amount in multioutput activity_kg 0.00021569 kg; name diesel_amount_MO_kg
  properties: wet mass 1 kg, dry mass 1 kg, carbon content, fossil 0.865
  note on carbon content, fossil: C-content of diesel is 86.5% (ecoinvent v2.2 report 6_IV, Tab 3.14)
- diesel, burned in diesel-electric generating set, 10MW: 0.0570673 MJ; name diesel_burned; = diesel_burned_amount_MO_MJ*(0.5* petroleum_RP +0.5* natural_gas *0.84)/(0.5* 1+0.5*0.310921736950937 *0.84); lognormal variance with pedigree 0.06, pedigree (1,1,5,5,3)
  EcoSpold01Location=GLO
  environmental report for the total Norwegian production, standard module
  Uncertainty: environmental report for the total Norwegian production, standard module
  property amount in multioutput activity_MJ 0.0719719 MJ; name diesel_burned_amount_MO_MJ
- hazardous waste, for underground deposit: -4.52921e-5 kg; name hazardous_waste; = ( hazardous_waste_amount_MO_kg*(0.5* petroleum_RP +0.5* natural_gas *0.84)/(0.5* 1+0.5*0.310921736950937 *0.84))*-1; lognormal variance with pedigree 0.0606, pedigree (2,1,5,5,3)
  EcoSpold01Location=DE
  environmental report for the total Norwegian production, standard module
  Uncertainty: environmental report for the total Norwegian production, standard module
  production volume 3.81111e7 kg; = hazardous_waste_amount_MO_kg*(0.5* petroleum_RP_PV +0.5* natural_gas_PV *0.84)/(0.5* 1+0.5*0.310921736950937 *0.84)
    Calculated from the production volume of reference products
  property amount in multioutput activity_kg 5.71214e-5 kg; name hazardous_waste_amount_MO_kg
  properties: wet mass 1 kg, carbon content, fossil 0.554667, dry mass 1 kg
  note on carbon content, fossil: Tab A.6, ecoinvent v2.2 report 13_I, average hazardous waste composition was used, and referred to 0% water mass. No waste-specific emission are currently inventoried for underground deposits. Accordingly, no waste composition must be specified. For generic, average waste to underground deposit deposition in a 200 liter steel drum without cement solidification is assumed (ecoinvent v2.2 report 13_I).
- offshore well, oil/gas: 2.59615e-6 m; name offshore_well; = offshore_well_amount_MO_m*(0.5* petroleum_RP +0.5* natural_gas *0.84)/(0.5* 1+0.5*0.310921736950937 *0.84); lognormal variance with pedigree 0.06, pedigree (1,1,5,5,3)
  EcoSpold01Location=OCE
  environmental report for the total Norwegian production, standard module
  Uncertainty: environmental report for the total Norwegian production, standard module
  property amount in multioutput activity_m 3.2742e-6 m; name offshore_well_amount_MO_m
- waste natural gas, sweet: -0.122879 MJ; name waste_NG_sweet; = (waste_NG_sweet_amount_MO_MJ*(0.5* petroleum_RP +0.5* natural_gas *0.84)/(0.5* 1+0.5*0.310921736950937 *0.84))*-1; lognormal variance with pedigree 0.042, pedigree (1,1,5,5,1)
  environmental report for the total Norwegian production, partly with standard factors.
  EcoSpold01Location=GLO
  Uncertainty: environmental report for the total Norwegian production, partly with standard factors.
  production volume 1.04045e11 MJ; = waste_NG_sweet_amount_MO_MJ*(0.5* petroleum_RP_PV +0.5* natural_gas_PV *0.84)/(0.5* 1+0.5*0.310921736950937 *0.84)
    Calculated from the production volume of reference products
  property amount in multioutput activity_MJ 0.154972 MJ; name waste_NG_sweet_amount_MO_MJ
  properties: dry mass 0.0247059 kg, heating value, gross 1 MJ, wet mass 0.0247059 kg, carbon content, fossil 0.589286
- low level radioactive waste: -1.99561e-7 m3; name low_level_radwaste; = (low_level_radwaste_amount_MO_m3*(1* petroleum_RP +0* natural_gas *0.84)/(1* 1+0*0.310921736950937 *0.84))*-1; lognormal variance with pedigree 0.0606, pedigree (2,1,5,5,3)
  EcoSpold01Location=CH
  Data for GB
  Uncertainty: data for GB
  production volume 124029 m3; = low_level_radwaste_amount_MO_m3*(1* petroleum_RP_PV +0* natural_gas_PV *0.84)/(1* 1+0*0.310921736950937 *0.84)
    Calculated from the production volume of reference products
  property amount in multioutput activity_m3 1.99561e-7 m3; name low_level_radwaste_amount_MO_m3
  properties: dry mass 2500 kg, wet mass 2500 kg
- municipal solid waste: 0 kg; name MSW; pedigree (1,1,1,1,1)
  (same comment as for waste emulsion paint)
  production volume 0 kg
    Calculated from the production volume of reference products
  property amount in multioutput activity_kg 4.22332e-5 kg; name MSW_amount_MO_kg
  properties: carbon content, fossil 0.171549, dry mass 0.771 kg, carbon content, non-fossil 0.261655, water content 0.297017, wet mass 1 kg
  note on carbon content, fossil: MSW composition in tab 4.1, ecoinvent v2.2 report 13_I. C content referred to 1 kg DM
- waste mineral oil: 0 kg; name waste_mineral_oil; pedigree (1,1,1,1,1)
  (same comment as for waste emulsion paint)
  production volume 0 kg
    Calculated from the production volume of reference products
  property amount in multioutput activity_kg 4.74278e-5 kg; name waste_mineral_oil_amount_MO_kg
  properties: water content 0.111111, dry mass 0.9 kg, wet mass 1 kg, carbon content, fossil 0.864444
  note on carbon content, fossil: Tab A.6, ecoinvent v2.2 report 13_I. C content has been calculated after data in the tables, and then referred to 1 kg DM
- chemical, organic: 0.000165011 kg; name chem_org; = chem_org_amount_MO_kg*(0.5* petroleum_RP +0.5* natural_gas *0.84)/(0.5* 1+0.5*0.310921736950937 *0.84); lognormal variance with pedigree 0.062, pedigree (3,1,5,5,3)
  quantity from environmental. report, part organic chemicals from standard data
  EcoSpold01Location=GLO
  Uncertainty: quantity from environmental. report, part organic chemicals from standard data
  property amount in multioutput activity_kg 0.000208108 kg; name chem_org_amount_MO_kg
  properties: dry mass 1 kg, carbon content, fossil 0.628, wet mass 1 kg
  note on carbon content, fossil: This dataset is an unweighted average of 20 organic substances (listed in Tab 88.1, ecoinvent v2.2 report 8, part II), being part of the top100 chemicals included in this database. The C-content has also been calculated as an unweighted average of the C content of the substances composing this dataset.
- sweet gas, burned in gas turbine: 0.556265 MJ; name sweet_gas_burned; = sweet_gas_burned_amount_MO_MJ*(0.5* petroleum_RP +0.5* natural_gas *0.84)/(0.5* 1+0.5*0.310921736950937 *0.84); lognormal variance with pedigree 0.042, pedigree (1,1,5,5,1)
  environmental report for the total Norwegian production, partly with standard factors.
  EcoSpold01Location=NO
  Uncertainty: environmental report for the total Norwegian production, partly with standard factors.
  property amount in multioutput activity_MJ 0.701548 MJ; name sweet_gas_burned_amount_MO_MJ
  properties: dry mass 0.0247059 kg, carbon content, fossil 0.589286, heating value, gross 1 MJ, wet mass 0.0247059 kg
- waste wood, untreated: 0 kg; name waste_wood; pedigree (1,1,1,1,1)
  (same comment as for waste emulsion paint)
  production volume 0 kg
    Calculated from the production volume of reference products
  property amount in multioutput activity_kg 9.19857e-6 kg; name waste_wood_amount_MO_kg
  properties: water content 0.25, dry mass 0.8 kg, wet mass 1 kg, carbon content, non-fossil 0.48632
  note on carbon content, non-fossil: Tab A.4, ecoinvent v2.2 report 13_I. C content has been referred to 1 kg DM,
- water discharge from petroleum extraction, offshore: -0.0713772 kg; name water_discharge; = ( water_discharge_amount_MO_kg* petroleum_RP)*-1
  Environmental report
  production volume 2.42331e9 kg; = water_discharge_amount_MO_kg* petroleum_RP_PV*1.15
    Calculated from the production volume of reference products
  property amount in multioutput activity_kg 0.0713773 kg; name water_discharge_amount_MO_kg; = 1.1971*(63000000000/1056600000000)
  properties: water content 10.784, wet mass 1 kg, dry mass 0.0848608 kg, carbon content, non-fossil 0.00101223, carbon content, fossil 0.00168491
  note on amount in multioutput activity_kg: This flow is a specificity of the GB off-shore DS and has been calculated accordingly.
- spent antifreezer liquid: -1.02504e-7 kg; name spent_antifreezer; = ( spent_antifreezer_amount_MO_kg*(0.5* petroleum_RP +0.5* natural_gas *0.84)/(0.5* 1+0.5*0.310921736950937 *0.84))*-1; lognormal variance with pedigree 0.0606, pedigree (2,1,5,5,3)
  EcoSpold01Location=CH
  environmental report for the total Norwegian production, standard module
  Uncertainty: environmental report for the total Norwegian production, standard module
  production volume 86251.7 kg; = spent_antifreezer_amount_MO_kg*(0.5* petroleum_RP_PV +0.5* natural_gas_PV *0.84)/(0.5* 1+0.5*0.310921736950937 *0.84)
    Calculated from the production volume of reference products
  property amount in multioutput activity_kg 1.29275e-7 kg; name spent_antifreezer_amount_MO_kg
  properties: wet mass 1 kg, carbon content, fossil 0.431328, water content 1.07469, dry mass 0.482 kg
  note on carbon content, fossil: Tab A.7, ecoinvent v2.2 report 13_I. C content has been calculated after data in the tables, and then referred to 1 kg DM
- chemical, inorganic: 0.000218735 kg; name chem_inorg; = chem_inorg_amount_MO_kg*(0.5* petroleum_RP +0.5* natural_gas *0.84)/(0.5* 1+0.5*0.310921736950937 *0.84); lognormal variance with pedigree 0.062, pedigree (3,1,5,5,3)
  EcoSpold01Location=GLO
  quantity from environmental. report, part organic chemicals from standard data
  Uncertainty: quantity from environmental. report, part organic chemicals from standard data
  property amount in multioutput activity_kg 0.000275863 kg; name chem_inorg_amount_MO_kg
  properties: carbon content, fossil 0.003, wet mass 1 kg, dry mass 1 kg
  note on carbon content, fossil: This dataset is an unweighted average of 20 inorganic substances (listed in Tab 88.1, ecoinvent v2.2 report 8, part II), being part of the top100 chemicals included in this database. The C-content has also been calculated as an unweighted average of the C content of the substances composing this dataset.
- offshore platform, petroleum: 5.10952e-11 unit; name offshore_plattform; = offshore_plattform_amount_MO_unit*(1* petroleum_RP +0* natural_gas *0.84)/(1*1+0*0.310921736950937 *0.84); lognormal variance with pedigree 0.372, pedigree (3,1,5,5,3)
  EcoSpold01Location=OCE
  Data for GB
  Uncertainty: Data for GB
  property amount in multioutput activity_unit 5.10953e-11 unit; name offshore_plattform_amount_MO_unit
- drying, natural gas: 0 m3; name drying_NG; = drying_NG_amount_MO_m3*(0* petroleum_RP +1* natural_gas *0.84)/(0* 1+1*0.310921736950937 *0.84); pedigree (1,1,1,1,1)
  EcoSpold01Location=NO
  Environmental report for the total Norwegian production.
  Uncertainty: environmental report for the total Norwegian production.
  property amount in multioutput activity_m3 0.185131 m3; name drying_NG_amount_MO_m3
- offshore platform, natural gas: 0 unit; name offshore_plattform_NG; = offshore_plattform_NG_amount_MO_unit*(0* petroleum_RP +1* natural_gas *0.84)/(0* 1+1*0.310921736950937 *0.84); pedigree (1,1,1,1,1)
  environmental report for the total Norwegian production, standard module
  EcoSpold01Location=OCE
  Uncertainty: environmental report for the total Norwegian production, standard module
  property amount in multioutput activity_unit 1.12244e-11 unit; name offshore_plattform_NG_amount_MO_unit
- waste emulsion paint: -1.37105e-11, -4.52113e-7 kg (2 entries); lognormal variance with pedigree 0.0606, pedigree (2,1,5,5,3)
  (same comment as for waste emulsion paint)
  production volume 380442 kg
    Calculated from the production volume of reference products
  properties: carbon content, fossil 0.27, wet mass 1 kg, dry mass 1 kg, amount in multioutput activity_kg 5.70211e-7 kg
- diesel: 7.3216e-6, 3.5198e-7, 1.47767e-5, 1.03505e-6, 1.49604e-6, 1.29483e-7, 0.000145912 kg (7 entries); lognormal variance with pedigree 0.042, pedigree (1,1,5,5,1)
  (same comment as for diesel)
  properties: wet mass 1 kg, dry mass 1 kg, carbon content, fossil 0.865, amount in multioutput activity_kg 0.00021569 kg
- municipal solid waste: -4.41671e-8, -1.30856e-8, -3.83868e-8, -2.36262e-8, -4.15103e-8, -4.19123e-8, -1.1129e-8, -4.01283e-8, -3.0828e-7, -3.92336e-8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 kg (37 entries); lognormal variance with pedigree 0.0606, pedigree (2,1,5,5,3)
  (same comment as for waste emulsion paint)
  production volume 2.80438e7 kg
    Calculated from the production volume of reference products
  properties: amount in multioutput activity_kg 4.22332e-5 kg, carbon content, fossil 0.171549, dry mass 0.771 kg, carbon content, non-fossil 0.261655, water content 0.297017, wet mass 1 kg
- waste mineral oil: -2.9021e-7, -3.73158e-5 kg (2 entries); lognormal variance with pedigree 0.0606, pedigree (2,1,5,5,3)
  (same comment as for waste emulsion paint)
  production volume 3.16436e7 kg
    Calculated from the production volume of reference products
  properties: water content 0.111111, dry mass 0.9 kg, amount in multioutput activity_kg 4.74278e-5 kg, wet mass 1 kg, carbon content, fossil 0.864444
- waste wood, untreated: -4.49626e-7, -3.05591e-9, -1.00178e-8, -5.53326e-9, -9.33814e-9, -1.06851e-8, -5.58279e-8, -4.08165e-9, -2.0348e-9, -1.02213e-7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 kg (40 entries); lognormal variance with pedigree 0.0606, pedigree (2,1,5,5,3)
  (same comment as for waste emulsion paint)
  production volume 6.13724e6 kg
    Calculated from the production volume of reference products
  properties: water content 0.25, amount in multioutput activity_kg 9.19857e-6 kg, dry mass 0.8 kg, wet mass 1 kg, carbon content, non-fossil 0.48632

## Inputs from nature
- Gas, natural, in ground [natural resource, in ground]: 0.00013093 m3; name gas_ground; = gas_ground_amount_MO_m3*(0.00011* petroleum_RP +0.99989* natural_gas *0.84)/(0.00011* 1+0.99989*0.310921736950937 *0.84); lognormal variance with pedigree 0.042, pedigree (1,1,5,5,1)
  environmental report for the total Norwegian production, partly with standard factors.
  Uncertainty: environmental report for the total Norwegian production, partly with standard factors.
  property amount in multioutput activity_m3 0.310966 m3; name gas_ground_amount_MO_m3
- Oil, crude, in ground [natural resource, in ground]: 1.00006 kg; name oil_ground; = oil_ground_amount_MO_kg*(1* petroleum_RP +0* natural_gas *0.84)/ (1* 1+0*0.310921736950937 *0.84); lognormal variance with pedigree 0.042, pedigree (1,1,5,5,1)
  (same comment as for Gas, natural, in ground)
  property amount in multioutput activity_kg 1.00006 kg; name oil_ground_amount_MO_kg
- Water, salt, ocean [natural resource, in water]: 0.00135678 m3; name water_salt_ocean_input; = water_salt_ocean_input_amount_MO_m3*(0.99* petroleum_RP +0.01* natural_gas *0.84)/(0.99* 1+0.01*0.310921736950937 *0.84); lognormal variance with pedigree 0.042, pedigree (1,1,5,5,1)
  (same comment as for Gas, natural, in ground)
  property amount in multioutput activity_m3 0.00136036 m3; name water_salt_ocean_input_amount_MO_m3
- Water, salt, sole [natural resource, in water]: 0.000694263 m3; name water_salt_sole_input; = water_salt_sole_input_amount_MO_m3*(0.99* petroleum_RP +0.01* natural_gas *0.84)/(0.99* 1+0.01*0.310921736950937 *0.84); lognormal variance with pedigree 0.042, pedigree (1,1,5,5,1)
  (same comment as for Gas, natural, in ground)
  property amount in multioutput activity_m3 0.000696096 m3; name water_salt_sole_input_amount_MO_m3

## Emissions to nature
- Mercury [air, non-urban air or from high stacks]: 1.5493e-11 kg; name Hg_air; = Hg_air_amount_MO_kg*(0.5* petroleum_RP +0.5* natural_gas *0.84)/(0.5* 1+0.5*0.310921736950937 *0.84); lognormal variance with pedigree 0.118, pedigree (4,1,5,5,3)
  data calculated on the basis of losses and gas composition
  Uncertainty: data calculated on the basis of losses and gas composition
  property amount in multioutput activity_kg 1.95394e-11 kg; name Hg_air_amount_MO_kg
- AOX, Adsorbable Organic Halogen as Cl [water, surface water]: 2.05729e-10 kg; name AOX; = AOX_amount_MO_kg*(0.99* petroleum_RP +0.01* natural_gas *0.84)/(0.99* 1+0.01*0.310921736950937 *0.84); lognormal variance with pedigree 0.092, pedigree (3,5,5,5,1)
  Extrapolation for sum parameter
  Uncertainty: Extrapolation for sum parameter
  property amount in multioutput activity_kg 2.06272e-10 kg; name AOX_amount_MO_kg
- Xylene [water, ocean]: 2.11416e-6 kg; name xylene; = xylene_amount_MO_kg*(0.99* petroleum_RP +0.01* natural_gas *0.84)/(0.99* 1+0.01*0.310921736950937 *0.84); lognormal variance with pedigree 0.342, pedigree (1,1,5,5,1)
  (same comment as for Gas, natural, in ground)
  property amount in multioutput activity_kg 2.11974e-6 kg; name xylene_amount_MO_kg
- Radon-222 [air, non-urban air or from high stacks]: 3.09861e-5 kBq; name Rd; = Rd_amount_MO_kBq*(0.5* petroleum_RP +0.5* natural_gas *0.84)/(0.5* 1+0.5*0.310921736950937 *0.84); lognormal variance with pedigree 0.378, pedigree (4,1,5,5,3)
  Data calculated on the basis of losses and gas composition
  Uncertainty: data calculated on the basis of losses and gas composition
  property amount in multioutput activity_kBq 3.90789e-5 kBq; name Rd_amount_MO_kBq
- TOC, Total Organic Carbon [water, surface water]: 9.67744e-5 kg; name TOC; = TOC_amount_MO_kg*(0.99* petroleum_RP +0.01* natural_gas *0.84)/(0.99* 1+0.01*0.310921736950937 *0.84); lognormal variance with pedigree 0.092, pedigree (3,5,5,5,1)
  Extrapolation for sum parameter
  Uncertainty: Extrapolation for sum parameter
  property amount in multioutput activity_kg 9.70299e-5 kg; name TOC_amount_MO_kg
- Chromium, ion [water, ocean]: 3.23102e-9 kg; name Cr; = Cr_amount_MO_kg*(0.99* petroleum_RP +0.01* natural_gas *0.84)/(0.99* 1+0.01*0.310921736950937 *0.84); lognormal variance with pedigree 0.082, pedigree (1,1,5,5,1)
  (same comment as for Gas, natural, in ground)
  property amount in multioutput activity_kg 3.23955e-9 kg; name Cr_amount_MO_kg
- Toluene [water, ocean]: 2.11416e-6 kg; name toluene; = toluene_amount_MO_kg*(0.99* petroleum_RP +0.01* natural_gas *0.84)/(0.99* 1+0.01*0.310921736950937 *0.84); lognormal variance with pedigree 0.342, pedigree (1,1,5,5,1)
  (same comment as for Gas, natural, in ground)
  property amount in multioutput activity_kg 2.11974e-6 kg; name toluene_amount_MO_kg
- Oils, unspecified [water, ocean]: 1.99736e-5 kg; name oils; = oils_amount_MO_kg*(0.99* petroleum_RP +0.01* natural_gas *0.84)/(0.99* 1+0.01*0.310921736950937 *0.84); lognormal variance with pedigree 0.342, pedigree (1,1,5,5,1)
  (same comment as for Gas, natural, in ground)
  property amount in multioutput activity_kg 2.00263e-5 kg; name oils_amount_MO_kg
- NMVOC, non-methane volatile organic compounds, unspecified origin [air, non-urban air or from high stacks]: 0.00118656 kg; name NMVOC; = NMVOC_amount_MO_kg*(0.09617* petroleum_RP+0.0383* natural_gas *0.84)/(0.09617* 1+0.0383*0.310921736950937 *0.84); lognormal variance with pedigree 0.162, pedigree (1,1,5,5,1)
  (same comment as for Gas, natural, in ground)
  property amount in multioutput activity_kg 0.00130998 kg; name NMVOC_amount_MO_kg
- Cadmium, ion [water, ocean]: 8.74938e-10 kg; name Cd; = Cd_amount_MO_kg*(0.99* petroleum_RP +0.01* natural_gas *0.84)/(0.99* 1+0.01*0.310921736950937 *0.84); lognormal variance with pedigree 0.692, pedigree (1,1,5,5,1)
  (same comment as for Gas, natural, in ground)
  property amount in multioutput activity_kg 8.77248e-10 kg; name Cd_amount_MO_kg
- Copper, ion [water, ocean]: 2.73106e-9 kg; name Cu; = Cu_amount_MO_kg*(0.99* petroleum_RP +0.01* natural_gas *0.84)/(0.99* 1+0.01*0.310921736950937 *0.84); lognormal variance with pedigree 0.692, pedigree (1,1,5,5,1)
  (same comment as for Gas, natural, in ground)
  property amount in multioutput activity_kg 2.73827e-9 kg; name Cu_amount_MO_kg
- Methane, bromochlorodifluoro-, Halon 1211 [air, non-urban air or from high stacks]: 7.30358e-10 kg; name halon; = halon_amount_MO_kg*(0.5* petroleum_RP +0.5* natural_gas *0.84)/(0.5* 1+0.5*0.310921736950937 *0.84); lognormal variance with pedigree 0.0826, pedigree (2,1,5,5,1)
  environmental report for the total Norwegian production, assumption for type of halon
  Uncertainty: environmental report for the total Norwegian production, assumption for type of halon
  property amount in multioutput activity_kg 9.2111e-10 kg; name halon_amount_MO_kg
- Benzene [water, ocean]: 2.11416e-6 kg; name benzene; = benzene_amount_MO_kg*(0.99* petroleum_RP +0.01* natural_gas *0.84)/(0.99* 1+0.01*0.310921736950937 *0.84); lognormal variance with pedigree 0.342, pedigree (1,1,5,5,1)
  environmental report for the total Norwegian production, assumption for the break down of BTX.
  Uncertainty: environmental report for the total Norwegian production, assumption for the break down of BTX.
  property amount in multioutput activity_kg 2.11974e-6 kg; name benzene_amount_MO_kg
- Propane [air, non-urban air or from high stacks]: 1.31708e-5 kg; name propane; = propane_amount_MO_kg*(0.5* petroleum_RP +0.5* natural_gas *0.84)/(0.5* 1+0.5*0.310921736950937 *0.84); lognormal variance with pedigree 0.0826, pedigree (2,1,5,5,1)
  (same comment as for Gas, natural, in ground)
  property amount in multioutput activity_kg 1.66107e-5 kg; name propane_amount_MO_kg
- Methane, fossil [air, non-urban air or from high stacks]: 0.000210124 kg; name CH4_fossil; = CH4_fossil_amount_MO_kg*(0.7157* petroleum_RP +0.094* natural_gas *0.84)/(0.7157* 1+0.094*0.310921736950937 *0.84); lognormal variance with pedigree 0.082, pedigree (1,1,5,5,1)
  (same comment as for Gas, natural, in ground)
  property amount in multioutput activity_kg 0.000217332 kg; name CH4_fossil_amount_MO_kg
- Carbon dioxide, fossil [air, non-urban air or from high stacks]: 0.000935206 kg; name CO2_fossil; = CO2_fossil_amount_MO_kg*(0.5* petroleum_RP +0.5* natural_gas *0.84)/(0.5* 1+0.5*0.310921736950937 *0.84); lognormal variance with pedigree 0.042, pedigree (1,1,5,5,1)
  (same comment as for Gas, natural, in ground)
  property amount in multioutput activity_kg 0.00117946 kg; name CO2_fossil_amount_MO_kg
- Phenol [water, ocean]: 4.01072e-6 kg; name phenol; = phenol_amount_MO_kg*(0.99* petroleum_RP +0.01* natural_gas *0.84)/(0.99* 1+0.01*0.310921736950937 *0.84); lognormal variance with pedigree 0.342, pedigree (1,1,5,5,1)
  (same comment as for Benzene)
  property amount in multioutput activity_kg 4.0213e-6 kg; name phenol_amount_MO_kg
- Nitrogen [water, surface water]: 1.54295e-8 kg; name N2; = N2_amount_MO_kg*(0.99* petroleum_RP +0.01* natural_gas *0.84)/(0.99* 1+0.01*0.310921736950937 *0.84); lognormal variance with pedigree 0.092, pedigree (3,5,5,5,1)
  Extrapolation for sum parameter
  Uncertainty: Extrapolation for sum parameter
  property amount in multioutput activity_kg 1.54703e-8 kg; name N2_amount_MO_kg
- Carboxylic acids, unspecified [water, ocean]: 0.000175913 kg; name carboxylic_acid; = carboxylic_acid_amount_MO_kg*(0.99* petroleum_RP +0.01* natural_gas *0.84)/(0.99* 1+0.01*0.310921736950937 *0.84); lognormal variance with pedigree 0.342, pedigree (1,1,5,5,1)
  (same comment as for Gas, natural, in ground)
  property amount in multioutput activity_kg 0.000176377 kg; name carboxylic_acid_amount_MO_kg
- Sulfur [water, surface water]: 5.349e-8 kg; name S2; = S2_amount_MO_kg*(0.99* petroleum_RP +0.01* natural_gas *0.84)/(0.99* 1+0.01*0.310921736950937 *0.84); lognormal variance with pedigree 0.092, pedigree (3,5,5,5,1)
  Extrapolation for sum parameter
  Uncertainty: Extrapolation for sum parameter
  property amount in multioutput activity_kg 5.36312e-8 kg; name S2_amount_MO_kg
- DOC, Dissolved Organic Carbon [water, surface water]: 9.67744e-5 kg; name DOC; = DOC_amount_MO_kg*(0.99* petroleum_RP +0.01* natural_gas *0.84)/(0.99* 1+0.01*0.310921736950937 *0.84); lognormal variance with pedigree 0.092, pedigree (3,5,5,5,1)
  Extrapolation for sum parameter
  Uncertainty: Extrapolation for sum parameter
  property amount in multioutput activity_kg 9.70299e-5 kg; name DOC_amount_MO_kg
- Butane [air, non-urban air or from high stacks]: 6.86884e-6 kg; name butane; = butane_amount_MO_kg*(0.5* petroleum_RP +0.5* natural_gas *0.84)/(0.5* 1+0.5*0.310921736950937 *0.84); lognormal variance with pedigree 0.0826, pedigree (2,1,5,5,1)
  (same comment as for Gas, natural, in ground)
  property amount in multioutput activity_kg 8.66282e-6 kg; name butane_amount_MO_kg
- BOD5, Biological Oxygen Demand [water, surface water]: 0.000271918 kg; name BOD5; = BOD5_amount_MO_kg*(0.99* petroleum_RP +0.01* natural_gas *0.84)/(0.99* 1+0.01*0.310921736950937 *0.84); lognormal variance with pedigree 0.092, pedigree (3,5,5,5,1)
  Extrapolation for sum parameter
  Uncertainty: Extrapolation for sum parameter
  property amount in multioutput activity_kg 0.000272636 kg; name BOD5_amount_MO_kg
- PAH, polycyclic aromatic hydrocarbons [water, ocean]: 2.79818e-7 kg; name PAH; = PAH_amount_MO_kg*(0.99* petroleum_RP +0.01* natural_gas *0.84)/(0.99* 1+0.01*0.310921736950937 *0.84); lognormal variance with pedigree 0.342, pedigree (1,1,5,5,1)
  (same comment as for Benzene)
  property amount in multioutput activity_kg 2.80556e-7 kg; name PAH_amount_MO_kg
- Nickel, ion [water, ocean]: 4.84966e-9 kg; name Ni; = Ni_amount_MO_kg*(0.99* petroleum_RP +0.01* natural_gas *0.84)/(0.99* 1+0.01*0.310921736950937 *0.84); lognormal variance with pedigree 0.692, pedigree (1,1,5,5,1)
  (same comment as for Gas, natural, in ground)
  property amount in multioutput activity_kg 4.86246e-9 kg; name Ni_amount_MO_kg
- Nitrogen oxides [air, non-urban air or from high stacks]: 1.24211e-6 kg; name NOx; = NOx_amount_MO_kg*(0.5* petroleum_RP +0.5* natural_gas *0.84)/(0.5* 1+0.5*0.310921736950937 *0.84); lognormal variance with pedigree 0.082, pedigree (1,1,5,5,1)
  (same comment as for Gas, natural, in ground)
  property amount in multioutput activity_kg 1.56651e-6 kg; name NOx_amount_MO_kg
- Mercury [water, ocean]: 3.12478e-11 kg; name Hg_water; = Hg_water_amount_MO_kg*(0.99* petroleum_RP +0.01* natural_gas *0.84)/(0.99* 1+0.01*0.310921736950937 *0.84); lognormal variance with pedigree 0.692, pedigree (1,1,5,5,1)
  (same comment as for Gas, natural, in ground)
  property amount in multioutput activity_kg 3.13303e-11 kg; name Hg_water_amount_MO_kg
- Lead [water, ocean]: 3.40601e-9 kg; name Pb; = Pb_amount_MO_kg*(0.99* petroleum_RP +0.01* natural_gas *0.84)/(0.99* 1+0.01*0.310921736950937 *0.84); lognormal variance with pedigree 0.692, pedigree (1,1,5,5,1)
  (same comment as for Gas, natural, in ground)
  property amount in multioutput activity_kg 3.415e-9 kg; name Pb_amount_MO_kg
- Ethane [air, non-urban air or from high stacks]: 2.48749e-5 kg; name ethane; = ethane_amount_MO_kg*(0.5* petroleum_RP +0.5* natural_gas *0.84)/(0.5* 1+0.5*0.310921736950937 *0.84); lognormal variance with pedigree 0.0826, pedigree (2,1,5,5,1)
  (same comment as for Gas, natural, in ground)
  property amount in multioutput activity_kg 3.13716e-5 kg; name ethane_amount_MO_kg
- COD, Chemical Oxygen Demand [water, surface water]: 0.000271918 kg; name COD; = COD_amount_MO_kg*(0.99* petroleum_RP +0.01* natural_gas *0.84)/(0.99* 1+0.01*0.310921736950937 *0.84); lognormal variance with pedigree 0.092, pedigree (3,5,5,5,1)
  Extrapolation for sum parameter
  Uncertainty: Extrapolation for sum parameter
  property amount in multioutput activity_kg 0.000272636 kg; name COD_amount_MO_kg
- Water [air, unspecified]: 0.000307656 m3; name water_to_air_unspecified; = water_salt_ocean_input*fraction_PW_to_air+water_salt_sole_input*fraction_PW_to_air; lognormal variance with pedigree 0.130025, pedigree (4,4,5,2,4)
  Calculated value based on literature values and expert opinion. See comments in the parametres' comment field.
  property fraction, origin: unspecified 0; name fraction_origin_unspecified
  property fraction, origin: salt water 1; name fraction_origin_salt_water
  property fraction, origin: fresh water 0; name fraction_origin_fresh_water
  property amount in multioutput activity_m3 0.000308469 m3; name water_to_air_unspecified_amount_MO_m3
- Arsenic, ion [water, ocean]: 7.14325e-9 kg; name As; = As_amount_MO_kg*(0.99* petroleum_RP +0.01* natural_gas *0.84)/(0.99* 1+0.01*0.310921736950937 *0.84); lognormal variance with pedigree 0.082, pedigree (1,1,5,5,1)
  (same comment as for Gas, natural, in ground)
  property amount in multioutput activity_kg 7.1621e-9 kg; name As_amount_MO_kg
- Water [water, unspecified]: 0.00174339 m3; name water_to_water_unspecified; = water_salt_ocean_input*(1-fraction_PW_to_air)+water_salt_sole_input*(1-fraction_PW_to_air); lognormal variance with pedigree 0.130025, pedigree (4,4,5,2,4)
  (same comment as for Water)
  property fraction, origin: fresh water 0; name fraction_origin_fresh_water_Ww
  property fraction, origin: salt water 1; name fraction_origin_salt_water_Ww
  property fraction, origin: unspecified 0; name fraction_origin_unspecified_Ww
  property amount in multioutput activity_m3 0.00174799 m3; name water_to_water_unspecifie_amount_MO_m3_0
- Zinc, ion [water, ocean]: 9.33622e-8 kg; name Zn; = Zn_amount_MO_kg*(0.99* petroleum_RP +0.01* natural_gas *0.84)/(0.99* 1+0.01*0.310921736950937 *0.84); lognormal variance with pedigree 0.692, pedigree (1,1,5,5,1)
  (same comment as for Gas, natural, in ground)
  property amount in multioutput activity_kg 9.36086e-8 kg; name Zn_amount_MO_kg

## Sampling procedure
Data is based on the annual reports on emissions and discharges submitted by each individual operator. The emissions and discharges are estimated
according to guidelines given by the Norwegian authorities and OLF (Norwegian Oil Industry Association)

## Extrapolations
This dataset has been copied from an original dataset covering the geography NO. The uncertainty has been adjusted accordingly.

## Review by Emilia Moreno Ruiz 2017-09-06
PV adjusted

## Review by Michael Spielmann (obsolete) 2006-09-27
passed
