# titanium tetrachloride production

Dataset: EcoSpold 2, unit process
Geography: GLO
Time period: 2004-01-01 to 2019-12-31
Technology level: current
Classification: ISIC rev.4 ecoinvent: 242:Manufacture of basic precious and other non-ferrous metals
Scenario: Business-as-Usual
System model: Allocation at the point of substitution
Generated by: Marylène Dussault
Published in: Norgate, T. E. 2004
Database: ecoinvent
isCopyrightProtected: true
accessRestrictedTo: 1

## General comment
This dataset represents the production of 1 kg of pure liquid titanium tetrachloride. Rutile (synthetic and natural origin) is chlorinated, separated and purified. Titanium tetrachloride is used to produce primary titanium production through the Kroll process. As titanium can be extracted both from rutile and ilmenite ore, 89% of produced titanium is from ilmenite ore extraction.

## Included activities start
This dataset starts with the chlorination of rutile.

## Included activities end
With production of titanium tetrachloride production. Chemical inputs, electricity and fuel are included in the process. Chemical reaction was used to estimate chemical inputs and emissions associated with reaction: 2 TiO2 + 4 Cl2 + 3 C --> 2 TiCl4 + 2 CO + CO2. Infrastructure was estimated. All wastes and other emissions are excluded due to lack of data. Missing flows includes emission to air of dust and chlorinated gases, emission to water of neutralised acid containing metals. This process requires to be highly controled, since it requires chlorine gaz, a highly corrosive and dangerous gas.

## Time period
Time period chosen based on year of publication of LCI data

## Reference product
- titanium tetrachloride: 1 kg; CPC 342: Basic inorganic chemicals n.e.c.; By-product classification allocatable product; CAS 7550-45-0
  production volume 2.81e8 kg; name PV_TiCl4
    Calculated value. Based on reported total world titanium sponge production for 2006 and titanium weight concentration in titanium tetrachloride (44%). Production volume of sponge was taken from ABARE 2008 report on "research and development in titanium".
  property price 1.1087 EUR2005
    Calculated based on inputs: The price of the product has been calculated as a sum of the values of the material and energy inputs for this product. This value is therefore a rough estimation. It may underestimate the real price since there are additional expenses when producing any product. These expences can include for example labour costs, treatment of waste materials and profit for the producer. Please consider carefully whether this level of data quality is acceptable for your application. Cross-reference: The consumer price for titanium tetrachloride is 56.9 EURO for 1kg. (http://www.sigmaaldrich.com/catalog/product/fluka/89541?lang=de&region=DE&cm_sp=Insite-_-prodRecCold_xviews-_-prodRecCold10-2 , accessed 20160421)

## Inputs from technosphere
All rows: source Norgate, T. E. 2004
- coke: 0.11 MJ; lognormal variance with pedigree 0.0438, pedigree (3,3,5,1,2)
  Literature value: based on Norgate et al. (2004).
  2004, Norgate, T. E., Rajakumar, V. ; Trang, S., Titanium and Other Light Metals - Technology Pathways to Sustainable Development, AUSTRALASIAN INST. OF MINING AND METALLU, 2, 105-112
  properties: dry mass 0.0328671 kg, carbon content, fossil 0.869149, water content 0.0638298, wet mass 0.034965 kg
- rutile, 95% titanium dioxide: 0.772574 kg; lognormal variance with pedigree 0.0498, pedigree (4,3,5,1,2)
  Stochiometric value: based on stochiometric input for production of titanium tetrachloride.
  properties: wet mass 1 kg, dry mass 1 kg
- heat, district or industrial, natural gas: 2.1 MJ; lognormal variance with pedigree 0.0438, pedigree (3,3,5,1,2)
  (same comment as for coke)
- electricity, medium voltage: 0.14 kWh; lognormal variance with pedigree 0.0438, pedigree (3,3,5,1,2)
  (same comment as for coke)
- chlorine, liquid: 0 kg; pedigree (1,1,1,1,1)
  Stochiometric value. Based on chlorine required in titanium tetrachloride assuming 100% process efficiency due to lack of data.
  properties: wet mass 1 kg, dry mass 1 kg
- chlorine, liquid: 0.0933479, 0.466652 kg (2 entries); lognormal variance with pedigree 0.0498, pedigree (4,3,5,1,2)
  (same comment as for chlorine, liquid)

## Emissions to nature
- Carbon dioxide, fossil [air, non-urban air or from high stacks]: 0.117 kg; source Norgate, T. E. 2004; lognormal variance with pedigree 0.0458, pedigree (3,3,5,5,2)
  (same comment as for coke)
- Carbon monoxide, fossil [air, non-urban air or from high stacks]: 0.117 kg; source Norgate, T. E. 2004; lognormal variance with pedigree 0.0458, pedigree (3,3,5,5,2)
  (same comment as for coke)

## Sampling procedure
Literature data based on reseach compilation of studies and modeling.

## Extrapolations
This dataset has been extrapolated from year 2004 to the year of the calculation (2019). The uncertainty has been adjusted accordingly.
