# chassis production, internet access equipment

Dataset: EcoSpold 2, unit process
Geography: RoW
Time period: 2000-01-01 to 2019-12-31
Technology level: current
Classification: EcoSpold01Categories: electronics/component
Classification: ISIC rev.4 ecoinvent: 2910:Manufacture of motor vehicles
Tags: ConvertedDataset
Scenario: Business-as-Usual
System model: Allocation at the point of substitution
Generated by: Marianne Leuenberger
Published in: Spielmann M. 2007
Database: ecoinvent
isCopyrightProtected: true
accessRestrictedTo: 1

## General comment
Rough assumption based on previous study for telecom equipment and personal communication with experts.
[This dataset was already contained in the ecoinvent database version 2. It was not individually updated during the transfer to ecoinvent version 3. Life Cycle Impact Assessment results may still have changed, as they are affected by changes in the supply chain, i.e. in other datasets. This dataset was generated following the ecoinvent quality guidelines for version 2. It may have been subject to central changes described in the ecoinvent version 3 change report (http://www.ecoinvent.org/database/ecoinvent-version-3/reports-of-changes/), and the results of the central updates were reviewed extensively. The changes added e.g. consistent water flows and other information throughout the database. The documentation of this dataset can be found in the ecoinvent reports of version 2, which are still available via the ecoinvent website. The change report linked above covers all central changes that were made during the conversion process.]

## Included activities end
materials, standard transport distances, electricity use for manufacturing, disposal

## Geography
Switzerland

## Technology
average material composition of chassis for network devices. Life expectancy: 6 years, annual working hour depending on use.

## Reference product
- chassis, internet access equipment: 1 kg; CPC 47401: Parts for the goods of subclasses 47221 to 47223; By-product classification allocatable product
  EcoSpold01Location=RER
  production volume 2.67763 kg
    This is a placeholder value that does not reflect real-world production volumes. This dataset does not currently require a real-world production volume to work in the database framework, and no actual data were collected yet. This has no negative effect on the results of the ecoinvent database.
  property price 0.85 EUR2005
    Rough estimation. Calculated with prices of single inputs in the ecoinvent inventory of chassis production. The prices of single inputs have been collected already by ecoinvent.
  property carbon content, fossil 0.0691989
    C content calculated as the addition of the C contents in the final product components
  property carbon content 0.0691989
    carbon content on a dry matter basis (reserved; not for manual entry)
  property true value 0.85
    allocation property applied in "true value" allocation // value calculated from revenue
  properties: water content 0, wet mass 1 kg, dry mass 1 kg, water in wet mass 0 kg, carbon content, non-fossil 0, carbon allocation 0.0691989 kg

## By-products
- waste paperboard, sorted: 0 kg; CPC 39240: Waste and scrap of paper or paperboard; By-product classification Recyclable; pedigree (1,1,1,1,1)
  It is assumed that 86.3% (wet weight) of waste paperboard, unsorted is segregated to waste paperboard, sorted. Waste paper, sorted is later used in recycling industry where maximum 79% of it, is transformed into new paperboard.
  production volume 0.010356 kg
  property price 0.0436 EUR2005; name ByP_waste_paperboard_sorted_price_EUR200
    Estimated value; three different sources were used to determine the price for waste paperboard, sorted. 35 AUD/tonne (http://larimer.org/solidwaste/charts/Current.htm, accessed 20130328), 70 GBP/tonne (http://www.letsrecycle.com/prices/waste%20paper, accessed 20130328) and 20 USD/tonne (http://www.oxpaperboard.com/1/post/2013/03/ox-paperboard-announces-price-adjustment-to-uncoated-recycled-paperboard.html, accessed 20130328).
  property water content 0.243781; = WWM_waste_paperboard_sorted/ DM_waste_paperboard_sorted
  property water in wet mass 0.196 kg; name WWM_waste_paperboard_sorted; = WM_waste_paperboard_sorted- DM_waste_paperboard_sorted
  property dry mass 0.804 kg; name DM_waste_paperboard_sorted
  property wet mass 1 kg; name WM_waste_paperboard_sorted
  property carbon content 0.483259
    carbon content on a dry matter basis (reserved; not for manual entry)
  property true value 0.000150507
    allocation property applied in "true value" allocation // value calculated from revenue
  properties: carbon content, non-fossil 0.483259, carbon content, fossil 0, carbon allocation 0.38854 kg
- electricity, for reuse in municipal waste incineration only: 0 kWh; CPC 17100: Electrical energy; By-product classification allocatable product; pedigree (1,1,1,1,1)
  Net electricity generated from this waste and used in internal MSWI plant energy redistribution.
  Uncertainty: uncertainty is calculated from uncertainties in waste composition and uncertainties in energy efficiency and the uncertainty in internal energy demand
  production volume 0.411476 kWh
  property true value relation 3.6; name E_el_prod_MSWI_true_value_relation
    property to calculate "true value" from
  property exergy 3.6 MJ; name E_el_prod_MSWI_exergy
    This exergy property is based on the exergy content of the product.
  property price 0.1 EUR2005; name E_el_prod_MSWI_price_EUR2005
    Estimated to be the same price as in case of electricity, medium voltage.
  property true value 0.0175797
    allocation property applied in "true value" allocation // value calculated from true value relation
- heat, for reuse in municipal waste incineration only: 0 MJ; CPC 17300: Steam and hot water; By-product classification allocatable product; pedigree (1,1,1,1,1)
  Net useful heat generated from this waste and used in internal MSWI plant energy redistribution.
  Uncertainty: uncertainty is calculated from uncertainties in waste composition and uncertainties in energy efficiency and the uncertainty in internal energy demand
  production volume 2.86781 MJ
  property true value relation 0.1842; name E_th_prod_MSWI_true_value_relation
    property to calculate "true value" from
  property exergy 0.1842 MJ; name E_th_prod_MSWI_exergy
    This exergy property is based on the exergy content of the product.
  property price 0.0106 EUR2005; name E_th_prod_MSWI_price_EUR2005
    Average European district heat price from Ecoheatcool and Euroheat 2005-2006, Ecoheat Work package 1: The European heat market. Final report. 10.6 EUR/GJ i s the price of district heat. http://www.solarthermalworld.org/files/Ecoheatcool%20WP1%20Web.pdf?download
  property true value 0.00626909
    (same comment as for electricity, for reuse in municipal waste incineration only)
- zinc concentrate: 0 kg; CPC 14290: Other non-ferrous metal ores and concentrates (other than uranium or thorium ores and concentrates); By-product classification allocatable product
  Calculated value from the knowledge of the properties of both products.
  production volume 1.60456e-9 kg
  property price 0.38 EUR2005; name ByP_price_EUR2005
    Temporary price data. Calculated as 90% of purchasers price based on: Zinc content in concentrate 53%. Concentrate price per kg Zn 86.5% of refined Zn price (13.5% treatment charges according to CHR Metals Limited 2005: Dynamic cost curves. http://www.minecost.com/dynamic.pdf). 2004 zinc price from USGS (2007) Mineral commodity summaries 2007. <http://minerals.usgs.gov/minerals/pubs/mcs/2007/mcs2007.pdf> [Accessed 25 May 2010]
  property zinc content 0.53; name zinc_C_zinc_concentrate
    Zinc content on a dry matter basis. Value taken from teh "zinc mine operation" /GLO dataset.
  property dry mass 1 kg; name DM_zinc_concentrate
  property carbon content 0
    carbon content on a dry matter basis (reserved; not for manual entry)
  property true value 2.03244e-10
    allocation property applied in "true value" allocation // value calculated from revenue
  properties: wet mass 1 kg, water content 0, carbon content, non-fossil 0, carbon content, fossil 0, water in wet mass 0 kg, carbon allocation 0 kg

## Inputs from technosphere
- sheet rolling, steel: 0.60492 kg; lognormal variance with pedigree 0.138, pedigree (5,5,5,5,3)
  EcoSpold01Location=RER
  Assumption according to factsheets of network devices
  Uncertainty: assumption according to factsheets of network devices
- polypropylene, granulate: 0.048627 kg; lognormal variance with pedigree 0.138, pedigree (5,5,5,5,3)
  (same comment as for sheet rolling, steel)
  properties: wet mass 1 kg, dry mass 1 kg, carbon content, fossil 0.857143
  note on carbon content, fossil: Polypropylene is formed by the polymerisation of propylene, C3H6 (ecoinvent v2.2 report 11_II)
- silicone product: 0.000972541 kg; lognormal variance with pedigree 0.138, pedigree (5,5,5,5,3)
  (same comment as for sheet rolling, steel)
  properties: dry mass 1 kg, wet mass 1 kg, carbon content, fossil 0.324324
  note on carbon content, fossil: The term silicones is used for compounds in which silicon atoms are linked via oxygen atoms, each silicon atom bearing one or several organic groups. In industrially important silicones, these groups are usually methyl or phenyl (ecoinvent v2.2 report 8_part71 & Ullmann). The chemical formula was considered to be [Si(CH3)2O]n (Ullmann).
- flat glass, coated: 0.0194508 kg; lognormal variance with pedigree 0.138, pedigree (5,5,5,5,3)
  Assumption according to factsheets of network devices
  EcoSpold01Location=RER
  Uncertainty: assumption according to factsheets of network devices
  properties: dry mass 1 kg, wet mass 1 kg
- powder coat, steel: 0.048627 m2; lognormal variance with pedigree 0.138, pedigree (5,5,5,5,3)
  (same comment as for flat glass, coated)
- steel, low-alloyed, hot rolled: 0.60492 kg; lognormal variance with pedigree 0.138, pedigree (5,5,5,5,3)
  (same comment as for flat glass, coated)
  properties: carbon content, fossil 0.005, wet mass 1 kg, dry mass 1 kg
  note on carbon content, fossil: Low alloyed steel composition given in Tab. 3.2 ecoinvent v2.2 report 10_partII. Steel assumed to have a C content of 0.5%
- epoxy resin, liquid: 0.0194508 kg; lognormal variance with pedigree 0.138, pedigree (5,5,5,5,3)
  (same comment as for flat glass, coated)
  properties: carbon content, fossil 0.42325, wet mass 1 kg, dry mass 1 kg
- waste paperboard, unsorted: -0.00389016 kg; lognormal variance with pedigree 0.138, pedigree (5,5,5,5,3)
  EcoSpold01Location=CH
  Assumption according to factsheets of network devices
  Uncertainty: assumption according to factsheets of network devices
  production volume 0.012 kg
    Calculated from the production volume of chassis, internet access equipment in proportion to the respective output amounts.
  properties: price 0.03924 EUR2005, water content 0.243781, carbon content, non-fossil 0.483259, wet mass 1 kg, dry mass 0.804 kg
  note on carbon content, non-fossil: C content was calculated for 1 kg DM, using data in Tab A.3, ecoinvent v2.2 report 13_I.
- wire drawing, copper: 0.145881 kg; lognormal variance with pedigree 0.138, pedigree (5,5,5,5,3)
  (same comment as for flat glass, coated)
- aluminium, wrought alloy: 0.0165332 kg; lognormal variance with pedigree 0.138, pedigree (5,5,5,5,3)
  (same comment as for flat glass, coated)
  properties: dry mass 1 kg, wet mass 1 kg
- polyvinylchloride, bulk polymerised: 0.00972541 kg; lognormal variance with pedigree 0.138, pedigree (5,5,5,5,3)
  (same comment as for flat glass, coated)
  properties: dry mass 1 kg, wet mass 1 kg, carbon content, fossil 0.387097
  note on carbon content, fossil: Monomer is vynyl chloride, C2H3Cl (ecoinvent v2.2 report 11_II). MW=62 g/mol
- cast iron: 0.048627 kg; lognormal variance with pedigree 0.138, pedigree (5,5,5,5,3)
  (same comment as for flat glass, coated)
  properties: wet mass 1 kg, dry mass 1 kg, carbon content, fossil 0.04
  note on carbon content, fossil: Cast iron is made by remelting pig iron in small furnaces (e.g. cupola furnaces or electric arc furnaces) and poured into moulds to make castings. It usually contains 2% to 6% carbon (ecoinvent v2.2 report 10_partII). An average content of 4% was considered
- zinc: 0.000972541 kg; lognormal variance with pedigree 0.138, pedigree (5,5,5,5,3)
  (same comment as for sheet rolling, steel)
  properties: dry mass 1 kg, wet mass 1 kg
- waste bulk iron, excluding reinforcement: -0.653547 kg; lognormal variance with pedigree 0.138, pedigree (5,5,5,5,3)
  Assumption according to factsheets of network devices
  EcoSpold01Location=CH
  Uncertainty: assumption according to factsheets of network devices
  production volume 2.016 kg
    (same comment as for waste paperboard, unsorted)
  properties: wet mass 1 kg, dry mass 1 kg
- brass: 0.00972541 kg; lognormal variance with pedigree 0.138, pedigree (5,5,5,5,3)
  (same comment as for waste bulk iron, excluding reinforcement)
  properties: wet mass 1 kg, dry mass 1 kg
- tin: 0.00194508 kg; lognormal variance with pedigree 0.138, pedigree (5,5,5,5,3)
  (same comment as for sheet rolling, steel)
  properties: dry mass 1 kg, wet mass 1 kg
- copper: 0.145881 kg; lognormal variance with pedigree 0.138, pedigree (5,5,5,5,3)
  (same comment as for sheet rolling, steel)
  properties: dry mass 1 kg, wet mass 1 kg
- electricity, low voltage: 0 kWh; pedigree (1,1,1,1,1)
  Assumption according to factsheets of network devices
  EcoSpold01Location=UCTE
  Uncertainty: assumption according to factsheets of network devices
- polyethylene, high density, granulate: 0.00972541 kg; lognormal variance with pedigree 0.138, pedigree (5,5,5,5,3)
  (same comment as for sheet rolling, steel)
  properties: carbon content, fossil 0.857143, dry mass 1 kg, wet mass 1 kg
  note on carbon content, fossil: Polyethylene is formed out of a huge amount of ethylene monomers (C2H4) (ecoinvent v2.2 report 11_II). MW=28 g/mol
- aluminium, cast alloy: 0.0320938 kg; lognormal variance with pedigree 0.138, pedigree (5,5,5,5,3)
  (same comment as for flat glass, coated)
  properties: wet mass 1 kg, dry mass 1 kg
- corrugated board box: 0 kg; pedigree (1,1,1,1,1)
  Packaging
  EcoSpold01Location=RER
  Uncertainty: packaging
  properties: water content 0.0582011, dry mass 0.945 kg, carbon content, fossil 0.000656085, wet mass 1 kg, carbon content, non-fossil 0.432275
  note on carbon content, fossil: Fossil C content was calculated after fossil C contents of chemicals used in the production of board (Tab 10-15 & 10.16 ecoinvent v2.2 report 11_III, part 10)
  note on carbon content, non-fossil: Biogenic C content was calculated after biogenic C contents of chemicals used in the production of board (Tab 10.15 & 10.16, ecoinvent v2.2 report 11_III, part 10).
- waste plastic, industrial electronics: -0.106979 kg; lognormal variance with pedigree 0.138, pedigree (5,5,5,5,3)
  (same comment as for waste bulk iron, excluding reinforcement)
  production volume 0.33 kg
    (same comment as for waste paperboard, unsorted)
  properties: carbon content, fossil 0.81386, dry mass 0.847 kg, water content 0.180638, wet mass 1 kg
  note on carbon content, fossil: C content in 1 kg DM was calculated using data in Tab A.2, ecoinvent v2.2 report 13_I
- electricity, low voltage: 0.0129083, 0.00226394, 0.0372283, 0.563001, 0.0928006, 0.264339 kWh (6 entries); lognormal variance with pedigree 0.138, pedigree (5,5,5,5,3)
  (same comment as for electricity, low voltage)
- corrugated board box: 4.52589e-5, 0.0038449 kg (2 entries); lognormal variance with pedigree 0.138, pedigree (5,5,5,5,3)
  Packaging
  EcoSpold01Location=RER
  Uncertainty: packaging

## Sampling procedure
expert guess, factsheets

## Extrapolations
none This dataset has been copied from an original dataset covering the geography RER. The uncertainty has been adjusted accordingly.

## Review by Christian Bauer 2010-02-07
26.01.2010
passed
C:\Dokumente und Einstellungen\Marianne\Eigene Dateien\Projekte\277_Mobitool\Review\[Ecospold_Chassis-v1.1.xls]X-Process
