# solid bleached board production

Dataset: EcoSpold 2, unit process
Geography: RER
Time period: 2000-01-01 to 2019-12-31
Technology level: current
Classification: EcoSpold01Categories: paper & cardboard/cardboard & corrugated board
Classification: ISIC rev.4 ecoinvent: 1701:Manufacture of pulp, paper and paperboard
Synonyms: GZ
Tags: ConvertedDataset
Scenario: Business-as-Usual
System model: Allocation at the point of substitution
Generated by: Roland Hischier
Published in: Hischier R. 2007
Database: ecoinvent
isCopyrightProtected: true
accessRestrictedTo: 1

## General comment
[This dataset was already contained in the ecoinvent database version 2. It was not individually updated during the transfer to ecoinvent version 3. Life Cycle Impact Assessment results may still have changed, as they are affected by changes in the supply chain, i.e. in other datasets. This dataset was generated following the ecoinvent quality guidelines for version 2. It may have been subject to central changes described in the ecoinvent version 3 change report (http://www.ecoinvent.org/database/ecoinvent-version-3/reports-of-changes/), and the results of the central updates were reviewed extensively. The changes added e.g. consistent water flows and other information throughout the database. The documentation of this dataset can be found in the ecoinvent reports of version 2, which are still available via the ecoinvent website. The change report linked above covers all central changes that were made during the conversion process.]

## Included activities end
This module includes the European production of solid bleached board (SBB) in a mix of integrated and non-integrated mills - including transports to paper mill, wood handling, chemical pulping and bleaching rsp. pulp handling, board production, energy production on-site and internal waste water treatment.

## Geography
Data from a finnish database and from the CER of one European producer used as European average data.

## Technology
Average of present used technology

## Parameters
- fraction, process water, to air: 0.15 dimensionless; name fraction_PW_to_air; lognormal variance with pedigree 0.092025, pedigree (4,4,3,2,4)
  Literature value. In case when no industry/process specific data are available, default evaporation fraction value is used. This value is 15% and is based on literature (Statistics Canada, 2007 & Shaffer, K.H., 2008, Consumptive water use in the Great Lakes Basin, USGS & Shiklomanov, 2003, World Water Resources at the Beginning of the 21st Century) and has been approved by an expert.

## Reference product
- solid bleached board: 1 kg; CPC 321: Pulp, paper and paperboard; By-product classification allocatable product
  EcoSpold01Location=RER
  production volume 1.32237 kg
    This is a placeholder value that does not reflect real-world production volumes. This dataset does not currently require a real-world production volume to work in the database framework, and no actual data were collected yet. This has no negative effect on the results of the ecoinvent database. The placeholder value of this activity was scaled according to the nominal GDP of 2005 (source: United Nations, http://data.un.org/Glossary.aspx?q=GDP+%28current+US%24%29, accessed 20130726) to reflect an appropriate share of the global production volume, which is also a placeholder value.
  property carbon content, fossil 0.0190874
    Fossil C content was calculated after fossil C contents of chemicals used in the production of board (Tab 11.20 ecoinvent v2.2 report 11_III, part 11)
  property carbon content, non-fossil 0.327779
    Biogenic C content was calculated after biogenic C contents of chemicals used in the production of board (Tab 11.20 ecoinvent v2.2 report 11_III, part 11). The cellulose content in 1 kg of paper (on a wet mas basis) was estimated as (1-chemical content), C content of cellulose was considered 0.44 kgC/kg dry mass (ecoinvent v2.2 report, n 15a, pg 40)
  property carbon content 0.346866
    carbon content on a dry matter basis (reserved; not for manual entry)
  property true value 0.844
    allocation property applied in "true value" allocation // value calculated from revenue
  properties: price 0.844 EUR2005, dry mass 0.945 kg, water content 0.0582011, wet mass 1 kg, water in wet mass 0.055 kg, carbon allocation 0.327788 kg

## By-products
All rows: By-product classification allocatable product
- phosphate fertiliser, as P2O5: 0 kg; source CRAAQ 2010; CPC 3462: Mineral or chemical fertilizers, phosphatic; pedigree (1,1,1,1,1)
  This is the total phosphate (as P2O5) output (organic and mineral forms of phosphate contained) from organic origin. In practice, only a part of this total amount is available to the plants and the available amount has to be calculated considering efficiency of organic phosphate (to replace mineral phosphate), which also depends on many factors, such as climate, soil, crop, timing and technique of application, etc. For information purposes, the amount considering efficiency of organic phosphate is estimated in the parameter section of this dataset under 'phosphorus availability for plants'. Since this dataset includes field emissions from the application of sludge, phosphate availability has been accounted for in the calculation of direct field emissions.
  production volume 2.41384e-6 kg
  property price 0.241 EUR2005; name P2O5_fertiliser_price_EUR2005
    Temporary price data. Calculated as 90% of purchasers price based on: 2004 prices are calculated on basis of Import/Export data (tonnes and US$) from UN Trade Statistics Database (http://data.un.org/Browse.aspx?d=ComTrade, accessed 7/7-2010). N, P2O5, or K2O content (http://www.fertilizer.org/ifa/Home-Page/STATISTICS/Conversions-factors)
  property carbon content 0
    carbon content on a dry matter basis (reserved; not for manual entry)
  property true value 5.81305e-7
    allocation property applied in "true value" allocation // value calculated from revenue
  properties: water content 0, carbon content, non-fossil 0, wet mass 1 kg, dry mass 1 kg, water in wet mass 0 kg, carbon content, fossil 0, carbon allocation 0 kg
- nitrogen fertiliser, as N: 0 kg; source CRAAQ 2010; CPC 3461: Mineral or chemical fertilizers, nitrogenous; pedigree (1,1,1,1,1)
  This is the total nitrogen (as N) output (organic and mineral forms of nitrogen contained) from organic origin. In practice, only a part of this total amount is available to the plants and the available amount has to be calculated considering nitrogen efficiency (to replace mineral nitrogen), which also depends on many factors, such as climate, soil, crop, timing and technique of application, etc. For information purposes, the amount considering nitrogen efficiency is estimated in the parameter section of this dataset under 'nitrogen availability for plants'. Since this dataset includes field emissions from the application of sludge, nitrogen availability has been accounted for in the calculation of direct field emissions.
  production volume 3.60634e-6 kg
  property price 0.473 EUR2005; name N_fertiliser_price_EUR2005
    (same comment as for phosphate fertiliser, as P2O5)
  property carbon content 0
    carbon content on a dry matter basis (reserved; not for manual entry)
  property true value 1.70454e-6
    allocation property applied in "true value" allocation // value calculated from revenue
  properties: dry mass 1 kg, water content 0, carbon content, fossil 0, carbon content, non-fossil 0, water in wet mass 0 kg, wet mass 1 kg, carbon allocation 0 kg
- soil pH raising agent, as CaCO3: 0 kg; source Marianne Lemieux 2013; CPC 34659: Fertilizers n.e.c.; pedigree (1,1,1,1,1)
  Calculated value of the amount of CaCO3 that can be substituted considered the liming efficiency of the sludge.
  production volume 6.723e-5 kg
  property carbon content, non-fossil 0; name soil_pH_raising_a_C_content_non_fossil_0
    biogene carbon content on a dry matter basis
  property carbon content, fossil 0.12; name soil_pH_raising_agent_Cfoss_content; = 12/(40+12+3*16)
    Stoichiometric calculation. Fossil carbon content on a dry matter basis.
  property price 0.117 EUR2005; name soil_pH_raising_agent_as_CaCO3_price_EUR
    The price is estimated to be the same as for lime.
  property carbon content 0.12
    carbon content on a dry matter basis (reserved; not for manual entry)
  property true value 7.86009e-6
    allocation property applied in "true value" allocation // value calculated from revenue
  properties: water in wet mass 0 kg, dry mass 1 kg, water content 0, wet mass 1 kg, carbon allocation 0.12 kg
- potassium fertiliser, as K2O: 0 kg; source CRAAQ 2010; CPC 3463: Mineral or chemical fertilizers, potassic; pedigree (1,1,1,1,1)
  This is the potassium (as K2O) output (organic and mineral forms of potassium contained) from organic origin. In practice, only a part of this total amount is available to the plants and the available amount has to be calculated considering efficiency of organic potassium (to replace mineral potassium ), which also depends on many factors, such as climate, soil, crop, timing and technique of application, etc. For information purposes, the amount considering efficiency of organic potassium is estimated in the parameter section of this dataset under 'potassium availability for plants'. Since this dataset includes field emissions from the application of sludge, potassium availability has been accounted for in the calculation of direct field emissions.
  production volume 5.83125e-7 kg
  property price 0.188 EUR2005; name K2O_fertiliser_price_EUR2005
    Temporary price data. Calculated as 90% of purchasers price based on: 2004 import price calulated from FAOSTAT (http://faostat.fao.org/site/575/DesktopDefault.aspx?PageID=575#ancor [accessed 2011.01.27] Potash Fertilizers (K20 total nutrients) in kUSD/Mg
  property carbon content 0
    carbon content on a dry matter basis (reserved; not for manual entry)
  property true value 1.09546e-7
    allocation property applied in "true value" allocation // value calculated from revenue
  properties: wet mass 1 kg, water content 0, water in wet mass 0 kg, dry mass 1 kg, carbon content, fossil 0, carbon content, non-fossil 0, carbon allocation 0 kg
- electricity, for reuse in municipal waste incineration only: 0 kWh; CPC 17100: Electrical energy; pedigree (1,1,1,1,1)
  Net electricity generated from this waste and used in internal MSWI plant energy redistribution.
  Uncertainty: uncertainty is calculated from uncertainties in waste composition and uncertainties in energy efficiency and the uncertainty in internal energy demand
  production volume 3.81762e-8 kWh
  property exergy 3.6 MJ; name E_el_prod_MSWI_exergy
    This exergy property is based on the exergy content of the product.
  property true value relation 3.6; name E_el_prod_MSWI_true_value_relation
    property to calculate "true value" from
  property price 0.1 EUR2005; name E_el_prod_MSWI_price_EUR2005
    Estimated to be the same price as in case of electricity, medium voltage.
  property true value 3.6246e-12
    allocation property applied in "true value" allocation // value calculated from true value relation
- heat, for reuse in municipal waste incineration only: 0 MJ; CPC 17300: Steam and hot water; pedigree (1,1,1,1,1)
  Net useful heat generated from this waste and used in internal MSWI plant energy redistribution.
  Uncertainty: uncertainty is calculated from uncertainties in waste composition and uncertainties in energy efficiency and the uncertainty in internal energy demand
  production volume 2.70074e-7 MJ
  property exergy 0.1842 MJ; name E_th_prod_MSWI_exergy
    This exergy property is based on the exergy content of the product.
  property true value relation 0.1842; name E_th_prod_MSWI_true_value_relation
    property to calculate "true value" from
  property price 0.0106 EUR2005; name E_th_prod_MSWI_price_EUR2005
    Average European district heat price from Ecoheatcool and Euroheat 2005-2006, Ecoheat Work package 1: The European heat market. Final report. 10.6 EUR/GJ i s the price of district heat. http://www.solarthermalworld.org/files/Ecoheatcool%20WP1%20Web.pdf?download
  property true value 1.31201e-12
    (same comment as for electricity, for reuse in municipal waste incineration only)
- zinc concentrate: 0 kg; CPC 14290: Other non-ferrous metal ores and concentrates (other than uranium or thorium ores and concentrates)
  Calculated value from the knowledge of the properties of both products.
  production volume 9.57955e-12 kg
  property price 0.38 EUR2005; name ByP_price_EUR2005
    Temporary price data. Calculated as 90% of purchasers price based on: Zinc content in concentrate 53%. Concentrate price per kg Zn 86.5% of refined Zn price (13.5% treatment charges according to CHR Metals Limited 2005: Dynamic cost curves. http://www.minecost.com/dynamic.pdf). 2004 zinc price from USGS (2007) Mineral commodity summaries 2007. <http://minerals.usgs.gov/minerals/pubs/mcs/2007/mcs2007.pdf> [Accessed 25 May 2010]
  property zinc content 0.53; name zinc_C_zinc_concentrate
    Zinc content on a dry matter basis. Value taken from teh "zinc mine operation" /GLO dataset.
  property dry mass 1 kg; name DM_zinc_concentrate
  property carbon content 0
    carbon content on a dry matter basis (reserved; not for manual entry)
  property true value 2.69002e-15
    allocation property applied in "true value" allocation // value calculated from revenue
  properties: wet mass 1 kg, water content 0, carbon content, non-fossil 0, carbon content, fossil 0, water in wet mass 0 kg, carbon allocation 0 kg

## Inputs from technosphere
- oxygen, liquid: 0.0162998 kg; lognormal variance with pedigree 0.0527, pedigree (2,4,5,3,1)
  EcoSpold01Location=RER
  Average from a finnish database
  Uncertainty: average from a finnish database
  properties: wet mass 1 kg, dry mass 1 kg
- sulfate pulp, bleached: 0.219597 kg; lognormal variance with pedigree 0.0527, pedigree (2,4,5,3,1)
  Average from a finnish database
  Uncertainty: average from a finnish database
  properties: dry mass 0.9 kg, wet mass 1 kg, water content 0.111111
- sodium chlorate, powder: 0.0168998 kg; lognormal variance with pedigree 0.0527, pedigree (2,4,5,3,1)
  (same comment as for oxygen, liquid)
  properties: dry mass 1 kg, wet mass 1 kg
- ash from paper production sludge: 0 kg; pedigree (1,1,1,1,1)
  EcoSpold01Location=CH
  Average from a finnish database
  Uncertainty: average from a finnish database
  production volume 0 kg
    Calculated from the production volume of solid bleached board in proportion to the respective output amounts.
  properties: wet mass 1 kg, carbon content, non-fossil 0.0092, dry mass 1 kg
- sludge from pulp and paper production: 0 kg; pedigree (1,1,1,1,1)
  Average from a finnish database
  EcoSpold01Location=CH
  Uncertainty: average from a finnish database
  production volume 0 kg
    (same comment as for ash from paper production sludge)
  properties: wet mass 1 kg, water content 0.333333, carbon content, non-fossil 0.21, dry mass 0.75 kg
  note on carbon content, non-fossil: Tab 6.21, ecoinvent v2.2 report 11_III & Tab A.9, ecoinvent v2.2 report 13_I. Sludge from pulp and paper contains 15.75% carbon
- latex: 0.0116999 kg; lognormal variance with pedigree 0.0527, pedigree (2,4,5,3,1)
  (same comment as for oxygen, liquid)
  properties: wet mass 1 kg, carbon content, fossil 0.872983, dry mass 1 kg
  note on carbon content, fossil: The Styrene-butadiene dispersion is based on styrene and 1,3-butadiene plus co-monomers like i.e. ac-rylonitrile or (meth-)acrylic acid (ecoinvent v2.2 report 11_III). Following specifications in US Patent 3,875,101 (1971), the dispersion was considered as: 52.5% 1.3-butadiene (0.8571 kg C/kg dry mass); 43% styrene (0.9231 kg C/kg dry mass); 2% acrylic acid (0.5 kg C/kg dry mass); 2.5% acrolein (C3H4O, MW=56; 0.6429 kg C/kg dry mass)
- carboxymethyl cellulose, powder: 0.000429995 kg; lognormal variance with pedigree 0.0527, pedigree (2,4,5,3,1)
  (same comment as for oxygen, liquid)
  properties: wet mass 1 kg, carbon content, fossil 0.0979592, dry mass 1 kg, carbon content, non-fossil 0.293878
  note on carbon content, fossil: Chemical structure: Cellulose-O-CH2-COO-Na+. CMC is produced by the processing of alkaline cellulose with mono acetic acid (ecoinvent v2.2 report 12, pg 76 & 81). MW Acetic acid (CH3-COOH) is 60 g/mol. The degree of carboxymethyl substitution in CMC is variable. It was considered that every molecule of glucose (monomers of cellulose) had a carboxymethyl substitution. MW of glucose (C6H10O5) is 162 g/mol; cellulose is (C6H10O5)n. MW of Na is 23
  note on carbon content, non-fossil: Chemical structure: Cellulose-O-CH2-COO-Na+. CMC is produced by the processing of alkaline cellulose with mono acetic acid (ecoinvent v2.2 report 12, pg 76 & 81). MW Acetic acid is 60 g/mol. The degree of carboxymethyl substitution in CMC is variable. It was considered that every molecule of glucose (monomers of cellulose) had a carboxymethyl substitution. MW of glucose (C6H10O5) is 162 g/mol; cellulose is (C6H10O5)n.
- sodium chloride, powder: 0.000259997 kg; lognormal variance with pedigree 0.0527, pedigree (2,4,5,3,1)
  (same comment as for oxygen, liquid)
  properties: dry mass 1 kg, wet mass 1 kg
- sulfuric acid: 0.0197998 kg; lognormal variance with pedigree 0.0527, pedigree (2,4,5,3,1)
  (same comment as for oxygen, liquid)
  properties: wet mass 1 kg, dry mass 1 kg
- wood ash mixture, pure: 0 kg; pedigree (1,1,1,1,1)
  (same comment as for sludge from pulp and paper production)
  production volume 0 kg
    (same comment as for ash from paper production sludge)
  properties: carbon content, non-fossil 0.012, dry mass 1 kg, wet mass 1 kg
- magnesium sulfate: 0.00290996 kg; lognormal variance with pedigree 0.0527, pedigree (2,4,5,3,1)
  (same comment as for oxygen, liquid)
  properties: dry mass 1 kg, wet mass 1 kg
- malusil: 0.00197998 kg; lognormal variance with pedigree 0.0527, pedigree (2,4,5,3,1)
  (same comment as for oxygen, liquid)
  properties: dry mass 1 kg, wet mass 1 kg
- paper mill, integrated: 4.07995e-11 unit; lognormal variance with pedigree 0.448, pedigree (4,5,5,5,5)
  EcoSpold01Location=RER
  Own assumption
  Uncertainty: own assumption
- quicklime, milled, loose: 0.00567993 kg; lognormal variance with pedigree 0.0527, pedigree (2,4,5,3,1)
  (same comment as for ash from paper production sludge)
  properties: wet mass 1 kg, water content 0.010101, dry mass 0.99 kg
- paper mill, non-integrated: 1.35998e-11 unit; lognormal variance with pedigree 0.448, pedigree (4,5,5,5,5)
  EcoSpold01Location=RER
  Own assumption
  Uncertainty: own assumption
- lignite briquettes: 0.0329996 MJ; lognormal variance with pedigree 0.0413, pedigree (2,3,5,3,1)
  EcoSpold01Location=DE
  Data from a finnish database & from one producer
  Uncertainty: data from a finnish database & from one producer
  properties: water content 0.234568, wet mass 0.0512821 kg, dry mass 0.0415385 kg, carbon content, fossil 0.65679
  note on carbon content, fossil: 53.2% C and 19% water in wet mass (ecoinvent v2.1 report 6_VI Table 7.1)
- heavy fuel oil: 0.0578993 kg; lognormal variance with pedigree 0.0413, pedigree (2,3,5,3,1)
  Data from a finnish database & from one producer
  EcoSpold01Location=RER
  Uncertainty: data from a finnish database & from one producer
  properties: dry mass 1 kg, carbon content, fossil 0.849, wet mass 1 kg
- chemical, inorganic: 0.00299996 kg; lognormal variance with pedigree 0.0527, pedigree (2,4,5,3,1)
  EcoSpold01Location=GLO
  Average from a finnish database
  Uncertainty: average from a finnish database
  properties: carbon content, fossil 0.003, wet mass 1 kg, dry mass 1 kg
  note on carbon content, fossil: This dataset is an unweighted average of 20 inorganic substances (listed in Tab 88.1, ecoinvent v2.2 report 8, part II), being part of the top100 chemicals included in this database. The C-content has also been calculated as an unweighted average of the C content of the substances composing this dataset.
- hard coal: 0.00699991 kg; lognormal variance with pedigree 0.0413, pedigree (2,3,5,3,1)
  Data from a finnish database & from one producer
  EcoSpold01Location=WEU
  Uncertainty: data from a finnish database & from one producer
  properties: carbon content, fossil 0.845, water content 0.0638298, wet mass 1 kg, dry mass 0.94 kg
  note on carbon content, fossil: C content 75-94% (specified in Tab 1.1, report 6, part VI). A mean content of 0.845 kg C/ kg dry hard coal was considered
- nitrogen, liquid: 0.000419995 kg; lognormal variance with pedigree 0.0527, pedigree (2,4,5,3,1)
  Average from a finnish database
  EcoSpold01Location=RER
  Uncertainty: average from a finnish database
  properties: wet mass 1 kg, dry mass 1 kg
- natural gas, high pressure: 0 m3; pedigree (1,1,1,1,1)
  (same comment as for heavy fuel oil)
  properties: heating value, gross 39 MJ, wet mass 0.84 kg, carbon content, fossil 0.602381, dry mass 0.84 kg
  note on carbon content, fossil: An average C content of 0.506 kg C/ m3 has been assumed (this average has been calculated using data in Tab 3.5, ecoinvent v2.2 report 6_V
- lime: 0.0674992 kg; lognormal variance with pedigree 0.0527, pedigree (2,4,5,3,1)
  (same comment as for ash from paper production sludge)
  properties: carbon content, fossil 0.120005, dry mass 1 kg, wet mass 1 kg
- hydrogen peroxide, without water, in 50% solution state: 0.00474994 kg; lognormal variance with pedigree 0.0527, pedigree (2,4,5,3,1)
  (same comment as for oxygen, liquid)
  properties: dry mass 1 kg, wet mass 1 kg
- sulfur dioxide, liquid: 0.00131998 kg; lognormal variance with pedigree 0.0527, pedigree (2,4,5,3,1)
  (same comment as for oxygen, liquid)
  properties: wet mass 1 kg, dry mass 1 kg
- pulpwood, hardwood, measured as solid wood under bark: 0 m3; pedigree (1,1,1,1,1)
  (same comment as for heavy fuel oil)
  properties: wet mass 1170 kg, dry mass 650 kg, carbon content, non-fossil 0.494, water content 0.8
  note on carbon content, non-fossil: C content of dry mass is 0.494 kgC/kg dry wood (ecoinvent v2.2 report 9)
- carbon dioxide, liquid: 0.00131998 kg; lognormal variance with pedigree 0.0527, pedigree (2,4,5,3,1)
  (same comment as for nitrogen, liquid)
  properties: carbon content, fossil 0.272727, dry mass 1 kg, wet mass 1 kg
- municipal solid waste: -0.0147998 kg; lognormal variance with pedigree 0.0527, pedigree (2,4,5,3,1)
  (same comment as for sludge from pulp and paper production)
  production volume 0.0148 kg
    (same comment as for ash from paper production sludge)
  properties: water content 0.297017, wet mass 1 kg, carbon content, fossil 0.171549, carbon content, non-fossil 0.261655, dry mass 0.771 kg
  note on carbon content, fossil: MSW composition in tab 4.1, ecoinvent v2.2 report 13_I. C content referred to 1 kg DM
- methanol: 0.00145998 kg; lognormal variance with pedigree 0.0527, pedigree (2,4,5,3,1)
  (same comment as for chemical, inorganic)
  properties: dry mass 1 kg, wet mass 1 kg, carbon content, fossil 0.375
- sodium hydroxide, without water, in 50% solution state: 0.0290996 kg; lognormal variance with pedigree 0.0527, pedigree (2,4,5,3,1)
  (same comment as for nitrogen, liquid)
  properties: wet mass 1 kg, dry mass 1 kg
- aluminium sulfate, powder: 0.000379995 kg; lognormal variance with pedigree 0.0527, pedigree (2,4,5,3,1)
  (same comment as for oxygen, liquid)
  properties: dry mass 1 kg, wet mass 1 kg
- electricity, medium voltage: 0.579293 kWh; lognormal variance with pedigree 0.0413, pedigree (2,3,5,3,1)
  Data from a finnish database & from one producer
  EcoSpold01Location=NORDEL
  Uncertainty: data from a finnish database & from one producer
- residual softwood, wet: 0.000200998 m3; lognormal variance with pedigree 0.0413, pedigree (2,3,5,3,1)
  (same comment as for heavy fuel oil)
  properties: carbon content, non-fossil 0.494, water content 0.7, wet mass 765 kg, dry mass 450 kg
- alkylketene dimer sizing agent, for paper production: 0.000199998 kg; lognormal variance with pedigree 0.0527, pedigree (2,4,5,3,1)
  (same comment as for oxygen, liquid)
  properties: wet mass 1 kg, carbon content, non-fossil 0.538229, dry mass 1 kg
  note on carbon content, non-fossil: Chemical formula of alkyl ketene dimer was considered as C38H72O20, and the molecular weight 848g/mol. It is produced from Fatty acids, from vegetarian oil
- potato starch: 0.0132998 kg; lognormal variance with pedigree 0.0527, pedigree (2,4,5,3,1)
  Average from a finnish database
  EcoSpold01Location=DE
  Uncertainty: average from a finnish database
  properties: dry mass 0.8 kg, wet mass 1 kg, carbon content, non-fossil 0.46, water content 0.25
  note on carbon content, non-fossil: C-content of starch is considered 46% on dry mass basis (from "Evolutionary and Biochemical Aspects", A.D. Kay and T. Vrede (in Global Ecology, 2010, Elsevier B.V., S.E. Jørgensen Ed.)).
- pulpwood, softwood, measured as solid wood under bark: 0 m3; pedigree (1,1,1,1,1)
  (same comment as for heavy fuel oil)
  properties: water content 1.4, dry mass 450 kg, wet mass 1080 kg, carbon content, non-fossil 0.494
- phosphorus, white, liquid: 9.99988e-6 kg; lognormal variance with pedigree 0.0527, pedigree (2,4,5,3,1)
  (same comment as for oxygen, liquid)
  properties: dry mass 1 kg, wet mass 1 kg
- kaolin: 0.0674992 kg; lognormal variance with pedigree 0.0527, pedigree (2,4,5,3,1)
  (same comment as for oxygen, liquid)
  properties: wet mass 1 kg, dry mass 1 kg
- ash from paper production sludge: -0.000173464, -4.53423e-6 kg (2 entries); lognormal variance with pedigree 0.0527, pedigree (2,4,5,3,1)
  (same comment as for ash from paper production sludge)
  production volume 0.000178 kg
- sludge from pulp and paper production: -0.000629527, -4.65545e-7 kg (2 entries); lognormal variance with pedigree 0.0527, pedigree (2,4,5,3,1)
  (same comment as for sludge from pulp and paper production)
  production volume 0.00063 kg
- wood ash mixture, pure: -0.00766345, -0.000156451 kg (2 entries); lognormal variance with pedigree 0.0527, pedigree (2,4,5,3,1)
  (same comment as for sludge from pulp and paper production)
  production volume 0.00782 kg
- natural gas, high pressure: 0.031081, 0.000200677 m3 (2 entries); lognormal variance with pedigree 0.0413, pedigree (2,3,5,3,1)
  (same comment as for heavy fuel oil)
- pulpwood, hardwood, measured as solid wood under bark: 0.00107317, 2.98152e-5 m3 (2 entries); lognormal variance with pedigree 0.0413, pedigree (2,3,5,3,1)
  (same comment as for heavy fuel oil)
- pulpwood, softwood, measured as solid wood under bark: 0.00187548, 1.65e-5 m3 (2 entries); lognormal variance with pedigree 0.0413, pedigree (2,3,5,3,1)
  (same comment as for heavy fuel oil)

## Inputs from nature
- Water, unspecified natural origin [natural resource, in water]: 0.080999 m3; name water_UNO_input; lognormal variance with pedigree 0.0421, pedigree (1,4,5,3,1)
  Data from one European producer
  Uncertainty: data from one European producer

## Emissions to nature
- Pentane [air, urban air close to ground]: 1.46998e-6 kg; lognormal variance with pedigree 0.1786, pedigree (2,5,5,1,4)
  Estimation - based on respective heating modules
  Uncertainty: estimation - based on respective heating modules
- Nitrogen [water, surface water]: 0.000219997 kg; lognormal variance with pedigree 0.0813, pedigree (2,3,5,3,1)
  Data from a finnish database & from one producer
  Uncertainty: data from a finnish database & from one producer
- Particulates, < 2.5 um [air, urban air close to ground]: 0.000478994 kg; lognormal variance with pedigree 0.3413, pedigree (2,3,5,3,1)
  (same comment as for Nitrogen)
- Benzo(a)pyrene [air, urban air close to ground]: 1.68998e-8 kg; lognormal variance with pedigree 0.1786, pedigree (2,5,5,1,4)
  (same comment as for Pentane)
- Hydrocarbons, aliphatic, alkanes, unspecified [air, urban air close to ground]: 1.18999e-5 kg; lognormal variance with pedigree 0.1786, pedigree (2,5,5,1,4)
  (same comment as for Pentane)
- Fluorine [air, urban air close to ground]: 3.94995e-7 kg; lognormal variance with pedigree 0.1786, pedigree (2,5,5,1,4)
  (same comment as for Pentane)
- Acetic acid [air, urban air close to ground]: 1.61998e-6 kg; lognormal variance with pedigree 0.1786, pedigree (2,5,5,1,4)
  (same comment as for Pentane)
- Benzene [air, urban air close to ground]: 1.09999e-5 kg; lognormal variance with pedigree 0.1786, pedigree (2,5,5,1,4)
  (same comment as for Pentane)
- Potassium [air, urban air close to ground]: 0.000185998 kg; lognormal variance with pedigree 0.7786, pedigree (2,5,5,1,4)
  (same comment as for Pentane)
- Thorium [air, urban air close to ground]: 2.33997e-9 kg; lognormal variance with pedigree 0.7786, pedigree (2,5,5,1,4)
  (same comment as for Pentane)
- Hydrocarbons, aromatic [air, urban air close to ground]: 3.57996e-7 kg; lognormal variance with pedigree 0.1786, pedigree (2,5,5,1,4)
  (same comment as for Pentane)
- Thorium-232 [air, urban air close to ground]: 3.66996e-6 kBq; lognormal variance with pedigree 0.4386, pedigree (2,5,5,1,4)
  (same comment as for Pentane)
- Xylene [air, urban air close to ground]: 2.14997e-6 kg; lognormal variance with pedigree 0.1786, pedigree (2,5,5,1,4)
  (same comment as for Pentane)
- Methane, fossil [air, urban air close to ground]: 0.000204998 kg; lognormal variance with pedigree 0.1786, pedigree (2,5,5,1,4)
  (same comment as for Pentane)
- AOX, Adsorbable Organic Halogen as Cl [water, surface water]: 0.000129998 kg; lognormal variance with pedigree 0.0813, pedigree (2,3,5,3,1)
  (same comment as for Nitrogen)
- Calcium [air, urban air close to ground]: 7.9199e-5 kg; lognormal variance with pedigree 0.4386, pedigree (2,5,5,1,4)
  (same comment as for Pentane)
- Butane [air, urban air close to ground]: 8.5699e-7 kg; lognormal variance with pedigree 0.4386, pedigree (2,5,5,1,4)
  (same comment as for Pentane)
- Cadmium [air, urban air close to ground]: 8.95989e-8 kg; lognormal variance with pedigree 0.7786, pedigree (2,5,5,1,4)
  (same comment as for Pentane)
- DOC, Dissolved Organic Carbon [water, surface water]: 0.00692584 kg; lognormal variance with pedigree 0.0813, pedigree (2,3,5,3,1)
  Calculated as equal to TOC.
  Uncertainty: data from a finnish database & from one producer
- Methane, non-fossil [air, urban air close to ground]: 3.15996e-6 kg; lognormal variance with pedigree 0.1786, pedigree (2,5,5,1,4)
  (same comment as for Pentane)
- Aluminium [air, urban air close to ground]: 9.82988e-6 kg; lognormal variance with pedigree 0.1786, pedigree (2,5,5,1,4)
  (same comment as for Pentane)
- Titanium [air, urban air close to ground]: 2.39997e-7 kg; lognormal variance with pedigree 0.7786, pedigree (2,5,5,1,4)
  (same comment as for Pentane)
- Lead [air, urban air close to ground]: 3.73995e-7 kg; lognormal variance with pedigree 0.7786, pedigree (2,5,5,1,4)
  (same comment as for Pentane)
- Molybdenum [air, urban air close to ground]: 6.75992e-8 kg; lognormal variance with pedigree 0.7786, pedigree (2,5,5,1,4)
  (same comment as for Pentane)
- Dioxins, measured as 2,3,7,8-tetrachlorodibenzo-p-dioxin [air, urban air close to ground]: 4.41995e-12 kg; lognormal variance with pedigree 0.1786, pedigree (2,5,5,1,4)
  (same comment as for Pentane)
- Cobalt [air, urban air close to ground]: 1.03999e-7 kg; lognormal variance with pedigree 0.7786, pedigree (2,5,5,1,4)
  (same comment as for Pentane)
- Lead-210 [air, urban air close to ground]: 4.92994e-5 kBq; lognormal variance with pedigree 0.4386, pedigree (2,5,5,1,4)
  (same comment as for Pentane)
- Potassium-40 [air, urban air close to ground]: 1.34998e-5 kBq; lognormal variance with pedigree 0.4386, pedigree (2,5,5,1,4)
  (same comment as for Pentane)
- Carbon dioxide, fossil [air, urban air close to ground]: 0.334996 kg; lognormal variance with pedigree 0.0413, pedigree (2,3,5,3,1)
  (same comment as for Nitrogen)
- Propionic acid [air, urban air close to ground]: 2.44997e-8 kg; lognormal variance with pedigree 0.1786, pedigree (2,5,5,1,4)
  (same comment as for Pentane)
- Scandium [air, urban air close to ground]: 6.61992e-10 kg; lognormal variance with pedigree 0.7786, pedigree (2,5,5,1,4)
  (same comment as for Pentane)
- Manganese [air, urban air close to ground]: 1.36998e-6 kg; lognormal variance with pedigree 0.7786, pedigree (2,5,5,1,4)
  (same comment as for Pentane)
- Boron [air, urban air close to ground]: 7.43991e-6 kg; lognormal variance with pedigree 0.7786, pedigree (2,5,5,1,4)
  (same comment as for Pentane)
- Carbon dioxide, non-fossil [air, urban air close to ground]: 1.85998 kg; lognormal variance with pedigree 0.0413, pedigree (2,3,5,3,1)
  (same comment as for Nitrogen)
- Acetaldehyde [air, urban air close to ground]: 8.4199e-7 kg; lognormal variance with pedigree 0.1786, pedigree (2,5,5,1,4)
  (same comment as for Pentane)
- Uranium-238 [air, urban air close to ground]: 1.06999e-5 kBq; lognormal variance with pedigree 0.4386, pedigree (2,5,5,1,4)
  (same comment as for Pentane)
- Selenium [air, urban air close to ground]: 7.9399e-8 kg; lognormal variance with pedigree 0.7786, pedigree (2,5,5,1,4)
  (same comment as for Pentane)
- Barium [air, urban air close to ground]: 1.87998e-7 kg; lognormal variance with pedigree 0.7786, pedigree (2,5,5,1,4)
  (same comment as for Pentane)
- Sulfur dioxide [air, urban air close to ground]: 0.000989988 kg; lognormal variance with pedigree 0.0413, pedigree (2,3,5,3,1)
  (same comment as for Nitrogen)
- Phenol, pentachloro- [air, urban air close to ground]: 6.40992e-11 kg; lognormal variance with pedigree 0.1786, pedigree (2,5,5,1,4)
  (same comment as for Pentane)
- Ethyne [air, urban air close to ground]: 3.31996e-6 kg; lognormal variance with pedigree 0.1786, pedigree (2,5,5,1,4)
  (same comment as for Pentane)
- Arsenic [air, urban air close to ground]: 7.65991e-8 kg; lognormal variance with pedigree 0.1786, pedigree (2,5,5,1,4)
  (same comment as for Pentane)
- Hydrogen fluoride [air, urban air close to ground]: 6.78992e-7 kg; lognormal variance with pedigree 0.1786, pedigree (2,5,5,1,4)
  (same comment as for Pentane)
- Tin [air, urban air close to ground]: 1.42998e-9 kg; lognormal variance with pedigree 0.7786, pedigree (2,5,5,1,4)
  (same comment as for Pentane)
- Iodine [air, urban air close to ground]: 3.15996e-8 kg; lognormal variance with pedigree 0.1786, pedigree (2,5,5,1,4)
  (same comment as for Pentane)
- Thallium [air, urban air close to ground]: 4.00995e-10 kg; lognormal variance with pedigree 0.7786, pedigree (2,5,5,1,4)
  (same comment as for Pentane)
- Beryllium [air, urban air close to ground]: 1.87998e-9 kg; lognormal variance with pedigree 0.7786, pedigree (2,5,5,1,4)
  (same comment as for Pentane)
- Copper [air, urban air close to ground]: 3.10996e-7 kg; lognormal variance with pedigree 0.7786, pedigree (2,5,5,1,4)
  (same comment as for Pentane)
- Toluene [air, urban air close to ground]: 3.34996e-6 kg; lognormal variance with pedigree 0.1786, pedigree (2,5,5,1,4)
  (same comment as for Pentane)
- Phenol [air, urban air close to ground]: 3.21996e-7 kg; lognormal variance with pedigree 0.1786, pedigree (2,5,5,1,4)
  (same comment as for Pentane)
- Hydrocarbons, aliphatic, unsaturated [air, urban air close to ground]: 2.78997e-5 kg; lognormal variance with pedigree 0.1786, pedigree (2,5,5,1,4)
  (same comment as for Pentane)
- Hydrogen chloride [air, urban air close to ground]: 1.37998e-5 kg; lognormal variance with pedigree 0.1786, pedigree (2,5,5,1,4)
  (same comment as for Pentane)
- Water [water, unspecified]: 0.0688492 m3; name water_to_water_unspecified; = water_UNO_input*(1-fraction_PW_to_air); lognormal variance with pedigree 0.0807, pedigree (2,2,5,1,1)
  Calculated value based on literature values and expert opinion. See comments in the parametres' comment field.
  property fraction, origin: unspecified 1; name fraction_origin_unspecified_Ww
  property fraction, origin: salt water 0; name fraction_origin_salt_water_Ww
  property dry mass 0 kg; name DM
  property wet mass 1000 kg; name WM
  property carbon content, non-fossil 0; name C_content_non_fossil
  property carbon content, fossil 0; name C_content_fossil
  property fraction, origin: fresh water 0; name fraction_origin_fresh_water_Ww
  property water in wet mass 1000 kg; name WWM
- Phosphorus [water, surface water]: 2.46997e-5 kg; lognormal variance with pedigree 0.0813, pedigree (2,3,5,3,1)
  (same comment as for Nitrogen)
- Vanadium [air, urban air close to ground]: 6.29992e-6 kg; lognormal variance with pedigree 0.7786, pedigree (2,5,5,1,4)
  (same comment as for Pentane)
- Water [air, unspecified]: 0.0121499 m3; name water_to_air_unspecified; = (water_UNO_input*fraction_PW_to_air); lognormal variance with pedigree 0.0807, pedigree (2,2,5,1,1)
  (same comment as for Water)
  property fraction, origin: salt water 0; name fraction_origin_salt_water
  property fraction, origin: fresh water 0; name fraction_origin_fresh_water
  property fraction, origin: unspecified 1; name fraction_origin_unspecified
- BOD5, Biological Oxygen Demand [water, surface water]: 0.00152998 kg; lognormal variance with pedigree 0.0813, pedigree (2,3,5,3,1)
  (same comment as for Nitrogen)
- Benzene, hexachloro- [air, urban air close to ground]: 5.68993e-14 kg; lognormal variance with pedigree 0.1786, pedigree (2,5,5,1,4)
  (same comment as for Pentane)
- Magnesium [air, urban air close to ground]: 8.4899e-6 kg; lognormal variance with pedigree 0.7786, pedigree (2,5,5,1,4)
  (same comment as for Pentane)
- Ammonia [air, urban air close to ground]: 1.36998e-5 kg; lognormal variance with pedigree 0.1786, pedigree (2,5,5,1,4)
  (same comment as for Pentane)
- Antimony [air, urban air close to ground]: 1.65998e-8 kg; lognormal variance with pedigree 0.1786, pedigree (2,5,5,1,4)
  (same comment as for Pentane)
- Ethanol [air, urban air close to ground]: 7.15991e-7 kg; lognormal variance with pedigree 0.1786, pedigree (2,5,5,1,4)
  (same comment as for Pentane)
- Propene [air, urban air close to ground]: 3.31996e-6 kg; lognormal variance with pedigree 0.1786, pedigree (2,5,5,1,4)
  (same comment as for Pentane)
- COD, Chemical Oxygen Demand [water, surface water]: 0.0186998 kg; lognormal variance with pedigree 0.0813, pedigree (2,3,5,3,1)
  (same comment as for Nitrogen)
- Polonium-210 [air, urban air close to ground]: 9.05989e-5 kBq; lognormal variance with pedigree 0.4386, pedigree (2,5,5,1,4)
  (same comment as for Pentane)
- Uranium [air, urban air close to ground]: 3.75995e-9 kg; lognormal variance with pedigree 0.7786, pedigree (2,5,5,1,4)
  (same comment as for Pentane)
- Strontium [air, urban air close to ground]: 2.08997e-7 kg; lognormal variance with pedigree 0.7786, pedigree (2,5,5,1,4)
  (same comment as for Pentane)
- Chromium VI [air, urban air close to ground]: 1.71998e-9 kg; lognormal variance with pedigree 0.7786, pedigree (2,5,5,1,4)
  (same comment as for Pentane)
- Carbon monoxide, fossil [air, urban air close to ground]: 0.00261997 kg; lognormal variance with pedigree 0.7786, pedigree (2,5,5,1,4)
  (same comment as for Pentane)
- Iron [air, urban air close to ground]: 1.00999e-5 kg; lognormal variance with pedigree 0.7786, pedigree (2,5,5,1,4)
  (same comment as for Pentane)
- Carbon monoxide, non-fossil [air, urban air close to ground]: 0.000379995 kg; lognormal variance with pedigree 0.7786, pedigree (2,5,5,1,4)
  (same comment as for Pentane)
- NMVOC, non-methane volatile organic compounds, unspecified origin [air, urban air close to ground]: 1.62998e-5 kg; lognormal variance with pedigree 0.1786, pedigree (2,5,5,1,4)
  (same comment as for Pentane)
- Radium-226 [air, urban air close to ground]: 1.26998e-5 kBq; lognormal variance with pedigree 0.4386, pedigree (2,5,5,1,4)
  (same comment as for Pentane)
- Phosphorus [air, urban air close to ground]: 2.44997e-6 kg; lognormal variance with pedigree 0.1786, pedigree (2,5,5,1,4)
  (same comment as for Pentane)
- Thorium-228 [air, urban air close to ground]: 5.87993e-6 kBq; lognormal variance with pedigree 0.4386, pedigree (2,5,5,1,4)
  (same comment as for Pentane)
- Ethane [air, urban air close to ground]: 9.95988e-6 kg; lognormal variance with pedigree 0.1786, pedigree (2,5,5,1,4)
  (same comment as for Pentane)
- Chromium [air, urban air close to ground]: 1.18999e-7 kg; lognormal variance with pedigree 0.7786, pedigree (2,5,5,1,4)
  (same comment as for Pentane)
- Zinc [air, urban air close to ground]: 2.47997e-6 kg; lognormal variance with pedigree 0.7786, pedigree (2,5,5,1,4)
  (same comment as for Pentane)
- Propane [air, urban air close to ground]: 6.95992e-6 kg; lognormal variance with pedigree 0.1786, pedigree (2,5,5,1,4)
  (same comment as for Pentane)
- m-Xylene [air, urban air close to ground]: 9.48988e-7 kg; lognormal variance with pedigree 0.1786, pedigree (2,5,5,1,4)
  (same comment as for Pentane)
- Ethene [air, urban air close to ground]: 1.98998e-5 kg; lognormal variance with pedigree 0.7786, pedigree (2,5,5,1,4)
  (same comment as for Pentane)
- TOC, Total Organic Carbon [water, surface water]: 0.00692584 kg; lognormal variance with pedigree 0.0813, pedigree (2,3,5,3,1)
  Calculated by default as TOC (gC) = COD/2.7 (COD measured in g O2). Should more correctly be calculated from the carbon content of the specified emissions to water.
  Uncertainty: data from a finnish database & from one producer
- Nitrogen oxides [air, urban air close to ground]: 0.00179998 kg; lognormal variance with pedigree 0.0813, pedigree (2,3,5,3,1)
  (same comment as for Nitrogen)
- Radon-220 [air, urban air close to ground]: 2.77997e-6 kBq; lognormal variance with pedigree 0.4386, pedigree (2,5,5,1,4)
  (same comment as for Pentane)
- Sodium [air, urban air close to ground]: 1.36998e-5 kg; lognormal variance with pedigree 0.7786, pedigree (2,5,5,1,4)
  (same comment as for Pentane)
- Nickel [air, urban air close to ground]: 1.63998e-6 kg; lognormal variance with pedigree 0.7786, pedigree (2,5,5,1,4)
  (same comment as for Pentane)
- Radium-228 [air, urban air close to ground]: 1.86998e-5 kBq; lognormal variance with pedigree 0.4386, pedigree (2,5,5,1,4)
  (same comment as for Pentane)
- Silicon [air, urban air close to ground]: 8.1099e-5 kg; lognormal variance with pedigree 0.7786, pedigree (2,5,5,1,4)
  (same comment as for Pentane)
- Particulates, > 2.5 um, and < 10um [air, urban air close to ground]: 5.19994e-5 kg; lognormal variance with pedigree 0.1613, pedigree (2,3,5,3,1)
  (same comment as for Nitrogen)
- Formaldehyde [air, urban air close to ground]: 2.30997e-6 kg; lognormal variance with pedigree 0.1786, pedigree (2,5,5,1,4)
  (same comment as for Pentane)
- Radon-222 [air, urban air close to ground]: 2.77997e-6 kBq; lognormal variance with pedigree 0.4386, pedigree (2,5,5,1,4)
  (same comment as for Pentane)
- Particulates, > 10 um [air, urban air close to ground]: 4.89994e-5 kg; lognormal variance with pedigree 0.0813, pedigree (2,3,5,3,1)
  (same comment as for Nitrogen)
- Bromine [air, urban air close to ground]: 4.85994e-7 kg; lognormal variance with pedigree 0.1786, pedigree (2,5,5,1,4)
  (same comment as for Pentane)
- Suspended solids, unspecified [water, surface water]: 0.000869989 kg; lognormal variance with pedigree 0.0813, pedigree (2,3,5,3,1)
  (same comment as for Nitrogen)
- Benzene, ethyl- [air, urban air close to ground]: 2.36997e-7 kg; lognormal variance with pedigree 0.1786, pedigree (2,5,5,1,4)
  (same comment as for Pentane)
- Acetone [air, urban air close to ground]: 3.57996e-7 kg; lognormal variance with pedigree 0.1786, pedigree (2,5,5,1,4)
  (same comment as for Pentane)
- Chlorine [air, urban air close to ground]: 1.41998e-6 kg; lognormal variance with pedigree 0.4386, pedigree (2,5,5,1,4)
  (same comment as for Pentane)
- Methanol [air, urban air close to ground]: 1.21999e-6 kg; lognormal variance with pedigree 0.1786, pedigree (2,5,5,1,4)
  (same comment as for Pentane)
- PAH, polycyclic aromatic hydrocarbons [air, urban air close to ground]: 1.00999e-7 kg; lognormal variance with pedigree 0.1786, pedigree (2,5,5,1,4)
  (same comment as for Pentane)
- Dinitrogen monoxide [air, urban air close to ground]: 2.41997e-5 kg; lognormal variance with pedigree 0.1786, pedigree (2,5,5,1,4)
  (same comment as for Pentane)
- Mercury [air, urban air close to ground]: 1.06999e-8 kg; lognormal variance with pedigree 0.7786, pedigree (2,5,5,1,4)
  (same comment as for Pentane)

## Extrapolations
Assumption made that 75% are produced in integrated mills and 25% in non-integrated mills.

## Review by Hans-Jörg Althaus 2010-04-07
passed
