# treatment of waste plastic, mixture, unsanitary landfill, hyperarid infiltration class (-250mm)

Dataset: EcoSpold 2, unit process
Geography: GLO
Time period: 2006-01-01 to 2019-12-31
Technology level: current
Classification: ISIC rev.4 ecoinvent: 3821:Treatment and disposal of non-hazardous waste
Synonyms: municipal waste landfill
Scenario: Business-as-Usual
System model: Allocation at the point of substitution
Share of production covered: 1 %
Generated by: Avraam Symeonidis
Database: ecoinvent
isCopyrightProtected: true
accessRestrictedTo: 1

## General comment
This dataset represents the activity of waste disposal of waste plastic, mixture in a unsanitary landfill. Recommended use of this dataset: For plastic mixture, which goes to disposal as part of managed communal waste mixture. // Waste composition (wet, in ppm): upper heating value 34.05 MJ/kg; lower heating value 30.79 MJ/kg; H2O 153000; O 73717; H 105910; C 633590; S 1406.7; N 6112; P n.a.; B n.a.; Cl 18131; Br 65.319; F 13.717; I n.a.; Ag n.a.; As 1.7729; Ba 174.03; Cd 75.786; Co 29.478; Cr 38.132; Cu 296.41; Hg 0.79234; Mn 74.574; Mo n.a.; Ni 19.222; Pb 435.81; Sb 40.093; Se 1.9596; Sn 24.453; V 268.88; Zn 521.69; Be 0.46656; Sc n.a.; Sr 82.582; Ti 933.13; Tl 0.37325; W n.a.; Si n.a.; Fe 3476.5; Ca n.a.; Al 186.63; K n.a.; Mg n.a.; Na 1367.5; . // Share of carbon in waste that is biogenic 0%. Share of metals in waste not oxidised and bulk-recyclable (exclude very small or thin parts) Iron: 0%; Alu: 0%; Copper: 0%. Overall degradability of waste during 100 years: 1%.

## Included activities start
from final waste deposition (without transports to the site)

## Included activities end
Waste-specific short-term emissions to air via landfill gas and landfill leachate. Waste-specific long-term emissions from landfill.

## Geography
Given name of landfill location is 'infiltration class 1 hyperarid (2018)'. Landfill site with mean annual temperature (MAT) of 8 degC, mean annual precipitation (MAP) of 350 mm/year, and net infiltration of -250 mm/year. Negative infiltration means that leachate flow is reversed and flows upward to the surface, where water is evaporated and dissolved solids become solid evaporites.
Climate adjustments result in an alpha t (temperature) for permafrost areas of 0.999. Total climate adjustments with alpha pt of 0.999.

## Technology
This is an inventory for an unsanitary, sub-controlled landfill for municipal solid waste. Ultimate average landfill height is 15 meters. Operation phase duration is 25 years.Percentage of landfill gas directly emitted is 100w%.
Leachate of the landfill is not treated. Leachate flow is upward to the surface due to net negative infiltration. No leachate treatment can be performed. Based on average waste composition and climate data the end of carbonate phase is estimated to be reached 6681 years after waste deposition. Arid conditions at this location prompt formation of evaporites from landfill contents which are partially eroded by wind. It is assumed that 10% of these evaporites are eroded by wind and airborne. Initial decay in the first 100 years of this waste results in a wind erosion rate corresponding to 21.04 g/m2.year and long-term decay corresponds to wind erosion of 21.57 g/m2.year.

## Reference product
- waste plastic, mixture: -1 kg; CPC 39270: Waste, parings and scrap of plastics; By-product classification Waste; pedigree (1,1,1,1,1)
  main reference product of this activity (supply of disposal service).
  Uncertainty: Uncertainty is not adjusted, as this is the refence product
  production volume 1 kg
    The amount of the annual production volume is a placeholder value. The contribution of this technology to the different local markets can be found in the markets themselves.
  property price 0 EUR2005
    Waste products are assigned a price of zero as they are assumed to require further treatment.
  property carbon content 0.74805
    carbon content on a dry matter basis (reserved; not for manual entry)
  properties: carbon content, fossil 0.74805, iron content 0.0041045, water content 0.18064, water in wet mass 0.153 kg, aluminium content 0.00022034, wet mass 1 kg, dry mass 0.847 kg, sodium content 0.0016145, sulfur content 0.0016609, tin content 2.887e-5, antimony content 4.7336e-5, bromine content 7.7118e-5, nitrogen content 0.007216, chlorine content 0.021406, heating value, net 30.791 MJ, titanium content 0.0011017, barium content 0.00020546, thallium content 4.4067e-7, hydrogen content 0.12504, oxygen content 0.087033, selenium content 2.3135e-6, mercury content 9.3547e-7, zinc content 0.00061593, strontium content 9.7499e-5, cobalt content 3.4802e-5, copper content 0.00034995, heating value, gross 34.054 MJ, vanadium content 0.00031745, cadmium content 8.9476e-5, nickel content 2.2694e-5, arsenic content 2.0932e-6, fluorine content 1.6195e-5, beryllium content 5.5084e-7, lead content 0.00051454, chromium content 4.502e-5, manganese content 8.8045e-5, carbon allocation 0.633598 kg

## Inputs from technosphere
- diesel, burned in building machine: 0.046738 MJ; lognormal variance with pedigree 0.082256, pedigree (1,1,3,1,1)
  for waste distribution and compaction.
  Uncertainty: Uncertainty calculated from uncertainty in base parameters.
- excavation, skid-steer loader: 0.00031708 m3; lognormal variance with pedigree 0.082256, pedigree (1,1,3,1,1)
  application of daily cover.
  Uncertainty: Uncertainty calculated from uncertainty in base parameters.

## Emissions to nature
- Nickel [air, non-urban air or from high stacks]: 1.1189e-9 kg; lognormal variance with pedigree 0.47645, pedigree (1,1,3,1,1)
  burden from direct release or incineration of landfill biogas; or windblown leachate evaporite in arid climates.
  Uncertainty: Uncertainty calculated from unertainty of the waste composition of this waste, uncertainty in waste decomposition and short-term leaching in landfill
- Iron [soil, industrial]: 0.0031289 kg; lognormal variance with pedigree 0.12633, pedigree (1,1,3,1,1)
  burden from leachate evaporite in arid climates deposited on landflill surface.
  Uncertainty: Uncertainty calculated from unertainty of the waste composition of this waste, uncertainty in waste decomposition and short-term leaching in landfill
- Lead [air, non-urban air or from high stacks]: 2.5733e-9 kg; lognormal variance with pedigree 0.44781, pedigree (1,1,3,1,1)
  (same comment as for Nickel)
- Strontium [soil, industrial]: 7.4324e-5 kg; lognormal variance with pedigree 0.24861, pedigree (1,1,3,1,1)
  (same comment as for Iron)
- Manganese [air, non-urban air or from high stacks]: 8.5517e-8 kg; lognormal variance with pedigree 0.33785, pedigree (1,1,3,1,1)
  (same comment as for Nickel)
- Titanium [soil, industrial]: 0.00083982 kg; lognormal variance with pedigree 0.16848, pedigree (1,1,3,1,1)
  (same comment as for Iron)
- Mercury [air, non-urban air or from high stacks]: 2.7105e-10 kg; lognormal variance with pedigree 0.52356, pedigree (1,1,3,1,1)
  (same comment as for Nickel)
- Beryllium [soil, industrial]: 4.1991e-7 kg; lognormal variance with pedigree 0.4186, pedigree (1,1,3,1,1)
  (same comment as for Iron)
- Copper [air, non-urban air or from high stacks]: 1.4538e-9 kg; lognormal variance with pedigree 0.46696, pedigree (1,1,3,1,1)
  (same comment as for Nickel)
- Vanadium [soil, industrial]: 9.3643e-5 kg; lognormal variance with pedigree 0.26518, pedigree (1,1,3,1,1)
  (same comment as for Iron)
- Cobalt [air, non-urban air or from high stacks]: 9.4867e-9 kg; lognormal variance with pedigree 0.40737, pedigree (1,1,3,1,1)
  (same comment as for Nickel)
- Zinc [soil, industrial]: 0.00046952 kg; lognormal variance with pedigree 0.18755, pedigree (1,1,3,1,1)
  (same comment as for Iron)
- Chromium [air, non-urban air or from high stacks]: 4.3521e-10 kg; lognormal variance with pedigree 0.50735, pedigree (1,1,3,1,1)
  (same comment as for Nickel)
- Selenium [soil, industrial]: 6.6229e-7 kg; lognormal variance with pedigree 0.43136, pedigree (1,1,3,1,1)
  (same comment as for Iron)
- Iron [air, low population density, long-term]: 0.0003476 kg; lognormal variance with pedigree 0.12637, pedigree (1,1,3,1,1)
  burden from windblown long-term leachate evaporite in arid climates.
  Uncertainty: Uncertainty calculated from unertainty of the waste composition of this waste, uncertainty in waste decomposition and short-term leaching in landfill
- Arsenic [air, non-urban air or from high stacks]: 3.6264e-10 kg; lognormal variance with pedigree 0.46046, pedigree (1,1,3,1,1)
  (same comment as for Nickel)
- Tin [soil, industrial]: 2.2008e-5 kg; lognormal variance with pedigree 0.28932, pedigree (1,1,3,1,1)
  (same comment as for Iron)
- Aluminium [air, low population density, long-term]: 1.8653e-5 kg; lognormal variance with pedigree 0.22176, pedigree (1,1,3,1,1)
  (same comment as for Iron)
- Barium [air, non-urban air or from high stacks]: 1.9957e-7 kg; lognormal variance with pedigree 0.30973, pedigree (1,1,3,1,1)
  (same comment as for Nickel)
- Antimony [soil, industrial]: 5.0562e-6 kg; lognormal variance with pedigree 0.51332, pedigree (1,1,3,1,1)
  (same comment as for Iron)
- Sodium [air, low population density, long-term]: 0.0001311 kg; lognormal variance with pedigree 0.15627, pedigree (1,1,3,1,1)
  (same comment as for Iron)
- Cadmium [air, non-urban air or from high stacks]: 1.4207e-8 kg; lognormal variance with pedigree 0.3658, pedigree (1,1,3,1,1)
  (same comment as for Nickel)
- Manganese [soil, industrial]: 6.7116e-5 kg; lognormal variance with pedigree 0.24802, pedigree (1,1,3,1,1)
  (same comment as for Iron)
- Thallium [air, low population density, long-term]: 3.7303e-8 kg; lognormal variance with pedigree 0.4261, pedigree (1,1,3,1,1)
  (same comment as for Iron)
- Hydrogen fluoride [air, non-urban air or from high stacks]: 5.5617e-8 kg; lognormal variance with pedigree 0.42116, pedigree (1,1,3,1,1)
  (same comment as for Nickel)
- Lead [soil, industrial]: 0.00039223 kg; lognormal variance with pedigree 0.19364, pedigree (1,1,3,1,1)
  (same comment as for Iron)
- Strontium [air, low population density, long-term]: 8.2534e-6 kg; lognormal variance with pedigree 0.24888, pedigree (1,1,3,1,1)
  (same comment as for Iron)
- Bromine [air, non-urban air or from high stacks]: 1.8732e-7 kg; lognormal variance with pedigree 0.27423, pedigree (1,1,3,1,1)
  (same comment as for Nickel)
- Nickel [soil, industrial]: 1.7299e-5 kg; lognormal variance with pedigree 0.29705, pedigree (1,1,3,1,1)
  (same comment as for Iron)
- Titanium [air, low population density, long-term]: 9.3266e-5 kg; lognormal variance with pedigree 0.16866, pedigree (1,1,3,1,1)
  (same comment as for Iron)
- Hydrogen chloride [air, non-urban air or from high stacks]: 5.2174e-5 kg; lognormal variance with pedigree 0.11582, pedigree (1,1,3,1,1)
  (same comment as for Nickel)
- Mercury [soil, industrial]: 7.1291e-7 kg; lognormal variance with pedigree 0.4015, pedigree (1,1,3,1,1)
  (same comment as for Iron)
- Zinc [air, low population density, long-term]: 5.2145e-5 kg; lognormal variance with pedigree 0.18773, pedigree (1,1,3,1,1)
  (same comment as for Iron)
- Nitrate [air, non-urban air or from high stacks]: 6.3174e-5 kg; lognormal variance with pedigree 0.17552, pedigree (1,1,3,1,1)
  burden from windblown leachate evaporite in arid climates.
  Uncertainty: Uncertainty calculated from unertainty of the waste composition of this waste, uncertainty in waste decomposition and short-term leaching in landfill
- Copper [soil, industrial]: 0.00026677 kg; lognormal variance with pedigree 0.20639, pedigree (1,1,3,1,1)
  (same comment as for Iron)
- Beryllium [air, low population density, long-term]: 4.6629e-8 kg; lognormal variance with pedigree 0.41894, pedigree (1,1,3,1,1)
  (same comment as for Iron)
- Nitrogen oxides [air, non-urban air or from high stacks]: 8.3724e-8 kg; lognormal variance with pedigree 0.26775, pedigree (1,1,3,1,1)
  burden from direct release or incineration of landfill biogas.
  Uncertainty: Uncertainty calculated from unertainty of the waste composition of this waste, uncertainty in waste decomposition and short-term leaching in landfill
- Cobalt [soil, industrial]: 2.653e-5 kg; lognormal variance with pedigree 0.28176, pedigree (1,1,3,1,1)
  (same comment as for Iron)
- Tin [air, low population density, long-term]: 2.4452e-6 kg; lognormal variance with pedigree 0.28935, pedigree (1,1,3,1,1)
  (same comment as for Iron)
- Sulfate [air, non-urban air or from high stacks]: 1.5697e-6 kg; lognormal variance with pedigree 0.27663, pedigree (1,1,3,1,1)
  (same comment as for Nitrate)
- Chromium [soil, industrial]: 2.2417e-7 kg; lognormal variance with pedigree 1.867, pedigree (1,1,3,1,1)
  (same comment as for Iron)
- Selenium [air, low population density, long-term]: 7.3381e-8 kg; lognormal variance with pedigree 0.43276, pedigree (1,1,3,1,1)
  (same comment as for Iron)
- Particulates, < 2.5 um [air, non-urban air or from high stacks]: 2.806e-5 kg; lognormal variance with pedigree 0.18759, pedigree (1,1,3,1,1)
  (same comment as for Nickel)
- Barium [soil, industrial]: 0.00015663 kg; lognormal variance with pedigree 0.22013, pedigree (1,1,3,1,1)
  (same comment as for Iron)
- Vanadium [air, low population density, long-term]: 1.0376e-5 kg; lognormal variance with pedigree 0.26628, pedigree (1,1,3,1,1)
  (same comment as for Iron)
- Sulfur dioxide [air, non-urban air or from high stacks]: 1.8336e-6 kg; lognormal variance with pedigree 0.33245, pedigree (1,1,3,1,1)
  (same comment as for Nitrogen oxides)
- Cadmium [soil, industrial]: 6.8207e-5 kg; lognormal variance with pedigree 0.25099, pedigree (1,1,3,1,1)
  (same comment as for Iron)
- Antimony [air, low population density, long-term]: 5.5757e-7 kg; lognormal variance with pedigree 0.51611, pedigree (1,1,3,1,1)
  (same comment as for Iron)
- Methane, fossil [air, non-urban air or from high stacks]: 0.0045834 kg; lognormal variance with pedigree 0.10663, pedigree (1,1,3,1,1)
  (same comment as for Nitrogen oxides)
- Fluoride [soil, industrial]: 1.2299e-5 kg; lognormal variance with pedigree 0.30816, pedigree (1,1,3,1,1)
  (same comment as for Iron)
- Lead [air, low population density, long-term]: 4.3579e-5 kg; lognormal variance with pedigree 0.19366, pedigree (1,1,3,1,1)
  (same comment as for Iron)
- Particulates, > 10 um [air, non-urban air or from high stacks]: 7.0149e-5 kg; lognormal variance with pedigree 0.12243, pedigree (1,1,3,1,1)
  (same comment as for Nickel)
- Arsenic [soil, industrial]: 1.5956e-6 kg; lognormal variance with pedigree 0.37483, pedigree (1,1,3,1,1)
  (same comment as for Iron)
- Nickel [air, low population density, long-term]: 1.921e-6 kg; lognormal variance with pedigree 0.29734, pedigree (1,1,3,1,1)
  (same comment as for Iron)
- Particulates, > 2.5 um, and < 10um [air, non-urban air or from high stacks]: 4.209e-5 kg; lognormal variance with pedigree 0.14219, pedigree (1,1,3,1,1)
  (same comment as for Nickel)
- Bromine [soil, industrial]: 5.8766e-5 kg; lognormal variance with pedigree 0.24774, pedigree (1,1,3,1,1)
  (same comment as for Iron)
- Manganese [air, low population density, long-term]: 7.3721e-6 kg; lognormal variance with pedigree 0.25228, pedigree (1,1,3,1,1)
  (same comment as for Iron)
- Occupation, dump site [natural resource, land]: 0.0023333 m2*year; lognormal variance with pedigree 0.082256, pedigree (1,1,3,1,1)
  for landfill operation phase and spontaneous renaturation.
  Uncertainty: Uncertainty calculated from uncertainty in base parameters.
- Nitrogen [soil, industrial]: 0.005492 kg; lognormal variance with pedigree 0.10432, pedigree (1,1,3,1,1)
  (same comment as for Iron)
- Mercury [air, low population density, long-term]: 7.9158e-8 kg; lognormal variance with pedigree 0.40188, pedigree (1,1,3,1,1)
  (same comment as for Iron)
- Carbon dioxide, fossil [air, non-urban air or from high stacks]: 0.0099232 kg; lognormal variance with pedigree 0.096502, pedigree (1,1,3,1,1)
  (same comment as for Nitrogen oxides)
- Chloride [soil, industrial]: 0.016312 kg; lognormal variance with pedigree 0.072906, pedigree (1,1,3,1,1)
  (same comment as for Iron)
- Copper [air, low population density, long-term]: 2.964e-5 kg; lognormal variance with pedigree 0.20641, pedigree (1,1,3,1,1)
  (same comment as for Iron)
- Heat, waste [soil, industrial]: 0.23754 MJ; lognormal variance with pedigree 0.069859, pedigree (1,1,3,1,1)
  burden from short-term decomposition of waste (0-100a).
  Uncertainty: Uncertainty calculated from unertainty of the waste composition of this waste, uncertainty in waste decomposition and short-term leaching in landfill
- Cadmium [air, low population density, long-term]: 7.5652e-6 kg; lognormal variance with pedigree 0.25173, pedigree (1,1,3,1,1)
  (same comment as for Iron)
- Carbon [soil, industrial]: 0.56471 kg; lognormal variance with pedigree 0.0035758, pedigree (1,1,3,1,1)
  (same comment as for Iron)
- Cobalt [air, low population density, long-term]: 2.9383e-6 kg; lognormal variance with pedigree 0.28315, pedigree (1,1,3,1,1)
  (same comment as for Iron)
- Sulfur [soil, industrial]: 0.0012652 kg; lognormal variance with pedigree 0.15423, pedigree (1,1,3,1,1)
  (same comment as for Iron)
- Chromium [air, low population density, long-term]: 2.4473e-8 kg; lognormal variance with pedigree 1.8676, pedigree (1,1,3,1,1)
  (same comment as for Iron)
- Heat, waste [water, ground-, long-term]: 33.714 MJ; lognormal variance with pedigree 0.014651, pedigree (1,1,3,1,1)
  burden from long-term decomposition of waste (>100a).
  Uncertainty: Uncertainty calculated from unertainty of the waste composition of this waste, uncertainty in waste decomposition and short-term leaching in landfill
- Hydrogen fluoride [air, low population density, long-term]: 1.3655e-6 kg; lognormal variance with pedigree 0.30852, pedigree (1,1,3,1,1)
  (same comment as for Iron)
- Aluminium [air, non-urban air or from high stacks]: 9.3408e-9 kg; lognormal variance with pedigree 0.40591, pedigree (1,1,3,1,1)
  (same comment as for Nickel)
- Arsenic [air, low population density, long-term]: 1.7697e-7 kg; lognormal variance with pedigree 0.37575, pedigree (1,1,3,1,1)
  (same comment as for Iron)
- Sodium [air, non-urban air or from high stacks]: 5.6663e-6 kg; lognormal variance with pedigree 0.20643, pedigree (1,1,3,1,1)
  (same comment as for Nickel)
- Barium [air, low population density, long-term]: 1.7204e-5 kg; lognormal variance with pedigree 0.22408, pedigree (1,1,3,1,1)
  (same comment as for Iron)
- Iron [air, non-urban air or from high stacks]: 4.7812e-8 kg; lognormal variance with pedigree 0.3532, pedigree (1,1,3,1,1)
  (same comment as for Nickel)
- Bromine [air, low population density, long-term]: 6.3653e-6 kg; lognormal variance with pedigree 0.2567, pedigree (1,1,3,1,1)
  (same comment as for Iron)
- Strontium [air, non-urban air or from high stacks]: 4.8072e-9 kg; lognormal variance with pedigree 0.42805, pedigree (1,1,3,1,1)
  (same comment as for Nickel)
- Hydrogen chloride [air, low population density, long-term]: 0.0017668 kg; lognormal variance with pedigree 0.07644, pedigree (1,1,3,1,1)
  (same comment as for Iron)
- Titanium [air, non-urban air or from high stacks]: 4.6704e-8 kg; lognormal variance with pedigree 0.35291, pedigree (1,1,3,1,1)
  (same comment as for Nickel)
- Nitrate [air, low population density, long-term]: 0.0026392 kg; lognormal variance with pedigree 0.10881, pedigree (1,1,3,1,1)
  (same comment as for Iron)
- Thallium [air, non-urban air or from high stacks]: 2.1727e-11 kg; lognormal variance with pedigree 0.60508, pedigree (1,1,3,1,1)
  (same comment as for Nickel)
- Particulates, < 2.5 um [air, low population density, long-term]: 0.017224 kg; lognormal variance with pedigree 0.12355, pedigree (1,1,3,1,1)
  (same comment as for Iron)
- Zinc [air, non-urban air or from high stacks]: 2.4739e-8 kg; lognormal variance with pedigree 0.37388, pedigree (1,1,3,1,1)
  (same comment as for Nickel)
- Sulfate [air, low population density, long-term]: 0.00042018 kg; lognormal variance with pedigree 0.15531, pedigree (1,1,3,1,1)
  (same comment as for Iron)
- Beryllium [air, non-urban air or from high stacks]: 2.7159e-11 kg; lognormal variance with pedigree 0.59792, pedigree (1,1,3,1,1)
  (same comment as for Nickel)
- Particulates, > 2.5 um, and < 10um [air, low population density, long-term]: 0.025836 kg; lognormal variance with pedigree 0.078146, pedigree (1,1,3,1,1)
  (same comment as for Iron)
- Tin [air, non-urban air or from high stacks]: 1.4428e-10 kg; lognormal variance with pedigree 0.54392, pedigree (1,1,3,1,1)
  (same comment as for Nickel)
- Particulates, > 10 um [air, low population density, long-term]: 0.043059 kg; lognormal variance with pedigree 0.058393, pedigree (1,1,3,1,1)
  (same comment as for Iron)
- Selenium [air, non-urban air or from high stacks]: 2.0691e-10 kg; lognormal variance with pedigree 0.53215, pedigree (1,1,3,1,1)
  (same comment as for Nickel)
- Thallium [soil, industrial]: 3.3593e-7 kg; lognormal variance with pedigree 0.42576, pedigree (1,1,3,1,1)
  (same comment as for Iron)
- Vanadium [air, non-urban air or from high stacks]: 2.8391e-8 kg; lognormal variance with pedigree 0.36953, pedigree (1,1,3,1,1)
  (same comment as for Nickel)
- Sodium [soil, industrial]: 0.0012307 kg; lognormal variance with pedigree 0.14617, pedigree (1,1,3,1,1)
  (same comment as for Iron)
- Antimony [air, non-urban air or from high stacks]: 4.2334e-9 kg; lognormal variance with pedigree 0.4327, pedigree (1,1,3,1,1)
  (same comment as for Nickel)
- Aluminium [soil, industrial]: 0.00016796 kg; lognormal variance with pedigree 0.22155, pedigree (1,1,3,1,1)
  (same comment as for Iron)

## Extrapolations
This dataset has been extrapolated from year 2012 to the year of the calculation (2019). The uncertainty has been adjusted accordingly.
