# goods wagon production

Dataset: EcoSpold 2, unit process
Geography: RER
Time period: 1993-01-01 to 2019-12-31
Technology level: current
Classification: ISIC rev.4 ecoinvent: 3020:Manufacture of railway locomotives and rolling stock
Classification: EcoSpold01Categories: transport systems/train
Tags: ConvertedDataset
Scenario: Business-as-Usual
System model: Allocation at the point of substitution
Generated by: Michael Spielmann (obsolete)
Published in: Spielmann M. 2007
Database: ecoinvent
isCopyrightProtected: true
accessRestrictedTo: 1

## General comment
The dataset represents the production of a goods wagon.
[This dataset was already contained in the ecoinvent database version 2. It was not individually updated during the transfer to ecoinvent version 3. Life Cycle Impact Assessment results may still have changed, as they are affected by changes in the supply chain, i.e. in other datasets. This dataset was generated following the ecoinvent quality guidelines for version 2. It may have been subject to central changes described in the ecoinvent version 3 change report (http://www.ecoinvent.org/database/ecoinvent-version-3/reports-of-changes/), and the results of the central updates were reviewed extensively. The changes added e.g. consistent water flows and other information throughout the database. The documentation of this dataset can be found in the ecoinvent reports of version 2, which are still available via the ecoinvent website. The change report linked above covers all central changes that were made during the conversion process.]

## Included activities start
Service starts with the material consumption for the production of the goods wagon.

## Included activities end
The dataset ends with the production of one goods wagon. The dataset includes material consumption, transport, energy and fuel consumption.

## Geography
Manufacturing data reflects an average material consumption of wagons used in Europe.

## Technology
The material composition of wagons is less comprehensive. The dominating materials are steel and aluminium. The specific energy consumption per wagon is available from Frischknecht et al. (1996). The electricity consumption is 9224 kWh and the consumption of oil is 46000 MJ. Is assumed that the oil is used for heating purposes. The SBB operates various other types of wagons, for which no information has been available. Consequently, for further aggregation, is subsumed the not represented wagon types in the represented categories. In the absence of statistic information of the actual kilometric performance of the different types of rail wagons is model an average rail wagon as follows: closed and open wagons are treated as closed wagons; 65 % of the tank wagons feature a thermal isolated cistern, which are mainly used for the transport of chemicals; 65% of the transport is performed by closed wagons; 35% of the transport performance is allocated to tank wagons; 50% of the wagons in each category are 2 axis vehicles.
References:
Frischknecht R., Bollens U., Bosshart S., Ciot M., Ciseri L., Doka G., Dones R., Gantner U. and Hischier R. (1996) Ökoinventare von Energiesystemen: Grundlagen für den ökologischen Vergleich von Energiesystemen und den Einbezug von Energiesystemen in Ökobilanzen für die Schweiz. Auflage No. 3. Gruppe Energie - Stoffe - Umwelt (ESU), Eidgenössische Technische Hochschule Zuerich und Sektion Ganzheitliche Systemanalysen, Paul Scherrer Institut, Villigen, Bundesamt für Energie (Hrsg.), Bern

## Reference product
- goods wagon: 1 unit; By-product classification allocatable product; CPC 49533: Railway or tramway goods vans and wagons, not self-propelled
  EcoSpold01Location=RER
  production volume 1.32237 unit
    This is a placeholder value that does not reflect real-world production volumes. This dataset does not currently require a real-world production volume to work in the database framework, and no actual data were collected yet. This has no negative effect on the results of the ecoinvent database. The placeholder value of this activity was scaled according to the nominal GDP of 2005 (source: United Nations, http://data.un.org/Glossary.aspx?q=GDP+%28current+US%24%29, accessed 20130726) to reflect an appropriate share of the global production volume, which is also a placeholder value.
  property price 12549.9 EUR2005
    Calculated based on inputs: The price of the product has been calculated as a sum of the values of the material and energy inputs for this product. This value is therefore a rough estimation. It may underestimate the real price since there are additional expenses when producing any product. These expences can include for example labour costs, treatment of waste materials and profit for the producer. Please consider carefully whether this level of data quality is acceptable for your application.

## Inputs from technosphere
- steel, low-alloyed, hot rolled: 21000 kg; lognormal variance with pedigree 0.06, pedigree (1,1,5,1,1)
  Calculated value. Based on oral communication with a Swiss wagon manufacturing company (Mr. Soder, Meier AG, mechanical engineering and wagon manufacturing, Rheinfelden 1993).
  EcoSpold01Location=RER
  properties: dry mass 1 kg, wet mass 1 kg, carbon content, fossil 0.005
  note on carbon content, fossil: Low alloyed steel composition given in Tab. 3.2 ecoinvent v2.2 report 10_partII. Steel assumed to have a C content of 0.5%
- glued laminated timber, for outdoor use: 1.92 m3; lognormal variance with pedigree 0.0687, pedigree (4,3,5,3,1)
  Calculated value. Based on oral communication with a Swiss wagon manufacturing company (Mr. Soder, Meier AG, mechanical engineering and wagon manufacturing, Rheinfelden 1993).
  EcoSpold01Location=RER
  Uncertainty: own calculations based on oral communication
  properties: water content 0.13, dry mass 380.531 kg, carbon content, fossil 0.00982967, carbon content, non-fossil 0.478422, wet mass 430 kg
  note on carbon content, fossil: C content of 12 kg Melamine formaldehyde resin (C4H6N6O) used for glueing
  note on carbon content, non-fossil: The laminated timber is composed of wood and glue. The weight of the wood is assumed to be the DM minus 12 kg glue. C content of wood is 0.494 kgC/kg dry wood (ecoinvent v2.2 report 9)
- synthetic rubber: 10 kg; lognormal variance with pedigree 0.0687, pedigree (4,3,5,3,1)
  EcoSpold01Location=RER
  Calculated value. Based on oral communication with a Swiss wagon manufacturing company (Mr. Soder, Meier AG, mechanical engineering and wagon manufacturing, Rheinfelden 1993).
  Uncertainty: own calculations based on oral communication
  properties: carbon content, fossil 0.871949, dry mass 1 kg, wet mass 1 kg
  note on carbon content, fossil: EPDM (Ethylene-propene-diene terpolymer) rubber is a terpolymer of ethylene, propene, and a diene with the residual unsaturated portion of the diene in the side chain (ecoinvent v2.2 report 7-part XX & Ullmann). Chemical formula (deduced from Evidences of Solvent-Induced Miscibility in Polychloroprene-co-Ethylene-Propene Diene Terpolymer Blends, Dubey et al., Journal of Applied Polymer Science, 2009, 111:1884–1891): C20H35
- stone wool, packed: 32 kg
  Calculated value. Based on oral communication with a Swiss wagon manufacturing company (Mr. Soder, Meier AG, mechanical engineering and wagon manufacturing, Rheinfelden 1993).
  EcoSpold01Location=CH
  properties: carbon content, fossil 0.015401, wet mass 1 kg, dry mass 1 kg
  note on carbon content, fossil: The chemical composition of the glass fibres used in the rock wool production is similar to the composition of naturally cooled volcano basalt and has a composition listed in Tab. 3.1 and 3.2 in ecoinvent v2.2 report 16, part XIV. Rock wool contains: a minimum of 96% mineral fibres,between 0.5 and 3.0 weight percent of phenolic resin depending on the specific product characteristics, and about 0.2 percent mineral oil (ecoinvent v2.2 report 16, part XIV). An average composition of 1.8% phenolic resin, 0.2% mineral oil, and 98% mineral fibres has been assumed and used to calculate C content of the rock wool
- alkyd paint, white, without solvent, in 60% solution state: 106 kg; lognormal variance with pedigree 0.0687, pedigree (4,3,5,3,1)
  (same comment as for glued laminated timber, for outdoor use)
  properties: dry mass 1 kg, wet mass 1 kg, carbon content, fossil 0.140367, carbon content, non-fossil 0.199629
  note on carbon content, fossil: C content was calculated as an addition of C content in the raw materials.
- electricity, medium voltage: 9220 kWh; lognormal variance with pedigree 0.0687, pedigree (4,3,5,3,1)
  Literature value. The specific energy consumption per wagon is available from Frischknecht et al. (1996).
  EcoSpold01Location=UCTE
  Uncertainty: own calculations based on oral communication
- aluminium, wrought alloy: 1070 kg; lognormal variance with pedigree 0.0687, pedigree (4,3,5,3,1)
  (same comment as for glued laminated timber, for outdoor use)
  properties: dry mass 1 kg, wet mass 1 kg
- heat, district or industrial, other than natural gas: 43700 MJ; lognormal variance with pedigree 0.0687, pedigree (4,3,5,3,1)
  EcoSpold01Location=RER
  Uncertainty: own calculations based on oral communication

## Sampling procedure
The data of the material composition and energy consumption is based on oral communication with an expert of one company.

## Extrapolations
This dataset has been extrapolated from year 1993 to the year of the calculation (2019). The uncertainty has been adjusted accordingly.

## Review by Niels Jungbluth 2003-07-23
passed

## Review by Roland Hischier 2011-09-23
Transfer of documentation done.
