# uranium production, centrifuge, enriched 3.9%

Dataset: EcoSpold 2, unit process
Geography: RoW
Time period: 1993-01-01 to 2019-12-31
Technology level: current
Classification: EcoSpold01Categories: nuclear power/production
Classification: ISIC rev.4 ecoinvent: 2011a: Manufacture of nuclear fuels
Tags: ConvertedDataset
Scenario: Business-as-Usual
System model: Allocation at the point of substitution
Generated by: [System]
Published in: Dones, R. 2007
Database: ecoinvent
isCopyrightProtected: true
accessRestrictedTo: 1

## General comment
This module uses a mix of data, some specific for the URENCO facilities taken from environmental reports, some from literature. Due to lack of information on Russian plants, all requirements and emissions are arbitrarily assumed the double of the URENCO module. Only (but still approximate) information available for TENEX facility is the electricity consumption by machines of two recent generations. A mix of generations has been assumed here, assuming conservatively a high value for auxiliary electricity (i.e., not directly used for spinning the centrifuges). The Russian electricity mix is used, which has been has been approximated using existing ecoinvent v2.0 electricity datasets for Europe. The factor for the infrastructure requirement is calculated with annual throughput of 1500 t SWU for 30 years operation (the Russian facilities are larger but this should not affect much the figures normalized by the total production).
[This dataset was already contained in the ecoinvent database version 2. It was not individually updated during the transfer to ecoinvent version 3. Life Cycle Impact Assessment results may still have changed, as they are affected by changes in the supply chain, i.e. in other datasets. This dataset was generated following the ecoinvent quality guidelines for version 2. It may have been subject to central changes described in the ecoinvent version 3 change report (http://www.ecoinvent.org/database/ecoinvent-version-3/reports-of-changes/), and the results of the central updates were reviewed extensively. The changes added e.g. consistent water flows and other information throughout the database. The documentation of this dataset can be found in the ecoinvent reports of version 2, which are still available via the ecoinvent website. The change report linked above covers all central changes that were made during the conversion process.]
[This dataset is meant to replace the following datasets:]

## Included activities end
The module is an extrapolation of the corresponding one for URENCO. The module includes: input of UF6; electricity, diesel, and natural gas used for operation; also taken into account is the material for replacement of centrifuge; water use, lubricant oil, and wastewater treatment; concrete assumed to be used for conditioning of contaminated scrap from decommissioning; transport requirements of operation materials, industrial wastes, and contaminated waste from decommissioning (25% of the reinforced concrete and the great part of metals according to the reference). Radioactive and non-radioactive emissions to air and to water from the operation are also included. The infrastructure requirements are accounted for, though construction and operation data partially refer to different plants rather than to one single unit.

## Geography
US and Western European data. Russian data for electricity uses.

## Technology
The technology used for uranium enrichment with centrifuge process in Russia is a mix of three generations of machines.

## Parameters
- fraction, cooling water, cooling pond system, to air: 0.032; name fraction_CW_CP_to_air; lognormal variance with pedigree 0.0413, pedigree (2,3,1,3,1)
  Calculated based on literature value (Scown, C.D., 2011, Water Footprint of U.S. Transportation Fuels and supplying information of the article) (Vionnet, S., Quantis Water Database - Technical Report, 2012).
- fraction, cooling water, to air: 0.3875; name fraction_CW_to_air; = (0.5*fraction_CW_OT_to_air)+(0.5*fraction_CW_R_to_air); lognormal variance with pedigree 0.092025, pedigree (4,4,3,2,4)
  Calculated value based on literature value (see comments of the other parametres present in this dataset) and expert opinion. In the case when no industry/literature data are available about the type of cooling or directly fraction, cooling water, to air specific for the process a default assumption is applied. It is assumed that the once-through cooling system is used in 50% of all cases and recirculating system is used in another 50% of all cases.
- fraction, water, decarbonised, to air: 0.3875; name fraction_WDC_to_air; lognormal variance with pedigree 0.092025, pedigree (4,4,3,2,4)
  Calculated value. See comments in the other parametres present in this dataset. Decarbonised water is considered to be always used as cooling water, thus cooling water fractions to air are applied to all carbonised water input flows to calculate the amount of water consumed in the processes.
- fraction, cooling water, once-through system, to air: 0.004; name fraction_CW_OT_to_air; lognormal variance with pedigree 0.0413, pedigree (2,3,1,3,1)
  (same comment as for fraction, cooling water, cooling pond system, to air)
- fraction, cooling water, recirculating system, to air: 0.771; name fraction_CW_R_to_air; lognormal variance with pedigree 0.0413, pedigree (2,3,1,3,1)
  (same comment as for fraction, cooling water, cooling pond system, to air)

## Reference product
- uranium, enriched 3.9%, per separative work unit: 1 unit; CPC 33620: Uranium enriched in U235 and its compounds; plutonium and its compounds; alloys, dispersions, ceramic products[…]; By-product classification allocatable product
  EcoSpold01Location=RU
  production volume 477600 unit
    Total capacity: 31 million SWU (http://www.wise-uranium.org/efac.html#ENR). The distribution between enrichment grades is assumed to be the same for all facilities. The total production is here assumed to be split evenly over the 5 grades 3.0%, 3.8%, 3.9%, 4.2% and 4.0%
  property price 168.943 EUR2005
    Calculated based on inputs: The price of the product has been calculated as a sum of the values of the material and energy inputs for this product. This value is therefore a rough estimation. It may underestimate the real price since there are additional expenses when producing any product. These expences can include for example labour costs, treatment of waste materials and profit for the producer. Please consider carefully whether this level of data quality is acceptable for your application.
  property carbon content 0
    carbon content on a dry matter basis (reserved; not for manual entry)
  property true value 168.943
    allocation property applied in "true value" allocation // value calculated from revenue
  properties: water content 0, carbon content, fossil 0, wet mass 1 kg, water in wet mass 0 kg, dry mass 1 kg, carbon content, non-fossil 0, carbon allocation 0 kg

## By-products
- electricity, for reuse in municipal waste incineration only: 0 kWh; CPC 17100: Electrical energy; By-product classification allocatable product; pedigree (1,1,1,1,1)
  Net electricity generated from this waste and used in internal MSWI plant energy redistribution.
  Uncertainty: uncertainty is calculated from uncertainties in waste composition and uncertainties in energy efficiency and the uncertainty in internal energy demand
  production volume 62543.7 kWh
  property exergy 3.6 MJ; name E_el_prod_MSWI_exergy
    This exergy property is based on the exergy content of the product.
  property true value relation 3.6; name E_el_prod_MSWI_true_value_relation
    property to calculate "true value" from
  property price 0.1 EUR2005; name E_el_prod_MSWI_price_EUR2005
    Estimated to be the same price as in case of electricity, medium voltage.
  property true value 0.00289184
    allocation property applied in "true value" allocation // value calculated from true value relation
- heat, for reuse in municipal waste incineration only: 0 MJ; CPC 17300: Steam and hot water; By-product classification allocatable product; pedigree (1,1,1,1,1)
  Net useful heat generated from this waste and used in internal MSWI plant energy redistribution.
  Uncertainty: uncertainty is calculated from uncertainties in waste composition and uncertainties in energy efficiency and the uncertainty in internal energy demand
  production volume 467856 MJ
  property true value relation 0.1842; name E_th_prod_MSWI_true_value_relation
    property to calculate "true value" from
  property exergy 0.1842 MJ; name E_th_prod_MSWI_exergy
    This exergy property is based on the exergy content of the product.
  property price 0.0106 EUR2005; name E_th_prod_MSWI_price_EUR2005
    Average European district heat price from Ecoheatcool and Euroheat 2005-2006, Ecoheat Work package 1: The European heat market. Final report. 10.6 EUR/GJ i s the price of district heat. http://www.solarthermalworld.org/files/Ecoheatcool%20WP1%20Web.pdf?download
  property true value 0.00117502
    (same comment as for electricity, for reuse in municipal waste incineration only)
- zinc concentrate: 0 kg; CPC 14290: Other non-ferrous metal ores and concentrates (other than uranium or thorium ores and concentrates); By-product classification allocatable product
  Calculated value from the knowledge of the properties of both products.
  production volume 43.9427 kg
  property price 0.38 EUR2005; name ByP_price_EUR2005
    Temporary price data. Calculated as 90% of purchasers price based on: Zinc content in concentrate 53%. Concentrate price per kg Zn 86.5% of refined Zn price (13.5% treatment charges according to CHR Metals Limited 2005: Dynamic cost curves. http://www.minecost.com/dynamic.pdf). 2004 zinc price from USGS (2007) Mineral commodity summaries 2007. <http://minerals.usgs.gov/minerals/pubs/mcs/2007/mcs2007.pdf> [Accessed 25 May 2010]
  property zinc content 0.53; name zinc_C_zinc_concentrate
    Zinc content on a dry matter basis. Value taken from teh "zinc mine operation" /GLO dataset.
  property dry mass 1 kg; name DM_zinc_concentrate
  property carbon content 0
    carbon content on a dry matter basis (reserved; not for manual entry)
  property true value 3.48984e-5
    allocation property applied in "true value" allocation // value calculated from revenue
  properties: wet mass 1 kg, water content 0, carbon content, non-fossil 0, carbon content, fossil 0, water in wet mass 0 kg, carbon allocation 0 kg
- iron scrap, sorted, pressed: 0 kg; By-product classification Recyclable; CPC 39310: Slag, dross, scalings and other waste from the manufacture of iron or steel; pedigree (1,1,1,1,1)
  metallic iron scrap removed from ash reamains and recycled.
  Uncertainty: uncertainty is calculated from uncertainties in waste composition and transfer coefficients to soild residues
  production volume 7622.79 kg
  property price 0.175 EUR2005
    Temporary price data. Calculated as 90% of purchasers price based on: 2005 import and export prices (total trades (USD) divided by total weight (kg) in biggest economies of the world: EU27, USA, Brasil, China, India, Japan and Russia) from UN Commodity Trade Statistics Database (http://data.un.org/Explorer.aspxDatabase [Accessed 2011.06.20]). Commodity: Waste or scrap, of cast iron
  property carbon content 0
    carbon content on a dry matter basis (reserved; not for manual entry)
  property true value 0.000199622
    allocation property applied in "true value" allocation // value calculated from revenue
  properties: carbon content, non-fossil 0, wet mass 1 kg, dry mass 1 kg, water content 0, carbon content, fossil 0, water in wet mass 0 kg, carbon allocation 0 kg
- copper: 0 kg; source Rentz O. 1999; By-product classification allocatable product; CPC 41413: Refined copper and copper alloys, unwrought; master alloys of copper
  Literature value. Copper uses: Before end-use copper is manufactured into semi fabricated products, such as shapes and ingots (known as 'semis'). These manufacturing processes are subdivided into hot working, cold working and, if necessary, process annealing. Few of the semis are ready for use as such. They more typically travel to first-stage manufacturers, who make metal rods, wire, and casting, and then to component manufacturers who produce such things as motors, valves, and insulated cables The components in turn are incorporated by final-stage manufacturers into a variety of finished products - automobiles, commercial buildings, residential housing, and so forth. These uses account for about 79% of the world-wide consumption of copper.
  production volume 245.632 kg
  property price 5.52 EUR2005
    Literature value (http://www.economist.com/news/business/21576714-mining-industry-has-enriched-chile-its-future-precarious-copper-solution). Average price between 20015 and 2013.
  property carbon content 0
    carbon content on a dry matter basis (reserved; not for manual entry)
  property true value 0.000200423
    allocation property applied in "true value" allocation // value calculated from revenue
  properties: dry mass 1 kg, water in wet mass 0 kg, wet mass 1 kg, carbon content, non-fossil 0, water content 0, carbon content, fossil 0, carbon allocation 0 kg
- iron scrap, unsorted: 0 kg; source European Aluminium Association 2008; CPC 39310: Slag, dross, scalings and other waste from the manufacture of iron or steel; By-product classification Recyclable; pedigree (1,1,1,1,1)
  production volume 0.201668 kg
  property price 0.149 EUR2005; name ironScrapAmount_price_EUR2005
    Temporary price data. Calculated as 90% of purchasers price based on: estimated at 85% of sorted scrap
  property carbon content 0
    carbon content on a dry matter basis (reserved; not for manual entry)
  property true value 4.83552e-9
    allocation property applied in "true value" allocation // value calculated from revenue
  properties: water in wet mass 0 kg, water content 0, carbon content, fossil 0, carbon content, non-fossil 0, dry mass 1 kg, wet mass 1 kg, carbon allocation 0 kg
- aluminium oxide, non-metallurgical: 0 kg; source European Aluminium Association 2008; CPC 41432: Alumina (aluminium oxide), except artificial corundum; By-product classification allocatable product; CAS 1344-28-1; pedigree (1,1,1,1,1)
  production volume 12.6902 kg
  property carbon content, non-fossil 0; name C_content_non_fossil
  property price 0.28 EUR2005; name Al2O3Amount_price_EUR2005
    From UN trade database. http://data.un.org/ Import data from the largest economies of the world are used (Brazil, India, USA, China, Japan and EU-27).
  property dry mass 1 kg; name DM
  property water content 0; name water_content
  property wet mass 1 kg; name WM
  property water in wet mass 0 kg; name WWM
  property carbon content, fossil 0; name C_content_fossil
  property carbon content 0
    carbon content on a dry matter basis (reserved; not for manual entry)
  property true value 5.71803e-7
    allocation property applied in "true value" allocation // value calculated from revenue
  properties: carbon allocation 0 kg
- aluminium, cast alloy: 0 kg; source European Aluminium Association 2008; By-product classification allocatable product; CPC 41431: Unwrought aluminium; pedigree (1,1,1,1,1)
  EcoSpold01Location=RER
  production volume 118.625 kg
  property price 1.3 EUR2005; name castAlloyAmount_price_EUR2005
    Temporary price data. Calculated as 90% of purchasers price based on: Source: London Metal Exchange, Aluminium alloy price for 2005
  property carbon content 0
    carbon content on a dry matter basis (reserved; not for manual entry)
  property true value 2.48165e-5
    allocation property applied in "true value" allocation // value calculated from revenue
  properties: water in wet mass 0 kg, carbon content, non-fossil 0, water content 0, dry mass 1 kg, carbon content, fossil 0, wet mass 1 kg, carbon allocation 0 kg
- aluminium, wrought alloy: 0 kg; source European Aluminium Association 2008; By-product classification allocatable product; CPC 4153: Semi-finished products of aluminium or aluminium alloys; pedigree (1,1,1,1,1)
  production volume 51.9319 kg
  property price 1.44 EUR2005; name secondaryAluminiumOutput_price_EUR2005
  properties: wet mass 1 kg, water content 0, carbon content, fossil 0, water in wet mass 0 kg, carbon content, non-fossil 0, dry mass 1 kg, carbon content 0, carbon allocation 0 kg, true value 1.20342e-5

## Inputs from technosphere
- municipal solid waste: 0 kg; pedigree (1,1,1,1,1)
  own estimation, lack of data
  EcoSpold01Location=CH
  production volume 0 kg
    Calculated from the production volume of uranium, enriched 3.9%, per separative work unit in proportion to the respective output amounts.
  properties: dry mass 0.771 kg, wet mass 1 kg, carbon content, non-fossil 0.261655, carbon content, fossil 0.171549, water content 0.297017
  note on carbon content, non-fossil: MSW composition in tab 4.1, ecoinvent v2.2 report 13_I. C content referred to 1 kg DM
- hydrogen peroxide, without water, in 50% solution state: 0.00109787 kg; lognormal variance with pedigree 0.162, pedigree (1,1,5,5,1)
  EcoSpold01Location=RER
  own estimation, lack of data
  properties: wet mass 1 kg, dry mass 1 kg
- polyvinylchloride, bulk polymerised: 0.00135171 kg; lognormal variance with pedigree 0.162, pedigree (1,1,5,5,1)
  EcoSpold01Location=RER
  own estimation, lack of data
  properties: dry mass 1 kg, carbon content, fossil 0.387097, wet mass 1 kg
  note on carbon content, fossil: Monomer is vynyl chloride, C2H3Cl (ecoinvent v2.2 report 11_II). MW=62 g/mol
- aluminium, wrought alloy: 0.0790189 kg; lognormal variance with pedigree 0.162, pedigree (1,1,5,5,1)
  own estimation, lack of data
  EcoSpold01Location=RER
  properties: wet mass 1 kg, dry mass 1 kg
- diesel, burned in diesel-electric generating set, 10MW: 0.537049 MJ; lognormal variance with pedigree 0.042, pedigree (1,1,5,5,1)
  environmental report
  EcoSpold01Location=GLO
- argon, liquid: 0.00284468 kg; lognormal variance with pedigree 0.162, pedigree (1,1,5,5,1)
  own estimation, lack of data
  EcoSpold01Location=RER
  properties: dry mass 1 kg, wet mass 1 kg
- soap: 0.00141395 kg; lognormal variance with pedigree 0.162, pedigree (1,1,5,5,1)
  own estimation, lack of data
  EcoSpold01Location=RER
  properties: carbon content, non-fossil 0.692237, dry mass 0.87 kg, wet mass 1 kg, water content 0.149425
  note on carbon content, non-fossil: Soap (CnH2n+1 COO Na) is produced by a combined saponification and neutralisation process performed on a blend of oleochemical feedstocks comprised of short chain (C12-14, derived from coconut or palm kernel oil) and long chain (C16-18, from tallow or palm oil) esters.The ratio of short to long fatty acid chains is 20:80 (ecoinvent v2.2 report 12). Short fatty acid has been estimated as C12.5H(2*12.5+1); MW R=176 g/mol. Long fatty acid has been estimated as C16H(2*16+1); MW R=225 g/mol. MW of COONa=67 g/mol
- oxygen, liquid: 5.68936e-5 kg; lognormal variance with pedigree 0.162, pedigree (1,1,5,5,1)
  EcoSpold01Location=RER
  own estimation, lack of data
  properties: wet mass 1 kg, dry mass 1 kg
- nitric acid, without water, in 50% solution state: 0.00237057 kg; lognormal variance with pedigree 0.162, pedigree (1,1,5,5,1)
  EcoSpold01Location=RER
  own estimation, lack of data
  properties: wet mass 1 kg, dry mass 1 kg
- hydrogen, liquid: 1.73841e-5 kg; lognormal variance with pedigree 0.162, pedigree (1,1,5,5,1)
  EcoSpold01Location=RER
  own estimation, lack of data
  properties: dry mass 1 kg, wet mass 1 kg
- lubricating oil: 0.0145395 kg; lognormal variance with pedigree 0.162, pedigree (1,1,5,5,1)
  EcoSpold01Location=RER
  own estimation, lack of data
  properties: dry mass 1 kg, wet mass 1 kg, carbon content, fossil 0.75
  note on carbon content, fossil: Lubricating oil is produced from diesel. C-content/dry mass of fats and oils considered 75%, from: ecoinvent v2.2 report, n 15a, pg 40
- low level radioactive waste: -0.000629983 m3; lognormal variance with pedigree 0.162, pedigree (1,1,5,5,1)
  own estimation, lack of data
  EcoSpold01Location=CH
  production volume 300.888 m3
    (same comment as for municipal solid waste)
  properties: wet mass 2500 kg, dry mass 2500 kg
- hydrochloric acid, without water, in 30% solution state: 0.000316075 kg; lognormal variance with pedigree 0.162, pedigree (1,1,5,5,1)
  own estimation, lack of data
  EcoSpold01Location=RER
  properties: dry mass 1 kg, wet mass 1 kg
- sodium hydroxide, without water, in 50% solution state: 0.00442506 kg; lognormal variance with pedigree 0.162, pedigree (1,1,5,5,1)
  own estimation, lack of data
  EcoSpold01Location=RER
  properties: dry mass 1 kg, wet mass 1 kg
- nitrogen, liquid: 0.000616347 kg; lognormal variance with pedigree 0.162, pedigree (1,1,5,5,1)
  own estimation, lack of data
  EcoSpold01Location=RER
  properties: dry mass 1 kg, wet mass 1 kg
- steel, low-alloyed, hot rolled: 0.237057 kg; lognormal variance with pedigree 0.162, pedigree (1,1,5,5,1)
  own estimation, lack of data
  EcoSpold01Location=RER
  properties: carbon content, fossil 0.005, wet mass 1 kg, dry mass 1 kg
  note on carbon content, fossil: Low alloyed steel composition given in Tab. 3.2 ecoinvent v2.2 report 10_partII. Steel assumed to have a C content of 0.5%
- chemical, organic: 0.00129591 kg; lognormal variance with pedigree 0.162, pedigree (1,1,5,5,1)
  EcoSpold01Location=GLO
  own estimation, lack of data
  properties: wet mass 1 kg, carbon content, fossil 0.628, dry mass 1 kg
  note on carbon content, fossil: This dataset is an unweighted average of 20 organic substances (listed in Tab 88.1, ecoinvent v2.2 report 8, part II), being part of the top100 chemicals included in this database. The C-content has also been calculated as an unweighted average of the C content of the substances composing this dataset.
- chemical, inorganic: 0.0491497 kg; lognormal variance with pedigree 0.162, pedigree (1,1,5,5,1)
  EcoSpold01Location=GLO
  own estimation, lack of data
  properties: wet mass 1 kg, carbon content, fossil 0.003, dry mass 1 kg
  note on carbon content, fossil: This dataset is an unweighted average of 20 inorganic substances (listed in Tab 88.1, ecoinvent v2.2 report 8, part II), being part of the top100 chemicals included in this database. The C-content has also been calculated as an unweighted average of the C content of the substances composing this dataset.
- electricity, medium voltage: 0 kWh; pedigree (1,1,1,1,1)
  EcoSpold01Location=UCTE
  range of data
- electricity, high voltage: 12.4787 kWh; lognormal variance with pedigree 0.162, pedigree (1,1,5,5,1)
  own estimation after one source. Electricity from non-alpine reservoir hydropower plants. As a simplifying assumption, only non-alpine reservoir plants are considered in this dataset. Alpine and tropical reservoir plants are neglected.
- methanol: 0.000505721 kg; lognormal variance with pedigree 0.162, pedigree (1,1,5,5,1)
  own estimation, lack of data
  EcoSpold01Location=CH
  properties: carbon content, fossil 0.375, wet mass 1 kg, dry mass 1 kg
- uranium hexafluoride: 0 kg; pedigree (1,1,1,1,1)
  EcoSpold01Location=US
  calculated
  properties: dry mass 1 kg, wet mass 1 kg
- heat, district or industrial, natural gas: 0 MJ; pedigree (1,1,1,1,1)
  EcoSpold01Location=RER
  own estimation, lack of data
- waste mineral oil: -0.00379291 kg; lognormal variance with pedigree 0.162, pedigree (1,1,5,5,1)
  own estimation, lack of data
  EcoSpold01Location=CH
  production volume 1814.88 kg
    (same comment as for municipal solid waste)
  properties: wet mass 1 kg, dry mass 0.9 kg, water content 0.111111, carbon content, fossil 0.864444
  note on carbon content, fossil: Tab A.6, ecoinvent v2.2 report 13_I. C content has been calculated after data in the tables, and then referred to 1 kg DM
- spent anion exchange resin from potable water production: -0.0916619 kg; lognormal variance with pedigree 0.162, pedigree (1,1,5,5,1)
  environmental report
  EcoSpold01Location=CH
  production volume 43859.7 kg
    (same comment as for municipal solid waste)
  properties: water content 1, wet mass 1 kg, dry mass 0.5 kg, carbon content, fossil 0.654
  note on carbon content, fossil: Tab A.12, ecoinvent v2.2 report 13_I, c content is referred to 1 kg DM
- phosphoric acid, fertiliser grade, without water, in 70% solution state: 0.000189645 kg; lognormal variance with pedigree 0.162, pedigree (1,1,5,5,1)
  own estimation, lack of data
  EcoSpold01Location=GLO
  properties: dry mass 1 kg, wet mass 1 kg
- water, decarbonised: 0 kg; name water_decarbonised_input; pedigree (1,1,1,1,1)
  own estimation, lack of data
  EcoSpold01Location=RER
  properties: wet mass 1 kg
- acetylene: 3.95094e-5 kg; lognormal variance with pedigree 0.162, pedigree (1,1,5,5,1)
  own estimation, lack of data
  EcoSpold01Location=CH
  properties: wet mass 1 kg, carbon content, fossil 0.923077, dry mass 1 kg
  note on carbon content, fossil: C2H2. ecoinvent v2.2 report n 8. Produced from partial oxidation of natural gas
- brass: 0.00284468 kg; lognormal variance with pedigree 0.162, pedigree (1,1,5,5,1)
  own estimation, lack of data
  EcoSpold01Location=CH
  properties: dry mass 1 kg, wet mass 1 kg
- concrete, normal: 0 m3; pedigree (1,1,1,1,1)
  EcoSpold01Location=CH
  own estimation, lack of data
  properties: water content 0.086758, wet mass 2380 kg, dry mass 2190 kg
- uranium enrichment centrifuge facility: 2.21994e-8 unit; lognormal variance with pedigree 0.162, pedigree (1,1,5,5,1)
  EcoSpold01Location=RU
  own estimation, lack of data
- electricity, high voltage: 0 kWh; pedigree (1,1,1,1,1)
  own estimation after one source
  EcoSpold01Location=PL
- municipal solid waste: -0.00052393, -0.000132017, -0.00018866, -0.370544 kg (4 entries); lognormal variance with pedigree 0.162, pedigree (1,1,5,5,1)
  own estimation, lack of data
  EcoSpold01Location=CH
  production volume 2.30267e6 kg
- electricity, medium voltage: 0.0163485, 0.122161, 0.39694, 0.0224885, 0.141301, 0.0609612, 0.0555164, 0.098478, 0.0573117, 0.0137819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 kWh (42 entries); lognormal variance with pedigree 0.052, pedigree (1,1,5,5,1)
  EcoSpold01Location=UCTE
  range of data
- uranium hexafluoride: 0.0413544, 1.42861 kg (2 entries); lognormal variance with pedigree 0.042, pedigree (1,1,5,5,1)
  EcoSpold01Location=US
  calculated
- heat, district or industrial, natural gas: 21.2275, 0.392062 MJ (2 entries); lognormal variance with pedigree 0.162, pedigree (1,1,5,5,1)
  EcoSpold01Location=RER
  own estimation, lack of data
- water, decarbonised: 0.169458, 0.440928, 0.000275747, 1.77837, 0.0875462, 0.287869, 0.226459, 3.30896, 0.0216468 kg (9 entries); lognormal variance with pedigree 0.042, pedigree (1,1,5,5,1)
  own estimation, lack of data
  EcoSpold01Location=RER
- concrete, normal: 3.04833e-6, 0.000101182, 1.0543e-5, 8.53532e-5, 4.80112e-5, 0.000203314, 6.85766e-6 m3 (7 entries); lognormal variance with pedigree 0.162, pedigree (1,1,5,5,1)
  EcoSpold01Location=CH
  own estimation, lack of data
- electricity, high voltage: 1.6305, 0.296921, 5.07169, 11.7598, 34.089 kWh (5 entries); lognormal variance with pedigree 0.162, pedigree (1,1,5,5,1)
  own estimation after one source
  EcoSpold01Location=PL

## Emissions to nature
- Zinc, ion [water, surface water]: 6.00543e-5 kg; lognormal variance with pedigree 0.162, pedigree (1,1,5,5,1)
  own estimation, lack of data
- Chromium, ion [water, surface water]: 6.00543e-6 kg; lognormal variance with pedigree 0.162, pedigree (1,1,5,5,1)
  own estimation, lack of data
- Aluminium [water, surface water]: 0.00173841 kg; lognormal variance with pedigree 0.162, pedigree (1,1,5,5,1)
  own estimation, lack of data
- Water [water, unspecified]: 0.00387192 m3; name water_to_water_unspecified; lognormal variance with pedigree 0.0827, pedigree (2,2,5,5,1)
  Calculated value based on literature values and expert opinion. See comments in the parametres' comment field.
  property carbon content, fossil 0; name C_content_fossil
  property water in wet mass 1000 kg; name WWM
  property wet mass 1000 kg; name WM
  property dry mass 0 kg; name DM
  property carbon content, non-fossil 0; name C_content_non_fossil
  property fraction, origin: fresh water 1; name fraction_origin_fresh_water_Ww
  property fraction, origin: salt water 0; name fraction_origin_salt_water_Ww
  property fraction, origin: unspecified 0; name fraction_origin_unspecified_Ww
- Nitrate [water, surface water]: 0.00395094 kg; lognormal variance with pedigree 0.162, pedigree (1,1,5,5,1)
  own estimation, lack of data
- Fluoride [water, surface water]: 0.000173841 kg; lognormal variance with pedigree 0.162, pedigree (1,1,5,5,1)
  own estimation, lack of data
- Water [air, unspecified]: 0.00244958 m3; name water_to_air_unspecified; lognormal variance with pedigree 0.0827, pedigree (2,2,5,5,1)
  (same comment as for Water)
  property fraction, origin: unspecified 0; name fraction_origin_unspecified
  property fraction, origin: fresh water 1; name fraction_origin_fresh_water
  property fraction, origin: salt water 0; name fraction_origin_salt_water
- Ethanol [air, non-urban air or from high stacks]: 0.00205449 kg; lognormal variance with pedigree 0.162, pedigree (1,1,5,5,1)
  own estimation, lack of data
- Uranium alpha [water, surface water]: 1.29591e-5 kBq; lognormal variance with pedigree 0.162, pedigree (1,1,5,5,1)
  own estimation, lack of data
- Thorium-234 [water, surface water]: 0.00489917 kBq; lognormal variance with pedigree 0.162, pedigree (1,1,5,5,1)
  own estimation, lack of data
- Copper, ion [water, surface water]: 2.05449e-6 kg; lognormal variance with pedigree 0.162, pedigree (1,1,5,5,1)
  own estimation, lack of data
- Phosphate [water, surface water]: 0.000537328 kg; lognormal variance with pedigree 0.162, pedigree (1,1,5,5,1)
  own estimation, lack of data
- Thorium-234 [air, non-urban air or from high stacks]: 0.000458309 kBq; lognormal variance with pedigree 0.162, pedigree (1,1,5,5,1)
  own estimation, lack of data
- Uranium alpha [air, non-urban air or from high stacks]: 9.16619e-5 kBq; lognormal variance with pedigree 0.162, pedigree (1,1,5,5,1)
  own estimation, lack of data
- Hydrogen fluoride [air, non-urban air or from high stacks]: 5.8474e-8 kg; lognormal variance with pedigree 0.162, pedigree (1,1,5,5,1)
  own estimation, lack of data
- Hydrocarbons, unspecified [water, surface water]: 9.6403e-5 kg; lognormal variance with pedigree 0.162, pedigree (1,1,5,5,1)
  own estimation, lack of data
- Ethane, 1,1,1,2-tetrafluoro-, HFC-134a [air, non-urban air or from high stacks]: 0.000410898 kg; lognormal variance with pedigree 0.162, pedigree (1,1,5,5,1)
  own estimation, lack of data

## Sampling procedure
Literature

## Extrapolations
none This dataset has been copied from an original dataset covering the geography RU. The uncertainty has been adjusted accordingly.

## Review by Thomas Nemecek 2007-08-24
Passed.
