# concentrated solar power plant construction, solar thermal parabolic trough, 50 MW

Dataset: EcoSpold 2, unit process
Geography: ZA
Time period: 2010-01-01 to 2020-01-01
Technology level: current
Classification: ISIC rev.4 ecoinvent: 4220a: Construction of utility projects for electricity production, except for liquid fuels
Tags: CSP; Concentrated Solar Power
Scenario: Business-as-Usual
System model: Allocation at the point of substitution
Generated by: Karin Treyer
Published in: Telsnig, Thomas 2015
Database: ecoinvent
isCopyrightProtected: true
accessRestrictedTo: 1

## General comment
This activity represents theconstruction of a 50MW CSP parabolic trough power plant in Upington, South Africa ready for electricity production by combination of necessary components and surrounding preparation. The construction of the solar power plant requires four different units in order to produce electricity. The four key units are a collector field area, thermal storage unit, heat transport fluid system and a power block unit. Further, site preparation activities are also included in the dataset (e.g. clearing shrubs, construction of roads, fences, providing water connectivity).
This dataset is entirely based on the detailed life cycle inventory as presented in the dissertation report by
Telsnig, Thomas. 2015. Standortabhängige Analyse und Bewertung solarthermischer Kraftwerke am Beispiel Südafrikas. Forschungsbericht. Band 123. ISSN 0938-1228. Institut für Energiewirtschaft und Rationelle Energieanwendung, Universität Stuttgart, Germany.

## Included activities start
The activity starts with the preparation of the site (land use, access roads, buildings, water supply, clearing shrubs, construction of roads, fences, etc.)

## Included activities end
The activity ends when all the main units are constructed and assembled for running the power plant.

## Geography
The CSP plant represented in this dataset has been modelled specifically for South African conditions (see Telsnig 2015).

## Reference product
- concentrated solar power plant, solar thermal parabolic trough, 50 MW: 1 unit; By-product classification allocatable product; CPC 54262: General construction services of power plants; pedigree (1,1,1,1,1)
  Reference product unit for construction of a concentrated solar plant.
  production volume 1 unit
    Assumption
  property lifetime 30 year; name lifetime
    The economic lifetime of the plant is assumed to be 30 years.
  property price 3.4975e8 EUR2005
    Telsnig 2015: Investment cost for a 50MW CSP solar thermal parabolic trough plant in South Africa (EUR2010) with limited storage capacity (see Table 4-4 in Telsnig, 2015). Apart from the cost of the components this includes about 64 million Euros of indirect cost and owner's cost.
    Reference(s): Telsnig, Thomas. 2015. Standortabhängige Analyse und Bewertung solarthermischer Kraftwerke am Beispiel Südafrikas. Forschungsbericht. Band 123. ISSN 0938-1228. Institut für Energiewirtschaft und Rationelle Energieanwendung, Universität Stuttgart, Germany.
  property true value 3.4975e8
    allocation property applied in "true value" allocation // value calculated from revenue

## By-products
- iron scrap, sorted, pressed: 0 kg; By-product classification Recyclable; CPC 39310: Slag, dross, scalings and other waste from the manufacture of iron or steel; pedigree (1,1,1,1,1)
  Iron scrap recovered from this waste.
  production volume 2.97453 kg
  property price 0.175 EUR2005
    Temporary price data. Calculated as 90% of purchasers price based on: 2005 import and export prices (total trades (USD) divided by total weight (kg) in biggest economies of the world: EU27, USA, Brasil, China, India, Japan and Russia) from UN Commodity Trade Statistics Database (http://data.un.org/Explorer.aspxDatabase [Accessed 2011.06.20]). Commodity: Waste or scrap, of cast iron
  property carbon content 0
    carbon content on a dry matter basis (reserved; not for manual entry)
  property true value 0.520543
    allocation property applied in "true value" allocation // value calculated from revenue
  properties: water content 0, water in wet mass 0 kg, carbon content, fossil 0, dry mass 1 kg, carbon content, non-fossil 0, wet mass 1 kg, carbon allocation 0 kg

## Inputs from technosphere
- water supply network: 4 km; lognormal variance with pedigree 0.0137, pedigree (4,4,3,3,2)
  For sanitary sewers and drains
- steel, unalloyed: 6391 kg; name steel; lognormal variance with pedigree 0.0137, pedigree (4,4,3,3,2)
  Used for construction of site fences. The fences are 2m tall and 2.4Kg in mass. Therefore for construction of 8Km of site fences 6391Kg of steel is used
  properties: wet mass 1 kg, carbon content, fossil 0.0025, dry mass 1 kg
- decommissioned road: -43193 m*year; = (road)*-1; lognormal variance with pedigree 0.0137, pedigree (4,4,3,3,2)
  End of life treatment for roads constructed
  production volume 43193 m*year; = Ref('2733dd24-4b62-4cc0-87d4-b9112d7df908', 'ProductionVolume') * ((Ref('f8d1a520-18a5-4756-bb99-f876bdb133ad')*-1) / Ref('2733dd24-4b62-4cc0-87d4-b9112d7df908'))
    Calculated from production volume of reference product using the relative outputs.
  properties: wet mass 122 kg, dry mass 122 kg, carbon content, fossil 0.0220896
- excavation, hydraulic digger: 22936 m3; lognormal variance with pedigree 0.0137, pedigree (4,4,3,3,2)
  Piping- yardpiping backfill and excavation. It is assumed that the whole excavated volume also has to be put back again once the pipes have been set. This activity does not have to be accounted in the waste
- heat transport fluid system, solar thermal parabolic trough, 50 MW: 1 unit; lognormal variance with pedigree 0.0137, pedigree (4,4,3,3,2)
  heat transport fluid system unit input for construction of 50MW solar thermal parabolic trough plant.
- building, hall, wood construction: 943 m2; lognormal variance with pedigree 0.0137, pedigree (4,4,3,3,2)
  Includes warehouse maintenance, electrical control of building and security
- power block, solar thermal parabolic trough, 50 MW: 1 unit; lognormal variance with pedigree 0.0137, pedigree (4,4,3,3,2)
  power block installation unit input for construction of 50MW solar thermal parabolic trough plant. ;activityLink introduced to establish a direct link to the corresponding regional supply of this product
- waste reinforcement steel: -4154.15 kg; = (steel*0.65)*-1
  All steel types are assumed to be treated as reinforcing steel due to lack of other appropriate datasets in ecoinvent.
  For the time period 2003-2012, average steel recycling rate in South Africa amounted to 35% fo the total steel mass according to Telsnig 2015. The remaining steel is assumed to be sent to final disposal.
  production volume 4154.15 kg; = Ref('2733dd24-4b62-4cc0-87d4-b9112d7df908', 'ProductionVolume') * ((Ref('2750b8b4-fe49-4647-a1e9-b15e226e8efb')*-1) / Ref('2733dd24-4b62-4cc0-87d4-b9112d7df908'))
    Calculated from production volume of reference product using the relative outputs.
  properties: wet mass 1 kg, dry mass 1 kg
- waste reinforcement steel: -2236.85 kg; = (steel*0.35)*-1
  (same comment as for waste reinforcement steel)
  production volume 2236.85 kg; = Ref('2733dd24-4b62-4cc0-87d4-b9112d7df908', 'ProductionVolume') * ((Ref('3f543239-b7a4-4ab0-87df-55a56ba109c8')*-1) / Ref('2733dd24-4b62-4cc0-87d4-b9112d7df908'))
    Calculated from production volume of reference product using the relative outputs.
  properties: dry mass 1 kg, wet mass 1 kg
- road: 43193 m*year; lognormal variance with pedigree 0.0137, pedigree (4,4,3,3,2)
  Roads primarily constructed for transport of construction materials, ease of operational and maintenance, transport of oil etc
- thermal storage system, solar thermal parabolic trough, 50 MW: 1 unit; lognormal variance with pedigree 0.0137, pedigree (4,4,3,3,2)
  Thermal storage unit input for construction of 50MW solar thermal parabolic trough plant. ;activityLink introduced to establish a direct link to the corresponding regional supply of this product
- wire drawing, steel: 6391 kg; = steel; lognormal variance with pedigree 0.0137, pedigree (4,4,3,3,2)
  Process done to draw wires from steel
- collector field area, solar thermal parabolic trough, 50 MW: 1 unit; lognormal variance with pedigree 0.0137, pedigree (4,4,3,3,2)
  collector field area unit input for construction of 50MW solar thermal parabolic trough plant. ;activityLink introduced to establish a direct link to the corresponding regional supply of this product

## Inputs from nature
- Occupation, industrial area [natural resource, land]: 3.83631e7 m2*year; = transformation_from*lifetime; lognormal variance with pedigree 0.0137, pedigree (4,4,3,3,2)
  Area occupied by CSP plant over the lifetime of the plant.
- Transformation, from grassland, natural (non-use) [natural resource, land]: 1.27877e6 m2; name transformation_from; lognormal variance with pedigree 0.0137, pedigree (4,4,3,3,2)
  Process of transforming unused area to industrial sector
- Transformation, to industrial area [natural resource, land]: 1.27877e6 m2; = transformation_from; lognormal variance with pedigree 0.0137, pedigree (4,4,3,3,2)
  Process of transforming unused area to industrial sector

## Sampling procedure
This dataset is entirely based on the detailed life cycle inventory as presented in the dissertation report by
Telsnig, Thomas. 2015. Standortabhängige Analyse und Bewertung solarthermischer Kraftwerke am Beispiel Südafrikas. Forschungsbericht. Band 123. ISSN 0938-1228. Institut für Energiewirtschaft und Rationelle Energieanwendung, Universität Stuttgart, Germany.

Further, data in Telsnig 2015 are not shown explicitely for the downscaled 50 MW parabolic trough power plant. This gap is filled in the ecoinvent report.

## Extrapolations
The original data modelling a 250 MW power plant have been scaled down with parameter specific linear and non-linear equations to represent a 50 MW plant design.

## Review by Christopher Oberschelp 2017-03-06
Very detailed and well-structured dataset with in-depth documentation. Key exchanges have been found reasonable. Comparison of impacts with other technologies might now help to spot any unusual or unexpected exchanges.
