# treatment of waste plastic, industrial electronics, municipal incineration with fly ash extraction

Dataset: EcoSpold 2, unit process
Geography: CH
Time period: 2006-01-01 to 2019-12-31
Technology level: current
Classification: ISIC rev.4 ecoinvent: 3821:Treatment and disposal of non-hazardous waste
Synonyms: municipal waste incineration; Kehrichtverbrennung; Siedlungsabfallverbrennung
Scenario: Business-as-Usual
System model: Allocation at the point of substitution
Share of production covered: 100 %
Generated by: Gabor Doka
Published in: Doka G. 2015
Database: ecoinvent
isCopyrightProtected: true
accessRestrictedTo: 1

## General comment
This dataset represents the activity of waste disposal of waste plastic, industrial electronics in a municipal solid waste incinerator (MSWI) // Recommended use of this dataset: For plastic parts from industrial electronics, which go to disposal as part of communal waste mixture, either after a separation procedure, or in small amounts as illegal disposal of a larger item of waste electronics (WEEE). // // Waste composition (wet, in ppm): upper heating value 36.24 MJ/kg; lower heating value 34.78 MJ/kg; H2O 7213.7; O 62000; H 73000; C 808000; S 400; N 13500; P 400; B n.a.; Cl 6400; Br 4200; F 370; I n.a.; Ag n.a.; As 5; Ba 217; Cd 186; Co 29.478; Cr 71; Cu 3194.1; Hg 0.3; Mn 9.8; Mo 4; Ni 299; Pb 165; Sb 4795.2; Se 1.9596; Sn 139; V 1; Zn 520; Be 0.46656; Sc n.a.; Sr 82.582; Ti 4767; Tl 0.37325; W n.a.; Si 2383; Fe 1673; Ca 3047; Al 2773; K 1; Mg n.a.; Na 151; // Share of carbon in waste that is biogenic 0%. // Share of metals in waste not oxidised and bulk-recyclable (exclude very small or thin parts) Iron: 0%; Alu: 0%; Copper: 0%. // Recovery of metal scrap from bottom ash to recycling: 0g iron scrap, 0g aluminium scrap, 0g copper scrap. From this waste, the FLUWA process in the technology mix recovers 0.000841kg (DM) of a hydroxide sludge to be recycled in zinc furnaces. // Ultimately one kg of this waste produces 0.05624 kg of bottom ash (can include some washed ash) and 0.01158 kg of residues, which are landfilled (technology mix). Additional solidification of residues with 0.004631 kg of cement.Net energy production: 4.5MJ/kg electric energy and 8.69MJ/kg thermal energy. //

## Included activities start
waste incineration from waste reception gate and delivery into waste bunker at incinerator plant site (without transports to the incinerator)

## Included activities end
Waste-specific short-term emissions to water from leachate. Long-term emissions from landfill to ground water.

## Geography
Specific to the technology mix encountered in Switzerland in 2012.

## Technology
average Swiss MSWI plants in 2010 (grate incinerators) with electrostatic precipitator for fly ash (ESP), wet flue gas scrubber and 25% SNCR , 42.77% SCR-high dust , 32.68% SCR-low dust -DeNOx facilities and 0% without Denox (weighted according to mass of burnt waste, representing Swiss average). Efficiency of iron scrap separation from slag : 58%. Efficiency of non-ferrous scrap separation from slag : 31%. The technology mix for this dataset includes a filter ash treatment (FLUWA) of a share of 46.22%. Gross electric efficiency technology mix 15.84% and Gross thermal efficiency technology mix 28.51%

## Time period
Waste composition as given in literature reference, theoretical data or other source. Transfer coefficients for modern MSWI.

## Reference product
- waste plastic, industrial electronics: 0 kg; CPC 39270: Waste, parings and scrap of plastics; By-product classification Waste
  Main reference product of this activity (supply of disposal service).
  production volume 0 kg
    based on corresponding global production volume of MSW fraction in conventional MSWI (wo fly ash extraction) and scaled down to annual Swiss incinerated MSW mass of 3.02 mio. tonnes.
  property price 0 EUR2005
    Waste products are assigned a price of zero as they are assumed to require further treatment.
  property carbon content 0.81387
    carbon content on a dry matter basis (reserved; not for manual entry)
  properties: nitrogen content 0.013598, oxygen content 0.06245, chlorine content 0.0064465, hydrogen content 0.07353, copper content 0.0032173, arsenic content 5.0363e-6, bromine content 0.0042305, fluorine content 0.00037269, phosphorus content 0.00040291, manganese content 9.8712e-6, cobalt content 2.9692e-5, chromium content 7.1516e-5, sulfur content 0.00040291, cadmium content 0.00018735, molybdenum content 4.0291e-6, vanadium content 1.0073e-6, antimony content 0.0048301, mercury content 3.0218e-7, selenium content 1.9738e-6, tin content 0.00014001, barium content 0.00021858, lead content 0.0001662, iron content 0.0016852, strontium content 8.3182e-5, beryllium content 4.6995e-7, nickel content 0.00030117, titanium content 0.0048016, zinc content 0.00052378, potassium content 1.0073e-6, water in wet mass 0.0072137 kg, silicon content 0.0024003, sodium content 0.0001521, dry mass 0.99279 kg, thallium content 3.7596e-7, calcium content 0.0030691, aluminium content 0.0027931, carbon content, fossil 0.81387, wet mass 1 kg, water content 0.0072661, carbon allocation 0.808002 kg
- heat, for reuse in municipal waste incineration only: 1 MJ; CPC 17300: Steam and hot water; By-product classification allocatable product; pedigree (1,1,1,1,1)
  Net useful heat generated from this waste and used in internal MSWI plant energy redistribution.
  Uncertainty: uncertainty is calculated from uncertainties in waste composition and uncertainties in energy efficiency and the uncertainty in internal energy demand
  production volume 6.8723e7 MJ

## By-products
- electricity, for reuse in municipal waste incineration only: 0 kWh; name E_el_prod_MSWI; CPC 17100: Electrical energy; By-product classification allocatable product; pedigree (1,1,1,1,1)
  Net electricity generated from this waste and used in internal MSWI plant energy redistribution.
  Uncertainty: uncertainty is calculated from uncertainties in waste composition and uncertainties in energy efficiency and the uncertainty in internal energy demand
  production volume 0 kWh
    calculated in proportion to reference product waste input to incinerator
  property true value relation 3.6; name E_el_prod_MSWI_true_value_relation
    property to calculate "true value" from
  property exergy 3.6 MJ; name E_el_prod_MSWI_exergy
    This exergy property is based on the exergy content of the product.
  property price 0.1 EUR2005; name E_el_prod_MSWI_price_EUR2005
    Estimated to be the same price as in case of electricity, medium voltage.
- heat, for reuse in municipal waste incineration only: 0 MJ; name E_th_prod_MSWI; CPC 17300: Steam and hot water; By-product classification allocatable product; pedigree (1,1,1,1,1)
  (same comment as for heat, for reuse in municipal waste incineration only)
  production volume 0 MJ
    calculated in proportion to reference product waste input to incinerator
  property true value relation 0.1842; name E_th_prod_MSWI_true_value_relation
    property to calculate "true value" from
  property exergy 0.1842 MJ; name E_th_prod_MSWI_exergy
    This exergy property is based on the exergy content of the product.
  property price 0.0106 EUR2005; name E_th_prod_MSWI_price_EUR2005
    Average European district heat price from Ecoheatcool and Euroheat 2005-2006, Ecoheat Work package 1: The European heat market. Final report. 10.6 EUR/GJ i s the price of district heat. http://www.solarthermalworld.org/files/Ecoheatcool%20WP1%20Web.pdf?download
- zinc concentrate: 0 kg; CPC 14290: Other non-ferrous metal ores and concentrates (other than uranium or thorium ores and concentrates); By-product classification allocatable product
  Calculated value from the knowledge of the properties of both products.
  property price 0.38 EUR2005; name ByP_price_EUR2005
    Temporary price data. Calculated as 90% of purchasers price based on: Zinc content in concentrate 53%. Concentrate price per kg Zn 86.5% of refined Zn price (13.5% treatment charges according to CHR Metals Limited 2005: Dynamic cost curves. http://www.minecost.com/dynamic.pdf). 2004 zinc price from USGS (2007) Mineral commodity summaries 2007. <http://minerals.usgs.gov/minerals/pubs/mcs/2007/mcs2007.pdf> [Accessed 25 May 2010]
  property zinc content 0.53; name zinc_C_zinc_concentrate
    Zinc content on a dry matter basis. Value taken from teh "zinc mine operation" /GLO dataset.
  property dry mass 1 kg; name DM_zinc_concentrate
  property carbon content 0
    carbon content on a dry matter basis (reserved; not for manual entry)
  properties: wet mass 1 kg, water content 0, carbon content, non-fossil 0, carbon content, fossil 0, water in wet mass 0 kg, carbon allocation 0 kg
## Inputs from technosphere
- heat, district or industrial, natural gas: 0.000235097 MJ; lognormal variance with pedigree 0.67623, pedigree (1,1,3,1,1)
  Input to DeNOx stage, to heat up flue gas in low-dust SCR.
  Uncertainty: uncertainty calculated from uncertainty in average DeNOx input, uncertainty in the share of thermal NOx, uncertainty of nitrogen content in average municipal waste and the uncertainty in nitrogen content in *this* waste.
- iron (III) chloride, without water, in 40% solution state: 0 kg; pedigree (1,1,1,1,1)
  Auxilliary inputs for the wastewater treatment stage of the incinerator plant.
  Uncertainty: uncertainty calculated from uncertainty in average FeCl3 input, of transfer coefficients in the incinerator, and the uncertainty of the waste composition of this waste
  properties: dry mass 1 kg, wet mass 1 kg
- process-specific burdens, slag landfill: 0 kg; pedigree (1,1,1,1,1)
  Mass-specific expenditures required for landfilling of bottom ash.;activityLink introduced to establish a direct link to the corresponding regional supply of this product
  Uncertainty: uncertainty is calculated from uncertainties in waste composition and transfer coefficients in incinerator
- titanium dioxide: 0 kg; pedigree (1,1,1,1,1)
  Input to DeNOx stage (TiO2 catalyst carrier)
  Uncertainty: uncertainty calculated from uncertainty in average DeNOx input, uncertainty in the share of thermal NOx, uncertainty of nitrogen content in average municipal waste and the uncertainty in nitrogen content in *this* waste.
  properties: dry mass 1 kg, wet mass 1 kg
- chemical, organic: 1.33821e-11 kg; lognormal variance with pedigree 0.76402, pedigree (1,1,3,1,1)
  Auxilliary inputs for the wastewater treatment stage of the incinerator plant. Proxy for (pure) Trisodium-trimercapto-s-triazine (CAS 17766-26-6), used as 15% diluted solution, aka TMT15.
  Uncertainty: uncertainty calculated from uncertainty in average TMT15 input, of transfer coefficients in the incinerator, and the uncertainty of the waste composition of this waste
  properties: carbon content, fossil 0.628, dry mass 1 kg, wet mass 1 kg
- chromium oxide, flakes: 0 kg; pedigree (1,1,1,1,1)
  Input to DeNOx stage. Active component in SCR catalyst (vanadium pentoxide, V2O5), here approximated with the available chromium trioxide.
  Uncertainty: uncertainty calculated from uncertainty in average DeNOx input, uncertainty in the share of thermal NOx, uncertainty of nitrogen content in average municipal waste and the uncertainty in nitrogen content in *this* waste.
  properties: wet mass 1 kg, dry mass 1 kg
- chemical, inorganic: 1.002e-11 kg; lognormal variance with pedigree 0.22107, pedigree (1,1,3,1,1)
  Auxilliary inputs for the wastewater treatment stage of the incinerator plant. Proxy for Polyelectrolyte.
  Uncertainty: uncertainty calculated from uncertainty in average Polyelectrolyte input, of transfer coefficients in the incinerator, and the uncertainty of the waste composition of this waste
  properties: dry mass 1 kg, wet mass 1 kg, carbon content, fossil 0.003
- hydrogen peroxide, without water, in 50% solution state: 0 kg; pedigree (1,1,1,1,1)
  Auxilliary oxidising agent for filter ash treatment (FLUWA).
  Uncertainty: uncertainty calculated from uncertainty in of transfer coefficients in the incinerator, and the uncertainty of the waste composition of this waste
  properties: dry mass 1 kg, wet mass 1 kg
- process-specific burdens, residual material landfill: 0 kg; pedigree (1,1,1,1,1)
  Mass-specific expenditures required for landfilling of incineration residues.;activityLink introduced to establish a direct link to the corresponding regional supply of this product
  Uncertainty: uncertainty is calculated from uncertainties in waste composition and transfer coefficients in incinerator
- cement, unspecified: 0 kg; pedigree (1,1,1,1,1)
  Cement required for solidification of landfilled residual material.
  Uncertainty: Uncertainty calculated from uncertainty of the waste composition of this waste, of transfer coefficients in the incinerator and of the solidification recipe.
  properties: wet mass 1 kg, dry mass 1 kg
- metalliferous hydroxide sludge: 0 kg; pedigree (1,1,1,1,1)
  Metalliferous hydroxide sludge from filter ash leaching (FLUWA).
  Uncertainty: uncertainty is calculated from uncertainties in waste composition and transfer coefficients to filter ash in incinerator and the uncertainty of the transfer coefficients of the FLUWA process.
  production volume 0 kg
    calculated in proportion to reference product waste input to incinerator
  properties: calcium content 0.036527, water content 3, zinc content 0.10899, dry mass 0.25 kg, carbon content, fossil 0.049945, wet mass 1 kg, cadmium content 0.075314, oxygen content 0.33057, bromine content 0.098575, sulfur content 0.029234, chlorine content 0.18337, antimony content 0.061838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
- cationic resin: 0 kg; pedigree (1,1,1,1,1)
  Auxilliary input for mercury removal in filter ash treatment (FLUWA).
  Uncertainty: uncertainty calculated from uncertainty in of transfer coefficients in the incinerator, and the uncertainty of the waste composition of this waste
  properties: dry mass 0.5 kg, wet mass 1 kg, carbon content, fossil 0.521606, water content 1
- spent activated carbon with mercury: 0 kg; pedigree (1,1,1,1,1)
  Spent ion exchanger charged with mercury, from FLUWA filter ash treatment, approximated here with Spent activated carbon with mercury, deposited undergound in a polyethylene Big Bag.
  Uncertainty: uncertainty calculated from uncertainty in of transfer coefficients in the incinerator, and the uncertainty of the waste composition of this waste.
  production volume 0 kg; = ABS(Ref('0423e508-6886-4d3b-88a8-abfa110082f5', 'ProductionVolume') * (Ref('c23a96c8-0811-4a94-ab6a-7164fffd693a') / Ref('0423e508-6886-4d3b-88a8-abfa110082f5')))
    Calculated from production volume of reference product using the relative outputs.
  properties: dry mass 1 kg, wet mass 1 kg, carbon content, fossil 0.6
- waste cement, hydrated: 0 kg; pedigree (1,1,1,1,1)
  Hydrated cement output for solidification of landfilled residual material.
  Uncertainty: Uncertainty calculated from uncertainty of the waste composition of this waste and transfer coefficients in the incinerator and of the solidification recipe.
  production volume 0 kg
    calculated in proportion to reference product waste input to incinerator
  properties: dry mass 1 kg, wet mass 1 kg
- sodium hydroxide, without water, in 50% solution state: 0 kg; pedigree (1,1,1,1,1)
  Auxilliary inputs for the flue gas treatment stage of the incinerator plant, and partially in the filter ash treatment (FLUWA).
  Uncertainty: uncertainty calculated from uncertainty in average NaOH input, of transfer coefficients in the incinerator, and the uncertainty of the waste composition of this waste
  properties: wet mass 1 kg, dry mass 1 kg
- water, decarbonised: 0 kg; pedigree (1,1,1,1,1)
  Incinerator process water used in flue gas scrubber stage.
  Uncertainty: uncertainty calculated from uncertainty in average water input, and the uncertainty of the waste composition of this waste
  properties: wet mass 1 kg
- transport, freight, lorry, unspecified: 0 metric ton*km; pedigree (1,1,1,1,1)
  Transport services to transport incineration residues to landfills and filter ash to external treatments (FLUWA).
  Uncertainty: uncertainty calculated from uncertainty of the waste composition of this waste, uncertainty of transfer coefficients and the uncertainty in generic transportation distances
- municipal waste incineration facility: 0 unit
  Demands per kilogram waste.
- quicklime, milled, packed: 0 kg; pedigree (1,1,1,1,1)
  Auxilliary inputs for the flue gas treatment stage of the incinerator plant.
  Uncertainty: uncertainty calculated from uncertainty in average CaO input, of transfer coefficients in the incinerator, and the uncertainty of the waste composition of this waste
  properties: dry mass 0.99 kg, wet mass 1 kg, water content 0.010101
- slag landfill: 0 unit; pedigree (1,1,1,1,1)
  Landfill infrastructure required for landfilling of bottom ash.
  Uncertainty: uncertainty is calculated from uncertainties in waste composition and transfer coefficients in incinerator
- ammonia, liquid: 7.54977e-8 kg; lognormal variance with pedigree 0.67623, pedigree (1,1,3,1,1)
  Input to DeNOx stage (100% NH3).
  Uncertainty: uncertainty calculated from uncertainty in average DeNOx input, uncertainty in the share of thermal NOx, uncertainty of nitrogen content in average municipal waste and the uncertainty in nitrogen content in *this* waste.
  properties: wet mass 1 kg, dry mass 1 kg
- hydrochloric acid, without water, in 30% solution state: 0 kg; pedigree (1,1,1,1,1)
  Auxilliary inputs for the wastewater treatment stage of the incinerator plant.
  Uncertainty: uncertainty calculated from uncertainty in average HCl input, of transfer coefficients in the incinerator, and the uncertainty of the waste composition of this waste
  properties: wet mass 1 kg, dry mass 1 kg
- residual material landfill: 0 unit; pedigree (1,1,1,1,1)
  Landfill infrastructure required for landfilling of incineration residues.
  Uncertainty: uncertainty is calculated from uncertainties in waste composition and transfer coefficients in incinerator
- waste plastic, industrial electronics: -0.000130324 kg; lognormal variance with pedigree 0.1786, pedigree (4,5,5,5,5)
  Based on composition of this device
  EcoSpold01Location=CH
  Uncertainty: based on composition of this device
- scrap steel: -3.02619e-5, -1.63188e-5 kg (2 suppliers, which the file names only by identifier); sum of these -4.65806e-5 kg; lognormal variance with pedigree 0.1786, pedigree (4,5,5,5,5)
  Calculated value; the scrap steel as an exchange was not present in ecoinvent v2 due to cut-off rules.
  Uncertainty: based on composition of this device
- waste plastic, mixture: -1.80328e-6 kg
  EcoSpold01Location=CH
  Uncertainty for LCI results cannot be determined
  production volume 24594.1 kg
- coal slurry: -2.00262e-6 kg
  EcoSpold01Location=GLO
  Uncertainty for LCI results cannot be determined
  production volume 14884.1 kg
- decommissioned chemical production facilities: -1.25435e-5 kg
  Uncertainty for LCI results cannot be determined
  EcoSpold01Location=RER
  production volume 10.6139 kg
- municipal solid waste: -2.74354e-5 kg
  EcoSpold01Location=CH
  Uncertainty for LCI results cannot be determined
  production volume 3.73499e7 kg
- average incineration residue: -5.9821e-5 kg
  EcoSpold01Location=CH
  Uncertainty for LCI results cannot be determined
  production volume 7.65307e7 kg
- waste wood, untreated: -3.00548e-8 kg
  EcoSpold01Location=CH
  Uncertainty for LCI results cannot be determined
  production volume 1297.04 kg
- spoil from hard coal mining: -0.000150457 kg
  EcoSpold01Location=GLO
  Uncertainty for LCI results cannot be determined
  production volume 1.65145e8 kg
- hazardous waste, for incineration: -5.93605e-5, -1.55189e-6 kg (2 suppliers, which the file names only by identifier); sum of these -6.09124e-5 kg
  Uncertainty for LCI results cannot be determined
  EcoSpold01Location=CH
  production volume 4.16796e7 kg
- aluminium, wrought alloy: 1.36271e-5 kg; source Starzner S. and Wurmer-Weiss P.  2000; lognormal variance with pedigree 0.1461, pedigree (5,5,5,3,3)
  Estimated from data of small plants. The infrastructure of the air separation plant contains besides cold resistant steel and aluminium for the piping and the column also low-alloyed steel and various other materials in the compressors and other components. . The weight of the equipment is largely dependent of the size of the plant. For small plants with an output of 100 kg liquefied product per hour a plant weight of 8-10 t is common. For very large plants the specific weight (referred to the output per hour) of the plant is estimated to be more than 10 times smaller. For this inventory an amount of 10 kg per kg hourly production output was assumed. This leads to a total plant weight of 100 t. 10% of the total weight was accounted as aluminium for the column. The rest was assumed to be a similar material composition as used for the production facilities in the chemical industry.
  EcoSpold01Location=RER
  Uncertainty: Estimated from data of small plants
- chemical factory: 6.24132e-6 kg; source Starzner S. and Wurmer-Weiss P.  2000; lognormal variance with pedigree 0.4461, pedigree (5,5,5,3,3)
  (same comment as for aluminium, wrought alloy)
- hazardous waste, for underground deposit: -1.53599e-7 kg; lognormal variance with pedigree 0.04, pedigree (1,1,5,1,1)
  EcoSpold01Location=DE
  production volume 178963 kg
- building, hall, steel construction: 2.22562e-7 m2; lognormal variance with pedigree 0.4787, pedigree (4,3,5,3,4)
  Estimated from two sites
  EcoSpold01Location=CH
  Uncertainty: estimated from two sites
- building, multi-storey: 1.79986e-7 m3; lognormal variance with pedigree 0.4787, pedigree (4,3,5,3,4)
  EcoSpold01Location=RER
  Estimated from two sites
  Uncertainty: estimated from two sites
- municipal solid waste: -9.35127e-12, -7.50988e-11, -9.03134e-11, -8.03521e-13, -1.01122e-11, -1.1972e-11, -1.83486e-11 kg (7 suppliers, which the file names only by identifier); sum of these -2.16e-10 kg; lognormal variance with pedigree 0.04, pedigree (1,1,5,1,1)
  EcoSpold01Location=CH
  production volume 0.0016045 kg
- waste plastic, mixture: -4.78589e-15, -6.05203e-14, -3.16021e-14, -2.03011e-15, -6.10655e-15, -1.91407e-14 kg (6 suppliers, which the file names only by identifier); sum of these -1.24186e-13 kg; lognormal variance with pedigree 0.04, pedigree (1,1,5,1,1)
  EcoSpold01Location=CH
  production volume 5e-7 kg
- waste plastic, mixture: 0 kg; pedigree (1,1,1,1,1)
  EcoSpold01Location=CH
- waste wood, untreated: -1.72641e-15, -1.76148e-14, -1.38957e-14, -1.60928e-15, -1.63993e-15, -4.00039e-15 kg (6 suppliers, which the file names only by identifier); sum of these -4.04865e-14 kg; lognormal variance with pedigree 0.04, pedigree (1,1,5,1,1)
  EcoSpold01Location=CH
  production volume 5e-7 kg
- waste wood, untreated: 0 kg; pedigree (1,1,1,1,1)
  EcoSpold01Location=CH
- road, company, internal: 7.19789e-7 m2*year; lognormal variance with pedigree 0.4921, pedigree (5,4,5,3,4)
  EcoSpold01Location=CH
  Estimated, based on photos
  Uncertainty: Estimated, based on photos
- paper machine: 2.92201e-13 unit; lognormal variance with pedigree 0.3406, pedigree (1,3,5,1,1)
  EcoSpold01Location=RER
  Information from several european mills
  Uncertainty: Information from several european mills
- wastewater treatment facility, capacity 1.6E8l/year: 7.3782e-13 unit; lognormal variance with pedigree 0.4921, pedigree (5,4,5,3,4)
  Approximation
  EcoSpold01Location=CH
  Uncertainty: Approximation
- industrial furnace, 1MW, oil: 1.10452e-12 unit; lognormal variance with pedigree 0.4921, pedigree (5,4,5,3,4)
  EcoSpold01Location=CH
  Approximation for energy system
  Uncertainty: approximation for energy system
- pipeline, petroleum: 4.56803e-12 km; lognormal variance with pedigree 0.3401, pedigree (1,2,5,1,1)
  Calculation for 100a, approx. 150 factories
  EcoSpold01Location=RER
  Uncertainty: Calculation for 100a, approx. 150 factories
- railway track: 2.26379e-9 m*year; lognormal variance with pedigree 0.3401, pedigree (1,2,5,1,1)
  Calculation for 100a, approx. 150 factories
  EcoSpold01Location=CH
  Uncertainty: Calculation for 100a, approx. 150 factories
- building, hall: 8.20877e-8 m2; lognormal variance with pedigree 0.3401, pedigree (1,2,5,1,1)
  EcoSpold01Location=CH
  Calculation for 100a, approx. 150 factories
  Uncertainty: Calculation for 100a, approx. 150 factories
- pipeline, natural gas, low pressure distribution network: 5.82115e-12 km; lognormal variance with pedigree 0.3401, pedigree (1,2,5,1,1)
  (same comment as for railway track)
- hazardous waste, for incineration: -6.88411e-8 kg
  EcoSpold01Location=CH
  Uncertainty for LCI results cannot be determined
  production volume 7.87054e7 kg
- average incineration residue: -1.12492e-7 kg
  EcoSpold01Location=CH
  Uncertainty for LCI results cannot be determined
  production volume 1.44516e8 kg
- municipal solid waste: -5.65277e-11, -1.42436e-11, -2.03549e-11, -3.99786e-8 kg (4 suppliers, which the file names only by identifier); sum of these -4.00697e-8 kg
  EcoSpold01Location=CH
  Uncertainty for LCI results cannot be determined
  production volume 7.05293e7 kg
- waste wood, untreated: -3.83793e-12, -4.76537e-13, -3.48402e-14, -1.33845e-12, -2.02207e-13, -3.19673e-13, -5.09177e-11 kg (7 suppliers, which the file names only by identifier); sum of these -5.71273e-11 kg
  Uncertainty for LCI results cannot be determined
  EcoSpold01Location=CH
  production volume 2449.25 kg
- waste plastic, mixture: -4.01364e-7, -2.68176e-8, -2.02817e-9, -1.10766e-8, -4.47483e-9, -1.05183e-8, -2.65638e-7 kg (7 suppliers, which the file names only by identifier); sum of these -7.21917e-7 kg
  EcoSpold01Location=CH
  Uncertainty for LCI results cannot be determined
  production volume 46442 kg
- chemical factory: 6.24132e-6 kg; lognormal variance with pedigree 0.448, pedigree (5,5,5,5,3)
  EcoSpold01Location=RER
  Estimated from data of small plants
  Uncertainty: Estimated from data of small plants
- building, multi-storey: 1.54837e-7 m3; lognormal variance with pedigree 0.4806, pedigree (4,3,5,5,4)
  EcoSpold01Location=RER
  Estimated from two sites
  Uncertainty: estimated from two sites
- waste wood, untreated: 0, 0, 0, 0, 0, 0, 0, 0, 0, 0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 kg (24 suppliers, which the file names only by identifier); pedigree (1,1,1,1,1)
  EcoSpold01Location=CH
  production volume 1.5e-6 kg
- waste wood, untreated: -5.44906e-15, -4.57341e-15, -1.52874e-15, -5.78884e-15, -1.47804e-15 kg (5 suppliers, which the file names only by identifier); sum of these -1.88181e-14 kg; lognormal variance with pedigree 0.042, pedigree (1,1,5,5,1)
  EcoSpold01Location=CH
- municipal solid waste: -8.98926e-13, -1.62302e-12, -2.87919e-12, -2.75664e-12, -2.69517e-12, -3.4412e-13, -1.80367e-11, -1.93468e-12, -2.15612e-11, -5.5732e-12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 kg (29 suppliers, which the file names only by identifier); sum of these -1.17338e-10 kg; lognormal variance with pedigree 0.042, pedigree (1,1,5,5,1)
  EcoSpold01Location=CH
  production volume 0.0048135 kg
- waste plastic, mixture: 0, 0, 0, 0, 0, 0, 0, 0, 0, 0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 kg (12 suppliers, which the file names only by identifier); pedigree (1,1,1,1,1)
  EcoSpold01Location=CH
  production volume 1.5e-6 kg
- waste plastic, mixture: -1.92899e-15, -2.86815e-15, -1.71624e-14, -1.97654e-15, -9.63592e-15, -3.58924e-15, -1.6724e-15, -1.78245e-15, -1.95207e-15, -2.03339e-14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 kg (17 suppliers, which the file names only by identifier); sum of these -8.04423e-14 kg; lognormal variance with pedigree 0.042, pedigree (1,1,5,5,1)
  EcoSpold01Location=CH
- paper machine: 2.92201e-13 unit; lognormal variance with pedigree 0.3426, pedigree (1,3,5,5,1)
  Information from several european mills
  EcoSpold01Location=RER
  Uncertainty: Information from several european mills
- pipeline, petroleum: 4.56803e-12 km; lognormal variance with pedigree 0.3421, pedigree (1,2,5,5,1)
  EcoSpold01Location=RER
  Calculation for 100a, approx. 150 factories
  Uncertainty: Calculation for 100a, approx. 150 factories
- copper: 6.35748e-5 kg; lognormal variance with pedigree 0.078025, pedigree (4,4,5,2,3)
  Estimation based on few references
  Estimation based on few references
- heat, central or small-scale, other than natural gas: 1.45365e-5 MJ; lognormal variance with pedigree 0.062, pedigree (3,4,5,1,3)
  Estimation based on specific energy demand of engineering hours
  Estimation based on specific energy demand of engineering hours
- wire drawing, copper: 4.94072e-5 kg; lognormal variance with pedigree 0.078025, pedigree (4,4,5,2,3)
  Based on material input
  Based on material input
- zinc coat, coils: 1.41951e-7 m2; lognormal variance with pedigree 0.078025, pedigree (4,4,5,2,3)
  Based on material input
  Based on material input
- injection moulding: 6.35817e-6 kg; lognormal variance with pedigree 0.078025, pedigree (4,4,5,2,3)
  Based on material input
  Based on material input
- steel, chromium steel 18/8, hot rolled: 0.000183799 kg; lognormal variance with pedigree 0.078025, pedigree (4,4,5,2,3)
  Estimation based on few references
  Estimation based on few references
- transport, passenger car: 2.92065e-6 km; lognormal variance with pedigree 0.198, pedigree (4,4,5,1,3)
  Estimation
  Estimation
- sheet rolling, chromium steel: 9.95254e-6 kg; lognormal variance with pedigree 0.078025, pedigree (4,4,5,2,3)
  Based on material input
  Based on material input
- reinforcing steel: 4.96743e-5 kg; lognormal variance with pedigree 0.078025, pedigree (4,4,5,2,3)
  Estimation based on few references
  Estimation based on few references
- sheet rolling, steel: 0.000208399 kg; lognormal variance with pedigree 0.078025, pedigree (4,4,5,2,3)
  Based on material input
  Based on material input
- electricity, low voltage: 6.54167e-5 kWh; lognormal variance with pedigree 0.062, pedigree (3,4,5,1,3)
  (same comment as for heat, central or small-scale, other than natural gas)
- electronics scrap from control units: -3.57962e-6 kg; lognormal variance with pedigree 0.078025, pedigree (4,4,5,2,3)
  Disposal of electronic parts material
  Disposal of electronic parts material
  production volume 3 kg
- sheet rolling, aluminium: 3.94894e-7 kg; lognormal variance with pedigree 0.078025, pedigree (4,4,5,2,3)
  Based on material input
  Based on material input
- waste mineral wool: -1.07601e-7 kg; lognormal variance with pedigree 0.078025, pedigree (4,4,5,2,3)
  Disposal of heat insulation material
  Disposal of heat insulation material
  production volume 3.5 kg
- stone wool, packed: 7.16224e-7 kg; lognormal variance with pedigree 0.078025, pedigree (4,4,5,2,3)
  Estimation for heat insulation
  Estimation for heat insulation
- waste polyethylene/polypropylene product: -2.87838e-7 kg; lognormal variance with pedigree 0.078025, pedigree (4,4,5,2,3)
  Disposal of plastic material
  Disposal of plastic material
  production volume 6.5 kg
- water, completely softened: 6.18347e-7 kg; lognormal variance with pedigree 0.078025, pedigree (4,4,5,2,3)
  Estimation based on few references
  Estimation based on few references
- heat carrier liquid, 40% C3H8O2: -3.52584e-10 m3; lognormal variance with pedigree 0.078025, pedigree (4,4,5,2,3)
  Disposal of insulation material
  Disposal of insulation material
  production volume 0.01875 m3
- electronics, for control units: 3.57524e-6 kg; lognormal variance with pedigree 0.078025, pedigree (4,4,5,2,3)
  Estimation for control electronic based on few references
  Estimation for control electronic based on few references
- wastewater, from residence: -7.20885e-9 m3; lognormal variance with pedigree 0.140025, pedigree (4,4,5,2,4)
  Approximation for waste water treatment
  Approximation for waste water treatment
  production volume 0.299 m3
- ethylene glycol: 9.54464e-7 kg; lognormal variance with pedigree 0.078025, pedigree (4,4,5,2,3)
  Estimation based on few references
  Estimation based on few references
- polyethylene, high density, granulate: 9.13302e-6 kg; lognormal variance with pedigree 0.078025, pedigree (4,4,5,2,3)
  Estimation for plastic material based on few references
  Estimation for plastic material based on few references
- electricity, medium voltage: 0.000346053 kWh; lognormal variance with pedigree 0.122625, pedigree (2,4,5,2,4)
  Approximation with company data of similar branch
  Approximation with company data of similar branch
- building, hall, steel construction: 2.47483e-9 m2; lognormal variance with pedigree 0.39, pedigree (4,4,5,5,3)
  Rough estimation based on company data of similar branch
  This exchange has an activity link directly to the producing activity because the product is primarily consumed in the same geographical area where it is produced.
- tube insulation, elastomere: 7.08082e-7 kg; lognormal variance with pedigree 0.078025, pedigree (4,4,5,2,3)
  Estimation based on few references
  Estimation based on few references
- helium: 3.3851e-9 kg; lognormal variance with pedigree 0.076025, pedigree (4,5,5,2,1)
  Rough estimation
  Rough estimation
- nylon 6: 4.14736e-7, 3.76196e-8 kg (2 suppliers, which the file names only by identifier); sum of these 4.52356e-7 kg; lognormal variance with pedigree 0.13, pedigree (1,5,5,5,4)
  EcoSpold01Location=RER
  Average of 4 machines
  Uncertainty: average of 4 machines
- polymer foaming: 7.18291e-7, 2.95933e-10 kg (2 suppliers, which the file names only by identifier); sum of these 7.18586e-7 kg; lognormal variance with pedigree 0.2, pedigree (5,5,5,5,4)
  Assumed type of processing
  EcoSpold01Location=RER
  Uncertainty: assumed type of processing
- printed wiring board, surface mounted, unspecified, Pb containing: 2.18885e-9 kg; lognormal variance with pedigree 0.13, pedigree (1,5,5,5,4)
  average of 4 machines.
  This original value from production mix has been replaced by 2 flows. Each has 50% share in the production mix.
  Uncertainty: average of 4 machines
- sheet rolling, copper: 7.99702e-6 kg; lognormal variance with pedigree 0.2, pedigree (5,5,5,5,4)
  Assumed type of processing
  EcoSpold01Location=RER
  Uncertainty: assumed type of processing
- polypropylene, granulate: 1.40428e-5 kg; lognormal variance with pedigree 0.13, pedigree (1,5,5,5,4)
  Average of 4 machines
  EcoSpold01Location=RER
  Uncertainty: average of 4 machines
- waste polyurethane: -7.18291e-7 kg; lognormal variance with pedigree 0.2, pedigree (5,5,5,5,4)
  EcoSpold01Location=CH
  Assumed route of disposal
  Uncertainty: assumed route of disposal
  production volume 0.00847 kg
- waste glass: -8.26724e-7 kg; lognormal variance with pedigree 0.2, pedigree (5,5,5,5,4)
  Assumed route of disposal
  EcoSpold01Location=CH
  Uncertainty: assumed route of disposal
  production volume 0.00383 kg
- metal working, average for chromium steel product manufacturing: 1.72367e-5 kg; lognormal variance with pedigree 0.2, pedigree (5,5,5,5,4)
  EcoSpold01Location=RER
  Assumed type of processing
  Uncertainty: assumed type of processing
- silicone product: 2.01688e-6, 1.63801e-10 kg (2 suppliers, which the file names only by identifier); sum of these 2.01704e-6 kg; lognormal variance with pedigree 0.13, pedigree (1,5,5,5,4)
  Average of 4 machines
  EcoSpold01Location=RER
  Uncertainty: average of 4 machines
- alkyd paint, white, without solvent, in 60% solution state: 4.78414e-7 kg; lognormal variance with pedigree 0.13, pedigree (1,5,5,5,4)
  EcoSpold01Location=RER
  Average of 4 machines
  Uncertainty: average of 4 machines
- flat glass, uncoated: 3.26445e-7 kg; lognormal variance with pedigree 0.13, pedigree (1,5,5,5,4)
  Average of 4 machines
  EcoSpold01Location=RER
  Uncertainty: average of 4 machines
- steel, low-alloyed, hot rolled: 0.000263741 kg; lognormal variance with pedigree 0.13, pedigree (1,5,5,5,4)
  Average of 4 machines
  EcoSpold01Location=RER
  Uncertainty: average of 4 machines
- waste polyethylene: -4.59182e-6 kg; lognormal variance with pedigree 0.2, pedigree (5,5,5,5,4)
  EcoSpold01Location=CH
  Assumed route of disposal
  Uncertainty: assumed route of disposal
  production volume 0.0457 kg
- metal working, average for steel product manufacturing: 5.38041e-5 kg; lognormal variance with pedigree 0.2, pedigree (5,5,5,5,4)
  EcoSpold01Location=RER
  Assumed type of processing
  Uncertainty: assumed type of processing
- synthetic rubber: 7.9247e-7 kg; lognormal variance with pedigree 0.13, pedigree (1,5,5,5,4)
  Average of 4 machines
  EcoSpold01Location=RER
  Uncertainty: average of 4 machines
- printed wiring board, surface mounted, unspecified, Pb free: 4.07813e-9 kg; lognormal variance with pedigree 0.13, pedigree (1,5,5,5,4)
  (same comment as for printed wiring board, surface mounted, unspecified, Pb containing)
- polyurethane, flexible foam: 7.18354e-7 kg; lognormal variance with pedigree 0.13, pedigree (1,5,5,5,4)
  Average of 4 machines
  EcoSpold01Location=RER
  Uncertainty: average of 4 machines
- polycarbonate: 6.32281e-7 kg; lognormal variance with pedigree 0.13, pedigree (1,5,5,5,4)
  Average of 4 machines
  EcoSpold01Location=RER
  Uncertainty: average of 4 machines
- aluminium, cast alloy: 1.85985e-5 kg; lognormal variance with pedigree 0.0906, pedigree (1,5,5,5,4)
  this flow replaces aluminium, production mix
- cast iron: 5.75807e-5 kg; lognormal variance with pedigree 0.13, pedigree (1,5,5,5,4)
  Average of 4 machines
  EcoSpold01Location=RER
  Uncertainty: average of 4 machines
- polyvinylchloride, suspension polymerised: 2.7837e-7 kg; lognormal variance with pedigree 0.13, pedigree (1,5,5,5,4)
  EcoSpold01Location=RER
  Average of 4 machines
  Uncertainty: average of 4 machines
- waste polyvinylchloride: -6.54845e-7 kg; lognormal variance with pedigree 0.2, pedigree (5,5,5,5,4)
  Assumed route of disposal
  EcoSpold01Location=CH
  Uncertainty: assumed route of disposal
  production volume 0.00682 kg
- metal working, average for aluminium product manufacturing: 1.98531e-6 kg; lognormal variance with pedigree 0.2, pedigree (5,5,5,5,4)
  EcoSpold01Location=RER
  Assumed type of processing
  Uncertainty: assumed type of processing
- waste rubber, unspecified: -7.59493e-7, -3.18834e-8 kg (2 suppliers, which the file names only by identifier); sum of these -7.91376e-7 kg; lognormal variance with pedigree 0.2, pedigree (5,5,5,5,4)
  EcoSpold01Location=CH
  Assumed route of disposal
  Uncertainty: assumed route of disposal
  production volume 0.00933 kg
- waste bulk iron, excluding reinforcement: -5.51972e-6 kg; lognormal variance with pedigree 0.072, pedigree (3,4,5,1,3)
  Estimation based on data of Questionnaire
  EcoSpold01Location=CH
  Uncertainty: Estimation based on data of Questionnaire
- blower and heat exchange unit, central, 600-1200 m3/h: 2.60176e-9 unit; lognormal variance with pedigree 0.044, pedigree (3,4,5,1,1)
  Questionnaire, Data related to building considered
  EcoSpold01Location=RER
  Uncertainty: Questionnaire, Data related to building considered
- used air filter in exhaust air valve: -3.49012e-7 unit; lognormal variance with pedigree 0.044, pedigree (3,4,5,1,1)
  Questionnaire, Data related to building considered
  EcoSpold01Location=CH
  Uncertainty: Questionnaire, Data related to building considered
  production volume 0.0226 unit
- used air filter central unit, 600 m3/h: -1.81986e-8 unit; lognormal variance with pedigree 0.044, pedigree (3,4,5,1,1)
  (same comment as for used air filter in exhaust air valve)
  production volume 0.00251 unit
- used silencer steel, DN 315: -7.97202e-10 unit; lognormal variance with pedigree 0.044, pedigree (3,4,5,1,1)
  EcoSpold01Location=CH
  Questionnaire, Data related to building considered
  Uncertainty: Questionnaire, Data related to building considered
  production volume 0.000103 unit
- air filter, central unit, 600 m3/h: 1.10003e-7 unit; lognormal variance with pedigree 0.044, pedigree (3,4,5,1,1)
  (same comment as for blower and heat exchange unit, central, 600-1200 m3/h)
- air filter, in exhaust air valve: 1.9445e-6 unit; lognormal variance with pedigree 0.044, pedigree (3,4,5,1,1)
  EcoSpold01Location=RER
  Questionnaire, Data related to building considered
  Uncertainty: Questionnaire, Data related to building considered
- ventilation system, central, 1 x 720 m3/h, polyethylene ducts, with earth tube heat exchanger: 9.51321e-11 unit; lognormal variance with pedigree 0.044, pedigree (3,4,5,1,1)
  (same comment as for used silencer steel, DN 315)
- silencer, steel, DN 315, 50 mm: 5.22093e-9 unit; lognormal variance with pedigree 0.044, pedigree (3,4,5,1,1)
  (same comment as for used silencer steel, DN 315)
- used flexible duct aluminium/PET, DN of 125: -2.69292e-8 m; lognormal variance with pedigree 0.044, pedigree (3,4,5,1,1)
  (same comment as for used air filter in exhaust air valve)
  production volume 0.000513 m
- used ventilation control and wiring central unit: -3.97155e-10 unit; lognormal variance with pedigree 0.044, pedigree (3,4,5,1,1)
  (same comment as for used air filter in exhaust air valve)
  production volume 5.13e-5 unit
- ventilation control and wiring, central unit: 2.60176e-9 unit; lognormal variance with pedigree 0.044, pedigree (3,4,5,1,1)
  (same comment as for blower and heat exchange unit, central, 600-1200 m3/h)
- used silencer steel, DN 125: -3.65387e-8 unit; lognormal variance with pedigree 0.044, pedigree (3,4,5,1,1)
  (same comment as for used air filter in exhaust air valve)
  production volume 0.000615 unit
- used blower and heat exchange unit central, 600-1200 m3/h: -3.97155e-10 unit; lognormal variance with pedigree 0.044, pedigree (3,4,5,1,1)
  (same comment as for used air filter in exhaust air valve)
  production volume 5.13e-5 unit
- flexible duct, aluminium/PET, DN of 125: 1.4709e-7 m; lognormal variance with pedigree 0.044, pedigree (3,4,5,1,1)
  (same comment as for air filter, in exhaust air valve)
- silencer, steel, DN 125: 2.06058e-7 unit; lognormal variance with pedigree 0.044, pedigree (3,4,5,1,1)
  (same comment as for used silencer steel, DN 315)
- ventilation system, central, 1 x 720 m3/h, steel ducts, with earth tube heat exchanger: 8.99425e-11 unit; lognormal variance with pedigree 0.044, pedigree (3,4,5,1,1)
  (same comment as for used air filter in exhaust air valve)
- spiral-seam duct, steel, DN 400: 5.36861e-8 m; lognormal variance with pedigree 0.0426, pedigree (2,4,5,1,1)
  (same comment as for blower and heat exchange unit, central, 600-1200 m3/h)
- insulation spiral-seam duct, rockwool, DN 400, 30 mm: 4.44722e-8 m; lognormal variance with pedigree 0.0426, pedigree (2,4,5,1,1)
  (same comment as for blower and heat exchange unit, central, 600-1200 m3/h)
- exhaust air roof hood, steel, DN 400: 1.29608e-9 unit; lognormal variance with pedigree 0.04, pedigree (1,1,5,1,1)
  EcoSpold01Location=CH
  2,4,1,1,1,nA; Questionnaire, Data related to building considered
- used insulation spiral-seam duct rockwool, DN 400: -4.00265e-9 m; lognormal variance with pedigree 0.0426, pedigree (2,4,5,1,1)
  (same comment as for used air filter in exhaust air valve)
  production volume 0.67336 m
- excavation, hydraulic digger: 1.55095e-8 m3; lognormal variance with pedigree 0.06, pedigree (4,4,5,1,1)
  Assumption, Data related to building considered
  EcoSpold01Location=RER
  Uncertainty: Assumption, Data related to building considered
- used exhaust air valve in-wall housing, plastic/steel: -1.74409e-8 unit; lognormal variance with pedigree 0.0426, pedigree (2,4,5,1,1)
  (same comment as for used silencer steel, DN 315)
  production volume 0.606024 unit
- used sealing tape aluminium/PE, 50 mm wide: -4.92853e-7 m; lognormal variance with pedigree 0.0426, pedigree (2,4,5,1,1)
  (same comment as for used silencer steel, DN 315)
  production volume 6.7336 m
- used room-connecting overflow element steel, approx. 40 m3/h: -1.74409e-8 unit; lognormal variance with pedigree 0.0426, pedigree (2,4,5,1,1)
  (same comment as for used air filter in exhaust air valve)
  production volume 0.606024 unit
- spiral-seam duct, steel, DN 125: 6.85087e-8 m; lognormal variance with pedigree 0.0426, pedigree (2,4,5,1,1)
  (same comment as for air filter, in exhaust air valve)
- outside air intake, stainless steel, DN 370: 1.29608e-9 unit; lognormal variance with pedigree 0.0426, pedigree (2,4,5,1,1)
  (same comment as for air filter, in exhaust air valve)
- used outside air intake stainless steel, DN 370: -1.13208e-10 unit; lognormal variance with pedigree 0.0426, pedigree (2,4,5,1,1)
  (same comment as for used air filter in exhaust air valve)
  production volume 0.033668 unit
- supply air inlet, steel/SS, DN 75: 1.71272e-7 unit; lognormal variance with pedigree 0.0426, pedigree (2,4,5,1,1)
  (same comment as for blower and heat exchange unit, central, 600-1200 m3/h)
- room-connecting overflow element, steel, approx. 40 m3/h: 1.02763e-7 unit; lognormal variance with pedigree 0.0426, pedigree (2,4,5,1,1)
  (same comment as for blower and heat exchange unit, central, 600-1200 m3/h)
- polyethylene pipe, DN 200, SDR 41: 1.5553e-7 m; lognormal variance with pedigree 0.0426, pedigree (2,4,5,1,1)
  (same comment as for air filter, in exhaust air valve)
- air distribution terminal panel, steel, 120 m3/h: 6.85087e-8 unit; lognormal variance with pedigree 0.0426, pedigree (2,4,5,1,1)
  (same comment as for used silencer steel, DN 315)
- exhaust air valve, in-wall housing, plastic/steel, DN 125: 1.02763e-7 unit; lognormal variance with pedigree 0.0426, pedigree (2,4,5,1,1)
  (same comment as for used air filter in exhaust air valve)
- polyethylene pipe, corrugated, DN 75: 1.19087e-6 m; lognormal variance with pedigree 0.0426, pedigree (2,4,5,1,1)
  (same comment as for air filter, in exhaust air valve)
- used air distribution terminal panel steel, 120 m3/h: -1.16273e-8 unit; lognormal variance with pedigree 0.0426, pedigree (2,4,5,1,1)
  (same comment as for used silencer steel, DN 315)
  production volume 0.404016 unit
- sealing tape, aluminium/PE, 50 mm wide: 2.50775e-6 m; lognormal variance with pedigree 0.0426, pedigree (2,4,5,1,1)
  (same comment as for blower and heat exchange unit, central, 600-1200 m3/h)
- used exhaust air roof hood steel, DN 400: -1.13208e-10 unit; lognormal variance with pedigree 0.0426, pedigree (2,4,5,1,1)
  (same comment as for used silencer steel, DN 315)
  production volume 0.033668 unit
- ventilation duct, steel, 100x50 mm: 1.63912e-6 m; lognormal variance with pedigree 0.0426, pedigree (2,4,5,1,1)
  (same comment as for air filter, in exhaust air valve)
- ventilation duct, connection piece, steel, 100x50 mm: 4.09781e-7 unit; lognormal variance with pedigree 0.0426, pedigree (2,4,5,1,1)
  (same comment as for blower and heat exchange unit, central, 600-1200 m3/h)
- ventilation duct, elbow 90°, steel, 100x50 mm: 6.22867e-7 unit; lognormal variance with pedigree 0.0426, pedigree (2,4,5,1,1)
  (same comment as for blower and heat exchange unit, central, 600-1200 m3/h)
- ventilation control and wiring, decentralized unit: 4.37348e-8 unit; lognormal variance with pedigree 0.044, pedigree (3,4,5,1,1)
  (same comment as for blower and heat exchange unit, central, 600-1200 m3/h)
- air filter, decentralized unit, 180-250 m3/h: 6.37289e-7 unit; lognormal variance with pedigree 0.044, pedigree (3,4,5,1,1)
  (same comment as for blower and heat exchange unit, central, 600-1200 m3/h)
- ventilation system, decentralized, 6 x 120 m3/h, polyethylene ducts, with earth tube heat exchanger: 4.78261e-11 unit; lognormal variance with pedigree 0.044, pedigree (3,4,5,1,1)
  (same comment as for used silencer steel, DN 315)
- used ventilation control and wiring decentralized unit: -7.94801e-9 unit; lognormal variance with pedigree 0.044, pedigree (3,4,5,1,1)
  (same comment as for used silencer steel, DN 315)
  production volume 0.000308 unit
- used air filter decentralized unit, 180-250 m3/h: -1.23683e-7 unit; lognormal variance with pedigree 0.044, pedigree (3,4,5,1,1)
  (same comment as for used air filter in exhaust air valve)
  production volume 0.0151 unit
- blower and heat exchange unit, decentralized, 180-250 m3/h: 4.37348e-8 unit; lognormal variance with pedigree 0.044, pedigree (3,4,5,1,1)
  (same comment as for air filter, in exhaust air valve)
- used blower and heat exchange unit decentralized, 180-250 m3/h: -7.94801e-9 unit; lognormal variance with pedigree 0.044, pedigree (3,4,5,1,1)
  (same comment as for used silencer steel, DN 315)
  production volume 0.000308 unit
- ventilation system, decentralized, 6 x 120 m3/h, polyethylene ducts: 4.78261e-11 unit; lognormal variance with pedigree 0.044, pedigree (3,4,5,1,1)
  (same comment as for used silencer steel, DN 315)
- ventilation system, decentralized, 6 x 120 m3/h, steel ducts, with earth tube heat exchanger: 4.74292e-11 unit; lognormal variance with pedigree 0.04, pedigree (1,1,5,1,1)
  3,4,1,1,1,nA; Questionnaire, Data related to building considered
  EcoSpold01Location=CH
- ventilation system, decentralized, 6 x 120 m3/h, steel ducts: 4.74292e-11 unit; lognormal variance with pedigree 0.044, pedigree (3,4,5,1,1)
  (same comment as for used air filter in exhaust air valve)
- exhaust air outlet, steel/aluminium, 85x365 mm: 5.29557e-8 unit; lognormal variance with pedigree 0.0426, pedigree (2,4,5,1,1)
  (same comment as for used silencer steel, DN 315)
- scrap copper: -4.27508e-6 kg; lognormal variance with pedigree 0.008, pedigree (1,1,4,1,1)
  Estimated value. It can be assumed that 100% of the copper enter a recycling process.
  Uncertainty: Calculated variable. Uncertainty will be determined from propagation of uncertainty factors of underlying variables. Uncertainty of actual relation between variables not accounted at this time, although this could be included in a future update.
  production volume 58493.4 kg
- waste polyethylene/polypropylene product: -1.59396e-6 kg; lognormal variance with pedigree 0.008, pedigree (1,1,4,1,1)
  Calculated value. Proxy for the treatment of the epoxy resin (polyepoxide, formed from reaction of an epoxide resin with polyamine hardener). When using PrePreg in the manufacturing process, up to 10% of the PrePreg turns into waste due to cutoffs directly. The remaining amount will turn into waste/by-product after 20 years.
  Uncertainty: Calculated variable. Uncertainty will be determined from propagation of uncertainty factors of underlying variables. Uncertainty of actual relation between variables not accounted at this time, although this could be included in a future update.
  production volume 70196 kg
- waste reinforced concrete: -3.68716e-5 kg; lognormal variance with pedigree 0.008, pedigree (1,1,4,1,1)
  Calculated value. A density of 2400kg/m3 is assumed for the reinforced concrete.
  Uncertainty: Calculated variable. Uncertainty will be determined from propagation of uncertainty factors of underlying variables. Uncertainty of actual relation between variables not accounted at this time, although this could be included in a future update.
  production volume 8.9765e6 kg
- scrap steel: -4.1014e-5 kg; lognormal variance with pedigree 0.008, pedigree (1,1,4,1,1)
  Calculated value. The zinc coating of the steel tower is included in the scrap steel, which is a simplification. It can be assumed that 100% of the steel enter a recycling process.
  Uncertainty: Calculated variable. Uncertainty will be determined from propagation of uncertainty factors of underlying variables. Uncertainty of actual relation between variables not accounted at this time, although this could be included in a future update.
  production volume 301056 kg
- waste glass: -2.6532e-7 kg; lognormal variance with pedigree 0.008, pedigree (1,1,4,1,1)
  Estimated value based on 2MW GLO dataset.
  The glass fibre reinforced plastic of the rotor is disposed of as 50% glass and 50% plastic. When using PrePreg in the manufacturing process, up to 10% of the PrePreg turns into waste due to cutoffs directly. The remaining amount will turn into waste/by-product after 20 years.
  Today, it is not possible to recycle the turbine blades. When the turbine’s lifetime expires, the blades will
  be dismantled into smaller pieces, which are deposited at controlled waste deposits.[Elsam. 2004b. Life Cycle Assessment of turbines PSO 1999. Elsam Engineering A/S, Fredericia, Denmark]
  Uncertainty: Calculated variable. Uncertainty will be determined from propagation of uncertainty factors of underlying variables. Uncertainty of actual relation between variables not accounted at this time, although this could be included in a future update.
  production volume 39127.8 kg
- waste polyethylene: -7.23677e-7 kg; lognormal variance with pedigree 0.008, pedigree (1,1,4,1,1)
  Calculated value
  Uncertainty: Calculated variable. Uncertainty will be determined from propagation of uncertainty factors of underlying variables. Uncertainty of actual relation between variables not accounted at this time, although this could be included in a future update.
  production volume 17024.3 kg
- aluminium scrap, post-consumer: -2.85621e-7 kg; lognormal variance with pedigree 0.008, pedigree (1,1,4,1,1)
  Calculated value. It can be assumed that 100% of the aluminium enter a recycling process.
  Uncertainty: Calculated variable. Uncertainty will be determined from propagation of uncertainty factors of underlying variables. Uncertainty of actual relation between variables not accounted at this time, although this could be included in a future update.
  production volume 7161.44 kg
- road: 2.17753e-6 m*year; source Vestas 2011, p. p.81; lognormal variance with pedigree 0.0577, pedigree (2,5,5,3,3)
  Estimated value. Value taken from the 2MW wind turbine construction
  Literature value/estimation. Generally a combination of tarred roads and dirt roads need to be built to provide access to the power plant turbines, which are often located in remote locations. It has been estimated that 10 km of tarred road is needed for a power plant with 25 wind turbines.
  No maintenance is assumed.
  Uncertainty: estimated variance
- sheet rolling, aluminium: 2.58594e-6 kg; lognormal variance with pedigree 0.008, pedigree (1,1,4,1,1)
  Proxy for wire drawing of aluminium.
  Uncertainty: Calculated variable. Uncertainty will be determined from propagation of uncertainty factors of underlying variables. Uncertainty of actual relation between variables not accounted at this time, although this could be included in a future update.
- electricity, medium voltage: 4.41598e-6, 2.29772e-7, 2.91054e-6 kWh (3 suppliers, which the file names only by identifier); sum of these 7.5563e-6 kWh; source Burger, B. 2007; lognormal variance with pedigree 0.008, pedigree (1,1,4,1,1)
  Extrapolated value from 2MW GLO dataset
  Literature value / calculation: Additional to energy requirements for material processing, a factor of 0.5 kWh/kg material (except of concrete for the foundation) after is included.Total wind turbine weight is about 2243554 kg (see Technology comment for details). This should also cover the energy required for mounting and removal of the turbine.
  Uncertainty: Calculated variable. Uncertainty will be determined from propagation of uncertainty factors of underlying variables. Uncertainty of actual relation between variables not accounted at this time, although this could be included in a future update.
- wire drawing, copper: 5.17631e-6 kg; lognormal variance with pedigree 0.008, pedigree (1,1,4,1,1)
  Estimated value. Value taken from the 2MW wind turbine construction
  Uncertainty: Calculated variable. Uncertainty will be determined from propagation of uncertainty factors of underlying variables. Uncertainty of actual relation between variables not accounted at this time, although this could be included in a future update.
- epoxy resin, liquid: 3.75326e-7 kg; source ENERCON GmbH 2010; lognormal variance with pedigree 0.0147, pedigree (2,1,4,3,1)
  Literature value. Used for the rotor blades. The main materials used in the rotor blades are glass fibres and epoxy resin.
  Split between materials is based on prepeg used in the 2MW dataset.
  Prepreg is used as material for the blades in this dataset. It was not possible to get information on the exact composition of Prepreg. From the supplier’s PrePreg safety data sheets it is assumed that Prepreg consists of approx 40% epoxy and 60% glass fibre. Total Prepreg mass is 21507 kg. When using PrePreg in the manufacturing process, up to 10% of the PrePreg turns into waste due to cutoffs.
  Uncertainty: estimated variance
- steel, chromium steel 18/8: 2.60915e-5 kg; source ENERCON GmbH 2010, p. p. 25, Tab. 5.3; lognormal variance with pedigree 0.0097, pedigree (2,1,4,3,1)
  Literature/assumed value. Steel used in rotor blades
  Uncertainty: estimated variance. higher uncertainty because of the fact discussed in the comment.
- excavation, hydraulic digger: 2.86705e-7 m3; lognormal variance with pedigree 0.008, pedigree (1,1,4,1,1)
  Estimated value. Same amount than the concrete in foundation
  Uncertainty: Calculated variable. Uncertainty will be determined from propagation of uncertainty factors of underlying variables. Uncertainty of actual relation between variables not accounted at this time, although this could be included in a future update.
- glass fibre reinforced plastic, polyamide, injection moulded: 3.54193e-6 kg; source ENERCON GmbH 2010, p. p. 25, Tab. 5.3; lognormal variance with pedigree 0.0147, pedigree (2,1,4,3,1)
  (same comment as for epoxy resin, liquid)
- concrete, normal: 1.31785e-8, 1.37795e-9, 1.4358e-10, 1.16238e-9, 6.5384e-10, 9.33909e-11, 5.3815e-8 m3 (7 suppliers, which the file names only by identifier); sum of these 7.04247e-8 m3; source ENERCON GmbH 2010, p. p. 13, 21+25, Tab. 5.3; lognormal variance with pedigree 0.008, pedigree (1,1,4,1,1)
  Calculated value. Concrete used for foundation and in tower structure.
  Estimated values based on % of total weight per component and material of the turbine published by the Princeton Energy Resources International, LLC
  Uncertainty: Calculated variable. Uncertainty will be determined from propagation of uncertainty factors of underlying variables. Uncertainty of actual relation between variables not accounted at this time, although this could be included in a future update.
- sheet rolling, chromium steel: 1.76133e-5 kg; lognormal variance with pedigree 0.008, pedigree (1,1,4,1,1)
  (same comment as for waste polyethylene)
- steel, low-alloyed: 2.13078e-5 kg; source ENERCON GmbH 2010, p. p. 25, Tab. 5.3; lognormal variance with pedigree 0.0097, pedigree (2,1,4,3,1)
  Literature/assumed value. Steel used in nacelle
  Uncertainty: estimated variance
- sheet rolling, steel: 3.96627e-5 kg
  Calculated value. The steel is delivered to in steel plates, which have already been pre-cut. In addition, there is no waste of steel. The plates for the tower sections are rolled. Every section is welded lengthwise, then the individual sections are welded together.
- concrete, normal: 3.12358e-9 m3; source Elsam Engineering A/S,Fredericia,Denmark 2004, p. p. 13, 21+25, Tab. 5.3; lognormal variance with pedigree 0.044225, pedigree (2,4,5,2,2)
  Literature value. Used for foundation.
  The traditional bottom plates are approx 15 × 15m wide and 2m deep. In total, approx 400m3 of reinforced concrete.
  Uncertainty: estimated variance
- zinc: 3.26666e-7 kg; source Elsam Engineering A/S,Fredericia,Denmark 2004, p. p. 25, Tab. 5.3; lognormal variance with pedigree 0.044225, pedigree (2,4,5,2,2)
  Literature value
  Uncertainty: estimated variance
- zinc coat, pieces: 2.03766e-7 m2
  Calculated value. The surface for zinc coating is estimated with a diameter and a height of the tower of 4 m and 78 m, respectively.
- electricity, medium voltage: 8.20721e-7 kWh; source Burger, B. 2007; lognormal variance with pedigree 0.1006, pedigree (5,4,5,4,3)
  Literatur value / calculation: Additional to energy requirements for material processing, a factor of 0.5 kWh/kg material (except of concrete for the foundation) after is included.Total wind turbine weight is about 286000 kg (see Technology comment for details). This should also cover the energy required for mounting and removal of the turbine.
  Uncertainty: rough estimation
- welding, arc, steel: 4.42128e-8 m; source Burger, B. 2007; lognormal variance with pedigree 0.211, pedigree (5,5,5,5,5)
  Literature/empiric value: The number for welding is an empiric factor. The steel is delivered to in steel plates, which have already been pre-cut. In addition, there is no waste of steel. The plates for the tower sections are rolled. Every section is welded lengthwise, then the individual sections are welded together.
  Uncertainty: empiric factor, high uncertainty
- waste reinforced concrete: -0.000107748, -1.14167e-6 kg (2 suppliers, which the file names only by identifier); sum of these -0.000108889 kg
  Calculated value. A density of 2400kg/m3 is assumed for the reinforced concrete.
  production volume 8.11948e9 kg
- scrap copper: -2.72751e-6, -4.25656e-6 kg (2 suppliers, which the file names only by identifier); sum of these -6.98407e-6 kg
  Calculated value. It can be assumed that 100% of the copper enter a recycling process.
  production volume 2.63719e7 kg
- waste polyethylene: -1.32218e-8, -5.46107e-9, -5.1858e-9, -1.97883e-7, -2.20621e-9, -9.99942e-10 kg (6 suppliers, which the file names only by identifier); sum of these -2.24958e-7 kg
  Calculated value
  production volume 2.89192e7 kg
- waste glass: -2.42903e-8, -2.26625e-9, -1.01406e-8, -2.63544e-7, -3.44143e-9, -5.51065e-10 kg (6 suppliers, which the file names only by identifier); sum of these -3.04234e-7 kg
  Estimation. The glass fibre reinforced plastic of the rotor is disposed of as 50% glass and 50% plastic. When using PrePreg in the manufacturing process, up to 10% of the PrePreg turns into waste due to cutoffs directly. The remaining amount will turn into waste/by-product after 20 years.
  Today, it is not possible to recycle the turbine blades. When the turbine’s lifetime expires, the blades will
  be dismantled into smaller pieces, which are deposited at controlled waste deposits.[Elsam. 2004b. Life Cycle Assessment of turbines PSO 1999. Elsam Engineering A/S, Fredericia, Denmark]
  production volume 6.64665e7 kg
- waste polyethylene/polypropylene product: -1.62505e-6 kg
  Calculated value. Proxy for the treatment of the epoxy resin (polyepoxide, formed from reaction of an epoxide resin with polyamine hardener). When using PrePreg in the manufacturing process, up to 10% of the PrePreg turns into waste due to cutoffs directly. The remaining amount will turn into waste/by-product after 20 years.
  production volume 8.8622e7 kg
- epoxy resin, liquid: 6.76709e-6 kg
  Literature value. Used for the rotor blades. Steel and aluminium blades are used for small wind turbines. For large ones, they have problems of weight or metal fatigue. Most modern rotor blades on large wind turbines are made of glass fiber reinforced polyester or epoxy. Carbon fiber or Kevlar seems to be too expensive for large turbines. [Chataignere A. and Le Boulch D. (2003) Wind Turbine Systems. Final report ECLIPSE. EDF R&D, Clamart Cedex, France.]
  Prepreg is used as material for the blades in this dataset. It was not possible to get information on the exact composition of Prepreg. From the supplier’s PrePreg safety data sheets it is assumed that Prepreg consists of approx 40% epoxy and 60% glass fibre. Total Prepreg mass is 21507 kg. When using PrePreg in the manufacturing process, up to 10% of the PrePreg turns into waste due to cutoffs.
- waste paint on wall: -1.18836e-9 kg
  Estimation. Alkyd paint at the concrete tower.
  production volume 1.52834e6 kg
- polyvinylchloride, emulsion polymerised: 3.0999e-8 kg; source Chataignere A. 2003, p. 46f; lognormal variance with pedigree 0.0641, pedigree (4,4,5,3,3)
  Literature value/calculated value. Used for the three blades. The shares of "polyvinylchloride, emulsion polymersied" and "polyvinylchloride, suspension polymerised" in the cancelled ecoinvent v2 "aluminium production mix" dataset amounted to 12.8% (emulsion) and 87.2% (suspension) respectively. These shares have been overtaken to distribute the original amount of 4569 kg polyvinylchloride.These shares correspond to the European distribution of the different PVC types.
  Sum of PVC-foam (3*279 kg) and PVC (3*131 kg) extrapolated with a weight factor from a 1.5MW wind turbine.
  Uncertainty: estimated variance. higher basic uncertainty because of the extrapolation and the age of the data. slightly higher technological score because of the split of the pvc use in the two pvc types.
- waste rubber, unspecified: -4.73929e-10 kg
  Calculated value
  production volume 388537 kg
- waste polyvinylchloride: -1.44769e-9, -5.97947e-10, -5.67806e-10, -2.16667e-8, -2.41564e-10, -1.09486e-10, -1.51679e-7 kg (7 suppliers, which the file names only by identifier); sum of these -1.7631e-7 kg
  Calculated value.
  production volume 2.89636e6 kg
- alkyd paint, white, without water, in 60% solution state: 6.5007e-10, 3.08596e-9 kg (2 suppliers, which the file names only by identifier); sum of these 3.73603e-9 kg; source Chataignere A. 2003, p. 46f; lognormal variance with pedigree 0.0567, pedigree (4,4,5,3,2)
  Literature value/calculated value. Used for the tower, the nacelle and the three blades.
  Sum of paint used for the tower (2411kg, directly final value) as well as for the nacelle (654 kg) and in the three blades (3*184 kg) extrapolated with accordant weight factors from a 1.5MW wind turbine.
  Uncertainty: estimated variance. higher basic uncertainty because of the extrapolation and the age of the data.
- waste paint on metal: -2.14435e-11, -2.52623e-9 kg (2 suppliers, which the file names only by identifier); sum of these -2.54767e-9 kg
  Calculated value/estimation. Paint on the nacelle and the blades.
  production volume 3.27653e6 kg
- wire drawing, steel: 2.8823e-7 kg
  Estimation.
- waste concrete, not reinforced: -1.13477e-6, -1.20238e-8, -2.68412e-6 kg (3 suppliers, which the file names only by identifier); sum of these -3.83092e-6 kg
  Calculated value. A density of 2400kg/m3 is assumed for the concrete.
  production volume 2.28205e7 kg
- lubricating oil: 1.73805e-5, 1.40864e-7 kg (2 suppliers, which the file names only by identifier); sum of these 1.75213e-5 kg; source Chataignere A. 2003, p. 46f; lognormal variance with pedigree 0.0641, pedigree (4,4,5,3,3)
  Literature value. Lubricating oil use of 940 kg is extrapolated with a capacity factor 4.5MW/1.5MW from a 1.5MW wind turbine network connection.
  Uncertainty: estimated variance. higher basic uncertainty because of the extrapolation and the age of the data.
- waste mineral oil: -1.69984e-5, -3.96664e-7, -1.26259e-7 kg (3 suppliers, which the file names only by identifier); sum of these -1.75213e-5 kg
  Estimation
  production volume 1.78761e6 kg
- cable, three-conductor cable: 1.49533e-5 m; source Ruegg Cheminèe company 2011; lognormal variance with pedigree 0.0258, pedigree (2,1,4,1,1)
  EcoSpold01Location=GLO
  estimation
- ceramic tile: 9.07585e-7 kg; source G&M E-Filter GMBH company 2011; lognormal variance with pedigree 0.0358, pedigree (2,5,4,5,1)
  estimation - comparison between two producer companies G&M E-Filter (CH) and Coral Engineering (IT)
- glass wool mat: 1.1885e-6 kg; source G&M E-Filter GMBH company 2011; lognormal variance with pedigree 0.0332, pedigree (4,1,4,1,1)
  estimation - comparison between two producer companies G&M E-Filter (CH) and Coral Engineering (IT)
  EcoSpold01Location=CH
- inert waste, for final disposal: -1.01612e-6 kg; lognormal variance with pedigree 0.0087, pedigree (1,2,4,1,1)
  EcoSpold01Location=CH
  ceramic
  production volume 2100 kg
- waste polyethylene: -8.83338e-8 kg; lognormal variance with pedigree 0.0087, pedigree (1,2,4,1,1)
  plastics
  EcoSpold01Location=CH
  production volume 1550 kg
- waste mineral wool, for final disposal: -3.30548e-7 kg; lognormal variance with pedigree 0.0087, pedigree (1,2,4,1,1)
  EcoSpold01Location=CH
  insulation and filters
  production volume 2750 kg
- scrap aluminium: -3.37492e-8 kg; lognormal variance with pedigree 0.0087, pedigree (1,2,4,1,1)
  EcoSpold01Location=CH
  various elements
  production volume 600 kg
- drawing of pipe, steel: 1.98665e-7, 1.59944e-6 kg (2 suppliers, which the file names only by identifier); sum of these 1.7981e-6 kg; source G&M E-Filter GMBH company 2011; lognormal variance with pedigree 0.0358, pedigree (2,5,4,5,1)
  estimation - comparison between two producer companies G&M E-Filter (CH) and Coral Engineering (IT)
  EcoSpold01Location=RER
- polystyrene foam slab: 1.33149e-6 kg; source ETA Heiztechnik GmbH 2011; lognormal variance with pedigree 0.0265, pedigree (2,3,4,3,1)
  EcoSpold01Location=RER
  calculated value - insulation of the accumulator hot water tanks
- concrete, normal: 1.50447e-8 m3; source ETA Heiztechnik GmbH 2011; lognormal variance with pedigree 0.0265, pedigree (2,3,4,3,1)
  EcoSpold01Location=CH
  calculated value - basing on the space required for the furnace basement (about 4m2) the amount of concrete was calculated
- waste polystyrene isolation, flame-retardant: -6.38306e-8 kg; lognormal variance with pedigree 0.0167, pedigree (1,5,4,3,1)
  disposal of insulation of the water storage
  production volume 14250 kg
- waste concrete: -2.14137e-5 kg; lognormal variance with pedigree 0.0167, pedigree (1,5,4,3,1)
  EcoSpold01Location=CH
  disposal of the concrete for the furnace basement - around 0,2 m3 of concrete * 2350 kg/m3 (concrete density) = around 460 kg
  production volume 342750 kg
- stone wool: 4.8937e-7 kg; source ETA Heiztechnik GmbH 2011; lognormal variance with pedigree 0.0265, pedigree (2,3,4,3,1)
  EcoSpold01Location=CH
  calculated value
- refractory, fireclay, packed: 1.09908e-5 kg; source ETA Heiztechnik GmbH 2011; lognormal variance with pedigree 0.0093, pedigree (1,3,4,3,1)
  EcoSpold01Location=DE
  measured value - refractory bricks in fireclay are used in the combustion chamber inside the furnace (value measured with a technician during wood boilers exposition in the modeled furnace)
- iron-nickel-chromium alloy: 5.27489e-8 kg; source Uniconfort srl 2011; lognormal variance with pedigree 0.0279, pedigree (3,3,4,3,1)
  estimation - components for the conveyor grate in the combustion chamber
  EcoSpold01Location=RER
- metal working, average for metal product manufacturing: 1.20082e-7, 9.97719e-8 kg (2 suppliers, which the file names only by identifier); sum of these 2.19854e-7 kg; source AEK Pellets AG 2011; lognormal variance with pedigree 0.0052, pedigree (1,3,3,5,1)
  calculated value
- tower silo, plastic: 2.50498e-7 m3; source AEK Pellets AG 2011; lognormal variance with pedigree 0.0106, pedigree (1,3,3,5,1)
  estimation - value given from pellets company in the filled questionnaire (dimensions of the pellet silos in their factory). This dataset include its own disposal in the end of its lifetime.
- waste mineral wool: -1.9255e-7 kg; lognormal variance with pedigree 0.0052, pedigree (1,3,3,5,1)
  calculated value
  production volume 371250 kg
    Calculated from production volume of reference product using the relative outputs.
- scrap aluminium: -9.35907e-8 kg; lognormal variance with pedigree 0.0052, pedigree (1,3,3,5,1)
  calculated value
  production volume 422820 kg
    Calculated from production volume of reference product using the relative outputs.
- heat, district or industrial, other than natural gas: 6.45432e-5 MJ; source Frischknecht R. 1996; lognormal variance with pedigree 0.0513, pedigree (2,3,5,3,1)
  Calculated: energy consumption for the construction of the technical material (melting furnace, forming machines, cooling furnace) calcualted based on literature source. 45% of energy is from oil.
  Uncertainty: c
- heat, district or industrial, natural gas: 6.11462e-5 MJ; source Frischknecht R. 1996; lognormal variance with pedigree 0.0513, pedigree (2,3,5,3,1)
  Calculated: energy consumption for the construction of the technical material (melting furnace, forming machines, cooling furnace) calcualted based on literature source. 45% of energy is from natural gas.
  Uncertainty: c
- electricity, medium voltage: 0.000142813 kWh; source Frischknecht R. 1996; lognormal variance with pedigree 0.0513, pedigree (2,3,5,3,1)
  Calculated: energy consumption for the construction of the technical material (melting furnace, forming machines, cooling furnace) calculated based on literature source. 10% of energy is from electricity.
  Uncertainty: c
- waste concrete: -8.78822e-6 kg; lognormal variance with pedigree 0.1561, pedigree (4,5,5,3,4)
  Calculated, based on input
  Uncertainty: C
  production volume 2.54e6 kg
- injection moulding: 3.33534e-7 kg; lognormal variance with pedigree 0.08, pedigree (4,4,5,5,3)
  EcoSpold01Location=RER
  Based on material input
  Uncertainty: based on material input
- ammonia, liquid: 4.33421e-7 kg; lognormal variance with pedigree 0.08, pedigree (4,4,5,5,3)
  Estimation based on few references
  EcoSpold01Location=CH
  Uncertainty: estimation based on few references
- heat carrier liquid, 40% C3H8O2: -2.03358e-9 m3; lognormal variance with pedigree 0.08, pedigree (4,4,5,5,3)
  EcoSpold01Location=CH
  Disposal of insulation material
  Uncertainty: disposal of insulation material
  production volume 0.05625 m3
- transport, passenger car: 1.65757e-5 km; lognormal variance with pedigree 0.2, pedigree (4,4,5,5,3)
  Estimation
  EcoSpold01Location=CH
  Uncertainty: estimation
- wastewater, from residence: -4.1167e-8 m3; lognormal variance with pedigree 0.142, pedigree (4,4,5,5,4)
  Approximation for waste water treatment
  EcoSpold01Location=CH
  Uncertainty: approximation for waste water treatment
  production volume 0.897 m3
- zinc coat, coils: 7.98534e-7 m2; lognormal variance with pedigree 0.08, pedigree (4,4,5,5,3)
  Based on material input
  EcoSpold01Location=RER
  Uncertainty: based on material input
- electricity, medium voltage: 3.3219e-7, 6.04446e-8, 8.54999e-7, 6.82721e-7, 1.02505e-6, 1.48621e-5, 2.12705e-6, 3.70041e-6 kWh (8 suppliers, which the file names only by identifier); sum of these 2.3645e-5 kWh; lognormal variance with pedigree 0.1246, pedigree (2,4,5,5,4)
  Approximation with company data of similar branch
  EcoSpold01Location=UCTE
  Uncertainty: approximation with company data of similar branch
- water, completely softened: 1.52388e-6, 2.03577e-6 kg (2 suppliers, which the file names only by identifier); sum of these 3.55966e-6 kg; lognormal variance with pedigree 0.08, pedigree (4,4,5,5,3)
  EcoSpold01Location=RER
  Estimation based on few references
  Uncertainty: estimation based on few references
- waste mineral wool: -4.44776e-7 kg; lognormal variance with pedigree 0.08, pedigree (4,4,5,5,3)
  Disposal of heat insulation material
  EcoSpold01Location=CH
  Uncertainty: disposal of heat insulation material
  production volume 10.5 kg
- electricity, low voltage: 2.73791e-6, 4.80195e-7, 1.07735e-5, 4.08256e-5, 7.89632e-6, 0.000119415, 1.96835e-5, 5.54636e-5 kWh (8 suppliers, which the file names only by identifier); sum of these 0.000257276 kWh; lognormal variance with pedigree 0.064, pedigree (3,4,5,5,3)
  EcoSpold01Location=CH
  Estimation based on specific energy demand of engineering hours
  Uncertainty: estimation based on specific energy demand of engineering hours
- heat, district or industrial, natural gas: 1.20376e-6, 8.72347e-6, 6.80547e-5 MJ (3 suppliers, which the file names only by identifier); sum of these 7.7982e-5 MJ; lognormal variance with pedigree 0.1246, pedigree (2,4,5,5,4)
  Approximation with company data of similar branch
  EcoSpold01Location=RER
  Uncertainty: approximation with company data of similar branch
- heat, central or small-scale, other than natural gas: 9.8202e-7, 6.87011e-5 MJ (2 suppliers, which the file names only by identifier); sum of these 6.96832e-5 MJ; lognormal variance with pedigree 0.064, pedigree (3,4,5,5,3)
  Estimation based on specific energy demand of engineering hours
  EcoSpold01Location=CH
  Uncertainty: estimation based on specific energy demand of engineering hours
- metal working, average for aluminium product manufacturing: 1.5648e-8 kg; lognormal variance with pedigree 0.2, pedigree (5,5,5,5,4)
  Assumed type of processing
  EcoSpold01Location=RER
  Uncertainty: assumed type of processing
- metal working, average for steel product manufacturing: 1.53296e-6 kg; lognormal variance with pedigree 0.2, pedigree (5,5,5,5,4)
  Assumed type of processing
  EcoSpold01Location=RER
  Uncertainty: assumed type of processing
- polyurethane, flexible foam: 5.98116e-10 kg; lognormal variance with pedigree 0.13, pedigree (1,5,5,5,4)
  EcoSpold01Location=RER
  Average of 4 machines
  Uncertainty: average of 4 machines
- flat glass, uncoated: 1.78851e-9 kg; lognormal variance with pedigree 0.13, pedigree (1,5,5,5,4)
  EcoSpold01Location=RER
  Average of 4 machines
  Uncertainty: average of 4 machines
- waste plastic, industrial electronics: -2.66572e-8 kg; lognormal variance with pedigree 0.2, pedigree (5,5,5,5,4)
  Assumed route of disposal
  EcoSpold01Location=CH
  Uncertainty: assumed route of disposal
  production volume 0.02862 kg
- sheet rolling, copper: 3.29474e-9 kg; lognormal variance with pedigree 0.2, pedigree (5,5,5,5,4)
  EcoSpold01Location=RER
  Assumed type of processing
  Uncertainty: assumed type of processing
- metal working, average for chromium steel product manufacturing: 1.3086e-6 kg; lognormal variance with pedigree 0.2, pedigree (5,5,5,5,4)
  Assumed type of processing
  EcoSpold01Location=RER
  Uncertainty: assumed type of processing
- alkyd paint, white, without solvent, in 60% solution state: 3.82086e-9 kg; lognormal variance with pedigree 0.13, pedigree (1,5,5,5,4)
  Average of 4 machines
  EcoSpold01Location=RER
  Uncertainty: average of 4 machines
- waste polyurethane: -3.63671e-11, -2.42991e-12, -1.8377e-13, -1.00364e-12, -4.05459e-13, -9.5305e-13, -2.5459e-10 kg (7 suppliers, which the file names only by identifier); sum of these -2.95933e-10 kg; lognormal variance with pedigree 0.2, pedigree (5,5,5,5,4)
  EcoSpold01Location=CH
  Assumed route of disposal
  Uncertainty: assumed route of disposal
  production volume 0.02541 kg
- waste bulk iron, excluding reinforcement: -0.000184091, -1.98345e-6 kg (2 suppliers, which the file names only by identifier); sum of these -0.000186075 kg; lognormal variance with pedigree 0.074, pedigree (3,4,5,5,3)
  (same comment as for waste bulk iron, excluding reinforcement)
- used air filter in exhaust air valve: -1.59548e-6 unit; lognormal variance with pedigree 0.046, pedigree (3,4,5,5,1)
  (same comment as for used silencer steel, DN 315)
- ventilation system, central, 1 x 720 m3/h, polyethylene ducts, with earth tube heat exchanger: 4.70553e-10 unit; lognormal variance with pedigree 0.046, pedigree (3,4,5,5,1)
  (same comment as for used silencer steel, DN 315)
- used ventilation control and wiring central unit: -2.2046e-9 unit; lognormal variance with pedigree 0.046, pedigree (3,4,5,5,1)
  (same comment as for used silencer steel, DN 315)
- used blower and heat exchange unit central, 600-1200 m3/h: -2.2046e-9 unit; lognormal variance with pedigree 0.046, pedigree (3,4,5,5,1)
  (same comment as for used silencer steel, DN 315)
- used silencer steel, DN 125: -1.6952e-7 unit; lognormal variance with pedigree 0.046, pedigree (3,4,5,5,1)
  (same comment as for used air filter in exhaust air valve)
- used silencer steel, DN 315: -4.42372e-9 unit; lognormal variance with pedigree 0.046, pedigree (3,4,5,5,1)
  (same comment as for used silencer steel, DN 315)
- used flexible duct aluminium/PET, DN of 125: -1.2016e-7 m; lognormal variance with pedigree 0.046, pedigree (3,4,5,5,1)
  (same comment as for used air filter in exhaust air valve)
- used air filter central unit, 600 m3/h: -9.18044e-8 unit; lognormal variance with pedigree 0.046, pedigree (3,4,5,5,1)
  (same comment as for used air filter in exhaust air valve)
- ventilation system, central, 1 x 720 m3/h, steel ducts, with earth tube heat exchanger: 4.58797e-10 unit; lognormal variance with pedigree 0.046, pedigree (3,4,5,5,1)
  (same comment as for used silencer steel, DN 315)
- used exhaust air valve in-wall housing, plastic/steel: -8.53221e-8 unit; lognormal variance with pedigree 0.0446, pedigree (2,4,5,5,1)
  (same comment as for used air filter in exhaust air valve)
  production volume 71.394 unit
- used outside air intake stainless steel, DN 370: -1.18287e-9 unit; lognormal variance with pedigree 0.0446, pedigree (2,4,5,5,1)
  (same comment as for used air filter in exhaust air valve)
  production volume 3.96633 unit
- used exhaust air roof hood steel, DN 400: -1.18287e-9 unit; lognormal variance with pedigree 0.0446, pedigree (2,4,5,5,1)
  (same comment as for used silencer steel, DN 315)
  production volume 3.96633 unit
- used room-connecting overflow element steel, approx. 40 m3/h: -8.53221e-8 unit; lognormal variance with pedigree 0.0446, pedigree (2,4,5,5,1)
  (same comment as for used air filter in exhaust air valve)
  production volume 71.394 unit
- used air distribution terminal panel steel, 120 m3/h: -5.68814e-8 unit; lognormal variance with pedigree 0.0446, pedigree (2,4,5,5,1)
  (same comment as for used air filter in exhaust air valve)
  production volume 47.596 unit
- used sealing tape aluminium/PE, 50 mm wide: -2.0149e-6 m; lognormal variance with pedigree 0.0446, pedigree (2,4,5,5,1)
  (same comment as for used air filter in exhaust air valve)
  production volume 793.266 m
- used insulation spiral-seam duct rockwool, DN 400: -4.04695e-8 m; lognormal variance with pedigree 0.0446, pedigree (2,4,5,5,1)
  (same comment as for used air filter in exhaust air valve)
  production volume 79.3266 m
- used air filter decentralized unit, 180-250 m3/h: -5.13605e-7 unit; lognormal variance with pedigree 0.046, pedigree (3,4,5,5,1)
  (same comment as for used air filter in exhaust air valve)
- used blower and heat exchange unit decentralized, 180-250 m3/h: -3.57868e-8 unit; lognormal variance with pedigree 0.046, pedigree (3,4,5,5,1)
  (same comment as for used air filter in exhaust air valve)
- used ventilation control and wiring decentralized unit: -3.57868e-8 unit; lognormal variance with pedigree 0.046, pedigree (3,4,5,5,1)
  (same comment as for used air filter in exhaust air valve)
- ventilation system, decentralized, 6 x 120 m3/h, polyethylene ducts, with earth tube heat exchanger: 1.95619e-10 unit; lognormal variance with pedigree 0.046, pedigree (3,4,5,5,1)
  (same comment as for used silencer steel, DN 315)
- ventilation system, decentralized, 6 x 120 m3/h, polyethylene ducts: 1.95619e-10 unit; lognormal variance with pedigree 0.046, pedigree (3,4,5,5,1)
  (same comment as for used silencer steel, DN 315)
- ventilation system, decentralized, 6 x 120 m3/h, steel ducts, with earth tube heat exchanger: 1.9502e-10 unit; lognormal variance with pedigree 0.042, pedigree (1,1,5,5,1)
  3,4,1,1,1,nA; Questionnaire, Data related to building considered
  EcoSpold01Location=CH
- ventilation system, decentralized, 6 x 120 m3/h, steel ducts: 1.9502e-10 unit; lognormal variance with pedigree 0.046, pedigree (3,4,5,5,1)
  (same comment as for used silencer steel, DN 315)
- inert waste, for final disposal: -1.87192e-6 kg; lognormal variance with pedigree 0.0186, pedigree (1,5,4,5,1)
  EcoSpold01Location=CH
  ceramic
  production volume 9.1539e6 kg
- waste mineral wool, for final disposal: -5.62803e-7, -7.4378e-7 kg (2 suppliers, which the file names only by identifier); sum of these -1.30658e-6 kg; lognormal variance with pedigree 0.0186, pedigree (1,5,4,5,1)
  EcoSpold01Location=CH
  insulation and filters
  production volume 1.19872e7 kg
- scrap aluminium: -1.75988e-7 kg; lognormal variance with pedigree 0.0186, pedigree (1,5,4,5,1)
  EcoSpold01Location=CH
  various elements
  production volume 2.6154e6 kg
- waste polyethylene: -5.8367e-8 kg; lognormal variance with pedigree 0.0186, pedigree (1,5,4,5,1)
  plastics
  EcoSpold01Location=CH
  production volume 6.75645e6 kg
- waste polystyrene isolation, flame-retardant: -2.2821e-8, -5.78544e-8 kg (2 suppliers, which the file names only by identifier); sum of these -8.06754e-8 kg; lognormal variance with pedigree 0.0186, pedigree (1,5,4,5,1)
  disposal of insulation of the water storage
  production volume 5.24875e6 kg
- waste concrete: -2.88245e-5 kg; lognormal variance with pedigree 0.0186, pedigree (1,5,4,5,1)
  (same comment as for waste concrete)
  production volume 1.26246e8 kg
- heat, district or industrial, other than natural gas: 2.23403e-8, 4.98329e-5 MJ (2 suppliers, which the file names only by identifier); sum of these 4.98552e-5 MJ; lognormal variance with pedigree 0.0532, pedigree (2,3,5,5,1)
  Calculated, based on Frischknecht 1996
  Uncertainty: c
- polyvinylchloride, bulk polymerised: 2.80623e-6 kg; lognormal variance with pedigree 0.0118, pedigree (1,4,4,4,2)
  Data are from Ashby 2009.
- nickel, 99.5%: 1.87744e-9 kg; lognormal variance with pedigree 0.0118, pedigree (1,4,4,4,2)
  Data are from Ashby 2009.
- plastic processing factory: 0 unit; pedigree (1,1,1,1,1)
  Used here in place of infrastructure based on the amount of the largest contributor to the final product mass (plastics). This is an estimated value. According to the technology comment of the dataset 'Plastic processing factory construction, GLO' [accessed 19.01.2018], the life time of the tanks is assumed to be 50 years and the annual production is 27000 t/a. Thus, the estimated lifetime output of the factory is 27000 x 50 = 1350000. As the hair dryer mass is 0.89 kg, then the number of hair dryers produced during the lifetime of the factory is 1350000 / 0.00089 = 1516853933 units. The calculation of the infrastructure is therefore 1/life time capacity = 1/1516853933 unit.
- nickel smelter slag: -1.87744e-9 kg; lognormal variance with pedigree 0.0118, pedigree (1,4,4,4,2)
  Used here to describe waste nickel. Data are from Ashby 2009. The amount is set equal to the input amount for the respective material
  production volume 1.87e6 kg
- acrylonitrile-butadiene-styrene copolymer: 1.33063e-6 kg; lognormal variance with pedigree 0.0118, pedigree (1,4,4,4,2)
  Data are from Ashby 2009.
- brass: 2.79651e-6, 2.69429e-9 kg (2 suppliers, which the file names only by identifier); sum of these 2.79921e-6 kg; lognormal variance with pedigree 0.0118, pedigree (1,4,4,4,2)
  Data are from Ashby 2009. In terms of outputs, assumed to have gone to scrap copper.
- aluminium, primary, ingot: 1.49192e-9, 2.14835e-10 kg (2 suppliers, which the file names only by identifier); sum of these 1.70676e-9 kg; lognormal variance with pedigree 0.0118, pedigree (1,4,4,4,2)
  Data are from Ashby 2009.
- waste polypropylene: -1.39258e-9, -1.0736e-10, -4.43436e-11, -4.21084e-11, -1.6068e-9, -1.79143e-11, -8.11947e-12, -1.12485e-8 kg (8 suppliers, which the file names only by identifier); sum of these -1.44677e-8 kg; lognormal variance with pedigree 0.0118, pedigree (1,4,4,4,2)
  Contains waste polypropylene and waste phenols. Data are from Ashby 2009. The amount is set equal to the input amount for the respective material
  production volume 1.428e7 kg
- phenol: 4.88928e-10, 2.32723e-9 kg (2 suppliers, which the file names only by identifier); sum of these 2.81615e-9 kg; lognormal variance with pedigree 0.0118, pedigree (1,4,4,4,2)
  Data are from Ashby 2009. Used here to describe phenolics. In terms of outputs, assumed to have gone to waste polypropylene.
- brazing solder, cadmium free: 3.42928e-6 kg; lognormal variance with pedigree 0.0506, pedigree (2,1,5,1,1)
  Questionnaire
  Questionnaire
- magnesium oxide: 2.28619e-5 kg; lognormal variance with pedigree 0.0506, pedigree (2,1,5,1,1)
  Questionnaire
  Questionnaire
- hot water tank factory: 2.28619e-11 unit; lognormal variance with pedigree 0.648, pedigree (5,5,5,1,5)
  Rough estimation
  This exchange has an activity link directly to the producing activity because the product is primarily consumed in the same geographical area where it is produced.
- glass tube, borosilicate: 1.98005e-9 kg; source Socolof M. L. 2001; lognormal variance with pedigree 0.0407, pedigree (1,3,5,3,1)
  EcoSpold01Location=DE
  Proxy with literature value, to represent glass, glass tube, borosilicate is used.
  Uncertainty: data from an US-EPA LCA study
- polyethylene terephthalate, granulate, amorphous: 1.32997e-9 kg; source Socolof M. L. 2001; lognormal variance with pedigree 0.0407, pedigree (1,3,5,3,1)
  Literature Value.
  EcoSpold01Location=RER
  Uncertainty: data from an US-EPA LCA study
- cable, ribbon cable, 20-pin, with plugs: 1.64046e-10 kg; source Socolof M. L. 2001; lognormal variance with pedigree 0.0407, pedigree (1,3,5,3,1)
  Proxy with literature value, to represent cables, cable, ribbon cable, 20-pin is used.
  EcoSpold01Location=GLO
  Uncertainty: data from an US-EPA LCA study
- lead: 8.22054e-11 kg; lognormal variance with pedigree 0.0407, pedigree (1,3,5,3,1)
  Proxy with literature value, to represent backlight lamp (CCFL), lead concentrate is used. The concentration of lead in lead concentrate is 0.55kg/kg.
  Uncertainty: data from an US-EPA LCA study
- wastewater from liquid crystal display backlight production: -4.59144e-9 m3; source Socolof M. L. 2001; lognormal variance with pedigree 0.1107, pedigree (1,3,5,3,4)
  EcoSpold01Location=CH
  Literature Value.
  Uncertainty: data from an US-EPA LCA study - approximated with existing waste process
  production volume 0.09505 m3
- printed wiring board mounting facility: 1.00476e-14 unit; lognormal variance with pedigree 0.3861, pedigree (4,5,5,3,1)
  EcoSpold01Location=GLO
  Proxy, due to a lack of specific information, the infrastructure module for the mounting of printed wiring boards is used.
  Uncertainty: Estimation, based on PWB mounting plant
- polymethyl methacrylate, sheet: 3.6205e-8 kg; source Socolof M. L. 2001; lognormal variance with pedigree 0.0407, pedigree (1,3,5,3,1)
  EcoSpold01Location=RER
  Proxy with literature value, to represent LCD light guide, polymethyl methacrylate is used.
  Uncertainty: data from an US-EPA LCA study
- krypton, gaseous: 3.01789e-12 kg; source Socolof M. L. 2001; lognormal variance with pedigree 0.0407, pedigree (1,3,5,3,1)
  Proxy with literature value, to represent neon, krypton is used.
  EcoSpold01Location=RER
  Uncertainty: data from an US-EPA LCA study
- mercury: 1.90831e-13 kg; source Socolof M. L. 2001; lognormal variance with pedigree 0.0407, pedigree (1,3,5,3,1)
  Literature Value.
  EcoSpold01Location=GLO
  Uncertainty: data from an US-EPA LCA study
- heat, district or industrial, natural gas: 1.38776e-7 MJ; source Socolof M. L. 2001; lognormal variance with pedigree 0.0407, pedigree (1,3,5,3,1)
  EcoSpold01Location=RER
  Literature Value.
  Uncertainty: data from an US-EPA LCA study
- argon, liquid: 2.93761e-13, 1.39452e-12 kg (2 suppliers, which the file names only by identifier); sum of these 1.68828e-12 kg; source Socolof M. L. 2001; lognormal variance with pedigree 0.0407, pedigree (1,3,5,3,1)
  EcoSpold01Location=RER
  Literature Value.
  Uncertainty: data from an US-EPA LCA study
- waste paperboard: -9.33362e-14, -5.8036e-15, -2.09709e-14, -3.7852e-15, -3.80054e-14, -2.04483e-15, -7.06013e-13 kg (7 suppliers, which the file names only by identifier); sum of these -8.69959e-13 kg; source Socolof M. L. 2001; lognormal variance with pedigree 0.1107, pedigree (1,3,5,3,4)
  (same comment as for wastewater from liquid crystal display backlight production)
  production volume 1.802e-5 kg
- waste paperboard: 0 kg; source Socolof M. L. 2001; pedigree (1,1,1,1,1)
  (same comment as for wastewater from liquid crystal display backlight production)
- lead in car shredder residue: 0 kg; source Socolof M. L. 2001; pedigree (1,1,1,1,1)
  Literature Value.
  EcoSpold01Location=CH
  Uncertainty: data from an US-EPA LCA study - approximated with existing waste process
  production volume 8.0891e-8 kg
- lead in car shredder residue: -3.84933e-15 kg; source Socolof M. L. 2001; lognormal variance with pedigree 0.1107, pedigree (1,3,5,3,4)
  (same comment as for lead in car shredder residue)
- diethyl ether, without water, in 99.95% solution state: 8.19306e-13, 3.61906e-12 kg (2 suppliers, which the file names only by identifier); sum of these 4.43836e-12 kg; source Socolof M. L. 2001; lognormal variance with pedigree 0.0407, pedigree (1,3,5,3,1)
  Literature Value.
  EcoSpold01Location=RER
  Uncertainty: data from an US-EPA LCA study
- ethanol, without water, in 99.7% solution state, from ethylene: 6.86283e-13, 1.52814e-12 kg (2 suppliers, which the file names only by identifier); sum of these 2.21442e-12 kg; source Socolof M. L. 2001; lognormal variance with pedigree 0.0407, pedigree (1,3,5,3,1)
  EcoSpold01Location=RER
  Literature Value.
  Uncertainty: data from an US-EPA LCA study
- printed wiring board, for through-hole mounting, Pb free surface: 2.67496e-7 m2; lognormal variance with pedigree 0.0058, pedigree (1,4,3,4,2)
  This dataset is based on direct information from the Swiss manufacturer Brusa.
- printed wiring board, for through-hole mounting, Pb containing surface: 2.67496e-7 m2; lognormal variance with pedigree 0.0058, pedigree (1,4,3,4,2)
  This dataset is based on direct information from the Swiss manufacturer Brusa.
- heat, central or small-scale, other than natural gas: 1.3241e-6 MJ; source F. Habermacher 2011; lognormal variance with pedigree 0.0058, pedigree (1,4,3,4,2)
  This dataset is based on direct information from the Swiss manufacturer Brusa.
- selective coat, aluminium sheet, nickel pigmented aluminium oxide: 4.2226e-12 m2; source F. Habermacher 2011; lognormal variance with pedigree 0.0058, pedigree (1,4,3,4,2)
  This dataset is based on direct information from the Swiss manufacturer Brusa.
- capacitor, film type, for through-hole mounting: 6.48709e-7 kg; source F. Habermacher 2011; lognormal variance with pedigree 0.0058, pedigree (1,4,3,4,2)
  This dataset is based on direct information from the Swiss manufacturer Brusa.
- polystyrene, high impact: 4.64356e-10 kg; source F. Habermacher 2011; lognormal variance with pedigree 0.0058, pedigree (1,4,3,4,2)
  This dataset is based on direct information from the Swiss manufacturer Brusa.
- electricity, low voltage: 4.90483e-10 kWh; source F. Habermacher 2011; lognormal variance with pedigree 0.0058, pedigree (1,4,3,4,2)
  This dataset is based on direct information from the Swiss manufacturer Brusa.
- ferrite: 3.35005e-9 kg; source F. Habermacher 2011; lognormal variance with pedigree 0.0058, pedigree (1,4,3,4,2)
  This dataset is based on direct information from the Swiss manufacturer Brusa.
- resistor, auxilliaries and energy use: 1.33086e-10 kg; source F. Habermacher 2011; lognormal variance with pedigree 0.0058, pedigree (1,4,3,4,2)
  This dataset is based on direct information from the Swiss manufacturer Brusa.
- aluminium scrap, new: -6.04722e-10, -4.52415e-9 kg (2 suppliers, which the file names only by identifier); sum of these -5.12888e-9 kg; source F. Habermacher 2011; lognormal variance with pedigree 0.0064, pedigree (2,4,3,4,2)
  Total alumiunium scrap from production process.
  production volume 6415.2 kg
- aluminium oxide, non-metallurgical: 1.14955e-10, 1.94618e-11 kg (2 suppliers, which the file names only by identifier); sum of these 1.34416e-10 kg; source F. Habermacher 2011; lognormal variance with pedigree 0.0058, pedigree (1,4,3,4,2)
  This dataset is based on direct information from the Swiss manufacturer Brusa.
- polyester resin, unsaturated: 1.10016e-10, 8.18496e-10 kg (2 suppliers, which the file names only by identifier); sum of these 9.28511e-10 kg; source F. Habermacher 2011; lognormal variance with pedigree 0.0058, pedigree (1,4,3,4,2)
  This dataset is based on direct information from the Swiss manufacturer Brusa.
- corrugated board box: 1.13413e-5 kg; lognormal variance with pedigree 0.1361, pedigree (5,5,5,3,3)
  Packaging
  EcoSpold01Location=RER
  Uncertainty: packaging
- tin: 5.593e-7 kg; lognormal variance with pedigree 0.1361, pedigree (5,5,5,3,3)
  Assumption according to factsheets of network devices
  EcoSpold01Location=RER
  Uncertainty: assumption according to factsheets of network devices
- flat glass, coated: 5.593e-6 kg; lognormal variance with pedigree 0.1361, pedigree (5,5,5,3,3)
  EcoSpold01Location=RER
  Assumption according to factsheets of network devices
  Uncertainty: assumption according to factsheets of network devices
- electricity, low voltage: 0.00027965 kWh; lognormal variance with pedigree 0.1361, pedigree (5,5,5,3,3)
  EcoSpold01Location=UCTE
  Assumption according to factsheets of network devices
  Uncertainty: assumption according to factsheets of network devices
- waste paperboard, unsorted: -1.13413e-5 kg; lognormal variance with pedigree 0.1361, pedigree (5,5,5,3,3)
  EcoSpold01Location=CH
  Assumption according to factsheets of network devices
  Uncertainty: assumption according to factsheets of network devices
  production volume 0.004 kg
- powder coat, steel: 1.39825e-5 m2; lognormal variance with pedigree 0.1361, pedigree (5,5,5,3,3)
  (same comment as for flat glass, coated)
- polyphenylene sulfide: 5.88881e-10 kg; lognormal variance with pedigree 0.0064, pedigree (2,4,3,4,2)
  Based on the direct inspection of a commercial device.
- permanent magnet, for electric motor: 1.13114e-9 kg
- copper scrap, sorted, pressed: -6.25879e-10 kg; lognormal variance with pedigree 0.0138, pedigree (2,4,3,4,3)
  Production scrap. Own estimate, based on values from automotive industry.
  production volume 157500 kg
- tetrafluoroethylene: 5.34684e-7 kg; lognormal variance with pedigree 0.070625, pedigree (2,4,5,2,3)
  Value for expected serial production
  Value for expected serial production
- water, deionised: 6.16943e-8 kg; lognormal variance with pedigree 0.072025, pedigree (3,4,5,2,3)
  Data from 3kWel unit for use in photovoltaics
  Data from 3kWel unit for use in photovoltaics
- platinum: 7.71178e-9 kg; lognormal variance with pedigree 0.070625, pedigree (2,4,5,2,3)
  Value for expected serial production
  Value for expected serial production
- glass fibre: 1.02824e-6 kg; lognormal variance with pedigree 0.070625, pedigree (2,4,5,2,3)
  Value for expected serial production
  Value for expected serial production
- phenolic resin: 1.13106e-5 kg; lognormal variance with pedigree 0.072025, pedigree (3,4,5,2,3)
  High value for a future serial production
  High value for a future serial production
- waste polyvinylfluoride: -5.34684e-7 kg; lognormal variance with pedigree 0.070625, pedigree (2,4,5,2,3)
  Disposal of membrane material
  Disposal of membrane material
  production volume 0.104 kg
- carbon black: 8.2259e-9 kg; lognormal variance with pedigree 0.280025, pedigree (4,4,5,2,5)
  Proxy for activated carbon
  Proxy for activated carbon
- isopropanol: 9.76826e-8 kg; lognormal variance with pedigree 0.072025, pedigree (3,4,5,2,3)
  Approximation based on similar process
  Approximation based on similar process
- graphite: 4.62707e-5 kg; lognormal variance with pedigree 0.072025, pedigree (3,4,5,2,3)
  High value for a future serial production
  High value for a future serial production
- printed wiring board, mounted mainboard, desktop computer, Pb free: 2.65362e-11 kg; source F. Habermacher 2011; lognormal variance with pedigree 0.0424, pedigree (1,3,5,4,2)
  Materialization based on average from literature values.
- light emitting diode: 1.39642e-12 kg; source F. Habermacher 2011; lognormal variance with pedigree 0.0424, pedigree (1,3,5,4,2)
  Materialization based on average from literature values.
- fibre, viscose: 2.30399e-10 kg; source F. Habermacher 2011; lognormal variance with pedigree 0.0424, pedigree (1,3,5,4,2)
  Materialization based on average from literature values.
- tempering, flat glass: 4.18927e-10 kg; source F. Habermacher 2011; lognormal variance with pedigree 0.0424, pedigree (1,3,5,4,2)
  Materialization based on average from literature values.
- road vehicle factory: 0 unit; source F. Habermacher 2011; pedigree (1,1,1,1,1)
  Materialization based on average from literature values.
- glass fibre reinforced plastic, polyester resin, hand lay-up: 8.66425e-7 kg; source F. Habermacher 2011; lognormal variance with pedigree 0.0424, pedigree (1,3,5,4,2)
  Materialization based on average from literature values.
- polyethylene, low density, granulate: 2.21457e-10 kg; source F. Habermacher 2011; lognormal variance with pedigree 0.0424, pedigree (1,3,5,4,2)
  Materialization based on average from literature values.
- tap water: 1.67887e-6 kg; source F. Habermacher 2011; lognormal variance with pedigree 0.0424, pedigree (1,3,5,4,2)
  Values derived from Ecoinvent Transport Report. Value for entire passenger car scaled and split over glider and drivetrain (about 70% glider, 30% drivetrain).
- used glider, passenger car: -1.04679e-8 kg; source F. Habermacher 2011
  Materialization based on average from literature values.
  production volume 4.8e10 kg
- heat, district or industrial, other than natural gas: 6.22423e-10 MJ; source F. Habermacher 2011; lognormal variance with pedigree 0.0424, pedigree (1,3,5,4,2)
  (same comment as for tap water)
- magnesium: 8.90717e-12 kg; source F. Habermacher 2011; lognormal variance with pedigree 0.0424, pedigree (1,3,5,4,2)
  Materialization based on average from literature values.
- coating powder: 5.07673e-11, 1.02797e-10 kg (2 suppliers, which the file names only by identifier); sum of these 1.53565e-10 kg; source F. Habermacher 2011; lognormal variance with pedigree 0.0424, pedigree (1,3,5,4,2)
  Materialization based on average from literature values.
- fleece, polyethylene: 2.72557e-7 kg; lognormal variance with pedigree 0.0612, pedigree (2,3,5,1,1)
  Literature (Schwarz 1992)
  EcoSpold01Location=RER
  Uncertainty: Literature (Schwarz 1992)
- styrene-acrylonitrile copolymer: 1.77766e-8 kg; lognormal variance with pedigree 0.0512, pedigree (2,3,5,1,1)
  Literature (de Wild 2006)
  EcoSpold01Location=RER
  Uncertainty: Literature (de Wild 2006)
- capacitor, tantalum-, for through-hole mounting: 4.31168e-8 kg; lognormal variance with pedigree 0.0512, pedigree (2,3,5,1,1)
  EcoSpold01Location=GLO
  Literature (de Wild 2006), Assumption for Ceramic Multilayer Chip Capacitors
  Uncertainty: Literature (de Wild 2006), Assumption for Ceramic Multilayer Chip Capacitors
- waste polystyrene: -1.20476e-6 kg; lognormal variance with pedigree 0.0532, pedigree (2,3,5,5,1)
  EcoSpold01Location=CH
  Calculation, different geographical location
  Uncertainty: Calculation, different geographical location
  production volume 0.132 kg
- section bar extrusion, aluminium: 8.64139e-6 kg; lognormal variance with pedigree 0.0512, pedigree (2,3,5,1,1)
  Literature (de Wild 2006)
  EcoSpold01Location=RER
  Uncertainty: Literature (de Wild 2006)
- resistor, metal film type, through-hole mounting: 8.98677e-9 kg; lognormal variance with pedigree 0.0512, pedigree (2,3,5,1,1)
  Literature (de Wild 2006), Calculation
  EcoSpold01Location=GLO
  Uncertainty: Literature (de Wild 2006), Calculation
- inductor, ring core choke type: 6.64647e-7 kg; lognormal variance with pedigree 0.0512, pedigree (2,3,5,1,1)
  (same comment as for resistor, metal film type, through-hole mounting)
- diode, glass-, for through-hole mounting: 8.98086e-8 kg; lognormal variance with pedigree 0.0512, pedigree (2,3,5,1,1)
  (same comment as for resistor, metal film type, through-hole mounting)
- transformer, high voltage use: 2.75538e-6 kg; lognormal variance with pedigree 0.0512, pedigree (2,3,5,1,1)
  EcoSpold01Location=GLO
  Literature (de Wild 2006)
  Uncertainty: Literature (de Wild 2006)
- capacitor, electrolyte type, > 2cm height: 4.8501e-7 kg; lognormal variance with pedigree 0.0512, pedigree (2,3,5,1,1)
  EcoSpold01Location=GLO
  Literature (de Wild 2006), Calculation
  Uncertainty: Literature (de Wild 2006), Calculation
- electric connector, wire clamp: 1.37779e-6 kg; lognormal variance with pedigree 0.0512, pedigree (2,3,5,1,1)
  (same comment as for capacitor, electrolyte type, > 2cm height)
- integrated circuit, logic type: 5.38812e-8 kg; lognormal variance with pedigree 0.0512, pedigree (2,3,5,1,1)
  (same comment as for capacitor, electrolyte type, > 2cm height)
- transistor, wired, small size, through-hole mounting: 7.18548e-8 kg; lognormal variance with pedigree 0.0512, pedigree (2,3,5,1,1)
  (same comment as for capacitor, electrolyte type, > 2cm height)
- metal working factory: 3.59568e-14 unit; lognormal variance with pedigree 0.3526, pedigree (2,4,5,1,1)
  Calculation, based on annual production of electronic component production plant
  EcoSpold01Location=RER
  Uncertainty: Calculation, based on annual production of electronic component production plant
- used printed wiring boards: -7.09339e-6 kg; lognormal variance with pedigree 0.0532, pedigree (2,3,5,5,1)
  Calculation, different geographical location
  EcoSpold01Location=GLO
  Uncertainty: Calculation, different geographical location
  production volume 0.6898 kg
- wastewater, unpolluted: -1.12e-11, -1.3888e-9 m3 (2 suppliers, which the file names only by identifier); sum of these -1.4e-9 m3; lognormal variance with pedigree 0.0186, pedigree (4,5,3,1,1)
  Calculated value.
  production volume 707944 m3
- toner module, laser printer, black/white: 9.17343e-7 unit; lognormal variance with pedigree 0.0512, pedigree (2,3,5,1,1)
  Calculated based on literature and estimates. Toner module capacity is 5000 pages, one page weight 0.005 kg, thus total weight of paper one toner module can print on is (5000*0.005=) 25 kg. In order to print on paper of total weight of 1 kg (1/25=) 0.04 units of toner module is needed.
- used toner module, laser printer, black/white: -8.07262e-7 kg; lognormal variance with pedigree 0.0526, pedigree (4,4,5,5,1)
  Measured value. The weight of 1 toner module is 0.88 kg.
  production volume 2.94269e6 kg
- printer, laser, black/white: 4.77783e-9 unit; lognormal variance with pedigree 0.0546, pedigree (3,3,5,5,1)
  Calculated based on literature values and estimates. The monthly production volume of this type of printer is 20,000 pg (http://www.epson.de/de/en/viewcon/corporatesite/products/mainunits/specs/9538). The weight of one page is 0.005kg. The lifetime of a printer is estimated to be 4 years. In its lifetime the printer is able to print on (20,000*12*4=) 960,000 pages, of total weight (960,000*0.005=) 4800 kg.
  EcoSpold01Location=GLO
- paper, woodcontaining, lightweight coated: 2.55343e-5, 2.55343e-5 kg (2 suppliers, which the file names only by identifier); sum of these 5.10687e-5 kg
- electricity, low voltage: 2.19992e-6, 4.12709e-8, 5.39993e-7 kWh (3 suppliers, which the file names only by identifier); sum of these 2.78118e-6 kWh; lognormal variance with pedigree 0.0432, pedigree (2,3,5,5,1)
  EcoSpold01Location=UCTE
- used toner module, laser printer, colour: -9.90356e-7 kg; lognormal variance with pedigree 0.0526, pedigree (4,4,5,5,1)
  Measured value. The weight of 1 toner module is 0.88 kg.
  production volume 2.94269e6 kg
- toner module, laser printer, colour: 1.1254e-6 unit; lognormal variance with pedigree 0.0512, pedigree (2,3,5,1,1)
  Calculated based on literature and estimates.Toner module capacity is 5000 pages, one page weight 0.005 kg, thus total weight of paper one toner module can print on is (5000*0.005=) 25 kg. In order to print on paper of total weight of 1 kg (1/25=) 0.04 units of toner module is needed.
- printer, laser, colour: 5.86148e-9 unit; lognormal variance with pedigree 0.0546, pedigree (3,3,5,5,1)
  (same comment as for printer, laser, black/white)
- converter, for electric passenger car: 5.85057e-10 kg; source F. Habermacher 2011; lognormal variance with pedigree 0.0058, pedigree (1,4,3,4,2)
  This electric drivetrain and the data describing each component is based on direct information from the Swiss manufacturer Brusa.
- electric motor, electric passenger car: 6.89067e-9 kg
- power distribution unit, for electric passenger car: 5.0705e-10 kg; source F. Habermacher 2011; lognormal variance with pedigree 0.0058, pedigree (1,4,3,4,2)
  (same comment as for converter, for electric passenger car)
- used powertrain from electric passenger car, manual dismantling: -1.04296e-8 kg; source F. Habermacher 2011
  production volume 721980 kg
- charger, electric passenger car: 8.06079e-10 kg; source F. Habermacher 2011; lognormal variance with pedigree 0.0058, pedigree (1,4,3,4,2)
  (same comment as for converter, for electric passenger car)

- inverter, for electric passenger car: 1.23512e-9 kg; source F. Habermacher 2011; lognormal variance with pedigree 0.0058, pedigree (1,4,3,4,2)
  (same comment as for converter, for electric passenger car)
- used refrigeration machine, carbon dioxide, liquid as refrigerant: -1.02147e-14 unit; lognormal variance with pedigree 0.0026, pedigree (1,1,3,1,1)
  Calculated value.
  production volume 52200 unit
- air compressor, screw-type compressor, 4kW: 8.46192e-15 unit; source Maersk Container Industry 2013; lognormal variance with pedigree 0.0186, pedigree (4,5,3,1,1)
  Calculated value.
  The weight od the air compressor present in the database is 140kg. The weight of the compressor needed for the refrigeration unit is 58kg. The amount of the exchange needed is scaled accordingly.
  The original Star Cool refrigeration machine the compressor's description:
  Make; Bitzer
  Type: Semi – hermetic two-stage reciprocating.
  Number of cylinders: 2 Low stages cylinders, 2 High stage cylinders.
  Speed: Variable in interval from 20 Hz – 110 Hz controlled by the frequency converter.
  Model: S4BCF – 5.2Y
  Nominal power: 5.5 kW
  Compressor oil type: Reniso Triton SEZ 55 or equivalent
  Compressor housing: Seawater resistant aluminium, unpainted.
  Displacement: 42 m3/h @ 110 Hz
  Weight: 58 Kg
- maintenance, refrigeration machine: 2.04253e-14 unit; lognormal variance with pedigree 0.0026, pedigree (1,1,3,1,1)
  Calculated value.
- carbon dioxide, liquid: 7.99338e-15, 3.79728e-14 kg (2 suppliers, which the file names only by identifier); sum of these 4.59662e-14 kg; source Maersk Container Industry 2013; lognormal variance with pedigree 0.0186, pedigree (4,5,3,1,1)
  Literature value.
- polyurethane, rigid foam: 9.93225e-14, 2.01116e-13 kg (2 suppliers, which the file names only by identifier); sum of these 3.00438e-13 kg; source Maersk Container Industry 2013; lognormal variance with pedigree 0.0052, pedigree (3,3,3,1,1)
  Calculated value. The rear bulkhead of the refrigeration machine is covered by polyurethane insulation foam.
- used refrigeration machine, R134a as refrigerant: -1.02106e-14 unit; lognormal variance with pedigree 0.0026, pedigree (1,1,3,1,1)
  Calculated value.
  production volume 109800 unit
- refrigerant R134a: 4.59478e-14 kg; lognormal variance with pedigree 0.0186, pedigree (4,5,3,1,1)
  Literature value.

## Inputs from nature
- Oxygen [natural resource, in air]: 0 kg; pedigree (1,1,1,1,1)
  Oxygen from ambient air needed to combust and oxidise this waste. Net demand, i.e. without O2 leaving the plant in flue gas uncombusted.
  Uncertainty: uncertainty is calculated from uncertainties in waste composition and transfer coefficients to flue gas and soild residues in incinerator
- Iron, in ground [natural resource, in ground]: 1.37543e-6 kg
  46% Fe in siderite; 25% Fe in ore; Uncertainty for LCI results cannot be determined
- Water, unspecified natural origin [natural resource, in water]: 4.60873e-5 m3; lognormal variance with pedigree 1.21, pedigree (5,5,5,5,5)
  Uncertainty for LCI results cannot be determined
- Uranium, in ground [natural resource, in ground]: 2.51222e-8 kg
  Uncertainty for LCI results cannot be determined
- Peat, in ground [natural resource, biotic]: 5.58678e-7 kg
  Uncertainty for LCI results cannot be determined
- Mercury, in ground [natural resource, in ground]: 6.94141e-10 kg
  Uncertainty for LCI results cannot be determined
- Chromium, in ground [natural resource, in ground]: 6.31609e-10 kg
  25.5% Cr in chromite; 11.6% in ore; Uncertainty for LCI results cannot be determined
- Magnesite, in ground [natural resource, in ground]: 7.0874e-8 kg
  60% Magnesite in ore; Uncertainty for LCI results cannot be determined
- Calcite, in ground [natural resource, in ground]: 0.000102991 kg
  Uncertainty for LCI results cannot be determined
- Shale, in ground [natural resource, in ground]: 6.65482e-8 kg
  Uncertainty for LCI results cannot be determined
- Energy, potential (in hydropower reservoir), converted [natural resource, in water]: 0.000748517 MJ
- Energy, gross calorific value, in biomass [natural resource, biotic]: 0.000840725 MJ
- Zinc, in ground [natural resource, in ground]: 1.87893e-8 kg
  9.0% Zn in sulfide; 5.3% Zn in ore; Uncertainty for LCI results cannot be determined
- Dolomite, in ground [natural resource, in ground]: 8.30291e-6 kg
  Uncertainty for LCI results cannot be determined
- Feldspar, in ground [natural resource, in ground]: 4.58342e-8 kg
  Uncertainty for LCI results cannot be determined
- Water, river [natural resource, in water]: 5.2095e-6 m3; lognormal variance with pedigree 1.21, pedigree (5,5,5,5,5)
  Uncertainty for LCI results cannot be determined
- Sodium chloride, in ground [natural resource, in ground]: 0.000439539 kg
  Uncertainty for LCI results cannot be determined
- Wood, unspecified, standing [natural resource, biotic]: 2.26642e-9 m3
  Uncertainty for LCI results cannot be determined
- Copper, in ground [natural resource, in ground]: 4.65134e-8 kg
  0.99% Cu in sulfide; 0.36% Cu and 82 ppm Mo in ore; Uncertainty for LCI results cannot be determined
- Fluorspar, in ground [natural resource, in ground]: 1.64576e-8 kg
  92% CaF2 in ore; Uncertainty for LCI results cannot be determined
- Lead, in ground [natural resource, in ground]: 5.30028e-9 kg
  5.0% Pb in sulfide; 3.0% Pb in ore; Uncertainty for LCI results cannot be determined
- Aluminium, in ground [natural resource, in ground]: 2.05429e-7 kg
  24% Al in bauxite; 11% Al in ore; Uncertainty for LCI results cannot be determined
- Water, salt, ocean [natural resource, in water]: 9.55903e-7 m3; lognormal variance with pedigree 1.21, pedigree (5,5,5,5,5)
  Uncertainty for LCI results cannot be determined
- Gas, natural, in ground [natural resource, in ground]: 0.00308137 m3
  Uncertainty for LCI results cannot be determined
- Coal, brown, in ground [natural resource, in ground]: 4.30569e-5 kg
  Uncertainty for LCI results cannot be determined
- Water, well, in ground [natural resource, in water]: 5.07964e-7 m3; lognormal variance with pedigree 1.21, pedigree (5,5,5,5,5)
  Uncertainty for LCI results cannot be determined
- Anhydrite, in ground [natural resource, in ground]: 2.35328e-8 kg
  Uncertainty for LCI results cannot be determined
- Sulfur, in ground [natural resource, in ground]: 5.1685e-5 kg
  Uncertainty for LCI results cannot be determined
- Coal, hard, unspecified, in ground [natural resource, in ground]: 0.000544798 kg
  Uncertainty for LCI results cannot be determined
- Gravel, in ground [natural resource, in ground]: 5.12474e-7 kg
  Uncertainty for LCI results cannot be determined
- Titanium, in ground [natural resource, in ground]: 5.0273e-8 kg
  95% TiO2 in rutile; 0.4% TiO2 in ore; Uncertainty for LCI results cannot be determined
- Sodium nitrate, in ground [natural resource, in ground]: 3.72782e-13 kg
  Uncertainty for LCI results cannot be determined
- Clay, bentonite, in ground [natural resource, in ground]: 1.89395e-7 kg
  Uncertainty for LCI results cannot be determined
- Nickel, in ground [natural resource, in ground]: 5.36503e-9 kg
  1.98% Ni in silicates; 1.04% Ni in ore; Uncertainty for LCI results cannot be determined
- Sand, unspecified, in ground [natural resource, in ground]: 2.76712e-5 kg
  Uncertainty for LCI results cannot be determined
- Olivine, in ground [natural resource, in ground]: 1.27613e-8 kg
  Uncertainty for LCI results cannot be determined
- Oil, crude, in ground [natural resource, in ground]: 0.00238423 kg
  Uncertainty for LCI results cannot be determined
- Clay, unspecified, in ground [natural resource, in ground]: 2.94348e-9 kg
  Uncertainty for LCI results cannot be determined
- Phosphorus, in ground [natural resource, in ground]: 8.22638e-7 kg
  18% P in apatite; 12% in ore; Uncertainty for LCI results cannot be determined
- Manganese, in ground [natural resource, in ground]: 1.76274e-9 kg
  35.7% Mn in sedimentary deposit; 14.2% Mn in ore; Uncertainty for LCI results cannot be determined
- Sylvite, in ground [natural resource, in ground]: 1.58022e-6 kg
  25% Sylvite in sylvinite; Uncertainty for LCI results cannot be determined
- Barium, in ground [natural resource, in ground]: 1.78934e-7 kg
  15% BaSO4 in ore; Uncertainty for LCI results cannot be determined
- Talc, in ground [natural resource, in ground]: 1.23809e-6 kg
  Uncertainty for LCI results cannot be determined
- Water, cooling, unspecified natural origin [natural resource, in water]: 0.000282069 m3; lognormal variance with pedigree 1.21, pedigree (5,5,5,5,5)
  Uncertainty for LCI results cannot be determined
- Granite, in ground [natural resource, in ground]: 3.84242e-11 kg
  Uncertainty for LCI results cannot be determined
- Transformation, from unspecified [natural resource, land]: 8.15824e-7 m2; source Schmocker A. 2002; lognormal variance with pedigree 0.2141, pedigree (4,5,5,3,3)
  Estimated from data of small plants. The land use of the air separation plant depends on the size of the plant. For small plants with an output of 100 kg liquefied product per hour a space requirement of 0.3 m2 per kg hourly production is reported. For larger plants with an output of 3000 kg liquefied product per hour the space requirement lowers to 0.2 m2 per kg hourly production. For very large plants the land use was estimated to be about 0.1 m2 per kg hourly production. For this inventory an average amount of 0.1 m2 per kg hourly production output was assumed. This leads to a total area occupied by the plant of 1000 m2.
  Further references:
  Cosmodyne (2001) Performance Specifications, Aspen 1000 / Aspen 2000. Cosmodyne, Torrance, (CA, USA). Retrieved 16.01.2002 from www.cosmodyne.com
  Uncertainty: Estimated from data of small plants
- Occupation, industrial area [natural resource, land]: 4.35973e-5 m2*year; lognormal variance with pedigree 0.1341, pedigree (4,5,5,3,3)
  Estimated from data of small plants. For the time of occupation 20 years were assumed as plant lifetime, thus a total of 20000 m2*year was obtained.
  Uncertainty: Estimated from data of small plants
- Occupation, construction site [natural resource, land]: 5.63849e-7 m2*year; lognormal variance with pedigree 0.1341, pedigree (4,5,5,3,3)
  Estimated from data of small plants. One year of occupation as construction site for construction and dismantling was assumed. The occupation of the area before the occupation as industrial area is not known (transformation from unknown).
  Uncertainty: Estimated from data of small plants
- Transformation, to industrial area [natural resource, land]: 9.7629e-7 m2; source Schmocker A. 2002; lognormal variance with pedigree 0.2141, pedigree (4,5,5,3,3)
  (same comment as for Transformation, from unspecified)
- Ulexite, in ground [natural resource, in ground]: 2.36054e-6 kg
  Uncertainty for LCI results cannot be determined
- Borax, in ground [natural resource, in ground]: 2.44436e-8 kg
  Uncertainty for LCI results cannot be determined
- Occupation, dump site [natural resource, land]: 7.74402e-7 m2*year; lognormal variance with pedigree 0.0801, pedigree (1,2,5,1,1)
  100a occupation
  Uncertainty: 100a occupation
- Occupation, traffic area, road network [natural resource, land]: 1.81987e-6 m2*year; lognormal variance with pedigree 0.0801, pedigree (1,2,5,1,1)
  100a occupation
  Uncertainty: 100a occupation
- Transformation, to traffic area, road network [natural resource, land]: 1.81987e-8 m2; lognormal variance with pedigree 0.1601, pedigree (1,2,5,1,1)
  Environmental report
  Uncertainty: Environmental report
- Transformation, to dump site, residual material landfill [natural resource, land]: 7.74402e-9 m2; lognormal variance with pedigree 0.1601, pedigree (1,2,5,1,1)
  Environmental report
  Uncertainty: Environmental report
- Transformation, from pasture, man made [natural resource, land]: 1.86432e-7 m2; source ENERCON GmbH 2010; lognormal variance with pedigree 0.0481, pedigree (1,1,4,3,1)
  Literature value
  Uncertainty: Estimated variance.

## Emissions to nature
- Beryllium [water, ground-, long-term]: 0 kg; pedigree (1,1,1,1,1)
  Long-term emissions from landfilling of incineration residues.
  Uncertainty: uncertainty is calculated from uncertainties in waste composition and transfer coefficients in incinerator and landfills.
- Vanadium, ion [water, surface water]: 0 kg; pedigree (1,1,1,1,1)
  Emissions to water from waste composition and transfer coefficients in incinerator and landfills.
  Uncertainty: uncertainty is calculated from uncertainties in waste composition and transfer coefficients in incinerator and landfills
- Lead [air, urban air close to ground]: 1.5359e-10 kg; lognormal variance with pedigree 0.9297, pedigree (1,1,3,1,1)
  Emission to air from waste composition and transfer coefficients.
  Uncertainty: uncertainty is calculated from uncertainties in waste composition and transfer coefficients in incinerator
- Strontium [water, ground-, long-term]: 0 kg; pedigree (1,1,1,1,1)
  (same comment as for Beryllium)
- Zinc, ion [water, surface water]: 3.72774e-10 kg; lognormal variance with pedigree 0.66894, pedigree (1,1,3,1,1)
  (same comment as for Vanadium, ion)
- Antimony [air, urban air close to ground]: 2.07041e-14 kg; lognormal variance with pedigree 0.53133, pedigree (1,1,3,1,1)
  (same comment as for Lead)
- Titanium, ion [water, ground-, long-term]: 0 kg; pedigree (1,1,1,1,1)
  (same comment as for Beryllium)
- Beryllium [water, surface water]: 0 kg; pedigree (1,1,1,1,1)
  (same comment as for Vanadium, ion)
- Selenium [air, urban air close to ground]: 8.47828e-15 kg; lognormal variance with pedigree 1.4924, pedigree (1,1,3,1,1)
  (same comment as for Lead)
- Thallium [water, ground-, long-term]: 0 kg; pedigree (1,1,1,1,1)
  (same comment as for Beryllium)
- Strontium [water, surface water]: 2.28725e-12 kg; lognormal variance with pedigree 1.6584, pedigree (1,1,3,1,1)
  (same comment as for Vanadium, ion)
- Tin [air, urban air close to ground]: 0 kg; pedigree (1,1,1,1,1)
  (same comment as for Lead)
- Silicon [water, ground-, long-term]: 0 kg; pedigree (1,1,1,1,1)
  (same comment as for Beryllium)
- Titanium, ion [water, surface water]: 0 kg; pedigree (1,1,1,1,1)
  (same comment as for Vanadium, ion)
- Vanadium [air, urban air close to ground]: 0 kg; pedigree (1,1,1,1,1)
  (same comment as for Lead)
- Iron, ion [water, ground-, long-term]: 0 kg; pedigree (1,1,1,1,1)
  (same comment as for Beryllium)
- Thallium [water, surface water]: 0 kg; pedigree (1,1,1,1,1)
  (same comment as for Vanadium, ion)
- Zinc [air, urban air close to ground]: 9.49429e-12 kg; lognormal variance with pedigree 0.76845, pedigree (1,1,3,1,1)
  (same comment as for Lead)
- Calcium, ion [water, ground-, long-term]: 0 kg; pedigree (1,1,1,1,1)
  (same comment as for Beryllium)
- Silicon [water, surface water]: 2.48898e-14 kg; lognormal variance with pedigree 0.74083, pedigree (1,1,3,1,1)
  (same comment as for Vanadium, ion)
- Strontium [air, urban air close to ground]: 0 kg; pedigree (1,1,1,1,1)
  (same comment as for Lead)
- Aluminium [water, ground-, long-term]: 0 kg; pedigree (1,1,1,1,1)
  (same comment as for Beryllium)
- Iron, ion [water, surface water]: 5.97293e-9 kg; lognormal variance with pedigree 1.0718, pedigree (1,1,3,1,1)
  (same comment as for Vanadium, ion)
- Titanium [air, urban air close to ground]: 0 kg; pedigree (1,1,1,1,1)
  (same comment as for Lead)
- Potassium, ion [water, ground-, long-term]: 0 kg; pedigree (1,1,1,1,1)
  (same comment as for Beryllium)
- Calcium, ion [water, surface water]: 2.38496e-5 kg; lognormal variance with pedigree 0.22152, pedigree (1,1,3,1,1)
  (same comment as for Vanadium, ion)
- Thallium [air, urban air close to ground]: 0 kg; pedigree (1,1,1,1,1)
  (same comment as for Lead)
- Sodium, ion [water, ground-, long-term]: 0 kg; pedigree (1,1,1,1,1)
  (same comment as for Beryllium)
- Aluminium [water, surface water]: 1.55066e-8 kg; lognormal variance with pedigree 0.87367, pedigree (1,1,3,1,1)
  (same comment as for Vanadium, ion)
- Silicon [air, urban air close to ground]: 0 kg; pedigree (1,1,1,1,1)
  (same comment as for Lead)
- NMVOC, non-methane volatile organic compounds, unspecified origin [air, urban air close to ground]: 1.41277e-5 kg; lognormal variance with pedigree 0.068092, pedigree (1,1,3,1,1)
  Incomplete combustion product emitted to air.
  Uncertainty: uncertainty calculated from uncertainty in average operation emissions, and the uncertainty of the flue gas volume from this waste.
- Potassium, ion [water, surface water]: 3.6073e-8 kg; lognormal variance with pedigree 0.73036, pedigree (1,1,3,1,1)
  (same comment as for Vanadium, ion)
- Iron [air, urban air close to ground]: 0 kg; pedigree (1,1,1,1,1)
  (same comment as for Lead)
- Particulates, < 2.5 um [air, urban air close to ground]: 1.27016e-6 kg; lognormal variance with pedigree 0.3664, pedigree (1,1,3,1,1)
  (same comment as for NMVOC, non-methane volatile organic compounds, unspecified origin)
- Sodium, ion [water, surface water]: 8.33846e-5 kg; lognormal variance with pedigree 0.30521, pedigree (1,1,3,1,1)
  (same comment as for Vanadium, ion)
- Calcium [air, urban air close to ground]: 0 kg; pedigree (1,1,1,1,1)
  (same comment as for Lead)
- Particulates, > 2.5 um, and < 10um [air, urban air close to ground]: 2.18467e-6 kg; lognormal variance with pedigree 0.16274, pedigree (1,1,3,1,1)
  (same comment as for NMVOC, non-methane volatile organic compounds, unspecified origin)
- Chromium, ion [water, surface water]: 6.07519e-10 kg; lognormal variance with pedigree 0.64863, pedigree (1,1,3,1,1)
  (same comment as for Vanadium, ion)
- Aluminium [air, urban air close to ground]: 0 kg; pedigree (1,1,1,1,1)
  (same comment as for Lead)
- Dioxins, measured as 2,3,7,8-tetrachlorodibenzo-p-dioxin [air, urban air close to ground]: 5.04099e-14 kg; lognormal variance with pedigree 0.3664, pedigree (1,1,3,1,1)
  (same comment as for NMVOC, non-methane volatile organic compounds, unspecified origin)
- COD, Chemical Oxygen Demand [water, ground-, long-term]: 0 kg; pedigree (1,1,1,1,1)
  (same comment as for Beryllium)
- Potassium [air, urban air close to ground]: 0 kg; pedigree (1,1,1,1,1)
  (same comment as for Lead)
- Benzene [air, urban air close to ground]: 1.42093e-8 kg; lognormal variance with pedigree 0.068092, pedigree (1,1,3,1,1)
  (same comment as for NMVOC, non-methane volatile organic compounds, unspecified origin)
- BOD5, Biological Oxygen Demand [water, ground-, long-term]: 0 kg; pedigree (1,1,1,1,1)
  (same comment as for Beryllium)
- Sodium [air, urban air close to ground]: 0 kg; pedigree (1,1,1,1,1)
  (same comment as for Lead)
- Toluene [air, urban air close to ground]: 2.47488e-9 kg; lognormal variance with pedigree 0.068092, pedigree (1,1,3,1,1)
  (same comment as for NMVOC, non-methane volatile organic compounds, unspecified origin)
- DOC, Dissolved Organic Carbon [water, ground-, long-term]: 0 kg; pedigree (1,1,1,1,1)
  (same comment as for Beryllium)
- BOD5, Biological Oxygen Demand [water, surface water]: 5.8612e-7 kg; lognormal variance with pedigree 0.01983, pedigree (1,1,3,1,1)
  (same comment as for Vanadium, ion)
- Benzene, pentachloro- [air, urban air close to ground]: 0 kg; pedigree (1,1,1,1,1)
  (same comment as for NMVOC, non-methane volatile organic compounds, unspecified origin)
- TOC, Total Organic Carbon [water, ground-, long-term]: 0 kg; pedigree (1,1,1,1,1)
  (same comment as for Beryllium)
- COD, Chemical Oxygen Demand [water, surface water]: 3.87745e-6 kg; lognormal variance with pedigree 0.01966, pedigree (1,1,3,1,1)
  (same comment as for Vanadium, ion)
- Benzene, hexachloro- [air, urban air close to ground]: 0 kg; pedigree (1,1,1,1,1)
  (same comment as for NMVOC, non-methane volatile organic compounds, unspecified origin)
- Nitrate [water, ground-, long-term]: 0 kg; pedigree (1,1,1,1,1)
  (same comment as for Beryllium)
- DOC, Dissolved Organic Carbon [water, surface water]: 8.0456e-7 kg; lognormal variance with pedigree 0.019636, pedigree (1,1,3,1,1)
  (same comment as for Vanadium, ion)
- Phenol, pentachloro- [air, urban air close to ground]: 0 kg; pedigree (1,1,1,1,1)
  (same comment as for NMVOC, non-methane volatile organic compounds, unspecified origin)
- Sulfate [water, ground-, long-term]: 0 kg; pedigree (1,1,1,1,1)
  (same comment as for Beryllium)
- TOC, Total Organic Carbon [water, surface water]: 8.0456e-7 kg; lognormal variance with pedigree 0.019636, pedigree (1,1,3,1,1)
  (same comment as for Vanadium, ion)
- Benzo(a)pyrene [air, urban air close to ground]: 0 kg; pedigree (1,1,1,1,1)
  (same comment as for NMVOC, non-methane volatile organic compounds, unspecified origin)
- Phosphate [water, ground-, long-term]: 0 kg; pedigree (1,1,1,1,1)
  (same comment as for Beryllium)
- Sulfate [water, surface water]: 2.40639e-5 kg; lognormal variance with pedigree 0.39853, pedigree (1,1,3,1,1)
  (same comment as for Vanadium, ion)
- Heat, waste [air, urban air close to ground]: 0 MJ; pedigree (1,1,1,1,1)
  Waste heat generated from heating value of this waste plus any electricity required to process it.
  Uncertainty: uncertainty is calculated from uncertainties in waste composition and uncertainties in energy efficiency and the uncertainty in internal energy demand
- Chloride [water, ground-, long-term]: 0 kg; pedigree (1,1,1,1,1)
  (same comment as for Beryllium)
- Nitrate [water, surface water]: 4.65462e-6 kg; lognormal variance with pedigree 0.22579, pedigree (1,1,3,1,1)
  (same comment as for Vanadium, ion)
- Heat, waste [water, surface water]: 0 MJ; pedigree (1,1,1,1,1)
  (same comment as for Heat, waste)
- Bromine [water, ground-, long-term]: 0 kg; pedigree (1,1,1,1,1)
  (same comment as for Beryllium)
- Phosphate [water, surface water]: 0 kg; pedigree (1,1,1,1,1)
  (same comment as for Vanadium, ion)
- Water [water, surface water]: 0 m3; pedigree (1,1,1,1,1)
  Process water released to surface water.
  Uncertainty: uncertainty calculated from uncertainty in process water input and the uncertainty of fraction to surface water.
- Fluoride [water, ground-, long-term]: 0 kg; pedigree (1,1,1,1,1)
  (same comment as for Beryllium)
- Chloride [water, surface water]: 0.000152878 kg; lognormal variance with pedigree 0.15901, pedigree (1,1,3,1,1)
  (same comment as for Vanadium, ion)
- Water [air, urban air close to ground]: 0 m3; pedigree (1,1,1,1,1)
  Water vapour from waste humidity, hydrogen oxidation and part of the process water.
  Uncertainty: Uncertainty calculated from uncertainty in waste composition, process water input and the uncertainty of fraction to air.
- Arsenic, ion [water, ground-, long-term]: 0 kg; pedigree (1,1,1,1,1)
  (same comment as for Beryllium)
- Bromine [water, surface water]: 0 kg; pedigree (1,1,1,1,1)
  (same comment as for Vanadium, ion)
- Barium [water, ground-, long-term]: 0 kg; pedigree (1,1,1,1,1)
  (same comment as for Beryllium)
- Fluoride [water, surface water]: 2.99282e-9 kg; lognormal variance with pedigree 0.49248, pedigree (1,1,3,1,1)
  (same comment as for Vanadium, ion)
- Carbon monoxide, fossil [air, urban air close to ground]: 1.28472e-5 kg; lognormal variance with pedigree 0.74, pedigree (1,1,3,1,1)
  (same comment as for NMVOC, non-methane volatile organic compounds, unspecified origin)
- Cadmium, ion [water, ground-, long-term]: 0 kg; pedigree (1,1,1,1,1)
  (same comment as for Beryllium)
- Arsenic, ion [water, surface water]: 3.97568e-11 kg; lognormal variance with pedigree 1.2489, pedigree (1,1,3,1,1)
  (same comment as for Vanadium, ion)
- Carbon dioxide, fossil [air, urban air close to ground]: 0.00888676 kg; lognormal variance with pedigree 0.0034329, pedigree (1,1,3,1,1)
  (same comment as for Lead)
- Cobalt [water, ground-, long-term]: 0 kg; pedigree (1,1,1,1,1)
  (same comment as for Beryllium)
- Barium [water, surface water]: 0 kg; pedigree (1,1,1,1,1)
  (same comment as for Vanadium, ion)
- Methane, fossil [air, urban air close to ground]: 8.25339e-5 kg; lognormal variance with pedigree 0.068092, pedigree (1,1,3,1,1)
  (same comment as for NMVOC, non-methane volatile organic compounds, unspecified origin)
- Chromium VI [water, ground-, long-term]: 0 kg; pedigree (1,1,1,1,1)
  (same comment as for Beryllium)
- Cadmium, ion [water, surface water]: 2.00623e-14 kg; lognormal variance with pedigree 0.89303, pedigree (1,1,3,1,1)
  (same comment as for Vanadium, ion)
- Sulfur dioxide [air, urban air close to ground]: 3.02121e-5 kg; lognormal variance with pedigree 0.79187, pedigree (1,1,3,1,1)
  (same comment as for Lead)
- Copper, ion [water, ground-, long-term]: 0 kg; pedigree (1,1,1,1,1)
  (same comment as for Beryllium)
- Cobalt [water, surface water]: 0 kg; pedigree (1,1,1,1,1)
  (same comment as for Vanadium, ion)
- Nitrogen oxides [air, urban air close to ground]: 2.03381e-5 kg; lognormal variance with pedigree 0.73179, pedigree (1,1,3,1,1)
  Sum of fuel-Nox and thermal-NOx emitted to air after DeNOx stage.
  Uncertainty: uncertainty calculated from uncertainty in average N-emissions and uncertainty in the share of thermal NOx and the uncertainty in nitrogen content in *this* waste.
- Mercury [water, ground-, long-term]: 0 kg; pedigree (1,1,1,1,1)
  (same comment as for Beryllium)
- Chromium VI [water, surface water]: 1.99794e-11 kg; lognormal variance with pedigree 1.0906, pedigree (1,1,3,1,1)
  (same comment as for Vanadium, ion)
- Ammonia [air, urban air close to ground]: 1.16582e-7 kg; lognormal variance with pedigree 0.73179, pedigree (1,1,3,1,1)
  Nitrogen species emitted to air after DeNOx stage.
  Uncertainty: uncertainty calculated from uncertainty in average N-emissions and uncertainty in the share of thermal NOx and the uncertainty in nitrogen content in *this* waste.
- Arsenic [air, urban air close to ground]: 2.60979e-12 kg; lognormal variance with pedigree 1.3695, pedigree (1,1,3,1,1)
  (same comment as for Lead)
- Manganese [water, ground-, long-term]: 0 kg; pedigree (1,1,1,1,1)
  (same comment as for Beryllium)
- Copper, ion [water, surface water]: 2.68614e-9 kg; lognormal variance with pedigree 0.76017, pedigree (1,1,3,1,1)
  (same comment as for Vanadium, ion)
- Dinitrogen monoxide [air, urban air close to ground]: 8.05288e-7 kg; lognormal variance with pedigree 1.1079, pedigree (1,1,3,1,1)
  (same comment as for Ammonia)
- Barium [air, urban air close to ground]: 0 kg; pedigree (1,1,1,1,1)
  (same comment as for Lead)
- Molybdenum [water, ground-, long-term]: 0 kg; pedigree (1,1,1,1,1)
  (same comment as for Beryllium)
- Mercury [water, surface water]: 9.42954e-11 kg; lognormal variance with pedigree 1.8929, pedigree (1,1,3,1,1)
  (same comment as for Vanadium, ion)
- Cyanide [air, urban air close to ground]: 1.37638e-8 kg; lognormal variance with pedigree 1.1079, pedigree (1,1,3,1,1)
  (same comment as for Ammonia)
- Cadmium [air, urban air close to ground]: 3.71957e-13 kg; lognormal variance with pedigree 0.90765, pedigree (1,1,3,1,1)
  (same comment as for Lead)
- Nickel, ion [water, ground-, long-term]: 0 kg; pedigree (1,1,1,1,1)
  (same comment as for Beryllium)
- Manganese [water, surface water]: 1.76499e-13 kg; lognormal variance with pedigree 1.2441, pedigree (1,1,3,1,1)
  (same comment as for Vanadium, ion)
- Phosphorus [air, urban air close to ground]: 0 kg; pedigree (1,1,1,1,1)
  (same comment as for Lead)
- Cobalt [air, urban air close to ground]: 0 kg; pedigree (1,1,1,1,1)
  (same comment as for Lead)
- Lead [water, ground-, long-term]: 0 kg; pedigree (1,1,1,1,1)
  (same comment as for Beryllium)
- Molybdenum [water, surface water]: 3.05453e-12 kg; lognormal variance with pedigree 0.88046, pedigree (1,1,3,1,1)
  (same comment as for Vanadium, ion)
- Hydrogen chloride [air, urban air close to ground]: 2.62107e-7 kg; lognormal variance with pedigree 0.44682, pedigree (1,1,3,1,1)
  (same comment as for Lead)
- Chromium [air, urban air close to ground]: 2.5285e-9 kg; lognormal variance with pedigree 1.0327, pedigree (1,1,3,1,1)
  (same comment as for Lead)
- Antimony [water, ground-, long-term]: 0 kg; pedigree (1,1,1,1,1)
  (same comment as for Beryllium)
- Nickel, ion [water, surface water]: 2.36892e-9 kg; lognormal variance with pedigree 1.4394, pedigree (1,1,3,1,1)
  (same comment as for Vanadium, ion)
- Bromine [air, urban air close to ground]: 0 kg; pedigree (1,1,1,1,1)
  (same comment as for Lead)
- Copper [air, urban air close to ground]: 1.99548e-11 kg; lognormal variance with pedigree 0.54541, pedigree (1,1,3,1,1)
  (same comment as for Lead)
- Selenium [water, ground-, long-term]: 0 kg; pedigree (1,1,1,1,1)
  (same comment as for Beryllium)
- Lead [water, surface water]: 5.98252e-10 kg; lognormal variance with pedigree 0.75235, pedigree (1,1,3,1,1)
  (same comment as for Vanadium, ion)
- Hydrogen fluoride [air, urban air close to ground]: 9.95307e-9 kg; lognormal variance with pedigree 0.80139, pedigree (1,1,3,1,1)
  (same comment as for Lead)
- Mercury [air, urban air close to ground]: 2.13577e-10 kg; lognormal variance with pedigree 1.7349, pedigree (1,1,3,1,1)
  (same comment as for Lead)
- Tin, ion [water, ground-, long-term]: 0 kg; pedigree (1,1,1,1,1)
  (same comment as for Beryllium)
- Antimony [water, surface water]: 0 kg; pedigree (1,1,1,1,1)
  (same comment as for Vanadium, ion)
- Manganese [air, urban air close to ground]: 0 kg; pedigree (1,1,1,1,1)
  (same comment as for Lead)
- Vanadium, ion [water, ground-, long-term]: 0 kg; pedigree (1,1,1,1,1)
  (same comment as for Beryllium)
- Selenium [water, surface water]: 0 kg; pedigree (1,1,1,1,1)
  (same comment as for Vanadium, ion)
- Molybdenum [air, urban air close to ground]: 0 kg; pedigree (1,1,1,1,1)
  (same comment as for Lead)
- Zinc, ion [water, ground-, long-term]: 0 kg; pedigree (1,1,1,1,1)
  (same comment as for Beryllium)
- Tin, ion [water, surface water]: 4.61011e-13 kg; lognormal variance with pedigree 0.83818, pedigree (1,1,3,1,1)
  (same comment as for Vanadium, ion)
- Nickel [air, urban air close to ground]: 4.59603e-9 kg; lognormal variance with pedigree 0.83426, pedigree (1,1,3,1,1)
  (same comment as for Lead)
- Particulates, > 10 um [air, urban air close to ground]: 1.6258e-6 kg
  Uncertainty for LCI results cannot be determined
- Acidity, unspecified [water, surface water]: 1.32919e-7 kg
  Uncertainty for LCI results cannot be determined
- AOX, Adsorbable Organic Halogen as Cl [water, surface water]: 2.10819e-9 kg
  Uncertainty for LCI results cannot be determined
- Chlorate [water, surface water]: 4.72762e-8 kg
  Uncertainty for LCI results cannot be determined
- Bromate [water, surface water]: 8.35042e-11 kg
  Uncertainty for LCI results cannot be determined
- Oils, unspecified [water, surface water]: 4.7317e-8 kg
  Uncertainty for LCI results cannot be determined
- Ammonium, ion [water, surface water]: 2.01834e-6 kg
  Uncertainty for LCI results cannot be determined
- Dissolved solids [water, surface water]: 4.07938e-6 kg
  Uncertainty for LCI results cannot be determined
- Fluorine [air, urban air close to ground]: 4.17732e-10 kg
  Uncertainty for LCI results cannot be determined
- Methane, dichloro-, HCC-30 [air, urban air close to ground]: 3.21767e-11 kg
  Uncertainty for LCI results cannot be determined
- Benzene, ethyl- [air, urban air close to ground]: 4.40383e-9 kg
  Uncertainty for LCI results cannot be determined
- Propene [air, urban air close to ground]: 5.42235e-9 kg
  Uncertainty for LCI results cannot be determined
- Water [water, unspecified]: 0.00021448 m3; lognormal variance with pedigree 0.0807, pedigree (2,2,5,1,1)
  Calculated value based on literature values and expert opinion. See comments in the parametres' comment field.
- Methane, non-fossil [air, urban air close to ground]: 1.84354e-7 kg
  Uncertainty for LCI results cannot be determined
- Suspended solids, unspecified [water, surface water]: 1.16299e-5 kg
  Uncertainty for LCI results cannot be determined
- Hydrocarbons, unspecified [water, surface water]: 1.66242e-6 kg
  Uncertainty for LCI results cannot be determined
- Carbon disulfide [air, urban air close to ground]: 1.51345e-10 kg
  Uncertainty for LCI results cannot be determined
- Carbon monoxide, non-fossil [air, urban air close to ground]: 2.95609e-8 kg
  Uncertainty for LCI results cannot be determined
- Phenol [water, surface water]: 7.91275e-9 kg
  Uncertainty for LCI results cannot be determined
- Xylene [air, urban air close to ground]: 9.79521e-10 kg
  Uncertainty for LCI results cannot be determined
- Hydrocarbons, aromatic [air, urban air close to ground]: 1.39756e-7 kg
  Uncertainty for LCI results cannot be determined
- Phosphorus [water, surface water]: 2.68645e-7 kg
  Uncertainty for LCI results cannot be determined
- Chlorinated solvents, unspecified [water, surface water]: 5.4089e-7 kg
  Uncertainty for LCI results cannot be determined
- Hydrocarbons, aliphatic, alkanes, cyclic [air, urban air close to ground]: 5.24685e-9 kg
  Uncertainty for LCI results cannot be determined
- Styrene [air, urban air close to ground]: 1.24427e-8 kg
  Uncertainty for LCI results cannot be determined
- Ethene, chloro- [water, surface water]: 4.51362e-9 kg
  Uncertainty for LCI results cannot be determined
- Carbon dioxide, non-fossil [air, urban air close to ground]: 2.07426e-5 kg
  Uncertainty for LCI results cannot be determined
- Hydrogen sulfide [air, urban air close to ground]: 1.46683e-10 kg
  Uncertainty for LCI results cannot be determined
- Ethene, chloro- [air, urban air close to ground]: 3.18893e-9 kg
  Uncertainty for LCI results cannot be determined
- Carbonate [water, surface water]: 3.10863e-6 kg
  Uncertainty for LCI results cannot be determined
- Magnesium [water, surface water]: 7.19183e-8 kg
  Uncertainty for LCI results cannot be determined
- Ethane, 1,2-dichloro- [air, urban air close to ground]: 5.82903e-9 kg
  Uncertainty for LCI results cannot be determined
- Chlorine [air, urban air close to ground]: 8.8921e-8 kg
  Uncertainty for LCI results cannot be determined
- Sulfide [water, surface water]: 1.57491e-9 kg
  Uncertainty for LCI results cannot be determined
- Water [air, unspecified]: 0.000120066 m3; lognormal variance with pedigree 0.0807, pedigree (2,2,5,1,1)
  (same comment as for Water)
- Ethene [air, urban air close to ground]: 7.93671e-9 kg
  Uncertainty for LCI results cannot be determined
- Aldehydes, unspecified [air, urban air close to ground]: 7.40813e-8 kg
  Uncertainty for LCI results cannot be determined
- Benzene [water, surface water]: 2.67439e-10 kg
  Uncertainty for LCI results cannot be determined
- Silver [air, urban air close to ground]: 2.51934e-13 kg
  Uncertainty for LCI results cannot be determined
- Sulfate [air, urban air close to ground]: 1.29558e-10 kg
  Uncertainty for LCI results cannot be determined
- Hydrocarbons, chlorinated [air, urban air close to ground]: 7.58619e-7 kg
  Uncertainty for LCI results cannot be determined
- Hydrogen [air, urban air close to ground]: 7.84179e-7 kg
  Uncertainty for LCI results cannot be determined
- Nitrogen [water, surface water]: 3.88441e-7 kg
  Uncertainty for LCI results cannot be determined
- Chlorine [water, surface water]: 4.69509e-10 kg
  Uncertainty for LCI results cannot be determined
- Cyanide [water, surface water]: 1.3359e-8 kg
  Uncertainty for LCI results cannot be determined
- Ethane, 1,2-dichloro- [water, surface water]: 1.31044e-10 kg
  Uncertainty for LCI results cannot be determined
- Methane, dichlorodifluoro-, CFC-12 [air, urban air close to ground]: 5.32568e-9 kg; lognormal variance with pedigree 0.04, pedigree (1,1,5,1,1)
- Boron [water, surface water]: 6.25416e-8 kg
  Uncertainty for LCI results cannot be determined
- Methane, chlorodifluoro-, HCFC-22 [air, urban air close to ground]: 6.82624e-11 kg
  Uncertainty for LCI results cannot be determined
- Sulfite [water, surface water]: 7.25529e-11 kg
  Uncertainty for LCI results cannot be determined
- Diethyl ether [air, urban air close to ground]: 4.4288e-12 kg; source Socolof M. L. 2001; lognormal variance with pedigree 0.1607, pedigree (1,3,5,3,1)
  Literature Value.
  Uncertainty: data from an US-EPA LCA study
- Ethanol [air, urban air close to ground]: 2.21442e-12 kg; source Socolof M. L. 2001; lognormal variance with pedigree 0.1607, pedigree (1,3,5,3,1)
  Literature Value.
  Uncertainty: data from an US-EPA LCA study
- Propanol [air, urban air close to ground]: 9.76826e-8 kg; lognormal variance with pedigree 0.118025, pedigree (4,4,5,2,3)
  Estimation based on material input
- COD, Chemical Oxygen Demand [water, unspecified]: 1.90726e-12 kg; source F. Habermacher 2011; lognormal variance with pedigree 0.0452, pedigree (1,4,3,4,2)
  Extrapolated from ecoinvent v2.2 passenger car.
- BOD5, Biological Oxygen Demand [water, unspecified]: 2.56883e-13 kg; source F. Habermacher 2011; lognormal variance with pedigree 0.0832, pedigree (1,4,5,4,2)
  Extrapolated from ecoinvent v2.2 passenger car.
- NMVOC, non-methane volatile organic compounds, unspecified origin [air, unspecified]: 4.74302e-11 kg; source F. Habermacher 2011; lognormal variance with pedigree 0.0441, pedigree (1,4,3,3,1)
  Extrapolated from ecoinvent v2.2 passenger car.
- TOC, Total Organic Carbon [water, unspecified]: 7.06392e-13 kg; lognormal variance with pedigree 0.0452, pedigree (1,4,3,4,2)
  Derived from COD as described in ecoinvent 3 Data Quality Guidelines (p. 49, paragraph 5.9.7). The same Pedigree matrix value as COD has been used.
- DOC, Dissolved Organic Carbon [water, unspecified]: 7.06392e-13 kg; lognormal variance with pedigree 0.0452, pedigree (1,4,3,4,2)
  (same comment as for TOC, Total Organic Carbon)
- Phosphate [water, unspecified]: 9.88068e-15 kg; source F. Habermacher 2011; lognormal variance with pedigree 0.0441, pedigree (1,4,3,3,1)
  Extrapolated from ecoinvent v2.2 passenger car.
- Benzene [air, unspecified]: 9.4283e-12 kg; lognormal variance with pedigree 0.1806, pedigree (2,5,5,5,1)
