# treatment of used purse seiner, wood

Dataset: EcoSpold 2, unit process
Geography: RoW
Time period: 2010-01-01 to 2020-12-31
Technology level: current
Classification: ISIC rev.4 ecoinvent: 0311:Marine fishing
Scenario: Business-as-Usual
System model: Allocation at the point of substitution
Generated by: Angel Avadi
Published in: Avadí, A. 2018
Database: ecoinvent
isCopyrightProtected: true
accessRestrictedTo: 1

## General comment
This dataset represents the end of life of wooden purse seiners, per 1000 kg of light ship weight, based on data from Peru, corresponding to 10 vessels for which data was avilable with different levels of detail. Specific data for specific inventory items may be based on sub-samples for which detailed data was available. Vessel dimensions, landings and fuel use were available for roughly 689 purse seiners
System boundaries and relation between activities

## Included activities start
Treatment of used vessel (recycling)

## Included activities end
End of life (decommissioning). Excludes engines and motors. Excludes energy for dismantling.

## Geography
Data from Peru, extrapolated to global (GLO)

## Technology
Peru features various shipyards and relevant ship-building and ship-retrofitting expertise.

## Reference product
- used purse seiner, wood: 0 kg; name LSW; = -1*(lead+iron+copper+nylon+poly+wood+paint+zinc+bronze+caulking); source Pierre Fréon 2014; CPC 94312: Ship-breaking and other dismantling of wrecks services; By-product classification Waste
  EOL of a purse seiner, per 1000 kg of light ship weight (LSW), after 30 years lifetime. Regressions based on mainly primary data were created to relate the weight of each inventory item to a purse seiner's LSW. The list of inventory items (granularity) contribute >95% of environmental impacts, as described in the reference publication.
  production volume 0 kg; name prod_vol
    Unquantifiable
  property water in wet mass 0.143616 kg; name LSW_WWM
  property wet mass 1 kg; name LSW_WM
  property price 0 EUR2005; name LSW_price_EUR2005
    Waste products are assigned a price of zero as they are assumed to require further treatment.
  property dry mass 0.856384 kg; name LSW_DM
  property carbon content, fossil 0.0108097; name LSW_C_content_fossil; = 0.005*12.3%+0.63717*1.6%
    Calculated from the fossil carbon content of the structural and gear materials, multiplied by their relative proportions
  property water content 0.1677; name LSW_water_content
  property carbon content, non-fossil 0.403383; name LSW_C_content_non_fossil; = 0.494*81.6%+0.19963*0.14%
    Calculated from the fossil carbon content of the wooden hull and paint materials, multiplied by their relative proportions
  property carbon content 0.414193
    carbon content on a dry matter basis (reserved; not for manual entry)
  properties: carbon allocation 0.354708 kg
- iron scrap, unsorted: 1 kg; source Pierre Fréon 2014; CPC 39310: Slag, dross, scalings and other waste from the manufacture of iron or steel; By-product classification Recyclable; pedigree (1,1,1,1,1)
  Iron and steel recycled from engines and anchors + Recycled steel from keel lining and structural elements
  Uncertainty: Based on assumptions
  production volume 0.100973 kg

## By-products
- bronze: 0 kg; source Pierre Fréon 2014; By-product classification allocatable product; CPC 4: Metal products, machinery and equipment; pedigree (1,1,1,1,1)
  Bronze recycled from fishing gear. This exchange is set to zero because no suitable exchange/proxy is currently available. The original value is 0.2kg.
  Uncertainty: Based on assumptions
  production volume 0 kg; = ABS(prod_vol*bronze/LSW)
    Calculated from production volume of reference product using the relative outputs.
  property price 5.81533 EUR2005; name bronze_price_EUR2005
    Calculated based on inputs: The price of the product has been calculated as a sum of the values of the material and energy inputs for this product. This value is therefore a rough estimation. It may underestimate the real price since there are additional expenses when producing any product. These expences can include for example labour costs, treatment of waste materials and profit for the producer. Please consider carefully whether this level of data quality is acceptable for your application. Cross-referenced; Calculated value based on data from United Nations Commodity Trade Statistics Database (comtrade.un.org) is 2.6 Euro/kg. UN comtrade category: 740322 Copper-tin base alloys, unwrought. Year 2005. Using exchange rate of 1EURO = 1.209 USD. Average of price of import into 5 main markets (EU, US, JP, IN and CN).
  property carbon content 0
    carbon content on a dry matter basis (reserved; not for manual entry)
  properties: water content 0, carbon content, non-fossil 0, carbon content, fossil 0, water in wet mass 0 kg, wet mass 1 kg, dry mass 1 kg, carbon allocation 0 kg
- iron scrap, unsorted: 0 kg; name iron; source Pierre Fréon 2014; CPC 39310: Slag, dross, scalings and other waste from the manufacture of iron or steel; By-product classification Recyclable; pedigree (1,1,1,1,1)
  (same comment as for iron scrap, unsorted)
  production volume 0 kg; = ABS(prod_vol*iron/LSW)
    Calculated from production volume of reference product using the relative outputs.
  property price 0.149 EUR2005; name iron_price_EUR2005
    Temporary price data. Calculated as 90% of purchasers price based on: estimated at 85% of sorted scrap
  property carbon content 0
    carbon content on a dry matter basis (reserved; not for manual entry)
  properties: carbon content, non-fossil 0, dry mass 1 kg, carbon content, fossil 0, wet mass 1 kg, water in wet mass 0 kg, water content 0, carbon allocation 0 kg
- electricity, for reuse in municipal waste incineration only: 0 kWh; CPC 17100: Electrical energy; By-product classification allocatable product; pedigree (1,1,1,1,1)
  Net electricity generated from this waste and used in internal MSWI plant energy redistribution.
  Uncertainty: uncertainty is calculated from uncertainties in waste composition and uncertainties in energy efficiency and the uncertainty in internal energy demand
  property true value relation 3.6; name E_el_prod_MSWI_true_value_relation
    property to calculate "true value" from
  property exergy 3.6 MJ; name E_el_prod_MSWI_exergy
    This exergy property is based on the exergy content of the product.
  property price 0.1 EUR2005; name E_el_prod_MSWI_price_EUR2005
    Estimated to be the same price as in case of electricity, medium voltage.
- heat, for reuse in municipal waste incineration only: 0 MJ; CPC 17300: Steam and hot water; By-product classification allocatable product; pedigree (1,1,1,1,1)
  Net useful heat generated from this waste and used in internal MSWI plant energy redistribution.
  Uncertainty: uncertainty is calculated from uncertainties in waste composition and uncertainties in energy efficiency and the uncertainty in internal energy demand
  property exergy 0.1842 MJ; name E_th_prod_MSWI_exergy
    This exergy property is based on the exergy content of the product.
  property true value relation 0.1842; name E_th_prod_MSWI_true_value_relation
    property to calculate "true value" from
  property price 0.0106 EUR2005; name E_th_prod_MSWI_price_EUR2005
    Average European district heat price from Ecoheatcool and Euroheat 2005-2006, Ecoheat Work package 1: The European heat market. Final report. 10.6 EUR/GJ i s the price of district heat. http://www.solarthermalworld.org/files/Ecoheatcool%20WP1%20Web.pdf?download
- zinc concentrate: 0 kg; CPC 14290: Other non-ferrous metal ores and concentrates (other than uranium or thorium ores and concentrates); By-product classification allocatable product
  Calculated value from the knowledge of the properties of both products.
  property price 0.38 EUR2005; name ByP_price_EUR2005
    Temporary price data. Calculated as 90% of purchasers price based on: Zinc content in concentrate 53%. Concentrate price per kg Zn 86.5% of refined Zn price (13.5% treatment charges according to CHR Metals Limited 2005: Dynamic cost curves. http://www.minecost.com/dynamic.pdf). 2004 zinc price from USGS (2007) Mineral commodity summaries 2007. <http://minerals.usgs.gov/minerals/pubs/mcs/2007/mcs2007.pdf> [Accessed 25 May 2010]
  property zinc content 0.53; name zinc_C_zinc_concentrate
    Zinc content on a dry matter basis. Value taken from teh "zinc mine operation" /GLO dataset.
  property dry mass 1 kg; name DM_zinc_concentrate
  property carbon content 0
    carbon content on a dry matter basis (reserved; not for manual entry)
  properties: wet mass 1 kg, water content 0, carbon content, non-fossil 0, carbon content, fossil 0, water in wet mass 0 kg, carbon allocation 0 kg
- copper: 0 kg; source Rentz O. 1999; By-product classification allocatable product; CPC 41413: Refined copper and copper alloys, unwrought; master alloys of copper
  Literature value. Copper uses: Before end-use copper is manufactured into semi fabricated products, such as shapes and ingots (known as 'semis'). These manufacturing processes are subdivided into hot working, cold working and, if necessary, process annealing. Few of the semis are ready for use as such. They more typically travel to first-stage manufacturers, who make metal rods, wire, and casting, and then to component manufacturers who produce such things as motors, valves, and insulated cables The components in turn are incorporated by final-stage manufacturers into a variety of finished products - automobiles, commercial buildings, residential housing, and so forth. These uses account for about 79% of the world-wide consumption of copper.
  property price 5.52 EUR2005
    Literature value (http://www.economist.com/news/business/21576714-mining-industry-has-enriched-chile-its-future-precarious-copper-solution). Average price between 20015 and 2013.
  property carbon content 0
    carbon content on a dry matter basis (reserved; not for manual entry)
  properties: dry mass 1 kg, water in wet mass 0 kg, wet mass 1 kg, carbon content, non-fossil 0, water content 0, carbon content, fossil 0, carbon allocation 0 kg

## Inputs from technosphere
All rows: source Pierre Fréon 2014
- waste plastic, mixture: 0 kg; name nylon; pedigree (1,1,1,1,1)
  Nylon recycled from fishing gear
  Uncertainty: Based on assumptions
  production volume 0 kg; = ABS(prod_vol*nylon/LSW)
    Calculated from production volume of reference product using the relative outputs.
  property price 0 EUR2005; name nylon_price_EUR2005
  properties: wet mass 1 kg, carbon content, fossil 0.637168, water content 0.180638, dry mass 0.847 kg
- waste textile, soiled: 0 kg; name caulking; pedigree (1,1,1,1,1)
  Waste caulking (cotton + epoxy resin)
  Uncertainty: Based on assumptions
  production volume 0 kg; = ABS(prod_vol*caulking/LSW)
    Calculated from production volume of reference product using the relative outputs.
  property price 0 EUR2005; name caulking_price_EUR2005
  properties: dry mass 0.75 kg, wet mass 1 kg, carbon content, non-fossil 0.570519, water content 0.333333
- waste polyethylene: 0 kg; name poly; pedigree (1,1,1,1,1)
  LDPE recycled from fishing gear
  Uncertainty: Based on assumptions
  production volume 0 kg; = ABS(prod_vol*poly/LSW)
    Calculated from production volume of reference product using the relative outputs.
  property price 0 EUR2005; name poly_price_EUR2005
  properties: dry mass 0.996 kg, water content 0.00401606, wet mass 1 kg, carbon content, fossil 0.825301
  note on carbon content, fossil: C content in 1 kg DM was calculated using data in Tab A.1, ecoinvent v2.2 report 13_I
- waste wood, untreated: 0 kg; name wood; pedigree (1,1,1,1,1)
  Wood recycled from hull
  Uncertainty: Assumptions on recycling
  production volume 0 kg; = ABS(prod_vol*wood/LSW)
    Calculated from production volume of reference product using the relative outputs.
  property price 0 EUR2005; name wood_price_EUR2005
  properties: carbon content, non-fossil 0.48632, wet mass 1 kg, dry mass 0.8 kg, water content 0.25
- waste paint on wood: 0 kg; name paint; pedigree (1,1,1,1,1)
  Waste paint scrapped from hull
  Uncertainty: Base on assumptions
  production volume 0 kg; = ABS(prod_vol*paint/LSW)
    Calculated from production volume of reference product using the relative outputs.
  property price 0 EUR2005; name paint_price_EUR2005
  properties: dry mass 1 kg, wet mass 1 kg, carbon content, fossil 0.65
- zinc in car shredder residue: 0 kg; name zinc; pedigree (1,1,1,1,1)
  Recycled zinc pieces
  Uncertainty: Based on assumptions
  production volume 0 kg; = ABS(prod_vol*zinc/LSW)
    Calculated from production volume of reference product using the relative outputs.
  property price 0 EUR2005; name zinc_price_EUR2005
  properties: dry mass 1 kg, wet mass 1 kg
- copper scrap, sorted, pressed: 0 kg; name copper; pedigree (1,1,1,1,1)
  Copper recycled from electric circuit
  Uncertainty: Based on assumptions
  production volume 0 kg; = ABS(prod_vol*copper/LSW)
    Calculated from production volume of reference product using the relative outputs.
  property price 2.84 EUR2005; name copper_price_EUR2005
  properties: dry mass 1 kg, wet mass 1 kg
- lead in car shredder residue: 0 kg; name lead; pedigree (1,1,1,1,1)
  Proxy for lead recycled from fishing gear
  Uncertainty: Based on assumptions
  production volume 0 kg; = ABS(prod_vol*lead/LSW)
    Calculated from production volume of reference product using the relative outputs.
  property price 0 EUR2005; name lead_price_EUR2005
  properties: dry mass 1 kg, wet mass 1 kg
- waste plastic, mixture: 0, 0, 0, 0, 0 kg (5 entries); pedigree (1,1,1,1,1)
  Nylon recycled from fishing gear
  Uncertainty: Based on assumptions
- waste polyethylene: 0, 0, 0, 0, 0 kg (5 entries); pedigree (1,1,1,1,1)
  LDPE recycled from fishing gear
  Uncertainty: Based on assumptions
- waste wood, untreated: 0, 0, 0, 0, 0 kg (5 entries); pedigree (1,1,1,1,1)
  Wood recycled from hull
  Uncertainty: Assumptions on recycling
- marine electric motor: 1.32419e-7 unit
  Electric motors and pumps
- cast iron: 0.000225395 kg; triangular min 0.000225395, mostLikely 0.000225395, max 0.000225395, pedigree (3,3,1,1,1)
  Anchor
  Uncertainty: Based on data from 10 vessels
- lead: 0.000901579 kg; triangular min 0.000901579, mostLikely 0.000901579, max 0.000901579, pedigree (2,3,1,1,1)
  Fishing net construction
  Uncertainty: Based on data from 10 vessels
- zinc: 8.4523e-5 kg; triangular min 8.4523e-5, mostLikely 8.4523e-5, max 8.4523e-5, pedigree (3,3,1,1,1)
  Zinc pieces
  Uncertainty: Based on data from 10 vessels, including dimensions/LSW from >600 vessels
- wire drawing, copper: 0.000563487 kg; triangular min 0.000563487, mostLikely 0.000563487, max 0.000563487, pedigree (2,3,2,3,2)
  Manufacture of copper wire
  Uncertainty: Based on 8 different estimations based on reports, shipyard work orders, invoices, etc.
- alkyd paint, white, without solvent, in 60% solution state: 0.00019722, 0.00019722 kg (2 entries); triangular min 0.00019722, mostLikely 0.00019722, max 0.00019722, pedigree (3,3,1,5,1)
  Paint and antifouling paint
  Uncertainty: Based on data from 10 vessels, including dimensions/LSW from >600 vessels
- sawnwood, board, hardwood, dried (u=20%), planed: 0.000378945 m3; triangular min 0.000378945, mostLikely 0.000378945, max 0.000378945, pedigree (3,3,1,1,1)
  Hull
  Uncertainty: Based on data from 10 vessels, including dimensions/LSW from >600 vessels. Density of wood: 640 kg/m3, ecoinvent dataset information (UPR): planing, board, hardwood, u=20%, GLO
- steel, low-alloyed: 0.03071 kg; triangular min 0.03071, mostLikely 0.03071, max 0.03071, pedigree (3,3,1,1,1)
  Structural elements, keel lining, bolts, rigging
  Uncertainty: Based on data from 10 vessels, including dimensions/LSW from >600 vessels
- used purse seiner, wood: -0.281819 kg
  EOL of a wooden purse seiner, per 1000 kg of light ship weight (LSW), at the end of its lifetime. Regressions based on mainly primary data were created to relate the weight of each inventory item to a purse seiner's LSW. The list of inventory items (granularity) contribute >95% of environmental impacts, as described in the reference publication. Includes engines and motors
  production volume 0.0871654 kg
- metal working, average for steel product manufacturing: 0.0310199 kg
  Steel hull + transmission construction, structural elements
- bronze: 5.63487e-5 kg; triangular min 5.63487e-5, mostLikely 5.63487e-5, max 5.63487e-5, pedigree (3,3,1,1,1)
  Fishing net construction
  Uncertainty: Based on data from 10 vessels
- copper: 0.000563487 kg
  Copper wire for electric circuit construction, 50% recycled
- polyethylene, low density, granulate: 0.000169046 kg; triangular min 0.000169046, mostLikely 0.000169046, max 0.000169046, pedigree (2,3,1,1,1)
  Fishing net construction
  Uncertainty: Based on data from 10 vessels
- epoxy resin insulator, SiO2: 5.63487e-5 kg; triangular min 5.63487e-5, mostLikely 5.63487e-5, max 5.63487e-5, pedigree (3,3,1,1,1)
  Caulking
  Uncertainty: Based on data from 10 vessels, including dimensions/LSW from >600 vessels
- marine engine: 1.32419e-6 unit; triangular min 1.32419e-6, mostLikely 1.32419e-6, max 1.32419e-6, pedigree (2,3,1,1,1)
  Marine diesel engine
  Uncertainty: Based on data from 10 vessels, including engines from >600 vessels
- fibre, cotton: 0.000169046 kg; triangular min 0.000169046, mostLikely 0.000169046, max 0.000169046, pedigree (3,3,1,1,1)
  (same comment as for epoxy resin insulator, SiO2)
- nylon 6-6: 0.00225395 kg; triangular min 0.00225395, mostLikely 0.00225395, max 0.00225395, pedigree (2,3,1,1,1)
  Fishing net construction
  Uncertainty: Based on data from 10 vessels
- nylon 6-6: 0.00225395 kg; triangular min 0.00225395, mostLikely 0.00225395, max 0.00225395, pedigree (2,3,1,5,1)
  Fishing net construction
  Uncertainty: Based on data from 10 vessels
