# offset printing, per kg printed paper

Dataset: EcoSpold 2, unit process
Geography: RoW
Time period: 2007-01-01 to 2019-12-31
Technology level: current
Classification: ISIC rev.4 ecoinvent: 1811:Printing
Classification: EcoSpold01Categories: electronics/services
Scenario: Business-as-Usual
System model: Allocation at the point of substitution
Generated by: Cornelia Stettler
Database: ecoinvent
isCopyrightProtected: false
accessRestrictedTo: 1

## General comment
The data set for offset printing is calculated from the annual material and energy consumption of three Swiss companies using modern technologies with low VOC use (solvents and cleaners). The dataset refers to 1 kg of the final product leaving the company and includes all paper loss from the preparation and further processings of print products (about 28% paper loss). A life span of 10 years was assumed for the machinery except for walves. VOC-emissions were calculated from the mass balance input minus recovery of VOC.

## Included activities start
The activity starts with the reception of materials for the printing process including paper, colours, machine and auxiliary materials as for example cleaners, printing plates and textiles.

## Included activities end
The activity offset printing ends with the packaging of final product at plant.The dataset incudes the consumption of paper, printing materials and processing elements, materials of printer systems, the energy comsumption of the offset printing company, the delivery of used materials from supplier, the VOC emissions from the printing process and the amount of waste waste paper, waste packaging board, waste paints and used solvent mixtures from the printing process. The dataset doesn't include the delivery of the final product to the client and its final disposal.

## Geography
The data is based on information from three average Swiss companies.

## Technology
The dataset refers to the present technology for low VOC use in offset print and to the average production of printed products. Data is not valid for special applications as newspapers, packaging and books.

## Reference product
- printed paper, offset: 1 kg; CPC 32690: Other printed matter; By-product classification allocatable product
  technology with low VOC-use
  production volume 3.59194e10 kg
    Printing and Writing Papers Association:Total paper supply 2006 112 Million tons of paper with 40.4% coated woodfree paper corresponding to 44.9 Million tons of paper. 20% assumed for digital and 80% for conventional print media (US statistics 2012, assumed valid for world average)
  property carbon content, non-fossil 0.378026
    Biogenic C content was calculated after biogenic C contents of chemicals used in the production of the paper (in Tab 8.2 ecoinvent v2.2 report 11_III, part 8). The cellulose content in 1 kg of paper (on a wet mas basis) was estimated as (1-chemical content), C content of cellulose was considered 0.44 kgC/kg dry mass (ecoinvent v2.2 report, n 15a, pg 40)
  property carbon content, fossil 0.0116283
    Fossil C content was calculated after fossil C contents of chemicals used in the production of the paper (in Tab 8.2 ecoinvent v2.2 report 11_III, part 8).
  property price 12.9 EUR2005
    At P4P a study from Kodak is mentioned (http://p4psuites.blogspot.ch/2010/08/average-selling-price-for-offset-press.html) in which it gives an average selling price of offset press prints of 6-10 cents per page, including a profit of 1-4%. Assumption: paper is A4 and has density of 100g/m2
  property carbon content 0.389654
    carbon content on a dry matter basis (reserved; not for manual entry)
  property true value 12.9
    allocation property applied in "true value" allocation // value calculated from revenue
  properties: water in wet mass 0.055 kg, wet mass 1 kg, water content 0.0582011, dry mass 0.945 kg, carbon allocation 0.368223 kg

## By-products
- waste paperboard, sorted: 0 kg; CPC 39240: Waste and scrap of paper or paperboard; By-product classification Recyclable; pedigree (1,1,1,1,1)
  It is assumed that 86.3% (wet weight) of waste paperboard, unsorted is segregated to waste paperboard, sorted. Waste paper, sorted is later used in recycling industry where maximum 79% of it, is transformed into new paperboard.
  production volume 2.73407e9 kg
  property price 0.0436 EUR2005; name ByP_waste_paperboard_sorted_price_EUR200
    Estimated value; three different sources were used to determine the price for waste paperboard, sorted. 35 AUD/tonne (http://larimer.org/solidwaste/charts/Current.htm, accessed 20130328), 70 GBP/tonne (http://www.letsrecycle.com/prices/waste%20paper, accessed 20130328) and 20 USD/tonne (http://www.oxpaperboard.com/1/post/2013/03/ox-paperboard-announces-price-adjustment-to-uncoated-recycled-paperboard.html, accessed 20130328).
  property water content 0.243781; = WWM_waste_paperboard_sorted/ DM_waste_paperboard_sorted
  property water in wet mass 0.196 kg; name WWM_waste_paperboard_sorted; = WM_waste_paperboard_sorted- DM_waste_paperboard_sorted
  property dry mass 0.804 kg; name DM_waste_paperboard_sorted
  property wet mass 1 kg; name WM_waste_paperboard_sorted
  property carbon content 0.483259
    carbon content on a dry matter basis (reserved; not for manual entry)
  property true value 0.00331868
    allocation property applied in "true value" allocation // value calculated from revenue
  properties: carbon content, non-fossil 0.483259, carbon content, fossil 0, carbon allocation 0.38854 kg
- electricity, for reuse in municipal waste incineration only: 0 kWh; CPC 17100: Electrical energy; By-product classification allocatable product; pedigree (1,1,1,1,1)
  Net electricity generated from this waste and used in internal MSWI plant energy redistribution.
  Uncertainty: uncertainty is calculated from uncertainties in waste composition and uncertainties in energy efficiency and the uncertainty in internal energy demand
  production volume 5.58432e7 kWh
  property true value relation 3.6; name E_el_prod_MSWI_true_value_relation
    property to calculate "true value" from
  property exergy 3.6 MJ; name E_el_prod_MSWI_exergy
    This exergy property is based on the exergy content of the product.
  property price 0.1 EUR2005; name E_el_prod_MSWI_price_EUR2005
    Estimated to be the same price as in case of electricity, medium voltage.
  property true value 0.000149348
    allocation property applied in "true value" allocation // value calculated from true value relation
- heat, for reuse in municipal waste incineration only: 0 MJ; CPC 17300: Steam and hot water; By-product classification allocatable product; pedigree (1,1,1,1,1)
  Net useful heat generated from this waste and used in internal MSWI plant energy redistribution.
  Uncertainty: uncertainty is calculated from uncertainties in waste composition and uncertainties in energy efficiency and the uncertainty in internal energy demand
  production volume 4.03614e8 MJ
  property true value relation 0.1842; name E_th_prod_MSWI_true_value_relation
    property to calculate "true value" from
  property exergy 0.1842 MJ; name E_th_prod_MSWI_exergy
    This exergy property is based on the exergy content of the product.
  property price 0.0106 EUR2005; name E_th_prod_MSWI_price_EUR2005
    Average European district heat price from Ecoheatcool and Euroheat 2005-2006, Ecoheat Work package 1: The European heat market. Final report. 10.6 EUR/GJ i s the price of district heat. http://www.solarthermalworld.org/files/Ecoheatcool%20WP1%20Web.pdf?download
  property true value 5.5152e-5
    (same comment as for electricity, for reuse in municipal waste incineration only)
- zinc concentrate: 0 kg; CPC 14290: Other non-ferrous metal ores and concentrates (other than uranium or thorium ores and concentrates); By-product classification allocatable product
  Calculated value from the knowledge of the properties of both products.
  production volume 1792.2 kg
  property price 0.38 EUR2005; name ByP_price_EUR2005
    Temporary price data. Calculated as 90% of purchasers price based on: Zinc content in concentrate 53%. Concentrate price per kg Zn 86.5% of refined Zn price (13.5% treatment charges according to CHR Metals Limited 2005: Dynamic cost curves. http://www.minecost.com/dynamic.pdf). 2004 zinc price from USGS (2007) Mineral commodity summaries 2007. <http://minerals.usgs.gov/minerals/pubs/mcs/2007/mcs2007.pdf> [Accessed 25 May 2010]
  property zinc content 0.53; name zinc_C_zinc_concentrate
    Zinc content on a dry matter basis. Value taken from teh "zinc mine operation" /GLO dataset.
  property dry mass 1 kg; name DM_zinc_concentrate
  property carbon content 0
    carbon content on a dry matter basis (reserved; not for manual entry)
  property true value 9.1604e-9
    allocation property applied in "true value" allocation // value calculated from revenue
  properties: wet mass 1 kg, water content 0, carbon content, non-fossil 0, carbon content, fossil 0, water in wet mass 0 kg, carbon allocation 0 kg
- iron scrap, sorted, pressed: 0 kg; By-product classification Recyclable; CPC 39310: Slag, dross, scalings and other waste from the manufacture of iron or steel; pedigree (1,1,1,1,1)
  Iron scrap recovered from this waste.
  production volume 606032 kg
  property price 0.175 EUR2005
    Temporary price data. Calculated as 90% of purchasers price based on: 2005 import and export prices (total trades (USD) divided by total weight (kg) in biggest economies of the world: EU27, USA, Brasil, China, India, Japan and Russia) from UN Commodity Trade Statistics Database (http://data.un.org/Explorer.aspxDatabase [Accessed 2011.06.20]). Commodity: Waste or scrap, of cast iron
  property carbon content 0
    carbon content on a dry matter basis (reserved; not for manual entry)
  property true value 2.22241e-6
    allocation property applied in "true value" allocation // value calculated from revenue
  properties: water content 0, water in wet mass 0 kg, carbon content, fossil 0, dry mass 1 kg, carbon content, non-fossil 0, wet mass 1 kg, carbon allocation 0 kg
- core board: 0 kg; CPC 321: Pulp, paper and paperboard; By-product classification allocatable product
  EcoSpold01Location=RER
  production volume 5.75438 kg
  property carbon content, non-fossil 0.430314
    Biogenic C content was calculated after biogenic C contents of chemicals used in the production of board (ecoinvent v2.2 report 11_III, part 13). The cellulose content in 1 kg of paper (on a wet mas basis) was estimated as (1-chemical content), C content of cellulose was considered 0.44 kgC/kg dry mass (ecoinvent v2.2 report, n 15a, pg 40)
  property price 0.598 EUR2005
    Export prices for the World+ according to: http://faostat.fao.org/site/626/DesktopDefault.aspx?PageID=626#ancor downloaded 28 April 2009; calculated as export value divided by export volume.
  property carbon content, fossil 0
    Fossil C content was calculated after fossil C contents of chemicals used in the production of board (ecoinvent v2.2 report 11_III, part 13).
  property carbon content 0.430314
    carbon content on a dry matter basis (reserved; not for manual entry)
  property true value 2.87189e-11
    allocation property applied in "true value" allocation // value calculated from revenue
  properties: dry mass 0.945 kg, water in wet mass 0.055 kg, wet mass 1 kg, water content 0.0582011, carbon allocation 0.406646 kg
- residual wood, dry: 0 m3; CPC 39283: Non-agglomerated wood waste and scrap; By-product classification allocatable product; pedigree (1,1,1,1,1)
  Emission factor from DS on heat generation from industrial residual wood mulitplied by the input of wood fuel (direct wood fuel plus production residues)
  production volume 464936 m3
  property price 26.9 EUR2005; name w_chips_price_EUR2005
    Temporary price data. Calculated as 90% of purchasers price based on: 2004 prices for World Import/Export (USD/cubicmeter) from FaoStat (http://faostat.fao.org/site/626/default.aspx#ancor, [accessed 10th June 2010]) Commodity: 'Chips and Particles' assuming this is for air-dry chips (10% water on a dry matter basis at 650 kg/m3) and no price difference for water content (i.e. assuming air-drying).
  property carbon content 0.494
    carbon content on a dry matter basis (reserved; not for manual entry)
  property true value 0.000104379
    allocation property applied in "true value" allocation // value calculated from revenue
  properties: wet mass 632.5 kg, carbon content, fossil 0, dry mass 550 kg, carbon content, non-fossil 0.494, water content 0.15, water in wet mass 82.5 kg, carbon allocation 271.7 kg
- bark chips, wet, measured as dry mass: 0 kg; By-product classification allocatable product; CPC 31230: Wood in chips or particles; pedigree (1,1,1,1,1)
  bark from debarking of logs, not used energetically
  production volume 2.17285e7 kg
  property price 0.034 EUR2005; name w_bark_price_EUR2005
    Expert judgement (Urs Luginbühl, Swiss Sawmilling industry, personal communication in June 2014). Cross-reference; FAOSTAT database; http://faostat.fao.org/site/626/DesktopDefault.aspx?PageID=626#ancor; Average import/export prices of EU for 'chips and particles'. Price: 48.76 Euro/m3. The density of the wood chips is 650 kg/m3. The price is calculated to be 0.075 EUR/kg.
  property carbon content 0.494
    carbon content on a dry matter basis (reserved; not for manual entry)
  property true value 6.16562e-6
    allocation property applied in "true value" allocation // value calculated from revenue
  properties: carbon content, fossil 0, dry mass 1 kg, carbon content, non-fossil 0.494, wet mass 2.4 kg, water in wet mass 1.4 kg, water content 1.4, carbon allocation 0.494 kg
- fibreboard, soft: 0 m3; CPC 31449: Other fibreboard; By-product classification allocatable product
  production volume 1.35803e7 m3
  property dry mass 150.62 kg; name DM_FB; = WM_FB - WiWM_FB
  property price 148 EUR2005
    (same comment as for core board)
  property water in wet mass 8.38 kg; name WiWM_FB
  property wet mass 159 kg; name WM_FB
  property carbon content, non-fossil 0.461793; = 140.8*0.494/DM_FB
    wood content converted to carbon, divided by dry mass
  property water content 0.0556367; = WiWM_FB/DM_FB
  property carbon content 0.475101
    carbon content on a dry matter basis (reserved; not for manual entry)
  property true value 0.0167741
    allocation property applied in "true value" allocation // value calculated from revenue
  properties: carbon content, fossil 0.0133086, carbon allocation 71.5597 kg
- biogas: 0 m3; source Raboni, Massimo 2014; By-product classification allocatable product; CPC 17200: Coal gas, water gas, producer gas and similar gases, other than petroleum gases and other gaseous hydrocarbons; pedigree (1,1,1,1,1)
  An average yield of 100 litres of biogas per kg biowaste is assumed
  production volume 31041.8 m3
  property price 0.109 EUR2005; name biogas_yield_price_EUR2005
    Temporary price data. Calculated as 90% of purchasers price based on: Same prices per energy output as natural gas, based on the proportional lower heating value (2/3 that of natural gas)
  property carbon content, non-fossil 0.449939
    Total C content in kg/Nm3 (Tab 12.8, ecoinvent v2.2 report n17), referred to 1kg DM
  property carbon content 0.449939
    carbon content on a dry matter basis (reserved; not for manual entry)
  property true value 2.82385e-8
    allocation property applied in "true value" allocation // value calculated from revenue
  properties: water in wet mass 0 kg, wet mass 1.15 kg, carbon content, fossil 0, lower heating value 0 MJ/Nm3, water content 0, dry mass 1.15 kg, carbon allocation 0.51743 kg
- compost: 0 kg; CPC 391: Wastes from food and tobacco industry; By-product classification allocatable product; pedigree (1,1,1,1,1)
  EcoSpold01Location=CH
  Biowaste is reduced in mass by a factor of 2 during composting
  production volume 395464 kg
  property water in wet mass 0.472 kg; name Water_in_wet_mass_compost; = 1- DM_compost
  property price 0.03 EUR2005
    Temporary price data. Calculated as 90% of purchasers price based on: Estimation done using the following sources: <http://www.wmaa.asn.au/uploads/documents/MarkWinser_1May2007.pdf>; <http://www.swlf.ait.ac.th/UpdData/International/Composting%20and%20anaerobic%20digestion_%20comparions%20for%20Europe%20and%20Asia.pdf>; <http://www.epa.gov/osw/conserve/rrr/composting/basic.htm>, accessed 2011.06.16
  property carbon content, non-fossil 0.1165
    calculation: dry matter 50%, organic matter 40% of dry matter, C content calculated from organic matter divided by 1.72. Relative to dry matter; relative to fresh matter: divided by 2 => 0.1156
  property dry mass 0.528 kg; name DM_compost
  property water content 0.893939; name Water_content_compost; = Water_in_wet_mass_compost/DM_compost
  property concentration, cadmium 0 kg/kg; name Mass_compost_concentration_Cd; = Mass_biowaste_concentration_Cd*2
    Biowaste mass is reduced by a factor of two during composting, therefore concentration is doubled
  property humus equivalent 0.061 kg
    Humus building fraction expressed in kg per kg product on a FM basis. Humus denotes the converted, primary biomass from plants or animals in the ground. More information can be found in the documentation of the composting itself: "treatment of biowaste, industrial composting".
  property concentration, copper 0 kg/kg; name Mass_compost_concentration_Cu; = Mass_biowaste_concentration_Cu*2
    (same comment as for compost)
  property concentration, calcium 0 kg/kg; name Mass_compost_Ca_concentration; = Mass_biowaste_concentration_Ca*2
    (same comment as for compost)
  property concentration, magnesium 0 kg/kg; name Mass_compost_Mg_concentration; = Mass_biowaste_concentration_Mg*2
    (same comment as for compost)
  property concentration, mercury 0 kg/kg; name Mass_compost_Hg_concentration; = Mass_biowaste_concentration_Hg*2
    (same comment as for compost)
  property concentration, lead 0 kg/kg; name Mass_compost_concentration_Pb; = Mass_biowaste_concentration_Pb*2
    (same comment as for compost)
  property concentration, nickel 0 kg/kg; name Mass_compost_Ni_concentration; = Mass_biowaste_concentration_Ni*2
    (same comment as for compost)
  property concentration, phosphorus 0 kg/kg; name Mass_compost_P_concentration; = Mass_biowaste_concentration_P*2
    (same comment as for compost)
  property concentration, sulfur 0 kg/kg; name Mass_compost_concentration_S; = Mass_biowaste_concentration_S*2
    (same comment as for compost)
  property concentration, potassium 0 kg/kg; name Mass_compost_K_concentration; = Mass_biowaste_concentration_K*2
    (same comment as for compost)
  property nickel content 1.60606e-5; name Mass_compost_Ni_content; = Mass_biowaste_Ni_content/0.5*( DM_biowaste / DM_compost)
    nickel content on a dry matter basis
  property concentration, nitrogen 0 kg/kg; = Mass_biowaste_concentration_N*2
    (same comment as for compost)
  property concentration, zinc 0 kg/kg; name Mass_compost_concentration_Zn; = Mass_biowaste_concentration_Zn*2
    (same comment as for compost)
  property lead content 2.66667e-5; name Mass_compost_Pb_content; = Mass_biowaste_Pb_content/0.5*( DM_biowaste / DM_compost)
    lead content on a dry matter basis
  property copper content 3.81818e-5; name Mass_compost_Cu_content; = Mass_biowaste_Cu_content/0.5*( DM_biowaste / DM_compost)
    copper content on a dry matter basis
  property cadmium content 2.89394e-7; name Mass_compost_Cd_content; = Mass_biowaste_Cd_content/0.5*( DM_biowaste / DM_compost)
    cadmium content on a dry matter basis
  property nitrogen content 0.0136364; name Mass_compost_N_content; = Mass_biowaste_N_content/0.5*( DM_biowaste / DM_compost)
    nitrogen content on a dry matter basis
  property magnesium content 0.00525758; name Mass_compost_Mg_content; = Mass_biowaste_Mg_content/0.5*( DM_biowaste / DM_compost)
    magnesium content on a dry matter basis
  property zinc content 0.000120303; name Mass_compost_Zn_content; = Mass_biowaste_Zn_content/0.5*( DM_biowaste / DM_compost)
    zinc content on a dry matter basis
  property potassium content 0.0099697; name Mass_compost_K_content; = Mass_biowaste_K_content/0.5*( DM_biowaste / DM_compost)
    potassium content on a dry matter basis
  property sulfur content 0.00190909; name Mass_compost_S_content; = Mass_biowaste_S_content/0.5*( DM_biowaste / DM_compost)
    sulfur content on a dry matter basis
  property calcium content 0.0504545; name Mass_compost_Ca_content; = Mass_biowaste_Ca_content/0.5*( DM_biowaste / DM_compost)
    calcium content on a dry matter basis
  property mercury content 1e-7; name Mass_compost_Hg_content; = Mass_biowaste_Hg_content/0.5*( DM_biowaste / DM_compost)
    mercury content on a dry matter basis
  property phosphorus content 0.00275758; name Mass_compost_P_content; = Mass_biowaste_P_content/0.5*( DM_biowaste / DM_compost)
    phosphorus content on a dry matter basis
  property carbon content 0.1165
    carbon content on a dry matter basis (reserved; not for manual entry)
  property true value 9.90139e-8
    allocation property applied in "true value" allocation // value calculated from revenue
  properties: carbon content, fossil 0, wet mass 1 kg, carbon allocation 0.061512 kg
- copper: 0 kg; source Rentz O. 1999; By-product classification allocatable product; CPC 41413: Refined copper and copper alloys, unwrought; master alloys of copper
  Literature value. Copper uses: Before end-use copper is manufactured into semi fabricated products, such as shapes and ingots (known as 'semis'). These manufacturing processes are subdivided into hot working, cold working and, if necessary, process annealing. Few of the semis are ready for use as such. They more typically travel to first-stage manufacturers, who make metal rods, wire, and casting, and then to component manufacturers who produce such things as motors, valves, and insulated cables The components in turn are incorporated by final-stage manufacturers into a variety of finished products - automobiles, commercial buildings, residential housing, and so forth. These uses account for about 79% of the world-wide consumption of copper.
  production volume 18115.6 kg
  property price 5.52 EUR2005
    Literature value (http://www.economist.com/news/business/21576714-mining-industry-has-enriched-chile-its-future-precarious-copper-solution). Average price between 20015 and 2013.
  property carbon content 0
    carbon content on a dry matter basis (reserved; not for manual entry)
  property true value 2.20193e-6
    allocation property applied in "true value" allocation // value calculated from revenue
  properties: dry mass 1 kg, water in wet mass 0 kg, wet mass 1 kg, carbon content, non-fossil 0, water content 0, carbon content, fossil 0, carbon allocation 0 kg
- iron scrap, unsorted: 0 kg; source European Aluminium Association 2008; CPC 39310: Slag, dross, scalings and other waste from the manufacture of iron or steel; By-product classification Recyclable; pedigree (1,1,1,1,1)
  production volume 16.192 kg
  property price 0.149 EUR2005; name ironScrapAmount_price_EUR2005
    Temporary price data. Calculated as 90% of purchasers price based on: estimated at 85% of sorted scrap
  property carbon content 0
    carbon content on a dry matter basis (reserved; not for manual entry)
  property true value 5.3125e-11
    allocation property applied in "true value" allocation // value calculated from revenue
  properties: water in wet mass 0 kg, water content 0, carbon content, fossil 0, carbon content, non-fossil 0, dry mass 1 kg, wet mass 1 kg, carbon allocation 0 kg
- aluminium oxide, non-metallurgical: 0 kg; source European Aluminium Association 2008; CPC 41432: Alumina (aluminium oxide), except artificial corundum; By-product classification allocatable product; CAS 1344-28-1; pedigree (1,1,1,1,1)
  production volume 1018.9 kg
  property carbon content, non-fossil 0; name C_content_non_fossil
  property price 0.28 EUR2005; name Al2O3Amount_price_EUR2005
    From UN trade database. http://data.un.org/ Import data from the largest economies of the world are used (Brazil, India, USA, China, Japan and EU-27).
  property dry mass 1 kg; name DM
  property water content 0; name water_content
  property wet mass 1 kg; name WM
  property water in wet mass 0 kg; name WWM
  property carbon content, fossil 0; name C_content_fossil
  property carbon content 0
    carbon content on a dry matter basis (reserved; not for manual entry)
  property true value 6.28206e-9
    allocation property applied in "true value" allocation // value calculated from revenue
  properties: carbon allocation 0 kg
- aluminium, cast alloy: 0 kg; source European Aluminium Association 2008; By-product classification allocatable product; CPC 41431: Unwrought aluminium; pedigree (1,1,1,1,1)
  EcoSpold01Location=RER
  production volume 9524.5 kg
  property price 1.3 EUR2005; name castAlloyAmount_price_EUR2005
    Temporary price data. Calculated as 90% of purchasers price based on: Source: London Metal Exchange, Aluminium alloy price for 2005
  property carbon content 0
    carbon content on a dry matter basis (reserved; not for manual entry)
  property true value 2.72644e-7
    allocation property applied in "true value" allocation // value calculated from revenue
  properties: water in wet mass 0 kg, carbon content, non-fossil 0, water content 0, dry mass 1 kg, carbon content, fossil 0, wet mass 1 kg, carbon allocation 0 kg
- aluminium, wrought alloy: 0 kg; source European Aluminium Association 2008; By-product classification allocatable product; CPC 4153: Semi-finished products of aluminium or aluminium alloys; pedigree (1,1,1,1,1)
  production volume 4169.64 kg
  property price 1.44 EUR2005; name secondaryAluminiumOutput_price_EUR2005
  properties: wet mass 1 kg, water content 0, carbon content, fossil 0, water in wet mass 0 kg, carbon content, non-fossil 0, dry mass 1 kg, carbon content 0, carbon allocation 0 kg, true value 1.32212e-7
- gypsum fibreboard: 0 kg; CPC 37530: Articles of plaster or of compositions based on plaster; By-product classification allocatable product
  EcoSpold01Location=CH
  production volume 5.75438 kg
  property price 1.77 EUR2005
    Calculated by 2.o-The production volume of this product is small compared to other products supplied by the activities within the same ISIC 3 category. Therefore, an average price of products supplied by the activities in the same ISIC 3 code has been applied.This price is obtained as '_45 Glass, mineral wool and ceramic goods, virgin, EU27' in the 'EU & DK Input Output Database' (available in SimaPro). The price is assumed to be valid for both RER2003, RER 2004, world 2003 and world 2004.
  property carbon content, fossil 0
    Gypsum (CaSO4-2H2O) with 15-20% cellulose fibres (ecoinvent v2.2 report 7, part VIII, pg 5). C-content/dry mass of natural fibres was considered 46% (from "Evolutionary and Biochemical Aspects", A.D. Kay and T. Vrede (in Global Ecology, 2010, Elsevier B.V., S.E. Jørgensen Ed.))
  property carbon content, non-fossil 0.0805
    (same comment as for gypsum fibreboard)
  property carbon content 0.0805
    carbon content on a dry matter basis (reserved; not for manual entry)
  property true value 8.5004e-11
    allocation property applied in "true value" allocation // value calculated from revenue
  properties: water content 0, water in wet mass 0 kg, dry mass 1 kg, wet mass 1 kg, carbon allocation 0.0805 kg
- tissue paper: 0 kg; By-product classification allocatable product; CPC 321: Pulp, paper and paperboard
  EcoSpold01Location=RER
  production volume 1.51052e10 kg
  property carbon content, non-fossil 0.36169
    Biogenic C content was calculated after biogenic C contents of chemicals used in the production of the paper (in Tab 8.86 ecoinvent v2.2 report 11_III, part 8). The cellulose content in 1 kg of paper (on a wet mas basis) was estimated as (1-chemical content), C content of cellulose was considered 0.44 kgC/kg dry mass (ecoinvent v2.2 report, n 15a, pg 40)
  property price 1.34 EUR2005
    Calculated based on literature values. The price of 1 kg of tissue paper is calculated to be 1.34 euro/kg. This price is calculated as a weighted average of prices calculated based on import (net trade) of this material from the world into 5 big economies; EU, Japan, China, India, USA. The net weight and the trade value is obtained from the UN Comtrade database (average of commodity no. 730830 Doors, windows, frames of iron or steel and commodity no. 481820 Paper hankerchiefs, cleansing, facial tissues, towel), year 2005.
  property carbon content, fossil 2.22e-5
    Fossil C content was calculated after fossil C contents of chemicals used in the production of the paper (in Tab 8.86 ecoinvent v2.2 report 11_III, part 8).
  property carbon content 0.361712
    carbon content on a dry matter basis (reserved; not for manual entry)
  property true value 0.168927
    allocation property applied in "true value" allocation // value calculated from revenue
  properties: dry mass 0.945 kg, wet mass 1 kg, water in wet mass 0.055 kg, water content 0.0582011, carbon allocation 0.341818 kg
- graphic paper, 100% recycled: 0 kg; CPC 32129: Other uncoated paper and paperboard, of a kind used for writing, printing or other graphic purposes, and punch[…]; By-product classification allocatable product
  production volume 4.55108e9 kg
  property price 0.0976 EUR2005; name paper_price_EUR2005
    Export prices for the World+ according to: http://faostat.fao.org/site/626/DesktopDefault.aspx?PageID=626#ancor downloaded 27 April 2009; calculated as export value divided by export volume.
  property carbon content 0.43299
    carbon content on a dry matter basis (reserved; not for manual entry)
  property true value 0.0107627
    allocation property applied in "true value" allocation // value calculated from revenue
  properties: water content 0.0582011, dry mass 0.945 kg, carbon content, non-fossil 0.43296, carbon content, fossil 3e-5, wet mass 1 kg, water in wet mass 0.055 kg, carbon allocation 0.409176 kg
- deinked pulp, wet lap: 0 kg; CPC 321: Pulp, paper and paperboard; By-product classification allocatable product; pedigree (1,1,1,1,1)
  Wet lap (40% water on a wet mass basis). Initial values of this dataset were given for the production of 1 ton of wet lap pulp scaled to 10% water on a wet mass basis.
  Amount was scaled to the amount of reference product.
  production volume 6.15793e9 kg
  property water content 0.666667; name Pulp_water_content; = Pulp_WWM / Pulp_DM
  property water in wet mass 0.4 kg; name Pulp_WWM
  property carbon content, fossil 0; name Pulp_C_content_fossil
    fossil carbon content on a dry matter basis
  property wet mass 1 kg; name Pulp_WM
  property price 0.178 EUR2005; name Pulp_price_EUR2005
    Estimated value. It is estimated, that the price of the deinked pulp is 50% of the sulfate pulp.
  property dry mass 0.6 kg; name Pulp_DM; = Pulp_WM - Pulp_WWM
  property carbon content, non-fossil 0.494; name Pulp_C_content_non_fossil
    Biogenic carbon content of dry mass is 0.494 kgC/kg dry wood (ecoinvent v2.2 report 6_IX & ecoinvent v2.2 report 9). No other C containing products in the formulation of the pulp assumed.
  property carbon content 0.494
    carbon content on a dry matter basis (reserved; not for manual entry)
  property true value 0.0265589
    allocation property applied in "true value" allocation // value calculated from revenue
  properties: carbon allocation 0.2964 kg
- potassium fertiliser, as K2O: 0 kg; source CRAAQ 2010; CPC 3463: Mineral or chemical fertilizers, potassic; By-product classification allocatable product; pedigree (1,1,1,1,1)
  This is the potassium (as K2O) output (organic and mineral forms of potassium contained) from organic origin. In practice, only a part of this total amount is available to the plants and the available amount has to be calculated considering efficiency of organic potassium (to replace mineral potassium ), which also depends on many factors, such as climate, soil, crop, timing and technique of application, etc. Since this dataset includes field emissions from the application of sludge, potassium availability has been accounted for in the calculation of direct field emissions.
  Uncertainty: The uncertainty of calculated values is determined from propagation of uncertainty factors of underlying variables.
  production volume 2.39723e6 kg
  property price 0.188 EUR2005; name K2O_fertiliser_price_EUR2005
    Temporary price data. Calculated as 90% of purchasers price based on: 2004 import price calulated from FAOSTAT (http://faostat.fao.org/site/575/DesktopDefault.aspx?PageID=575#ancor [accessed 2011.01.27] Potash Fertilizers (K20 total nutrients) in kUSD/Mg
  property carbon content 0
    carbon content on a dry matter basis (reserved; not for manual entry)
  property true value 1.092e-5
    allocation property applied in "true value" allocation // value calculated from revenue
  properties: carbon content, fossil 0, dry mass 1 kg, water in wet mass 0 kg, water content 0, wet mass 1 kg, carbon content, non-fossil 0, carbon allocation 0 kg
- nitrogen fertiliser, as N: 0 kg; source CRAAQ 2010; CPC 3461: Mineral or chemical fertilizers, nitrogenous; By-product classification allocatable product; pedigree (1,1,1,1,1)
  This is the total nitrogen (as N) output (organic and mineral forms of nitrogen contained) from organic origin. In practice, only a part of this total amount is available to the plants and the available amount has to be calculated considering nitrogen efficiency (to replace mineral nitrogen), which also depends on many factors, such as climate, soil, crop, timing and technique of application, etc. Since this dataset includes field emissions from the application of sludge, nitrogen availability has been accounted for in the calculation of direct field emissions.
  Uncertainty: The uncertainty of calculated values is determined from propagation of uncertainty factors of underlying variables.
  production volume 1.48257e7 kg
  property price 0.473 EUR2005; name N_fertiliser_price_EUR2005
    Temporary price data. Calculated as 90% of purchasers price based on: 2004 prices are calculated on basis of Import/Export data (tonnes and US$) from UN Trade Statistics Database (http://data.un.org/Browse.aspx?d=ComTrade, accessed 7/7-2010). N, P2O5, or K2O content (http://www.fertilizer.org/ifa/Home-Page/STATISTICS/Conversions-factors)
  property carbon content 0
    carbon content on a dry matter basis (reserved; not for manual entry)
  property true value 0.000169915
    allocation property applied in "true value" allocation // value calculated from revenue
  properties: water content 0, wet mass 1 kg, dry mass 1 kg, carbon content, non-fossil 0, water in wet mass 0 kg, carbon content, fossil 0, carbon allocation 0 kg
- phosphate fertiliser, as P2O5: 0 kg; source CRAAQ 2010; CPC 3462: Mineral or chemical fertilizers, phosphatic; By-product classification allocatable product; pedigree (1,1,1,1,1)
  This is the total phosphate (as P2O5) output (organic and mineral forms of phosphate contained) from organic origin. In practice, only a part of this total amount is available to the plants and the available amount has to be calculated considering efficiency of organic phosphate (to replace mineral phosphate), which also depends on many factors, such as climate, soil, crop, timing and technique of application, etc. Since this dataset includes field emissions from the application of sludge, phosphate availability has been accounted for in the calculation of direct field emissions.
  Uncertainty: The uncertainty of calculated values is determined from propagation of uncertainty factors of underlying variables.
  production volume 9.9233e6 kg
  property price 0.241 EUR2005; name P2O5_fertiliser_price_EUR2005
    (same comment as for nitrogen fertiliser, as N)
  property carbon content 0
    carbon content on a dry matter basis (reserved; not for manual entry)
  property true value 5.79467e-5
    allocation property applied in "true value" allocation // value calculated from revenue
  properties: dry mass 1 kg, water content 0, carbon content, fossil 0, wet mass 1 kg, carbon content, non-fossil 0, water in wet mass 0 kg, carbon allocation 0 kg
- soil pH raising agent, as CaCO3: 0 kg; source Marianne Lemieux 2013; CPC 34659: Fertilizers n.e.c.; By-product classification allocatable product; pedigree (1,1,1,1,1)
  Calculated value of the amount of CaCO3 that can be substituted considered the liming efficiency of the sludge.
  Uncertainty: The uncertainty of calculated values is determined from propagation of uncertainty factors of underlying variables.
  production volume 2.76383e8 kg
  property carbon content, fossil 0.12; name soil_pH_raising_agent_C_content_fossil_0; = 12/(40+12+3*16)
    Stoichiometric calculation. Fossil carbon content on a dry matter basis.
  property carbon content, non-fossil 0; name soil_pH_raising_a_C_content_non_fossil_0
    biogene carbon content on a dry matter basis
  property price 0.117 EUR2005; name soil_pH_raising_agent_as_CaCO3_price_EUR
    The price is estimated to be the same as for lime.
  property carbon content 0.12
    carbon content on a dry matter basis (reserved; not for manual entry)
  property true value 0.000783524
    allocation property applied in "true value" allocation // value calculated from revenue
  properties: wet mass 1 kg, water in wet mass 0 kg, water content 0, dry mass 1 kg, carbon allocation 0.12 kg
- fibre cement roof slate: 0 kg; CPC 37540: Tiles, flagstones, bricks and similar articles, of cement, concrete or artificial stone; By-product classification allocatable product
  EcoSpold01Location=CH
  production volume 0.410253 kg
  property carbon content, non-fossil 0.01288
    Tab 5.1, ecoinvent v2.2 report 7, part IX. Fibres (pulp) 2.8%. Fibres (polyvinyl alcohol) 2.6%. C-content/dry mass of natural fibres was considered 46% (from "Evolutionary and Biochemical Aspects", A.D. Kay and T. Vrede (in Global Ecology, 2010, Elsevier B.V., S.E. Jørgensen Ed.)). C-content/dry mass of polyvinyl alcohol ((C2H4O)x) was considered =24/44.
  property carbon content, fossil 0.0141818
    Tab 5.1, ecoinvent v2.2 report 7, part IX. Fibres (pulp) 2.5%. Fibres (polyvinyl alcohol) 3.7%. C-content/dry mass of natural fibres was considered 46% (from "Evolutionary and Biochemical Aspects", A.D. Kay and T. Vrede (in Global Ecology, 2010, Elsevier B.V., S.E. Jørgensen Ed.)). C-content/dry mass of polyvinyl alcohol ((C2H4O)x) was considered =24/44.
  property carbon content 0.0270618
    carbon content on a dry matter basis (reserved; not for manual entry)
  property true value 1.75946e-11
    allocation property applied in "true value" allocation // value calculated from revenue
  properties: water content 0, water in wet mass 0 kg, wet mass 1 kg, price 1.77 EUR2005, dry mass 1 kg, carbon allocation 0.0270618 kg
- cellulose fibre, inclusive blowing in: 0 kg; CPC 32113: Mechanical wood pulp; semi-chemical wood pulp; pulps of fibrous cellulosic material other than wood; By-product classification allocatable product
  This cellulose fibre is intended for use as a thermal insulation material in buildings. It is made out of waste paper and for this application, the fibres are blown into cavities, e.g. between two planks of a wall. Cellulose fibre in this type of application has a density of 50 kg/m3 and a thermal conductivity of 0.04 W/mK when applied. Cellulose fibres are treated with borax and boric acid to enhance fire retarding properties.
  References:
  Kellenberger D., Althaus H.-J., Jungbluth N. and Künniger T. (2007) Life Cycle Inventories of Building Products. Final report ecoinvent data v2.0 No. 7. Swiss Centre for Life Cycle Inventories, Dübendorf, CH.
  Richter et al. (1996) Ökologische Bewertung von Wärmeschutzgläsern, Integraler Vergleich verschiedener Verglasungsvarianten. Forschungsprogramm 'Rationelle Energienutzung in Gebäuden', EMPA, Abteilung Holz. Auftrag Bundesamt für Energiewirtschaft.
  production volume 0.409598 kg
  property carbon content, non-fossil 0.46
    C-content/dry mass of fibres was considered to be 46% ('Evolutionary and Biochemical Aspects', A.D. Kay and T. Vrede (in Global Ecology, 2010, Elsevier B.V., S.E. Jørgensen Ed.))
  property price 0.76 EUR2005
    The production volume of this product is small compared to other products supplied by the activities within the same ISIC 3 category. Therefore, an average price of products supplied by the activities in the same ISIC 3 code has been applied.This price is obtained as '_35 Paper and paper products, EU27' in the 'EU & DK Input Output Database' (available in SimaPro). The price is assumed to be valid for both RER2003, RER 2004, world 2003 and world 2004.
  property carbon content 0.46
    carbon content on a dry matter basis (reserved; not for manual entry)
  property true value 7.54269e-12
    allocation property applied in "true value" allocation // value calculated from revenue
  properties: water in wet mass 0 kg, wet mass 1 kg, carbon content, fossil 0, dry mass 1 kg, water content 0, carbon allocation 0.46 kg

## Inputs from technosphere
- printing ink, offset, without solvent, in 47.5% solution state: 0.00910922 kg; lognormal variance with pedigree 0.0099, pedigree (2,3,4,3,1)
  Calculated value: average ink consumption of three companies
  properties: carbon content, non-fossil 0.221773, dry mass 1 kg, carbon content, fossil 0.455266, wet mass 1 kg
  note on carbon content, non-fossil: C content was calculated as an addition of C content in the raw materials.
- electricity, low voltage: 0 kWh; pedigree (1,1,1,1,1)
  EcoSpold01Location=CH
  Calculated values: Average consumption of three companies
- industrial machine, heavy, unspecified: 0.000214219 kg; lognormal variance with pedigree 0.0493, pedigree (5,3,4,3,1)
  Estimate value: Weight of offset printing equipment given by one of the companies indicating main material steal and furhter materials aluminium, rubber and electronics. Assumption comparable equipment weight in other companies and similar production as for industrial machines.
- maize starch: 0.000169017 kg; lognormal variance with pedigree 0.0567, pedigree (5,5,4,3,1)
  Calculated value: average use of developer used of three offset printing companies. Starch main component of developer.
  properties: water content 0.162791, carbon content, non-fossil 0.46, dry mass 0.86 kg, wet mass 1 kg
  note on carbon content, non-fossil: C-content of starch is considered 46% on dry mass basis (from "Evolutionary and Biochemical Aspects", A.D. Kay and T. Vrede (in Global Ecology, 2010, Elsevier B.V., S.E. Jørgensen Ed.)).
- thermoforming, with calendering: 0.000391097 kg; lognormal variance with pedigree 0.0967, pedigree (5,5,4,3,4)
  Estimate value: Assumed processing for rubber blankets.
- corrugated board box: 0 kg; pedigree (1,1,1,1,1)
  The
  properties: water content 0.0582011, dry mass 0.945 kg, carbon content, fossil 0.000656085, wet mass 1 kg, carbon content, non-fossil 0.432275
  note on carbon content, fossil: Fossil C content was calculated after fossil C contents of chemicals used in the production of board (Tab 10-15 & 10.16 ecoinvent v2.2 report 11_III, part 10)
  note on carbon content, non-fossil: Biogenic C content was calculated after biogenic C contents of chemicals used in the production of board (Tab 10.15 & 10.16, ecoinvent v2.2 report 11_III, part 10).
- heat, district or industrial, natural gas: 0 MJ; pedigree (1,1,1,1,1)
  Calculated value: Average consumption of three companies
- acrylic dispersion, without water, in 65% solution state: 0.00116936 kg; lognormal variance with pedigree 0.0099, pedigree (2,3,4,3,1)
  Calculated value: average consumption of three companies
  properties: carbon content, fossil 0.549932, wet mass 1 kg, dry mass 1 kg
  note on carbon content, fossil: Dispersants ensure that the individual particles in the emulsion paint do not combine to form agglomerates.The poly(acrylic acids) are suitable dispersing agents (Ullmann), and have therefore been used as representative example. Their formula is (C3H4O2)n. The formulation of this specific dispersion includes 50% acrylic binder
- aluminium, wrought alloy: 0.0244681 kg; lognormal variance with pedigree 0.3093, pedigree (2,3,4,3,1)
  Calculated value: average consumption of printing plates of three companies. Product information indicating wrought alloy as material quality
  property wet mass 1 kg; name WM
  property carbon content, non-fossil 0; name C_content_non_fossil
  property water content 0; name water_content
  property dry mass 1 kg; name DM
  property water in wet mass 0 kg; name WWM
  property carbon content, fossil 0; name C_content_fossil
- isopropanol: 0.00214219 kg; lognormal variance with pedigree 0.0099, pedigree (2,3,4,3,1)
  Calculated value: average Ispopropanol use of three companies (with low VOC consumption)
  properties: carbon content, fossil 0.6, wet mass 1 kg, dry mass 1 kg
- white spirit: 0.0029971 kg; lognormal variance with pedigree 0.0113, pedigree (3,3,4,3,1)
  Calculate value: Average value for different petrol based cleaners of three companies. Only a portion is relied to the use of white spirit itself, the data set ist used also as estimate for the production of other petrol based mixtures. Except for mixtures containing VOCs with high boiling point all VOCs are assumed to be emitted to air. The less volatil content with high boiling VOCs is assumed to be delivered to a professional treatment. Heptan emissions represent emissions from white spirit. Methanol and Propylene oxide emissions represent the Methoxypropanol content and Toluol, Xylene and Ethylbenzol the content of solvent naphtha in furhter used mixtures.
  properties: carbon content, fossil 0.863404, dry mass 1 kg, wet mass 1 kg
  note on carbon content, fossil: The most common variety of white spirit is a mixture of saturated aliphatic and alicyclic C7-C12 hydrocarbons with a content of 15-20% (by weight) of aromatic C7-C12 hydrocarbons (ecoinvent v2.2 report 8-part 94). The average composition was assumed as being 82.5% C9.5 saturated aliphatic and alicyclic hydrocarbons (average formula C9.5H20), and 17.5% C9.5 aromatic hydrocarbons (average formula C9.5H9.5).
- spent solvent mixture: 0 kg; pedigree (1,1,1,1,1)
  Estimate value: recovered solvent given declared only by one of tree companies. Recovery and professional waste treatment of 'non-voc wash' products assumed for the other companies.
  production volume 0 kg
    Calculated from production volume of reference product using the relative outputs.
  properties: water content 0.197605, carbon content, fossil 0.571257, dry mass 0.835 kg, wet mass 1 kg
  note on carbon content, fossil: Tab A.7, ecoinvent v2.2 report 13_I. C content has been calculated after data in the tables, and then referred to 1 kg DM
- waste paperboard, unsorted: -0.0866703 kg; = (Ref('65c4fbef-dbe9-4687-a496-a99ade44fa92'))*-1
  production volume 3.1681e9 kg; = Ref('a449dde7-765f-4a60-acb3-7d24c81141c0', 'ProductionVolume') * ((Ref('73ae9686-80b5-4f65-bcf4-cddff473b7c4')*-1) / Ref('a449dde7-765f-4a60-acb3-7d24c81141c0'))
    Calculated from production volume of reference product using the relative outputs.
  properties: price 0.03924 EUR2005, water content 0.243781, wet mass 1 kg, carbon content, non-fossil 0.483259, dry mass 0.804 kg
- acrylic varnish, without water, in 87.5% solution state: 0.000384219 kg; lognormal variance with pedigree 0.0099, pedigree (2,3,4,3,1)
  Calculated value: average consumption of three companies
  properties: carbon content, fossil 0.674725, wet mass 1 kg, dry mass 1 kg
  note on carbon content, fossil: Isobornyl acrylate (C13H20O2) has been used as a representative example of acrylic varnish (Turpentines, Ullmann).The formulation of this specific varnish includes 50% acrylic binder
- textile, woven cotton: 0.000277109 kg; lognormal variance with pedigree 0.0573, pedigree (4,3,4,3,4)
  Calculated value: average consumption of textiles in printing process of three companies (including the portion of textile within rubber blankets)
  properties: wet mass 1 kg, carbon content, non-fossil 0.46, dry mass 1 kg
  note on carbon content, non-fossil: Cotton fibers are considered to have a 46% C-content in dry mass ("Evolutionary and Biochemical Aspects", A.D. Kay and T. Vrede (in Global Ecology, 2010, Elsevier B.V., S.E. Jørgensen Ed.)
- sheet rolling, aluminium: 0.0244681 kg; lognormal variance with pedigree 0.1767, pedigree (5,5,4,3,5)
  Estimate value: assumed processing for the production of printing plates
- ethylene glycol monoethyl ether: 0.000514912 kg; lognormal variance with pedigree 0.0099, pedigree (2,3,4,3,1)
  Calculated value: Average consumption of three companies
  properties: dry mass 1 kg, carbon content, fossil 0.610169, wet mass 1 kg
- waste paper, unsorted: 0 kg; pedigree (1,1,1,1,1)
  Calculated value: average from three companies calculated from the mass balance of paper consumption and output of printed product. Waste paper delivered to recycling unsorted, mixed with furhter waste paper of clients.
  production volume 0 kg
    Calculated from production volume of reference product using the relative outputs.
  properties: price 0.093 EUR2005
- waste emulsion paint: 0 kg; pedigree (1,1,1,1,1)
  Calculated value: average value for disposal of paints of three companies
  production volume 0 kg
    Calculated from production volume of reference product using the relative outputs.
  properties: carbon content, fossil 0.27, wet mass 1 kg, dry mass 1 kg
  note on carbon content, fossil: Tab A.4, ecoinvent v2.2 report 13_I. C content has been calculated after data in the tables, and then referred to 1 kg DM
- paper, woodfree, coated: 1.36589 kg; lognormal variance with pedigree 0.0099, pedigree (2,3,4,3,1)
  Calculated value: Average paper consumption of three companies. Paper, woodfree, coated assumed for printing services.
  properties: carbon content, fossil 0.0590617, water content 0.0582011, dry mass 0.945 kg, carbon content, non-fossil 0.22775, wet mass 1 kg
  note on carbon content, fossil: Fossil C content was calculated after fossil C contents of chemicals used in the production of the paper (in Tab 8.72 & 8.73 ecoinvent v2.2 report 11_III, part 8).
  note on carbon content, non-fossil: Biogenic C content was calculated after biogenic C contents of chemicals used in the production of the paper (in Tab 8.72 & 8.73 ecoinvent v2.2 report 11_III, part 8). The cellulose content in 1 kg of paper (on a wet mas basis) was estimated as (1-chemical content), C content of cellulose was considered 0.44 kgC/kg dry mass (ecoinvent v2.2 report, n 15a, pg 40)
- synthetic rubber: 0.000175895 kg; lognormal variance with pedigree 0.0513, pedigree (3,3,4,3,4)
  Calculated value: average consumption of rubber blankets of three companies. Assumptions on the portion of rubber and textile content derived from product declarations
  properties: dry mass 1 kg, wet mass 1 kg, carbon content, fossil 0.871949
  note on carbon content, fossil: EPDM (Ethylene-propene-diene terpolymer) rubber is a terpolymer of ethylene, propene, and a diene with the residual unsaturated portion of the diene in the side chain (ecoinvent v2.2 report 7-part XX & Ullmann). Chemical formula (deduced from Evidences of Solvent-Induced Miscibility in Polychloroprene-co-Ethylene-Propene Diene Terpolymer Blends, Dubey et al., Journal of Applied Polymer Science, 2009, 111:1884–1891): C20H35
- electricity, low voltage: 0.00754987, 0.00132415, 0.0300318, 0.107672, 0.0217744, 0.329292, 0.0542778, 0.154609 kWh (8 entries); lognormal variance with pedigree 0.0099, pedigree (2,3,4,3,1)
  EcoSpold01Location=CH
  Calculated values: Average consumption of three companies
- corrugated board box: 0.00100834, 0.0856619 kg (2 entries); lognormal variance with pedigree 0.0099, pedigree (2,3,4,3,1)
  The
- heat, district or industrial, natural gas: 0.01933, 0.440446, 1.09282 MJ (3 entries); lognormal variance with pedigree 0.0099, pedigree (2,3,4,3,1)
  Calculated value: Average consumption of three companies
- spent solvent mixture: -0.000379693, -0.00109429 kg (2 entries); lognormal variance with pedigree 0.0113, pedigree (3,3,4,3,1)
  (same comment as for spent solvent mixture)
  production volume 5.38792e7 kg
- waste paper, unsorted: -0.0496933, -0.333543 kg (2 entries); lognormal variance with pedigree 0.0113, pedigree (3,3,4,3,1)
  (same comment as for waste paper, unsorted)
  production volume 1.40086e10 kg
- waste emulsion paint: -2.27474e-5, -0.000254362 kg (2 entries); lognormal variance with pedigree 0.0099, pedigree (2,3,4,3,1)
  Calculated value: average value for disposal of paints of three companies
  production volume 1.01293e7 kg

## Emissions to nature
- Xylene [air, urban air close to ground]: 8.41154e-5 kg; lognormal variance with pedigree 0.0127, pedigree (3,4,4,3,1)
  Calculated value: Emissions from the use of solvent Naphtha, white spirit and other petrol based derivates. Average of three companies calculated from the mass balance of product use and recovery for recycling/disposal. Toluene and Xylene assumed main components of cyclic hydrocarbons, related content of cylcic hydrocarbons from product specifications expressed by 50% Xylene and 50% Toluene.
- 2-Propanol [air, urban air close to ground]: 0.00214219 kg; lognormal variance with pedigree 0.0113, pedigree (3,3,4,3,1)
  Calculated value: average from three companies calculated from the mass balance of solvent consumption and solvent recovery for recycling.
- Toluene [air, urban air close to ground]: 8.41154e-5 kg; lognormal variance with pedigree 0.0173, pedigree (4,3,4,3,1)
  Calculated value: Emissions from the use of solvent Naphtha, white spirit and other petrol based derivates. Average of three companies calculated from the mass balance of product use and recovery for recycling. Toluene and Xylene assumed for the portion of cyclic hydrocarbons, related portion derived from product specifications and expressed by 50% Xylene and 50% Toluene.
- Heptane [air, urban air close to ground]: 0.000931558 kg; lognormal variance with pedigree 0.0113, pedigree (3,3,4,3,1)
  Calculated value: Emissions from the use of solvent Naphtha, white spirit and other petrol based derivates. Average of three companies calculated from the mass balance of product use and recovery for recycling. Heptane used for the portion of aliphatic hydrocarbons C7-C12 given in product specifications.
- Propylene oxide [air, urban air close to ground]: 0.000178843 kg; lognormal variance with pedigree 0.0173, pedigree (4,3,4,3,1)
  Calculated, stochiometric value: Emissions from the use of ink solvent. Average of three companies calculated from the mass balance of product use and recovery for recycling/disposal. Portion of Methoxypropanol derived from product specifications and related emissions expressed by the portion of methanol and propylene oxide used for the production of Methoxypropanol.
- Benzene, ethyl- [air, urban air close to ground]: 9.52194e-5 kg; lognormal variance with pedigree 0.0113, pedigree (3,3,4,3,1)
  Calculated value: Emissions from the use of solvent Naphtha, white spirit and other petrol based derivates (i.e. ink solvent). Average of three companies calculated from the mass balance of product use and its recovery for recycling. Benzene, ethyl- content of products derived from product specifications.
- Methanol [air, urban air close to ground]: 9.82656e-5 kg; lognormal variance with pedigree 0.0173, pedigree (4,3,4,3,1)
  Calculated, stochiometric value: Emissions from the use of ink solvent. Average of three companies calculated from the mass balance of product use and recovery for recycling/disposal. Portion of Methoxypropanol in ink solvent derived from product specifications and related emissions expressed by the portion of methanol and propylene oxide used for the production of Methoxypropanol.

## Sampling procedure
Comanpy data of three average companies (few literature values and own assumptions.

## Review by Bo Weidema 2012-01-06
Dataset includes the physical flow of the product (paper, printed). The name of the activity should make clear that this is NOT a printing service. The mass of the product is more than 1 kg, since the ink adds approx. 10 gram per kg paper. Packaging for the final product is included as input to this activity.
Production volume checked.
