# import of roundwood, azobe from sustainable forest management, CM, debarked

Dataset: EcoSpold 2, unit process
Geography: RER
Time period: 2000-01-01 to 2019-12-31
Technology level: current
Classification: EcoSpold01Categories: wooden materials/extraction
Classification: ISIC rev.4 ecoinvent: 0220:Logging
Synonyms: Lophira alata; Bongassi; Ekki
Tags: ConvertedDataset
Scenario: Business-as-Usual
System model: Allocation at the point of substitution
Generated by: Frank Werner (obsolete)
Published in: Althaus H.J. 2007
Database: ecoinvent
isCopyrightProtected: true
accessRestrictedTo: 1

## General comment
This dataset represents debarking and import of one m3 of azobe wood from Central Africa to European port (Rotterdam, Antwerpen, Bremerhafen or Hamburg). The imported Azobe trees are produced by (close to) sustainable forest management in Central Africa.

No data on debarking of azobe wood is available; thus, average European data for debarking pine in the forest is used, taking into account the modern equipment of the logging company. Emissions from biomass burning are according to literature values.

As inventory data availability on tropical forestry processes and tropical wood is very limited, the inventory should be considered case-specific. Any specific environmental impact from land use change following timber harvesting needs to be considered on a case-specific basis.
[This dataset was already contained in the ecoinvent database version 2. It was not individually updated during the transfer to ecoinvent version 3. Life Cycle Impact Assessment results may still have changed, as they are affected by changes in the supply chain, i.e. in other datasets. This dataset was generated following the ecoinvent quality guidelines for version 2. It may have been subject to central changes described in the ecoinvent version 3 change report (http://www.ecoinvent.org/database/ecoinvent-version-3/reports-of-changes/), and the results of the central updates were reviewed extensively. The changes added e.g. consistent water flows and other information throughout the database. The documentation of this dataset can be found in the ecoinvent reports of version 2, which are still available via the ecoinvent website. The change report linked above covers all central changes that were made during the conversion process.]

## Included activities start
From debarking process of harvested azobe trees, at plantation site.

## Included activities end
This activity ends with imported Azobe wood at European harbour. The dataset includes debarking, natural decomposition of the bark and transportation of the log to a main harbour in Europe via truck and freight ship

## Geography
data for debarking in Africa is not available - instead, European processes are used, taking into account of the modern equipment used for harvesting.

## Technology
The dataset reflects a high technological standard for debarking. The transportation processes are average for transportation to Europe; transport distance however can vary. The high technological standard and legal operations of this dataset cannot be assumed to be representative for azobe harvesting. Site-specific data for debarking is not available but takes place before shipping the logs to Europe, thus European data for debarking pine used. The resulting bark is left to rot.

## Reference product
- roundwood, azobe from sustainable forest management, CM, debarked: 1 m3; source ICL/SHR Timber Research 2002; By-product classification allocatable product; CPC 031: Wood in the rough
  Reference product. The reference product being imported is azobe legs that are harvested from (close to) sustainable forest management in Central Africa. Data based on given reference.
  EcoSpold01Location=RER
  production volume 1 m3
    Unknown
    The first FSC certificate in Cameroon was granted to a logging company in December 2005 (http://www.ecologyandsociety.org/vol13/iss2/art36/)
  property carbon content, non-fossil 0.494
    C content of dry mass is 0.494 kgC/kg dry wood (ecoinvent v2.2 report 21).
  property price 174.94 EUR2005
    Calculated based on inputs: The price of the product has been calculated as a sum of the values of the material and energy inputs for this product. This value is therefore a rough estimation. It may underestimate the real price since there are additional expenses when producing any product. These expences can include for example labour costs, treatment of waste materials and profit for the producer. Please consider carefully whether this level of data quality is acceptable for your application.
  property carbon content 0.494
    carbon content on a dry matter basis (reserved; not for manual entry)
  properties: carbon content, fossil 0, water content 0.3, water in wet mass 300 kg, wet mass 1300 kg, dry mass 1000 kg, carbon allocation 494 kg

## Inputs from technosphere
- lubricating oil: 0.0252 kg; source Werner F. 2002; lognormal variance with pedigree 0.0541, pedigree (3,4,5,3,1)
  EcoSpold01Location=RER
  Proxy. Refers to debarking before maritime transportations; estimated based on direct use of European data (according to given Source).
  properties: carbon content, fossil 0.75, wet mass 1 kg, dry mass 1 kg
  note on carbon content, fossil: Lubricating oil is produced from diesel. C-content/dry mass of fats and oils considered 75%, from: ecoinvent v2.2 report, n 15a, pg 40
- diesel, burned in building machine: 2.84 MJ; source Werner F. 2002; lognormal variance with pedigree 0.0541, pedigree (3,4,5,3,1)
  Proxy. Refers to debarking before maritime transportations; estimated based on direct use of European data (according to given Source).
  EcoSpold01Location=GLO
- roundwood, azobe from sustainable forest management, under bark: 1 m3; source ICL/SHR Timber Research 2002; lognormal variance with pedigree 0.0541, pedigree (3,4,5,3,1)
  Literature Value.
  EcoSpold01Location=CM
  properties: wet mass 1300 kg, carbon content, non-fossil 0.494, water content 0.3, dry mass 1000 kg
  note on carbon content, non-fossil: C content of dry mass is 0.494 kgC/kg dry wood (ecoinvent v2.2 report 21).

## Inputs from nature
- Wood, hard, standing [natural resource, biotic]: -0.09 m3
  Calculated Value. Resource correction for branchings.

## Emissions to nature
- Carbon dioxide, non-fossil [air, unspecified]: 162.72 kg; source ICL/SHR Timber Research 2002; lognormal variance with pedigree 0.0541, pedigree (3,4,5,3,1)
  Literature Value.

## Sampling procedure
literature

## Extrapolations
see Geography

This dataset has been extrapolated from year 2005 to the year of the calculation (2019). The uncertainty has been adjusted accordingly.

## Review by Bo Weidema 2013-02-12
Production volume changed to zero (comment in prod. vol. field: The first FSC certificate in Cameroon was granted to a logging company in December 2005)

## Review by Emilia Moreno Ruiz 2013-04-12
PV set to 1

## Review by Hans-Jörg Althaus 2007-09-25
Passed

## Review by Roland Hischier 2011-10-11
Transfer of documentation done.
