# light commercial vehicle production

Dataset: EcoSpold 2, unit process
Geography: RER
Time period: 1990-01-01 to 2019-12-31
Technology level: current
Classification: EcoSpold01Categories: transport systems/road
Classification: ISIC rev.4 ecoinvent: 2910:Manufacture of motor vehicles
Scenario: Business-as-Usual
System model: Allocation at the point of substitution
Generated by: Michael Spielmann (obsolete)
Published in: Spielmann M. 2007
Database: ecoinvent
isCopyrightProtected: true
accessRestrictedTo: 1

## General comment
The values refer to the production of one average van. Environmental interventions in the vehicle production are derived from the production of the Golf A4. Disposal is included too.

## Included activities end
The inventory includes processes of material, energy and water use in vehicle manufacturing. Rail and road transport of materials is accounted for. Plant infrastructure is included, addressing issues such as land use, building, road and parking construction. The disposal of the vehicle is as well accounted for.

## Geography
Vehicle production data are taken from an LCI analysis of the Golf A4. Data for the vehicle disposal reflect the Swiss situation.

## Technology
Current production technology, environmental issues have been addressed in the past.

## Time period
The material consumption reflect a modern vehicle. For vehicle manufacturing data for the manufacturing of a passenger car has been employed as an first estimate.

## Parameters
- fraction, process water, to air: 0.15 dimensionless; name fraction_PW_to_air; lognormal variance with pedigree 0.092025, pedigree (4,4,3,2,4)
  Literature value. In case when no industry/process specific data are available, default evaporation fraction value is used. This value is 15% and is based on literature (Statistics Canada, 2007 & Shaffer, K.H., 2008, Consumptive water use in the Great Lakes Basin, USGS & Shiklomanov, 2003, World Water Resources at the Beginning of the 21st Century) and has been approved by an expert.
- fraction, tap water, to air: 0.15; name fraction_TW_to_air; = fraction_PW_to_air; lognormal variance with pedigree 0.092025, pedigree (4,4,3,2,4)
  Calculated value. See comment in the other parametres present in this dataset. Tap water is considered to be always used as process water, thus process water fractions to air are applied to all tap water input flows to calculate the amount of water consumed in the processes.

## Reference product
- light commercial vehicle: 1 unit; CPC 49114: Motor vehicles n.e.c. for the transport of goods; By-product classification allocatable product
  EcoSpold01Location=RER
  production volume 1.32237 unit
    This is a placeholder value that does not reflect real-world production volumes. This dataset does not currently require a real-world production volume to work in the database framework, and no actual data were collected yet. This has no negative effect on the results of the ecoinvent database. The placeholder value of this activity was scaled according to the nominal GDP of 2005 (source: United Nations, http://data.un.org/Glossary.aspx?q=GDP+%28current+US%24%29, accessed 20130726) to reflect an appropriate share of the global production volume, which is also a placeholder value.
  property price 14413 EUR2005
    Calculated based on literature value (UN Commodity Trade Statistics Database) using data on trade value and net weight (kg) for 5 reference countries/regions (RER, USA, JP, CN and IN) which average is assumed to be a good approximation of the global price. The UN classification; 8703 Motor cars and other motor vehicles principally designed for the transport of persons, including station wagons and racing cars. The weight of the car is estimated to be 1.3 tonnes.
  property carbon content 0
    carbon content on a dry matter basis (reserved; not for manual entry)
  property true value 14413
    allocation property applied in "true value" allocation // value calculated from revenue
  properties: carbon content, fossil 0, wet mass 0 kg, water in wet mass 0 kg, dry mass 0 kg, carbon content, non-fossil 0, water content 0, carbon allocation 0 kg

## By-products
- heat, for reuse in municipal waste incineration only: 0 MJ; CPC 17300: Steam and hot water; By-product classification allocatable product; pedigree (1,1,1,1,1)
  Net useful heat generated from this waste and used in internal MSWI plant energy redistribution.
  Uncertainty: uncertainty is calculated from uncertainties in waste composition and uncertainties in energy efficiency and the uncertainty in internal energy demand
  production volume 34.136 MJ
  property price 0.0106 EUR2005; name E_th_prod_MSWI_price_EUR2005
    Average European district heat price from Ecoheatcool and Euroheat 2005-2006, Ecoheat Work package 1: The European heat market. Final report. 10.6 EUR/GJ i s the price of district heat. http://www.solarthermalworld.org/files/Ecoheatcool%20WP1%20Web.pdf?download
  property exergy 0.1842 MJ; name E_th_prod_MSWI_exergy
    This exergy property is based on the exergy content of the product.
  property true value relation 0.1842; name E_th_prod_MSWI_true_value_relation
    property to calculate "true value" from
  property true value 0.170421
    allocation property applied in "true value" allocation // value calculated from true value relation
- electricity, for reuse in municipal waste incineration only: 0 kWh; CPC 17100: Electrical energy; By-product classification allocatable product; pedigree (1,1,1,1,1)
  Net electricity generated from this waste and used in internal MSWI plant energy redistribution.
  Uncertainty: uncertainty is calculated from uncertainties in waste composition and uncertainties in energy efficiency and the uncertainty in internal energy demand
  production volume 4.70219 kWh
  property exergy 3.6 MJ; name E_el_prod_MSWI_exergy
    This exergy property is based on the exergy content of the product.
  property price 0.1 EUR2005; name E_el_prod_MSWI_price_EUR2005
    Estimated to be the same price as in case of electricity, medium voltage.
  property true value relation 3.6; name E_el_prod_MSWI_true_value_relation
    property to calculate "true value" from
  property true value 0.458799
    (same comment as for heat, for reuse in municipal waste incineration only)
- zinc concentrate: 0 kg; CPC 14290: Other non-ferrous metal ores and concentrates (other than uranium or thorium ores and concentrates); By-product classification allocatable product
  Calculated value from the knowledge of the properties of both products.
  production volume 0.0046188 kg
  property price 0.38 EUR2005; name ByP_price_EUR2005
    Temporary price data. Calculated as 90% of purchasers price based on: Zinc content in concentrate 53%. Concentrate price per kg Zn 86.5% of refined Zn price (13.5% treatment charges according to CHR Metals Limited 2005: Dynamic cost curves. http://www.minecost.com/dynamic.pdf). 2004 zinc price from USGS (2007) Mineral commodity summaries 2007. <http://minerals.usgs.gov/minerals/pubs/mcs/2007/mcs2007.pdf> [Accessed 25 May 2010]
  property zinc content 0.53; name zinc_C_zinc_concentrate
    Zinc content on a dry matter basis. Value taken from teh "zinc mine operation" /GLO dataset.
  property dry mass 1 kg; name DM_zinc_concentrate
  property carbon content 0
    carbon content on a dry matter basis (reserved; not for manual entry)
  property true value 0.00132727
    allocation property applied in "true value" allocation // value calculated from revenue
  properties: wet mass 1 kg, water content 0, carbon content, non-fossil 0, carbon content, fossil 0, water in wet mass 0 kg, carbon allocation 0 kg

## Inputs from technosphere
- chromium: 2.3999 kg; lognormal variance with pedigree 0.0512, pedigree (2,3,5,1,1)
  EcoSpold01Location=RER
  Uncertainty: LCI of one passenger car
  properties: wet mass 1 kg, dry mass 1 kg
- wire drawing, copper: 1219.95 kg; lognormal variance with pedigree 0.05, pedigree (1,1,5,1,1)
  literature study
  EcoSpold01Location=RER
- synthetic rubber: 71.9969 kg; lognormal variance with pedigree 0.0512, pedigree (2,3,5,1,1)
  EcoSpold01Location=RER
  Uncertainty: literature study
  properties: carbon content, fossil 0.871949, wet mass 1 kg, dry mass 1 kg
  note on carbon content, fossil: EPDM (Ethylene-propene-diene terpolymer) rubber is a terpolymer of ethylene, propene, and a diene with the residual unsaturated portion of the diene in the side chain (ecoinvent v2.2 report 7-part XX & Ullmann). Chemical formula (deduced from Evidences of Solvent-Induced Miscibility in Polychloroprene-co-Ethylene-Propene Diene Terpolymer Blends, Dubey et al., Journal of Applied Polymer Science, 2009, 111:1884–1891): C20H35
- polypropylene, granulate: 48.9979 kg; lognormal variance with pedigree 0.0512, pedigree (2,3,5,1,1)
  EcoSpold01Location=RER
  Uncertainty: LCI of one passenger car
  properties: carbon content, fossil 0.857143, dry mass 1 kg, wet mass 1 kg
  note on carbon content, fossil: Polypropylene is formed by the polymerisation of propylene, C3H6 (ecoinvent v2.2 report 11_II)
- aluminium, cast alloy: 26.8788 kg; = 0.32*84; lognormal variance with pedigree 0.0512, pedigree (2,3,5,1,1)
  84 kg aluminium, production mix.
  0.32: part of aluminium cast alloy in aluminium, production mix. Based on the aluminium, production mix in ecoinvent v2.2.
  Uncertainty: literature study
  properties: dry mass 1 kg, wet mass 1 kg
- tap water: 3219.86 kg; name tap_water_input; lognormal variance with pedigree 0.0532, pedigree (2,4,5,1,2)
  EcoSpold01Location=RER
  Uncertainty: LCI of one passenger car
  properties: water content 2962.17, dry mass 0.000337476 kg, carbon content, fossil 0.00178991, wet mass 1 kg
  note on carbon content, fossil: Bicarbonate content is 2.93 mol/m3. CO2 content is 0.1 mol/m3 (ecoinvent v2.2 report 8, Tab 93.1).
- polyvinylchloride, emulsion polymerised: 2.04247 kg; lognormal variance with pedigree 0.0512, pedigree (2,3,5,1,1)
  EcoSpold01Location=RER
  Uncertainty: LCI of one passenger car
  properties: carbon content, fossil 0.387097, wet mass 1 kg, dry mass 1 kg
  note on carbon content, fossil: Monomer is vynyl chloride, C2H3Cl (ecoinvent v2.2 report 11_II). MW=62 g/mol
- nickel, 99.5%: 1.39994 kg; lognormal variance with pedigree 0.0512, pedigree (2,3,5,1,1)
  EcoSpold01Location=GLO
  Uncertainty: literature study
  properties: dry mass 1 kg, wet mass 1 kg
- road vehicle factory: 2.90987e-7 unit; lognormal variance with pedigree 0.422, pedigree (5,4,5,1,1)
  activityLink introduced to establish a direct link to the corresponding regional supply of this product
  Uncertainty: environmental report and own calculations
- flat glass, uncoated: 44.998 kg; lognormal variance with pedigree 0.0512, pedigree (2,3,5,1,1)
  EcoSpold01Location=RER
  Uncertainty: literature study
  properties: dry mass 1 kg, wet mass 1 kg
- aluminium, wrought alloy: 57.1175 kg; = 0.68*84; lognormal variance with pedigree 0.0512, pedigree (2,3,5,1,1)
  84 kg aluminium, production mix.
  0.68: part of aluminium, wrought alloy in aluminium, production mix. Based on the aluminium, production mix in ecoinvent v2.2.
  Uncertainty: literature study
  properties: wet mass 1 kg, dry mass 1 kg
- sulfuric acid: 0.799965 kg; lognormal variance with pedigree 0.0532, pedigree (2,4,5,1,2)
  EcoSpold01Location=RER
  Uncertainty: LCI of one passenger car
  properties: dry mass 1 kg, wet mass 1 kg
- section bar rolling, steel: 346.985 kg; lognormal variance with pedigree 0.05, pedigree (1,1,5,1,1)
  EcoSpold01Location=RER
  literature study
- sheet rolling, steel: 809.965 kg; lognormal variance with pedigree 0.05, pedigree (1,1,5,1,1)
  EcoSpold01Location=RER
  literature study
- heat, district or industrial, natural gas: 2219.9 MJ; lognormal variance with pedigree 0.0532, pedigree (2,4,5,1,2)
  EcoSpold01Location=RER
  Uncertainty: LCI of one passenger car
- ethylene, average: 18.4992 kg; lognormal variance with pedigree 0.0532, pedigree (2,4,5,1,2)
  EcoSpold01Location=RER
  Uncertainty: LCI of one passenger car
  properties: carbon content, fossil 0.857143, dry mass 1 kg, wet mass 1 kg
- used light commercial vehicle: -0.999956 unit; lognormal variance with pedigree 0.342025, pedigree (3,1,5,2,1)
  Uncertainty: own calculations
  production volume 1.32237 unit; = Ref('6afad5a6-f0f2-444f-aac2-a20525b87a71', 'ProductionVolume') * ((Ref('95427c2b-a9c4-49e6-bb23-bf3ae7a33989')*-1) / Ref('6afad5a6-f0f2-444f-aac2-a20525b87a71'))
    Calculated from production volume of reference product using the relative outputs.
  property carbon content, fossil 0.104049; name C_content_fossil
  property wet mass 2500 kg; name WM
  property water in wet mass 0 kg; name WWM
  property carbon content, non-fossil 0.00156582; name C_content_non_fossil
  property water content 0; name water_content
  property dry mass 2500 kg; name DM
- electricity, medium voltage: 2139.91 kWh; lognormal variance with pedigree 0.0532, pedigree (2,4,5,1,2)
  EcoSpold01Location=UCTE
  Uncertainty: LCI of one passenger car
- polyethylene, high density, granulate: 26.9988 kg; lognormal variance with pedigree 0.0512, pedigree (2,3,5,1,1)
  EcoSpold01Location=RER
  Uncertainty: literature study
  properties: carbon content, fossil 0.857143, dry mass 1 kg, wet mass 1 kg
  note on carbon content, fossil: Polyethylene is formed out of a huge amount of ethylene monomers (C2H4) (ecoinvent v2.2 report 11_II). MW=28 g/mol
- steel, low-alloyed, hot rolled: 1039.95 kg; lognormal variance with pedigree 0.05, pedigree (1,1,5,1,1)
  EcoSpold01Location=RER
  literatur study
  properties: wet mass 1 kg, carbon content, fossil 0.005, dry mass 1 kg
  note on carbon content, fossil: Low alloyed steel composition given in Tab. 3.2 ecoinvent v2.2 report 10_partII. Steel assumed to have a C content of 0.5%
- lead: 12.9994 kg; lognormal variance with pedigree 0.0532, pedigree (2,4,5,1,2)
  EcoSpold01Location=RER
  Uncertainty: LCI of one passenger car
  properties: wet mass 1 kg, dry mass 1 kg
- heat, district or industrial, other than natural gas: 59.8474 MJ; lognormal variance with pedigree 0.0532, pedigree (2,4,5,1,2)
  EcoSpold01Location=RER
  Uncertainty: LCI of one passenger car
- polyvinylchloride, suspension polymerised: 13.9568 kg; lognormal variance with pedigree 0.0512, pedigree (2,3,5,1,1)
  EcoSpold01Location=RER
  Uncertainty: LCI of one passenger car
  properties: wet mass 1 kg, dry mass 1 kg, carbon content, fossil 0.387097
- copper: 26.9988 kg; lognormal variance with pedigree 0.0512, pedigree (2,3,5,1,1)
  EcoSpold01Location=RER
  Uncertainty: literature study
  properties: wet mass 1 kg, dry mass 1 kg
- alkyd paint, white, without solvent, in 60% solution state: 11.9995 kg; lognormal variance with pedigree 0.0512, pedigree (2,3,5,1,1)
  EcoSpold01Location=RER
  Uncertainty: literature study
  properties: wet mass 1 kg, carbon content, fossil 0.140367, dry mass 1 kg, carbon content, non-fossil 0.199629
  note on carbon content, fossil: C content was calculated as an addition of C content in the raw materials.
- ethylene glycol: 4.79979 kg; lognormal variance with pedigree 0.0532, pedigree (2,4,5,1,2)
  EcoSpold01Location=RER
  Uncertainty: LCI of one passenger car
  properties: carbon content, fossil 0.387097, wet mass 1 kg, dry mass 1 kg
- reinforcing steel: 116.995 kg; lognormal variance with pedigree 0.05, pedigree (1,1,5,1,1)
  literature study
  EcoSpold01Location=RER
  properties: wet mass 1 kg, dry mass 1 kg, carbon content, fossil 0.004

## Emissions to nature
- Water [water, unspecified]: 2.73688 m3; name water_to_water_unspecified; = (tap_water_input/1000)*(1-fraction_TW_to_air); lognormal variance with pedigree 0.0807, pedigree (2,2,5,1,1)
  Calculated value based on literature values and expert opinion. See comments in the parametres' comment field.
  property fraction, origin: salt water 0; name fraction_origin_salt_water_Ww
  property fraction, origin: unspecified 0; name fraction_origin_unspecified_Ww
  property fraction, origin: fresh water 1; name fraction_origin_fresh_water_Ww
- COD, Chemical Oxygen Demand [water, surface water]: 0.192992 kg; lognormal variance with pedigree 0.0927, pedigree (2,4,5,3,1)
  Uncertainty: LCI of one passenger car
- BOD5, Biological Oxygen Demand [water, surface water]: 0.0259989 kg; lognormal variance with pedigree 0.0927, pedigree (2,4,5,3,1)
  Uncertainty: LCI of one passenger car
- TOC, Total Organic Carbon [water, surface water]: 0.0714784 kg; lognormal variance with pedigree 0.0927, pedigree (2,4,5,3,1)
  Calculated by default as TOC (gC) = COD/2.7 (COD measured in g O2). Should more correctly be calculated from the carbon content of the specified emissions to water.
  Uncertainty: LCI of one passenger car
- DOC, Dissolved Organic Carbon [water, surface water]: 0.0714784 kg; lognormal variance with pedigree 0.0927, pedigree (2,4,5,3,1)
  Calculated as equal to TOC.
  Uncertainty: LCI of one passenger car
- Water [air, unspecified]: 0.482979 m3; name water_to_air_unspecified; = (tap_water_input/1000*fraction_TW_to_air); lognormal variance with pedigree 0.0807, pedigree (2,2,5,1,1)
  (same comment as for Water)
  property fraction, origin: salt water 0; name fraction_origin_salt_water
  property fraction, origin: fresh water 1; name fraction_origin_fresh_water
  property fraction, origin: unspecified 0; name fraction_origin_unspecified
- Phosphate [water, surface water]: 0.000999956 kg; lognormal variance with pedigree 0.0927, pedigree (2,4,5,3,1)
  Uncertainty: LCI of one passenger car
- NMVOC, non-methane volatile organic compounds, unspecified origin [air, unspecified]: 4.79979 kg; lognormal variance with pedigree 0.0927, pedigree (2,4,5,3,1)
  Uncertainty: LCI of one passenger car

## Sampling procedure
Data for material consumption is based on expert estimates. Manufacturing data is based on an LCI study of one passenger car.

## Extrapolations
Production data for one German passenger car type is used as an first estimate for Europe

## Review by Carl Vadenbo 2012-06-28
In preparation for the release of ecoinvent v3.0, the output of used light commercial vehicle was removed from the 'transport, van <3.5t' datasets and added to 'production, van <3.5t RER' in ecoinvent v2.2 which was renamed to 'light commercial vehicle production, RER 1990-2000'. The added exchange of by-product/waste was reviewed and the new dataset was accepted for inclusion into the ecoinvent database on 2012.07.05.

## Review by Niels Jungbluth 2003-08-27
passed.
