# treatment of municipal solid waste, unsanitary landfill, dry infiltration class (100mm)

Dataset: EcoSpold 2, unit process
Geography: GLO
Time period: 2006-01-01 to 2019-12-31
Technology level: current
Classification: ISIC rev.4 ecoinvent: 3821:Treatment and disposal of non-hazardous waste
Synonyms: municipal waste landfill
Scenario: Business-as-Usual
System model: Allocation at the point of substitution
Share of production covered: 1 %
Generated by: Avraam Symeonidis
Database: ecoinvent
isCopyrightProtected: true
accessRestrictedTo: 1

## General comment
This dataset represents the activity of waste disposal of municipal solid waste in an unsanitary landfill. Recommended use of this dataset: For municipal solid waste, which goes to disposal as part of managed communal waste mixture.Inventoried waste contains 21% paper; 8% Mixed cardboard; 15% plastics; 3% laminated materials; 2% laminated packaging, e.g. tetra bricks; 3% combined goods e.g. diapers; 3% glass; 2% textiles; 8% minerals; 9% natural products; 22% compostable material; 2.65% inert metals; 1% volatile metals; 0.0065% batteries; 0.34% electronic goods; . // Waste composition (wet, in ppm): upper heating value 13.27 MJ/kg; lower heating value 11.74 MJ/kg; H2O 228830; O 257060; H 48250; C 334230; S 1119; N 3123.8; P 893.79; B 7.1933; Cl 6866.2; Br 13.552; F 56.358; I 0.0121; Ag 0.714; As 0.62521; Ba 149.04; Cd 11.748; Co 1.3453; Cr 315.21; Cu 1212.8; Hg 1.4424; Mn 259.36; Mo 1.9551; Ni 107.38; Pb 502.43; Sb 22.564; Se 0.31969; Sn 73.44; V 9.2147; Zn 1311.2; Be n.a.; Sc n.a.; Sr n.a.; Ti n.a.; Tl n.a.; W n.a.; Si 48510; Fe 29996; Ca 14062; Al 12420; K 2059.7; Mg 3377.7; Na 5143.9; . // Share of carbon in waste that is biogenic 60.4%. Share of metals in waste not oxidised and bulk-recyclable (exclude very small or thin parts) Iron: 60.03%; Alu: 17.81%; Copper: 72.83%. Overall degradability of waste during 100 years: 18.73%. Degradability of composing waste fractions: paper: 27%; Mixed cardboard: 32.4%; plastics: 1%; laminated materials: 18%; laminated packaging, e.g. tetra bricks: 18%; combined goods e.g. diapers: 18%; glass: 0%; textiles: 12%; minerals: 0%; natural products: 27%; compostable material: 27%; inert metals: 10%; volatile metals: 0%; batteries: 0%; electronic goods: 0%; ..

## Included activities start
from final waste deposition (without transports to the site)

## Included activities end
Waste-specific short-term emissions to air via landfill gas and landfill leachate. Waste-specific long-term emissions from landfill.

## Geography
Given name of landfill location is 'infiltration class 2 dry (2018)'. Landfill site with mean annual temperature (MAT) of 8 degC, mean annual precipitation (MAP) of 550 mm/year, and net infiltration of 100 mm/year.
Climate adjustments result in an alpha t (temperature) for permafrost areas of 0.999. Total climate adjustments with alpha pt of 0.999.

## Technology
This is an inventory for an unsanitary, sub-controlled landfill for municipal solid waste. Ultimate average landfill height is 15 meters. Operation phase duration is 25 years.Percentage of landfill gas directly emitted is 100w%.
Leachate of the landfill is not treated. Based on average waste composition and climate data the end of carbonate phase is estimated to be reached 16577 years after waste deposition.

## Reference product
- municipal solid waste: -1 kg; CPC 39910: Municipal waste; By-product classification Waste; pedigree (1,1,1,1,1)
  main reference product of this activity (supply of disposal service).
  Uncertainty: Uncertainty is not adjusted, as this is the refence product
  production volume 1 kg
    The amount of the annual production volume is a placeholder value. The contribution of this technology to the different local markets can be found in the markets themselves.
  property price 0 EUR2005
    Waste products are assigned a price of zero as they are assumed to require further treatment.
  property carbon content 0.4334
    carbon content on a dry matter basis (reserved; not for manual entry)
  properties: mercury content 1.8704e-6, lead content 0.00065151, zinc content 0.0017003, nickel content 0.00013925, fluorine content 7.3081e-5, carbon content, non-fossil 0.26183, cadmium content 1.5233e-5, silicon content 0.062904, calcium content 0.018235, cobalt content 1.7444e-6, vanadium content 1.1949e-5, chromium content 0.00040874, arsenic content 8.1073e-7, sodium content 0.0066702, iodine content 1.569e-8, copper content 0.0015726, silver content 9.2586e-7, manganese content 0.00033632, magnesium content 0.0043799, antimony content 2.9259e-5, tin content 9.5231e-5, water content 0.29672, phosphorus content 0.001159, nitrogen content 0.0040508, boron content 9.3277e-6, chlorine content 0.0089036, sulfur content 0.0014511, hydrogen content 0.062567, heating value, gross 13.272 MJ, oxygen content 0.33334, heating value, net 11.742 MJ, wet mass 1 kg, dry mass 0.77117 kg, water in wet mass 0.22883 kg, potassium content 0.0026709, molybdenum content 2.5352e-6, barium content 0.00019326, carbon content, fossil 0.17157, aluminium content 0.016105, selenium content 4.1455e-7, iron content 0.038897, bromine content 1.7573e-5, carbon allocation 0.334225 kg

## Inputs from technosphere
- diesel, burned in building machine: 0.046738 MJ; lognormal variance with pedigree 0.082256, pedigree (1,1,3,1,1)
  for waste distribution and compaction.
  Uncertainty: Uncertainty calculated from uncertainty in base parameters.
- excavation, skid-steer loader: 0.00031708 m3; lognormal variance with pedigree 0.082256, pedigree (1,1,3,1,1)
  application of daily cover.
  Uncertainty: Uncertainty calculated from uncertainty in base parameters.

## Emissions to nature
- Antimony [water, ground-, long-term]: 6.7715e-6 kg; lognormal variance with pedigree 0.38234, pedigree (1,1,3,1,1)
  Emissions from long-term leachate (>100a) directly from MSW landfill and indirectly via incineration of treatement sludge from leachate treatement.
  Uncertainty: Uncertainty calculated depending on waste input and uncertainty of long-term transfer coefficents in landfill.
- Tin [air, non-urban air or from high stacks]: 3.4071e-12 kg; lognormal variance with pedigree 0.74007, pedigree (1,1,3,1,1)
  burden from direct release or incineration of landfill biogas; or windblown leachate evaporite in arid climates.
  Uncertainty: Uncertainty calculated from unertainty of the waste composition of this waste, uncertainty in waste decomposition and short-term leaching in landfill
- Antimony [water, ground-]: 1.2904e-7 kg; lognormal variance with pedigree 0.40002, pedigree (1,1,3,1,1)
  burden from short-term leachate to groundwater in uncontrolled landfill in moist cimate.
  Uncertainty: Uncertainty calculated from unertainty of the waste composition of this waste, uncertainty in waste decomposition and short-term leaching in landfill
- Nickel, ion [water, ground-, long-term]: 0.000107 kg; lognormal variance with pedigree 0.24014, pedigree (1,1,3,1,1)
  (same comment as for Antimony)
- Vanadium [air, non-urban air or from high stacks]: 4.5603e-11 kg; lognormal variance with pedigree 0.65971, pedigree (1,1,3,1,1)
  (same comment as for Tin)
- Selenium [water, ground-]: 6.0913e-9 kg; lognormal variance with pedigree 0.50347, pedigree (1,1,3,1,1)
  (same comment as for Antimony)
- Manganese [water, ground-, long-term]: 0.00025342 kg; lognormal variance with pedigree 0.21085, pedigree (1,1,3,1,1)
  (same comment as for Antimony)
- Selenium [air, non-urban air or from high stacks]: 1.5228e-12 kg; lognormal variance with pedigree 0.77035, pedigree (1,1,3,1,1)
  (same comment as for Tin)
- Tin, ion [water, ground-]: 1.3628e-8 kg; lognormal variance with pedigree 0.47122, pedigree (1,1,3,1,1)
  (same comment as for Antimony)
- Molybdenum [water, ground-, long-term]: 1.5551e-6 kg; lognormal variance with pedigree 0.37554, pedigree (1,1,3,1,1)
  (same comment as for Antimony)
- Zinc [air, non-urban air or from high stacks]: 5.0861e-10 kg; lognormal variance with pedigree 0.57796, pedigree (1,1,3,1,1)
  (same comment as for Tin)
- Nickel, ion [water, ground-]: 3.834e-7 kg; lognormal variance with pedigree 0.36273, pedigree (1,1,3,1,1)
  (same comment as for Antimony)
- Copper, ion [water, ground-, long-term]: 0.0012125 kg; lognormal variance with pedigree 0.16012, pedigree (1,1,3,1,1)
  (same comment as for Antimony)
- Antimony [air, non-urban air or from high stacks]: 3.226e-11 kg; lognormal variance with pedigree 0.67047, pedigree (1,1,3,1,1)
  (same comment as for Tin)
- Lead [water, ground-]: 1.6844e-7 kg; lognormal variance with pedigree 0.38791, pedigree (1,1,3,1,1)
  (same comment as for Antimony)
- Mercury [water, ground-, long-term]: 1.4382e-6 kg; lognormal variance with pedigree 0.38247, pedigree (1,1,3,1,1)
  (same comment as for Antimony)
- Nickel [air, non-urban air or from high stacks]: 9.5851e-11 kg; lognormal variance with pedigree 0.63379, pedigree (1,1,3,1,1)
  (same comment as for Tin)
- Molybdenum [water, ground-]: 5.6264e-8 kg; lognormal variance with pedigree 0.43355, pedigree (1,1,3,1,1)
  (same comment as for Antimony)
- Chromium VI [water, ground-, long-term]: 4.8223e-6 kg; lognormal variance with pedigree 1.2963, pedigree (1,1,3,1,1)
  (same comment as for Antimony)
- Lead [air, non-urban air or from high stacks]: 5.6147e-11 kg; lognormal variance with pedigree 0.64877, pedigree (1,1,3,1,1)
  (same comment as for Tin)
- Mercury [water, ground-]: 2.991e-9 kg; lognormal variance with pedigree 0.52223, pedigree (1,1,3,1,1)
  (same comment as for Antimony)
- Cadmium, ion [water, ground-, long-term]: 1.1607e-5 kg; lognormal variance with pedigree 0.31366, pedigree (1,1,3,1,1)
  (same comment as for Antimony)
- Molybdenum [air, non-urban air or from high stacks]: 1.4066e-11 kg; lognormal variance with pedigree 0.69835, pedigree (1,1,3,1,1)
  (same comment as for Tin)
- Copper, ion [water, ground-]: 2.9077e-7 kg; lognormal variance with pedigree 0.3701, pedigree (1,1,3,1,1)
  (same comment as for Antimony)
- Barium [water, ground-, long-term]: 0.00013807 kg; lognormal variance with pedigree 0.22934, pedigree (1,1,3,1,1)
  (same comment as for Antimony)
- Manganese [air, non-urban air or from high stacks]: 1.484e-9 kg; lognormal variance with pedigree 0.54412, pedigree (1,1,3,1,1)
  (same comment as for Tin)
- Manganese [water, ground-]: 5.9359e-6 kg; lognormal variance with pedigree 0.27811, pedigree (1,1,3,1,1)
  (same comment as for Antimony)
- Cobalt [water, ground-, long-term]: 1.2292e-6 kg; lognormal variance with pedigree 0.38488, pedigree (1,1,3,1,1)
  (same comment as for Antimony)
- Copper [air, non-urban air or from high stacks]: 8.3078e-11 kg; lognormal variance with pedigree 0.63526, pedigree (1,1,3,1,1)
  (same comment as for Tin)
- Cadmium, ion [water, ground-]: 1.3935e-7 kg; lognormal variance with pedigree 0.39973, pedigree (1,1,3,1,1)
  (same comment as for Antimony)
- Iodide [water, ground-, long-term]: 3.7675e-9 kg; lognormal variance with pedigree 0.48666, pedigree (1,1,3,1,1)
  (same comment as for Antimony)
- Mercury [air, non-urban air or from high stacks]: 1.1964e-9 kg; lognormal variance with pedigree 0.55175, pedigree (1,1,3,1,1)
  (same comment as for Tin)
- Chromium VI [water, ground-]: 3.3667e-7 kg; lognormal variance with pedigree 0.36545, pedigree (1,1,3,1,1)
  (same comment as for Antimony)
- Arsenic, ion [water, ground-, long-term]: 5.9479e-7 kg; lognormal variance with pedigree 0.40958, pedigree (1,1,3,1,1)
  (same comment as for Antimony)
- Cobalt [air, non-urban air or from high stacks]: 2.9007e-11 kg; lognormal variance with pedigree 0.67438, pedigree (1,1,3,1,1)
  (same comment as for Tin)
- Cobalt [water, ground-]: 1.1603e-7 kg; lognormal variance with pedigree 0.41811, pedigree (1,1,3,1,1)
  (same comment as for Antimony)
- Silver, ion [water, ground-, long-term]: 7.14e-7 kg; lognormal variance with pedigree 0.40524, pedigree (1,1,3,1,1)
  (same comment as for Antimony)
- Chromium [air, non-urban air or from high stacks]: 8.4167e-11 kg; lognormal variance with pedigree 0.63663, pedigree (1,1,3,1,1)
  (same comment as for Tin)
- Barium [water, ground-]: 1.0962e-5 kg; lognormal variance with pedigree 0.26631, pedigree (1,1,3,1,1)
  (same comment as for Antimony)
- Fluoride [water, ground-, long-term]: 4.9761e-5 kg; lognormal variance with pedigree 0.26188, pedigree (1,1,3,1,1)
  (same comment as for Antimony)
- Cadmium [air, non-urban air or from high stacks]: 9.29e-10 kg; lognormal variance with pedigree 0.56031, pedigree (1,1,3,1,1)
  (same comment as for Tin)
- Iodide [water, ground-]: 8.2173e-9 kg; lognormal variance with pedigree 0.48359, pedigree (1,1,3,1,1)
  (same comment as for Antimony)
- Bromine [water, ground-, long-term]: 1.1843e-5 kg; lognormal variance with pedigree 0.3092, pedigree (1,1,3,1,1)
  (same comment as for Antimony)
- Barium [air, non-urban air or from high stacks]: 2.7404e-9 kg; lognormal variance with pedigree 0.52414, pedigree (1,1,3,1,1)
  (same comment as for Tin)
- Arsenic, ion [water, ground-]: 3.0002e-8 kg; lognormal variance with pedigree 0.45707, pedigree (1,1,3,1,1)
  (same comment as for Antimony)
- Chloride [water, ground-, long-term]: 0.0056074 kg; lognormal variance with pedigree 0.10573, pedigree (1,1,3,1,1)
  (same comment as for Antimony)
- Arsenic [air, non-urban air or from high stacks]: 4.2058e-10 kg; lognormal variance with pedigree 0.58563, pedigree (1,1,3,1,1)
  (same comment as for Tin)
- Fluoride [water, ground-]: 1.0719e-6 kg; lognormal variance with pedigree 0.33405, pedigree (1,1,3,1,1)
  (same comment as for Antimony)
- Nitrate [water, ground-, long-term]: 6.6454e-5 kg; lognormal variance with pedigree 0.13294, pedigree (1,1,3,1,1)
  (same comment as for Antimony)
- Bromine [air, non-urban air or from high stacks]: 2.3627e-8 kg; lognormal variance with pedigree 0.45422, pedigree (1,1,3,1,1)
  (same comment as for Tin)
- Bromine [water, ground-]: 1.6854e-6 kg; lognormal variance with pedigree 0.3343, pedigree (1,1,3,1,1)
  (same comment as for Antimony)
- Boron [water, ground-, long-term]: 7.1933e-15 kg; lognormal variance with pedigree 0.8103, pedigree (1,1,3,1,1)
  (same comment as for Antimony)
- Hydrogen fluoride [air, non-urban air or from high stacks]: 5.8159e-6 kg; lognormal variance with pedigree 0.29209, pedigree (1,1,3,1,1)
  (same comment as for Tin)
- Chloride [water, ground-]: 0.0012414 kg; lognormal variance with pedigree 0.12323, pedigree (1,1,3,1,1)
  (same comment as for Antimony)
- Nitrite [water, ground-, long-term]: 3.4392e-5 kg; lognormal variance with pedigree 0.13294, pedigree (1,1,3,1,1)
  (same comment as for Antimony)
- Iodine [air, non-urban air or from high stacks]: 1.152e-10 kg; lognormal variance with pedigree 0.57504, pedigree (1,1,3,1,1)
  (same comment as for Tin)
- Nitrite [water, ground-]: 3.2684e-5 kg; lognormal variance with pedigree 0.13378, pedigree (1,1,3,1,1)
  (same comment as for Antimony)
- Phosphate [water, ground-, long-term]: 0.00018139 kg; lognormal variance with pedigree 0.62899, pedigree (1,1,3,1,1)
  (same comment as for Antimony)
- Hydrogen chloride [air, non-urban air or from high stacks]: 1.7894e-5 kg; lognormal variance with pedigree 0.23861, pedigree (1,1,3,1,1)
  (same comment as for Tin)
- Phosphate [water, ground-]: 4.1488e-5 kg; lognormal variance with pedigree 0.24903, pedigree (1,1,3,1,1)
  (same comment as for Antimony)
- Hydrogen sulfide [water, ground-, long-term]: 7.4816e-5 kg; lognormal variance with pedigree 0.16289, pedigree (1,1,3,1,1)
  (same comment as for Antimony)
- Sulfur dioxide [air, non-urban air or from high stacks]: 2.7408e-5 kg; lognormal variance with pedigree 0.24788, pedigree (1,1,3,1,1)
  burden from direct release or incineration of landfill biogas.
  Uncertainty: Uncertainty calculated from unertainty of the waste composition of this waste, uncertainty in waste decomposition and short-term leaching in landfill
- Nitrate [water, ground-]: 6.3153e-5 kg; lognormal variance with pedigree 0.13378, pedigree (1,1,3,1,1)
  (same comment as for Antimony)
- Nitrogen, organic bound [water, ground-, long-term]: 0.0010328 kg; lognormal variance with pedigree 0.13294, pedigree (1,1,3,1,1)
  (same comment as for Antimony)
- Methane, fossil [air, non-urban air or from high stacks]: 0.0017782 kg; lognormal variance with pedigree 0.041144, pedigree (1,1,3,1,1)
  (same comment as for Sulfur dioxide)
- Boron [water, ground-]: 7.1933e-6 kg; lognormal variance with pedigree 0.32985, pedigree (1,1,3,1,1)
  (same comment as for Antimony)
- Ammonium, ion [water, ground-, long-term]: 0.00063189 kg; lognormal variance with pedigree 0.13294, pedigree (1,1,3,1,1)
  (same comment as for Antimony)
- Nitrogen oxides [air, non-urban air or from high stacks]: 8.6438e-7 kg; lognormal variance with pedigree 0.19853, pedigree (1,1,3,1,1)
  (same comment as for Sulfur dioxide)
- Hydrogen sulfide [water, ground-]: 5.697e-6 kg; lognormal variance with pedigree 0.20102, pedigree (1,1,3,1,1)
  (same comment as for Antimony)
- Sulfate [water, ground-, long-term]: 0.0028701 kg; lognormal variance with pedigree 0.16289, pedigree (1,1,3,1,1)
  (same comment as for Antimony)
- Methane, non-fossil [air, non-urban air or from high stacks]: 0.038909 kg; lognormal variance with pedigree 0.041144, pedigree (1,1,3,1,1)
  (same comment as for Sulfur dioxide)
- Nitrogen, organic bound [water, ground-]: 0.00098149 kg; lognormal variance with pedigree 0.13378, pedigree (1,1,3,1,1)
  (same comment as for Antimony)
- TOC, Total Organic Carbon [water, ground-, long-term]: 0.27805 kg; lognormal variance with pedigree 0.0106369, pedigree (1,1,3,1,1)
  (same comment as for Antimony)
- Carbon dioxide, fossil [air, non-urban air or from high stacks]: 0.0038499 kg; lognormal variance with pedigree 0.031011, pedigree (1,1,3,1,1)
  (same comment as for Sulfur dioxide)
- Ammonium, ion [water, ground-]: 0.00060051 kg; lognormal variance with pedigree 0.13378, pedigree (1,1,3,1,1)
  (same comment as for Antimony)
- COD, Chemical Oxygen Demand [water, ground-, long-term]: 0.30412 kg; lognormal variance with pedigree 0.0106369, pedigree (1,1,3,1,1)
  (same comment as for Antimony)
- Sodium, ion [water, ground-, long-term]: 0.0040925 kg; lognormal variance with pedigree 0.11471, pedigree (1,1,3,1,1)
  (same comment as for Antimony)
- Sulfate [water, ground-]: 0.00021855 kg; lognormal variance with pedigree 0.20102, pedigree (1,1,3,1,1)
  (same comment as for Antimony)
- BOD5, Biological Oxygen Demand [water, ground-, long-term]: 0.071996 kg; lognormal variance with pedigree 0.0106369, pedigree (1,1,3,1,1)
  (same comment as for Antimony)
- Occupation, dump site [natural resource, land]: 0.0023333 m2*year; lognormal variance with pedigree 0.082256, pedigree (1,1,3,1,1)
  for landfill operation phase and spontaneous renaturation.
  Uncertainty: Uncertainty calculated from uncertainty in base parameters.
- TOC, Total Organic Carbon [water, ground-]: 0.0016362 kg; lognormal variance with pedigree 0.12297, pedigree (1,1,3,1,1)
  (same comment as for Antimony)
- DOC, Dissolved Organic Carbon [water, ground-, long-term]: 0.27805 kg; lognormal variance with pedigree 0.0106369, pedigree (1,1,3,1,1)
  (same comment as for Antimony)
- Carbon dioxide, non-fossil [air, non-urban air or from high stacks]: 0.08424 kg; lognormal variance with pedigree 0.002, pedigree (1,1,3,1,1)
  (same comment as for Sulfur dioxide)
- DOC, Dissolved Organic Carbon [water, ground-]: 0.0016362 kg; lognormal variance with pedigree 0.12297, pedigree (1,1,3,1,1)
  (same comment as for Antimony)
- Potassium, ion [water, ground-, long-term]: 0.0016325 kg; lognormal variance with pedigree 0.14362, pedigree (1,1,3,1,1)
  (same comment as for Antimony)
- Magnesium [air, non-urban air or from high stacks]: 1.0206e-7 kg; lognormal variance with pedigree 0.40578, pedigree (1,1,3,1,1)
  (same comment as for Tin)
- Aluminium [water, ground-, long-term]: 0.012324 kg; lognormal variance with pedigree 0.087417, pedigree (1,1,3,1,1)
  (same comment as for Antimony)
- Heat, waste [soil, industrial]: 1.2748 MJ; lognormal variance with pedigree 0.041853, pedigree (1,1,3,1,1)
  burden from short-term decomposition of waste (0-100a).
  Uncertainty: Uncertainty calculated from unertainty of the waste composition of this waste, uncertainty in waste decomposition and short-term leaching in landfill
- Calcium, ion [water, ground-, long-term]: 0.013749 kg; lognormal variance with pedigree 0.083783, pedigree (1,1,3,1,1)
  (same comment as for Antimony)
- Heat, waste [water, ground-, long-term]: 11.086 MJ; lognormal variance with pedigree 0.018567, pedigree (1,1,3,1,1)
  burden from long-term decomposition of waste (>100a).
  Uncertainty: Uncertainty calculated from unertainty of the waste composition of this waste, uncertainty in waste decomposition and short-term leaching in landfill
- Potassium, ion [water, ground-]: 0.00042712 kg; lognormal variance with pedigree 0.15857, pedigree (1,1,3,1,1)
  (same comment as for Antimony)
- Magnesium [water, ground-, long-term]: 0.0029693 kg; lognormal variance with pedigree 0.12753, pedigree (1,1,3,1,1)
  (same comment as for Antimony)
- Sodium [air, non-urban air or from high stacks]: 2.6279e-7 kg; lognormal variance with pedigree 0.37524, pedigree (1,1,3,1,1)
  (same comment as for Tin)
- Magnesium [water, ground-]: 0.00040826 kg; lognormal variance with pedigree 0.15326, pedigree (1,1,3,1,1)
  (same comment as for Antimony)
- Iron, ion [water, ground-, long-term]: 0.029965 kg; lognormal variance with pedigree 0.062361, pedigree (1,1,3,1,1)
  (same comment as for Antimony)
- COD, Chemical Oxygen Demand [water, ground-]: 0.0017896 kg; lognormal variance with pedigree 0.12297, pedigree (1,1,3,1,1)
  (same comment as for Antimony)
- Sodium, ion [water, ground-]: 0.0010511 kg; lognormal variance with pedigree 0.12992, pedigree (1,1,3,1,1)
  (same comment as for Antimony)
- Silicon [water, ground-, long-term]: 0.0034874 kg; lognormal variance with pedigree 0.48248, pedigree (1,1,3,1,1)
  (same comment as for Antimony)
- BOD5, Biological Oxygen Demand [water, ground-]: 0.00042366 kg; lognormal variance with pedigree 0.12297, pedigree (1,1,3,1,1)
  (same comment as for Antimony)
- Aluminium [water, ground-]: 9.5733e-5 kg; lognormal variance with pedigree 0.18633, pedigree (1,1,3,1,1)
  (same comment as for Antimony)
- Zinc, ion [water, ground-, long-term]: 0.001309 kg; lognormal variance with pedigree 0.15759, pedigree (1,1,3,1,1)
  (same comment as for Antimony)
- Aluminium [air, non-urban air or from high stacks]: 2.3933e-8 kg; lognormal variance with pedigree 0.45619, pedigree (1,1,3,1,1)
  (same comment as for Tin)
- Iron, ion [water, ground-]: 3.104e-5 kg; lognormal variance with pedigree 0.22446, pedigree (1,1,3,1,1)
  (same comment as for Antimony)
- Vanadium, ion [water, ground-, long-term]: 6.2297e-6 kg; lognormal variance with pedigree 0.33092, pedigree (1,1,3,1,1)
  (same comment as for Antimony)
- Potassium [air, non-urban air or from high stacks]: 1.0678e-7 kg; lognormal variance with pedigree 0.40366, pedigree (1,1,3,1,1)
  (same comment as for Tin)
- Calcium, ion [water, ground-]: 0.00031309 kg; lognormal variance with pedigree 0.15181, pedigree (1,1,3,1,1)
  (same comment as for Antimony)
- Tin, ion [water, ground-, long-term]: 7.3426e-5 kg; lognormal variance with pedigree 0.25278, pedigree (1,1,3,1,1)
  (same comment as for Antimony)
- Silicon [air, non-urban air or from high stacks]: 5.1841e-8 kg; lognormal variance with pedigree 0.43752, pedigree (1,1,3,1,1)
  (same comment as for Tin)
- Silicon [water, ground-]: 0.00020736 kg; lognormal variance with pedigree 0.16666, pedigree (1,1,3,1,1)
  (same comment as for Antimony)
- Lead [water, ground-, long-term]: 0.00050226 kg; lognormal variance with pedigree 0.18897, pedigree (1,1,3,1,1)
  (same comment as for Antimony)
- Iron [air, non-urban air or from high stacks]: 7.7601e-9 kg; lognormal variance with pedigree 0.49562, pedigree (1,1,3,1,1)
  (same comment as for Tin)
- Zinc, ion [water, ground-]: 2.2887e-6 kg; lognormal variance with pedigree 0.30285, pedigree (1,1,3,1,1)
  (same comment as for Antimony)
- Selenium [water, ground-, long-term]: 2.1189e-7 kg; lognormal variance with pedigree 0.4413, pedigree (1,1,3,1,1)
  (same comment as for Antimony)
- Calcium [air, non-urban air or from high stacks]: 7.8273e-8 kg; lognormal variance with pedigree 0.41796, pedigree (1,1,3,1,1)
  (same comment as for Tin)
- Vanadium, ion [water, ground-]: 1.8241e-7 kg; lognormal variance with pedigree 0.39301, pedigree (1,1,3,1,1)
  (same comment as for Antimony)

## Extrapolations
This dataset has been extrapolated from year 2012 to the year of the calculation (2019). The uncertainty has been adjusted accordingly.
