# lorry production, with refrigeration machine, R134a as refrigerant, 16 metric ton

Dataset: EcoSpold 2, unit process
Geography: GLO
Time period: 1998-01-01 to 2019-12-31
Technology level: current
Classification: ISIC rev.4 ecoinvent: 2910:Manufacture of motor vehicles
Classification: EcoSpold01Categories: transport systems/road
Scenario: Business-as-Usual
System model: Allocation at the point of substitution
Generated by: Tereza Levova
Published in: Spielmann M. 2007
Database: ecoinvent
isCopyrightProtected: true
accessRestrictedTo: 1

## General comment
This dataset represents production of lorry which is used for transport of cargo which need to be transported in controlled atmosphere (certain temperature, humidity, air flow, etc.). This type of small lorry with insulation and refrigeration machine are primarily used for transport of food over short distances (urban cycle).
Based on "lorry production, 16 metric ton, RER 2002". Material consumption values refer to the production of one average lorry in the referring weight class (net weight 6800t). Total Kilometric performance: 5.40E+05. Interventions for manufacturing processes of vehicles are independent of weight class. The disposal of lorry is included too.
The amount of the insulation needed is calculated based on technical description of the Volvo FH16 rigid truck (model FH42RB6HC1) (Volvo, http://www.volvotrucks.com/trucks/uk-market/en-gb/trucks/volvo-fh16/pages/fh16_specification.aspx, accessed 20141103).
Lorry with refrigeration machine (Source: http://www.trucktrailer.carrier.com/, accessed 20141103).

## Included activities start
The dataset starts with the material used for the production of the lorry.

## Included activities end
The inventory includes processes of material, energy and water use in vehicle manufacturing (final assembly, engine production and manufacturing of metal parts). Rail and road transport of materials is accounted for. The refrigeration machine and extra insulation for the cargo space is included as well. Plant infrastructure is included, addressing issues such as land use, building, road and parking construction. Vehicle disposal is as well included.

## Technology
Current production technology, environmental issues have been addressed in the past.

## Time period
The material consumption represents a current 16t vehicle (Volvo FH). The data for vehicle production are representative for lorry production of one German company with an environmental management system. The data includes the final assembly (2000), engine production (2002) and the manufacturing of metal parts (2002).
References:
Volvo Truck Corporation (2004) Environmental product declaration: Volvo 8500 Low-Entry. Download of March from http://www.volvo.com/bus/global/engb/
volvogroup/core+values/environment/downloads.htm.

## Parameters
- fraction, tap water, to air: 0.15; name fraction_TW_to_air; = fraction_PW_to_air; lognormal variance with pedigree 0.092025, pedigree (4,4,3,2,4)
  Calculated value. See comment in the other parametres present in this dataset. Tap water is considered to be always used as process water, thus process water fractions to air are applied to all tap water input flows to calculate the amount of water consumed in the processes.
- density of glass fibre reinforced polypropylene: 1050 kg/m3; name density_GFP_polypropylene; lognormal variance with pedigree 0.0032, pedigree (3,3,1,1,1)
  Literature value (http://cdn.intechopen.com/pdfs-wm/34071.pdf, accessed 20141016). The filler content is assumed to be 20%.
- fraction, process water, to air: 0.15 dimensionless; name fraction_PW_to_air; lognormal variance with pedigree 0.092025, pedigree (4,4,3,2,4)
  Literature value. In case when no industry/process specific data are available, default evaporation fraction value is used. This value is 15% and is based on literature (Statistics Canada, 2007 & Shaffer, K.H., 2008, Consumptive water use in the Great Lakes Basin, USGS & Shiklomanov, 2003, World Water Resources at the Beginning of the 21st Century) and has been approved by an expert.
- density of polyurethane foam insulation: 50 kg/m3; name density_insulation; lognormal variance with pedigree 0.0106, pedigree (4,4,1,1,1)
  Estimated value based on detailed technical description of reefer (refrigerated container) production.
- thickness of insulation: 80 mm; name thickness_insulation; lognormal variance with pedigree 0.0018, pedigree (2,3,1,1,1)
  (same comment as for density of polyurethane foam insulation)
- area: 54.16 m2; name area_cargo; = (lorry_cargo_length* lorry_cargo_width*2)+( lorry_cargo_length* lorry_cargo_height*2)+( lorry_cargo_height* lorry_cargo_width*2); lognormal variance with pedigree 0.0006, pedigree (1,1,1,1,1)
  Calculated value.
- thickness of glass fibre reinforced polypropylene liner: 1.89692 mm; name thickness_liner; lognormal variance with pedigree 0.0018, pedigree (2,3,1,1,1)
  (same comment as for density of polyurethane foam insulation)

## Reference product
- lorry with refrigeration machine, R134a as refrigerant, 16 metric ton: 1 unit; name lorry_RP; CPC 49114: Motor vehicles n.e.c. for the transport of goods; By-product classification allocatable product
  production volume 64800 unit; name lorry_RP_PV; = 1200000*0.3*0.2*0.9
    Calculated based on literature value.
    1200000 units of trucks in operation world wide in 2002 (IPCC/TEAP Special Report: Safeguarding the Ozone Layer and the Global Climate System).
    Out of that
    30% are trailer units
    40% independent truck units
    30% smaller units (used for this dataset)
    It is estimated, that 20% of this amount is renewed every year.
    It is estimated, that 90% of those trucks use R134a as refrigerant and 10% use carbon dioxide, liquid as refrigerant.
  property length, external 5 m; name lorry_cargo_length
  property lifetime 15 year; name lorry_lifetime
    Estimated value.
  property height, external 2 m; name lorry_cargo_height
  property lifetime capacity [metric ton*km] 540000 metric ton*km; name lorry_lifetime_capacity
    Literature value (ecoinvent v2, report 14_Transport).
  property price 22595.1 EUR2005; name lorry_RP_price_EUR2005
    Calculated based on inputs: The price of the product has been calculated as a sum of the values of the material and energy inputs for this product. This value is therefore a rough estimation. It may underestimate the real price since there are additional expenses when producing any product. These expences can include for example labour costs, treatment of waste materials and profit for the producer. Please consider carefully whether this level of data quality is acceptable for your application.
  property width, external 2.44 m; name lorry_cargo_width
  property true value 22595.1; name lorry_RP_true_value
    allocation property applied in "true value" allocation // value calculated from revenue

## By-products
- iron scrap, unsorted: 0 kg; CPC 39310: Slag, dross, scalings and other waste from the manufacture of iron or steel; By-product classification Recyclable
  Calculated value based on knowledge of material composition of the lorry with refrigeration machine, 16 metric tons.
  production volume 1.99589e8 kg
  property price 0.149 EUR2005
    Temporary price data. Calculated as 90% of purchasers price based on: estimated at 85% of sorted scrap
  property carbon content 0
    carbon content on a dry matter basis (reserved; not for manual entry)
  property true value 458.931
    allocation property applied in "true value" allocation // value calculated from revenue
  properties: carbon content, non-fossil 0, carbon content, fossil 0, water in wet mass 0 kg, wet mass 1 kg, dry mass 1 kg, water content 0, carbon allocation 0 kg
- heat, for reuse in municipal waste incineration only: 0 MJ; CPC 17300: Steam and hot water; By-product classification allocatable product; pedigree (1,1,1,1,1)
  Net electricity generated from this waste and used in internal MSWI plant energy redistribution.
  production volume 1.95785e8 MJ
  property true value relation 0.1842; name E_th_prod_MSWI_true_value_relation
    property to calculate 'true value' from
  property exergy 0.1842 MJ; name E_th_prod_MSWI_exergy
    This exergy property is based on the exergy content of the product.
  property price 0.0106 EUR2005; name E_th_prod_MSWI_price_EUR2005
    Average European district heat price from Ecoheatcool and Euroheat 2005-2006, Ecoheat Work package 1: The European heat market. Final report. 10.6 EUR/GJ i s the price of district heat. http://www.solarthermalworld.org/files/Ecoheatcool%20WP1%20Web.pdf?download
  property true value 18.7343
    allocation property applied in "true value" allocation // value calculated from true value relation
- electricity, for reuse in municipal waste incineration only: 0 kWh; CPC 17100: Electrical energy; By-product classification allocatable product; pedigree (1,1,1,1,1)
  (same comment as for heat, for reuse in municipal waste incineration only)
  production volume 2.77824e7 kWh
  property price 0.1 EUR2005; name E_el_prod_MSWI_price_EUR2005
    Estimated to be the same price as in case of electricity, medium voltage.
  property exergy 3.6 MJ; name E_el_prod_MSWI_exergy
    This exergy property is based on the exergy content of the product.
  property true value relation 3.6; name E_el_prod_MSWI_true_value_relation
    property to calculate 'true value' from
  property true value 51.9395
    (same comment as for heat, for reuse in municipal waste incineration only)
- zinc concentrate: 0 kg; CPC 14290: Other non-ferrous metal ores and concentrates (other than uranium or thorium ores and concentrates); By-product classification allocatable product
  Calculated value from the knowledge of the properties of both products.
  production volume 616.515 kg
  property price 0.38 EUR2005; name ByP_price_EUR2005
    Temporary price data. Calculated as 90% of purchasers price based on: Zinc content in concentrate 53%. Concentrate price per kg Zn 86.5% of refined Zn price (13.5% treatment charges according to CHR Metals Limited 2005: Dynamic cost curves. http://www.minecost.com/dynamic.pdf). 2004 zinc price from USGS (2007) Mineral commodity summaries 2007. <http://minerals.usgs.gov/minerals/pubs/mcs/2007/mcs2007.pdf> [Accessed 25 May 2010]
  property zinc content 0.53; name zinc_C_zinc_concentrate
    Zinc content on a dry matter basis. Value taken from teh "zinc mine operation" /GLO dataset.
  property dry mass 1 kg; name DM_zinc_concentrate
  property carbon content 0
    carbon content on a dry matter basis (reserved; not for manual entry)
  property true value 0.00359027
    allocation property applied in "true value" allocation // value calculated from revenue
  properties: wet mass 1 kg, water content 0, carbon content, non-fossil 0, carbon content, fossil 0, water in wet mass 0 kg, carbon allocation 0 kg
- iron scrap, sorted, pressed: 0 kg; By-product classification Recyclable; CPC 39310: Slag, dross, scalings and other waste from the manufacture of iron or steel; pedigree (1,1,1,1,1)
  Iron scrap recovered from this waste.
  production volume 110499 kg
  property price 0.175 EUR2005
    Temporary price data. Calculated as 90% of purchasers price based on: 2005 import and export prices (total trades (USD) divided by total weight (kg) in biggest economies of the world: EU27, USA, Brasil, China, India, Japan and Russia) from UN Commodity Trade Statistics Database (http://data.un.org/Explorer.aspxDatabase [Accessed 2011.06.20]). Commodity: Waste or scrap, of cast iron
  property carbon content 0
    carbon content on a dry matter basis (reserved; not for manual entry)
  property true value 0.298415
    allocation property applied in "true value" allocation // value calculated from revenue
  properties: water content 0, water in wet mass 0 kg, carbon content, fossil 0, dry mass 1 kg, carbon content, non-fossil 0, wet mass 1 kg, carbon allocation 0 kg
- copper: 0 kg; source Rentz O. 1999; By-product classification allocatable product; CPC 41413: Refined copper and copper alloys, unwrought; master alloys of copper
  Literature value. Copper uses: Before end-use copper is manufactured into semi fabricated products, such as shapes and ingots (known as 'semis'). These manufacturing processes are subdivided into hot working, cold working and, if necessary, process annealing. Few of the semis are ready for use as such. They more typically travel to first-stage manufacturers, who make metal rods, wire, and casting, and then to component manufacturers who produce such things as motors, valves, and insulated cables The components in turn are incorporated by final-stage manufacturers into a variety of finished products - automobiles, commercial buildings, residential housing, and so forth. These uses account for about 79% of the world-wide consumption of copper.
  production volume 920061 kg
  properties: dry mass 1 kg, water in wet mass 0 kg, wet mass 1 kg, carbon content, non-fossil 0, water content 0, price 5.52 EUR2005, carbon content, fossil 0, carbon content 0, carbon allocation 0 kg, true value 78.3756
- aluminium oxide, non-metallurgical: 0 kg; source European Aluminium Association 2008; CPC 41432: Alumina (aluminium oxide), except artificial corundum; By-product classification allocatable product; CAS 1344-28-1; pedigree (1,1,1,1,1)
  production volume 307393 kg
  property carbon content, non-fossil 0; name C_content_non_fossil
  property price 0.28 EUR2005; name Al2O3Amount_price_EUR2005
    From UN trade database. http://data.un.org/ Import data from the largest economies of the world are used (Brazil, India, USA, China, Japan and EU-27).
  property dry mass 1 kg; name DM
  property water content 0; name water_content
  property wet mass 1 kg; name WM
  property water in wet mass 0 kg; name WWM
  property carbon content, fossil 0; name C_content_fossil
  property carbon content 0
    carbon content on a dry matter basis (reserved; not for manual entry)
  property true value 1.32824
    allocation property applied in "true value" allocation // value calculated from revenue
  properties: carbon allocation 0 kg
- aluminium, cast alloy: 0 kg; source European Aluminium Association 2008; By-product classification allocatable product; CPC 41431: Unwrought aluminium; pedigree (1,1,1,1,1)
  EcoSpold01Location=RER
  production volume 2.87345e6 kg
  property price 1.3 EUR2005; name castAlloyAmount_price_EUR2005
  properties: water in wet mass 0 kg, carbon content, non-fossil 0, water content 0, dry mass 1 kg, carbon content, fossil 0, wet mass 1 kg, carbon content 0, carbon allocation 0 kg, true value 57.6463
- aluminium, wrought alloy: 0 kg; source European Aluminium Association 2008; By-product classification allocatable product; CPC 4153: Semi-finished products of aluminium or aluminium alloys; pedigree (1,1,1,1,1)
  production volume 1.25794e6 kg
  property price 1.44 EUR2005; name secondaryAluminiumOutput_price_EUR2005
  properties: wet mass 1 kg, water content 0, carbon content, fossil 0, water in wet mass 0 kg, carbon content, non-fossil 0, dry mass 1 kg, carbon content 0, carbon allocation 0 kg, true value 27.9542

## Inputs from technosphere
- brass: 0 kg; source Volvo Truck Corporation 2004; pedigree (1,1,1,1,1)
  EcoSpold01Location=CH
  Estimated value. Based on the material composition of a Volovo FH as available from product declaration.
  properties: dry mass 1 kg, wet mass 1 kg
- hydrochloric acid, without water, in 30% solution state: 0 kg; source MAN Nutzfahrzeuge AG 2000; pedigree (1,1,1,1,1)
  EcoSpold01Location=RER
  Literature value. Data represent MAN production sites in Germany and comprises: final truck assembly, engine manufacturing, manufacturing of metal parts. Data available from environmental reports of the company.
  Additional references:
  MAN Nutzfahrzeuge AG (2002) Umwelterklärung 2002. MAN Nutzfahrzeuge AG, München
  properties: wet mass 1 kg, dry mass 1 kg
- reinforcing steel: 2192.54 kg; source Volvo Truck Corporation 2004; lognormal variance with pedigree 0.052, pedigree (1,1,5,5,1)
  EcoSpold01Location=RER
  Estimated value. Based on the material composition of a Volvo FH as available from product declaration.
  properties: wet mass 1 kg, dry mass 1 kg, carbon content, fossil 0.004
- sheet rolling, steel: 405.523 kg; source Volvo Truck Corporation 2004; lognormal variance with pedigree 0.052, pedigree (1,1,5,5,1)
  (same comment as for reinforcing steel)
- section bar rolling, steel: 1581.34 kg; source Volvo Truck Corporation 2004; lognormal variance with pedigree 0.082, pedigree (1,1,5,5,1)
  Estimated value. Based on the material composition of a Volvo FH as available from product declaration.
  EcoSpold01Location=RER
- heat, district or industrial, natural gas: 31335.9 MJ; source MAN Nutzfahrzeuge AG 2000; lognormal variance with pedigree 0.052, pedigree (1,1,5,5,1)
  EcoSpold01Location=RER
  Literature value. Energy expenditures for stationary combustion processes are available from environmental reports of a German lorry manufacturer MAN Nutzfahrzeuge AG (2000)andMAN Nutzfahrzeuge AG (2000). The data is available for various manufacturing sites performing different tasks in the manufacturing chain. The total value used in this study comprises stamping processes, metal part and wiring harness manufacturing, engine production and testing as well as the final assembly.
  Additional references:
  MAN Nutzfahrzeuge AG (2002) Umwelterklärung 2002. MAN Nutzfahrzeuge AG, München.
- refrigeration machine, R134a as refrigerant: 0.97015 unit; lognormal variance with pedigree 0.0406, pedigree (1,1,5,1,1)
  Literature value.
  There are different types of refrigeration machines used in refrigerated transport by lorries. The Carrier Supra 560 type of refrigeration machine weight 385 kg (Carrier, http://www.trucktrailer.carrier.com/StaticFiles/Carrier.com/Carrier%20Brand%20Sites%20Content/Carrier%20Transicold%20North%20America%20TruckTrailer/Files/Products/Truck/Diesel/Supra%20560/Supra560.pdf, accessed 20141103).
- aluminium, cast alloy: 66.7463 kg; = 0.32*215; source Volvo Truck Corporation 2004; lognormal variance with pedigree 0.162, pedigree (1,1,5,5,1)
  215 kg aluminium, production mix. Estimated value. Based on the material composition of a Volovo FH as available from product declaration.
  0.32: part of aluminium cast alloy in aluminium, production mix. Based on the aluminium, production mix in ecoinvent v2.2.
  properties: dry mass 1 kg, wet mass 1 kg
- sulfuric acid: 0 kg; source Volvo Truck Corporation 2004; pedigree (1,1,1,1,1)
  (same comment as for reinforcing steel)
  properties: dry mass 1 kg, wet mass 1 kg
- polypropylene, granulate: 99.4215 kg; name PP_in; = (area_cargo)*(thickness_liner/1000)* density_GFP_polypropylene*0.95; lognormal variance with pedigree 0.0566, pedigree (4,5,5,1,1)
  Calculated value.
  The walls are covered on the inside of the cargo space by polypropylene fibre reinforced thermoplastic. Since this product is not available in the database ordinary polypropylene is used instead.
  properties: wet mass 1 kg, carbon content, fossil 0.857143, dry mass 1 kg
- heat, district or industrial, other than natural gas: 835.008 MJ; source MAN Nutzfahrzeuge AG 2000; lognormal variance with pedigree 0.052, pedigree (1,1,5,5,1)
  (same comment as for heat, district or industrial, natural gas)
- road vehicle factory: 8.46941e-7 unit; lognormal variance with pedigree 0.342, pedigree (1,1,5,5,1)
  EcoSpold01Location=RER
  Estimated value. Expenditures for the infrastructure of a road vehicle plant have been estimated and linked to vehicle manufacturing.
- waste polyurethane foam: 0 kg; name waste_PP; pedigree (1,1,1,1,1)
  Estimated value. It is estimated, that app. 10% of the insulation is cut-off as a waste during the assembly of the container.
  production volume 0 kg
    Calculated from production volume of reference product using the relative outputs.
  property price 0 EUR2005; name waste_PP_price_EUR2005
  properties: carbon content, fossil 0.641283, wet mass 1 kg, dry mass 0.998 kg, water content 0.00200401
- acetic acid, without water, in 98% solution state: 0.0640299 kg; source MAN Nutzfahrzeuge AG 2000; lognormal variance with pedigree 0.052, pedigree (1,1,5,5,1)
  Literature value. Data represent MAN production sites in Germany and comprises: final truck assembly, engine manufacturing, manufacturing of metal parts. Data available from environmental reports of the company.
  Additional references:
  MAN Nutzfahrzeuge AG (2002) Umwelterklärung 2002. MAN Nutzfahrzeuge AG, München
  EcoSpold01Location=RER
  properties: carbon content, fossil 0.400016, wet mass 1 kg, dry mass 1 kg
- steel, low-alloyed, hot rolled: 11.0597 kg; source Volvo Truck Corporation 2004; lognormal variance with pedigree 1.372, pedigree (1,1,5,5,1)
  (same comment as for reinforcing steel)
  properties: dry mass 1 kg, carbon content, fossil 0.005, wet mass 1 kg
  note on carbon content, fossil: Low alloyed steel composition given in Tab. 3.2 ecoinvent v2.2 report 10_partII. Steel assumed to have a C content of 0.5%
- polyurethane, rigid foam: 0 kg; name PUR_foam_input; pedigree (1,1,1,1,1)
  Calculated value.
  properties: dry mass 1 kg, wet mass 1 kg, carbon content, fossil 0.69089
- tap water: 15910.5 kg; name tap_water_input; source MAN Nutzfahrzeuge AG 2002; lognormal variance with pedigree 0.052, pedigree (1,1,5,5,1)
  Calculated value. About 95% of the consumed tap water and groundwater are used in the final assembly of vehicles (own calculations based on MAN Nutzfahrzeuge AG (2002)).
  EcoSpold01Location=RER
  properties: wet mass 1 kg, water content 2962.17, carbon content, fossil 0.00178991, dry mass 0.000337476 kg
  note on carbon content, fossil: Bicarbonate content is 2.93 mol/m3. CO2 content is 0.1 mol/m3 (ecoinvent v2.2 report 8, Tab 93.1).
- wastewater, average: 0 m3; source MAN Nutzfahrzeuge AG 2000; pedigree (1,1,1,1,1)
  Literature value. Data represent MAN production sites in Germany and comprises: final truck assembly, engine manufacturing, manufacturing of metal parts. Data available from environmental reports of the company.
  Additional references:
  MAN Nutzfahrzeuge AG (2002) Umwelterklärung 2002. MAN Nutzfahrzeuge AG, München
  EcoSpold01Location=CH
  production volume 0 m3
    Calculated from the production volume of lorry, 16 metric ton in proportion to the respective output amounts.
  properties: dry mass 0.346837 kg, wet mass 1000 kg, carbon content, non-fossil 0.194039, water content 2882.2
  note on carbon content, non-fossil: 0.0673 kg TOC/m3 (Tab A.17, ecoinvent v2.2 report 13_I). TOC was considered as Total Carbon.
- lubricating oil: 0 kg; source MAN Nutzfahrzeuge AG 2000; pedigree (1,1,1,1,1)
  (same comment as for acetic acid, without water, in 98% solution state)
  properties: dry mass 1 kg, carbon content, fossil 0.75, wet mass 1 kg
  note on carbon content, fossil: Lubricating oil is produced from diesel. C-content/dry mass of fats and oils considered 75%, from: ecoinvent v2.2 report, n 15a, pg 40
- electricity, medium voltage: 4598.51 kWh; source MAN Nutzfahrzeuge AG 2000; lognormal variance with pedigree 0.052, pedigree (1,1,5,5,1)
  EcoSpold01Location=UCTE
  Literature value. Energy expenditures for stationary combustion processes are available from environmental reports of a German lorry manufacturer MAN Nutzfahrzeuge AG (2000)andMAN Nutzfahrzeuge AG (2000). The data is available for various manufacturing sites performing different tasks in the manufacturing chain. The total value used in this study comprises stamping processes, metal part and wiring harness manufacturing, engine production and testing as well as the final assembly.
  Additional references:
  MAN Nutzfahrzeuge AG (2002) Umwelterklärung 2002. MAN Nutzfahrzeuge AG, München.
- alkyd paint, white, without solvent, in 60% solution state: 0 kg; source Volvo Truck Corporation 2004; pedigree (1,1,1,1,1)
  Estimated value. Based on the material composition of a Volovo FH as available from product declaration.
  EcoSpold01Location=RER
  properties: dry mass 1 kg, carbon content, fossil 0.140367, carbon content, non-fossil 0.199629, wet mass 1 kg
  note on carbon content, fossil: C content was calculated as an addition of C content in the raw materials.
- used lorry with refrigeration machine, 16 metric ton: -0.97015 unit
  production volume 64800 unit; = (Ref('d7147309-3a13-44a9-9cd6-7f5a057ff3b4')*-1)/ lorry_RP* lorry_RP_PV
    Calculated from production volume of reference product using the relative outputs.
- wire drawing, copper: 29.1045 kg; source Volvo Truck Corporation 2004; lognormal variance with pedigree 0.162, pedigree (1,1,5,5,1)
  (same comment as for section bar rolling, steel)
- stone wool, packed: 9.7015 kg; source Volvo Truck Corporation 2004; lognormal variance with pedigree 0.052, pedigree (1,1,5,5,1)
  Estimated value. Based on the material composition of a Volvo FH as available from product declaration.
  EcoSpold01Location=CH
  properties: dry mass 1 kg, wet mass 1 kg, carbon content, fossil 0.015401
  note on carbon content, fossil: The chemical composition of the glass fibres used in the rock wool production is similar to the composition of naturally cooled volcano basalt and has a composition listed in Tab. 3.1 and 3.2 in ecoinvent v2.2 report 16, part XIV. Rock wool contains: a minimum of 96% mineral fibres,between 0.5 and 3.0 weight percent of phenolic resin depending on the specific product characteristics, and about 0.2 percent mineral oil (ecoinvent v2.2 report 16, part XIV). An average composition of 1.8% phenolic resin, 0.2% mineral oil, and 98% mineral fibres has been assumed and used to calculate C content of the rock wool
- aluminium, wrought alloy: 141.836 kg; = 0.68*215; source Volvo Truck Corporation 2004; lognormal variance with pedigree 0.162, pedigree (1,1,5,5,1)
  215 kg aluminium, production mix. Estimated value. Based on the material composition of a Volovo FH as available from product declaration.
  0.68: part of aluminium, wrought alloy in aluminium, production mix. Based on the aluminium, production mix in ecoinvent v2.2.
  properties: dry mass 1 kg, wet mass 1 kg
- synthetic rubber: 363.806 kg; source Volvo Truck Corporation 2004; lognormal variance with pedigree 0.082, pedigree (1,1,5,5,1)
  (same comment as for reinforcing steel)
  properties: wet mass 1 kg, dry mass 1 kg, carbon content, fossil 0.871949
  note on carbon content, fossil: EPDM (Ethylene-propene-diene terpolymer) rubber is a terpolymer of ethylene, propene, and a diene with the residual unsaturated portion of the diene in the side chain (ecoinvent v2.2 report 7-part XX & Ullmann). Chemical formula (deduced from Evidences of Solvent-Induced Miscibility in Polychloroprene-co-Ethylene-Propene Diene Terpolymer Blends, Dubey et al., Journal of Applied Polymer Science, 2009, 111:1884–1891): C20H35
- wastewater from lorry production: -2.11493 m3; source MAN Nutzfahrzeuge AG 2000; lognormal variance with pedigree 0.052, pedigree (1,1,5,5,1)
  EcoSpold01Location=CH
  Literature value. Data represent MAN production sites in Germany and comprises: final truck assembly, engine manufacturing, manufacturing of metal parts. Data available from environmental reports of the company.
  Additional references:
  MAN Nutzfahrzeuge AG (2002) Umwelterklärung 2002. MAN Nutzfahrzeuge AG, München
  production volume 141264 m3; = (Ref('72d5d327-1259-4739-b8ea-602d5f22e655')*-1)/ lorry_RP* lorry_RP_PV
    (same comment as for wastewater, average)
  properties: dry mass 0.337476 kg, wet mass 1000 kg, water content 2962.17
- cast iron: 1406.72 kg; source Volvo Truck Corporation 2004; lognormal variance with pedigree 0.082, pedigree (1,1,5,5,1)
  (same comment as for alkyd paint, white, without solvent, in 60% solution state)
  properties: carbon content, fossil 0.04, wet mass 1 kg, dry mass 1 kg
  note on carbon content, fossil: Cast iron is made by remelting pig iron in small furnaces (e.g. cupola furnaces or electric arc furnaces) and poured into moulds to make castings. It usually contains 2% to 6% carbon (ecoinvent v2.2 report 10_partII). An average content of 4% was considered
- steel, chromium steel 18/8, hot rolled: 4.85075 kg; source Volvo Truck Corporation 2004; lognormal variance with pedigree 0.162, pedigree (1,1,5,5,1)
  (same comment as for section bar rolling, steel)
  properties: dry mass 1 kg, wet mass 1 kg, carbon content, fossil 0.0008
  note on carbon content, fossil: Stainless steel model is the grade 304 steel (18/8 stainless, 18% chromium 8% nickel; max. 0.08% C)
- propylene glycol, liquid: 0 kg; source Volvo Truck Corporation 2004; pedigree (1,1,1,1,1)
  (same comment as for section bar rolling, steel)
  properties: wet mass 1 kg, carbon content, fossil 0.473684, dry mass 1 kg
- diesel, burned in building machine: 19.5 MJ; source MAN Nutzfahrzeuge AG 2000; lognormal variance with pedigree 0.342, pedigree (1,1,5,5,1)
  Literature value. Diesel is used for engine testing and the operation of fork-lifters. The latter is modeled as building machine. Energy expenditures for stationary combustion processes are available from environmental reports of a German lorry manufacturer MAN Nutzfahrzeuge AG (2000) and MAN Nutzfahrzeuge AG (2002). The data is available for various manufacturing sites performing different tasks in the manufacturing chain. The total value used in this study comprises stamping processes, metal part and wiring harness manufacturing, engine production and testing as well as the final assembly.
  Additional references:
  MAN Nutzfahrzeuge AG (2002) Umwelterklärung 2002. MAN Nutzfahrzeuge AG, München.
  EcoSpold01Location=GLO
- lime, hydrated, packed: 0 kg; source MAN Nutzfahrzeuge AG 2000; pedigree (1,1,1,1,1)
  Literature value. Data represent MAN production sites in Germany and comprises: final truck assembly, engine manufacturing, manufacturing of metal parts. Data available from environmental reports of the company. For Ca(OH)2, 50% H2O is assumed.
  Additional references:
  MAN Nutzfahrzeuge AG (2002) Umwelterklärung 2002. MAN Nutzfahrzeuge AG, München
  EcoSpold01Location=CH
  Uncertainty: 2, 50% H2O is assumed.
  properties: water content 0.00300903, wet mass 1 kg, dry mass 0.997 kg
- flat glass, uncoated: 0 kg; source Volvo Truck Corporation 2004; pedigree (1,1,1,1,1)
  (same comment as for reinforcing steel)
  properties: wet mass 1 kg, dry mass 1 kg
- nitric acid, without water, in 50% solution state: 0 kg; source MAN Nutzfahrzeuge AG 2000; pedigree (1,1,1,1,1)
  (same comment as for hydrochloric acid, without water, in 30% solution state)
  properties: wet mass 1 kg, dry mass 1 kg
- pig iron: 1581.34 kg; source Volvo Truck Corporation 2004; lognormal variance with pedigree 0.082, pedigree (1,1,5,5,1)
  Estimated value. Based on the material composition of a Volvo FH as available from product declaration.
  EcoSpold01Location=GLO
  properties: dry mass 1 kg, carbon content, fossil 0.045, wet mass 1 kg
  note on carbon content, fossil: Pig iron is the iron produced in the blast furnace. It is an alloy of 94% Fe and more than 2% C (world average 4.5%). (ecoinvent v2.2 report 10_partII)
- electronics, for control units: 29.1045 kg; source Volvo Truck Corporation 2004; lognormal variance with pedigree 0.052, pedigree (1,1,5,5,1)
  (same comment as for reinforcing steel)
  properties: carbon content, fossil 0.337146, carbon content, non-fossil 0.00013442, wet mass 1 kg, dry mass 1 kg
  note on carbon content, fossil: The control unit has a composition of 46% steel (housing), 32% plastics, 14% printed wiring boards and 8% cables (various types).;
- sodium hydroxide, without water, in 50% solution state: 0.369627 kg; source MAN Nutzfahrzeuge AG 2000; lognormal variance with pedigree 0.052, pedigree (1,1,5,5,1)
  (same comment as for hydrochloric acid, without water, in 30% solution state)
  properties: dry mass 1 kg, wet mass 1 kg
- copper: 29.1045 kg; source Volvo Truck Corporation 2004; lognormal variance with pedigree 0.162, pedigree (1,1,5,5,1)
  (same comment as for alkyd paint, white, without solvent, in 60% solution state)
  properties: wet mass 1 kg, dry mass 1 kg
- polyethylene, high density, granulate: 223.135 kg; source Volvo Truck Corporation 2004; lognormal variance with pedigree 0.162, pedigree (1,1,5,5,1)
  (same comment as for reinforcing steel)
  properties: dry mass 1 kg, carbon content, fossil 0.857143, wet mass 1 kg
  note on carbon content, fossil: Polyethylene is formed out of a huge amount of ethylene monomers (C2H4) (ecoinvent v2.2 report 11_II). MW=28 g/mol
- diesel: 162.015 kg; source MAN Nutzfahrzeuge AG 2000; lognormal variance with pedigree 0.342, pedigree (1,1,5,5,1)
  Literature value. Diesel is used for engine testing and the operation of fork-lifters. The latter is modeled as building machine. Energy expenditures for stationary combustion processes are available from environmental reports of a German lorry manufacturer MAN Nutzfahrzeuge AG (2000) and MAN Nutzfahrzeuge AG (2002). The data is available for various manufacturing sites performing different tasks in the manufacturing chain. The total value used in this study comprises stamping processes, metal part and wiring harness manufacturing, engine production and testing as well as the final assembly.
  Additional references:
  MAN Nutzfahrzeuge AG (2002) Umwelterklärung 2002. MAN Nutzfahrzeuge AG, München.
  EcoSpold01Location=RER
  properties: dry mass 1 kg, carbon content, fossil 0.865, wet mass 1 kg
  note on carbon content, fossil: C-content of diesel is 86.5% (ecoinvent v2.2 report 6_IV, Tab 3.14)
- pitch: 0 kg; source Volvo Truck Corporation 2004; pedigree (1,1,1,1,1)
  (same comment as for alkyd paint, white, without solvent, in 60% solution state)
  properties: wet mass 1 kg, carbon content, fossil 0.83, dry mass 1 kg
- lead: 71.4225 kg; source Volvo Truck Corporation 2004; lognormal variance with pedigree 0.052, pedigree (1,1,5,5,1)
  (same comment as for section bar rolling, steel)
  properties: dry mass 1 kg, wet mass 1 kg
- brass: 0.097015, 19.306 kg (2 entries); source Volvo Truck Corporation 2004; lognormal variance with pedigree 0.162, pedigree (1,1,5,5,1)
  (same comment as for brass)
- hydrochloric acid, without water, in 30% solution state: 0.0335228, 0.149836 kg (2 entries); source MAN Nutzfahrzeuge AG 2000; lognormal variance with pedigree 0.052, pedigree (1,1,5,5,1)
  (same comment as for hydrochloric acid, without water, in 30% solution state)
- sulfuric acid: 4.01403, 23.0532 kg (2 entries); source Volvo Truck Corporation 2004; lognormal variance with pedigree 0.052, pedigree (1,1,5,5,1)
  (same comment as for reinforcing steel)
- waste polyurethane foam: -0.0164727, -21.0009 kg (2 entries); lognormal variance with pedigree 0.0566, pedigree (4,5,5,1,1)
  (same comment as for waste polyurethane foam)
  production volume 1.40383e6 kg
- polyurethane, rigid foam: 69.4817, 140.692 kg (2 entries); lognormal variance with pedigree 0.0432, pedigree (3,3,5,1,1)
  Calculated value.
- wastewater, average: -4.81984, -0.521416, -10.0841 m3 (3 entries); source MAN Nutzfahrzeuge AG 2000; lognormal variance with pedigree 0.052, pedigree (1,1,5,5,1)
  (same comment as for wastewater, average)
  production volume 1.03032e6 m3
- lubricating oil: 10.4827, 49.7637 kg (2 entries); source MAN Nutzfahrzeuge AG 2000; lognormal variance with pedigree 0.162, pedigree (1,1,5,5,1)
  (same comment as for acetic acid, without water, in 98% solution state)
- alkyd paint, white, without solvent, in 60% solution state: 6.75225, 32.0538 kg (2 entries); source Volvo Truck Corporation 2004; lognormal variance with pedigree 0.082, pedigree (1,1,5,5,1)
  (same comment as for alkyd paint, white, without solvent, in 60% solution state)
- propylene glycol, liquid: 7.05593, 14.2874 kg (2 entries); source Volvo Truck Corporation 2004; lognormal variance with pedigree 0.052, pedigree (1,1,5,5,1)
  (same comment as for section bar rolling, steel)
- lime, hydrated, packed: 0.00253135, 0.298215 kg (2 entries); source MAN Nutzfahrzeuge AG 2000; lognormal variance with pedigree 0.2106, pedigree (5,5,5,5,5)
  (same comment as for lime, hydrated, packed)
- flat glass, uncoated: 7.45491, 36.2018 kg (2 entries); source Volvo Truck Corporation 2004; lognormal variance with pedigree 0.082, pedigree (1,1,5,5,1)
  (same comment as for reinforcing steel)
- nitric acid, without water, in 50% solution state: 0.0166274, 0.0789324 kg (2 entries); source MAN Nutzfahrzeuge AG 2000; lognormal variance with pedigree 0.052, pedigree (1,1,5,5,1)
  (same comment as for hydrochloric acid, without water, in 30% solution state)
- pitch: 1.47237, 0.0253226, 1.1461, 0.0733395, 0.44432, 0.0513727, 0.00968073, 6.479 kg (8 entries); source Volvo Truck Corporation 2004; lognormal variance with pedigree 0.052, pedigree (1,1,5,5,1)
  (same comment as for alkyd paint, white, without solvent, in 60% solution state)

## Inputs from nature
- Water, well, in ground [natural resource, in water]: 67.4254 m3; name water_well_in_ground_input; source MAN Nutzfahrzeuge AG 2002; lognormal variance with pedigree 0.052, pedigree (1,1,5,5,1)
  Calculated value. About 95% of the consumed tap water and groundwater are used in the final assembly of vehicles (own calculations based on MAN Nutzfahrzeuge AG (2002)).

## Emissions to nature
- Xylene [air, unspecified]: 0.00534553 kg; source MAN Nutzfahrzeuge AG 2000; lognormal variance with pedigree 0.162, pedigree (1,1,5,5,1)
  Calculated value. Based on the diesel consumption for engine testing, direct environmental emissions to air are calculated, employing the emission profile of a lorry 28t empty. Is assumed that diesel is used for engine testing and the operation of fork-lifters. The latter is modeled as building machine.Energy expenditures for stationary combustion processes are available from environmental reports of a German lorry manufacturer MAN Nutzfahrzeuge AG (2000) and MAN Nutzfahrzeuge AG (2002).
  Additional references:
  MAN Nutzfahrzeuge AG (2002) Umwelterklärung 2002. MAN Nutzfahrzeuge AG, München.
- Dinitrogen monoxide [air, unspecified]: 0.0216344 kg; source MAN Nutzfahrzeuge AG 2000; lognormal variance with pedigree 0.162, pedigree (1,1,5,5,1)
  (same comment as for Xylene)
- Ammonia [air, unspecified]: 0.0216344 kg; source MAN Nutzfahrzeuge AG 2000; lognormal variance with pedigree 0.162, pedigree (1,1,5,5,1)
  (same comment as for Xylene)
- TOC, Total Organic Carbon [water, unspecified]: 0.0534553 kg; source Frischknecht R. 2003; lognormal variance with pedigree 0.162, pedigree (1,1,5,5,1)
  Calculated value according to ecoinvent quality guidelines Frischknecht et al. (2003).
- Sulfur dioxide [air, unspecified]: 0.116418 kg; source MAN Nutzfahrzeuge AG 2000; lognormal variance with pedigree 0.162, pedigree (1,1,5,5,1)
  (same comment as for Xylene)
- COD, Chemical Oxygen Demand [water, unspecified]: 0.122239 kg; source MAN Nutzfahrzeuge AG 2002; lognormal variance with pedigree 0.162, pedigree (1,1,5,5,1)
  Literature value. For automotive stamping, a Chemical Oxygen Demand (COD) is reported MAN Nutzfahrzeuge AG (2002) with 12800 kg/year resulting in a specific COD of 0.126 kg/vehicle.
- Zinc [air, unspecified]: 0.000167836 kg; source MAN Nutzfahrzeuge AG 2000; lognormal variance with pedigree 0.692, pedigree (1,1,5,5,1)
  (same comment as for Xylene)
- Copper [air, unspecified]: 0.000284254 kg; source MAN Nutzfahrzeuge AG 2000; lognormal variance with pedigree 0.692, pedigree (1,1,5,5,1)
  (same comment as for Xylene)
- Carbon monoxide, fossil [air, unspecified]: 0.943956 kg; source MAN Nutzfahrzeuge AG 2000; lognormal variance with pedigree 0.162, pedigree (1,1,5,5,1)
  (same comment as for Xylene)
- Lead [air, unspecified]: 1.84329e-8 kg; source MAN Nutzfahrzeuge AG 2000; lognormal variance with pedigree 0.692, pedigree (1,1,5,5,1)
  (same comment as for Xylene)
- Nitrogen oxides [air, unspecified]: 5.8209 kg; source MAN Nutzfahrzeuge AG 2000; lognormal variance with pedigree 0.162, pedigree (1,1,5,5,1)
  (same comment as for Xylene)
- NMVOC, non-methane volatile organic compounds, unspecified origin [air, unspecified]: 7.63508 kg; source MAN Nutzfahrzeuge AG 2000; lognormal variance with pedigree 0.162, pedigree (1,1,5,5,1)
  (same comment as for Xylene)
- Chromium [air, unspecified]: 0.000284254 kg; source MAN Nutzfahrzeuge AG 2000; lognormal variance with pedigree 0.692, pedigree (1,1,5,5,1)
  (same comment as for Xylene)
- Particulates, > 2.5 um, and < 10um [air, unspecified]: 0.0205672 kg; source MAN Nutzfahrzeuge AG 2000; lognormal variance with pedigree 0.162, pedigree (1,1,5,5,1)
  (same comment as for Xylene)
- Mercury [air, unspecified]: 3.34702e-9 kg; source MAN Nutzfahrzeuge AG 2000; lognormal variance with pedigree 0.692, pedigree (1,1,5,5,1)
  (same comment as for Xylene)
- Particulates, < 2.5 um [air, unspecified]: 0.246418 kg; source MAN Nutzfahrzeuge AG 2000; lognormal variance with pedigree 0.162, pedigree (1,1,5,5,1)
  (same comment as for Xylene)
- Cadmium [air, unspecified]: 1.67836e-6 kg; source MAN Nutzfahrzeuge AG 2000; lognormal variance with pedigree 0.692, pedigree (1,1,5,5,1)
  (same comment as for Xylene)
- BOD5, Biological Oxygen Demand [water, unspecified]: 0.122239 kg; source Frischknecht R. 2003; lognormal variance with pedigree 0.162, pedigree (1,1,5,5,1)
  Calculated value according to ecoinvent quality guidelines Frischknecht et al. (2003).
- Toluene [air, unspecified]: 0.00534553 kg; source MAN Nutzfahrzeuge AG 2000; lognormal variance with pedigree 0.162, pedigree (1,1,5,5,1)
  (same comment as for Xylene)
- Water [water, unspecified]: 53.2952 m3; name water_to_water_unspecified; = (tap_water_input/1000)*(1-fraction_TW_to_air)+water_well_in_ground_input*(1-fraction_PW_to_air)-2.18-15.9; lognormal variance with pedigree 0.130025, pedigree (4,4,5,2,4)
  Calculated value based on literature values and expert opinion. See comments in the parametres' comment field.
  property fraction, origin: unspecified 0; name fraction_origin_unspecified_Ww
  property fraction, origin: salt water 0; name fraction_origin_salt_water_Ww
  property fraction, origin: fresh water 1; name fraction_origin_fresh_water_Ww
- DOC, Dissolved Organic Carbon [water, unspecified]: 0.0534553 kg; source Frischknecht R. 2003; lognormal variance with pedigree 0.162, pedigree (1,1,5,5,1)
  Calculated value according to ecoinvent quality guidelines Frischknecht et al. (2003).
- Water [air, unspecified]: 12.5004 m3; name water_to_air_unspecified; = (tap_water_input/1000)*fraction_TW_to_air+water_well_in_ground_input*fraction_PW_to_air; lognormal variance with pedigree 0.130025, pedigree (4,4,5,2,4)
  (same comment as for Water)
  property fraction, origin: salt water 0; name fraction_origin_salt_water
  property fraction, origin: fresh water 1; name fraction_origin_fresh_water
  property fraction, origin: unspecified 0; name fraction_origin_unspecified
- Benzene [air, unspecified]: 0.012709 kg; source MAN Nutzfahrzeuge AG 2000; lognormal variance with pedigree 0.162, pedigree (1,1,5,5,1)
  (same comment as for Xylene)
- Nickel [air, unspecified]: 1.17388e-5 kg; source MAN Nutzfahrzeuge AG 2000; lognormal variance with pedigree 0.692, pedigree (1,1,5,5,1)
  (same comment as for Xylene)
- Particulates, > 10 um [air, unspecified]: 0.0105746 kg; source MAN Nutzfahrzeuge AG 2000; lognormal variance with pedigree 0.162, pedigree (1,1,5,5,1)
  (same comment as for Xylene)
- Selenium [air, unspecified]: 1.67836e-6 kg; source MAN Nutzfahrzeuge AG 2000; lognormal variance with pedigree 0.692, pedigree (1,1,5,5,1)
  (same comment as for Xylene)
- Carbon dioxide, fossil [air, unspecified]: 614.105 kg; source MAN Nutzfahrzeuge AG 2000; lognormal variance with pedigree 0.162, pedigree (1,1,5,5,1)
  (same comment as for Xylene)
- Methane, fossil [air, unspecified]: 0.0160075 kg; source MAN Nutzfahrzeuge AG 2000; lognormal variance with pedigree 0.162, pedigree (1,1,5,5,1)
  (same comment as for Xylene)

## Sampling procedure
Manufacturing data is taken from an environmental report of one production site. Additional data was generated via oral communcation.

## Extrapolations
Data from one production site in Germany is used as an first estimate for Europe This dataset has been copied from an original dataset covering the geography RER. The uncertainty has been adjusted accordingly.
