# treatment of wastewater from pig iron production, capacity 5E9l/year

Dataset: EcoSpold 2, unit process
Geography: CH
Time period: 1994-01-01 to 2019-12-31
Technology level: current
Classification: EcoSpold01Categories: waste management/wastewater treatment
Classification: ISIC rev.4 ecoinvent: 3700:Sewerage
Tags: Treatment; ConvertedDataset
Scenario: Business-as-Usual
System model: Allocation at the point of substitution
Generated by: Gabor Doka (obsolete)
Published in: Doka G. 2008
Database: ecoinvent
isCopyrightProtected: true
accessRestrictedTo: 1

## General comment
Wastewater purified in a medium size municipal wastewater treatment plant (capacity class 3), with an average capacity size of 24900 per-captia-equivalents PCE.
Wastewater contains (in kg/m3): COD: 0.0000203 (GSD=150%); TOC: 0.0000041 (GSD=150%); Cr: 0.000002 (GSD=150%); Cu: 0.0000042 (GSD=150%); Ni: 0.000003 (GSD=150%); Pb: 0.000002 (GSD=150%); Zn: 0.00002 (GSD=150%);
[This dataset was already contained in the ecoinvent database version 2. It was not individually updated during the transfer to ecoinvent version 3. Life Cycle Impact Assessment results may still have changed, as they are affected by changes in the supply chain, i.e. in other datasets. This dataset was generated following the ecoinvent quality guidelines for version 2. It may have been subject to central changes described in the ecoinvent version 3 change report (http://www.ecoinvent.org/database/ecoinvent-version-3/reports-of-changes/), and the results of the central updates were reviewed extensively. The changes added e.g. consistent water flows and other information throughout the database. The documentation of this dataset can be found in the ecoinvent reports of version 2, which are still available via the ecoinvent website. The change report linked above covers all central changes that were made during the conversion process.]

## Included activities end
Infrastructure materials for municipal wastewater treatment plant, transports, dismantling. Land use burdens.

## Geography
Specific to the technology mix encountered in Switzerland in 2000. Well applicable to modern treatment practices in Europe, North America or Japan.

## Technology
Three stage wastewater treatment (mechanical, biological, chemical) including sludge digestion (fermentation) according to the average technology in Switzerland

## Parameters
- fraction, process water, to air: 0.1 dimensionless; name fraction_PW_to_air; lognormal variance with pedigree 0.092025, pedigree (4,4,3,2,4)
  Literature value (Statistics Canada, 2007 & Shaffer, K.H., 2008, Consumptive water use in the Great Lakes Basin, USGS) (Vionnet, S., Quantis Water Database - Technical Report, 2012).

## Reference product
- wastewater from pig iron production: -1 m3; CPC 39920: Sewage sludge; By-product classification Waste
  production volume 4.83299e6 m3; = 1.4354E+08*0.03367
    Calculated. Scaled down from the production volume in the global dataset using GDP.
    The placeholder value of this activity was scaled according to the nominal GDP of 2005 (source: United Nations, http://data.un.org/Glossary.aspx?q=GDP+%28current+US%24%29, accessed 20130726) to reflect an appropriate share of the global production volume, which is also a placeholder value.
  property price 0 EUR2005
    Waste products are assigned a price of zero as they are assumed to require further treatment.
  property carbon content, fossil 1.2149e-5
    TOC = 0.0000041 kg/m3 (Tab A.19, ecoinvent v2.2 report 13_I). TOC was considered as Total Carbon.
  property carbon content 1.2149e-5
    carbon content on a dry matter basis (reserved; not for manual entry)
  properties: wet mass 1000 kg, carbon content, non-fossil 0, water content 2962.17, dry mass 0.337476 kg, water in wet mass 999.663 kg, carbon allocation 4.1e-6 kg

## By-products
- electricity, for reuse in municipal waste incineration only: 0 kWh; CPC 17100: Electrical energy; By-product classification allocatable product; pedigree (1,1,1,1,1)
  Net electricity generated from this waste and used in internal MSWI plant energy redistribution.
  Uncertainty: uncertainty is calculated from uncertainties in waste composition and uncertainties in energy efficiency and the uncertainty in internal energy demand
  property exergy 3.6 MJ; name E_el_prod_MSWI_exergy
    This exergy property is based on the exergy content of the product.
  property true value relation 3.6; name E_el_prod_MSWI_true_value_relation
    property to calculate "true value" from
  property price 0.1 EUR2005; name E_el_prod_MSWI_price_EUR2005
    Estimated to be the same price as in case of electricity, medium voltage.
- heat, for reuse in municipal waste incineration only: 0 MJ; CPC 17300: Steam and hot water; By-product classification allocatable product; pedigree (1,1,1,1,1)
  Net useful heat generated from this waste and used in internal MSWI plant energy redistribution.
  Uncertainty: uncertainty is calculated from uncertainties in waste composition and uncertainties in energy efficiency and the uncertainty in internal energy demand
  property true value relation 0.1842; name E_th_prod_MSWI_true_value_relation
    property to calculate "true value" from
  property exergy 0.1842 MJ; name E_th_prod_MSWI_exergy
    This exergy property is based on the exergy content of the product.
  property price 0.0106 EUR2005; name E_th_prod_MSWI_price_EUR2005
    Average European district heat price from Ecoheatcool and Euroheat 2005-2006, Ecoheat Work package 1: The European heat market. Final report. 10.6 EUR/GJ i s the price of district heat. http://www.solarthermalworld.org/files/Ecoheatcool%20WP1%20Web.pdf?download
- zinc concentrate: 0 kg; CPC 14290: Other non-ferrous metal ores and concentrates (other than uranium or thorium ores and concentrates); By-product classification allocatable product
  Calculated value from the knowledge of the properties of both products.
  property price 0.38 EUR2005; name ByP_price_EUR2005
    Temporary price data. Calculated as 90% of purchasers price based on: Zinc content in concentrate 53%. Concentrate price per kg Zn 86.5% of refined Zn price (13.5% treatment charges according to CHR Metals Limited 2005: Dynamic cost curves. http://www.minecost.com/dynamic.pdf). 2004 zinc price from USGS (2007) Mineral commodity summaries 2007. <http://minerals.usgs.gov/minerals/pubs/mcs/2007/mcs2007.pdf> [Accessed 25 May 2010]
  property zinc content 0.53; name zinc_C_zinc_concentrate
    Zinc content on a dry matter basis. Value taken from teh "zinc mine operation" /GLO dataset.
  property dry mass 1 kg; name DM_zinc_concentrate
  property carbon content 0
    carbon content on a dry matter basis (reserved; not for manual entry)
  properties: wet mass 1 kg, water content 0, carbon content, non-fossil 0, carbon content, fossil 0, water in wet mass 0 kg, carbon allocation 0 kg

## Inputs from technosphere
- waste cement, hydrated: -1.0969e-5 kg; lognormal variance with pedigree 0.08, pedigree (1,1,5,1,1)
  burden from sludge incineration. Uncertainty calculated from wastewater composition and treatment model
  production volume 53.0131 kg; = (Ref('c81b5f32-1037-4628-a8aa-5a7b20eec673')*-1)* Ref('5468cd8e-5960-4843-a71a-510cd1fb8905', 'ProductionVolume')/ABS( Ref('5468cd8e-5960-4843-a71a-510cd1fb8905'))
    Calculated from the production volume of wastewater from pig iron production in proportion to the respective output amounts.
  properties: dry mass 1 kg, wet mass 1 kg
- electricity, low voltage: 0.028016 kWh; lognormal variance with pedigree 0.04, pedigree (1,1,5,1,1)
  direct wastewater treatment plant burden. Uncertainty calculated from wastewater composition and treatment model
- process-specific burdens, slag landfill: 2.7989e-6 kg; lognormal variance with pedigree 0.07, pedigree (1,1,5,1,1)
  burden from sludge incineration. Uncertainty calculated from wastewater composition and treatment model;activityLink introduced to establish a direct link to the corresponding regional supply of this product
- wastewater treatment facility, capacity 5E9l/year: 5.6882e-9 unit; lognormal variance with pedigree 0.04, pedigree (1,1,5,1,1)
  uncertainty heeded in exchanges of the module
- heat, district or industrial, natural gas: 0.0179462 MJ; lognormal variance with pedigree 0.04, pedigree (1,1,5,1,1)
  (same comment as for electricity, low voltage)
- process-specific burdens, residual material landfill: 1.0969e-5 kg; lognormal variance with pedigree 0.07, pedigree (1,1,5,1,1)
  (same comment as for process-specific burdens, slag landfill)
- heat, district or industrial, other than natural gas: 4.4246e-5 MJ; lognormal variance with pedigree 0.05, pedigree (1,1,5,1,1)
  (same comment as for waste cement, hydrated)
- municipal waste incineration facility: 1.3189e-14 unit; lognormal variance with pedigree 0.05, pedigree (1,1,5,1,1)
  (same comment as for waste cement, hydrated)
- residual material landfill: 2.2851e-14 unit; lognormal variance with pedigree 0.07, pedigree (1,1,5,1,1)
  (same comment as for waste cement, hydrated)
- slag landfill: 4.9758e-15 unit; lognormal variance with pedigree 0.07, pedigree (1,1,5,1,1)
  (same comment as for waste cement, hydrated)
- waste plastic, mixture: -0.0155 kg; lognormal variance with pedigree 0.04, pedigree (1,1,5,1,1)
  (same comment as for electricity, low voltage)
  production volume 74911.4 kg; = (Ref('49fa2285-240a-4a83-b472-33915e1f17d9')*-1)* Ref('5468cd8e-5960-4843-a71a-510cd1fb8905', 'ProductionVolume')/ABS(Ref('5468cd8e-5960-4843-a71a-510cd1fb8905'))
    (same comment as for waste cement, hydrated)
  properties: dry mass 0.847 kg, wet mass 1 kg, carbon content, fossil 0.747344, water content 0.180638
  note on carbon content, fossil: C content in 1 kg DM was calculated using data in Tab A.2, ecoinvent v2.2 report 13_I
- heat, central or small-scale, other than natural gas: 0.0130228 MJ; lognormal variance with pedigree 0.04, pedigree (1,1,5,1,1)
  (same comment as for electricity, low voltage)
- iron (III) chloride, without water, in 40% solution state: 8.47e-7 kg; lognormal variance with pedigree 0.21, pedigree (1,1,5,1,1)
  direct wastewater treatment plant burden plus burden from sludge incineration. Uncertainty calculated from wastewater composition and treatment model
  properties: wet mass 1 kg, dry mass 1 kg
- process-specific burdens, municipal waste incineration: 5.2756e-5 kg; lognormal variance with pedigree 0.05, pedigree (1,1,5,1,1)
  (same comment as for process-specific burdens, slag landfill)
- electricity, high voltage: 7.5847e-6 kWh; lognormal variance with pedigree 0.49, pedigree (1,1,5,1,1)
  (same comment as for waste cement, hydrated)
- cement, unspecified: 4.3874e-6 kg; lognormal variance with pedigree 0.08, pedigree (1,1,5,1,1)
  (same comment as for waste cement, hydrated)
  properties: dry mass 1 kg, wet mass 1 kg
- hydrochloric acid, without water, in 30% solution state: 2.7844e-9 kg; lognormal variance with pedigree 0.21, pedigree (1,1,5,1,1)
  (same comment as for waste cement, hydrated)
  properties: dry mass 1 kg, wet mass 1 kg
- chemical, inorganic: 4.6407e-9 kg; lognormal variance with pedigree 0.21, pedigree (1,1,5,1,1)
  (same comment as for waste cement, hydrated)
  properties: carbon content, fossil 0.003, wet mass 1 kg, dry mass 1 kg
  note on carbon content, fossil: This dataset is an unweighted average of 20 inorganic substances (listed in Tab 88.1, ecoinvent v2.2 report 8, part II), being part of the top100 chemicals included in this database. The C-content has also been calculated as an unweighted average of the C content of the substances composing this dataset.
- sewer grid, 5E9l/year, 110 km: 2.1782e-7 km; lognormal variance with pedigree 0.04, pedigree (1,1,5,1,1)
  uncertainty heeded in exchanges of the module
- waste graphical paper: -0.0155 kg; lognormal variance with pedigree 0.04, pedigree (1,1,5,1,1)
  (same comment as for electricity, low voltage)
  production volume 74911.4 kg; = (Ref('899e69b5-6904-43a3-bb88-999712bbb5a8')*-1)* Ref('5468cd8e-5960-4843-a71a-510cd1fb8905', 'ProductionVolume')/ABS( Ref('5468cd8e-5960-4843-a71a-510cd1fb8905'))
    (same comment as for waste cement, hydrated)
  properties: carbon content, non-fossil 0.454955, water content 0.126126, wet mass 1 kg, dry mass 0.888 kg
- liquid manure spreading, by vacuum tanker: 1.5371e-7 m3; lognormal variance with pedigree 0.04, pedigree (1,1,5,1,1)
  burden from sludge spreading. Uncertainty calculated from wastewater composition and treatment model
  This exchange has an activity link directly to the producing activity because the product is primarily consumed in the same geographical area where it is produced.

## Emissions to nature
- Copper [soil, agricultural]: 1.4575e-6 kg; lognormal variance with pedigree 0.23, pedigree (1,1,5,1,1)
  emission from sludge spreading. Uncertainty calculated from wastewater composition and treatment model
- Lead [soil, agricultural]: 8.3412e-7 kg; lognormal variance with pedigree 0.23, pedigree (1,1,5,1,1)
  (same comment as for Copper)
- Zinc, ion [water, surface water]: 6.1834e-6 kg; lognormal variance with pedigree 0.19, pedigree (1,1,5,1,1)
  sewer overload discharge plus direct wastewater treatment plant emission plus emission from sludge incineration. Uncertainty calculated from wastewater composition and treatment model
- Water [air, unspecified]: 0.1 m3; name water_to_air_unspecified; lognormal variance with pedigree 0.0807, pedigree (2,2,5,1,1)
  Calculated value based on water balance.
  property fraction, origin: fresh water 0; name fraction_origin_fresh_water
  property fraction, origin: unspecified 1; name fraction_origin_unspecified
  property fraction, origin: salt water 0; name fraction_origin_salt_water
- Nickel, ion [water, ground-, long-term]: 5.8754e-7 kg; lognormal variance with pedigree 0.22, pedigree (1,1,5,1,1)
  emission from sludge incineration. Uncertainty calculated from wastewater composition and treatment model
- Water [water, unspecified]: 0.9 m3; name water_to_water_unspecified; lognormal variance with pedigree 0.0807, pedigree (2,2,5,1,1)
  Calculated value based on water balance.
  property carbon content, fossil 0; name C_content_fossil
  property carbon content, non-fossil 0; name C_content_non_fossil
  property dry mass 0 kg; name DM
  property fraction, origin: fresh water 1; name fraction_origin_fresh_water_Ww
  property fraction, origin: salt water 0; name fraction_origin_salt_water_Ww
  property fraction, origin: unspecified 0; name fraction_origin_unspecified_Ww
  property water in wet mass 1000 kg; name WWM
  property wet mass 1000 kg; name WM
- Zinc [air, urban air close to ground]: 1.1997e-10 kg; lognormal variance with pedigree 0.27, pedigree (1,1,5,1,1)
  direct digester gas emission plus emission from sludge incineration. Uncertainty calculated from wastewater composition and treatment model
- Zinc [soil, agricultural]: 6.4745e-6 kg; lognormal variance with pedigree 0.23, pedigree (1,1,5,1,1)
  (same comment as for Copper)
- BOD5, Biological Oxygen Demand [water, surface water]: 1.2919e-6 kg; lognormal variance with pedigree 0.05, pedigree (1,1,5,1,1)
  (same comment as for Zinc, ion)
- DOC, Dissolved Organic Carbon [water, ground-, long-term]: 5.4668e-9 kg; lognormal variance with pedigree 0.24, pedigree (1,1,5,1,1)
  (same comment as for Nickel, ion)
- TOC, Total Organic Carbon [water, surface water]: 1.0539e-6 kg; lognormal variance with pedigree 0.04, pedigree (1,1,5,1,1)
  (same comment as for Zinc, ion)
- TOC, Total Organic Carbon [water, ground-, long-term]: 5.4668e-9 kg; lognormal variance with pedigree 0.24, pedigree (1,1,5,1,1)
  (same comment as for Nickel, ion)
- Lead [air, urban air close to ground]: 3.5183e-11 kg; lognormal variance with pedigree 0.26, pedigree (1,1,5,1,1)
  (same comment as for Zinc)
- Copper, ion [water, surface water]: 1.0894e-6 kg; lognormal variance with pedigree 0.19, pedigree (1,1,5,1,1)
  (same comment as for Zinc, ion)
- Nickel, ion [water, surface water]: 1.8196e-6 kg; lognormal variance with pedigree 0.2, pedigree (1,1,5,1,1)
  (same comment as for Zinc, ion)
- Copper [air, urban air close to ground]: 1.2203e-11 kg; lognormal variance with pedigree 0.28, pedigree (1,1,5,1,1)
  (same comment as for Zinc)
- COD, Chemical Oxygen Demand [water, ground-, long-term]: 1.3815e-8 kg; lognormal variance with pedigree 0.24, pedigree (1,1,5,1,1)
  (same comment as for Nickel, ion)
- Carbon [soil, agricultural]: 4.9358e-7 kg; lognormal variance with pedigree 0.23, pedigree (1,1,5,1,1)
  (same comment as for Copper)
- Copper, ion [water, ground-, long-term]: 1.3363e-6 kg; lognormal variance with pedigree 0.24, pedigree (1,1,5,1,1)
  (same comment as for Nickel, ion)
- Zinc, ion [water, ground-, long-term]: 1.1385e-7 kg; lognormal variance with pedigree 5.02, pedigree (1,1,5,1,1)
  (same comment as for Nickel, ion)
- DOC, Dissolved Organic Carbon [water, surface water]: 4.5921e-7 kg; lognormal variance with pedigree 0.17, pedigree (1,1,5,1,1)
  (same comment as for Zinc, ion)
- Chromium VI [water, surface water]: 1.0321e-6 kg; lognormal variance with pedigree 0.19, pedigree (1,1,5,1,1)
  (same comment as for Zinc, ion)
- Carbon dioxide, fossil [air, urban air close to ground]: 1.1417e-5 kg; lognormal variance with pedigree 0.11, pedigree (1,1,5,1,1)
  (same comment as for Nickel, ion)
- Carbon monoxide, fossil [air, urban air close to ground]: 1.6682e-8 kg; lognormal variance with pedigree 0.3, pedigree (1,1,5,1,1)
  (same comment as for Nickel, ion)
- BOD5, Biological Oxygen Demand [water, ground-, long-term]: 4.519e-9 kg; lognormal variance with pedigree 0.24, pedigree (1,1,5,1,1)
  (same comment as for Nickel, ion)
- Lead [water, ground-, long-term]: 6.7405e-8 kg; lognormal variance with pedigree 6.43, pedigree (1,1,5,1,1)
  (same comment as for Nickel, ion)
- Nickel [air, urban air close to ground]: 2.7083e-14 kg; lognormal variance with pedigree 0.32, pedigree (1,1,5,1,1)
  (same comment as for Zinc)
- Chromium VI [water, ground-, long-term]: 5.5415e-8 kg; lognormal variance with pedigree 0.61, pedigree (1,1,5,1,1)
  (same comment as for Nickel, ion)
- NMVOC, non-methane volatile organic compounds, unspecified origin [air, urban air close to ground]: 1.3898e-10 kg; lognormal variance with pedigree 0.38, pedigree (1,1,5,1,1)
  direct digester gas emission. Uncertainty calculated from wastewater composition and treatment model
- Nickel [soil, agricultural]: 5.5327e-7 kg; lognormal variance with pedigree 0.22, pedigree (1,1,5,1,1)
  (same comment as for Copper)
- Methane, fossil [air, urban air close to ground]: 3.0787e-8 kg; lognormal variance with pedigree 0.26, pedigree (1,1,5,1,1)
  (same comment as for Nickel, ion)
- Lead [water, surface water]: 2.1983e-7 kg; lognormal variance with pedigree 0.18, pedigree (1,1,5,1,1)
  (same comment as for Zinc, ion)
- Chromium [air, urban air close to ground]: 3.8706e-14 kg; lognormal variance with pedigree 0.32, pedigree (1,1,5,1,1)
  (same comment as for Zinc)
- Chromium [soil, agricultural]: 4.6153e-7 kg; lognormal variance with pedigree 0.22, pedigree (1,1,5,1,1)
  (same comment as for Copper)
- Chromium, ion [water, surface water]: 1.6684e-9 kg; lognormal variance with pedigree 0.24, pedigree (1,1,5,1,1)
  (same comment as for Nickel, ion)
- COD, Chemical Oxygen Demand [water, surface water]: 3.9337e-6 kg; lognormal variance with pedigree 0.18, pedigree (1,1,5,1,1)
  (same comment as for Zinc, ion)

## Extrapolations
This dataset has been extrapolated from year 2000 to the year of the calculation (2019). The uncertainty has been adjusted accordingly.

## Review by Niels Jungbluth 2009-01-22
passed.
