# calcium chloride to generic market for de-icer

Dataset: EcoSpold 2, unit process
Geography: RER
Time period: 2012-01-01 to 2019-12-31
Technology level: current
Classification: EcoSpold01Categories: chemicals/organics
Classification: ISIC rev.4 ecoinvent: 2011:Manufacture of basic chemicals
Scenario: Business-as-Usual
System model: Allocation at the point of substitution
Generated by: David FitzGerald
Database: ecoinvent
isCopyrightProtected: true
accessRestrictedTo: 1

## General comment
This activity links calcium chloride to the generic market for de-icer. All chemicals that enter that market provide the function of a de-icer.

## Technology
non applicable

## Reference product
- de-icer: 1 kg; By-product classification allocatable product; CPC 34: Basic chemicals
  production volume 1.2006e8 kg; = 0.3*2.3E9*0.174
    The Ullmann encyclopedia identifies calcium chloride application as de-icing to be 30% of the total calcium chloride applications in the USA (Ullmann encyclopedia, calcium chloride 2012). The same relative amount is assumed for the global consumption of calcium chloride.
    ICIS (2005) states that the amount consumed of calcium chloride is 2.3 E9 kg. This represents 70% of the available capacity, which is 3.4E9 kg, and is not fully utilised.
    The European production volume is extrapolated from the global production volume based on reports from Cefic (European Chemical Industry Council), and the American Chemistry Council. According to Cefic (2016) the global sales of chemicals in the year 2015 was 3 534 billion euros. The reported share of sales per region are: EU28 14.7%; Other Europe (Switzerland, Norway, Turkey, Russia and Ukraine) 2.7%; NAFTA (US, Canada and Mexico) 16.5%; Latin America 3.8%; China 39.9%; Japan 3.9%; Republic of Korea 3.2%; India 2.2%; Rest of Asia 11.9%; Rest of the World 1.3%, Switzerland 1%. Cefic also reports the US total sales, which amount to 518.7 billion euros out of the global 3 534 billion euros (14.7%). The same share is reported by the American Chemistry Council (2016), according to which the USA sales account for 15% of global sales for the year 2016.
    The European production volume is therefore extrapolated from the global production volume using the share of 17.4%.
    Reference(s):
    ICIS petrochemical and chemical information provider, 2005. URL: http://www.icis.com/Articles/2005/04/15/669096/product-profile-calcium-chloride.html
    Cefic 2016. Facts and figures 2016 of the European chemical industry. Accessible at: http://www.cefic.org/Facts-and-Figures/Chemicals-Industry-Profile/
    American Chemistry Council 2016. Outlook: U.S. Chemical Industry Continues to Outpace Industrial Output; Accounts for More Than One-Half of Construction Spending by Manufacturing Sector. Accessible at: https://www.americanchemistry.com/Media/PressReleasesTranscripts/ACC-news-releases/US-Chemical-Industry-Continues-to-Outpace-Industrial-Output.html
  property price 0.13 EUR2005
    Temporary price data. Calculated as 90% of purchasers price based on: 2004 import and export prices (total trades (USD) divided by total weight (kg) in EU27, USA, China, Japan and India) from UN data - Calcium chloride (http://data.un.org/Data.aspx?q=calcium+chloride&d=ComTrade&f=_l1Code%3a29%3bcmdCode%3a282720; accessed 1 June 10).
  property carbon content 0
    carbon content on a dry matter basis (reserved; not for manual entry)
  properties: water content 0, wet mass 1 kg, water in wet mass 0 kg, dry mass 1 kg, carbon content, fossil 0, carbon content, non-fossil 0, carbon allocation 0 kg

## Inputs from technosphere
- calcium chloride: 1 kg; lognormal variance with pedigree 0.0106, pedigree (4,1,3,1,1)
  properties: wet mass 1 kg, dry mass 1 kg

## Extrapolations
This dataset has been extrapolated from year 2012 to the year of the calculation (2019). The uncertainty has been adjusted accordingly.
