# electrolytic refining of primary copper

Dataset: EcoSpold 2, unit process
Geography: GLO
Time period: 1994-01-01 to 2019-12-31
Technology level: current
Classification: EcoSpold01Categories: metals/extraction
Classification: ISIC rev.4 ecoinvent: 2420:Manufacture of basic precious and other non-ferrous metals
Tags: ConvertedDataset
Scenario: Business-as-Usual
System model: Allocation at the point of substitution
Generated by: Mischa Classen
Published in: Classen M. 2009
Database: ecoinvent
isCopyrightProtected: true
accessRestrictedTo: 1

## General comment
This dataset represents the joint production of 1 kg of cathode copper and 0.0016294 kg of anode silver-tellurium-containing anode slime, by means of electrolytic refining of copper, in 2003. Cathode copper is an intermediary in the production of refined copper and is not to be used by the LCA practitioner. Silver-tellurium-containing anode slime receives part of the burdens allocated (See Fig 1).

## Geography
Data refers to global copper production and hence reflects a global average.

## Technology
Electrorefining of copper anode.

## Reference product
- copper, cathode: 1 kg; CPC 41412: Unrefined copper; copper anodes for electrolytic refining; By-product classification allocatable product
  EcoSpold01Location=GLO
  Modelled, based on “[ISIC 2420]” - pdf-document on the dedicated talk page of ecoinvent (www.ecoinvent.org/documentation).
  See part "Telluride and Silver containing slime as by-product"
  production volume 1.57055e7 kg
    Unknown
    Calculated relative to anode slime
  property price 3.33 EUR2005
    Temporary price data. Calculated as 90% of purchasers price based on: Source: ecoinvent v2 report 10-part III, pag 66
  property carbon content 0
    carbon content on a dry matter basis (reserved; not for manual entry)
  property true value 3.33
    allocation property applied in "true value" allocation // value calculated from revenue
  properties: water content 0, wet mass 1 kg, carbon content, fossil 0, carbon content, non-fossil 0, dry mass 1 kg, water in wet mass 0 kg, carbon allocation 0 kg

## By-products
- anode slime, silver and tellurium containing, from primary copper production: 0 kg; CPC 4: Metal products, machinery and equipment; By-product classification allocatable product; pedigree (1,1,1,1,1)
  Modelled, based on “[ISIC 2420]” - pdf-document on the dedicated talk page of ecoinvent (www.ecoinvent.org/documentation).
  See part "Telluride and Silver containing slime as by-product"
  production volume 25590.6 kg; = Ref('8178e972-7c85-4371-91dd-87831d9aa088', 'ProductionVolume') * (Ref('783c18d3-e065-49ac-9987-03fa0385942f') / Ref('8178e972-7c85-4371-91dd-87831d9aa088'))
    Calculated from production volume of reference product using the relative outputs.
  property price 4.06 EUR2005
    (same comment as for copper, cathode)
  property carbon content 0
    carbon content on a dry matter basis (reserved; not for manual entry)
  property true value 0.00661536
    allocation property applied in "true value" allocation // value calculated from revenue
  properties: wet mass 1 kg, dry mass 1 kg, water content 0, carbon content, non-fossil 0, carbon content, fossil 0, water in wet mass 0 kg, carbon allocation 0 kg

## Inputs from technosphere
- copper: 0.998017 kg; lognormal variance with pedigree 0.04, pedigree (1,1,5,1,1)
  (same comment as for copper, cathode)
  properties: dry mass 1 kg, wet mass 1 kg

## Inputs from nature
- Tellurium, in ground [natural resource, in ground]: 4.87841e-5 kg; lognormal variance with pedigree 0.04, pedigree (1,1,5,1,1)
  0.5 ppm Te in sulfide; 0.2 ppm Te in ore; Modelled, based on “[ISIC 2420]” - pdf-document on the dedicated talk page of ecoinvent (www.ecoinvent.org/documentation).
  See part "Telluride and Silver containing slime as by-product"
- Silver, in ground [natural resource, in ground]: 0.000325224 kg; lognormal variance with pedigree 0.04, pedigree (1,1,5,1,1)
  3.2 ppm Ag in sulfide; 1.2 ppm Ag in ore; Modelled, based on “[ISIC 2420]” - pdf-document on the dedicated talk page of ecoinvent (www.ecoinvent.org/documentation).
  See part "Telluride and Silver containing slime as by-product"

## Sampling procedure
Literature

## Extrapolations
see Geography and Technology

## Review by Roland Hischier 2011-09-19
Transfer of documentation done.

## Review by Bo Weidema 2012-10-03
anode slime added as by-product rather than reference product

## Review by Roberto Dones 2007-08-22
Passed
