# lath, hardwood, raw, kiln drying to u=20%

Dataset: EcoSpold 2, unit process
Geography: CA-QC
Time period: 2011-01-01 to 2019-12-31
Technology level: current
Classification: ISIC rev.4 ecoinvent: 1610:Sawmilling and planing of wood
Tags: recontextualization
Scenario: Business-as-Usual
System model: Allocation at the point of substitution
Share of production covered: 0 %
Generated by: Hugues Imbeault-Tétreault
Published in: Bauer, C. 2007
Database: ecoinvent
isCopyrightProtected: true
accessRestrictedTo: 1

## General comment
This dataset represents the service of kiln drying of one m3 sawn hardwood lath. The wood chip used in the process is considered to be supplied internally which are generated from slabs and sidings when sawing. Characteristics of the of wood chips to be burned: Dry wood density 640 kg/m3; the low heating value 4208 MJ/m3, humidity when burned is estimated to be around 50%, which is achieved after some weeks of drying in the storage. Wood chip will be able to supply the entire thermal demand for drying, Air emission factors as well as the boiler efficiency represent average annual operation including start and stop (warm-up and shut-down). The boiler used is considered to be 300 kW and emission profile refers to the facility. Shrinkage ratio of between the moisture content of u=30% - 0% is 0.004 %/%.
The data was provided by and approved by the Swiss forest industry.
Within ecoinvent, three products - boards, beams and laths - are distinguished:
After being sawn, the resulting products can either be air dried down to a moisture content of u=20% (mass of water per dry mass), kiln dried down to u=20% or kiln dried down to u=10%. The activity name indicates the respective product, drying technology and target moisture.
The exchanges of this child dataset are identical to the GLO dataset. This dataset was created to enable linking to regional markets (e.g. for electricity). Data quality indicators were adjusted accordingly.

## Included activities start
Kiln drying process starting from sawn hardwood, at the sawmill site, assumed to lose some water before the start of the kiln drying process.

## Included activities end
This activity ends with kiln dried hardwood lath, at sawmill. The dataset includes kiln drying of wet wood assumed as u=50% down to u=20%, and shrinkage. The dataset does not include air emissions released from the wood, as these emissions are assumed to be similar to natural emissions from decomposition/rotting of wood.

## Parameters
- emission of sulfur dioxide: 3.33333e-6 kg/MJ; name SO2
  updated emission profile (amount of emission in kg/MJ heat) based on personal communication, PSI, 2014
- emission of Potassium: 3.12e-5 kg/MJ; name Potassium
  (same comment as for emission of sulfur dioxide)
- emission of non-methane volatile organic compounds, unspecified origin: 1.4e-5 kg/MJ; name NMVOC
  (same comment as for emission of sulfur dioxide)
- wood ash: 0.000666667 kg/MJ; name woodash
  generation of wood ash per MJ
- emission of Phenol, pentachloro-: 1.08e-11 kg/MJ; name Phenol_pentachloro
  (same comment as for emission of sulfur dioxide)
- emission of Phosphorus: 4e-7 kg/MJ; name Phosphorus
  (same comment as for emission of sulfur dioxide)
- furnace, wood chip: 2.31481e-8 unit/MJ; name furnace_energy
  inventory of furnace per MJ of heating demand
- emission of Nickel: 8e-9 kg/MJ; name Nickel
  (same comment as for emission of sulfur dioxide)
- emission of benzo(a)pyrene: 6.66667e-10 kg/MJ; name benzo
  (same comment as for emission of sulfur dioxide)
- emission of benzene, hexachloro: 9.6e-15 kg/MJ; name ben_hexa
  (same comment as for emission of sulfur dioxide)
- emission of sodium: 1.73333e-6 kg/MJ; name sodium
  (same comment as for emission of sulfur dioxide)
- emission of zinc: 4e-7 kg/MJ; name zinc
  (same comment as for emission of sulfur dioxide)
- wood density, basic: 588.8 kg/m3; name basic_wood_d
  kg oven-dry matter/wet volume
- scaling factor: 1.33333 dimensionless; name scaling_factor; lognormal variance with pedigree 0.0016, pedigree (2,1,1,1,1)
  The scaling factor corresponds to the inverse of the average annual efficiency of the heating system, including start/stop (warm up and cool down). Therefore, this efficiency will be lower than figures provided by manufacturers. The estimated value was provided by T.Nussbaumer, Verenum, and represents the average installed boiler in this size category in Switzerland.
- moisture content wood chip: 50 dimensionless; name moisture_woodchip
  moisture content of wood chip
- emission of ammonia: 2.30667e-6 kg/MJ; name ammonia
  (same comment as for emission of sulfur dioxide)
- total heat: 672 MJ; name heat_woodchip
  total thermal energy required for the drying process per m3 of output
- wood density, dry: 640 kg/m3; name dry_wood_d
  kg oven-dry matter/oven-dry volume
- shrinkage ratio (u=30% - 0%): 0.004 dimensionless; name shrinkage_ratio
  shrinkage ratio between u=30% to 0%
- emission of arsenic: 1.33333e-9 kg/MJ; name arsenic
  (same comment as for emission of sulfur dioxide)
- emission of cadmium: 9.33333e-10 kg/MJ; name cadmium
  (same comment as for emission of sulfur dioxide)
- emission of acetaldehyde: 8.13333e-8 kg/MJ; name acet
  (same comment as for emission of sulfur dioxide)
- emission of chromium: 5.28e-9 kg/MJ; name chromium
  (same comment as for emission of sulfur dioxide)
- emission of calcium: 7.8e-6 kg/MJ; name calcium
  (same comment as for emission of sulfur dioxide)
- emission of bromine: 8e-8 kg/MJ; name bro
  (same comment as for emission of sulfur dioxide)
- emission of dioxin measured as 2,3,7,8-tetrachlorodibenzo-p-dioxin: 4.13333e-14 kg/MJ; name tetrachloro
  (same comment as for emission of sulfur dioxide)
- emission of benzene, ethyl: 4e-8 kg/MJ; name ben_ethyl
  (same comment as for emission of sulfur dioxide)
- emission of benzene: 1.21333e-6 kg/MJ; name benzene
  (same comment as for emission of sulfur dioxide)
- emission of dinitrogen monoxide: 3.06667e-6 kg/MJ; name N2O
  (same comment as for emission of sulfur dioxide)
- emission of Fluorine: 6.66667e-8 kg/MJ; name Fluorine
  (same comment as for emission of sulfur dioxide)
- emission of Hydrocarbons, aliphatic, unsaturated: 4.13333e-6 kg/MJ; name Hydrocarbons_aliphatic
  (same comment as for emission of sulfur dioxide)
- emission of chromium 4: 5.33333e-11 kg/MJ; name chroIV
  (same comment as for emission of sulfur dioxide)
- emission of carbon monoxide, non-fossil: 0.000333333 kg/MJ; name co
  (same comment as for emission of sulfur dioxide)
- emission of Methane, non-fossil: 3.2e-6 kg/MJ; name Methane_nonfossil
  (same comment as for emission of sulfur dioxide)
- emission of Manganese: 2.26667e-7 kg/MJ; name Manganese
  (same comment as for emission of sulfur dioxide)
- emission of Mercury: 4e-10 kg/MJ; name Mercury
  (same comment as for emission of sulfur dioxide)
- emission of Hydrocarbons, aliphatic, alkanes, unspecified: 1.21333e-6 kg/MJ; name Hydrocarbons_aliphatic_alkanes
  (same comment as for emission of sulfur dioxide)
- emission of Formaldehyde: 1.73333e-7 kg/MJ; name Formaldehyde
  (same comment as for emission of sulfur dioxide)
- emission of chlorine: 2.4e-7 kg/MJ; name ch
  (same comment as for emission of sulfur dioxide)
- emission of lead: 3.33333e-8 kg/MJ; name lead
  (same comment as for emission of sulfur dioxide)
- emission of copper: 2.93333e-8 kg/MJ; name copper
  (same comment as for emission of sulfur dioxide)
- emission of Magnesium: 4.8e-7 kg/MJ; name Magnesium
  (same comment as for emission of sulfur dioxide)
- emission of m-Xylene: 1.6e-7 kg/MJ; name mXylene
  (same comment as for emission of sulfur dioxide)
- moisture content lath: 20 dimensionless; name moisture_lath
  moisture content of lath
- emission of polycyclic aromatic hydrocarbons: 1.48e-8 kg/MJ; name PAH
  (same comment as for emission of sulfur dioxide)
- emission of Nitrogen oxides: 0.00024 kg/MJ; name no2
  (same comment as for emission of sulfur dioxide)
- emission of Particulates >10: 6.66667e-6 kg/MJ; name Particulates_higher_10
  (same comment as for emission of sulfur dioxide)
- emission of toluene: 4e-7 kg/MJ; name toluene
  (same comment as for emission of sulfur dioxide)
- emission of Particulates 2.5: 0.00012 kg/MJ; name Particulate2_5
  (same comment as for emission of sulfur dioxide)
- emission of Particulates >2.5 to <10: 6.66667e-6 kg/MJ; name Particulates2_5_to_10
  (same comment as for emission of sulfur dioxide)

## Reference product
- sawnwood, lath, hardwood, raw, dried (u=20%): 1 m3; name lath_raw_kiln; By-product classification allocatable product; CPC 31102: Wood, sawn or chipped lengthwise, sliced or peeled, of a thickness exceeding 6 mm, of non-coniferous wood
  production volume 94246.3 m3; name p_sawnwood_dried; = 2681.2/24340*8.5557E+05
    Annual production of sawn hardwood (sawnwood NC = non-coniferous from FAOStat for Switzerland), extrapolatedion to Quebec (Canada) production volume via the production volumes of sawnwood (NC = non-coniferous) in Switzerland and Quebec according to FAOStat and Statistics Canada, respectively.
  property water content 0.2; name water_content
  property wet mass 706.56 kg; = basic_wood_d*(1+ water_content)
  property water in wet mass 117.76 kg; name WWM_dried; = basic_wood_d* water_content
  property dry mass 588.8 kg; = basic_wood_d
  property price 265 EUR2005; name lath_raw_kiln_price_EUR2005
    Expert judgement (Urs Luginbühl, Swiss Sawmilling industry, personal communication in June 2014). Cross-reference; FAOSTAT (accessed 20140428). The price is calculated by using data on total world import quantity (m3) and import value (1000 USD), year 2005. 25656806 m3 of Sawnwood (NC) - coniferous was imported in the world in 2005. The import value was 9652714000 USD. The calculated price is thus (9652714000/25656806=376*0.8=) 303 Euro.
  property carbon content 0.494
    carbon content on a dry matter basis (reserved; not for manual entry)
  property true value 265; name lath_raw_kiln_true_value
    allocation property applied in "true value" allocation // value calculated from revenue
  properties: carbon content, non-fossil 0.494, carbon content, fossil 0, carbon allocation 290.867 kg

## By-products
- heat, for reuse in municipal waste incineration only: 0 MJ; CPC 17300: Steam and hot water; By-product classification allocatable product; pedigree (1,1,1,1,1)
  Net electricity generated from this waste and used in internal MSWI plant energy redistribution.
  Uncertainty: uncertainty is calculated from uncertainties in waste composition and uncertainties in energy efficiency and the uncertainty in internal energy demand
  production volume 0.711707 MJ
  property exergy 0.1842 MJ; name E_th_prod_MSWI_exergy
    This exergy property is based on the exergy content of the product.
  property price 0.0106 EUR2005; name E_th_prod_MSWI_price_EUR2005
    Average European district heat price from Ecoheatcool and Euroheat 2005-2006, Ecoheat Work package 1: The European heat market. Final report. 10.6 EUR/GJ i s the price of district heat. http://www.solarthermalworld.org/files/Ecoheatcool%20WP1%20Web.pdf?download
  property true value relation 0.1842; name E_th_prod_MSWI_true_value_relation
    property to calculate "true value" from
  property true value 4.96741e-8
    allocation property applied in "true value" allocation // value calculated from true value relation
- electricity, for reuse in municipal waste incineration only: 0 kWh; CPC 17100: Electrical energy; By-product classification allocatable product; pedigree (1,1,1,1,1)
  (same comment as for heat, for reuse in municipal waste incineration only)
  production volume 0.100228 kWh
  property price 0.1 EUR2005; name E_el_prod_MSWI_price_EUR2005
    Estimated to be the same price as in case of electricity, medium voltage.
  property exergy 3.6 MJ; name E_el_prod_MSWI_exergy
    This exergy property is based on the exergy content of the product.
  property true value relation 3.6; name E_el_prod_MSWI_true_value_relation
    property to calculate "true value" from
  property true value 1.36719e-7
    (same comment as for heat, for reuse in municipal waste incineration only)

## Inputs from technosphere
- wood chips, wet, measured as dry mass: 51.4351 kg; name woodchip_hard; lognormal variance with pedigree 0.0046, pedigree (2,1,3,5,1)
  used as a fuel to produce heat for the drying process
  property wet mass 1.5 kg; name woodchip_hard_WM
  property carbon content, fossil 0; name woodchip_hard_C_content_fossil
  property heating value, gross 19.6 MJ; name woodchip_hard_Gross_Heat_Value
  property dry mass 1 kg; name woodchip_hard_DM
  property water in wet mass 0.5 kg; name woodchip_hard_WWM
  property carbon content, non-fossil 0.494; name woodchip_hard_C_content_non_fossil
  property water content 0.5; name woodchip_hard_water_content
  property heating value, net 11.6133 MJ; name woodchip_hard_Net_Heat_Value
  note on heating value, gross: gross (upper) heating (calorific) value according to ecoinvent guidelines 2.2
  note on heating value, net: net (lower) heating (calorific) value; calculated according to ecoinvent guidelines 2.2
- sawnwood, hardwood, raw: 1.04167 m3; name m_sawnwood; source Rudi Wagenführ 2000; lognormal variance with pedigree 0.0046, pedigree (2,1,3,5,1)
  Processed internally within the sawmill
  property water in wet mass 394.24 kg; name WWM_sawnwood
  properties: water content 0.7, wet mass 957.44 kg, carbon content, non-fossil 0.494, dry mass 563.2 kg
- wood ash mixture, pure: -0.448 kg; name wood_ash; lognormal variance with pedigree 0.0052, pedigree (2,1,3,5,1)
  calculated from the amount of wood ash per MJ heat produced times the amount of heat needed for drying; according to updated emission profiles by PSI and heat requirements from industry.
  production volume 42222.3 kg; = wood_ash*p_sawnwood_dried/lath_raw_kiln
    Calculated from production volume of reference product using the relative outputs.
  property price 0 EUR2005; name wood_ash_price_EUR2005
  properties: dry mass 1 kg, wet mass 1 kg, carbon content, non-fossil 0.012
- technical wood drying facility: 3.66e-6 unit; name wooddrying; lognormal variance with pedigree 0.4346, pedigree (2,1,3,5,1)
  infrastructure, data from ecoinvent 2.2
- electricity, medium voltage: 20 kWh; name elec_midvol; lognormal variance with pedigree 0.0046, pedigree (2,1,3,5,1)
  used to run the kiln; industry data
- furnace, wood chips, with silo, 300kW: 1.55556e-5 unit; name furnace; lognormal variance with pedigree 0.4346, pedigree (2,1,3,5,1)
  infrastructure for the production of heat from wood chips

## Emissions to nature
- Formaldehyde [air, urban air close to ground]: 0.00011648 kg; lognormal variance with pedigree 0.0052, pedigree (2,1,3,5,1)
  calculated from the emission profile per MJ heat produced times the amount of heat needed for drying; according to updated emission profiles by PSI and heat requirements from industry.
- Toluene [air, urban air close to ground]: 0.0002688 kg; lognormal variance with pedigree 0.0052, pedigree (2,1,3,5,1)
  (same comment as for Formaldehyde)
- Hydrocarbons, aliphatic, alkanes, unspecified [air, urban air close to ground]: 0.00081536 kg; lognormal variance with pedigree 0.0052, pedigree (2,1,3,5,1)
  (same comment as for Formaldehyde)
- Zinc [air, urban air close to ground]: 0.0002688 kg; lognormal variance with pedigree 0.0052, pedigree (2,1,3,5,1)
  (same comment as for Formaldehyde)
- Hydrocarbons, aliphatic, unsaturated [air, urban air close to ground]: 0.0027776 kg; lognormal variance with pedigree 0.0052, pedigree (2,1,3,5,1)
  (same comment as for Formaldehyde)
- Chromium [air, urban air close to ground]: 3.54816e-6 kg; lognormal variance with pedigree 0.0052, pedigree (2,1,3,5,1)
  (same comment as for Formaldehyde)
- Lead [air, urban air close to ground]: 2.24e-5 kg; lognormal variance with pedigree 0.0052, pedigree (2,1,3,5,1)
  (same comment as for Formaldehyde)
- PAH, polycyclic aromatic hydrocarbons [air, urban air close to ground]: 9.9456e-6 kg; lognormal variance with pedigree 0.0052, pedigree (2,1,3,5,1)
  (same comment as for Formaldehyde)
- Magnesium [air, urban air close to ground]: 0.00032256 kg; lognormal variance with pedigree 0.0052, pedigree (2,1,3,5,1)
  (same comment as for Formaldehyde)
- Fluorine [air, urban air close to ground]: 4.48e-5 kg; lognormal variance with pedigree 0.0052, pedigree (2,1,3,5,1)
  (same comment as for Formaldehyde)
- Manganese [air, urban air close to ground]: 0.00015232 kg; lognormal variance with pedigree 0.0052, pedigree (2,1,3,5,1)
  (same comment as for Formaldehyde)
- Arsenic [air, urban air close to ground]: 8.96e-7 kg; lognormal variance with pedigree 0.0052, pedigree (2,1,3,5,1)
  (same comment as for Formaldehyde)
- Mercury [air, urban air close to ground]: 2.688e-7 kg; lognormal variance with pedigree 0.0052, pedigree (2,1,3,5,1)
  (same comment as for Formaldehyde)
- Benzene [air, urban air close to ground]: 0.00081536 kg; lognormal variance with pedigree 0.0052, pedigree (2,1,3,5,1)
  (same comment as for Formaldehyde)
- Methane, non-fossil [air, urban air close to ground]: 0.0021504 kg; lognormal variance with pedigree 0.0052, pedigree (2,1,3,5,1)
  (same comment as for Formaldehyde)
- Acetaldehyde [air, urban air close to ground]: 5.4656e-5 kg; lognormal variance with pedigree 0.0052, pedigree (2,1,3,5,1)
  (same comment as for Formaldehyde)
- m-Xylene [air, urban air close to ground]: 0.00010752 kg; lognormal variance with pedigree 0.0052, pedigree (2,1,3,5,1)
  (same comment as for Formaldehyde)
- Ammonia [air, urban air close to ground]: 0.00155008 kg; lognormal variance with pedigree 0.0052, pedigree (2,1,3,5,1)
  (same comment as for Formaldehyde)
- Nickel [air, urban air close to ground]: 5.376e-6 kg; lognormal variance with pedigree 0.0052, pedigree (2,1,3,5,1)
  (same comment as for Formaldehyde)
- Benzene, ethyl- [air, urban air close to ground]: 2.688e-5 kg; lognormal variance with pedigree 0.0052, pedigree (2,1,3,5,1)
  (same comment as for Formaldehyde)
- Nitrogen oxides [air, urban air close to ground]: 0.16128 kg; lognormal variance with pedigree 0.0052, pedigree (2,1,3,5,1)
  (same comment as for Formaldehyde)
- Benzene, hexachloro- [air, urban air close to ground]: 6.4512e-12 kg; lognormal variance with pedigree 0.0052, pedigree (2,1,3,5,1)
  (same comment as for Formaldehyde)
- NMVOC, non-methane volatile organic compounds, unspecified origin [air, urban air close to ground]: 0.009408 kg; lognormal variance with pedigree 0.0052, pedigree (2,1,3,5,1)
  (same comment as for Formaldehyde)
- Benzo(a)pyrene [air, urban air close to ground]: 4.48e-7 kg; lognormal variance with pedigree 0.0052, pedigree (2,1,3,5,1)
  (same comment as for Formaldehyde)
- Chlorine [air, urban air close to ground]: 0.00016128 kg; lognormal variance with pedigree 0.0052, pedigree (2,1,3,5,1)
  (same comment as for Formaldehyde)
- Particulates, < 2.5 um [air, urban air close to ground]: 0.08064 kg; lognormal variance with pedigree 0.0052, pedigree (2,1,3,5,1)
  (same comment as for Formaldehyde)
- Bromine [air, urban air close to ground]: 5.376e-5 kg; lognormal variance with pedigree 0.0052, pedigree (2,1,3,5,1)
  (same comment as for Formaldehyde)
- Chromium VI [air, urban air close to ground]: 3.584e-8 kg; lognormal variance with pedigree 0.0052, pedigree (2,1,3,5,1)
  (same comment as for Formaldehyde)
- Phenol, pentachloro- [air, urban air close to ground]: 7.2576e-9 kg; lognormal variance with pedigree 0.0052, pedigree (2,1,3,5,1)
  (same comment as for Formaldehyde)
- Cadmium [air, urban air close to ground]: 6.272e-7 kg; lognormal variance with pedigree 0.0052, pedigree (2,1,3,5,1)
  (same comment as for Formaldehyde)
- Particulates, > 2.5 um, and < 10um [air, unspecified]: 0.00448 kg; lognormal variance with pedigree 0.0106, pedigree (2,1,3,5,1)
  (same comment as for Formaldehyde)
- Phosphorus [air, urban air close to ground]: 0.0002688 kg; lognormal variance with pedigree 0.0052, pedigree (2,1,3,5,1)
  (same comment as for Formaldehyde)
- Calcium [air, urban air close to ground]: 0.0052416 kg; lognormal variance with pedigree 0.0052, pedigree (2,1,3,5,1)
  (same comment as for Formaldehyde)
- Copper [air, urban air close to ground]: 1.9712e-5 kg; lognormal variance with pedigree 0.0052, pedigree (2,1,3,5,1)
  (same comment as for Formaldehyde)
- Potassium [air, urban air close to ground]: 0.0209664 kg; lognormal variance with pedigree 0.0052, pedigree (2,1,3,5,1)
  (same comment as for Formaldehyde)
- Carbon dioxide, non-fossil [air, urban air close to ground]: 93.1662 kg; lognormal variance with pedigree 0.0052, pedigree (2,1,3,5,1)
  (same comment as for Formaldehyde)
- Dinitrogen monoxide [air, urban air close to ground]: 0.0020608 kg; lognormal variance with pedigree 0.0052, pedigree (2,1,3,5,1)
  (same comment as for Formaldehyde)
- Sodium [air, urban air close to ground]: 0.0011648 kg; lognormal variance with pedigree 0.0052, pedigree (2,1,3,5,1)
  (same comment as for Formaldehyde)
- Carbon monoxide, non-fossil [air, urban air close to ground]: 0.224 kg; lognormal variance with pedigree 0.0052, pedigree (2,1,3,5,1)
  (same comment as for Formaldehyde)
- Dioxins, measured as 2,3,7,8-tetrachlorodibenzo-p-dioxin [air, urban air close to ground]: 2.7776e-11 kg; lognormal variance with pedigree 0.0052, pedigree (2,1,3,5,1)
  (same comment as for Formaldehyde)
- Sulfur dioxide [air, urban air close to ground]: 0.00224 kg; lognormal variance with pedigree 0.0052, pedigree (2,1,3,5,1)
  (same comment as for Formaldehyde)
- Water [air, unspecified]: 0.292907 m3; = (m_sawnwood*WWM_sawnwood-lath_raw_kiln*WWM_dried)/1000; lognormal variance with pedigree 0.008, pedigree (1,1,3,1,1)
  difference in water contained in the sawnwood before and after drying, converted from kg to m3

## Sampling procedure
complementary literature and sampling from sawmills

## Extrapolations
Extrapolated from CH data. The exchanges of this child dataset are identical to the GLO dataset. This dataset was created to enable linking to regional markets (e.g. for electricity). Data quality indicators were adjusted accordingly.
