# hydrogen cracking, APME

Dataset: EcoSpold 2, unit process
Geography: RER
Time period: 1999-01-01 to 2019-12-31
Technology level: current
Classification: ISIC rev.4 ecoinvent: 1920:Manufacture of refined petroleum products
Classification: EcoSpold01Categories: chemicals/inorganics
Tags: ConvertedDataset
Scenario: Business-as-Usual
System model: Allocation at the point of substitution
Generated by: Roland Hischier
Published in: Althaus H.-J. 2007
Database: ecoinvent
isCopyrightProtected: true
accessRestrictedTo: 1

## General comment
This data represents the production of 1 kg of liquid hydrogen via the cracking of fossil fuels. Raw materials and emissions are modelled with literature values representing an aggregation of data from 17 production plants. Not included are the values reported for: recyclable wastes, amount of air / N2 / O2 consumed, unspecified metal emission to air and to water, mercaptan emission to air, unspecified CFC/HCFC emission to air, dioxin to water.

## Included activities start
From the reception of fossil fuels at the factory gate.

## Included activities end
This activity ends with the production of 1 kg of liquid hydrogen, 100% at the factory gate. The dataset includes the input materials and emissions.

## Geography
17 European plants

## Technology
In 1988, some 500 billion cubic meters of hydrogen were produced annually. Worldwide, 48% of hydrogen is produced from natural gas, 30% from oil (mostly consumed in refineries), 18% from coal, and the remaining (4%) via water electrolysis. Major manufacturers include Linde, Air Liquide, and Praxair.
Hydrogen can be produced at refineries by steam reforming of light ends or natural gas (the most common production route in Europe) or by partial oxidation (gasification) of heavy oil fractions (produces syngas, from which hydrogen can be separated). Hydrogen can also be produced by coal or coke gasification.
Steam reforming:
Natural gas, refinery gas and light naphtha are fed into a reactor and are heated to 760 - 840 °C and pressurized at 20 – 30 bar in the presence of a catalyst. Heat is provided by furnace burners. Steam is reacted with CO to produce carbon dioxide and hydrogen (shift reaction). The reformed gas is a mixture of hydrogen, carbon dioxide, carbon monoxide, methane and steam. The non-hydrogen components are removed and the resulting hydrogen has a purity of over 99.9% with a yield of approximately 85%. Steam is raised to cool down the gases.
Steam reforming (endothermic): CnHm + n H2O ===> n CO + (n+m)/2 H2

Shift (Exothermic): CO + H2O <===> CO2 + H2

CO + 3 H2 <===> CH4 + H2O

Methanation (Exothermic): CO2 + 4 H2 <===> CH4 + 2 H2O
Partial oxidation:

Hydrocarbon feed reacts with oxygen at high temperatures to produce a mixture of hydrogen and carbon monoxide. Due to the high temperature, there is no catalyst involved, which means that also heavy fuel oil feedstocks can be used. The gas is generated in a pressure vessel at about 1300 – 1400 °C. The resulting gases are cooled by direct-water quench. Soot and solid impurities are washed out. The hydrogen is 98.6% pure, with nitrogen, argon and methane as impurities.
Gasification: CxHy + O2 ===> CO + H2
Shift (Exothermic): CO + H2O ===> CO2 + H2
Gasification of coke / coal:
Coke is reacted at 850 – 1000 °C with air and steam to form coke gas (a mixture of hydrogen, carbon monoxide, carbon dioxide and nitrogen). The cracked hydrocarbon vapor product is quenched. The hydrogen stems from water. Coal can also be used as feed. In such a case, the coal is pulverized and mixed with water to create a slurry.

C + H2O ===> CO + H2

CO + H2O ===> CO2 + H2
References:
European Commission (2001) Integrated Pollution Prevention and Control (IPPC) - Reference Document on Best Available Techniques for Mineral Oil and Gas Refineries. Institute for Prospective Technological Studies, Sevilla

Scholz W. H. (1992) Processes for industrial production of hydrogen and associ-ated environmental effects. Linde Reports on Science and technology, 50/1992

## Time period
time to which data refer

## Parameters
- fraction, cooling water, to air: 0.3875; name fraction_CW_to_air; = (0.5*fraction_CW_OT_to_air)+(0.5*fraction_CW_R_to_air); lognormal variance with pedigree 0.092025, pedigree (4,4,3,2,4)
  Calculated value based on literature value (see comments of the other parametres present in this dataset) and expert opinion. In the case when no industry/literature data are available about the type of cooling or directly fraction, cooling water, to air specific for the process a default assumption is applied. It is assumed that the once-through cooling system is used in 50% of all cases and recirculating system is used in another 50% of all cases.
- fraction, process water, to air: 0.205 dimensionless; name fraction_PW_to_air; lognormal variance with pedigree 0.092025, pedigree (4,4,3,2,4)
  Literature value (Statistics Canada, 2007 & Shaffer, K.H., 2008, Consumptive water use in the Great Lakes Basin, USGS) (Vionnet, S., Quantis Water Database - Technical Report, 2012).
- fraction, cooling water, recirculating system, to air: 0.771; name fraction_CW_R_to_air; lognormal variance with pedigree 0.0413, pedigree (2,3,1,3,1)
  Calculated based on literature value (Scown, C.D., 2011, Water Footprint of U.S. Transportation Fuels and supplying information of the article) (Vionnet, S., Quantis Water Database - Technical Report, 2012).
- fraction, cooling water, once-through system, to air: 0.004; name fraction_CW_OT_to_air; lognormal variance with pedigree 0.0413, pedigree (2,3,1,3,1)
  (same comment as for fraction, cooling water, recirculating system, to air)
- fraction, cooling water, cooling pond system, to air: 0.032; name fraction_CW_CP_to_air; lognormal variance with pedigree 0.0413, pedigree (2,3,1,3,1)
  (same comment as for fraction, cooling water, recirculating system, to air)

## Reference product
- hydrogen, liquid: 1 kg; CPC 34210: Hydrogen, nitrogen, oxygen, carbon dioxide and rare gases; inorganic oxygen compounds of non-metals n.e.c.; By-product classification allocatable product; CAS 1333-74-0
  Hyrdogen is a colorless gas. Its molecular weight is 2.02 g/mol. Hydrogen boils at -252.9 °C. Hydrogen is flammable and can act as a simple asphyxiant by displacing the oxygen in the air. In addition, when cooled to a liquid form, it may cause sever frostbite.
  Hydrogen is used primarily in the following applications :
  • Commercial fixation of nitrogen from the air to produce ammonia for fertilizer (about two-thirds of commercial hydrogen is used for this)
  •Hydrogenation of fats and oils, in which vegetable oils are changed from liquids to solids;
  •Methanol production, in hydrodealkylation, hydrocracking, and hydrodesulphurization
  •Welding
  •Hydrochloric acid production
  •Metallic ore reduction
  •Hydrogen can be used in fuel cells to power a wide variety of applications (eg cars)
  Source:
  www.hydrogen.energy.gov
  EcoSpold01Location=RER
  production volume 7.80957e9 kg
    Worldwide 240 billion m3 in 1988
    Calculated as residual from other hydrogen production routes
  property price 2.68 EUR2005
    Calculated value based on data from United Nations Commodity Trade Statistics Database (comtrade.un.org). UN comtrade category: 280410 Hydrogen. Year 2005. Using exchange rate of 1EURO = 1.209 USD. Average of price of import into 5 main markets (EU, US, JP, IN and CN). Cross reference; Literature (http://www.ttcorp.com/pdf/marketReport.pdf). The price of hydrogen, liquid is 5-10 USD/kg.
  property carbon content 0
    carbon content on a dry matter basis (reserved; not for manual entry)
  property true value 2.68
    allocation property applied in "true value" allocation // value calculated from revenue
  properties: water in wet mass 0 kg, carbon content, fossil 0, water content 0, carbon content, non-fossil 0, dry mass 1 kg, wet mass 1 kg, carbon allocation 0 kg

## By-products
- electricity, for reuse in municipal waste incineration only: 0 kWh; CPC 17100: Electrical energy; By-product classification allocatable product; pedigree (1,1,1,1,1)
  Net electricity generated from this waste and used in internal MSWI plant energy redistribution.
  Uncertainty: uncertainty is calculated from uncertainties in waste composition and uncertainties in energy efficiency and the uncertainty in internal energy demand
  production volume 0.219233 kWh
  property true value relation 3.6; name E_el_prod_MSWI_true_value_relation
    property to calculate "true value" from
  property exergy 3.6 MJ; name E_el_prod_MSWI_exergy
    This exergy property is based on the exergy content of the product.
  property price 0.1 EUR2005; name E_el_prod_MSWI_price_EUR2005
    Estimated to be the same price as in case of electricity, medium voltage.
  property true value 3.60154e-12
    allocation property applied in "true value" allocation // value calculated from true value relation
- heat, for reuse in municipal waste incineration only: 0 MJ; CPC 17300: Steam and hot water; By-product classification allocatable product; pedigree (1,1,1,1,1)
  Net useful heat generated from this waste and used in internal MSWI plant energy redistribution.
  Uncertainty: uncertainty is calculated from uncertainties in waste composition and uncertainties in energy efficiency and the uncertainty in internal energy demand
  production volume 1.53712 MJ
  property true value relation 0.1842; name E_th_prod_MSWI_true_value_relation
    property to calculate "true value" from
  property exergy 0.1842 MJ; name E_th_prod_MSWI_exergy
    This exergy property is based on the exergy content of the product.
  property price 0.0106 EUR2005; name E_th_prod_MSWI_price_EUR2005
    Average European district heat price from Ecoheatcool and Euroheat 2005-2006, Ecoheat Work package 1: The European heat market. Final report. 10.6 EUR/GJ i s the price of district heat. http://www.solarthermalworld.org/files/Ecoheatcool%20WP1%20Web.pdf?download
  property true value 1.29204e-12
    (same comment as for electricity, for reuse in municipal waste incineration only)
- zinc concentrate: 0 kg; CPC 14290: Other non-ferrous metal ores and concentrates (other than uranium or thorium ores and concentrates); By-product classification allocatable product
  Calculated value from the knowledge of the properties of both products.
  production volume 1.21004e-5 kg
  property price 0.38 EUR2005; name ByP_price_EUR2005
    Temporary price data. Calculated as 90% of purchasers price based on: Zinc content in concentrate 53%. Concentrate price per kg Zn 86.5% of refined Zn price (13.5% treatment charges according to CHR Metals Limited 2005: Dynamic cost curves. http://www.minecost.com/dynamic.pdf). 2004 zinc price from USGS (2007) Mineral commodity summaries 2007. <http://minerals.usgs.gov/minerals/pubs/mcs/2007/mcs2007.pdf> [Accessed 25 May 2010]
  property zinc content 0.53; name zinc_C_zinc_concentrate
    Zinc content on a dry matter basis. Value taken from teh "zinc mine operation" /GLO dataset.
  property dry mass 1 kg; name DM_zinc_concentrate
  property carbon content 0
    carbon content on a dry matter basis (reserved; not for manual entry)
  property true value 5.88782e-16
    allocation property applied in "true value" allocation // value calculated from revenue
  properties: wet mass 1 kg, water content 0, carbon content, non-fossil 0, carbon content, fossil 0, water in wet mass 0 kg, carbon allocation 0 kg
- copper: 0 kg; By-product classification allocatable product; CPC 41413: Refined copper and copper alloys, unwrought; master alloys of copper
  production volume 0.0447025 kg
  property price 5.52 EUR2005
    Literature value (http://www.economist.com/news/business/21576714-mining-industry-has-enriched-chile-its-future-precarious-copper-solution). Average price between 20015 and 2013.
  property carbon content 0
    carbon content on a dry matter basis (reserved; not for manual entry)
  property true value 3.15969e-11
    allocation property applied in "true value" allocation // value calculated from revenue
  properties: water in wet mass 0 kg, water content 0, carbon content, non-fossil 0, dry mass 1 kg, carbon content, fossil 0, wet mass 1 kg, carbon allocation 0 kg
- lead: 0 kg; CPC 41441: Lead, unwrought; By-product classification allocatable product
  EcoSpold01Location=SE
  production volume 0.00116468 kg
  property price 0.744 EUR2005
    Temporary price data. Calculated as 90% of purchasers price based on: Source: ecoinvent v2 report 10-part IX, Tab 5.10 & 2.5
  property carbon content 0
    carbon content on a dry matter basis (reserved; not for manual entry)
  property true value 1.10957e-13
    allocation property applied in "true value" allocation // value calculated from revenue
  properties: wet mass 1 kg, water content 0, carbon content, non-fossil 0, carbon content, fossil 0, dry mass 1 kg, water in wet mass 0 kg, carbon allocation 0 kg
- nickel, 99.5%: 0 kg; CPC 41422: Unwrought nickel; By-product classification allocatable product
  EcoSpold01Location=SE
  production volume 0.00243125 kg
  property price 10.4 EUR2005
    Temporary price data. Calculated as 90% of purchasers price based on: 2004 nickel price from USGS (2007) Mineral commodity summaries 2007. <http://minerals.usgs.gov/minerals/pubs/mcs/2007/mcs2007.pdf> [Accessed 25 May 2010]
  property carbon content 0
    carbon content on a dry matter basis (reserved; not for manual entry)
  property true value 3.23769e-12
    allocation property applied in "true value" allocation // value calculated from revenue
  properties: water in wet mass 0 kg, wet mass 1 kg, carbon content, non-fossil 0, dry mass 1 kg, water content 0, carbon content, fossil 0, carbon allocation 0 kg
- silver: 0 kg; CPC 41310: Silver (including silver plated with gold or platinum), unwrought or in semi-manufactured forms, or in powder […]; By-product classification allocatable product; CAS 7440-22-4
  EcoSpold01Location=SE
  production volume 0.000401496 kg
  property price 178 EUR2005
    (same comment as for lead)
  property carbon content 0
    carbon content on a dry matter basis (reserved; not for manual entry)
  property true value 9.15112e-12
    allocation property applied in "true value" allocation // value calculated from revenue
  properties: wet mass 1 kg, carbon content, non-fossil 0, dry mass 1 kg, water content 0, carbon content, fossil 0, water in wet mass 0 kg, carbon allocation 0 kg
- palladium: 0 kg; CPC 4160: Other non-ferrous metals and articles thereof (including waste and scrap of some metals); cermets and articles […]; By-product classification allocatable product
  EcoSpold01Location=SE
  production volume 2.22255e-5 kg
  property price 5640 EUR2005
    Temporary price data. Calculated as 90% of purchasers price based on: 2004 price from USGS (2007) Mineral commodity summaries 2007. <http://minerals.usgs.gov/minerals/pubs/mcs/2007/mcs2007.pdf> [Accessed 25 May 2010]
  property carbon content 0
    carbon content on a dry matter basis (reserved; not for manual entry)
  property true value 1.6051e-11
    allocation property applied in "true value" allocation // value calculated from revenue
  properties: wet mass 1 kg, carbon content, fossil 0, water in wet mass 0 kg, water content 0, carbon content, non-fossil 0, dry mass 1 kg, carbon allocation 0 kg
- gold: 0 kg; CPC 41320: Gold (including gold plated with platinum), unwrought or in semi-manufactured forms, or in powder form; By-product classification allocatable product; CAS 7440-57-5
  EcoSpold01Location=SE
  production volume 1.21883e-5 kg
  property price 10600 EUR2005
    Temporary price data. Calculated as 90% of purchasers price based on: Source: ecoinvent v2 report 10-part IX, Tab 2.5
  property carbon content 0
    carbon content on a dry matter basis (reserved; not for manual entry)
  property true value 1.65434e-11
    allocation property applied in "true value" allocation // value calculated from revenue
  properties: wet mass 1 kg, carbon content, fossil 0, dry mass 1 kg, carbon content, non-fossil 0, water content 0, water in wet mass 0 kg, carbon allocation 0 kg
- iron scrap, sorted, pressed: 0 kg; By-product classification Recyclable; CPC 39310: Slag, dross, scalings and other waste from the manufacture of iron or steel; pedigree (1,1,1,1,1)
  Iron scrap recovered from this waste.
  production volume 0.00574455 kg
  property price 0.175 EUR2005
    Temporary price data. Calculated as 90% of purchasers price based on: 2005 import and export prices (total trades (USD) divided by total weight (kg) in biggest economies of the world: EU27, USA, Brasil, China, India, Japan and Russia) from UN Commodity Trade Statistics Database (http://data.un.org/Explorer.aspxDatabase [Accessed 2011.06.20]). Commodity: Waste or scrap, of cast iron
  property carbon content 0
    carbon content on a dry matter basis (reserved; not for manual entry)
  property true value 1.28726e-13
    allocation property applied in "true value" allocation // value calculated from revenue
  properties: water content 0, water in wet mass 0 kg, carbon content, fossil 0, dry mass 1 kg, carbon content, non-fossil 0, wet mass 1 kg, carbon allocation 0 kg

## Inputs from technosphere
All rows: source Boustead, I. 2005
- waste wood, untreated: -5.3183e-8 kg
  Literature value. Data represents an average value from seventeen European plants.
  EcoSpold01Location=CH
  production volume 415.336 kg
    Calculated from the production volume of hydrogen, liquid in proportion to the respective output amounts.
  properties: dry mass 0.8 kg, wet mass 1 kg, carbon content, non-fossil 0.48632, water content 0.25
  note on carbon content, non-fossil: Tab A.4, ecoinvent v2.2 report 13_I. C content has been referred to 1 kg DM,
- spoil from hard coal mining: -0.0098962 kg
  EcoSpold01Location=GLO
  Literature value. Data represents an average value from seventeen European plants.
  production volume 7.72851e7 kg
    (same comment as for waste wood, untreated)
  properties: dry mass 1 kg, carbon content, fossil 0.007879, wet mass 1 kg
  note on carbon content, fossil: Composition of coal spoil is adopted by proxy from lignite spoil (pg 19, Doka G. (2009) Life Cycle Inventory of the disposal of lignite spoil, coal spoil and coal tailings. Doka Life Cycle Assessments, Zurich. Commissioned by the Swiss Centre for Life Cycle Inventories ecoinvent Centre)
- municipal solid waste: -0.0013076 kg
  (same comment as for waste wood, untreated)
  production volume 1.02118e7 kg
    (same comment as for waste wood, untreated)
  properties: water content 0.297017, carbon content, non-fossil 0.261655, wet mass 1 kg, dry mass 0.771 kg, carbon content, fossil 0.171549
  note on carbon content, non-fossil: MSW composition in tab 4.1, ecoinvent v2.2 report 13_I. C content referred to 1 kg DM
- decommissioned chemical production facilities: -1.5481e-9 kg
  EcoSpold01Location=RER
  Literature value. Data represents an average value from seventeen European plants.
  production volume 12.09 kg
    (same comment as for waste wood, untreated)
  properties: carbon content, non-fossil 5.78006e-6, carbon content, fossil 0.0169382, wet mass 1 kg, dry mass 1 kg
  note on carbon content, non-fossil: Calculated from C content in input materials in the infrastructure
- average incineration residue: -0.0045974 kg
  EcoSpold01Location=CH
  Literature value. Data represents an average value from seventeen European plants.
  production volume 3.59037e7 kg
    (same comment as for waste wood, untreated)
  properties: dry mass 1 kg, wet mass 1 kg, carbon content, fossil 0.0325466, carbon content, non-fossil 0.0511208
  note on carbon content, fossil: Tab A.1, ecoinvent v2.2 report 13_I. It is considered that 61.1% of the C has a biogenic origin
- waste plastic, mixture: -4.8112e-7 kg
  (same comment as for average incineration residue)
  production volume 3757.34 kg
    (same comment as for waste wood, untreated)
  properties: carbon content, fossil 0.747344, water content 0.180638, dry mass 0.847 kg, wet mass 1 kg
  note on carbon content, fossil: C content in 1 kg DM was calculated using data in Tab A.2, ecoinvent v2.2 report 13_I
- coal slurry: -7.1074e-7 kg
  Literature value. Data represents an average value from seventeen European plants.
  EcoSpold01Location=GLO
  production volume 5550.58 kg
    (same comment as for waste wood, untreated)
  properties: dry mass 1 kg, wet mass 1 kg, carbon content, fossil 0.124
  note on carbon content, fossil: Coal tailings composition in Tab 3.4, (Doka G. (2009) Life Cycle Inventory of the disposal of lignite spoil, coal spoil and coal tailings. Doka Life Cycle Assessments, Zurich. Commissioned by the Swiss Centre for Life Cycle Inventories ecoinvent Centre)
- hazardous waste, for incineration: 0 kg
  (same comment as for average incineration residue)
  production volume 0 kg
    (same comment as for waste wood, untreated)
  properties: wet mass 1 kg, water content 0.333333, carbon content, fossil 0.554667, dry mass 0.75 kg
  note on carbon content, fossil: Tab A.6, ecoinvent v2.2 report 13_I. C content has been calculated after data in the tables, and then referred to 1 kg DM
- hazardous waste, for incineration: -0.00152708, -3.9917e-5 kg (2 entries)
  (same comment as for average incineration residue)
  production volume 1.22376e7 kg

## Inputs from nature
- Feldspar, in ground [natural resource, in ground]: 0 kg; source Boustead, I. 2005
  Literature value. Data represents an average value from seventeen European plants.
- Water, river [natural resource, in water]: 0.000561 m3; name water_river_input; source Boustead, I. 2005; lognormal variance with pedigree 1.21, pedigree (5,5,5,5,5)
  Literature value. Data represents an average value from seventeen European plants.
- Chromium, in ground [natural resource, in ground]: 3.6976e-13 kg; source Boustead, I. 2005
  25.5% Cr in chromite; 11.6% in ore; Literature value. Data represents an average value from seventeen European plants.
- Coal, brown, in ground [natural resource, in ground]: 2.8046e-8 kg; source Boustead, I. 2005
  Literature value. Data represents an average value from seventeen European plants.
- Sodium nitrate, in ground [natural resource, in ground]: 0 kg; source Boustead, I. 2005
  Literature value. Data represents an average value from seventeen European plants.
- Titanium, in ground [natural resource, in ground]: 0 kg; source Boustead, I. 2005
  95% TiO2 in rutile; 0.4% TiO2 in ore; Literature value. Data represents an average value from seventeen European plants.
- Lead, in ground [natural resource, in ground]: 1.8266e-7 kg; source Boustead, I. 2005
  5.0% Pb in sulfide; 3.0% Pb in ore; Literature value. Data represents an average value from seventeen European plants.
- Energy, gross calorific value, in biomass [natural resource, biotic]: 0.13165 MJ
- Clay, unspecified, in ground [natural resource, in ground]: 1.9007e-10 kg; source Boustead, I. 2005
  Literature value. Data represents an average value from seventeen European plants.
- Coal, hard, unspecified, in ground [natural resource, in ground]: 0.048766 kg; source Boustead, I. 2005
  Literature value. Data represents an average value from seventeen European plants.
- Calcite, in ground [natural resource, in ground]: 0.00037358 kg; source Boustead, I. 2005
  Literature value. Data represents an average value from seventeen European plants.
- Nickel, in ground [natural resource, in ground]: 4.7435e-13 kg; source Boustead, I. 2005
  1.98% Ni in silicates; 1.04% Ni in ore; Literature value. Data represents an average value from seventeen European plants.
- Water, salt, ocean [natural resource, in water]: 0.0007846 m3; name water_salt_ocean_input; source Boustead, I. 2005; lognormal variance with pedigree 1.21, pedigree (5,5,5,5,5)
  Literature value. Data represents an average value from seventeen European plants.
- Oil, crude, in ground [natural resource, in ground]: 0.75621 kg; source Boustead, I. 2005
  Literature value. Data represents an average value from seventeen European plants.
- Wood, unspecified, standing [natural resource, biotic]: 4.0436e-9 m3; source Boustead, I. 2005
  Literature value. Data represents an average value from seventeen European plants.
- Dolomite, in ground [natural resource, in ground]: 4.64e-6 kg; source Boustead, I. 2005
  Literature value. Data represents an average value from seventeen European plants.
- Clay, bentonite, in ground [natural resource, in ground]: 0.00011004 kg; source Boustead, I. 2005
  Literature value. Data represents an average value from seventeen European plants.
- Gas, natural, in ground [natural resource, in ground]: 0.92089 m3; source Boustead, I. 2005
  Literature value. Data represents an average value from seventeen European plants.
- Uranium, in ground [natural resource, in ground]: 2.6217e-6 kg; source Boustead, I. 2005
  Literature value. Data represents an average value from seventeen European plants.
- Sodium chloride, in ground [natural resource, in ground]: 0.00053646 kg; source Boustead, I. 2005
  Literature value. Data represents an average value from seventeen European plants.
- Barium, in ground [natural resource, in ground]: 3.0063e-8 kg; source Boustead, I. 2005
  15% BaSO4 in ore; Literature value. Data represents an average value from seventeen European plants.
- Mercury, in ground [natural resource, in ground]: 8.3977e-10 kg; source Boustead, I. 2005
  Literature value. Data represents an average value from seventeen European plants.
- Shale, in ground [natural resource, in ground]: 3.1072e-5 kg; source Boustead, I. 2005
  Literature value. Data represents an average value from seventeen European plants.
- Talc, in ground [natural resource, in ground]: 0 kg; source Boustead, I. 2005
  Literature value. Data represents an average value from seventeen European plants.
- Sylvite, in ground [natural resource, in ground]: 4.4486e-9 kg; source Boustead, I. 2005
  25% Sylvite in sylvinite; Literature value. Data represents an average value from seventeen European plants.
- Fluorspar, in ground [natural resource, in ground]: 1.8819e-7 kg; source Boustead, I. 2005
  92% CaF2 in ore; Literature value. Data represents an average value from seventeen European plants.
- Iron, in ground [natural resource, in ground]: 0.00037772 kg; source Boustead, I. 2005
  46% Fe in siderite; 25% Fe in ore; Literature value. Data represents an average value from seventeen European plants.
- Olivine, in ground [natural resource, in ground]: 3.5437e-6 kg; source Boustead, I. 2005
  Literature value. Data represents an average value from seventeen European plants.
- Water, unspecified natural origin [natural resource, in water]: 0.00072324 m3; name water_UNO_input; source Boustead, I. 2005; lognormal variance with pedigree 1.21, pedigree (5,5,5,5,5)
  Literature value. Data represents an average value from seventeen European plants.
- Zinc, in ground [natural resource, in ground]: 6.6734e-9 kg; source Boustead, I. 2005
  9.0% Zn in sulfide; 5.3% Zn in ore; Literature value. Data represents an average value from seventeen European plants.
- Granite, in ground [natural resource, in ground]: 1.6439e-15 kg; source Boustead, I. 2005
  Literature value. Data represents an average value from seventeen European plants.
- Aluminium, in ground [natural resource, in ground]: 3.7038e-7 kg; source Boustead, I. 2005
  24% Al in bauxite; 11% Al in ore; Literature value. Data represents an average value from seventeen European plants.
- Sand, unspecified, in ground [natural resource, in ground]: 7.1294e-5 kg; source Boustead, I. 2005
  Literature value. Data represents an average value from seventeen European plants.
- Water, well, in ground [natural resource, in water]: 9.0105e-11 m3; name water_well_in_ground_input; source Boustead, I. 2005; lognormal variance with pedigree 1.21, pedigree (5,5,5,5,5)
  Literature value. Data represents an average value from seventeen European plants.
- Anhydrite, in ground [natural resource, in ground]: 1.0976e-5 kg; source Boustead, I. 2005
  Literature value. Data represents an average value from seventeen European plants.
- Energy, potential (in hydropower reservoir), converted [natural resource, in water]: 0.057328 MJ
- Sulfur, in ground [natural resource, in ground]: 9.0887e-5 kg; source Boustead, I. 2005
  Literature value. Data represents an average value from seventeen European plants.
- Phosphorus, in ground [natural resource, in ground]: 1.2431e-12 kg; source Boustead, I. 2005
  18% P in apatite; 12% in ore; Literature value. Data represents an average value from seventeen European plants.
- Magnesite, in ground [natural resource, in ground]: 0 kg; source Boustead, I. 2005
  60% Magnesite in ore; Literature value. Data represents an average value from seventeen European plants.
- Water, cooling, unspecified natural origin [natural resource, in water]: 0.073203 m3; name water_cooling_UNO_input; source Boustead, I. 2005; lognormal variance with pedigree 1.21, pedigree (5,5,5,5,5)
  Literature value. Data represents an average value from seventeen European plants.
- Copper, in ground [natural resource, in ground]: 9.9678e-12 kg; source Boustead, I. 2005
  0.99% Cu in sulfide; 0.36% Cu and 82 ppm Mo in ore; Literature value. Data represents an average value from seventeen European plants.
- Manganese, in ground [natural resource, in ground]: 4.8718e-7 kg; source Boustead, I. 2005
  35.7% Mn in sedimentary deposit; 14.2% Mn in ore; Literature value. Data represents an average value from seventeen European plants.
- Gravel, in ground [natural resource, in ground]: 1.3936e-6 kg; source Boustead, I. 2005
  Literature value. Data represents an average value from seventeen European plants.
- Peat, in ground [natural resource, biotic]: 0.00039488 kg; source Boustead, I. 2005
  Literature value. Data represents an average value from seventeen European plants.

## Emissions to nature
- Nitrogen [water, surface water]: 4.2352e-6 kg; source Boustead, I. 2005
  Literature value. Data represents an average value from seventeen European plants.
- Carbon dioxide, fossil [air, urban air close to ground]: 1.2345 kg; source Boustead, I. 2005
  Literature value. Data represents an average value from seventeen European plants.
- Nitrogen oxides [air, urban air close to ground]: 0.0021159 kg; source Boustead, I. 2005
  Literature value. Data represents an average value from seventeen European plants.
- Zinc, ion [water, surface water]: 8.2803e-8 kg; source Boustead, I. 2005
  Literature value. Data represents an average value from seventeen European plants.
- Lead [air, urban air close to ground]: 1.0413e-9 kg; source Boustead, I. 2005
  Literature value. Data represents an average value from seventeen European plants.
- Ethane, 1,2-dichloro- [water, surface water]: 1.807e-13 kg; source Boustead, I. 2005
  Literature value. Data represents an average value from seventeen European plants.
- Antimony [air, urban air close to ground]: 2.0753e-15 kg; source Boustead, I. 2005
  Literature value. Data represents an average value from seventeen European plants.
- Hydrocarbons, aliphatic, alkanes, cyclic [air, urban air close to ground]: 0 kg; source Boustead, I. 2005
  Literature value. Data represents an average value from seventeen European plants.
- Benzene, ethyl- [air, urban air close to ground]: 0 kg; source Boustead, I. 2005
  Literature value. Data represents an average value from seventeen European plants.
- Benzene [air, urban air close to ground]: 0 kg; source Boustead, I. 2005
  Literature value. Data represents an average value from seventeen European plants.
- Silver [air, urban air close to ground]: 0 kg; source Boustead, I. 2005
  Literature value. Data represents an average value from seventeen European plants.
- Chromium, ion [water, surface water]: 7.3754e-14 kg; source Boustead, I. 2005
  Literature value. Data represents an average value from seventeen European plants.
- Arsenic [air, urban air close to ground]: 1.5272e-10 kg; source Boustead, I. 2005
  Literature value. Data represents an average value from seventeen European plants.
- Fluorine [air, urban air close to ground]: 2.4206e-11 kg; source Boustead, I. 2005
  Literature value. Data represents an average value from seventeen European plants.
- Benzene [water, surface water]: 0 kg; source Boustead, I. 2005
  Literature value. Data represents an average value from seventeen European plants.
- Water [air, unspecified]: 0.0287903 m3; name water_to_air_unspecified; = (water_cooling_UNO_input*fraction_CW_to_air)+(water_river_input*fraction_PW_to_air)+(water_salt_ocean_input*fraction_PW_to_air)+(water_UNO_input*fraction_PW_to_air)+(water_well_in_ground_input*fraction_PW_to_air); lognormal variance with pedigree 0.0807, pedigree (2,2,5,1,1)
  Calculated value based on literature values and expert opinion. See comments in the parametres' comment field.
  property fraction, origin: unspecified 0.990419; name fraction_origin_unspecified
  property fraction, origin: salt water 0.00558671; name fraction_origin_salt_water
  property fraction, origin: fresh water 0.00399458; name fraction_origin_fresh_water
- Aluminium [water, surface water]: 1.4094e-6 kg; source Boustead, I. 2005
  Literature value. Data represents an average value from seventeen European plants.
- Hydrogen fluoride [air, urban air close to ground]: 8.142e-7 kg; source Boustead, I. 2005
  Literature value. Data represents an average value from seventeen European plants.
- Potassium, ion [water, surface water]: 1.2965e-10 kg; source Boustead, I. 2005
  Literature value. Data represents an average value from seventeen European plants.
- BOD5, Biological Oxygen Demand [water, surface water]: 3.6772e-5 kg; source Boustead, I. 2005
  Literature value. Data represents an average value from seventeen European plants.
- Sulfur dioxide [air, urban air close to ground]: 0.0020278 kg; source Boustead, I. 2005
  Literature value. Data represents an average value from seventeen European plants.
- Carbon dioxide, non-fossil [air, urban air close to ground]: 0.0027775 kg; source Boustead, I. 2005
  Literature value. Data represents an average value from seventeen European plants.
- Calcium, ion [water, surface water]: 3.525e-8 kg; source Boustead, I. 2005
  Literature value. Data represents an average value from seventeen European plants.
- DOC, Dissolved Organic Carbon [water, surface water]: 5.2479e-5 kg
  Estimation. Calculated as equal to TOC.
- Aldehydes, unspecified [air, urban air close to ground]: 0 kg; source Boustead, I. 2005
  Literature value. Data represents an average value from seventeen European plants.
- Hydrogen [air, urban air close to ground]: 3.0429e-5 kg; source Boustead, I. 2005
  Literature value. Data represents an average value from seventeen European plants.
- Chlorate [water, surface water]: 1.1916e-7 kg; source Boustead, I. 2005
  Literature value. Data represents an average value from seventeen European plants.
- Hydrocarbons, unspecified [water, surface water]: 2.2305e-5 kg; source Boustead, I. 2005
  Literature value. Data represents an average value from seventeen European plants.
- Carbonate [water, surface water]: 0.00017286 kg; source Boustead, I. 2005
  Literature value. Data represents an average value from seventeen European plants.
- Methane, fossil [air, urban air close to ground]: 0.018182 kg; source Boustead, I. 2005
  Literature value. Data represents an average value from seventeen European plants.
- Fluoride [water, surface water]: 1.3536e-9 kg; source Boustead, I. 2005
  Literature value. Data represents an average value from seventeen European plants.
- Manganese [water, surface water]: 2.2386e-14 kg; source Boustead, I. 2005
  Literature value. Data represents an average value from seventeen European plants.
- Hydrocarbons, chlorinated [air, urban air close to ground]: 5.2208e-9 kg; source Boustead, I. 2005
  Literature value. Data represents an average value from seventeen European plants.
- Silicon [water, surface water]: 0 kg; source Boustead, I. 2005
  Literature value. Data represents an average value from seventeen European plants.
- Nickel [air, urban air close to ground]: 4.9889e-14 kg; source Boustead, I. 2005
  Literature value. Data represents an average value from seventeen European plants.
- Ammonia [air, urban air close to ground]: 1.2642e-10 kg; source Boustead, I. 2005
  Literature value. Data represents an average value from seventeen European plants.
- Iron, ion [water, surface water]: 1.6115e-8 kg; source Boustead, I. 2005
  Literature value. Data represents an average value from seventeen European plants.
- Carbon monoxide, non-fossil [air, urban air close to ground]: 5.6533e-6 kg; source Boustead, I. 2005
  Literature value. Data represents an average value from seventeen European plants.
- Arsenic, ion [water, surface water]: 8.2973e-10 kg; source Boustead, I. 2005
  Literature value. Data represents an average value from seventeen European plants.
- Selenium [air, urban air close to ground]: 0 kg; source Boustead, I. 2005
  Literature value. Data represents an average value from seventeen European plants.
- Hydrogen sulfide [air, urban air close to ground]: 1.2713e-8 kg; source Boustead, I. 2005
  Literature value. Data represents an average value from seventeen European plants.
- Lead [water, surface water]: 2.6713e-10 kg; source Boustead, I. 2005
  Literature value. Data represents an average value from seventeen European plants.
- Dinitrogen monoxide [air, urban air close to ground]: 2.761e-13 kg; source Boustead, I. 2005
  Literature value. Data represents an average value from seventeen European plants.
- Chromium [air, urban air close to ground]: 6.9602e-10 kg; source Boustead, I. 2005
  Literature value. Data represents an average value from seventeen European plants.
- Chloride [water, surface water]: 7.4027e-5 kg; source Boustead, I. 2005
  Literature value. Data represents an average value from seventeen European plants.
- Chlorinated solvents, unspecified [water, surface water]: 7.0594e-9 kg; source Boustead, I. 2005
  Literature value. Data represents an average value from seventeen European plants.
- Dioxins, measured as 2,3,7,8-tetrachlorodibenzo-p-dioxin [air, urban air close to ground]: 0 kg; source Boustead, I. 2005
  Literature value. Data represents an average value from seventeen European plants.
- Sulfide [water, surface water]: 2.0444e-13 kg; source Boustead, I. 2005
  Literature value. Data represents an average value from seventeen European plants.
- Particulates, > 10 um [air, urban air close to ground]: 0.00013836 kg; source Boustead, I. 2005
  Literature value. Data represents an average value from seventeen European plants.
- Oils, unspecified [water, surface water]: 1.9968e-5 kg; source Boustead, I. 2005
  Literature value. Data represents an average value from seventeen European plants.
- Hydrogen chloride [air, urban air close to ground]: 2.1678e-5 kg; source Boustead, I. 2005
  Literature value. Data represents an average value from seventeen European plants.
- Cadmium, ion [water, surface water]: 4.4407e-15 kg; source Boustead, I. 2005
  Literature value. Data represents an average value from seventeen European plants.
- Chlorine [air, urban air close to ground]: 3.6793e-11 kg; source Boustead, I. 2005
  Literature value. Data represents an average value from seventeen European plants.
- Ethene, chloro- [water, surface water]: 3.3009e-12 kg; source Boustead, I. 2005
  Literature value. Data represents an average value from seventeen European plants.
- Carbon monoxide, fossil [air, urban air close to ground]: 0.0025127 kg; source Boustead, I. 2005
  Literature value. Data represents an average value from seventeen European plants.
- Copper, ion [water, surface water]: 1.6495e-8 kg; source Boustead, I. 2005
  Literature value. Data represents an average value from seventeen European plants.
- Propene [air, urban air close to ground]: 0 kg; source Boustead, I. 2005
  Literature value. Data represents an average value from seventeen European plants.
- Ammonium, ion [water, surface water]: 1.7572e-6 kg; source Boustead, I. 2005
  Literature value. Data represents an average value from seventeen European plants.
- Nitrate [water, surface water]: 5.8407e-6 kg; source Boustead, I. 2005
  Literature value. Data represents an average value from seventeen European plants.
- Zinc [air, urban air close to ground]: 4.0799e-11 kg; source Boustead, I. 2005
  Literature value. Data represents an average value from seventeen European plants.
- Phosphorus [water, surface water]: 5.4578e-8 kg; source Boustead, I. 2005
  Literature value. Data represents an average value from seventeen European plants.
- Suspended solids, unspecified [water, surface water]: 0.00012662 kg; source Boustead, I. 2005
  Literature value. Data represents an average value from seventeen European plants.
- Dissolved solids [water, surface water]: 1.5174e-5 kg; source Boustead, I. 2005
  Literature value. Data represents an average value from seventeen European plants.
- Sulfate [water, surface water]: 0.00048342 kg; source Boustead, I. 2005
  Literature value. Data represents an average value from seventeen European plants.
- Particulates, > 2.5 um, and < 10um [air, urban air close to ground]: 0.00018593 kg; source Boustead, I. 2005
  Literature value. Data represents an average value from seventeen European plants.
- Particulates, < 2.5 um [air, urban air close to ground]: 0.0001081 kg; source Boustead, I. 2005
  Literature value. Data represents an average value from seventeen European plants.
- AOX, Adsorbable Organic Halogen as Cl [water, surface water]: 5.048e-13 kg; source Boustead, I. 2005
  Literature value. Data represents an average value from seventeen European plants.
- Tin, ion [water, surface water]: 0 kg; source Boustead, I. 2005
  Literature value. Data represents an average value from seventeen European plants.
- Ethane, 1,2-dichloro- [air, urban air close to ground]: 7.9571e-12 kg; source Boustead, I. 2005
  Literature value. Data represents an average value from seventeen European plants.
- Hydrocarbons, aromatic [air, urban air close to ground]: 7.6277e-6 kg; source Boustead, I. 2005
  Literature value. Data represents an average value from seventeen European plants.
- Toluene [air, urban air close to ground]: 0 kg; source Boustead, I. 2005
  Literature value. Data represents an average value from seventeen European plants.
- Cyanide [water, surface water]: 3.5791e-11 kg; source Boustead, I. 2005
  Literature value. Data represents an average value from seventeen European plants.
- Acidity, unspecified [water, surface water]: 9.948e-7 kg; source Boustead, I. 2005
  Literature value. Data represents an average value from seventeen European plants.
- Copper [air, urban air close to ground]: 2.7877e-14 kg; source Boustead, I. 2005
  Literature value. Data represents an average value from seventeen European plants.
- Sulfate [air, urban air close to ground]: 6.0913e-15 kg; source Boustead, I. 2005
  Literature value. Data represents an average value from seventeen European plants.
- Magnesium [water, surface water]: 4.953e-10 kg; source Boustead, I. 2005
  Literature value. Data represents an average value from seventeen European plants.
- Methane, dichloro-, HCC-30 [air, urban air close to ground]: 5.977e-14 kg; source Boustead, I. 2005
  Literature value. Data represents an average value from seventeen European plants.
- Bromate [water, surface water]: 4.3433e-10 kg; source Boustead, I. 2005
  Literature value. Data represents an average value from seventeen European plants.
- Cyanide [air, urban air close to ground]: 0 kg; source Boustead, I. 2005
  Literature value. Data represents an average value from seventeen European plants.
- Mercury [water, surface water]: 3.1969e-10 kg; source Boustead, I. 2005
  Literature value. Data represents an average value from seventeen European plants.
- Sodium, ion [water, surface water]: 0.000162 kg; source Boustead, I. 2005
  Literature value. Data represents an average value from seventeen European plants.
- Styrene [air, urban air close to ground]: 0 kg; source Boustead, I. 2005
  Literature value. Data represents an average value from seventeen European plants.
- Chlorine [water, surface water]: 8.4122e-10 kg; source Boustead, I. 2005
  Literature value. Data represents an average value from seventeen European plants.
- Nickel, ion [water, surface water]: 4.5658e-10 kg; source Boustead, I. 2005
  Literature value. Data represents an average value from seventeen European plants.
- TOC, Total Organic Carbon [water, surface water]: 5.2479e-5 kg; source Boustead, I. 2005
  Literature value. Data represents an average value from seventeen European plants.
- Water [water, unspecified]: 0.0464816 m3; name water_to_water_unspecified; = water_cooling_UNO_input*(1-fraction_CW_to_air)+water_river_input*(1-fraction_PW_to_air)+water_salt_ocean_input*(1-fraction_PW_to_air)+water_UNO_input*(1-fraction_PW_to_air)+water_well_in_ground_input*(1-fraction_PW_to_air); lognormal variance with pedigree 0.0807, pedigree (2,2,5,1,1)
  (same comment as for Water)
  property fraction, origin: salt water 0.0134194; name fraction_origin_salt_water_Ww
  property fraction, origin: unspecified 0.976985; name fraction_origin_unspecified_Ww
  property fraction, origin: fresh water 0.0095951; name fraction_origin_fresh_water_Ww
  property water in wet mass 1000 kg; name WWM
  property dry mass 0 kg; name DM
  property wet mass 1000 kg; name WM
  property carbon content, fossil 0; name C_content_fossil
  property carbon content, non-fossil 0; name C_content_non_fossil
- Xylene [air, urban air close to ground]: 0 kg; source Boustead, I. 2005
  Literature value. Data represents an average value from seventeen European plants.
- Cadmium [air, urban air close to ground]: 2.4429e-11 kg; source Boustead, I. 2005
  Literature value. Data represents an average value from seventeen European plants.
- Ethene, chloro- [air, urban air close to ground]: 1.7827e-10 kg; source Boustead, I. 2005
  Literature value. Data represents an average value from seventeen European plants.
- Phenol [water, surface water]: 1.1513e-6 kg; source Boustead, I. 2005
  Literature value. Data represents an average value from seventeen European plants.
- Carbon disulfide [air, urban air close to ground]: 8.0805e-11 kg; source Boustead, I. 2005
  Literature value. Data represents an average value from seventeen European plants.
- Mercury [air, urban air close to ground]: 2.1487e-9 kg; source Boustead, I. 2005
  Literature value. Data represents an average value from seventeen European plants.
- COD, Chemical Oxygen Demand [water, surface water]: 0.00015312 kg; source Boustead, I. 2005
  Literature value. Data represents an average value from seventeen European plants.
- NMVOC, non-methane volatile organic compounds, unspecified origin [air, urban air close to ground]: 0.0020967 kg; source Boustead, I. 2005
  Literature value. Data represents an average value from seventeen European plants.
- Strontium [water, surface water]: 1.2941e-11 kg; source Boustead, I. 2005
  Literature value. Data represents an average value from seventeen European plants.
- Methane, non-fossil [air, urban air close to ground]: 4.0908e-5 kg; source Boustead, I. 2005
  Literature value. Data represents an average value from seventeen European plants.
- Ethene [air, urban air close to ground]: 3.4117e-14 kg; source Boustead, I. 2005
  Literature value. Data represents an average value from seventeen European plants.

## Sampling procedure
literature values based on company survey

## Extrapolations
no extrapolation

## Review by Jürgen Sutter 2010-04-06
passed.

## Review by Emilia Moreno Ruiz 2012-05-31
dataset documented by trainee Helen Hamilton
