# gravel and sand quarry operation

Dataset: EcoSpold 2, unit process
Geography: CH
Time period: 1997-01-01 to 2019-12-31
Technology level: current
Classification: EcoSpold01Categories: construction materials/additives
Classification: ISIC rev.4 ecoinvent: 0810:Quarrying of stone, sand and clay
Synonyms: aggregate; sand; gravel round
Tags: combined production; ConvertedDataset
Scenario: Business-as-Usual
System model: Allocation at the point of substitution
Share of production covered: 100 %
Generated by: Tina Künniger
Published in: Kellenberger D. 2004
Database: ecoinvent
isCopyrightProtected: true
accessRestrictedTo: 1

## General comment
This dataset corresponds to the production of 1 kg of sand (35%) and gravel (65%). From the total sectoral production volume (100%) of mined gravel round, crushed and sand, about 85% is gravel round and sand.
[This dataset was already contained in the ecoinvent database version 2. It was not individually updated during the transfer to ecoinvent version 3. Life Cycle Impact Assessment results may still have changed, as they are affected by changes in the supply chain, i.e. in other datasets. This dataset was generated following the ecoinvent quality guidelines for version 2. It may have been subject to central changes described in the ecoinvent version 3 change report (http://www.ecoinvent.org/database/ecoinvent-version-3/reports-of-changes/), and the results of the central updates were reviewed extensively. The changes added e.g. consistent water flows and other information throughout the database. The documentation of this dataset can be found in the ecoinvent reports of version 2, which are still available via the ecoinvent website. The change report linked above covers all central changes that were made during the conversion process.]

## Included activities start
From gravel and sand at ground, unexcavated.

## Included activities end
This activity ends with the gravel and sand digged and the recultivation process done. The dataset includes the whole manufacturing process for digging of gravel round and sand (no crushed gravel), internal processes (transport, etc.), infrastructure for the operation (machinery) and land-use of the mine (incl. unpaved roads). The dataset doesn't include the land-use of the paved roads and buildings, the administration, dust emissions (because it is mostly a 'wet' process) and wastewater (because process water is not polluted -only sand and gravel- and therefore directly seeped).

## Geography
Data was obtained from Swiss industries.

## Technology
The typical technology for swiss gravel and sand mining was assumed.

## Parameters
- sum of reference products: 1 kg; name sum_RP
  It's the addition of the different reference product's amount

## Reference product
- sand: 1 kg; = sand_PV/( gravel_PV+ sand_PV); By-product classification allocatable product; CPC 15310: Natural sands
  The largest use of construction sand and gravel is as aggregate for the production of concrete. The second largest use is as foundation material for highways, railways, runways, etc. Other major uses include aggregate for hot mix asphalt, and filler for highway, dam, and other back-filling. Smaller volumes of construction sand and gravel are used in plaster and gunite sands, snow and ice control, and railroad ballast.
  The amounts of reference products were expressed relative to the production volumes.
  production volume 3.185e9 kg; name sand_PV
    Estimated value. Information regarding production volume and mining technology for sand and aggregates is very scarce (Peduzzia, et al. 2014). It is estimated that around 50 billion tonnes of sand and gravel are mined each year (WWF, 2018).
    According to the WWF (2018), the demand of sand and aggregated in general has and is increasing, the demand comes in particular from developing countries, for example, “China consumed more sand between 2011-2013 than the US did in the whole of the 20th Century.”. This has contributed to the, today’s significant, illegal sand market. Most of illegal sand comes from rivers and coastal areas (WWF 2018; The Third Pole, 2017). Lai et al. (2014) report the estimated amount of sand mined from the biggest sand mine in the world, the Poyang Lake, China. The estimate is of 448 billion kg of sand (De Leeuw 2010). As a frame of reference, the country of Brazil as whole mines 266 billion kg of sand per year.
    The demand of sand has also increased in the US in the past 15 years as the it was found that sand could be used in fracking in order to increase yield (Edwards, 2015). Sand is also used by cities to enlarge their territory “517 million metric tons of sand in the past 20 years” (Edwards, 2015) citing UNEP (2014).
    Of the estimated 50 billion tonnes of sand and gravel, it is assumed that 35% is sand, following ecoinvent v2 report 7. This results in 17.5 billion tonnes. Double check with Tweedie (2018), which reports a world consumption of sand between 15 and 20 billion tonnes, and Peduzzia, P. et al. (2014). The production of gravel is therefore set to 50*0.65 billion tonnes. Of which 85% is considered to be gravel, round and 15% is considered to be crushed (see general comment of the activity “gravel production, gravel, CH” in date 12th October 2018).
    No information was found regarding the technologies used for sand mining. The WWF (2018) refers to Europe as the region where no sand is mined from rivers. On the other hand we know that 70% of sand mined in Brazil comes from rivers (see the dataset “sand quarry operation, extraction from river bed, BR, in date 12th October 2012). Some report quarry as the most prominent mining technology (n.d. 2017), others highlight how the growing illegal market source sand from rivers and coastal areas. ecoinvent does not report data regarding illegal mining. It is therefore estimated that 70% of sand is produced via quarry.
    For Switzerland only quarry mine is included. The production volume is scaled from the Global based on cement production. Swiss cement production is estimated to be 1.22 million tons (Global Cement, 2018), the Global is estimated to be 4.6 billion tonnes (Cembureau, 2016) . Switzerland is therefore 0.00026 of Global.
    References:
    Cemburea, 2016. Key facts. Retrieved from: <https://cembureau.eu/cement-101/key-facts-figures/>, accessed 12th October 2018
    De Leeuw, et al. 2010. Strategic assessment of the magnitude and impacts of sand mining in Poyang Lake, China. Reg. Environ. Change 10, 95-102. In: Lai et al. 2014. Sand mining and increasing Poyang Lake’s discharge ability: A reassessment of causes for lake decline in China. Journal of Hydrology. Retrieved from: <https://www.researchgate.net/publication/277575909_Sand_mining_and_increasing_Poyang_Lake's_discharge_ability_A_reassessment_of_causes_for_lake_decline_in_China>, accessed 12th October 2018
    Edwards, B. 2015. The Insatiable Demand for Sand. FINANCE & DEVELOPMENT, December 2015, Vol. 52, No. 4. Retrieved from: https://www.imf.org/external/pubs/ft/fandd/2015/12/edwards.htm, accessed 12th October 2018
    Global Cement 2018. Swiss cement deliveries grow by 3% to 1.22Mt in second quarter of 2018. Retrieved from: <http://www.globalcement.com/news/item/7745-swiss-cement-deliveries-grow-by-3-to-1-22mt-in-second-quarter-of-2018>, accessed 12th October 2018
    Lai et al. 2014. Sand mining and increasing Poyang Lake’s discharge ability: A reassessment of causes for lake decline in China. Journal of Hydrology. Retrieved from: <https://www.researchgate.net/publication/277575909_Sand_mining_and_increasing_Poyang_Lake's_discharge_ability_A_reassessment_of_causes_for_lake_decline_in_China>, accessed 12th October 2018
    n.d. 2017. What Is Sand Mining? Environmental Technology. Retrieved from: <https://www.envirotech-online.com/news/water-wastewater/9/breaking-news/what-is-sand-mining/42070>, accessed 12th October 2018.
    Peduzzia, P. et al. 2014. Sand, rarer than one thinks. UNEP. Retrieved from: <https://na.unep.net/geas/archive/pdfs/GEAS_Mar2014_Sand_Mining.pdf>, accessed 12th October 2018
    The Third Pole, 2017. Sandmining is destroying Asia’s rivers. Retrieved from: <https://www.thethirdpole.net/en/2017/05/05/sandmining-is-destroying-asias-rivers/>, accessed 12th October 2018
    Tweedie, N. 2018. Is the world running out of sand? The truth behind stolen beaches and dredged islands. The Guardian. Retrieved from: <https://www.theguardian.com/global/2018/jul/01/riddle-of-the-sands-the-truth-behind-stolen-beaches-and-dredged-islands>, accessed 12th October 2018
    UNEP, 2014. Sand, Rarer Than One Thinks. In: Bruce Edwards, 2015. The Insatiable Demand for Sand. FINANCE & DEVELOPMENT, December 2015, Vol. 52, No. 4. Retrieved from: https://www.imf.org/external/pubs/ft/fandd/2015/12/edwards.htm, accessed 12th October 2018
    Vince Beiser, 2017. Sand mining: the global environmental crisis you’ve probably never heard of. The Guardian. Retrieved from: <https://www.theguardian.com/cities/2017/feb/27/sand-mining-global-environmental-crisis-never-heard>, accessed 12th October 2018
    WWF, 2018. Uncovering sand mining’s impacts on the world’s rivers. Retrieved from: <https://wwf.panda.org/our_work/water/?333451/Uncovering-sand-minings-impacts-on-the-worlds-rivers>, accessed 12th October 2018
  property price 0.004 EUR2005; name sand_price_EUR2005
    Temporary price data. Calculated as 90% of purchasers price based on: 2004 market prices are estimated to be equal to USA prices, which are given according to http://minerals.usgs.gov/minerals/pubs/commodity/sand_&_gravel_construction/myb1-2007-sandc.xls, table 1, downloaded 21 April 2009. Same price for gravel and sand.
  property carbon content 0
    carbon content on a dry matter basis (reserved; not for manual entry)
  property true value 0.004; name sand_true_value
    allocation property applied in "true value" allocation // value calculated from revenue
  properties: dry mass 1 kg, carbon content, non-fossil 0, wet mass 1 kg, carbon content, fossil 0, water in wet mass 0 kg, water content 0, carbon allocation 0 kg
- gravel, round: 0 kg; name gravel; CPC 15320: Pebbles, gravel, broken or crushed stone, macadam; granules, chippings and powder of stone; By-product classification allocatable product
  (same comment as for sand)
  production volume 0 kg; name gravel_PV
    (same comment as for sand)
  property price 0.004 EUR2005; name gravel_price_EUR2005
    (same comment as for sand)
  property carbon content 0
    carbon content on a dry matter basis (reserved; not for manual entry)
  properties: wet mass 1 kg, carbon content, fossil 0, carbon content, non-fossil 0, dry mass 1 kg, water content 0, water in wet mass 0 kg, carbon allocation 0 kg

## By-products
- electricity, for reuse in municipal waste incineration only: 0 kWh; CPC 17100: Electrical energy; By-product classification allocatable product; pedigree (1,1,1,1,1)
  Net electricity generated from this waste and used in internal MSWI plant energy redistribution.
  Uncertainty: uncertainty is calculated from uncertainties in waste composition and uncertainties in energy efficiency and the uncertainty in internal energy demand
  production volume 11006.7 kWh
  property exergy 3.6 MJ; name E_el_prod_MSWI_exergy
    This exergy property is based on the exergy content of the product.
  property true value relation 3.6; name E_el_prod_MSWI_true_value_relation
    property to calculate "true value" from
  property price 0.1 EUR2005; name E_el_prod_MSWI_price_EUR2005
    Estimated to be the same price as in case of electricity, medium voltage.
  property true value 1.37301e-7
    allocation property applied in "true value" allocation // value calculated from true value relation
- iron scrap, sorted, pressed: 0 kg; By-product classification Recyclable; CPC 39310: Slag, dross, scalings and other waste from the manufacture of iron or steel; pedigree (1,1,1,1,1)
  Iron scrap recovered from this waste.
  Uncertainty: uncertainty calculated from uncertainty in waste composition, uncertainty of share of recyclable metal, uncertainty of transfer coefficient to bottom ash, uncertainty of the efficiency of scrap removal in MSWI plant.
  production volume 278.622 kg
  property price 0.175 EUR2005
    Temporary price data. Calculated as 90% of purchasers price based on: 2005 import and export prices (total trades (USD) divided by total weight (kg) in biggest economies of the world: EU27, USA, Brasil, China, India, Japan and Russia) from UN Commodity Trade Statistics Database (http://data.un.org/Explorer.aspxDatabase [Accessed 2011.06.20]). Commodity: Waste or scrap, of cast iron
  property carbon content 0
    carbon content on a dry matter basis (reserved; not for manual entry)
  property true value 4.70304e-9
    allocation property applied in "true value" allocation // value calculated from revenue
  properties: carbon content, fossil 0, dry mass 1 kg, carbon content, non-fossil 0, water in wet mass 0 kg, wet mass 1 kg, water content 0, carbon allocation 0 kg
- heat, for reuse in municipal waste incineration only: 0 MJ; CPC 17300: Steam and hot water; By-product classification allocatable product; pedigree (1,1,1,1,1)
  Net useful heat generated from this waste and used in internal MSWI plant energy redistribution.
  Uncertainty: uncertainty is calculated from uncertainties in waste composition and uncertainties in energy efficiency and the uncertainty in internal energy demand
  production volume 81048.1 MJ
  property exergy 0.1842 MJ; name E_th_prod_MSWI_exergy
    This exergy property is based on the exergy content of the product.
  property true value relation 0.1842; name E_th_prod_MSWI_true_value_relation
    property to calculate "true value" from
  property price 0.0106 EUR2005; name E_th_prod_MSWI_price_EUR2005
    Average European district heat price from Ecoheatcool and Euroheat 2005-2006, Ecoheat Work package 1: The European heat market. Final report. 10.6 EUR/GJ i s the price of district heat. http://www.solarthermalworld.org/files/Ecoheatcool%20WP1%20Web.pdf?download
  property true value 5.17304e-8
    (same comment as for electricity, for reuse in municipal waste incineration only)
- iron scrap, unsorted: 0 kg; source European Aluminium Association 2008; CPC 39310: Slag, dross, scalings and other waste from the manufacture of iron or steel; By-product classification Recyclable; pedigree (1,1,1,1,1)
  production volume 0.0393021 kg
  property price 0.149 EUR2005; name ironScrapAmount_price_EUR2005
    Temporary price data. Calculated as 90% of purchasers price based on: estimated at 85% of sorted scrap
  property carbon content 0
    carbon content on a dry matter basis (reserved; not for manual entry)
  property true value 5.64844e-13
    allocation property applied in "true value" allocation // value calculated from revenue
  properties: water in wet mass 0 kg, water content 0, carbon content, fossil 0, carbon content, non-fossil 0, dry mass 1 kg, wet mass 1 kg, carbon allocation 0 kg
- aluminium oxide, non-metallurgical: 0 kg; source European Aluminium Association 2008; CPC 41432: Alumina (aluminium oxide), except artificial corundum; By-product classification allocatable product; CAS 1344-28-1; pedigree (1,1,1,1,1)
  production volume 2.47313 kg
  property carbon content, non-fossil 0; name C_content_non_fossil
  property price 0.28 EUR2005; name Al2O3Amount_price_EUR2005
    From UN trade database. http://data.un.org/ Import data from the largest economies of the world are used (Brazil, India, USA, China, Japan and EU-27).
  property dry mass 1 kg; name DM
  property water content 0; name water_content
  property wet mass 1 kg; name WM
  property water in wet mass 0 kg; name WWM
  property carbon content, fossil 0; name C_content_fossil
  property carbon content 0
    carbon content on a dry matter basis (reserved; not for manual entry)
  property true value 6.67931e-11
    allocation property applied in "true value" allocation // value calculated from revenue
  properties: carbon allocation 0 kg
- aluminium, cast alloy: 0 kg; source European Aluminium Association 2008; By-product classification allocatable product; CPC 41431: Unwrought aluminium; pedigree (1,1,1,1,1)
  EcoSpold01Location=RER
  production volume 23.1183 kg
  property price 1.3 EUR2005; name castAlloyAmount_price_EUR2005
    Temporary price data. Calculated as 90% of purchasers price based on: Source: London Metal Exchange, Aluminium alloy price for 2005
  property carbon content 0
    carbon content on a dry matter basis (reserved; not for manual entry)
  property true value 2.89885e-9
    allocation property applied in "true value" allocation // value calculated from revenue
  properties: water in wet mass 0 kg, carbon content, non-fossil 0, water content 0, dry mass 1 kg, carbon content, fossil 0, wet mass 1 kg, carbon allocation 0 kg
- aluminium, wrought alloy: 0 kg; source European Aluminium Association 2008; By-product classification allocatable product; CPC 4153: Semi-finished products of aluminium or aluminium alloys; pedigree (1,1,1,1,1)
  production volume 10.1208 kg
  property price 1.44 EUR2005; name secondaryAluminiumOutput_price_EUR2005
    Estimated based on literature values and expert judgement. Aluminium ccast alloys are about 90% of the price of aluminium wrought alloys.
  property carbon content 0
    carbon content on a dry matter basis (reserved; not for manual entry)
  property true value 1.40573e-9
    allocation property applied in "true value" allocation // value calculated from revenue
  properties: wet mass 1 kg, water content 0, carbon content, fossil 0, water in wet mass 0 kg, carbon content, non-fossil 0, dry mass 1 kg, carbon allocation 0 kg
- copper: 0 kg; source Rentz O. 1999; By-product classification allocatable product; CPC 41413: Refined copper and copper alloys, unwrought; master alloys of copper
  Literature value. Copper uses: Before end-use copper is manufactured into semi fabricated products, such as shapes and ingots (known as 'semis'). These manufacturing processes are subdivided into hot working, cold working and, if necessary, process annealing. Few of the semis are ready for use as such. They more typically travel to first-stage manufacturers, who make metal rods, wire, and casting, and then to component manufacturers who produce such things as motors, valves, and insulated cables The components in turn are incorporated by final-stage manufacturers into a variety of finished products - automobiles, commercial buildings, residential housing, and so forth. These uses account for about 79% of the world-wide consumption of copper.
  production volume 2.68326 kg
  property price 5.52 EUR2005
    Literature value (http://www.economist.com/news/business/21576714-mining-industry-has-enriched-chile-its-future-precarious-copper-solution). Average price between 20015 and 2013.
  property carbon content 0
    carbon content on a dry matter basis (reserved; not for manual entry)
  property true value 1.42866e-9
    allocation property applied in "true value" allocation // value calculated from revenue
  properties: dry mass 1 kg, water in wet mass 0 kg, wet mass 1 kg, carbon content, non-fossil 0, water content 0, carbon content, fossil 0, carbon allocation 0 kg
- zinc concentrate: 0 kg; CPC 14290: Other non-ferrous metal ores and concentrates (other than uranium or thorium ores and concentrates); By-product classification allocatable product
  Calculated value from the knowledge of the properties of both products.
  production volume 6.78401 kg
  property price 0.38 EUR2005; name ByP_price_EUR2005
    Temporary price data. Calculated as 90% of purchasers price based on: Zinc content in concentrate 53%. Concentrate price per kg Zn 86.5% of refined Zn price (13.5% treatment charges according to CHR Metals Limited 2005: Dynamic cost curves. http://www.minecost.com/dynamic.pdf). 2004 zinc price from USGS (2007) Mineral commodity summaries 2007. <http://minerals.usgs.gov/minerals/pubs/mcs/2007/mcs2007.pdf> [Accessed 25 May 2010]
  property zinc content 0.53; name zinc_C_zinc_concentrate
    Zinc content on a dry matter basis. Value taken from teh "zinc mine operation" /GLO dataset.
  property dry mass 1 kg; name DM_zinc_concentrate
  property carbon content 0
    carbon content on a dry matter basis (reserved; not for manual entry)
  property true value 2.48654e-10
    allocation property applied in "true value" allocation // value calculated from revenue
  properties: wet mass 1 kg, water content 0, carbon content, non-fossil 0, carbon content, fossil 0, water in wet mass 0 kg, carbon allocation 0 kg

## Inputs from technosphere
- electricity, medium voltage: 0.00271986 kWh; = (0.00272/ sum_RP)*(sand+gravel); source Künniger T. 2001; lognormal variance with pedigree 0.0412, pedigree (2,3,5,1,1)
  Literature value. The electricity consumption for the complete production is considered.
- gravel/sand quarry infrastructure: 4.74976e-11 unit; = (4.75E-11/ sum_RP)*(sand+gravel); source Künniger T. 2001; lognormal variance with pedigree 0.3506, pedigree (1,3,5,1,1)
  Literature value. The 85% of the total unit mine is considered for sand and gravel.
- recultivation, limestone mine: 8.47958e-6 m2; = (8.48E-06/ sum_RP)*(sand+gravel); source Künniger T. 2001; lognormal variance with pedigree 0.1906, pedigree (3,3,5,1,3)
  Proxy, based on literature values. 'Recultivation, limestone mine' is used as proxy, an important difference is the amount of transformation to a certain area which is just left to nature.
  This exchange has an activity link directly to the producing activity because the product is primarily consumed in the same geographical area where it is produced.
- municipal solid waste: -2.76986e-6 kg; name MSW; = ((2.77E-06/ sum_RP)*(sand+gravel))*-1; source Künniger T. 2001; lognormal variance with pedigree 0.0412, pedigree (2,3,5,1,1)
  Proxy. Disposal of municipal solid waste is used as proxy.
  Literature value, different waste as syntethic rubber, plastics, etc. are disposed.
  production volume 28718 kg; = ( gravel_PV+ sand_PV)*MSW/sum_RP
    calculated using the relative PV of the reference products
  property price 0 EUR2005; name MSW_price_EUR2005
  properties: wet mass 1 kg, water content 0.297017, carbon content, fossil 0.171549, carbon content, non-fossil 0.261655, dry mass 0.771 kg
  note on carbon content, fossil: MSW composition in tab 4.1, ecoinvent v2.2 report 13_I. C content referred to 1 kg DM
- industrial machine, heavy, unspecified: 1.11994e-5 kg; = (1.12E-05/ sum_RP)*(sand+gravel); lognormal variance with pedigree 0.370025, pedigree (3,5,5,2,1)
  Estimation. The machines used for the mining of sand and gravel are considered: 3 sieves (assuming each 5t), 5 'small' silos (assuming each 7t), 1 barrel washer (20 t) and other machines (30t). The total weight of the machines considered is 100 t. The service life of all these machines is assumed to be 25 years. The part of the machines which belongs to the mining process itself is included in the module 'gravel/sand mine'. Wearing parts and lubricating oil is taken into account. The total amount of material treated by these machines over 25 years is therefore about 743.75 Mio tons.
  Estimation. The machines used for the mining of sand and gravel are considered: 3 sieves (assuming each 5t), 5 'small' silos (assuming each 7t), 1 barrel washer (20 t) and other machines (30t). The total weight of the machines considered is 100 t. The service life of all these machines is assumed to be 25 years. The part of the machines which belongs to the mining process itself is included in the module 'gravel/sand mine'. Wearing parts and lubricating oil is taken into account. The total amount of material treated by these machines over 25 years is therefore about 743.75 Mio tons.
- tap water: 0.0100995 kg; = (0.0101/ sum_RP)*(sand+gravel); source Künniger T. 2001; lognormal variance with pedigree 0.041225, pedigree (2,3,5,2,1)
  Literature value.
  properties: dry mass 0.000337476 kg, wet mass 1 kg, water content 2962.17, carbon content, fossil 0.00178991
  note on carbon content, fossil: Bicarbonate content is 2.93 mol/m3. CO2 content is 0.1 mol/m3 (ecoinvent v2.2 report 8, Tab 93.1).
- conveyor belt: 9.50953e-8 m; = (9.51E-08/ sum_RP)*(sand+gravel); lognormal variance with pedigree 0.422025, pedigree (5,4,5,2,1)
  Estimation. A conveyor belt with a lenght of 1.000m was assumed, considering that the 85% is used for the transportation of crushed gravel. A service life of 25 years was estimated. The yearly production amount considered was 357,548.25 tons (85% of 420,645).
  Estimation. A conveyor belt with a lenght of 1.000m was assumed, considering that the 85% is used for the transportation of crushed gravel. A service life of 25 years was estimated. The yearly production amount considered was 357,548.25 tons (85% of 420,645).
- steel, low-alloyed, hot rolled: 1.29994e-5 kg; = (1.3E-05/ sum_RP)*(sand+gravel); source Künniger T. 2001; lognormal variance with pedigree 0.041225, pedigree (2,3,5,2,1)
  Literature value. The wearing parts (metal) are considered as process materials.
  properties: carbon content, fossil 0.005, dry mass 1 kg, wet mass 1 kg
  note on carbon content, fossil: Low alloyed steel composition given in Tab. 3.2 ecoinvent v2.2 report 10_partII. Steel assumed to have a C content of 0.5%
- synthetic rubber: 1.9999e-6 kg; = (2E-06/ sum_RP)*(sand+gravel); source Künniger T. 2001; lognormal variance with pedigree 0.041225, pedigree (2,3,5,2,1)
  Literature value. The wearing parts (no metal) are considered as process materials.
  properties: carbon content, fossil 0.871949, dry mass 1 kg, wet mass 1 kg
  note on carbon content, fossil: EPDM (Ethylene-propene-diene terpolymer) rubber is a terpolymer of ethylene, propene, and a diene with the residual unsaturated portion of the diene in the side chain (ecoinvent v2.2 report 7-part XX & Ullmann). Chemical formula (deduced from Evidences of Solvent-Induced Miscibility in Polychloroprene-co-Ethylene-Propene Diene Terpolymer Blends, Dubey et al., Journal of Applied Polymer Science, 2009, 111:1884–1891): C20H35
- heat, central or small-scale, other than natural gas: 0.00243988 MJ; = (0.00244/ sum_RP)*(sand+gravel); source Künniger T. 2001; lognormal variance with pedigree 0.0412, pedigree (2,3,5,1,1)
  Literature value. Heating of the production plant is considered.
- diesel, burned in building machine: 0.0146993 MJ; = (0.0147/ sum_RP)*(sand+gravel); source Künniger T. 2001; lognormal variance with pedigree 0.041225, pedigree (2,3,5,2,1)
  Literature value. The fuel for the excavation, mining of sand and gravel, recultivation and internal transport are included.
- lubricating oil: 1.84991e-6 kg; = (1.85E-06/ sum_RP)*(sand+gravel); source Künniger T. 2001; lognormal variance with pedigree 0.041225, pedigree (2,3,5,2,1)
  Literature value. Lubricating grease and oil are considered as process materials.
  properties: dry mass 1 kg, wet mass 1 kg, carbon content, fossil 0.75
  note on carbon content, fossil: Lubricating oil is produced from diesel. C-content/dry mass of fats and oils considered 75%, from: ecoinvent v2.2 report, n 15a, pg 40
- building, hall, steel construction: 5.02975e-7 m2; = (5.03E-07/ sum_RP)*(sand+gravel); lognormal variance with pedigree 0.37, pedigree (3,5,5,1,1)
  Estimation. A total area of the mine is estimated in 12'000m2. However, 3'000m2 are included in the module 'gravel/sand quarry construction' and the remaining 9'000m2 are accounted in this dataset. The estimated service life is 50 years. The average yearly yield of the mine is the 85% of 420,465 t/a.
  This exchange has an activity link directly to the producing activity because the product is primarily consumed in the same geographical area where it is produced.
- waste mineral oil: -1.84991e-6 kg; name mineral_oil; = ((1.85E-06/ sum_RP)*(sand+gravel))*-1; source Künniger T. 2001; lognormal variance with pedigree 0.0412, pedigree (2,3,5,1,1)
  Literature value.
  production volume 19179.9 kg; = ( gravel_PV+ sand_PV)* mineral_oil/sum_RP
    calculated using the relative PV of the reference products
  property price 0 EUR2005; name mineral_oil_price_EUR2005
  properties: wet mass 1 kg, carbon content, fossil 0.864444, water content 0.111111, dry mass 0.9 kg
  note on carbon content, fossil: Tab A.6, ecoinvent v2.2 report 13_I. C content has been calculated after data in the tables, and then referred to 1 kg DM

## Inputs from nature
All rows: source Künniger T. 2001
- Transformation, from unspecified [natural resource, land]: 3.49983e-5 m2; = (3.5E-05/ sum_RP)*(sand+gravel); lognormal variance with pedigree 0.1712, pedigree (2,3,5,1,1)
  Estimation, based on literature values. The average land-used assumed is 0.0351 m2/t.
- Occupation, mineral extraction site [natural resource, land]: 0.000287986 m2*year; = (0.000288/ sum_RP)*(sand+gravel); lognormal variance with pedigree 0.0912, pedigree (2,3,5,1,1)
  Estimation, based on literature values. An average land-use of 0.0288 m2/t is considered. It is assumed that after 10 years the used land is recultivated.
- Transformation, to mineral extraction site [natural resource, land]: 2.87986e-5 m2; = (2.88E-05/ sum_RP)*(sand+gravel); lognormal variance with pedigree 0.1712, pedigree (2,3,5,1,1)
  Estimation, based on literature values. The average land-used assumed is 0.0288 m2/t.
- Occupation, lake, artificial [natural resource, land]: 6.26969e-5 m2*year; = (6.27E-05/ sum_RP)*(sand+gravel); lognormal variance with pedigree 0.1712, pedigree (2,3,5,1,1)
  Estimation, based on literature values. An average land-use of 0.0023 m2/t is considered. It is assumed that after 10 years the used land is recultivated.
- Gravel, in ground [natural resource, in ground]: 1.03995 kg; = (1.04/ sum_RP)*(sand+gravel); lognormal variance with pedigree 0.0412, pedigree (2,3,5,1,1)
  Estimation, based on literature value. It is assumed that the 4% of the losses goes back to the mine.
- Transformation, to lake, artificial [natural resource, land]: 6.26969e-6 m2; = (6.27E-06/ sum_RP)*(sand+gravel); lognormal variance with pedigree 0.0912, pedigree (2,3,5,1,1)
  Estimation, based on literature values. The average land-used assumed is 0.0063 m2/t.
- Water, unspecified natural origin [natural resource, in water]: 0.00137993 m3; = (0.00138/ sum_RP)*(sand+gravel); lognormal variance with pedigree 0.0412, pedigree (2,3,5,1,1)
  Literature value. The water used in the process is considered.

## Sampling procedure
Measured data of four Swiss plants

## Review by Bo Weidema 2012-05-31
Passed. Formulas have been added to enable automatic sub-division of this combined production dataset, following ecoinvent v3 procedures (thus avoiding allocation).

## Review by Emilia Moreno Ruiz 2013-03-13
PV corrected

## Review by Roberto Dones 2010-02-07
passed

## Review by Roland Hischier 2011-12-01
Transfer of documentation done.
