# wheat production

Dataset: EcoSpold 2, unit process
Geography: DE
Time period: 2000-01-01 to 2019-12-31
Technology level: current
Classification: ISIC rev.4 ecoinvent: 0111:Growing of cereals (except rice), leguminous crops and oil seeds
Synonyms: Triticum aestivum L.
Scenario: Business-as-Usual
System model: Allocation at the point of substitution
Share of production covered: 100 %
Generated by: Thomas Nemecek
Published in: Nemecek, T. 2007
Database: ecoinvent
isCopyrightProtected: true
accessRestrictedTo: 1

## General comment
This dataset represents the production of 1 kg of wheat grain (fresh matter). The yield is 7567 kg/ha at a moisture content at storage of 14.5%.
[This dataset was already contained in the ecoinvent database version 2. It was not individually updated during the transfer to ecoinvent version 3. Life Cycle Impact Assessment results may still have changed, as they are affected by changes in the supply chain, i.e. in other datasets. This dataset was generated following the ecoinvent quality guidelines for version 2. It may have been subject to central changes described in the ecoinvent version 3 change report (http://www.ecoinvent.org/database/ecoinvent-version-3/reports-of-changes/), and the results of the central updates were reviewed extensively. The changes added e.g. consistent water flows and other information throughout the database. The documentation of this dataset can be found in the ecoinvent reports of version 2, which are still available via the ecoinvent website. The change report linked above covers all central changes that were made during the conversion process.]

## Included activities start
This activity starts after the harvest of the previous crop. The inputs of seeds, mineral fertilisers and pesticides are considered. It is assumed that no organic fertilisers are applied.

## Included activities end
The dataset includes all machine operations and corresponding machine infrastructure and sheds. Machine operations are: soil cultivation, sowing, fertilisation, weed control, pest and pathogen control, combine-harvest, grain drying and transport from field to farm (4 km). Further, direct field emissions are included. This activity ends after harvest and grain drying at the farm gate.

## Geography
Refers to an average production in the region Saxony-Anhalt (DE).

## Technology
conventional production typical for the region

## Time period
The yield data have been collected for the years 2000-2004.

## Parameters
- LUC_crop_specific: 1
  This parameter allows to switch between a "crop specific" and a "country specific" approach when calculating the LUC of a crop. By default, the chosen approach is "crop specific", so the value of the parameter is 1. If you want to apply a "country specific" approach, turn the parameter to 0.
- fraction, irrigation water to surface water: 0.2; name fraction_IW_to_surface_water; lognormal variance with pedigree 0.0886, pedigree (4,3,1,1,4)
  Literature value (Döll, 2011) cross referenced with expert opinion.
- fraction, irrigation water, to ground water: 0.8; name fraction_IW_to_ground_water; lognormal variance with pedigree 0.0886, pedigree (4,3,1,1,4)
  Literature value (Döll, 2011) cross referenced with expert opinion.
- fraction, irrigation water, to air: 0.3879; name fraction_IW_to_air; lognormal variance with pedigree 0.0409, pedigree (2,2,2,1,1)
  Literature value (Siebert, 2010) (Vionnet, S., Quantis Water Database - Technical Report, 2012).

## Reference product
- wheat grain: 1 kg; name REF_PRODUCT; By-product classification allocatable product; CPC 01112: Wheat, other
  EcoSpold01Location=DE
  production volume 2.36927e10 kg
    25427000t in 2004.
    FAOSTAT for Germany 2005
  property price 0.22 EUR2005; name REF_PRODUCT_price_EUR2005
    Literature value. Based on SAFEX price of R 3,727 per tonne, source: SAGIS, 2018. Retrieved from: http://www.sagis.org.za/safex_historic.html, accessed 28May2018
  property carbon content, non-fossil 0.464601; name REF_PRODUCT_C_content_non_fossil
    biogene carbon content on a dry matter basis
    Composition data obtained from Wheat, soft red winter, in (http://www.nal.usda.gov/fnic/foodcomp/search/). First, composition data were refered to 1 kg dry mass. Then, C-contents were calculated considering a C-content/dry mass of 46% in carbohydrates (including fibres), 53% in proteins and 75% in fats. All data from "Evolutionary and Biochemical Aspects", A.D. Kay and T. Vrede (in Global Ecology, 2010, Elsevier B.V., S.E. Jørgensen Ed.).
  property dry mass 0.855 kg; name REF_PRODUCT_DM
  property energy content 15.484 MJ; name REF_PRODUCT_energy_content
    See chapter 'Yields and Inputs of Arable Crop Production' in "01_crop production - yields & inputs CH & Europe_v1.0.pdf", section "AGRICULTURAL PRODUCTION IN SWITZERLAND" - pdf-document on the dedicated talk page of ecoinvent (www.ecoinvent.org/documentation)
  property wet mass 1 kg; name REF_PRODUCT_WM
  property carbon content, fossil 0; name REF_PRODUCT_C_content_fossil
    fossil carbon content on a dry matter basis
  property water in wet mass 0.145 kg; name REF_PRODUCT_WWM; = 1-REF_PRODUCT_DM
  property water content 0.169591; name REF_PRODUCT_water_content; = (1-REF_PRODUCT_DM)/REF_PRODUCT_DM
  property carbon content 0.464601
    carbon content on a dry matter basis (reserved; not for manual entry)
  properties: carbon allocation 0.397234 kg

## Inputs from technosphere
- diphenylether-compound: 8.2598e-6 kg; lognormal variance with pedigree 0.0407, pedigree (2,2,5,1,1)
  See chapter 'Yields and Inputs of Arable Crop Production' in "01_crop production - yields & inputs CH & Europe_v1.0.pdf", section "AGRICULTURAL PRODUCTION IN THE EU" - pdf-document on the dedicated talk page of ecoinvent (www.ecoinvent.org/documentation)
  EcoSpold01Location=RER
  properties: dry mass 1 kg, wet mass 1 kg, carbon content, fossil 0.560061
  note on carbon content, fossil: C content of diphenylether-compounds was calculated after the C content of thepesticides aclonifen and diflufenican classified as diphenylether-compound in Tab 2.25 of Sutter 2010
- tillage, cultivating, chiselling: 6.8806e-5 ha; lognormal variance with pedigree 0.0406, pedigree (2,1,5,1,1)
  EcoSpold01Location=CH
  See chapter 'Yields and Inputs of Arable Crop Production' in "01_crop production - yields & inputs CH & Europe_v1.0.pdf", section "AGRICULTURAL PRODUCTION IN THE EU" - pdf-document on the dedicated talk page of ecoinvent (www.ecoinvent.org/documentation)
- transport, tractor and trailer, agricultural: 0.0039767 metric ton*km; lognormal variance with pedigree 0.0406, pedigree (2,1,5,1,1)
  (same comment as for tillage, cultivating, chiselling)
- tillage, harrowing, by rotary harrow: 0.00039101 ha; lognormal variance with pedigree 0.0406, pedigree (2,1,5,1,1)
  (same comment as for tillage, cultivating, chiselling)
- pyrethroid-compound: 9.9117e-7 kg; lognormal variance with pedigree 0.0407, pedigree (2,2,5,1,1)
  EcoSpold01Location=RER
  See chapter 'Yields and Inputs of Arable Crop Production' in "01_crop production - yields & inputs CH & Europe_v1.0.pdf", section "AGRICULTURAL PRODUCTION IN THE EU" - pdf-document on the dedicated talk page of ecoinvent (www.ecoinvent.org/documentation)
  properties: wet mass 1 kg, dry mass 1 kg, carbon content, fossil 0.623
  note on carbon content, fossil: C content of pyrethroid-compounds was calculated as an unweigthed average of C content of the substances: cypermethrin, alpha-cypermethrin,beta-cyfluthrin, lambdacyhalothrin. Those substances are classified as pyrethroid-compounds in Tab 2.25, Sutter 2010
- pyridazine-compound: 4.954e-5 kg; lognormal variance with pedigree 0.0407, pedigree (2,2,5,1,1)
  (same comment as for diphenylether-compound)
  properties: dry mass 1 kg, wet mass 1 kg, carbon content, fossil 0.541901
  note on carbon content, fossil: The herbicide Chloridazon was used as a significative example to calculate C content of pyridazine compounds. This substance is identified as a pyridazine in Tab 1.5, Sutter 2010
- nitrogen fertiliser, as N: 0.0228 kg; lognormal variance with pedigree 0.0406, pedigree (2,1,5,1,1)
  (same comment as for diphenylether-compound)
  properties: dry mass 1 kg, wet mass 1 kg
- nitrile-compound: 2.534e-5 kg; lognormal variance with pedigree 0.0407, pedigree (2,2,5,1,1)
  (same comment as for diphenylether-compound)
  properties: dry mass 1 kg, wet mass 1 kg, carbon content, fossil 0.344995
  note on carbon content, fossil: An unweighted average of the C content in chlorothalonil, dichlobenil, bromoxynil, ioxynil, substances classified as nitrile-compounds in Tab 2.25, Sutter 2010
- tillage, ploughing: 6.3351e-5 ha; lognormal variance with pedigree 0.0406, pedigree (2,1,5,1,1)
  (same comment as for tillage, cultivating, chiselling)
- application of plant protection product, by field sprayer: 0.00065533 ha; lognormal variance with pedigree 0.0406, pedigree (2,1,5,1,1)
  (same comment as for tillage, cultivating, chiselling)
- packaging, for fertilisers: 0.0717 kg; lognormal variance with pedigree 0.0912, pedigree (4,3,5,5,4)
  Total amount of active substance/s of fertilisers needed for the production of 'wheat grain' is calculated to be circa 3.59E-02 kg. Fertiliser/s used in this dataset is/are: 'nitrogen fertiliser, as N', 'phosphate fertiliser, as P2O5', 'potassium chloride, as K2O'. The total amount of active substance/s is doubled in order to account for the packaging of the dilluted product of fertiliser/s that is/are applied. Therefore, 7.17E-02 kg of packaging for fertilisers is justified with this exchange.
  properties: wet mass 1 kg, dry mass 1 kg, price 0.0642 EUR2005, carbon content, fossil 0.825301
  note on carbon content, fossil: Considering a chemical formula (C2H4)n for polyethylene, carbon content-fossil is calculated to be 0.856286 kg of Carbon per kg of dry mass.
- drying of bread grain, seed and legumes: 0.015268 l; lognormal variance with pedigree 0.0406, pedigree (2,1,5,1,1)
  See chapter 'Yields and Inputs of Arable Crop Production' in "01_crop production - yields & inputs CH & Europe_v1.0.pdf", section "AGRICULTURAL PRODUCTION IN THE EU" - pdf-document on the dedicated talk page of ecoinvent (www.ecoinvent.org/documentation)
  EcoSpold01Location=CH
- cyclic N-compound: 6.2417e-5 kg; lognormal variance with pedigree 0.0407, pedigree (2,2,5,1,1)
  (same comment as for pyrethroid-compound)
  properties: carbon content, fossil 0.641962, dry mass 1 kg, wet mass 1 kg
  note on carbon content, fossil: Calculated as an unweigthed average of the C content of the cyclic N-compounds where information was avaliable in Sutter, 2010, following the classification in Tab 2.25 in Sutter 2010: Difenoconazole (C19H17Cl2N3O3), Fenpropidin (C19H31N), Fenpropimorph (C20H33NO), Flusilazole (C16H15F2N3Si), Metconazole (C17H22ClN3O), Penconazole (C13H15Cl2N3), Propiconazole (C15H17Cl2N3O2), Tebuconazole (C16H22ClN3O)
- combine harvesting: 0.00013216 ha; lognormal variance with pedigree 0.0406, pedigree (2,1,5,1,1)
  (same comment as for tillage, cultivating, chiselling)
- phosphate fertiliser, as P2O5: 0.00709 kg; lognormal variance with pedigree 0.0406, pedigree (2,1,5,1,1)
  (same comment as for pyrethroid-compound)
  properties: wet mass 1 kg, dry mass 1 kg
- wheat seed, for sowing: 0.023788 kg; name SEED; lognormal variance with pedigree 0.0406, pedigree (2,1,5,1,1)
  See chapter 'Yields and Inputs of Arable Crop Production' in "01_crop production - yields & inputs CH & Europe_v1.0.pdf", section "AGRICULTURAL PRODUCTION IN THE EU" - pdf-document on the dedicated talk page of ecoinvent (www.ecoinvent.org/documentation)
  property carbon content, non-fossil 0.447696; name SEED_C_content_non_fossil
  property carbon content, fossil 0; name SEED_C_content_fossil
  property dry mass 0.85 kg; name SEED_DM
  property water content 0.176471; name wheat_seed_sowing_water_content; = (1-SEED_DM)/SEED_DM
  property energy content 15.3935 MJ; name SEED_energy_content
  property water in wet mass 0.15 kg; name wheat_seed_sowing_WWM; = 1-SEED_DM
  property wet mass 1 kg; name wheat_seed_sowing_WM
  note on carbon content, non-fossil: Biogene carbon content on a dry matter basis. Composition data obtained from Wheat, soft red winter, in (http://www.nal.usda.gov/fnic/foodcomp/search/). First, composition data were refered to 1 kg dry mass. Then, C-contents were calculated considering a C-content/dry mass of 44% in carbohydrates (including fibres), 53% in proteins and 75% in fats. All data from ecoinvent report, n 15a, pg 40, except C-content in protein, that comes from Determination of protein concentration by total organic carbon analysis, Rouwenhorst et al., 1991, J Biochem and Biophys Methods, 22:119-128.
  note on energy content: See chapter 'Product Properties' in "01_crop production - yields & inputs CH & Europe_v1.0.pdf", section "AGRICULTURAL PRODUCTION IN SWITZERLAND" - pdf-document on the dedicated talk page of ecoinvent (www.ecoinvent.org/documentation)
- irrigation: 0.14328 m3; name water_irrigation_input; source Siebert, S. 2010; lognormal variance with pedigree 0.0427, pedigree (2,2,5,1,1)
  Calculated based on literature values (Döll, 2010) and partially modelled at ETH (Pfister, S.).
  property wet mass 1000 kg; name WM
  property dry mass 0.11 kg; name DM
  property water content 9089.91; name water_content
  property water in wet mass 999.89 kg; name WWM
  property carbon content, fossil 0; name C_content_fossil
  property carbon content, non-fossil 0; name C_content_non_fossil
- fertilising, by broadcaster: 0.00050616 ha; lognormal variance with pedigree 0.0406, pedigree (2,1,5,1,1)
  (same comment as for drying of bread grain, seed and legumes)
- sowing: 0.00013216 ha; lognormal variance with pedigree 0.0406, pedigree (2,1,5,1,1)
  (same comment as for drying of bread grain, seed and legumes)
- packaging, for pesticides: 0.000685036 kg; lognormal variance with pedigree 0.0912, pedigree (4,3,5,5,4)
  Total amount of active substance/s of pesticides needed for the production of wheat grain is calculated to be circa 3.43E-04 kg. Pesticide/s used in this dataset is/are: 'cyclic N-compound', 'diphenylether-compound', 'nitrile-compound', 'pesticide, unspecified', 'pyrethroid-compound', 'pyridazine-compound'. The total amount of active substance/s is doubled in order to account for the packaging of the dilluted product of pesticide/s that is/are applied. Therefore, 6.85E-04 kg of packaging for pesticides is justified with this exchange.
  properties: carbon content, fossil 0.85714, dry mass 1 kg, wet mass 1 kg, price 0.0642 EUR2005
- potassium chloride, as K2O: 0.00596 kg; lognormal variance with pedigree 0.0406, pedigree (2,1,5,1,1)
  (same comment as for pyrethroid-compound)
  properties: dry mass 1 kg, wet mass 1 kg
- pesticide, unspecified: 0.00019597 kg; lognormal variance with pedigree 0.0407, pedigree (2,2,5,1,1)
  (same comment as for diphenylether-compound)
  properties: dry mass 1 kg, wet mass 1 kg, carbon content, fossil 0.486978
  note on carbon content, fossil: Mean of C content in all pesticides whose formula has been documented in Sutter 2010

## Inputs from nature
- Carbon dioxide, in air [natural resource, in air]: 1.42333 kg; = 44/12*(0.4646*REF_PRODUCT*0.855-SEED_C_content_non_fossil*SEED*SEED_DM); lognormal variance with pedigree 0.0406, pedigree (2,1,5,1,1)
  Modelled,see chapter 'CO2 binding' in "01_crop production_direct field emissions and natural resources_v1.0.pdf" - pdf-document on the dedicated talk page of ecoinvent (www.ecoinvent.org/documentation).
  0.855 is the dry mass of the reference product - wheat grain.
  0.4646 is the carbon content, non-fossil of the reference product - wheat grain.
- Transformation, from annual crop, non-irrigated, intensive [natural resource, land]: 1.3216 m2; lognormal variance with pedigree 0.0506, pedigree (2,1,5,1,1)
  Modelled, see chapter 'Land use' in "01_crop production_direct field emissions and natural resources_v1.0.pdf" - pdf-document on the dedicated talk page of ecoinvent (www.ecoinvent.org/documentation)
- Energy, gross calorific value, in biomass [natural resource, biotic]: 15.116 MJ; lognormal variance with pedigree 0.0411891, pedigree (2,1,5,1,1)
- Occupation, annual crop, non-irrigated, intensive [natural resource, land]: 1.4317 m2*year; lognormal variance with pedigree 0.0406, pedigree (2,1,5,1,1)
  (same comment as for Transformation, from annual crop, non-irrigated, intensive)
- Transformation, to annual crop, non-irrigated, intensive [natural resource, land]: 1.3216 m2; lognormal variance with pedigree 0.0506, pedigree (2,1,5,1,1)
  (same comment as for Transformation, from annual crop, non-irrigated, intensive)

## Emissions to nature
- Lead [soil, agricultural]: 2.0283e-7 kg; lognormal variance with pedigree 0.0807, pedigree (2,2,5,1,1)
  Modelled, see chapter 'Emissions of heavy metals to agricultural soil, surface water and ground water' in "01_crop production_direct field emissions and natural resources_v1.0.pdf" - pdf-document on the dedicated talk page of ecoinvent (www.ecoinvent.org/documentation)
- Flurtamone [soil, agricultural]: 5.1712e-6 kg; lognormal variance with pedigree 0.0507, pedigree (2,2,5,1,1)
  Modelled, see chapter 'Emissions of pesticides to agricultural soil' in "01_crop production_direct field emissions and natural resources_v1.0.pdf" - pdf-document on the dedicated talk page of ecoinvent (www.ecoinvent.org/documentation)
- Water [air, unspecified]: 0.0555782 m3; name water_to_air_unspecified; = water_irrigation_input*fraction_IW_to_air; lognormal variance with pedigree 0.0807, pedigree (2,2,5,1,1)
  Calculated value based on literature values and expert opinion. See comments in the parametres' comment field.
  property fraction, origin: unspecified 0; name fraction_origin_unspecified
  property fraction, origin: fresh water 1; name fraction_origin_fresh_water
  property fraction, origin: salt water 0; name fraction_origin_salt_water
- Lambda-cyhalothrin [soil, agricultural]: 9.9117e-7 kg; lognormal variance with pedigree 0.0507, pedigree (2,2,5,1,1)
  (same comment as for Flurtamone)
- Dinitrogen monoxide [air, non-urban air or from high stacks]: 0.000503149 kg; name N2O; lognormal variance with pedigree 0.0707, pedigree (2,2,5,1,1)
  Modelled, see chapter 'Emissions of N2O to the air' in "01_crop production_direct field emissions and natural resources_v1.0.pdf" - pdf-document on the dedicated talk page of ecoinvent (www.ecoinvent.org/documentation)
- Zinc [soil, agricultural]: -1.3505e-6 kg
  (same comment as for Lead)
- Copper, ion [water, surface water]: 2.8832e-7 kg; lognormal variance with pedigree 0.1307, pedigree (2,2,5,1,1)
  (same comment as for Lead)
- Phosphate [water, ground-]: 2.958e-5 kg; lognormal variance with pedigree 0.0807, pedigree (2,2,5,1,1)
  Modelled, see chapter 'Emissions of phosphorous to the water' in "01_crop production_direct field emissions and natural resources_v1.0.pdf" - pdf-document on the dedicated talk page of ecoinvent (www.ecoinvent.org/documentation)
- Cyproconazole [soil, agricultural]: 3.3766e-6 kg; lognormal variance with pedigree 0.0507, pedigree (2,2,5,1,1)
  (same comment as for Flurtamone)
- Prochloraz [soil, agricultural]: 1.601e-6 kg; lognormal variance with pedigree 0.0507, pedigree (2,2,5,1,1)
  (same comment as for Flurtamone)
- Cyprodinil [soil, agricultural]: 2.534e-5 kg; lognormal variance with pedigree 0.0507, pedigree (2,2,5,1,1)
  (same comment as for Flurtamone)
- Zinc, ion [water, ground-]: 1.7759e-6 kg; lognormal variance with pedigree 0.1307, pedigree (2,2,5,1,1)
  (same comment as for Lead)
- Nickel [soil, agricultural]: 7.0215e-7 kg; lognormal variance with pedigree 0.0807, pedigree (2,2,5,1,1)
  (same comment as for Lead)
- Azoxystrobin [soil, agricultural]: 6.7977e-6 kg; lognormal variance with pedigree 0.0507, pedigree (2,2,5,1,1)
  (same comment as for Flurtamone)
- Mercury [soil, agricultural]: -1.4006e-10 kg
  (same comment as for Lead)
- Cadmium, ion [water, surface water]: 3.8053e-9 kg; lognormal variance with pedigree 0.1307, pedigree (2,2,5,1,1)
  (same comment as for Lead)
- Chromium, ion [water, surface water]: 3.8425e-7 kg; lognormal variance with pedigree 0.1307, pedigree (2,2,5,1,1)
  (same comment as for Lead)
- Spiroxamine [soil, agricultural]: 1.7195e-5 kg; lognormal variance with pedigree 0.0507, pedigree (2,2,5,1,1)
  (same comment as for Flurtamone)
- Fenpropidin [soil, agricultural]: 3.3332e-5 kg; lognormal variance with pedigree 0.0507, pedigree (2,2,5,1,1)
  (same comment as for Flurtamone)
- Chromium [soil, agricultural]: 1.5949e-6 kg; lognormal variance with pedigree 0.0807, pedigree (2,2,5,1,1)
  (same comment as for Lead)
- Water [water, ground-]: 0.0701612 m3; name water_to_water_ground; = water_irrigation_input*(1-fraction_IW_to_air)*fraction_IW_to_ground_water; lognormal variance with pedigree 0.1286, pedigree (4,3,5,1,4)
  Calculated value. See the parameters and their comments to understand the calculation.
  property fraction, origin: salt water 0; name fraction_origin_salt_water_Wgw
  property fraction, origin: fresh water 1; name fraction_origin_fresh_water_Wgw
  property fraction, origin: unspecified 0; name fraction_origin_unspecified_Wgw
- Nickel, ion [water, surface water]: 2.3882e-7 kg; lognormal variance with pedigree 0.1307, pedigree (2,2,5,1,1)
  (same comment as for Lead)
- Copper, ion [water, ground-]: 3.88e-7 kg; lognormal variance with pedigree 0.1307, pedigree (2,2,5,1,1)
  (same comment as for Lead)
- Picoxystrobin [soil, agricultural]: 1.1388e-6 kg; lognormal variance with pedigree 0.0507, pedigree (2,2,5,1,1)
  (same comment as for Flurtamone)
- Cadmium [soil, agricultural]: 7.5852e-7 kg; lognormal variance with pedigree 0.0807, pedigree (2,2,5,1,1)
  (same comment as for Lead)
- Trinexapac-ethyl [soil, agricultural]: 2.9339e-6 kg; lognormal variance with pedigree 0.0507, pedigree (2,2,5,1,1)
  (same comment as for Flurtamone)
- Mercury [water, ground-]: 4.5352e-11 kg; lognormal variance with pedigree 0.1307, pedigree (2,2,5,1,1)
  (same comment as for Lead)
- Cadmium, ion [water, ground-]: 5.9567e-9 kg; lognormal variance with pedigree 0.1307, pedigree (2,2,5,1,1)
  (same comment as for Lead)
- Lead [water, ground-]: 7.5293e-9 kg; lognormal variance with pedigree 0.1307, pedigree (2,2,5,1,1)
  (same comment as for Lead)
- Copper [soil, agricultural]: -1.6015e-6 kg
  (same comment as for Lead)
- Zinc, ion [water, surface water]: 3.5524e-7 kg; lognormal variance with pedigree 0.1307, pedigree (2,2,5,1,1)
  (same comment as for Lead)
- Diflufenican [soil, agricultural]: 8.2598e-6 kg; lognormal variance with pedigree 0.0507, pedigree (2,2,5,1,1)
  (same comment as for Flurtamone)
- Chloridazon [soil, agricultural]: 4.954e-5 kg; lognormal variance with pedigree 0.0507, pedigree (2,2,5,1,1)
  (same comment as for Flurtamone)
- Ammonia [air, non-urban air or from high stacks]: 0.00055628 kg; lognormal variance with pedigree 0.0507, pedigree (2,2,5,1,1)
  Modelled with the 'AGRAMMON model' described in "01_crop production_direct field emissions and natural resources_v1.0.pdf" - pdf-document on the dedicated talk page of ecoinvent (www.ecoinvent.org/documentation)
- Flufenacet [soil, agricultural]: 4.9643e-6 kg; lognormal variance with pedigree 0.0507, pedigree (2,2,5,1,1)
  (same comment as for Flurtamone)
- Chromium, ion [water, ground-]: 2.5397e-6 kg; lognormal variance with pedigree 0.1307, pedigree (2,2,5,1,1)
  (same comment as for Lead)
- Nitrogen oxides [air, non-urban air or from high stacks]: 0.000105661 kg; = 0.21 * N2O; lognormal variance with pedigree 0.0707, pedigree (2,2,5,1,1)
  Modelled, see chapter 'Emissions of NOx to the air' in "01_crop production_direct field emissions and natural resources_v1.0.pdf" - pdf-document on the dedicated talk page of ecoinvent (www.ecoinvent.org/documentation)
- Nitrate [water, ground-]: 0.0141031 kg; lognormal variance with pedigree 0.0807, pedigree (2,2,5,1,1)
  Modelled with the 'SALCA-NO3 model' described in "01_crop production_direct field emissions and natural resources_v1.0.pdf" - pdf-document on the dedicated talk page of ecoinvent (www.ecoinvent.org/documentation)
- Water [water, surface water]: 0.0175403 m3; name water_to_water_surface; = water_irrigation_input*(1-fraction_IW_to_air)*fraction_IW_to_surface_water; lognormal variance with pedigree 0.1286, pedigree (4,3,5,1,4)
  Calculated value. See the parameters and their comments to understand the calculation.
  property fraction, origin: fresh water 1; name fraction_origin_fresh_water_Wsw
  property fraction, origin: salt water 0; name fraction_origin_salt_water_Wsw
- Lead [water, surface water]: 3.2567e-8 kg; lognormal variance with pedigree 0.1307, pedigree (2,2,5,1,1)
  (same comment as for Lead)
- Phosphorus [water, surface water]: 1.6709e-5 kg; lognormal variance with pedigree 0.0807, pedigree (2,2,5,1,1)
  (same comment as for Phosphate)
- Tebuconazole [soil, agricultural]: 1.3472e-5 kg; lognormal variance with pedigree 0.0507, pedigree (2,2,5,1,1)
  (same comment as for Flurtamone)
- Mercury [water, surface water]: 3.8993e-11 kg; lognormal variance with pedigree 0.1307, pedigree (2,2,5,1,1)
  (same comment as for Lead)
- Propiconazole [soil, agricultural]: 1.0635e-5 kg; lognormal variance with pedigree 0.0507, pedigree (2,2,5,1,1)
  (same comment as for Flurtamone)
- Chlormequat [soil, agricultural]: 0.00010428 kg; lognormal variance with pedigree 0.0507, pedigree (2,2,5,1,1)
  (same comment as for Flurtamone)

## Sampling procedure
Data come from a survey in the concerted action GL-Pro of the EU (QLK5-CT-2002-02418). Data were compiled from statistics, pilot networks, fertilising recommendations, documents from extension services, information provided by retailers and expert knowledge. The production data were verified and adjusted by a group of experts in GL-Pro and by other experts.

## Extrapolations
This dataset has been extrapolated from year 2004 to the year of the calculation (2019). The uncertainty has been adjusted accordingly.

## Review by Hans-Jörg Althaus 2007-11-07
passed
