# treatment of waste polystyrene, municipal incineration

Dataset: EcoSpold 2, unit process
Geography: RoW
Time period: 2006-01-01 to 2019-12-31
Technology level: current
Classification: ISIC rev.4 ecoinvent: 3821:Treatment and disposal of non-hazardous waste
Synonyms: municipal waste incineration; Siedlungsabfallverbrennung; Kehrichtverbrennung
Scenario: Business-as-Usual
System model: Allocation at the point of substitution
Share of production covered: 1.8 %
Generated by: Gabor Doka
Published in: Doka G. 2013
Database: ecoinvent
isCopyrightProtected: true
accessRestrictedTo: 1

## General comment
This dataset represents the activity of waste disposal of waste polystyrene in a municipal solid waste incinerator (MSWI) // Recommended use of this dataset: For PS, which goes to disposal as part of communal waste mixture. For Expanded PS (EPS) use other dataset. // // Waste composition (wet, in ppm): upper heating value 38.88 MJ/kg; lower heating value 38.67 MJ/kg; H2O 2000; O 38852; H 78046; C 868490; S 678.75; N 1942.6; P n.a.; B n.a.; Cl 1132.1; Br 882.12; F 14.25; I n.a.; Ag n.a.; As 1.8418; Ba 180.79; Cd 23.336; Co 30.622; Cr 39.613; Cu 107.56; Hg 0.82311; Mn 77.469; Mo n.a.; Ni 19.968; Pb 14.935; Sb 41.65; Se 2.0357; Sn 25.403; V 279.32; Zn 834.61; Be 0.48468; Sc n.a.; Sr 85.789; Ti 969.36; Tl 0.38774; W n.a.; Si n.a.; Fe 3611.5; Ca n.a.; Al 193.87; K n.a.; Mg n.a.; Na 1420.6; // Share of carbon in waste that is biogenic 0%. // Share of metals in waste not oxidised and bulk-recyclable (exclude very small or thin parts) Iron: 0%; Alu: 0%; Copper: 0%. // One kg of this waste produces 0.02415 kg of slag and 0.008568 kg of residues, which are landfilled. Additional solidification with 0.003427 kg of cement. // Net energy production: 5.04MJ/kg electric energy and 9.71MJ/kg thermal energy. // Recovery of metal scrap to recycling: 0g iron scrap, 0g aluminium scrap, 0g copper scrap.

## Included activities start
waste incineration from waste reception gate and delivery into waste bunker at incinerator plant site (without transports to the incinerator)

## Included activities end
Waste-specific short-term emissions to water from leachate. Long-term emissions from landfill to ground water.

## Geography
Specific to the technology mix encountered in Switzerland in 2010. Well applicable to modern incineration practices in Europe, North America or Japan.

## Technology
average Swiss MSWI plants in 2010 (grate incinerators) with electrostatic precipitator for fly ash (ESP), wet flue gas scrubber and 25% SNCR , 42.77% SCR-high dust , 32.68% SCR-low dust -DeNOx facilities and 0% without Denox (weighted according to mass of burnt waste, representing Swiss average). Efficiency of iron scrap separation from slag : 58%. Efficiency of non-ferrous scrap separation from slag : 31%. Gross electric efficiency technology mix 15.84% and Gross thermal efficiency technology mix 28.51%

## Time period
Waste composition as given in literature reference, theoretical data or other source. Transfer coefficients for modern MSWI.

## Reference product
- waste polystyrene: 0 kg; By-product classification Waste; CPC 39270: Waste, parings and scrap of plastics; CAS 9003-53-6
  Main reference product of this activity (supply of disposal service).
  production volume 0 kg
    based on estimate on MSW in WTE globally, share of total plastic in MSW in top WTE countries and share of PS plastic types in US MSW (Fatarella 2012)
  property price 0 EUR2005
    Waste products are assigned a price of zero as they are assumed to require further treatment.
  property carbon content 0.922579
    carbon content on a dry matter basis (reserved; not for manual entry)
  properties: water content 0.00200401, dry mass 0.998 kg, carbon content, non-fossil 0, carbon content, fossil 0.922579, water in wet mass 0.002 kg, wet mass 1 kg, carbon allocation 0.920734 kg
- electricity, for reuse in municipal waste incineration only: 1 kWh; CPC 17100: Electrical energy; By-product classification allocatable product; pedigree (1,1,1,1,1)
  Net electricity generated from this waste and used in internal MSWI plant energy redistribution.
  Uncertainty: uncertainty is calculated from uncertainties in waste composition and uncertainties in energy efficiency and the uncertainty in internal energy demand
  production volume 2.9139e9 kWh

## By-products
- electricity, for reuse in municipal waste incineration only: 0 kWh; name E_el_prod_MSWI; CPC 17100: Electrical energy; By-product classification allocatable product; pedigree (1,1,1,1,1)
  (same comment as for electricity, for reuse in municipal waste incineration only)
  production volume 0 kWh
    calculated in proportion to reference product waste input to incinerator
  property true value relation 3.6; name E_el_prod_MSWI_true_value_relation
    property to calculate "true value" from
  property exergy 3.6 MJ; name E_el_prod_MSWI_exergy
    This exergy property is based on the exergy content of the product.
  property price 0.1 EUR2005; name E_el_prod_MSWI_price_EUR2005
    Estimated to be the same price as in case of electricity, medium voltage.
- heat, for reuse in municipal waste incineration only: 0 MJ; name E_th_prod_MSWI; CPC 17300: Steam and hot water; By-product classification allocatable product; pedigree (1,1,1,1,1)
  (same comment as for electricity, for reuse in municipal waste incineration only)
  production volume 0 MJ
    calculated in proportion to reference product waste input to incinerator
  property exergy 0.1842 MJ; name E_th_prod_MSWI_exergy
    This exergy property is based on the exergy content of the product.
  property price 0.0106 EUR2005; name E_th_prod_MSWI_price_EUR2005
    Average European district heat price from Ecoheatcool and Euroheat 2005-2006, Ecoheat Work package 1: The European heat market. Final report. 10.6 EUR/GJ i s the price of district heat. http://www.solarthermalworld.org/files/Ecoheatcool%20WP1%20Web.pdf?download
  property true value relation 0.1842; name E_th_prod_MSWI_true_value_relation
    property to calculate "true value" from

## Inputs from technosphere
- transport, freight, lorry, unspecified: 0, 0, 0 metric ton*km (3 entries); pedigree (1,1,1,1,1)
  Transport services to transport incineration residues to landfills.
  Uncertainty: uncertainty calculated from uncertainty of the waste composition of this waste, uncertainty of transfer coefficients and the uncertainty in generic transportation distances
- ammonia, liquid: 3.51463e-6 kg; lognormal variance with pedigree 0.25848, pedigree (1,1,3,1,1)
  Input to DeNOx stage (100% NH3).
  Uncertainty: uncertainty calculated from uncertainty in average DeNOx input, uncertainty in the share of thermal NOx, uncertainty of nitrogen content in average municipal waste and the uncertainty in nitrogen content in *this* waste.
  properties: wet mass 1 kg, dry mass 1 kg
- chemical, inorganic: 0.000324895 kg; lognormal variance with pedigree 0.15882, pedigree (1,1,3,1,1)
  Auxilliary inputs for the wastewater treatment stage of the incinerator plant. Proxy for Polyelectrolyte.
  Uncertainty: uncertainty calculated from uncertainty in average Polyelectrolyte input, of transfer coefficients in the incinerator, and the uncertainty of the waste composition of this waste
  properties: dry mass 1 kg, wet mass 1 kg, carbon content, fossil 0.003
- heat, district or industrial, natural gas: 0 MJ; pedigree (1,1,1,1,1)
  Input to DeNOx stage, to heat up flue gas in low-dust SCR.
  Uncertainty: uncertainty calculated from uncertainty in average DeNOx input, uncertainty in the share of thermal NOx, uncertainty of nitrogen content in average municipal waste and the uncertainty in nitrogen content in *this* waste.
- water, decarbonised: 0, 0, 0, 0, 0, 0, 0, 0, 0, 0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 kg (13 entries); pedigree (1,1,1,1,1)
  Incinerator process water used in flue gas scrubber stage.
  Uncertainty: uncertainty calculated from uncertainty in average water input, and the uncertainty of the waste composition of this waste
  properties: wet mass 1 kg
- process-specific burdens, slag landfill: 0, 0, 0 kg (3 entries); pedigree (1,1,1,1,1)
  Mass-specific expenditures required for landfilling of bottom ash.
  Uncertainty: uncertainty is calculated from uncertainties in waste composition and transfer coefficients in incinerator
- chromium oxide, flakes: 0 kg; pedigree (1,1,1,1,1)
  Input to DeNOx stage.
  Uncertainty: uncertainty calculated from uncertainty in average DeNOx input, uncertainty in the share of thermal NOx, uncertainty of nitrogen content in average municipal waste and the uncertainty in nitrogen content in *this* waste.
  properties: dry mass 1 kg, wet mass 1 kg
- iron (III) chloride, without water, in 40% solution state: 0 kg; pedigree (1,1,1,1,1)
  Auxilliary inputs for the wastewater treatment stage of the incinerator plant.
  Uncertainty: uncertainty calculated from uncertainty in average FeCl3 input, of transfer coefficients in the incinerator, and the uncertainty of the waste composition of this waste
  properties: dry mass 1 kg, wet mass 1 kg
- titanium dioxide: 0 kg; pedigree (1,1,1,1,1)
  Input to DeNOx stage (TiO2 catalyst carrier)
  Uncertainty: uncertainty calculated from uncertainty in average DeNOx input, uncertainty in the share of thermal NOx, uncertainty of nitrogen content in average municipal waste and the uncertainty in nitrogen content in *this* waste.
  properties: wet mass 1 kg, dry mass 1 kg
- cement, unspecified: 0, 0, 0, 0, 0, 0, 0, 0, 0, 0 kg (10 entries); pedigree (1,1,1,1,1)
  Cement required for solidification of landfilled residual material.
  Uncertainty: Uncertainty calculated from uncertainty of the waste composition of this waste, of transfer coefficients in the incinerator and of the solidification recipe.
  properties: dry mass 1 kg, wet mass 1 kg
- sodium hydroxide, without water, in 50% solution state: 1.27481e-8 kg; lognormal variance with pedigree 0.26393, pedigree (1,1,3,1,1)
  Auxilliary inputs for the flue gas treatment stage of the incinerator plant.
  Uncertainty: uncertainty calculated from uncertainty in average NaOH input, of transfer coefficients in the incinerator, and the uncertainty of the waste composition of this waste
  properties: dry mass 1 kg, wet mass 1 kg
- waste cement, hydrated: 0 kg; pedigree (1,1,1,1,1)
  Hydrated cement output for solidification of landfilled residual material.
  Uncertainty: Uncertainty calculated from uncertainty of the waste composition of this waste and transfer coefficients in the incinerator and of the solidification recipe.
  production volume 0 kg
    calculated in proportion to reference product waste input to incinerator
  properties: dry mass 1 kg, wet mass 1 kg
- residual material landfill: 0 unit; pedigree (1,1,1,1,1)
  Landfill infrastructure required for landfilling of incineration residues.
  Uncertainty: uncertainty is calculated from uncertainties in waste composition and transfer coefficients in incinerator
- quicklime, milled, packed: 0 kg; pedigree (1,1,1,1,1)
  Auxilliary inputs for the flue gas treatment stage of the incinerator plant.
  Uncertainty: uncertainty calculated from uncertainty in average CaO input, of transfer coefficients in the incinerator, and the uncertainty of the waste composition of this waste
  properties: dry mass 0.99 kg, water content 0.010101, wet mass 1 kg
- process-specific burdens, residual material landfill: 0, 0, 0 kg (3 entries); pedigree (1,1,1,1,1)
  Mass-specific expenditures required for landfilling of incineration residues.
  Uncertainty: uncertainty is calculated from uncertainties in waste composition and transfer coefficients in incinerator
- municipal waste incineration facility: 0 unit
  Demands per kilogram waste.
- hydrochloric acid, without water, in 30% solution state: 0 kg; pedigree (1,1,1,1,1)
  Auxilliary inputs for the wastewater treatment stage of the incinerator plant.
  Uncertainty: uncertainty calculated from uncertainty in average HCl input, of transfer coefficients in the incinerator, and the uncertainty of the waste composition of this waste
  properties: wet mass 1 kg, dry mass 1 kg
- chemical, organic: 0 kg; pedigree (1,1,1,1,1)
  Auxilliary inputs for the wastewater treatment stage of the incinerator plant. Proxy for (pure) Trisodium-trimercapto-s-triazine (CAS 17766-26-6), used as 15% diluted solution, aka TMT15.
  Uncertainty: uncertainty calculated from uncertainty in average TMT15 input, of transfer coefficients in the incinerator, and the uncertainty of the waste composition of this waste
  properties: dry mass 1 kg, carbon content, fossil 0.628, wet mass 1 kg
- slag landfill: 0 unit; pedigree (1,1,1,1,1)
  Landfill infrastructure required for landfilling of bottom ash.
  Uncertainty: uncertainty is calculated from uncertainties in waste composition and transfer coefficients in incinerator
- heat, district or industrial, natural gas: 0.000352215, 0.00647142, 0.0199125 MJ (3 entries); lognormal variance with pedigree 0.25848, pedigree (1,1,3,1,1)
  (same comment as for heat, district or industrial, natural gas)
- waste cement, hydrated: 0, 0 kg (2 entries); pedigree (1,1,1,1,1)
  (same comment as for waste cement, hydrated)
- steel, low-alloyed, hot rolled: 0.00178596 kg; lognormal variance with pedigree 0.0035, pedigree (1,4,2,3,2)
  Data are from Gallego-Schmid et al. 2018.
- electricity, high voltage: 0.00201168 kWh; lognormal variance with pedigree 0.0035, pedigree (1,4,2,3,2)
  Data are from Gallego-Schmid et al. 2018.
- tap water: 0.00141544 kg; lognormal variance with pedigree 0.0035, pedigree (1,4,2,3,2)
  Data are from Gallego-Schmid et al. 2018.
- heat, central or small-scale, other than natural gas: 0.00188991 MJ; lognormal variance with pedigree 0.0035, pedigree (1,4,2,3,2)
  Data are from Gallego-Schmid et al. 2018.
- polypropylene, granulate: 3.6819e-5 kg; lognormal variance with pedigree 0.0035, pedigree (1,4,2,3,2)
  Data are from Gallego-Schmid et al. 2018.
- polyvinylchloride, suspension polymerised: 4.58684e-5 kg; lognormal variance with pedigree 0.0035, pedigree (1,4,2,3,2)
  Data are from Gallego-Schmid et al. 2018.
- metal working factory: 8.34063e-13 unit; lognormal variance with pedigree 0.3029, pedigree (1,4,2,3,2)
  Estimated value.The input of infrastructure is approximated with the exchange 'metal working factory', this was chosen as metal is the main material constituting the final product. The general comment for the activity 'metal working faculty, GLO' [accessed 19.01.2018] specifies: '4.58E-10 units of this process are needed to produce 1 kg of final product. Additionally, the dataset for 'metal working factory' needs to be used together with the 'energy and auxilliary inputs, metal working factory', 1 kg of this exchange is required per 1 kg of final product.
- zinc: 1.79576e-8 kg; lognormal variance with pedigree 0.0035, pedigree (1,4,2,3,2)
  Data are from Gallego-Schmid et al. 2018.
- palladium: 1.79422e-10 kg; lognormal variance with pedigree 0.0035, pedigree (1,4,2,3,2)
  Data are from Gallego-Schmid et al. 2018.
- acrylonitrile-butadiene-styrene copolymer: 1.62971e-5 kg; lognormal variance with pedigree 0.0035, pedigree (1,4,2,3,2)
  Data are from Gallego-Schmid et al. 2018. In terms of outputs, assumed to have gone to waste polystyrene.
- silver: 1.79422e-9 kg; lognormal variance with pedigree 0.0035, pedigree (1,4,2,3,2)
  Data are from Gallego-Schmid et al. 2018.
- polyethylene, low density, granulate: 1.58537e-5 kg; lognormal variance with pedigree 0.0035, pedigree (1,4,2,3,2)
  Used here in place of polyethylene terephthalate. Data are from Gallego-Schmid et al. 2018.
- gold: 4.48554e-10 kg; lognormal variance with pedigree 0.0035, pedigree (1,4,2,3,2)
  Data are from Gallego-Schmid et al. 2018.
- nickel, 99.5%: 1.79422e-8 kg; lognormal variance with pedigree 0.0035, pedigree (1,4,2,3,2)
  Data are from Gallego-Schmid et al. 2018.
- ferrite: 8.37301e-6 kg; lognormal variance with pedigree 0.0035, pedigree (1,4,2,3,2)
  Data are from Gallego-Schmid et al. 2018.
- polystyrene, general purpose: 0.00315349 kg; lognormal variance with pedigree 0.0035, pedigree (1,4,2,3,2)
  Data are from Gallego-Schmid et al. 2018.
- aluminium, cast alloy: 0.000198718 kg; lognormal variance with pedigree 0.0035, pedigree (1,4,2,3,2)
  Data are from Gallego-Schmid et al. 2018.
- lead: 3.58843e-8 kg; lognormal variance with pedigree 0.0089, pedigree (1,4,2,3,2)
  Data are from Gallego-Schmid et al. 2018.
- tin: 5.38265e-8 kg; lognormal variance with pedigree 0.0035, pedigree (1,4,2,3,2)
  Data are from Gallego-Schmid et al. 2018.
- ceramic tile: 2.00359e-6 kg; lognormal variance with pedigree 0.0035, pedigree (1,4,2,3,2)
  Data are from Gallego-Schmid et al. 2018.
- copper: 0.000660238 kg; lognormal variance with pedigree 0.0035, pedigree (1,4,2,3,2)
  Data are from Gallego-Schmid et al. 2018.
- flat glass, coated: 1.126e-5, 2.28002e-5 kg (2 entries); lognormal variance with pedigree 0.0035, pedigree (1,4,2,3,2)
  Data are from Gallego-Schmid et al. 2018.
- polyol: 1.83333e-5, 3.71226e-5 kg (2 entries); lognormal variance with pedigree 0.0035, pedigree (1,4,2,3,2)
  Used here to describe polyoxymethylene. Data are from Gallego-Schmid et al. 2018. In terms of outputs assumed to have gone to waste water.
- scrap steel: -0.000178118, -2.25186e-7, -0.000553162 kg (3 entries); lognormal variance with pedigree 0.0035, pedigree (1,4,2,3,2)
  Data are from Gallego-Schmid et al. 2018.The amount is set equal to the input amount for the respective material. This includes scrap steel (7.04), iron scrap (0.28) and scrap of other metals (0.0042).
  production volume 2.92971e8 kg
- waste glass: -8.08102e-5, -4.78268e-6, -4.46218e-7, -1.99629e-6, -5.1891e-5, -6.77606e-7, -1.08503e-7, -0.000489028 kg (8 entries); lognormal variance with pedigree 0.0035, pedigree (1,4,2,3,2)
  Data are from Gallego-Schmid et al. 2018.The amount is set equal to the input amount for the respective material
  production volume 4.556e7 kg
- nylon 6: 4.05641e-7, 8.21373e-7 kg (2 entries); lognormal variance with pedigree 0.0035, pedigree (1,4,2,3,2)
  Data are from Gallego-Schmid et al. 2018. In terms of outputs assumed to have gone to waste PE.
- waste polypropylene: -3.544e-6, -2.73222e-7, -1.1285e-7, -1.07162e-7, -4.08916e-6, -4.55903e-8, -2.06633e-8, -2.86264e-5 kg (8 entries); lognormal variance with pedigree 0.0035, pedigree (1,4,2,3,2)
  (same comment as for waste glass)
  production volume 5.64e6 kg
- wastewater, average: -4.98486e-7, -5.39268e-8, -1.04274e-6 m3 (3 entries); lognormal variance with pedigree 0.0035, pedigree (1,4,2,3,2)
  Converted from liters. Data are from Gallego-Schmid et al. 2018.The amount is set equal to the input amount for the respective material.
  production volume 808000 m3
- energy and auxilliary inputs, metal working factory: 8.59504e-14, 3.85431e-13 kg (2 entries); lognormal variance with pedigree 0.0035, pedigree (1,4,2,3,2)
  (same comment as for metal working factory)
- waste polyvinylchloride: -5.31866e-6, -4.29459e-7, -1.77382e-7, -1.68441e-7, -6.42748e-6, -7.16603e-8, -3.24793e-8, -4.49959e-5 kg (8 entries); lognormal variance with pedigree 0.0035, pedigree (1,4,2,3,2)
  (same comment as for waste glass)
  production volume 6.48e6 kg
- inert waste: -4.55562e-7, -3.92361e-9, -1.6058e-6 kg (3 entries); lognormal variance with pedigree 0.0035, pedigree (1,4,2,3,2)
  Represents here waste ceramic tile. Data are from Gallego-Schmid et al. 2018.
  production volume 2.68e6 kg
- waste polyethylene: -3.44263e-6, -2.97317e-7, -1.22802e-7, -1.16612e-7, -4.44977e-6, -4.96108e-8, -2.24856e-8, -3.11509e-5 kg (8 entries); lognormal variance with pedigree 0.0035, pedigree (1,4,2,3,2)
  Used here in place of waste from polyethylene terephthalate and nylon. Data are from Gallego-Schmid et al. 2018.
  production volume 8.76e6 kg
- waste polystyrene: -2.09297e-5, -4.0402e-6, -1.66875e-6, -1.58463e-6, -6.04675e-5, -6.74155e-7, -3.05554e-7, -0.000416602 kg (8 entries); lognormal variance with pedigree 0.0035, pedigree (1,4,2,3,2)
  Includes scrap ABS and scrap polystyrene (general purpose) Data are from Gallego-Schmid et al. 2018.The amount is set equal to the input amount for the respective material.
  production volume 1.06e7 kg
- brass: 5.72723e-9, 1.13971e-6 kg (2 entries); lognormal variance with pedigree 0.0035, pedigree (1,4,2,3,2)
  Data are from Gallego-Schmid et al. 2018.
- scrap aluminium: -2.38437e-5, -1.11869e-6, -5.01922e-5 kg (3 entries); lognormal variance with pedigree 0.0035, pedigree (1,4,2,3,2)
  Data are from Gallego-Schmid et al. 2018.The amount is set equal to the input amount for the respective material.
  production volume 2.472e7 kg
- scrap copper: -3.76556e-5, -1.76672e-6, -7.9267e-5 kg (3 entries); lognormal variance with pedigree 0.0035, pedigree (1,4,2,3,2)
  Also includes scrap brass.Data are from Gallego-Schmid et al. 2018.The amount is set equal to the input amount for the respective material.
  production volume 2.66e7 kg
- steel, low-alloyed: 0.000934431 kg; lognormal variance with pedigree 0.0035, pedigree (1,4,2,3,2)
  Data from Xiao et al. 2015.
- heat, district or industrial, natural gas: 0.000120935 MJ; lognormal variance with pedigree 0.0035, pedigree (1,4,2,3,2)
  Data from Xiao et al. 2015. 0.27 cubic meters of natural gas were converted into 10.53 MJ using 'heat production, natural gas, at industrial furnace >1000kW, GLO' [accessed 20.01.2018].
- lithium fluoride: 3.82673e-8 kg; lognormal variance with pedigree 0.0035, pedigree (1,4,2,3,2)
  Used here in place of fluorozirconate. In terms of output, assumed to have gone to wastewater. Data from Xiao et al. 2015.
- dimethyldichlorosilane: 3.82673e-8 kg; lognormal variance with pedigree 0.0035, pedigree (1,4,2,3,2)
  Data from Xiao et al. 2015. In terms of outputs, assumed to have gone to waste water.
- phenyl isocyanate: 7.44214e-5 kg; lognormal variance with pedigree 0.0035, pedigree (1,4,2,3,2)
  Data from Xiao et al. 2015. In terms of outputs, assumed to have gone to waste water.
- 1,1-difluoroethane, HFC-152a: 0.000457609 kg; lognormal variance with pedigree 0.0035, pedigree (1,4,2,3,2)
  Used here in place of pentafluoropropane. Data from Xiao et al. 2015.
- polystyrene, high impact: 0.000633183 kg; lognormal variance with pedigree 0.0035, pedigree (1,4,2,3,2)
  Data from Xiao et al. 2015.
- methylcyclopentane: 5.51268e-6 kg; lognormal variance with pedigree 0.0035, pedigree (1,4,2,3,2)
  Data from Xiao et al. 2015. In terms of outputs, assumed to have gone to waste water.
- compressed air, 800 kPa gauge: 6.31724e-5, 0.000155245 m3 (2 entries); lognormal variance with pedigree 0.0035, pedigree (1,4,2,3,2)
  Data from Xiao et al. 2015.
- sodium silicate, solid: 1.68729e-8, 3.41655e-8 kg (2 entries); lognormal variance with pedigree 0.0035, pedigree (1,4,2,3,2)
  Data from Xiao et al. 2015. In terms of outputs, assumed to have gone to waste water.
- aluminium, primary, ingot: 2.1979e-5, 3.16494e-6 kg (2 entries); lognormal variance with pedigree 0.0035, pedigree (1,4,2,3,2)
  Data from Xiao et al. 2015.
- steam, in chemical industry: 1.34508e-5, 7.62893e-5 kg (2 entries); lognormal variance with pedigree 0.0035, pedigree (1,4,2,3,2)
  Data from Xiao et al. 2015.
- sodium percarbonate, powder: 1.26509e-8, 2.56164e-8 kg (2 entries); lognormal variance with pedigree 0.0035, pedigree (1,4,2,3,2)
  Data from Xiao et al. 2015. In terms of outputs, assumed to have gone to waste water.
- epoxy resin, liquid: 2.73517e-7, 1.29842e-6 kg (2 entries); lognormal variance with pedigree 0.0035, pedigree (1,4,2,3,2)
  Data from Xiao et al. 2015. In terms of outputs, assumed to have gone to waste PVC.
- electronic component, passive, unspecified: 0.000160506 kg; lognormal variance with pedigree 0.0113, pedigree (1,4,4,3,2)
  Based on Dodbiba et al. 2008. Used here in place of 'circut board' and 'other materials' as presented in the original literature source. These are assumed to be various electronic components.
- waste electric and electronic equipment: -0.000160506 kg; lognormal variance with pedigree 0.0113, pedigree (1,4,4,3,2)
  Based on Dodbiba et al. 2008. The amount is set equal to the input amount for the respective material. Used here in place of 'circuit board' and 'other materials' as presented in the original literature source.
  production volume 9.9e8 kg
- flat glass factory: 5.86002e-13 unit; lognormal variance with pedigree 0.3107, pedigree (1,4,4,3,2)
  Used here in place of infrastructure based on the amount of the largest contributor to the final product mass (glass). This is an estimated value. According to the general comment of the dataset 'Flat glass factory construction, GLO' [accessed 20.01.2018], the life time of the equipment is assumed to be 20 years and the annual production is 83000 t/a. Thus, the estimated lifetime output of the factory is 83000 x 20 = 1660000. As the television mass is 30 kg, then the number of televisions produced during the lifetime of the factory is 1660000 / 0.03 = 55333333 units. The calculation of the infrastructure is therefore 1/life time capacity = 1/55333333 unit.
- flat glass, uncoated: 8.48143e-5, 0.000411868 kg (2 entries); lognormal variance with pedigree 0.0113, pedigree (1,4,4,3,2)
  Based on Dodbiba et al. 2008.
- polyethylene, high density, granulate: 8.37562e-6 kg; lognormal variance with pedigree 0.004, pedigree (1,4,2,4,2)
  Data from Gallego-Schmid et al. 2016.
- plastic processing factory: 9.02138e-14 unit; lognormal variance with pedigree 0.3034, pedigree (1,4,2,4,2)
  Used here in place of infrastructure based on the amount of the largest contributor to the final product mass (plastics). This is an estimated value. According to the technology comment of the dataset 'Plastic processing factory construction, GLO' [accessed 19.01.2018], the life time of the tanks is assumed to be 50 years and the annual production is 27000 t/a. Thus, the estimated lifetime output of the factory is 27000 x 50 = 1350000. As the vacuum cleaner mass is 4.45 kg, then the number of vacuum cleaners produced during the lifetime of the factory is 1350000 / 0.00445 = 303370787 units. The calculation of the infrastructure is therefore 1/life time capacity = 1/303370787 unit.
- heat, central or small-scale, natural gas: 0.000470734 MJ; lognormal variance with pedigree 0.004, pedigree (1,4,2,4,2)
  Data from Gallego-Schmid et al. 2016.
- polyvinylchloride, bulk polymerised: 9.6779e-6 kg; lognormal variance with pedigree 0.004, pedigree (1,4,2,4,2)
  Data from Gallego-Schmid et al. 2016.
- vinyl acetate: 1.13578e-5 kg; lognormal variance with pedigree 0.004, pedigree (1,4,2,4,2)
  Data from Gallego-Schmid et al. 2016.
- formaldehyde: 1.21494e-7, 5.07976e-7 kg (2 entries); lognormal variance with pedigree 0.004, pedigree (1,4,2,4,2)
  Used here in place of polyoxymethylene. In terms of outputs, assumed to have gone to wastewater. Data from Gallego-Schmid et al. 2016.
- corrugated board box: 8.30214e-6, 1.70984e-6, 0.000145257 kg (3 entries); lognormal variance with pedigree 0.004, pedigree (1,4,2,4,2)
  Includes all materials from packaging i.e. folding box, cardboard trays and protective cardboard. Data from Gallego-Schmid et al. 2016.
- waste paperboard: -2.61177e-6, -1.62399e-7, -5.86815e-7, -1.05919e-7, -1.06348e-6, -5.72193e-8, -1.42003e-8, -1.97559e-5 kg (8 entries); lognormal variance with pedigree 0.004, pedigree (1,4,2,4,2)
  The amount is set equal to the input amount for the respective material. Data from Gallego-Schmid et al. 2016.
  production volume 9.345e7 kg
- seal, natural rubber based: 3.08701e-9 kg; lognormal variance with pedigree 0.003425, pedigree (1,4,2,2,2)
  Data from Yuan et al. 2016.
- used cable: -1.94482e-7 kg; lognormal variance with pedigree 0.003425, pedigree (1,4,2,2,2)
  Data from Yuan et al. 2016. The amount is set equal to the input amount for the respective material.
  production volume 4.02381e7 kg
- cable, unspecified: 1.94482e-7 kg; lognormal variance with pedigree 0.003425, pedigree (1,4,2,2,2)
  This product represents average, unspecified cable. Data from Yuan et al. 2016.
- synthetic rubber: 3.74823e-5 kg; lognormal variance with pedigree 0.003425, pedigree (1,4,2,2,2)
  Data from Yuan et al. 2016.
- printed paper: 4.63052e-8 kg; lognormal variance with pedigree 0.003425, pedigree (1,4,2,2,2)
  Data from Yuan et al. 2016.
- cast iron: 0.00101842 kg; lognormal variance with pedigree 0.003425, pedigree (1,4,2,2,2)
  Used here in place of iron. Data from Yuan et al. 2016.
- kraft paper, bleached: 4.01311e-7 kg; lognormal variance with pedigree 0.003425, pedigree (1,4,2,2,2)
  Data from Yuan et al. 2016.
- heat, district or industrial, other than natural gas: 5.94558e-6 MJ; lognormal variance with pedigree 0.003425, pedigree (1,4,2,2,2)
  Data from Yuan et al. 2016. Converted from kg of oil used for heating (0.46) to MJ of heat (19.26) using 'heat production, heavy fuel oil, at industrial furnace 1MW, GLO' [accessed 20 January 2018].
- trisodium phosphate: 1.60648e-7 kg; lognormal variance with pedigree 0.003425, pedigree (1,4,2,2,2)
  Used herein place of phosphating agent, degreaser and surface conditioning agent. In terms of outputs assumed to have gone to wastewater. Data from Yuan et al. 2016.
- waste rubber, unspecified: -2.85404e-7, -5.64842e-9, -3.00131e-5 kg (3 entries); lognormal variance with pedigree 0.003425, pedigree (1,4,2,2,2)
  This includes scrap synthetic, natural rubber (seal) and epoxy resin. Data from Yuan et al. 2016. The amount is set equal to the input amount for the respective material.
  production volume 5.68443e7 kg
- waste packaging paper: -4.79959e-8, -2.98437e-9, -1.07838e-8, -1.94645e-9, -1.95434e-8, -1.05151e-9, -2.60956e-10, -3.6305e-7 kg (8 entries); lognormal variance with pedigree 0.003425, pedigree (1,4,2,2,2)
  Used here in place of kraft liner and paper. Data from Yuan et al. 2016. The amount is set equal to the input amount for the respective material.
  production volume 9.26115e7 kg
- concrete block: 4.754e-10, 1.04958e-9, 6.02152e-8 kg (3 entries); lognormal variance with pedigree 0.003425, pedigree (1,4,2,2,2)
  Data from Yuan et al. 2016. In terms of outputs assumed to have gone to inert waste.
- waste plastic, mixture: -6.31421e-7, -7.37263e-8, -3.04516e-8, -2.89166e-8, -1.10342e-6, -1.23021e-8, -5.5758e-9, -7.72455e-6 kg (8 entries); lognormal variance with pedigree 0.003425, pedigree (1,4,2,2,2)
  Data from Yuan et al. 2016. Represents here waste ABS.
  production volume 1.35724e9 kg
- compressed air, 1000 kPa gauge: 3.30354e-7, 8.1184e-7 m3 (2 entries); lognormal variance with pedigree 0.003425, pedigree (1,4,2,2,2)
  Data from Yuan et al. 2016.
- photovoltaic cell factory: 1.6411e-13 unit; lognormal variance with pedigree 0.3701, pedigree (1,4,5,3,3)
  EcoSpold01Location=DE
  Proxy with calculation, to represent computer production photovoltaic cell factory is used. It is based on a annual production of 7.9 mio pieces and life-span of 25 years.
- power adapter, for laptop: 9.38934e-8 unit; source von Geibler J. 2003; lognormal variance with pedigree 0.0701, pedigree (1,4,5,3,3)
  Literature Value.
  EcoSpold01Location=GLO
- hard disk drive, for laptop computer: 9.38934e-8 unit; source von Geibler J. 2003; lognormal variance with pedigree 0.0701, pedigree (1,4,5,3,3)
  Literature Value.
  EcoSpold01Location=GLO
- printed wiring board, surface mounted, unspecified, Pb free: 1.14991e-6 kg; source von Geibler J. 2003; lognormal variance with pedigree 0.0701, pedigree (1,4,5,3,3)
  Literature Value.
  This original value from production mix has been replaced by 2 flows. Pb-containing has a share of 0.3, Pb-free has a share of 0.7.
- magnesium-alloy, AZ91, diecast: 9.62712e-7 kg; source von Geibler J. 2003; lognormal variance with pedigree 0.0701, pedigree (1,4,5,3,3)
  EcoSpold01Location=RER
  Literature Value.
- section bar extrusion, aluminium: 6.56882e-5 kg; source von Geibler J. 2003; lognormal variance with pedigree 0.0707, pedigree (2,4,5,3,3)
  Literature Value.
  EcoSpold01Location=RER
- magnesium-alloy, AZ91: 2.65906e-8 kg; source von Geibler J. 2003; lognormal variance with pedigree 0.0707, pedigree (2,4,5,3,3)
  EcoSpold01Location=RER
  Literature Value.
- printed wiring board, mounted mainboard, laptop computer, Pb containing: 4.02239e-9 kg; source von Geibler J. 2003; lognormal variance with pedigree 0.0701, pedigree (1,4,5,3,3)
  Literature Value.
  EcoSpold01Location=GLO
- polystyrene foam slab: 0.000167817 kg; source von Geibler J. 2003; lognormal variance with pedigree 0.0701, pedigree (1,4,5,3,3)
  EcoSpold01Location=RER
  Literature Value.
- printed wiring board, surface mounted, unspecified, Pb containing: 1.14248e-6 kg; source von Geibler J. 2003; lognormal variance with pedigree 0.0701, pedigree (1,4,5,3,3)
  (same comment as for printed wiring board, surface mounted, unspecified, Pb free)
- liquid crystal display, unmounted: 3.0797e-8 kg; source von Geibler J. 2003; lognormal variance with pedigree 0.0701, pedigree (1,4,5,3,3)
  Literature Value.
  EcoSpold01Location=GLO
- packaging film, low density polyethylene: 2.39051e-5 kg; source von Geibler J. 2003; lognormal variance with pedigree 0.0701, pedigree (1,4,5,3,3)
  Literature Value.
  EcoSpold01Location=RER
- extrusion, plastic pipes: 4.49824e-8 kg; source von Geibler J. 2003; lognormal variance with pedigree 0.0701, pedigree (1,4,5,3,3)
  Literature Value.
  EcoSpold01Location=RER
- aluminium, wrought alloy: 0.000381454 kg; source von Geibler J. 2003; lognormal variance with pedigree 0.0707, pedigree (2,4,5,3,3)
  EcoSpold01Location=RER
  Literature Value.
- disk drive, CD/DVD, ROM, for laptop computer: 9.38934e-8 unit; source von Geibler J. 2003; lognormal variance with pedigree 0.0701, pedigree (1,4,5,3,3)
  EcoSpold01Location=GLO
  Literature Value.
- used laptop computer: -2.92947e-7 kg; lognormal variance with pedigree 0.0701, pedigree (1,4,5,3,3)
  EcoSpold01Location=CH
  Measured Value.
  production volume 3.12 kg
- battery, Li-ion, rechargeable, prismatic: 2.56329e-8 kg; source von Geibler J. 2003; lognormal variance with pedigree 0.0701, pedigree (1,4,5,3,3)
  EcoSpold01Location=GLO
  Literature Value.
- electricity, medium voltage: 2.03146e-5 kWh; source von Geibler J. 2003; lognormal variance with pedigree 0.0701, pedigree (1,4,5,3,3)
  EcoSpold01Location=UCTE
  Literature Value.
- battery, NiMH, rechargeable, prismatic: 7.51147e-10 kg; source von Geibler J. 2003; lognormal variance with pedigree 0.0701, pedigree (1,4,5,3,3)
  Literature Value.
  EcoSpold01Location=GLO
- cable, network cable, category 5, without plugs: 1.46474e-8 m; source von Geibler J. 2003; lognormal variance with pedigree 0.0521, pedigree (1,4,5,3,1)
  Literature Value.
  EcoSpold01Location=GLO
- sheet rolling, steel: 0.00283345 kg; source von Geibler J. 2003; lognormal variance with pedigree 0.0701, pedigree (1,4,5,3,3)
  EcoSpold01Location=RER
  Literature Value.
- plug, inlet and outlet, for network cable: 9.38934e-8 unit; lognormal variance with pedigree 0.0521, pedigree (1,4,5,3,1)
  Measured Value.
  EcoSpold01Location=GLO
- sheet rolling, copper: 6.25349e-7 kg; source von Geibler J. 2003; lognormal variance with pedigree 0.0701, pedigree (1,4,5,3,3)
  Literature Value.
  EcoSpold01Location=RER
- steel, chromium steel 18/8, hot rolled: 0.000280251 kg; source von Geibler J. 2003; lognormal variance with pedigree 0.0701, pedigree (1,4,5,3,3)
  Literature Value.
  EcoSpold01Location=RER
- sheet rolling, aluminium: 0.000464009 kg; source von Geibler J. 2003; lognormal variance with pedigree 0.0701, pedigree (1,4,5,3,3)
  EcoSpold01Location=RER
  Literature Value.
- wastewater, unpolluted: -5.80527e-9, -7.19588e-7 m3 (2 entries); source Fujitsu L. 2003; lognormal variance with pedigree 0.0701, pedigree (1,4,5,3,3)
  Literature Value.
  EcoSpold01Location=CH
  production volume 1.62 m3
- toner module, laser printer, black/white: 3.70837e-5 unit; lognormal variance with pedigree 0.0512, pedigree (2,3,5,1,1)
  Calculated based on literature and estimates. Toner module capacity is 5000 pages, one page weight 0.005 kg, thus total weight of paper one toner module can print on is (5000*0.005=) 25 kg. In order to print on paper of total weight of 1 kg (1/25=) 0.04 units of toner module is needed.
- used toner module, laser printer, black/white: -2.7312e-5 kg; lognormal variance with pedigree 0.0526, pedigree (4,4,5,5,1)
  Measured value. The weight of 1 toner module is 0.88 kg.
  production volume 2.94269e6 kg
- printer, laser, black/white: 1.61648e-7 unit; lognormal variance with pedigree 0.0546, pedigree (3,3,5,5,1)
  Calculated based on literature values and estimates. The monthly production volume of this type of printer is 20,000 pg (http://www.epson.de/de/en/viewcon/corporatesite/products/mainunits/specs/9538). The weight of one page is 0.005kg. The lifetime of a printer is estimated to be 4 years. In its lifetime the printer is able to print on (20,000*12*4=) 960,000 pages, of total weight (960,000*0.005=) 4800 kg.
  EcoSpold01Location=GLO
- paper, woodcontaining, lightweight coated: 0.000387954, 0.000387954 kg (2 entries)
- electricity, low voltage: 1.49362e-5, 0.000283618, 4.97429e-5, 2.80207e-7, 0.000817973, 0.0123701, 0.002039, 3.66626e-6 kWh (8 entries); lognormal variance with pedigree 0.0432, pedigree (2,3,5,5,1)
  EcoSpold01Location=UCTE
- electricity, low voltage: 1.49408e-5 kWh; lognormal variance with pedigree 0.041225, pedigree (2,3,5,2,1)
  EcoSpold01Location=CH
- electricity, low voltage: 0.00405659 kWh; lognormal variance with pedigree 0.041225, pedigree (2,3,5,2,1)
  EcoSpold01Location=UCTE
- acetone, liquid: 0.000428862 kg; lognormal variance with pedigree 0.0546, pedigree (2,4,5,5,1)
  EcoSpold01Location=RER
- polystyrene, expandable: 0.0300073 kg; lognormal variance with pedigree 0.0546, pedigree (2,4,5,5,1)
  EcoSpold01Location=RER
- fluorspar, 97% purity: 0.000162448 kg; lognormal variance with pedigree 0.056, pedigree (3,4,5,5,1)
  EcoSpold01Location=GLO
- carbon dioxide, liquid: 0.000441858 kg; lognormal variance with pedigree 0.0532, pedigree (2,3,5,5,1)
  EcoSpold01Location=RER
- explosives factory: 2.16705e-10 unit; lognormal variance with pedigree 0.35, pedigree (5,5,5,5,5)
  EcoSpold01Location=CH
- electricity, medium voltage: 0.0129958, 0.000253625, 0.00321268 kWh (3 entries); lognormal variance with pedigree 0.0546, pedigree (2,4,5,5,1)
  EcoSpold01Location=UCTE
- sodium chloride, powder: 0.000162448 kg; lognormal variance with pedigree 0.056, pedigree (3,4,5,5,1)
  EcoSpold01Location=RER
- refrigerant R134a: 0.000909707 kg; lognormal variance with pedigree 0.0612, pedigree (2,3,5,5,3)
  EcoSpold01Location=RER
- plug, inlet and outlet, for computer cable: 1.20946e-5 unit; lognormal variance with pedigree 0.0521, pedigree (1,4,5,3,1)
  Measured Value.
  EcoSpold01Location=GLO
- cable, printer cable, without plugs: 2.17703e-5 m; lognormal variance with pedigree 0.0521, pedigree (1,4,5,3,1)
  EcoSpold01Location=GLO
  Measured Value.
- magnesium: 9.36122e-7 kg; source Jemai 2005; lognormal variance with pedigree 0.0701, pedigree (1,4,5,3,3)
  EcoSpold01Location=RER
  Estimation, based on literature.
- cable, connector for computer, without plugs: 2.17703e-5 m; source Jemai 2005; lognormal variance with pedigree 0.0521, pedigree (1,4,5,3,1)
  Measured Value.
  EcoSpold01Location=GLO
- stretch blow moulding: 7.57122e-7 kg; source Jemai 2005; lognormal variance with pedigree 0.0701, pedigree (1,4,5,3,3)
  EcoSpold01Location=RER
  Literature Value.
- plug, inlet and outlet, for printer cable: 1.20946e-5 unit; source Jemai 2005; lognormal variance with pedigree 0.0521, pedigree (1,4,5,3,1)
  Measured Value.
  EcoSpold01Location=GLO
- injection moulding: 0.000516507 kg; source Jemai 2005; lognormal variance with pedigree 0.0701, pedigree (1,4,5,3,3)
  EcoSpold01Location=RER
  Literature Value.
- used printer, laser: -7.09953e-5 kg; lognormal variance with pedigree 0.0701, pedigree (1,4,5,3,3)
  Literature Value.
  production volume 9.20442e7 kg
- wire drawing, copper: 0.000539865 kg; source Jemai 2005; lognormal variance with pedigree 0.0701, pedigree (1,4,5,3,3)
  Literature Value.
  EcoSpold01Location=RER
- toner module, laser printer, colour: 6.0473e-6 unit; lognormal variance with pedigree 0.0521, pedigree (1,4,5,3,1)
  Measured Value.
  EcoSpold01Location=GLO
- ammonium nitrate, as N: 3.41129e-6 kg; source Torellas M. 2012; lognormal variance with pedigree 0.118177, pedigree (2,1,3,1,1)
  Calculated based on literature values or expert estimation: The total amount of nutrient (Torellas et al. 2012) multiplied by the country-share of fertiliser type (IFA 2014). See supporting documentation 'WFLDB-Documentation.pdf' chapter 'Fertiliser application' for L3 and L4 data (https://ecoquery.ecoinvent.org/File/Reports).
  Corresponds to 46.9 kg/ha
- nitrogen fertiliser, as N: 5.74502e-6, 4.99841e-6, 3.00325e-6, 1.54276e-6, 1.54276e-6, 9.18582e-7 kg (6 entries); source Torellas M. 2012; lognormal variance with pedigree 0.118177, pedigree (2,1,3,1,1)
  Calculated based on literature values or expert estimation: The total amount of nutrient (Torellas et al. 2012) multiplied by the country-share of fertiliser type (IFA 2014). See supporting documentation 'WFLDB-Documentation.pdf' chapter 'Fertiliser application' for L3 and L4 data (https://ecoquery.ecoinvent.org/File/Reports).
  Corresponds to 25.1 kg/ha
- phosphate fertiliser, as P2O5: 4.15559e-7, 1.01779e-6, 6.42323e-6, 6.42323e-6, 3.29894e-6, 5.15717e-7 kg (6 entries); source Torellas M. 2012; lognormal variance with pedigree 0.118177, pedigree (2,1,3,1,1)
  Calculated based on literature values or expert estimation: The total amount of nutrient (Torellas et al. 2012) multiplied by the country-share of fertiliser type (IFA 2014). See supporting documentation 'WFLDB-Documentation.pdf' chapter 'Fertiliser application' for L3 and L4 data (https://ecoquery.ecoinvent.org/File/Reports).
  Corresponds to 90.2 kg/ha
- ammonium sulfate, as N: 3.58581e-6 kg; source Torellas M. 2012; lognormal variance with pedigree 0.118177, pedigree (2,1,3,1,1)
  Calculated based on literature values or expert estimation: The total amount of nutrient (Torellas et al. 2012) multiplied by the country-share of fertiliser type (IFA 2014). See supporting documentation 'WFLDB-Documentation.pdf' chapter 'Fertiliser application' for L3 and L4 data (https://ecoquery.ecoinvent.org/File/Reports).
  Corresponds to 49.3 kg/ha
- urea, as N: 9.94388e-6 kg; source Torellas M. 2012; lognormal variance with pedigree 0.159577, pedigree (3,1,3,1,4)
  Calculated based on literature values or expert estimation: The total amount of nutrient (Torellas et al. 2012) multiplied by the country-share of fertiliser type (IFA 2014). See supporting documentation 'WFLDB-Documentation.pdf' chapter 'Fertiliser application' for L3 and L4 data (https://ecoquery.ecoinvent.org/File/Reports).
  Corresponds to 137.0 kg/ha
- phosphate rock, as P2O5, beneficiated, dry: 8.26716e-7 kg; source Torellas M. 2012; lognormal variance with pedigree 0.118177, pedigree (2,1,3,1,1)
  Calculated based on literature values or expert estimation: The total amount of nutrient (Torellas et al. 2012) multiplied by the country-share of fertiliser type (IFA 2014). See supporting documentation 'WFLDB-Documentation.pdf' chapter 'Fertiliser application' for L3 and L4 data (https://ecoquery.ecoinvent.org/File/Reports).
  Corresponds to 11.4 kg/ha
- transport, freight train: 2.01845e-5 metric ton*km
  This represent the transport of fertilizers that are directly linked to their supplying activities, to better represent the fertilizer mix of the activity. Transport distance based on US BTS Commodity Flow Surveys 1993, 1997, 2002, 2007, US Dep. Of Transportation, Bureau of Transportation Statistics.
- potassium chloride, as K2O: 3.30017e-5 kg; source Torellas M. 2012; lognormal variance with pedigree 0.118177, pedigree (2,1,3,1,1)
  Calculated based on literature values or expert estimation: The total amount of nutrient (Torellas et al. 2012) multiplied by the country-share of fertiliser type (IFA 2014). See supporting documentation 'WFLDB-Documentation.pdf' chapter 'Fertiliser application' for L3 and L4 data (https://ecoquery.ecoinvent.org/File/Reports).
- waste glass: -0.000115086 kg
  End-of-life treatment of perlite (glass used as proxy). Based on Torellas et al. (2012), 50% is landfilled and 50% is recycled
  production volume 8.11369e7 kg
- packaging, for fertilisers: 0.000419644 kg; lognormal variance with pedigree 0.0532, pedigree (4,3,3,5,4)
  Total amount of active substance/s of fertilisers needed for the production of 'tomato, fresh grade' is calculated to be circa 1.75E-02 kg. Fertiliser/s used in this dataset is/are: 'ammonia, liquid', 'ammonium nitrate, as N', 'ammonium sulfate, as N', 'nitrogen fertiliser, as N', 'nitrogen fertiliser, as N', 'nitrogen fertiliser, as N', 'nitrogen fertiliser, as N', 'nitrogen fertiliser, as N', 'nitrogen fertiliser, as N', 'phosphate fertiliser, as P2O5', 'phosphate fertiliser, as P2O5', 'phosphate fertiliser, as P2O5', 'phosphate fertiliser, as P2O5', 'phosphate fertiliser, as P2O5', 'phosphate fertiliser, as P2O5', 'phosphate rock, as P2O5, beneficiated, dry', 'potassium chloride, as K2O', 'potassium fertiliser, as K2O', 'potassium sulfate, as K2O', 'urea, as N'. The total amount of active substance/s is doubled in order to account for the packaging of the dilluted product of fertiliser/s that is/are applied. Therefore, 3.49E-02 kg of packaging for fertilisers is justified with this exchange.
- potassium fertiliser, as K2O: 3.7393e-5 kg; source Torellas M. 2012; lognormal variance with pedigree 0.118177, pedigree (2,1,3,1,1)
  Calculated based on literature values or expert estimation: The total amount of nutrient (Torellas et al. 2012) multiplied by the country-share of fertiliser type (IFA 2014). See supporting documentation 'WFLDB-Documentation.pdf' chapter 'Fertiliser application' for L3 and L4 data (https://ecoquery.ecoinvent.org/File/Reports).
  Corresponds to 1020.0 kg/ha
- waste polystyrene: -4.6665e-6 kg
  End-of-life treatment of substrate bed (PS). Based on Torellas et al. (2012), 50% is landfilled and 50% is recycled
  production volume 3.28992e6 kg
- waste polyethylene: -1.18242e-6 kg
  End-of-life treatment of bed plastic and substrate bags (PE used as proxy). Based on Torellas et al. (2012), 50% is landfilled and 50% is recycled
  production volume 833613 kg
- potassium sulfate, as K2O: 6.28486e-6 kg; source Torellas M. 2012; lognormal variance with pedigree 0.118177, pedigree (2,1,3,1,1)
  Calculated based on literature values or expert estimation: The total amount of nutrient (Torellas et al. 2012) multiplied by the country-share of fertiliser type (IFA 2014). See supporting documentation 'WFLDB-Documentation.pdf' chapter 'Fertiliser application' for L3 and L4 data (https://ecoquery.ecoinvent.org/File/Reports).
  Corresponds to 86.4 kg/ha
- electricity, low voltage: 1.82904e-6 kWh; source Torellas M. 2012; lognormal variance with pedigree 0.118177, pedigree (2,1,3,1,1)
  Literature value or expert estimation (Torellas et al. 2012).
- application of plant protection product, by field sprayer: 1.45549e-7 ha; lognormal variance with pedigree 0.158664, pedigree (2,2,3,1,4)
  Expert estimation. Considered 2 applications per crop cycle, one crop cycle per year
- packaging, for pesticides: 0.000920517 kg; lognormal variance with pedigree 0.0532, pedigree (4,3,3,5,4)
  Total amount of active substance/s of pesticides needed for the production of tomato, fresh grade is calculated to be circa 3.83E-02 kg. Pesticide/s used in this dataset is/are: 'expanded perlite', 'pesticide, unspecified'. The total amount of active substance/s is doubled in order to account for the packaging of the dilluted product of pesticide/s that is/are applied. Therefore, 7.67E-02 kg of packaging for pesticides is justified with this exchange.
- greenhouse, plastic walls and roof: 0.000727743 m2*year; source Torellas M. 2012; lognormal variance with pedigree 0.118177, pedigree (2,1,3,1,1)
  Calculated value: 1 ha divided by the yield in kg/ha. Note: greenhouse dataset stands for 1 m2 used over 1 year
- transport, freight, lorry, unspecified: 1.08759e-5 metric ton*km
  This represent the transport of fertilizers that are directly linked to their supplying activities, to better represent the fertilizer mix of the activity. Transport distance based on US BTS Commodity Flow Surveys 1993, 1997, 2002, 2007, US Dep. Of Transportation, Bureau of Transportation Statistics. Of the total road transport, 6% is assumed to be by delivery van for goods with a large share of retail sale, and 3% for goods that are mainly sold via wholesale.
- planting: 7.27743e-8 ha; lognormal variance with pedigree 0.158177, pedigree (2,1,3,1,4)
  Expert estimation: energy consumption has been estimated as similar to planting in open field
- transport, freight, inland waterways, barge: 3.4129e-6 metric ton*km
  (same comment as for transport, freight train)
- irrigation: 0.000173686 m3; source Torellas M. 2012; lognormal variance with pedigree 0.118177, pedigree (2,1,3,1,1)
  Literature value: total amount of water used for irrigation (Torellas et al. 2012). See supporting documentation 'WFLDB-Documentation.pdf' chapter 'Water use for irrigation' (https://ecoquery.ecoinvent.org/File/Reports).
- transport, tractor and trailer, agricultural: 6.43494e-6 metric ton*km; lognormal variance with pedigree 0.156439, pedigree (4,1,3,1,1)
  On-farm transport: Yield (in tonnes) multiplied by the average distance from field to farm. The distance was obtained by extrapolation (modified MEXALCA approach). See supporting documentation 'WFLDB-Documentation.pdf' chapter 'Machinery processes' (https://ecoquery.ecoinvent.org/File/Reports).
- tomato seedling, for planting: 0.00203768 unit; source Martínez-Blanco J. 2011; lognormal variance with pedigree 0.118177, pedigree (2,1,3,1,1)
  Literature value or expert estimation (Martínez-Blanco et al. 2011). 2.5 plants per m2 is considered.
- expanded perlite: 0.000458464 kg; source Torellas M. 2012
  Literature value or expert estimation (Torellas et al. 2012). Substrate: 18'876.5 kg/ha, Perlite lifespan: 3 years.
- pesticide, unspecified: 2.35061e-6 kg; source Torellas M. 2012; lognormal variance with pedigree 0.00784984, pedigree (2,2,3,1,1)
  Literature value or expert estimation (Torellas et al. 2012).
  Corresponds to 28.5 kg/ha
- ammonia, liquid: 3.55226e-6 kg; source Torellas M. 2012; lognormal variance with pedigree 0.118177, pedigree (2,1,3,1,1)
  Calculated based on literature values or expert estimation: The total amount of nutrient (Torellas et al. 2012) multiplied by the country-share of fertiliser type (IFA 2014). See supporting documentation 'WFLDB-Documentation.pdf' chapter 'Fertiliser application' for L3 and L4 data (https://ecoquery.ecoinvent.org/File/Reports).
  Corresponds to 97.1 kg/ha
- sheet rolling, chromium steel: 0.000263281 kg; lognormal variance with pedigree 0.022, pedigree (1,4,4,5,1)
  EcoSpold01Location=RER
  Manufacturer data
  Uncertainty: manufacturer data
- glued laminated timber, for outdoor use: 2.06064e-7 m3; lognormal variance with pedigree 0.056, pedigree (3,4,5,5,1)
  EcoSpold01Location=RER
  Literature studies
  Uncertainty: literature studies
- reinforcing steel: 9.89119e-5 kg; lognormal variance with pedigree 0.056, pedigree (3,4,5,5,1)
  Literature studies
  EcoSpold01Location=RER
  Uncertainty: literature studies
- polyvinylchloride, emulsion polymerised: 2.29946e-7 kg; lognormal variance with pedigree 0.056, pedigree (3,4,5,5,1)
  EcoSpold01Location=RER
  Literature studies
  Uncertainty: literature studies
- waste polystyrene: -1.44364e-5 kg; lognormal variance with pedigree 0.056, pedigree (3,4,5,5,1)
  EcoSpold01Location=CH
  Literature studies
  Uncertainty: literature studies
  production volume 1026 kg
- waste reinforced concrete: -0.000198961, -0.00283952 kg (2 entries); lognormal variance with pedigree 0.056, pedigree (3,4,5,5,1)
  EcoSpold01Location=CH
  Literature studies
  Uncertainty: literature studies
  production volume 537840 kg
- waste wood, untreated: -1.26687e-6, -1.57301e-7, -1.15004e-8, -4.4181e-7, -6.67469e-8, -1.05521e-7, -1.97253e-6, -1.68075e-5 kg (8 entries); lognormal variance with pedigree 0.056, pedigree (3,4,5,5,1)
  Literature studies
  EcoSpold01Location=CH
  Uncertainty: literature studies
  production volume 8224.8 kg
- waste polyvinylchloride: -2.47665e-7 kg; lognormal variance with pedigree 0.056, pedigree (3,4,5,5,1)
  EcoSpold01Location=CH
  Literature studies
  Uncertainty: literature studies
  production volume 148.5 kg
- concrete, normal: 3.0748e-8, 3.2039e-9, 2.59378e-8, 1.459e-8, 6.17846e-8, 2.08094e-9, 1.20085e-6 m3 (7 entries); lognormal variance with pedigree 0.056, pedigree (3,4,5,5,1)
  EcoSpold01Location=CH
  Literature studies
  Uncertainty: literature studies
- waste polyethylene/polypropylene product: -4.347e-5, -0.000110161 kg (2 entries); lognormal variance with pedigree 0.056, pedigree (3,4,5,5,1)
  EcoSpold01Location=CH
  Literature studies
  Uncertainty: literature studies
  production volume 76.5 kg
- steel, chromium steel 18/8: 3.19769e-6 kg; lognormal variance with pedigree 0.0427, pedigree (2,2,5,5,1)
  EcoSpold01Location=RER
  A plant with 500m3 concrete fermenter, average for Swiss agricultural biogas plants in the year 2006 has been used. Only the plants without the stock has been taken into account, Because the stock is needed for the manure anyway.
  Uncertainty: A plant with 500m3 concrete fermenter, average for Swiss agricultural biogas plants in the year 2006 has been used. Only the plants without the stock has been taken into account, Because the stock is needed for the manure anyway.
- polyvinylidenchloride, granulate: 8.11721e-7 kg; lognormal variance with pedigree 0.0427, pedigree (2,2,5,5,1)
  (same comment as for steel, chromium steel 18/8)
- waste plastic, mixture: -3.19407e-7 kg; lognormal variance with pedigree 0.0427, pedigree (2,2,5,5,1)
  According to Swiss law organic material has to be burned in incineration plants if no material reuse is possible.
  EcoSpold01Location=CH
  Uncertainty: According to Swiss law organic material has to be burned in incineration plants if no material reuse is possible.
  production volume 4110 kg
- gravel, round: 0.000968366 kg; lognormal variance with pedigree 0.056, pedigree (3,4,5,5,1)
  EcoSpold01Location=CH
  Literature studies
  Uncertainty: literature studies
- waste asphalt: -5.77092e-5 kg; lognormal variance with pedigree 0.056, pedigree (3,4,5,5,1)
  Literature studies
  EcoSpold01Location=CH
  Uncertainty: literature studies
  production volume 352650 kg
- sand: 4.57666e-9, 8.81563e-7, 5.14408e-5 kg (3 entries); lognormal variance with pedigree 0.056, pedigree (3,4,5,5,1)
  EcoSpold01Location=CH
  Literature studies
  Uncertainty: literature studies
- pitch: 2.50951e-7, 1.43021e-8, 8.31592e-7, 6.47311e-7, 2.90152e-8, 4.14219e-8, 3.65932e-6 kg (7 entries); lognormal variance with pedigree 0.056, pedigree (3,4,5,5,1)
  EcoSpold01Location=CH
  Literature studies
  Uncertainty: literature studies
- trichloromethane: 0.0012625 kg; lognormal variance with pedigree 0.17, pedigree (5,5,1,5,4)
  Calculated value based on stoichiometry. Trichloromethane is used as a solvent to carry out the chloromethylation. 5.5 mol of trichloromethane is needed per mol of chloromethyl methyl ether, of which 85% is assumed to be regenerated (distillation) (Hofstetter 2002). This results in a net consumption of 0.235 kg trichloromethane per kg of produced resin.
  Uncertainty: E
- nitrogen, liquid: 0.000201595 kg; lognormal variance with pedigree 0.0104, pedigree (2,3,1,4,3)
  Calculated based on literature data published by the industry. This value is a 5-year average of data (2011 - 2015) published by the Gendorf factory (Gendorf, 2016, Umwelterklärung, www.gendorf.de), (Gendorf, 2015, Umwelterklärung, www.gendorf.de), (Gendorf, 2014, Umwelterklärung, www.gendorf.de). The amount of nitrogen used per kg of chemical substance produced is calculated using literature data published by the Gendorf factory based in Germany, which produces a wide range of chemical substances. The factory produced 1657400 tonnes of chemical substances in the year 2015 (Gendorf, 2016, Umwelterklärung, www.gendorf.de) and 740000 tonnes of intermediate products. The reported amount of nitrogen used in 2015 was 33512400 Nm3 (Gendorf, 2016, Umwelterklärung, www.gendorf.de). One Nm3 of nitrogen is equal to 1.2506 kg. The resulting amount of nitrogen - the 5-year average (2011 - 2015, weighted by production volume) is 0.019 kg/kg. Nitrogen is mainly used during the production of chemicals for 'blanketing', which is the process of applying gas to the vapour space of a container or vessel in order to control its composition.
- heat, from steam, in chemical industry: 0.00212206 MJ; lognormal variance with pedigree 0.0104, pedigree (2,3,1,4,3)
  Calculated based on literature data published by the industry. This value is a 5-year average of data (2011 - 2015) published by the Gendorf factory (Gendorf, 2016, Umwelterklärung, www.gendorf.de), (Gendorf, 2015, Umwelterklärung, www.gendorf.de), (Gendorf, 2014, Umwelterklärung, www.gendorf.de). The amount of heat used per kg of chemical substance produced is calculated using literature data published by the Gendorf factory based in Germany, which produces a wide range of chemical substances. The factory produced 1657400 tonnes of chemical substances in the year 2015 (Gendorf, 2016, Umwelterklärung, www.gendorf.de) and 740000 tonnes of intermediate products. The amount of heat in the year 2015 was 523500 GJ (Gendorf, 2016, Umwelterklärung, www.gendorf.de) of which 90% was obtained from natural gas and 10% from steam. The resulting amount of heat from steam is 0.22 MJ/kg of chemical product produced. The 5-year average (2011 - 2015, weighted by production volume) is 0.20 MJ/kg. Cross-reference: the amount of chemicals produced (excluding intermediate products) in the EU-28 in the year 2011 was 327 million tonnes (Eurostat, http://ec.europa.eu/eurostat/statistics-explained/index.php/Chemicals_production_statistics, accessed 20170126). The chemical and petrochemical industry sector consumed 2.33 EJ of energy in 2011 (European Commission - Joint Research Centre, 2014, BAT on Common Waste water and Waste Gas Treatment/Management Systems in the Chemical Sector). The resulting energy (both heat and electricity) consumed per kg of chemicals produced in 2011 is thus 7.13 MJ/kg. This is higher than the value calculated using data published by Gendorf – 3.85 MJ/kg, but that is to be expected as the intermediate products are not accounted for.
- chloromethyl methyl ether: 0.00103149 kg; lognormal variance with pedigree 0.086, pedigree (4,5,5,5,3)
  Calculated based on stoichiometry, with a 95% yield. Chloromethyl methyl ether is used for the chloromethylation step.
  Uncertainty: F
- trimethylamine: 0.000757502 kg; lognormal variance with pedigree 0.086, pedigree (4,5,5,5,3)
  Calculated based on stoichiometry, with a 95% yield. Trimethylamine is required for amination.
  Uncertainty: F
- chemical factory, organics: 4.24412e-12 unit; lognormal variance with pedigree 0.3098, pedigree (2,3,1,4,3)
  Calculated based on literature data published by the industry. For this activity, no information was readily available concerning infrastructure and land-use. Therefore, the infrastructure is estimated based on data from two chemical factories, the BASF site of Ludwigshafen and the chemical factory in Gendorf (which are both located in Germany), which produce a wide range of chemical substances. Based on this data, the following assumptions are made: the built area amounts to about 4.2 ha, the plant has an average output of 50'000 t/a and a lifespan of fifty years. The estimated infrastructure amount is therefore 4.00 E-10 units per kg of produced chemical.
  References:
  Althaus H.-J., Chudacoff M., Hischier R., Jungbluth N., Osses M. and Primas A. (2007) Life Cycle Inventories of Chemicals. ecoinvent report No. 8, v2.0. EMPA Dübendorf, Swiss Centre for Life Cycle Inventories, Dübendorf, CH.
  Gendorf (2000) Umwelterklärung 2000, Werk Gendorf. Werk Gendorf, Burgkirchen.
- spent solvent mixture: -0.000536952, -0.00154752 kg (2 entries); lognormal variance with pedigree 0.34, pedigree (5,5,5,5,5)
  From the total amount of solvent used, 85% or 1.33 kg is regenerated with distillation. The rest (0.235 kg dichloromethane) is released as waste solvent. Besides the spent solvent, the excess treatment chemicals (0.010 kg chloromethyl methyl ether, 0.007 kg trimethylamine)
  and the waste occurring during the chloromethylation (0.073 kg methanol) are treated as solvent waste. It wis assumed that the waste solvent is incinerated. The process generates in total 0.324 kg of pure waste solvent. Taking into account a water content of 16.5% water, a total amount of 0.388 kg waste solvent mixture is considered.
  Uncertainty: E
  production volume 1.53648 kg
- electricity, medium voltage: 0.000326452, 5.94005e-5, 0.000195382, 0.000664973, 0.00100734, 0.0146054, 0.00209031, 0.00324071 kWh (8 entries); lognormal variance with pedigree 0.0104, pedigree (2,3,1,4,3)
  Calculated based on literature data published by the industry. This value is a 5-year average of data (2011 - 2015) published by the Gendorf factory (Gendorf, 2016, Umwelterklärung, www.gendorf.de), (Gendorf, 2015, Umwelterklärung, www.gendorf.de), (Gendorf, 2014, Umwelterklärung, www.gendorf.de). The amount of electricity per kg of chemical substance produced is calculated using literature data published by the Gendorf factory based in Germany, which produces a wide range of chemical substances. The factory produced 1657400 tonnes of chemical substances in the year 2015 (Gendorf, 2016, Umwelterklärung, www.gendorf.de) and 740000 tonnes of intermediate products. The amount of electricity consumed in the year 2015 was 3498800 GJ (Gendorf, 2016, Umwelterklärung, www.gendorf.de). The resulting amount of electricity is 0.406 kWh/kg (year 2015) of chemical substance produced. The 5-year average (2011 - 2015, weighted by production volume) is 0.416 kWh/kg (1.5 MJ/kg). Cross-reference: the amount of chemicals produced (excluding intermediate products) in the EU-28 in the year 2011 was 327 million tonnes (Eurostat, http://ec.europa.eu/eurostat/statistics-explained/index.php/Chemicals_production_statistics, accessed 20170126). The chemical and petrochemical industry sector consumed 2.33 EJ of energy in 2011 (European Commission - Joint Research Centre, 2014, BAT on Common Waste water and Waste Gas Treatment/Management Systems in the Chemical Sector). The resulting energy (both heat and electricity) consumed per kg of chemicals produced in 2011 is thus 7.13 MJ/kg. This is higher than the value calculated using data published by Gendorf – 3.85 MJ/kg, but that is to be expected as the intermediate products are not accounted for.
- water, deionised: 0.0117534, 0.0381553 kg (2 entries); lognormal variance with pedigree 0.032, pedigree (1,1,1,5,1)
  To hydrate the activated anion exchanger resin, 50 wt-% or 0.5 kg deionised water is needed. Furthermore, an amount of 5 bed volumes was estimated to be needed to rinse the produced resin. Using a density of 1.10 kg/litre for the moist resin (Dardel and Arden 2008), this leads to a rinsing water demand of 4.5 kg. Therefore, 5.0 kg of deionised water is needed in total.
- inert waste, for final disposal: -5.10547e-6 kg; lognormal variance with pedigree 0.072, pedigree (4,4,5,5,1)
  Estimations on precentage material disposed
  EcoSpold01Location=CH
  Uncertainty: Estimations on precentage material disposed
  production volume 0.66 kg
- zinc coat, coils: 0.000148654 m2; lognormal variance with pedigree 0.056, pedigree (3,4,5,5,1)
  Questionnaire, estimations
  EcoSpold01Location=RER
  Uncertainty: Questionnaire, estimations
- waste expanded polystyrene: -1.37202e-5 kg; lognormal variance with pedigree 0.072, pedigree (4,4,5,5,1)
  (same comment as for inert waste, for final disposal)
  production volume 0.78 kg
- steel, unalloyed: 0.000835864 kg; lognormal variance with pedigree 0.0546, pedigree (2,4,5,5,1)
  EcoSpold01Location=RER
  Questionnaire
  Uncertainty: Questionnaire
- stone wool, packed: 5.61602e-5 kg; lognormal variance with pedigree 0.0546, pedigree (2,4,5,5,1)
  Questionnaire
  EcoSpold01Location=CH
  Uncertainty: Questionnaire
- electronics, for control units: 1.56615e-5 kg; lognormal variance with pedigree 0.074, pedigree (3,4,5,5,3)
  Questionnaire, approximation for technology
  EcoSpold01Location=RER
  Uncertainty: Questionnaire, approximation for technology
- ventilation components factory: 7.88754e-12 unit; lognormal variance with pedigree 0.396, pedigree (4,5,5,5,3)
  EcoSpold01Location=RER
  Calculated with data of a similar company
  Uncertainty: Calculated with data of a similar company
- powder coat, steel: 8.56528e-5 m2; lognormal variance with pedigree 0.056, pedigree (3,4,5,5,1)
  EcoSpold01Location=RER
  Questionnaire, estimations
  Uncertainty: Questionnaire, estimations
- heat, district or industrial, other than natural gas: 1.75838e-6, 0.00392228 MJ (2 entries); lognormal variance with pedigree 0.072, pedigree (1,1,5,5,1)
  EcoSpold01Location=RER
  4,5,1,1,1,5; Data estimated from related companies
- sulfuric acid: 0.00139853 kg; lognormal variance with pedigree 0.086, pedigree (4,5,5,5,3)
  Calculated based on stoichiometric reaction. A yield of 95% is assumed. Sulfuric acid is required for the sulfonation of the copolymer.
  Uncertainty: F
- capacitor, tantalum-, for through-hole mounting: 9.64407e-7 kg; lognormal variance with pedigree 0.0532, pedigree (2,3,5,5,1)
  EcoSpold01Location=GLO
  Literature (de Wild 2006), Assumption for Ceramic Multilayer Chip Capacitors
  Uncertainty: Literature (de Wild 2006), Assumption for Ceramic Multilayer Chip Capacitors
- diode, glass-, for through-hole mounting: 1.97402e-6 kg; lognormal variance with pedigree 0.0532, pedigree (2,3,5,5,1)
  EcoSpold01Location=GLO
  Literature (de Wild 2006), Calculation
  Uncertainty: Literature (de Wild 2006), Calculation
- capacitor, electrolyte type, > 2cm height: 1.07441e-5 kg; lognormal variance with pedigree 0.0532, pedigree (2,3,5,5,1)
  (same comment as for diode, glass-, for through-hole mounting)
- used printed wiring boards: -7.71407e-5 kg; lognormal variance with pedigree 0.0532, pedigree (2,3,5,5,1)
  EcoSpold01Location=GLO
  Calculation, different geographical location
  Uncertainty: Calculation, different geographical location
  production volume 2.0694 kg
- fleece, polyethylene: 2.81479e-6 kg; lognormal variance with pedigree 0.0632, pedigree (2,3,5,5,1)
  EcoSpold01Location=RER
  Literature (Schwarz 1992)
  Uncertainty: Literature (Schwarz 1992)
- waste paperboard, unsorted: -0.000115061 kg; lognormal variance with pedigree 0.0532, pedigree (2,3,5,5,1)
  Calculation, different geographical location
  EcoSpold01Location=CH
  Uncertainty: Calculation, different geographical location
  production volume 3.36 kg
- waste plastic, industrial electronics: -4.04539e-6 kg; lognormal variance with pedigree 0.0532, pedigree (2,3,5,5,1)
  (same comment as for waste paperboard, unsorted)
  production volume 0.69 kg
- integrated circuit, logic type: 1.17674e-6 kg; lognormal variance with pedigree 0.0532, pedigree (2,3,5,5,1)
  Literature (de Wild 2006), Calculation
  EcoSpold01Location=GLO
  Uncertainty: Literature (de Wild 2006), Calculation
- printed wiring board, for through-hole mounting, Pb containing surface: 4.81762e-6 m2; lognormal variance with pedigree 0.0532, pedigree (2,3,5,5,1)
  Literature (de Wild 2006), Calculation
  This original value from production mix has been replaced by 2 flows. Each has 50% share in the production mix.
  Uncertainty: Literature (de Wild 2006), Calculation
- styrene-acrylonitrile copolymer: 4.17816e-7 kg; lognormal variance with pedigree 0.0532, pedigree (2,3,5,5,1)
  Literature (de Wild 2006)
  EcoSpold01Location=RER
  Uncertainty: Literature (de Wild 2006)
- transformer, high voltage use: 5.3173e-6 kg; lognormal variance with pedigree 0.0532, pedigree (2,3,5,5,1)
  EcoSpold01Location=GLO
  Literature (de Wild 2006)
  Uncertainty: Literature (de Wild 2006)
- inductor, ring core choke type: 1.47305e-5 kg; lognormal variance with pedigree 0.0532, pedigree (2,3,5,5,1)
  (same comment as for diode, glass-, for through-hole mounting)
- electric connector, wire clamp: 9.96998e-6 kg; lognormal variance with pedigree 0.0532, pedigree (2,3,5,5,1)
  (same comment as for integrated circuit, logic type)
- transistor, wired, small size, through-hole mounting: 1.59456e-6 kg; lognormal variance with pedigree 0.0532, pedigree (2,3,5,5,1)
  (same comment as for diode, glass-, for through-hole mounting)
- polycarbonate: 1.16261e-6 kg; lognormal variance with pedigree 0.0532, pedigree (2,3,5,5,1)
  Literature (de Wild 2006)
  EcoSpold01Location=RER
  Uncertainty: Literature (de Wild 2006)
- resistor, metal film type, through-hole mounting: 2.0891e-7 kg; lognormal variance with pedigree 0.0532, pedigree (2,3,5,5,1)
  (same comment as for integrated circuit, logic type)
- capacitor, film type, for through-hole mounting: 1.43127e-5 kg; lognormal variance with pedigree 0.0532, pedigree (2,3,5,5,1)
  (same comment as for integrated circuit, logic type)
- printed wiring board, for through-hole mounting, Pb free surface: 4.81762e-6 m2; lognormal variance with pedigree 0.0532, pedigree (2,3,5,5,1)
  (same comment as for printed wiring board, for through-hole mounting, Pb containing surface)
- glass fibre reinforced plastic, polyamide, injection moulded: 4.10151e-8 kg; lognormal variance with pedigree 0.0706, pedigree (4,3,5,5,1)
  Literature (de Wild 2006), Calculation
  EcoSpold01Location=RER
  Uncertainty: Literature (de Wild 2006), Calculation
- glass fibre reinforced plastic, polyester resin, hand lay-up: 2.16216e-8 kg; lognormal variance with pedigree 0.0706, pedigree (4,3,5,5,1)
  (same comment as for glass fibre reinforced plastic, polyamide, injection moulded)
- lubricating oil: 4.32923e-7 kg; lognormal variance with pedigree 0.2706, pedigree (4,3,5,5,5)
  (same comment as for glass fibre reinforced plastic, polyamide, injection moulded)
- alkyd paint, white, without solvent, in 60% solution state: 1.08108e-8 kg; lognormal variance with pedigree 0.2706, pedigree (4,3,5,5,5)
  EcoSpold01Location=RER
  Literature (de Wild 2006), Calculation
  Uncertainty: Literature (de Wild 2006), Calculation
- waste mineral oil: -4.32923e-7 kg; lognormal variance with pedigree 0.0706, pedigree (4,3,5,5,1)
  EcoSpold01Location=CH
  Calculation, different geographical location
  Uncertainty: Calculation, different geographical location
  production volume 2643 kg
- waste bulk iron, excluding reinforcement: -0.000213306, -0.00044356 kg (2 entries); lognormal variance with pedigree 0.074, pedigree (3,4,5,5,3)
  Estimation based on data of Questionnaire
  EcoSpold01Location=CH
  Uncertainty: Estimation based on data of Questionnaire
- used air filter in exhaust air valve: -0.000190838 unit; lognormal variance with pedigree 0.046, pedigree (3,4,5,5,1)
  Questionnaire, Data related to building considered
  EcoSpold01Location=CH
  Uncertainty: Questionnaire, Data related to building considered
- used air filter decentralized unit, 180-250 m3/h: -0.000127478 unit; lognormal variance with pedigree 0.046, pedigree (3,4,5,5,1)
  (same comment as for used air filter in exhaust air valve)
- used silencer steel, DN 125: -3.5439e-5 unit; lognormal variance with pedigree 0.046, pedigree (3,4,5,5,1)
  (same comment as for used air filter in exhaust air valve)
- blower and heat exchange unit, decentralized, 180-250 m3/h: 8.86354e-6 unit; lognormal variance with pedigree 0.046, pedigree (3,4,5,5,1)
  EcoSpold01Location=RER
  Questionnaire, Data related to building considered
  Uncertainty: Questionnaire, Data related to building considered
- flexible duct, aluminium/PET, DN of 125: 2.16095e-5 m; lognormal variance with pedigree 0.046, pedigree (3,4,5,5,1)
  (same comment as for blower and heat exchange unit, decentralized, 180-250 m3/h)
- used blower and heat exchange unit decentralized, 180-250 m3/h: -8.86354e-6 unit; lognormal variance with pedigree 0.046, pedigree (3,4,5,5,1)
  (same comment as for used air filter in exhaust air valve)
- air filter, decentralized unit, 180-250 m3/h: 0.000127478 unit; lognormal variance with pedigree 0.046, pedigree (3,4,5,5,1)
  (same comment as for blower and heat exchange unit, decentralized, 180-250 m3/h)
- used flexible duct aluminium/PET, DN of 125: -2.16095e-5 m; lognormal variance with pedigree 0.046, pedigree (3,4,5,5,1)
  EcoSpold01Location=CH
  Questionnaire, Data related to building considered
  Uncertainty: Questionnaire, Data related to building considered
- ventilation control and wiring, decentralized unit: 8.86354e-6 unit; lognormal variance with pedigree 0.046, pedigree (3,4,5,5,1)
  (same comment as for blower and heat exchange unit, decentralized, 180-250 m3/h)
- used ventilation control and wiring decentralized unit: -8.86354e-6 unit; lognormal variance with pedigree 0.046, pedigree (3,4,5,5,1)
  (same comment as for used air filter in exhaust air valve)
- ventilation system, decentralized, 6 x 120 m3/h, polyethylene ducts, with earth tube heat exchanger: 4.85698e-8 unit; lognormal variance with pedigree 0.046, pedigree (3,4,5,5,1)
  (same comment as for used flexible duct aluminium/PET, DN of 125)
- air filter, in exhaust air valve: 0.000190838 unit; lognormal variance with pedigree 0.046, pedigree (3,4,5,5,1)
  (same comment as for blower and heat exchange unit, decentralized, 180-250 m3/h)
- silencer, steel, DN 125: 3.5439e-5 unit; lognormal variance with pedigree 0.046, pedigree (3,4,5,5,1)
  (same comment as for used air filter in exhaust air valve)
- electricity, low voltage: 0.00112738, 0.00580391 kWh (2 entries); lognormal variance with pedigree 0.0432, pedigree (2,3,5,5,1)
  Questionnaire, tecnical informations, related to system used
  EcoSpold01Location=CH
  Uncertainty: Questionnaire, tecnical informations, related to system used
- ventilation system, decentralized, 6 x 120 m3/h, polyethylene ducts: 4.85698e-8 unit; lognormal variance with pedigree 0.046, pedigree (3,4,5,5,1)
  (same comment as for used flexible duct aluminium/PET, DN of 125)
- ventilation system, decentralized, 6 x 120 m3/h, steel ducts, with earth tube heat exchanger: 4.84208e-8 unit; lognormal variance with pedigree 0.042, pedigree (1,1,5,5,1)
  3,4,1,1,1,nA; Questionnaire, Data related to building considered
  EcoSpold01Location=CH
- ventilation system, decentralized, 6 x 120 m3/h, steel ducts: 4.84208e-8 unit; lognormal variance with pedigree 0.046, pedigree (3,4,5,5,1)
  (same comment as for used flexible duct aluminium/PET, DN of 125)
- exhaust air roof hood, steel, DN 400: 2.0662e-7 unit; lognormal variance with pedigree 0.042, pedigree (1,1,5,5,1)
  2,4,1,1,1,nA; Questionnaire, Data related to building considered
  EcoSpold01Location=CH
- used room-connecting overflow element steel, approx. 40 m3/h: -1.95891e-5 unit; lognormal variance with pedigree 0.0446, pedigree (2,4,5,5,1)
  (same comment as for used air filter in exhaust air valve)
  production volume 71.394 unit
- outside air intake, stainless steel, DN 370: 2.0662e-7 unit; lognormal variance with pedigree 0.0446, pedigree (2,4,5,5,1)
  Questionnaire, Data related to building considered
  EcoSpold01Location=RER
  Uncertainty: Questionnaire, Data related to building considered
- used insulation spiral-seam duct rockwool, DN 400: -8.26479e-6 m; lognormal variance with pedigree 0.0446, pedigree (2,4,5,5,1)
  (same comment as for used flexible duct aluminium/PET, DN of 125)
  production volume 158.653 m
- insulation spiral-seam duct, rockwool, DN 400, 30 mm: 8.26479e-6 m; lognormal variance with pedigree 0.0446, pedigree (2,4,5,5,1)
  (same comment as for blower and heat exchange unit, decentralized, 180-250 m3/h)
- used exhaust air roof hood steel, DN 400: -2.0662e-7 unit; lognormal variance with pedigree 0.0446, pedigree (2,4,5,5,1)
  (same comment as for used flexible duct aluminium/PET, DN of 125)
  production volume 3.96633 unit
- supply air inlet, steel/SS, DN 75: 3.26485e-5 unit; lognormal variance with pedigree 0.0446, pedigree (2,4,5,5,1)
  (same comment as for outside air intake, stainless steel, DN 370)
- air distribution terminal panel, steel, 120 m3/h: 1.30594e-5 unit; lognormal variance with pedigree 0.0446, pedigree (2,4,5,5,1)
  (same comment as for used flexible duct aluminium/PET, DN of 125)
- exhaust air valve, in-wall housing, plastic/steel, DN 125: 1.95891e-5 unit; lognormal variance with pedigree 0.0446, pedigree (2,4,5,5,1)
  (same comment as for used air filter in exhaust air valve)
- spiral-seam duct, steel, DN 125: 1.30594e-5 m; lognormal variance with pedigree 0.0446, pedigree (2,4,5,5,1)
  (same comment as for outside air intake, stainless steel, DN 370)
- used air distribution terminal panel steel, 120 m3/h: -1.30594e-5 unit; lognormal variance with pedigree 0.0446, pedigree (2,4,5,5,1)
  (same comment as for used air filter in exhaust air valve)
  production volume 47.596 unit
- spiral-seam duct, steel, DN 400: 8.26479e-6 m; lognormal variance with pedigree 0.0446, pedigree (2,4,5,5,1)
  (same comment as for blower and heat exchange unit, decentralized, 180-250 m3/h)
- used exhaust air valve in-wall housing, plastic/steel: -1.95891e-5 unit; lognormal variance with pedigree 0.0446, pedigree (2,4,5,5,1)
  (same comment as for used flexible duct aluminium/PET, DN of 125)
  production volume 71.394 unit
- polyethylene pipe, DN 200, SDR 41: 2.47944e-5 m; lognormal variance with pedigree 0.0446, pedigree (2,4,5,5,1)
  (same comment as for blower and heat exchange unit, decentralized, 180-250 m3/h)
- excavation, hydraulic digger: 2.83109e-5 m3; lognormal variance with pedigree 0.062, pedigree (4,4,5,5,1)
  EcoSpold01Location=RER
  Assumption, Data related to building considered
  Uncertainty: Assumption, Data related to building considered
- room-connecting overflow element, steel, approx. 40 m3/h: 1.95891e-5 unit; lognormal variance with pedigree 0.0446, pedigree (2,4,5,5,1)
  (same comment as for outside air intake, stainless steel, DN 370)
- polyethylene pipe, corrugated, DN 75: 0.000239967 m; lognormal variance with pedigree 0.0446, pedigree (2,4,5,5,1)
  (same comment as for outside air intake, stainless steel, DN 370)
- sealing tape, aluminium/PE, 50 mm wide: 0.00046184 m; lognormal variance with pedigree 0.0446, pedigree (2,4,5,5,1)
  (same comment as for blower and heat exchange unit, decentralized, 180-250 m3/h)
- used outside air intake stainless steel, DN 370: -2.0662e-7 unit; lognormal variance with pedigree 0.0446, pedigree (2,4,5,5,1)
  (same comment as for used flexible duct aluminium/PET, DN of 125)
  production volume 3.96633 unit
- used sealing tape aluminium/PE, 50 mm wide: -0.00046184 m; lognormal variance with pedigree 0.0446, pedigree (2,4,5,5,1)
  (same comment as for used air filter in exhaust air valve)
  production volume 793.266 m
- exhaust air outlet, steel/aluminium, 85x365 mm: 1.058e-5 unit; lognormal variance with pedigree 0.0446, pedigree (2,4,5,5,1)
  (same comment as for used flexible duct aluminium/PET, DN of 125)
- ventilation duct, steel, 100x50 mm: 0.00029302 m; lognormal variance with pedigree 0.0446, pedigree (2,4,5,5,1)
  (same comment as for blower and heat exchange unit, decentralized, 180-250 m3/h)
- ventilation duct, elbow 90°, steel, 100x50 mm: 0.000111347 unit; lognormal variance with pedigree 0.0446, pedigree (2,4,5,5,1)
  (same comment as for outside air intake, stainless steel, DN 370)
- ventilation duct, connection piece, steel, 100x50 mm: 7.32549e-5 unit; lognormal variance with pedigree 0.0446, pedigree (2,4,5,5,1)
  (same comment as for blower and heat exchange unit, decentralized, 180-250 m3/h)
- phosphate fertiliser, as P2O5: 1.79028e-5 kg; source Torellas M. 2012; lognormal variance with pedigree 0.120177, pedigree (2,1,3,5,1)
  (same comment as for phosphate fertiliser, as P2O5)
- potassium fertiliser, as K2O: 3.69969e-5 kg; source Torellas M. 2012; lognormal variance with pedigree 0.120177, pedigree (2,1,3,5,1)
  (same comment as for potassium fertiliser, as K2O)
- nitrogen fertiliser, as N: 1.75628e-5 kg; source Torellas M. 2012; lognormal variance with pedigree 0.120177, pedigree (2,1,3,5,1)
  (same comment as for nitrogen fertiliser, as N)
- transport, tractor and trailer, agricultural: 6.36678e-6 metric ton*km; lognormal variance with pedigree 0.158439, pedigree (4,1,3,5,1)
  (same comment as for transport, tractor and trailer, agricultural)
- waste polyethylene: -1.92606e-9, -6.04548e-10, -1.50951e-9, -8.25366e-10, -6.40315e-10, -1.68546e-9, -2.25891e-10, -1.90886e-8, -2.50606e-9, -2.6085e-10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 kg (35 entries)
  (same comment as for waste polyethylene)
  production volume 1.55223e7 kg
- waste polystyrene: -7.60134e-9, -2.3859e-9, -5.95741e-9, -3.25737e-9, -2.52706e-9, -6.65182e-9, -8.91496e-10, -7.53347e-8, -9.89038e-9, -1.02947e-9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 kg (35 entries)
  (same comment as for waste polystyrene)
  production volume 6.12599e7 kg
- waste glass: -1.76636e-7, -8.92897e-8, -2.81077e-7, -7.17024e-8, -1.04444e-7, -1.65753e-7, -2.18507e-8, -2.97074e-6, -4.10104e-7, -3.29268e-8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 kg (35 entries)
  (same comment as for waste glass)
  production volume 1.51081e9 kg
- electricity, low voltage: 7.38282e-10, 5.95687e-9, 1.04846e-9, 7.05959e-9, 2.96324e-9, 2.61787e-9, 4.87287e-9, 4.43567e-8, 2.80403e-9, 6.48803e-10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 kWh (38 entries); source Torellas M. 2012; lognormal variance with pedigree 0.120177, pedigree (2,1,3,5,1)
  Literature value or expert estimation (Torellas et al. 2012).
- irrigation: 2.5913e-6, 1.09993e-7, 4.39971e-9, 2.31645e-5, 3.79604e-7, 1.89818e-8, 1.75437e-7, 4.45147e-5, 8.55679e-7, 2.92451e-7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 m3 (16 entries); source Torellas M. 2012; lognormal variance with pedigree 0.120177, pedigree (2,1,3,5,1)
  (same comment as for irrigation)
- drawing of pipe, steel: 2.44159e-7 kg; lognormal variance with pedigree 0.0137, pedigree (4,4,3,3,2)
  Process done to draw pipes made of steel.
- alkyd paint, white, without solvent, in 60% solution state: 1.1942e-9 kg; lognormal variance with pedigree 0.0137, pedigree (4,4,3,3,2)
  Painting to prevent rust of steel and iron rods
- welding, arc, steel: 1.01869e-9 m; lognormal variance with pedigree 0.0137, pedigree (4,4,3,3,2)
  Processs of arc welding of the steel
- tin plated chromium steel sheet, 2 mm: 1.00332e-10 m2; lognormal variance with pedigree 0.0137, pedigree (4,4,3,3,2)
  Used in deck plate for structural steel components
- benzene: 1.12159e-8 kg; lognormal variance with pedigree 0.0137, pedigree (4,4,3,3,2)
  Approximation of the material composition of the used heat transfer fluid. The synthetic oil is an eutectic mixture of 73.5% diphenyl oxide (approximated with "diphenylether-compounds" and 26.5% biphenyl (approximated with "benzene").
- control cabinet, heat and power co-generation unit, 160kW electrical: 2.99408e-12 unit; lognormal variance with pedigree 0.0137, pedigree (4,4,3,3,2)
  Used in gears, motors and auxillary parts of equipment
- silicone product: 7.22641e-9 kg; lognormal variance with pedigree 0.0137, pedigree (4,4,3,3,2)
  Used for sealing leaks in Heat transfer fluid pumps. End of life is neglected
- diphenylether-compound: 3.11083e-8 kg; lognormal variance with pedigree 0.0137, pedigree (4,4,3,3,2)
  (same comment as for benzene)
- hazardous waste, for incineration: -1.11518e-7, -4.26629e-6 kg (2 entries); lognormal variance with pedigree 0.0137, pedigree (4,4,3,3,2)
  Disposal of the oil used for the initial filling and during operation of the pumps and transformers. Calculated based on the environmental product declarations for pumps as provided by Sulzer and for transformers as provided by ABB.
  Sulzer EPDs: https://www.sulzer.com/en/shared/about-us/2017/08/10/13/22/environmental-product-declarations (accessed May 2019)
  ABB library: https://library.abb.com/en/ (accessed May 2019)
  production volume 441 kg
- concrete, normal: 1.33913e-12 m3; lognormal variance with pedigree 0.0137, pedigree (4,4,3,3,2)
  Used in embedding metals in heat exchangers, steam generators, HTF pumps etc
- waste mineral oil: -9.57189e-10, -4.1367e-8 kg (2 entries)
  Approximation for the disposal of the synthetic oil. The waste synthetic oil usually meets the criteria for non-petroleum used oil. No dataset for the treatment of non-mineral oil exists in ecoinvent.
  https://www.therminol.com/resources/technical-support-faqs#environmentally-friendly
  production volume 1.6422e7 kg
- tap water: 1.19655e-10, 4.26102e-8, 9.94038e-10, 1.9775e-10, 4.98648e-9, 1.29722e-10, 5.70628e-8 kg (7 entries); lognormal variance with pedigree 0.0137, pedigree (4,4,3,3,2)
  Used in the manufacturing process of pumps
- waste paint: -2.76995e-12, -1.19143e-9 kg (2 entries); lognormal variance with pedigree 0.0137, pedigree (4,4,3,3,2)
  Inert materials in alkyd solvent 60% are disposed in landfill
  production volume 1470 kg
- waste polyethylene/polypropylene product: -4.87564e-10 kg; lognormal variance with pedigree 0.0137, pedigree (4,4,3,3,2)
  Polymer material non reusable sent for incineration
  production volume 2.1068e6 kg
- waste concrete: -1.83842e-8, -5.19971e-6 kg (2 entries); lognormal variance with pedigree 0.0137, pedigree (4,4,3,3,2)
  Disposal of concrete. The density is assumed to be 2200kg/m3.
  production volume 4.47053e6 kg
- waste reinforcement steel: -1.8986e-9, -2.73433e-6 kg (2 entries); lognormal variance with pedigree 0.0137, pedigree (4,4,3,3,2)
  All steel masses combined. Treatment of reinforced steel is used as a proxy for all steel types.
  production volume 6.67422e6 kg
- polyurethane, rigid foam: 9.05816e-14 kg; lognormal variance with pedigree 0.0137, pedigree (4,4,3,3,2)
  Used as resin material
- glass fibre: 1.65219e-11 kg; lognormal variance with pedigree 0.0137, pedigree (4,4,3,3,2)
  Material composition used in fuel oil storage, sand filters, and service water storage
- aluminium alloy, metal matrix composite: 7.30531e-10 kg; lognormal variance with pedigree 0.0137, pedigree (4,4,3,3,2)
  Includes metal working for aluminium production, used for coating in compressors,pumps etc
- section bar rolling, steel: 3.82653e-9 kg; lognormal variance with pedigree 0.0137, pedigree (4,4,3,3,2)
  Process done to steel for coating
- molybdenum: 1.16009e-11 kg; lognormal variance with pedigree 0.0137, pedigree (4,4,3,3,2)
  Material composition of steam turbine
- iron-nickel-chromium alloy: 4.16255e-8 kg; lognormal variance with pedigree 0.0137, pedigree (4,4,3,3,2)
  Material composition of steam turbine
- chromium steel removed by milling, average: 1.60895e-10 kg; lognormal variance with pedigree 0.0137, pedigree (4,4,3,3,2)
  Process of milling chromesteel. 0
- steel removed by milling, average: 4.97498e-10 kg; lognormal variance with pedigree 0.0137, pedigree (4,4,3,3,2)
  Process of milling steel.
- cast iron removed by milling, average: 1.51273e-10 kg; lognormal variance with pedigree 0.0137, pedigree (4,4,3,3,2)
  Process of milling cast iron.
- metal working, average for aluminium product manufacturing: 6.35759e-9 kg; lognormal variance with pedigree 0.0137, pedigree (4,4,3,3,2)
  Coating in compressors, pumps.
- particle board, cement bonded: 2.33275e-12 m3; lognormal variance with pedigree 0.0137, pedigree (4,4,3,3,2)
  Used in pumps to ensure no leaks occur
- kraft paper, unbleached: 5.05832e-12 kg; lognormal variance with pedigree 0.0137, pedigree (4,4,3,3,2)
  Proxy for electrical insulation paper
- electricity, high voltage: 3.65771e-12, 8.71772e-11, 5.02174e-13, 1.60912e-12, 3.30673e-12, 3.16703e-13, 2.84886e-12, 1.83512e-12, 2.3394e-11, 6.99434e-11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 kWh (36 entries); lognormal variance with pedigree 0.0137, pedigree (4,4,3,3,2)
  Electrical energy
- heat, district or industrial, other than natural gas: 4.13804e-10 MJ; lognormal variance with pedigree 0.0137, pedigree (4,4,3,3,2)
  Heat energy
- sand: 1.09063e-9 kg; lognormal variance with pedigree 0.0137, pedigree (4,4,3,3,2)
  Tank foundations. End of life neglected
- foam glass: 1.2e-7 kg; lognormal variance with pedigree 0.0137, pedigree (4,4,3,3,2)
  Used in insulation of tank foundation
- nitrate salts, for solar power application: 2.91844e-5 kg; lognormal variance with pedigree 0.0137, pedigree (4,4,3,3,2)
  Used as molten salt with 60% (by weight) contribution of technical grade sodium nitrate, and 40% (by weight) technical grade potassium nitrate.
- diesel, burned in diesel-electric generating set, 18.5kW: 1.11841e-5 MJ; lognormal variance with pedigree 0.0133, pedigree (3,4,4,3,2)
  Used to melt the salt before it is sent to thermal storage tank
- stone wool: 1.37961e-7 kg; lognormal variance with pedigree 0.0137, pedigree (4,4,3,3,2)
- refractory, basic, packed: 4.035e-7 kg; lognormal variance with pedigree 0.0137, pedigree (4,4,3,3,2)
  Refractory brick, with mortar (tank perimeter foundation)
- waste mineral wool: -1.55648e-9, -1.36404e-7 kg (2 entries); lognormal variance with pedigree 0.0137, pedigree (4,4,3,3,2)
  Rock wool used in instrumentation aspect send for final disposal
  production volume 979440 kg

## Inputs from nature
- Oxygen [natural resource, in air]: 0 kg; pedigree (1,1,1,1,1)
  Oxygen from ambient air needed to combust and oxidise this waste. Net demand, i.e. without O2 leaving the plant in flue gas uncombusted.
  Uncertainty: uncertainty is calculated from uncertainties in waste composition and transfer coefficients to flue gas and soild residues in incinerator
- Water, unspecified natural origin [natural resource, in water]: 6.31663e-7 m3; lognormal variance with pedigree 0.0035, pedigree (1,4,2,3,2)
  Data from Xiao et al. 2015.
- Water, cooling, unspecified natural origin [natural resource, in water]: 0.000640044 m3; lognormal variance with pedigree 0.056, pedigree (3,4,5,5,1)
- Water, well, in ground [natural resource, in water]: 2.74547e-7 m3; source Jemai 2005; lognormal variance with pedigree 0.0701, pedigree (1,4,5,3,3)
  Literature Value.
- Transformation, from arable land, unspecified use [natural resource, land]: 0.000727743 m2; lognormal variance with pedigree 0.0382144, pedigree (2,1,3,1,1)
  Land transformation: 1 ha divided by yield
- Transformation, to arable land, unspecified use [natural resource, land]: 0.000727743 m2; lognormal variance with pedigree 0.0382144, pedigree (2,1,3,1,1)
  Land transformation: 1 ha divided by yield
- Carbon dioxide, in air [natural resource, in air]: 0.00120711 kg; lognormal variance with pedigree 0.00784984, pedigree (2,2,3,1,1)
  CO2 uptake by biomass
- Occupation, annual crop [natural resource, land]: 0.000729708 m2*year; lognormal variance with pedigree 0.0140616, pedigree (2,1,3,1,1)
  Related to the duration from harvest date of previous crop to harvest date of main crop.
- Energy, gross calorific value, in biomass [natural resource, biotic]: 0.0108506 MJ; lognormal variance with pedigree 0.00784984, pedigree (2,2,3,1,1)
- Occupation, industrial area [natural resource, land]: 4.93962e-5 m2*year; lognormal variance with pedigree 0.0946, pedigree (2,4,5,5,1)
  Literature studies
  Uncertainty: literature studies
- Transformation, from heterogeneous, agricultural [natural resource, land]: 6.28809e-7 m2; lognormal variance with pedigree 0.1746, pedigree (2,4,5,5,1)
  Literature studies
  Uncertainty: literature studies
- Transformation, to industrial area [natural resource, land]: 2.10161e-6 m2; lognormal variance with pedigree 0.1746, pedigree (2,4,5,5,1)
  Literature studies
  Uncertainty: literature studies
- Transformation, from unspecified [natural resource, land]: 1.4728e-6 m2; lognormal variance with pedigree 0.1746, pedigree (2,4,5,5,1)
  Literature studies
  Uncertainty: literature studies
- Occupation, construction site [natural resource, land]: 1.4728e-6 m2*year; lognormal variance with pedigree 0.0946, pedigree (2,4,5,5,1)
  Literature studies
  Uncertainty: literature studies
## Emissions to nature
- Aluminium [water, ground-, long-term]: 0 kg; pedigree (1,1,1,1,1)
  Long-term emissions from landfilling of incineration residues.
  Uncertainty: uncertainty is calculated from uncertainties in waste composition and transfer coefficients in incinerator and landfills.
- Benzene, hexachloro- [air, urban air close to ground]: 0 kg; pedigree (1,1,1,1,1)
  Incomplete combustion product emitted to air.
  Uncertainty: uncertainty calculated from uncertainty in average operation emissions, and the uncertainty of the flue gas volume from this waste.
- BOD5, Biological Oxygen Demand [water, surface water]: 0 kg; pedigree (1,1,1,1,1)
  Emissions to water from waste composition and transfer coefficients in incinerator and landfills.
  Uncertainty: uncertainty is calculated from uncertainties in waste composition and transfer coefficients in incinerator and landfills
- Chromium VI [water, surface water]: 0 kg; pedigree (1,1,1,1,1)
  (same comment as for BOD5, Biological Oxygen Demand)
- Nickel, ion [water, ground-, long-term]: 0 kg; pedigree (1,1,1,1,1)
  (same comment as for Aluminium)
- Mercury [water, ground-, long-term]: 0 kg; pedigree (1,1,1,1,1)
  (same comment as for Aluminium)
- Vanadium [air, urban air close to ground]: 0 kg; pedigree (1,1,1,1,1)
  Emission to air from waste composition and transfer coefficients.
  Uncertainty: uncertainty is calculated from uncertainties in waste composition and transfer coefficients in incinerator
- Arsenic [air, urban air close to ground]: 0 kg; pedigree (1,1,1,1,1)
  (same comment as for Vanadium)
- TOC, Total Organic Carbon [water, surface water]: 0 kg; pedigree (1,1,1,1,1)
  (same comment as for BOD5, Biological Oxygen Demand)
- Nickel, ion [water, surface water]: 0 kg; pedigree (1,1,1,1,1)
  (same comment as for BOD5, Biological Oxygen Demand)
- Titanium, ion [water, ground-, long-term]: 0 kg; pedigree (1,1,1,1,1)
  (same comment as for Aluminium)
- Beryllium [water, surface water]: 0 kg; pedigree (1,1,1,1,1)
  (same comment as for BOD5, Biological Oxygen Demand)
- Water [air, urban air close to ground]: 0 m3; pedigree (1,1,1,1,1)
  Water vapour from waste humidity, hydrogen oxidation and part of the process water.
  Uncertainty: Uncertainty calculated from uncertainty in waste composition, process water input and the uncertainty of fraction to air.
- COD, Chemical Oxygen Demand [water, ground-, long-term]: 0 kg; pedigree (1,1,1,1,1)
  (same comment as for Aluminium)
- Toluene [air, urban air close to ground]: 0 kg; pedigree (1,1,1,1,1)
  (same comment as for Benzene, hexachloro-)
- Zinc, ion [water, ground-, long-term]: 0 kg; pedigree (1,1,1,1,1)
  (same comment as for Aluminium)
- Hydrogen fluoride [air, urban air close to ground]: 0 kg; pedigree (1,1,1,1,1)
  (same comment as for Vanadium)
- Nitrogen oxides [air, urban air close to ground]: 0 kg; pedigree (1,1,1,1,1)
  Sum of fuel-Nox and thermal-NOx emitted to air after DeNOx stage.
  Uncertainty: uncertainty calculated from uncertainty in average N-emissions and uncertainty in the share of thermal NOx and the uncertainty in nitrogen content in *this* waste.
- Tin, ion [water, surface water]: 0 kg; pedigree (1,1,1,1,1)
  (same comment as for BOD5, Biological Oxygen Demand)
- Chromium, ion [water, surface water]: 0 kg; pedigree (1,1,1,1,1)
  (same comment as for BOD5, Biological Oxygen Demand)
- Barium [water, ground-, long-term]: 0 kg; pedigree (1,1,1,1,1)
  (same comment as for Aluminium)
- Arsenic, ion [water, ground-, long-term]: 0 kg; pedigree (1,1,1,1,1)
  (same comment as for Aluminium)
- Iron [air, urban air close to ground]: 0 kg; pedigree (1,1,1,1,1)
  (same comment as for Vanadium)
- Iron, ion [water, surface water]: 0 kg; pedigree (1,1,1,1,1)
  (same comment as for BOD5, Biological Oxygen Demand)
- Strontium [air, urban air close to ground]: 0 kg; pedigree (1,1,1,1,1)
  (same comment as for Vanadium)
- Manganese [water, surface water]: 0 kg; pedigree (1,1,1,1,1)
  (same comment as for BOD5, Biological Oxygen Demand)
- Cadmium, ion [water, surface water]: 0 kg; pedigree (1,1,1,1,1)
  (same comment as for BOD5, Biological Oxygen Demand)
- Aluminium [air, urban air close to ground]: 0 kg; pedigree (1,1,1,1,1)
  (same comment as for Vanadium)
- Tin [air, urban air close to ground]: 0 kg; pedigree (1,1,1,1,1)
  (same comment as for Vanadium)
- Selenium [water, surface water]: 0 kg; pedigree (1,1,1,1,1)
  (same comment as for BOD5, Biological Oxygen Demand)
- Bromine [air, urban air close to ground]: 0 kg; pedigree (1,1,1,1,1)
  (same comment as for Vanadium)
- Carbon dioxide, fossil [air, urban air close to ground]: 0 kg; pedigree (1,1,1,1,1)
  (same comment as for Vanadium)
- Zinc, ion [water, surface water]: 0 kg; pedigree (1,1,1,1,1)
  (same comment as for BOD5, Biological Oxygen Demand)
- Titanium, ion [water, surface water]: 0 kg; pedigree (1,1,1,1,1)
  (same comment as for BOD5, Biological Oxygen Demand)
- Barium [air, urban air close to ground]: 0 kg; pedigree (1,1,1,1,1)
  (same comment as for Vanadium)
- Dioxins, measured as 2,3,7,8-tetrachlorodibenzo-p-dioxin [air, urban air close to ground]: 0 kg; pedigree (1,1,1,1,1)
  (same comment as for Benzene, hexachloro-)
- Titanium [air, urban air close to ground]: 0 kg; pedigree (1,1,1,1,1)
  (same comment as for Vanadium)
- Strontium [water, ground-, long-term]: 0 kg; pedigree (1,1,1,1,1)
  (same comment as for Aluminium)
- Nickel [air, urban air close to ground]: 0 kg; pedigree (1,1,1,1,1)
  (same comment as for Vanadium)
- Particulates, > 2.5 um, and < 10um [air, urban air close to ground]: 0 kg; pedigree (1,1,1,1,1)
  (same comment as for Benzene, hexachloro-)
- Benzene, pentachloro- [air, urban air close to ground]: 0 kg; pedigree (1,1,1,1,1)
  (same comment as for Benzene, hexachloro-)
- Nitrate [water, ground-, long-term]: 0 kg; pedigree (1,1,1,1,1)
  (same comment as for Aluminium)
- Lead [water, ground-, long-term]: 0 kg; pedigree (1,1,1,1,1)
  (same comment as for Aluminium)
- DOC, Dissolved Organic Carbon [water, surface water]: 0 kg; pedigree (1,1,1,1,1)
  (same comment as for BOD5, Biological Oxygen Demand)
- Benzene [air, urban air close to ground]: 0 kg; pedigree (1,1,1,1,1)
  (same comment as for Benzene, hexachloro-)
- Fluoride [water, surface water]: 0 kg; pedigree (1,1,1,1,1)
  (same comment as for BOD5, Biological Oxygen Demand)
- Lead [air, urban air close to ground]: 0 kg; pedigree (1,1,1,1,1)
  (same comment as for Vanadium)
- Beryllium [water, ground-, long-term]: 0 kg; pedigree (1,1,1,1,1)
  (same comment as for Aluminium)
- Cobalt [water, ground-, long-term]: 0 kg; pedigree (1,1,1,1,1)
  (same comment as for Aluminium)
- Sulfur dioxide [air, urban air close to ground]: 0 kg; pedigree (1,1,1,1,1)
  (same comment as for Vanadium)
- Sodium, ion [water, surface water]: 0 kg; pedigree (1,1,1,1,1)
  (same comment as for BOD5, Biological Oxygen Demand)
- Manganese [water, ground-, long-term]: 0 kg; pedigree (1,1,1,1,1)
  (same comment as for Aluminium)
- COD, Chemical Oxygen Demand [water, surface water]: 0 kg; pedigree (1,1,1,1,1)
  (same comment as for BOD5, Biological Oxygen Demand)
- Water [water, surface water]: 2.76426e-5 m3; lognormal variance with pedigree 1.1625, pedigree (1,1,3,1,1)
  Process water released to surface water.
  Uncertainty: uncertainty calculated from uncertainty in process water input and the uncertainty of fraction to surface water.
- Cobalt [air, urban air close to ground]: 0 kg; pedigree (1,1,1,1,1)
  (same comment as for Vanadium)
- Bromine [water, ground-, long-term]: 0 kg; pedigree (1,1,1,1,1)
  (same comment as for Aluminium)
- Copper, ion [water, surface water]: 0 kg; pedigree (1,1,1,1,1)
  (same comment as for BOD5, Biological Oxygen Demand)
- Copper, ion [water, ground-, long-term]: 0 kg; pedigree (1,1,1,1,1)
  (same comment as for Aluminium)
- Selenium [air, urban air close to ground]: 0 kg; pedigree (1,1,1,1,1)
  (same comment as for Vanadium)
- Antimony [water, ground-, long-term]: 0 kg; pedigree (1,1,1,1,1)
  (same comment as for Aluminium)
- Sulfate [water, ground-, long-term]: 0 kg; pedigree (1,1,1,1,1)
  (same comment as for Aluminium)
- Zinc [air, urban air close to ground]: 0 kg; pedigree (1,1,1,1,1)
  (same comment as for Vanadium)
- Sodium [air, urban air close to ground]: 0 kg; pedigree (1,1,1,1,1)
  (same comment as for Vanadium)
- Copper [air, urban air close to ground]: 0 kg; pedigree (1,1,1,1,1)
  (same comment as for Vanadium)
- Antimony [air, urban air close to ground]: 0 kg; pedigree (1,1,1,1,1)
  (same comment as for Vanadium)
- Antimony [water, surface water]: 0 kg; pedigree (1,1,1,1,1)
  (same comment as for BOD5, Biological Oxygen Demand)
- Tin, ion [water, ground-, long-term]: 0 kg; pedigree (1,1,1,1,1)
  (same comment as for Aluminium)
- Thallium [water, surface water]: 0 kg; pedigree (1,1,1,1,1)
  (same comment as for BOD5, Biological Oxygen Demand)
- Cadmium, ion [water, ground-, long-term]: 0 kg; pedigree (1,1,1,1,1)
  (same comment as for Aluminium)
- Iron, ion [water, ground-, long-term]: 0 kg; pedigree (1,1,1,1,1)
  (same comment as for Aluminium)
- Particulates, < 2.5 um [air, urban air close to ground]: 0 kg; pedigree (1,1,1,1,1)
  (same comment as for Benzene, hexachloro-)
- Chromium [air, urban air close to ground]: 0 kg; pedigree (1,1,1,1,1)
  (same comment as for Vanadium)
- Strontium [water, surface water]: 0 kg; pedigree (1,1,1,1,1)
  (same comment as for BOD5, Biological Oxygen Demand)
- NMVOC, non-methane volatile organic compounds, unspecified origin [air, urban air close to ground]: 0 kg; pedigree (1,1,1,1,1)
  (same comment as for Benzene, hexachloro-)
- Arsenic, ion [water, surface water]: 0 kg; pedigree (1,1,1,1,1)
  (same comment as for BOD5, Biological Oxygen Demand)
- Dinitrogen monoxide [air, urban air close to ground]: 0 kg; pedigree (1,1,1,1,1)
  Nitrogen species emitted to air after DeNOx stage.
  Uncertainty: uncertainty calculated from uncertainty in average N-emissions and uncertainty in the share of thermal NOx and the uncertainty in nitrogen content in *this* waste.
- Vanadium, ion [water, ground-, long-term]: 0 kg; pedigree (1,1,1,1,1)
  (same comment as for Aluminium)
- Sulfate [water, surface water]: 6.80931e-5 kg; lognormal variance with pedigree 0.33756, pedigree (1,1,3,1,1)
  (same comment as for BOD5, Biological Oxygen Demand)
- Mercury [air, urban air close to ground]: 0 kg; pedigree (1,1,1,1,1)
  (same comment as for Vanadium)
- Manganese [air, urban air close to ground]: 0 kg; pedigree (1,1,1,1,1)
  (same comment as for Vanadium)
- Cadmium [air, urban air close to ground]: 0 kg; pedigree (1,1,1,1,1)
  (same comment as for Vanadium)
- Lead [water, surface water]: 0 kg; pedigree (1,1,1,1,1)
  (same comment as for BOD5, Biological Oxygen Demand)
- Sodium, ion [water, ground-, long-term]: 0 kg; pedigree (1,1,1,1,1)
  (same comment as for Aluminium)
- Barium [water, surface water]: 0 kg; pedigree (1,1,1,1,1)
  (same comment as for BOD5, Biological Oxygen Demand)
- Thallium [air, urban air close to ground]: 0 kg; pedigree (1,1,1,1,1)
  (same comment as for Vanadium)
- Chloride [water, surface water]: 0 kg; pedigree (1,1,1,1,1)
  (same comment as for BOD5, Biological Oxygen Demand)
- Vanadium, ion [water, surface water]: 0 kg; pedigree (1,1,1,1,1)
  (same comment as for BOD5, Biological Oxygen Demand)
- Heat, waste [water, surface water]: 0 MJ; pedigree (1,1,1,1,1)
  Waste heat generated from heating value of this waste plus any electricity required to process it.
  Uncertainty: uncertainty is calculated from uncertainties in waste composition and uncertainties in energy efficiency and the uncertainty in internal energy demand
- TOC, Total Organic Carbon [water, ground-, long-term]: 0 kg; pedigree (1,1,1,1,1)
  (same comment as for Aluminium)
- Chloride [water, ground-, long-term]: 0 kg; pedigree (1,1,1,1,1)
  (same comment as for Aluminium)
- Cobalt [water, surface water]: 0 kg; pedigree (1,1,1,1,1)
  (same comment as for BOD5, Biological Oxygen Demand)
- Methane, fossil [air, urban air close to ground]: 0 kg; pedigree (1,1,1,1,1)
  (same comment as for Benzene, hexachloro-)
- Bromine [water, surface water]: 0 kg; pedigree (1,1,1,1,1)
  (same comment as for BOD5, Biological Oxygen Demand)
- Aluminium [water, surface water]: 0 kg; pedigree (1,1,1,1,1)
  (same comment as for BOD5, Biological Oxygen Demand)
- Chromium VI [water, ground-, long-term]: 0 kg; pedigree (1,1,1,1,1)
  (same comment as for Aluminium)
- Mercury [water, surface water]: 0 kg; pedigree (1,1,1,1,1)
  (same comment as for BOD5, Biological Oxygen Demand)
- Fluoride [water, ground-, long-term]: 0 kg; pedigree (1,1,1,1,1)
  (same comment as for Aluminium)
- DOC, Dissolved Organic Carbon [water, ground-, long-term]: 0 kg; pedigree (1,1,1,1,1)
  (same comment as for Aluminium)
- Selenium [water, ground-, long-term]: 0 kg; pedigree (1,1,1,1,1)
  (same comment as for Aluminium)
- Nitrate [water, surface water]: 0 kg; pedigree (1,1,1,1,1)
  (same comment as for BOD5, Biological Oxygen Demand)
- BOD5, Biological Oxygen Demand [water, ground-, long-term]: 0 kg; pedigree (1,1,1,1,1)
  (same comment as for Aluminium)
- Phenol, pentachloro- [air, urban air close to ground]: 0 kg; pedigree (1,1,1,1,1)
  (same comment as for Benzene, hexachloro-)
- Carbon monoxide, fossil [air, urban air close to ground]: 0 kg; pedigree (1,1,1,1,1)
  (same comment as for Benzene, hexachloro-)
- Heat, waste [air, urban air close to ground]: 0 MJ; pedigree (1,1,1,1,1)
  (same comment as for Heat, waste)
- Hydrogen chloride [air, urban air close to ground]: 0 kg; pedigree (1,1,1,1,1)
  (same comment as for Vanadium)
- Ammonia [air, urban air close to ground]: 0 kg; pedigree (1,1,1,1,1)
  (same comment as for Dinitrogen monoxide)
- Thallium [water, ground-, long-term]: 0 kg; pedigree (1,1,1,1,1)
  (same comment as for Aluminium)
- Benzo(a)pyrene [air, urban air close to ground]: 0 kg; pedigree (1,1,1,1,1)
  (same comment as for Benzene, hexachloro-)
- Cyanide [air, urban air close to ground]: 0 kg; pedigree (1,1,1,1,1)
  (same comment as for Dinitrogen monoxide)
- Ethane, 1,1-difluoro-, HFC-152a [air, urban air close to ground]: 2.75634e-6 kg; lognormal variance with pedigree 0.122825, pedigree (1,4,2,2,2)
  Used here in place of pentafluoropropane released to the atmosphere. The output amount is set equal to the amount of input material, 1,1-difluoroethane. Data from Xiao et al. 2015.
- Water [air, unspecified]: 0.000257742 m3; lognormal variance with pedigree 0.0807, pedigree (2,2,5,1,1)
  Calculated value based on literature values and expert opinion. See comments in the parametres' comment field.
- Benzene [air, unspecified]: 1.43248e-10 kg; lognormal variance with pedigree 0.1806, pedigree (2,5,5,5,1)
- Styrene [air, unspecified]: 2.99888e-6 kg; lognormal variance with pedigree 0.096, pedigree (3,4,5,5,1)
- Water [water, unspecified]: 0.000429569 m3; lognormal variance with pedigree 0.0827, pedigree (2,2,5,5,1)
  (same comment as for Water)
- Acetone [air, unspecified]: 0.000107215 kg; lognormal variance with pedigree 0.0946, pedigree (2,4,5,5,1)
- Ethane, 1,1,1,2-tetrafluoro-, HFC-134a [air, non-urban air or from high stacks]: 0.000181941 kg; lognormal variance with pedigree 0.0432, pedigree (2,3,5,5,1)
- Dinitrogen monoxide [air, non-urban air or from high stacks]: 1.05476e-6 kg; source IPCC 2006; lognormal variance with pedigree 0.118664, pedigree (2,2,3,1,1)
  Calculated value - IPCC (2006). See 'WFLDB-Guidelines.pdf', available at https://ecoquery.ecoinvent.org/File/Reports.
- Water [air, non-urban air or from high stacks]: 0.000310746 m3; lognormal variance with pedigree 0.118177, pedigree (2,1,3,1,1)
  Calculated value - Emission calculated from water balance. See 'WFLDB-Guidelines.pdf', available at https://ecoquery.ecoinvent.org/File/Reports.
- Ammonia [air, non-urban air or from high stacks]: 5.94042e-6 kg; source EEA 2013; lognormal variance with pedigree 0.0387216, pedigree (2,2,3,1,1)
  Calculated value - EMEP/EEA (2013). See 'WFLDB-Guidelines.pdf', available at https://ecoquery.ecoinvent.org/File/Reports.
- Phosphate [water, surface water]: 8.86391e-8 kg; source Prasuhn V.  2006; lognormal variance with pedigree 0.179266, pedigree (3,2,3,1,3)
  Calculated value - Prasuhn (2006). See 'WFLDB-Guidelines.pdf', available at https://ecoquery.ecoinvent.org/File/Reports.
- Copper [soil, agricultural]: 2.4637e-9 kg; source Freiermuth R.  2006
  Comment on mathematicalRelation:
  5.68330262172e-07 from Calculated value - Freiermuth (2006). See 'WFLDB-Guidelines.pdf', available at https://ecoquery.ecoinvent.org/File/Reports.
  Heavy metal uptake can be excluded by setting the parameter heavyMetalUptakeSwitch to zero.
- Nitrate [water, ground-]: 2.6126e-5 kg
  Calculated value - Torellas et al. (2012): Water emissions of NO3: 359 kg/ha (The irrigation system is an open- loop drip system, without recirculation of drainage water). See 'WFLDB-Guidelines.pdf', available at https://ecoquery.ecoinvent.org/File/Reports.
- Phosphate [water, ground-]: 1.56537e-8 kg; source Prasuhn V.  2006; lognormal variance with pedigree 0.169866, pedigree (2,2,3,1,1)
  (same comment as for Phosphate)
- Cadmium, ion [water, ground-]: 3.57103e-12 kg; source Freiermuth R.  2006; lognormal variance with pedigree 0.350938, pedigree (2,2,3,1,1)
  Calculated value - Freiermuth (2006). See 'WFLDB-Guidelines.pdf', available at https://ecoquery.ecoinvent.org/File/Reports.
- Chromium, ion [water, ground-]: 1.53576e-9 kg; source Freiermuth R.  2006; lognormal variance with pedigree 0.350938, pedigree (2,2,3,1,1)
  (same comment as for Cadmium, ion)
- Copper, ion [water, ground-]: 2.56384e-10 kg; source Freiermuth R.  2006; lognormal variance with pedigree 0.350938, pedigree (2,2,3,1,1)
  (same comment as for Cadmium, ion)
- Lead [water, ground-]: 3.35999e-11 kg; source Freiermuth R.  2006; lognormal variance with pedigree 0.350938, pedigree (2,2,3,1,1)
  (same comment as for Cadmium, ion)
- Mercury [water, ground-]: 8.85954e-14 kg; source Freiermuth R.  2006; lognormal variance with pedigree 0.350938, pedigree (2,2,3,1,1)
  (same comment as for Cadmium, ion)
- Zinc, ion [water, ground-]: 2.11715e-9 kg; source Freiermuth R.  2006; lognormal variance with pedigree 0.350938, pedigree (2,2,3,1,1)
  (same comment as for Cadmium, ion)
- Water [water, ground-]: 6.91065e-6 m3; lognormal variance with pedigree 0.118177, pedigree (2,1,3,1,1)
  (same comment as for Water)
- Cadmium [soil, agricultural]: 2.27141e-9 kg; source Freiermuth R.  2006
  Comment on mathematicalRelation:
  1.94726469911e-07 from Calculated value - Freiermuth (2006). See 'WFLDB-Guidelines.pdf', available at https://ecoquery.ecoinvent.org/File/Reports.
  -5.564392e-09 from Crop, default, heavy metals uptake model
  Heavy metal uptake can be excluded by setting the parameter heavyMetalUptakeSwitch to zero.
- Chromium [soil, agricultural]: 3.43402e-8 kg; source Freiermuth R.  2006
  Comment on mathematicalRelation:
  2.8896969164e-06 from Calculated value - Freiermuth (2006). See 'WFLDB-Guidelines.pdf', available at https://ecoquery.ecoinvent.org/File/Reports.
  -2.9866e-08 from Crop, default, heavy metals uptake model
  Heavy metal uptake can be excluded by setting the parameter heavyMetalUptakeSwitch to zero.
- Mercury [soil, agricultural]: 2.46553e-11 kg; source Freiermuth R.  2006
  Comment on mathematicalRelation:
  4.27575209825e-09 from Calculated value - Freiermuth (2006). See 'WFLDB-Guidelines.pdf', available at https://ecoquery.ecoinvent.org/File/Reports.
  -2.2224688e-09 from Crop, default, heavy metals uptake model
  Heavy metal uptake can be excluded by setting the parameter heavyMetalUptakeSwitch to zero.
- Lead [soil, agricultural]: 4.1003e-9 kg; source Freiermuth R.  2006
  Comment on mathematicalRelation:
  -2.9634196e-08 from Crop, default, heavy metals uptake model
  Heavy metal uptake can be excluded by setting the parameter heavyMetalUptakeSwitch to zero.
- Carbon dioxide, fossil [air, non-urban air or from high stacks]: 2.34173e-5 kg; lognormal variance with pedigree 0.0492498, pedigree (3,2,3,1,4)
  Calculated value - CO2 emissions from urea and lime. See 'WFLDB-Guidelines.pdf', available at https://ecoquery.ecoinvent.org/File/Reports.
- Nickel [soil, agricultural]: 4.82847e-9 kg; source Freiermuth R.  2006
  Comment on mathematicalRelation:
  4.5935702069e-07 from Calculated value - Freiermuth (2006). See 'WFLDB-Guidelines.pdf', available at https://ecoquery.ecoinvent.org/File/Reports.
  -5.724408e-08 from Crop, default, heavy metals uptake model
  Heavy metal uptake can be excluded by setting the parameter heavyMetalUptakeSwitch to zero.
- Nitrogen oxides [air, non-urban air or from high stacks]: 2.28977e-6 kg; source EEA 2013; lognormal variance with pedigree 0.118664, pedigree (2,2,3,1,1)
  Calculated value - EEA/EMEP (2013). See 'WFLDB-Guidelines.pdf', available at https://ecoquery.ecoinvent.org/File/Reports.
- Zinc [soil, agricultural]: 2.46743e-8 kg; source Freiermuth R.  2006
  Comment on mathematicalRelation:
  -1.7548604e-06 from Crop, default, heavy metals uptake model
  Heavy metal uptake can be excluded by setting the parameter heavyMetalUptakeSwitch to zero.
- Fungicides, unspecified [soil, agricultural]: 2.07407e-6 kg; lognormal variance with pedigree 0.0387216, pedigree (2,2,3,1,1)
  Calculated value - 100% emission in soil. See 'WFLDB-Guidelines.pdf', available at https://ecoquery.ecoinvent.org/File/Reports.
- Insecticides, unspecified [soil, agricultural]: 2.76542e-7 kg; lognormal variance with pedigree 0.0387216, pedigree (2,2,3,1,1)
  (same comment as for Fungicides, unspecified)
- Nitrogen [air, unspecified]: 0.000201595 kg; lognormal variance with pedigree 0.0104, pedigree (2,3,1,4,3)
  Calculated value. The amount of nitrogen released to air is equal to the amount of nitrogen entering the activity.
- Ethane, 1,1-difluoro-, HFC-152a [air, non-urban air or from high stacks]: 9.09706e-5 kg; lognormal variance with pedigree 0.0432, pedigree (2,3,5,5,1)
- Carbon dioxide, from soil or biomass stock [air, non-urban air or from high stacks]: 4.90023e-5 kg; normal variance with pedigree 0.5452, pedigree (3,3,5,5,2)
  Global average LUC emissions according 2nd edition of the Quantis-modified tool developed by Blonk Consultants 'WFLDB-adapted-Blonk 2014 direct-land-use-change-assessment-tool_2015-05-18a.xlsx', tab. 'Country & land use unknown'. The emission are based on the relative change in production areas in all countries for a given crop. The weighted average is used which takes into acount relative difference in crop expansion into primary forest, secondary forest, grassland, perennial and annual land.
