# sodium chloride production, brine solution

Dataset: EcoSpold 2, unit process
Geography: RoW
Time period: 1994-01-01 to 2019-12-31
Technology level: current
Classification: EcoSpold01Categories: chemicals/inorganics
Classification: ISIC rev.4 ecoinvent: 0893:Extraction of salt
Synonyms: salt solution; Salzlösung
Tags: ConvertedDataset
Scenario: Business-as-Usual
System model: Allocation at the point of substitution
Generated by: Roland Hischier
Published in: Althaus H.-J. 2007
Database: ecoinvent
isCopyrightProtected: true
accessRestrictedTo: 1

## General comment
[This dataset was already contained in the ecoinvent database version 2. It was not individually updated during the transfer to ecoinvent version 3. Life Cycle Impact Assessment results may still have changed, as they are affected by changes in the supply chain, i.e. in other datasets. This dataset was generated following the ecoinvent quality guidelines for version 2. It may have been subject to central changes described in the ecoinvent version 3 change report (http://www.ecoinvent.org/database/ecoinvent-version-3/reports-of-changes/), and the results of the central updates were reviewed extensively. The changes added e.g. consistent water flows and other information throughout the database. The documentation of this dataset can be found in the ecoinvent reports of version 2, which are still available via the ecoinvent website. The change report linked above covers all central changes that were made during the conversion process.]

## Included activities end
this module includes the solution mining process of sodium chloride for the preparation of a brine for industrial use. No cleaning or drying step are therefore included.

## Geography
estimation, based on one European literature source - valable for european situation

## Technology
modern solution mining technique (mix)

## Parameters
- fraction, process water, to air: 0.205 dimensionless; name fraction_PW_to_air; lognormal variance with pedigree 0.092025, pedigree (4,4,3,2,4)

## Reference product
- sodium chloride, brine solution: 1 kg; CPC 16200: Salt and pure sodium chloride; sea water; By-product classification allocatable product; CAS 7647-14-5
  EcoSpold01Location=RER
  production volume 2.67763 kg
    This is a placeholder value that does not reflect real-world production volumes. This dataset does not currently require a real-world production volume to work in the database framework, and no actual data were collected yet. This has no negative effect on the results of the ecoinvent database.
  property price 0.221501 EUR2005
    Calculated based on inputs: The price of the product has been calculated as a sum of the values of the material and energy inputs for this product. This value is therefore a rough estimation. It may underestimate the real price since there are additional expenses when producing any product. These expences can include for example labour costs, treatment of waste materials and profit for the producer. Please consider carefully whether this level of data quality is acceptable for your application. Cross-reference; Calculated value based on data from United Nations Commodity Trade Statistics Database (comtrade.un.org) is 0.03 Euro/kg. UN comtrade category: 250100 Salt (sodium chloride) including solution, salt water. Year 2005. Using exchange rate of 1EURO = 1.209 USD. Average of price of import into 5 main markets (EU, US, JP, IN and CN).
  property carbon content 0
    carbon content on a dry matter basis (reserved; not for manual entry)
  properties: carbon content, fossil 0, carbon content, non-fossil 0, water content 0, wet mass 1 kg, water in wet mass 0 kg, dry mass 1 kg, carbon allocation 0 kg

## Inputs from technosphere
- heat, district or industrial, other than natural gas: 0 MJ; pedigree (1,1,1,1,1)
  EcoSpold01Location=RER
  Based on 1 literature source
  Uncertainty: based on 1 literature source
- electricity, medium voltage: 0 kWh; pedigree (1,1,1,1,1)
  EcoSpold01Location=UCTE
  Based on 1 literature source
  Uncertainty: based on 1 literature source
- chemical factory, organics: 4e-10 unit; lognormal variance with pedigree 0.588, pedigree (4,5,5,5,5)
  Estimation, based on Infrastructure of chemical production
  EcoSpold01Location=RER
  Uncertainty: Estimation, based on Infrastructure of chemical production
- heat, district or industrial, natural gas: 0 MJ; pedigree (1,1,1,1,1)
  Based on 1 literature source
  EcoSpold01Location=RER
  Uncertainty: based on 1 literature source
- heat, district or industrial, other than natural gas: 7.57294e-5, 0.168924 MJ (2 entries); lognormal variance with pedigree 0.152, pedigree (3,5,5,5,4)
  (same comment as for heat, district or industrial, other than natural gas)
- electricity, medium voltage: 0.00087708, 0.000159592, 0.00270643, 0.0392404, 0.00561605, 0.0184004 kWh (6 entries); lognormal variance with pedigree 0.152, pedigree (3,5,5,5,4)
  (same comment as for electricity, medium voltage)
- heat, district or industrial, natural gas: 0.00293734, 0.166063 MJ (2 entries); lognormal variance with pedigree 0.152, pedigree (3,5,5,5,4)
  (same comment as for heat, district or industrial, natural gas)

## Inputs from nature
- Water, unspecified natural origin [natural resource, in water]: 0.00382 m3; name water_UNO_input; lognormal variance with pedigree 0.152, pedigree (3,5,5,5,4)
  Based on 1 literature source
  Uncertainty: based on 1 literature source
- Water, salt, sole [natural resource, in water]: 0.00255624 m3; name water_salt_sole_input; source IPPC - Integrated Pollution Prevention a 2007; lognormal variance with pedigree 0.0546, pedigree (3,3,5,5,1)
  Calculated based on literature (IPPC, 2007, Large Volume Inorganic Chemicals; Kostick, D.S., 2008, Minerals Yearbook - Salt), (Vionnet, S., Quantis Water Database - Technical Report, 2012).
  property water content 28.2857; name water_content
  property dry mass 35 kg; name DM
  property water in wet mass 990 kg; name WWM
  property wet mass 1025 kg; name WM
  property carbon content, non-fossil 0; name C_content_non_fossil
  property carbon content, fossil 0; name C_content_fossil
- Sodium chloride, in ground [natural resource, in ground]: 1 kg; lognormal variance with pedigree 0.152, pedigree (3,5,5,5,4)
  Based on 1 literature source
  Uncertainty: based on 1 literature source

## Emissions to nature
- Water [air, unspecified]: 0.00130713 m3; name water_to_air_unspecified; lognormal variance with pedigree 0.0827, pedigree (2,2,5,5,1)
  Calculated value based on literature values and expert opinion. See comments in the parametres' comment field.
  property fraction, origin: unspecified 0.599099; name fraction_origin_unspecified
  property fraction, origin: salt water 0.400901; name fraction_origin_salt_water
  property fraction, origin: fresh water 0; name fraction_origin_fresh_water
- Water [water, unspecified]: 0.00506911 m3; name water_to_water_unspecified; lognormal variance with pedigree 0.0827, pedigree (2,2,5,5,1)
  (same comment as for Water)
  property fraction, origin: unspecified 0.599099; name fraction_origin_unspecified_Ww
  property fraction, origin: salt water 0.400901; name fraction_origin_salt_water_Ww
  property fraction, origin: fresh water 0; name fraction_origin_fresh_water_Ww

## Sampling procedure
literature data

## Extrapolations
see geography This dataset has been copied from an original dataset covering the geography RER. The uncertainty has been adjusted accordingly.

## Review by Heiko Kunst 2003-06-20
Passed
Passed
