# furnace production, pellets, with silo, 300kW

Dataset: EcoSpold 2, unit process
Geography: RoW
Time period: 2010-01-01 to 2019-12-31
Technology level: modern
Classification: ISIC rev.4 ecoinvent: 2815:Manufacture of ovens, furnaces and furnace burners
Classification: EcoSpold01Categories: wood energy/heating systems
Synonyms: wood pellets boiler production; wood fired boiler production
Tags: biomass power
Scenario: Business-as-Usual
System model: Allocation at the point of substitution
Generated by: Christian Bauer
Database: ecoinvent
isCopyrightProtected: true
accessRestrictedTo: 1

## General comment
This dataset represent the production and the disposal of a wood-pellets burning furnace for local heating networks, with a storage silo. Its assumed lifetime is 20 years.

## Included activities start
From reception of furnace components at the factory gate

## Included activities end
This activity ends with the disposal of the device in the end of its lifetime. The dataset includes the most important materials used for the fabrication of the furnace, the pellets storage silo, the automatic screw conveyor system and chimney flue pipes: steel, steel alloys, aluminium, concrete, rock wool, plastics, electronic components, polystyrene, lubricating oil, paint. The dataset includes the concrete basement for the furnace room (around 13m2), the energy and heat for the construction and the disposal of the device. It is assumed to build the pellet storage silo (dimensions: 6x6x3.5m) in a separate space next to the existing furnace room.

## Technology
Boiler of modern technology available on European and Swiss market, with combustion chamber in refractory bricks, designed for an optimal combustion process (cyclone integrated). The model of reference is a pellet boiler, mod.KWB Powerfire 300 kW. Represent the typical boiler for providing heat for local heating networks, commercial premises and multi-storey housing.
Source of image: http://www.kwb.at/at/index.php?option=com_content&task=view&id=194&Itemid=170

## Time period
This model of furnace is commercialized since 2010 in Europe and Switzerland and is still available on the market (end 2011)

## Reference product
- furnace, pellets, with silo, 300kW: 1 unit; CPC 43420: Industrial or laboratory furnaces and ovens, except non-electric bakery ovens; other industrial or laboratory […]; By-product classification allocatable product
  EcoSpold01Location=GLO
  production volume 11467 unit
    Extrapolated with proportions from the annual installed devices in Switzerland - high uncertainty
  property capacity [MW] 0.3 MW; name capacity_MW
  property lifetime capacity [kWh] 5.256e7 kWh; name lifetime_capacity_kWh; = (lifetime*8760)*capacity_MW*1000
    calculated value
  property price 22188 EUR2005
    Calculated by 2.0 -Assumed same price as for wood chips furnace. Prices from UNDATA "Industrial furnace, oven, incinerator non-electric ne" (http://data.un.org/Data.aspx?q=industrial+furnace&d=ComTrade&f=_l1Code%3a84%3bcmdCode%3a841780). The prices are per kg and converted to per unit by summed weight of material concumption of the process in existing ecoinvent documentation from ecoinvent v.2.2. For weight of concrete, it is separately added for from price per m3 used of each unit and apply EU&DK input output database 2003 (0.08 Euro2003/kg DS of concrete => 176 Euro2003/m3 concrete).
  property lifetime 20 year; name lifetime
  property true value 22188
    allocation property applied in "true value" allocation // value calculated from revenue

## By-products
- electricity, for reuse in municipal waste incineration only: 0 kWh; CPC 17100: Electrical energy; By-product classification allocatable product; pedigree (1,1,1,1,1)
  Net electricity generated from this waste and used in internal MSWI plant energy redistribution.
  Uncertainty: uncertainty is calculated from uncertainties in waste composition and uncertainties in energy efficiency and the uncertainty in internal energy demand
  production volume 1.37873e6 kWh
  property true value relation 3.6; name E_el_prod_MSWI_true_value_relation
    property to calculate "true value" from
  property exergy 3.6 MJ; name E_el_prod_MSWI_exergy
    This exergy property is based on the exergy content of the product.
  property price 0.1 EUR2005; name E_el_prod_MSWI_price_EUR2005
    Estimated to be the same price as in case of electricity, medium voltage.
  property true value 7.84472
    allocation property applied in "true value" allocation // value calculated from true value relation
- heat, for reuse in municipal waste incineration only: 0 MJ; CPC 17300: Steam and hot water; By-product classification allocatable product; pedigree (1,1,1,1,1)
  Net useful heat generated from this waste and used in internal MSWI plant energy redistribution.
  Uncertainty: uncertainty is calculated from uncertainties in waste composition and uncertainties in energy efficiency and the uncertainty in internal energy demand
  production volume 9.61703e6 MJ
  property true value relation 0.1842; name E_th_prod_MSWI_true_value_relation
    property to calculate "true value" from
  property exergy 0.1842 MJ; name E_th_prod_MSWI_exergy
    This exergy property is based on the exergy content of the product.
  property price 0.0106 EUR2005; name E_th_prod_MSWI_price_EUR2005
    Average European district heat price from Ecoheatcool and Euroheat 2005-2006, Ecoheat Work package 1: The European heat market. Final report. 10.6 EUR/GJ i s the price of district heat. http://www.solarthermalworld.org/files/Ecoheatcool%20WP1%20Web.pdf?download
  property true value 2.79993
    (same comment as for electricity, for reuse in municipal waste incineration only)
- zinc concentrate: 0 kg; CPC 14290: Other non-ferrous metal ores and concentrates (other than uranium or thorium ores and concentrates); By-product classification allocatable product
  Calculated value from the knowledge of the properties of both products.
  production volume 1.06763 kg
  property price 0.38 EUR2005; name ByP_price_EUR2005
    Temporary price data. Calculated as 90% of purchasers price based on: Zinc content in concentrate 53%. Concentrate price per kg Zn 86.5% of refined Zn price (13.5% treatment charges according to CHR Metals Limited 2005: Dynamic cost curves. http://www.minecost.com/dynamic.pdf). 2004 zinc price from USGS (2007) Mineral commodity summaries 2007. <http://minerals.usgs.gov/minerals/pubs/mcs/2007/mcs2007.pdf> [Accessed 25 May 2010]
  property zinc content 0.53; name zinc_C_zinc_concentrate
    Zinc content on a dry matter basis. Value taken from teh "zinc mine operation" /GLO dataset.
  property dry mass 1 kg; name DM_zinc_concentrate
  property carbon content 0
    carbon content on a dry matter basis (reserved; not for manual entry)
  property true value 3.53794e-5
    allocation property applied in "true value" allocation // value calculated from revenue
  properties: wet mass 1 kg, water content 0, carbon content, non-fossil 0, carbon content, fossil 0, water in wet mass 0 kg, carbon allocation 0 kg
- copper: 0 kg; By-product classification allocatable product; CPC 41413: Refined copper and copper alloys, unwrought; master alloys of copper
  production volume 28366.2 kg
  properties: water in wet mass 0 kg, water content 0, carbon content, non-fossil 0, dry mass 1 kg, carbon content, fossil 0, price 5.52 EUR2005, wet mass 1 kg, carbon content 0, carbon allocation 0 kg, true value 7.77678
- lead: 0 kg; CPC 41441: Lead, unwrought; By-product classification allocatable product
  EcoSpold01Location=SE
  production volume 102.76 kg
  property price 0.744 EUR2005
    Temporary price data. Calculated as 90% of purchasers price based on: Source: ecoinvent v2 report 10-part IX, Tab 5.10 & 2.5
  property carbon content 0
    carbon content on a dry matter basis (reserved; not for manual entry)
  property true value 0.00666725
    allocation property applied in "true value" allocation // value calculated from revenue
  properties: wet mass 1 kg, water content 0, carbon content, non-fossil 0, carbon content, fossil 0, dry mass 1 kg, water in wet mass 0 kg, carbon allocation 0 kg
- nickel, 99.5%: 0 kg; CPC 41422: Unwrought nickel; By-product classification allocatable product
  EcoSpold01Location=SE
  production volume 214.509 kg
  property price 10.4 EUR2005
    Temporary price data. Calculated as 90% of purchasers price based on: 2004 nickel price from USGS (2007) Mineral commodity summaries 2007. <http://minerals.usgs.gov/minerals/pubs/mcs/2007/mcs2007.pdf> [Accessed 25 May 2010]
  property carbon content 0
    carbon content on a dry matter basis (reserved; not for manual entry)
  property true value 0.194549
    allocation property applied in "true value" allocation // value calculated from revenue
  properties: water in wet mass 0 kg, wet mass 1 kg, carbon content, non-fossil 0, dry mass 1 kg, water content 0, carbon content, fossil 0, carbon allocation 0 kg
- silver: 0 kg; CPC 41310: Silver (including silver plated with gold or platinum), unwrought or in semi-manufactured forms, or in powder […]; By-product classification allocatable product; CAS 7440-22-4
  EcoSpold01Location=SE
  production volume 35.4239 kg
  property price 178 EUR2005
    (same comment as for lead)
  property carbon content 0
    carbon content on a dry matter basis (reserved; not for manual entry)
  property true value 0.549879
    allocation property applied in "true value" allocation // value calculated from revenue
  properties: wet mass 1 kg, carbon content, non-fossil 0, dry mass 1 kg, water content 0, carbon content, fossil 0, water in wet mass 0 kg, carbon allocation 0 kg
- palladium: 0 kg; CPC 4160: Other non-ferrous metals and articles thereof (including waste and scrap of some metals); cermets and articles […]; By-product classification allocatable product
  EcoSpold01Location=SE
  production volume 1.96095 kg
  property price 5640 EUR2005
    Temporary price data. Calculated as 90% of purchasers price based on: 2004 price from USGS (2007) Mineral commodity summaries 2007. <http://minerals.usgs.gov/minerals/pubs/mcs/2007/mcs2007.pdf> [Accessed 25 May 2010]
  property carbon content 0
    carbon content on a dry matter basis (reserved; not for manual entry)
  property true value 0.964484
    allocation property applied in "true value" allocation // value calculated from revenue
  properties: wet mass 1 kg, carbon content, fossil 0, water in wet mass 0 kg, water content 0, carbon content, non-fossil 0, dry mass 1 kg, carbon allocation 0 kg
- gold: 0 kg; CPC 41320: Gold (including gold plated with platinum), unwrought or in semi-manufactured forms, or in powder form; By-product classification allocatable product; CAS 7440-57-5
  EcoSpold01Location=SE
  production volume 1.07538 kg
  property price 10600 EUR2005
    Temporary price data. Calculated as 90% of purchasers price based on: Source: ecoinvent v2 report 10-part IX, Tab 2.5
  property carbon content 0
    carbon content on a dry matter basis (reserved; not for manual entry)
  property true value 0.994068
    allocation property applied in "true value" allocation // value calculated from revenue
  properties: wet mass 1 kg, carbon content, fossil 0, dry mass 1 kg, carbon content, non-fossil 0, water content 0, water in wet mass 0 kg, carbon allocation 0 kg
- iron scrap, sorted, pressed: 0 kg; By-product classification Recyclable; CPC 39310: Slag, dross, scalings and other waste from the manufacture of iron or steel; pedigree (1,1,1,1,1)
  Iron scrap recovered from this waste.
  production volume 98455.4 kg
  property price 0.175 EUR2005
    Temporary price data. Calculated as 90% of purchasers price based on: 2005 import and export prices (total trades (USD) divided by total weight (kg) in biggest economies of the world: EU27, USA, Brasil, China, India, Japan and Russia) from UN Commodity Trade Statistics Database (http://data.un.org/Explorer.aspxDatabase [Accessed 2011.06.20]). Commodity: Waste or scrap, of cast iron
  property carbon content 0
    carbon content on a dry matter basis (reserved; not for manual entry)
  property true value 0.366223
    allocation property applied in "true value" allocation // value calculated from revenue
  properties: water content 0, water in wet mass 0 kg, carbon content, fossil 0, dry mass 1 kg, carbon content, non-fossil 0, wet mass 1 kg, carbon allocation 0 kg
- iron scrap, unsorted: 0 kg; source European Aluminium Association 2008; CPC 39310: Slag, dross, scalings and other waste from the manufacture of iron or steel; By-product classification Recyclable; pedigree (1,1,1,1,1)
  production volume 76.3929 kg
  property price 0.149 EUR2005; name ironScrapAmount_price_EUR2005
    Temporary price data. Calculated as 90% of purchasers price based on: estimated at 85% of sorted scrap
  property carbon content 0
    carbon content on a dry matter basis (reserved; not for manual entry)
  property true value 0.000496317
    allocation property applied in "true value" allocation // value calculated from revenue
  properties: water in wet mass 0 kg, water content 0, carbon content, fossil 0, carbon content, non-fossil 0, dry mass 1 kg, wet mass 1 kg, carbon allocation 0 kg
- aluminium oxide, non-metallurgical: 0 kg; source European Aluminium Association 2008; CPC 41432: Alumina (aluminium oxide), except artificial corundum; By-product classification allocatable product; CAS 1344-28-1; pedigree (1,1,1,1,1)
  production volume 4807.12 kg
  property carbon content, non-fossil 0; name C_content_non_fossil
  property price 0.28 EUR2005; name Al2O3Amount_price_EUR2005
    From UN trade database. http://data.un.org/ Import data from the largest economies of the world are used (Brazil, India, USA, China, Japan and EU-27).
  property dry mass 1 kg; name DM
  property water content 0; name water_content
  property wet mass 1 kg; name WM
  property water in wet mass 0 kg; name WWM
  property carbon content, fossil 0; name C_content_fossil
  property carbon content 0
    carbon content on a dry matter basis (reserved; not for manual entry)
  property true value 0.0586898
    allocation property applied in "true value" allocation // value calculated from revenue
  properties: carbon allocation 0 kg
- aluminium, cast alloy: 0 kg; source European Aluminium Association 2008; By-product classification allocatable product; CPC 41431: Unwrought aluminium; pedigree (1,1,1,1,1)
  EcoSpold01Location=RER
  production volume 44935.9 kg
  property price 1.3 EUR2005; name castAlloyAmount_price_EUR2005
    Temporary price data. Calculated as 90% of purchasers price based on: Source: London Metal Exchange, Aluminium alloy price for 2005
  property carbon content 0
    carbon content on a dry matter basis (reserved; not for manual entry)
  property true value 2.54716
    allocation property applied in "true value" allocation // value calculated from revenue
  properties: water in wet mass 0 kg, carbon content, non-fossil 0, water content 0, dry mass 1 kg, carbon content, fossil 0, wet mass 1 kg, carbon allocation 0 kg
- aluminium, wrought alloy: 0 kg; source European Aluminium Association 2008; By-product classification allocatable product; CPC 4153: Semi-finished products of aluminium or aluminium alloys; pedigree (1,1,1,1,1)
  production volume 19672.1 kg
  property price 1.44 EUR2005; name secondaryAluminiumOutput_price_EUR2005
  properties: wet mass 1 kg, water content 0, carbon content, fossil 0, water in wet mass 0 kg, carbon content, non-fossil 0, dry mass 1 kg, carbon content 0, carbon allocation 0 kg, true value 1.23519

## Inputs from technosphere
- waste polystyrene isolation, flame-retardant: 0 kg; pedigree (1,1,1,1,1)
  Insulation for the water storage
  production volume 0 kg
    Calculated from production volume of reference product using the relative outputs.
  properties: water content 0.00199232, carbon content, fossil 0.918145, wet mass 1 kg, dry mass 0.998012 kg
  note on carbon content, fossil: Polystyrene isolation (EPS) is flame-retarded with hexa-bromo-cyclo-dodecan (C12H18Br6) and contains 0.67 w% bromine (ecoinvent v2.2 report 13_I, pg 39). The rest is polystyrene: (C8H8)n.
- scrap copper: 0 kg; pedigree (1,1,1,1,1)
  disposal for copper
  production volume 0 kg
    Calculated from production volume of reference product using the relative outputs.
  properties: wet mass 1 kg, dry mass 1 kg
- stone wool: 265.697 kg; source KWB 2011; lognormal variance with pedigree 0.0352, pedigree (1,5,4,5,1)
  calculated value - summa of rock wool for the insulation of the chimney flue pipes (42 kg: 9m height, 35 cm diameter, thickness rockwool 3cm) and rockwool inside the furnace (224 kg = 1722 dm3 * 0.13 kg/m3)
  EcoSpold01Location=CH
  properties: carbon content, fossil 0.015401, wet mass 1 kg, dry mass 1 kg
  note on carbon content, fossil: The chemical composition of the glass fibres used in the rock wool production is similar to the composition of naturally cooled volcano basalt and has a composition listed in Tab. 3.1 and 3.2 in ecoinvent v2.2 report 16, part XIV. Rock wool contains: a minimum of 96% mineral fibres,between 0.5 and 3.0 weight percent of phenolic resin depending on the specific product characteristics, and about 0.2 percent mineral oil (ecoinvent v2.2 report 16, part XIV). An average composition of 1.8% phenolic resin, 0.2% mineral oil, and 98% mineral fibres has been assumed and used to calculate C content of the rock wool
- inert waste, for final disposal: -685.217 kg; lognormal variance with pedigree 0.0186, pedigree (1,5,4,5,1)
  EcoSpold01Location=CH
  disposal of the refractory bricks
  production volume 7.86636e6 kg; = Ref('ae712f48-5deb-4ec9-a3c2-6c4c438c7074')* Ref('342edaad-68da-4ea3-a2f0-783deaca35f7', 'ProductionVolume')
    Calculated from production volume of reference product using the relative outputs.
  properties: water content 0.00502513, dry mass 0.995 kg, wet mass 1 kg, lifetime 20 year
- concrete, normal: 0 m3; source KWB 2011; pedigree (1,1,1,1,1)
  calculated value - basing on the silo dimensions (from furnace manual) the amount of concrete was calculated (0.69 m3 for the basement + 16.20 m3 for the silo). [thickness of the walls of the silo: 20 cm]
  EcoSpold01Location=CH
  properties: dry mass 2190 kg, water content 0.086758, wet mass 2380 kg
- aluminium, wrought alloy: 9.48916 kg; source KWB 2011; lognormal variance with pedigree 0.0432, pedigree (4,5,4,5,1)
  estimation
  EcoSpold01Location=RER
  properties: dry mass 1 kg, wet mass 1 kg
- waste concrete: 0 kg; pedigree (1,1,1,1,1)
  EcoSpold01Location=CH
  disposal of the concrete for the furnace basement and for the pellet silo - around 16.90 m3 of concrete * 2350 kg/m3 (concrete density) = 39677 kg
  production volume 0 kg
    Calculated from production volume of reference product using the relative outputs.
  properties: water content 1, wet mass 1 kg, dry mass 0.5 kg, lifetime 20 year
- waste mineral wool, for final disposal: 0 kg; pedigree (1,1,1,1,1)
  EcoSpold01Location=CH
  disposal of insulation material
  production volume 0 kg
    Calculated from production volume of reference product using the relative outputs.
  properties: wet mass 1 kg, dry mass 1 kg, lifetime 20 year
- steel, chromium steel 18/8, hot rolled: 29.9658 kg; source KWB 2011; lognormal variance with pedigree 0.0432, pedigree (4,5,4,5,1)
  estimation
  EcoSpold01Location=RER
  properties: dry mass 1 kg, wet mass 1 kg, carbon content, fossil 0.0008
  note on carbon content, fossil: Stainless steel model is the grade 304 steel (18/8 stainless, 18% chromium 8% nickel; max. 0.08% C)
- refractory, fireclay, packed: 685.217 kg; source KWB 2011; lognormal variance with pedigree 0.0432, pedigree (4,5,4,5,1)
  EcoSpold01Location=DE
  Estimation - refractory bricks in fireclay are used in the combustion chamber inside the furnace, cilindric shaped for a circular and more efficient combustion
  properties: wet mass 1 kg, dry mass 1 kg
- copper: 4.49487 kg; source KWB 2011; lognormal variance with pedigree 0.0432, pedigree (4,5,4,5,1)
  estimation
  EcoSpold01Location=RER
  properties: dry mass 1 kg, wet mass 1 kg
- heat, central or small-scale, other than natural gas: 0 MJ; source KWB 2011; pedigree (1,1,1,1,1)
  estimation - data comes from a comparison between old dataset value and communication with KWB producer (total annual heating value in factory/production)
  EcoSpold01Location=CH
- electronics, for control units: 3.99544 kg; source KWB 2011; lognormal variance with pedigree 0.0432, pedigree (4,5,4,5,1)
  EcoSpold01Location=RER
  estimation
  properties: wet mass 1 kg, dry mass 1 kg, carbon content, non-fossil 0.00013442, carbon content, fossil 0.337146
  note on carbon content, non-fossil: The control unit has a composition of 46% steel (housing), 32% plastics, 14% printed wiring boards and 8% cables (various types).;
- scrap aluminium: 0 kg; pedigree (1,1,1,1,1)
  EcoSpold01Location=CH
  components of the furnace
  production volume 0 kg
    Calculated from production volume of reference product using the relative outputs.
  properties: dry mass 1 kg, wet mass 1 kg, lifetime 20 year
- electronics scrap from control units: -3.99544 kg; lognormal variance with pedigree 0.0186, pedigree (1,5,4,5,1)
  electronic parts of the furnace
  EcoSpold01Location=RER
  production volume 45868 kg; = Ref('342edaad-68da-4ea3-a2f0-783deaca35f7', 'ProductionVolume')* (Ref('8023ef6a-33bf-4f4a-a6f5-76fad14211ba')*-1)
    Calculated from production volume of reference product using the relative outputs.
  properties: dry mass 1 kg, wet mass 1 kg, lifetime 20 year, carbon content, non-fossil 0.00013442, carbon content, fossil 0.337146
- alkyd paint, white, without solvent, in 60% solution state: 3.49601 kg; source KWB 2011; lognormal variance with pedigree 0.0352, pedigree (1,5,4,5,1)
  EcoSpold01Location=RER
  estimation
  properties: dry mass 1 kg, carbon content, non-fossil 0.199629, carbon content, fossil 0.140367, wet mass 1 kg
  note on carbon content, non-fossil: C content was calculated as an addition of C content in the raw materials.
- waste polyethylene: 0 kg; pedigree (1,1,1,1,1)
  EcoSpold01Location=CH
  plastics materials
  production volume 0 kg
    Calculated from production volume of reference product using the relative outputs.
  properties: water content 0.00401606, dry mass 0.996 kg, wet mass 1 kg, lifetime 20 year, carbon content, fossil 0.825301
  note on carbon content, fossil: C content in 1 kg DM was calculated using data in Tab A.1, ecoinvent v2.2 report 13_I
- polystyrene foam slab: 51.9407 kg; source KWB 2011; lognormal variance with pedigree 0.0358, pedigree (2,5,4,5,1)
  calculated value - 1719 dm3 (calculated value for insulation a tank 180*288 cm) * 0.03 kg/dm3 (specific weight polystyrene foam slab)
  EcoSpold01Location=RER
  properties: wet mass 1 kg, dry mass 1 kg, carbon content, fossil 0.859091
  note on carbon content, fossil: XPS consists in 91% of polystyrene, 7% of blowing agent and the re-maining 2% are flame retardants (bromine compounds) and other additives (ecoinvent v2.2 report 7, part XIV, pg69). The chemical formula of polystyrene is (C8H8)n. Here, the blowing agent is CO2.
- scrap steel: 0 kg; pedigree (1,1,1,1,1)
  disposal of steel low-alloyed and chromium steel, summa from inputs (body of the furnace, water storage, feeding system, chimney flue pipes, stainless steel components)
  EcoSpold01Location=CH
  production volume 0 kg
    Calculated from production volume of reference product using the relative outputs.
  properties: dry mass 1 kg, wet mass 1 kg, lifetime 20 year
- waste mineral oil: 0 kg; pedigree (1,1,1,1,1)
  disposal of lubricating oil
  production volume 0 kg
    Calculated from production volume of reference product using the relative outputs.
  properties: carbon content, fossil 0.864444, dry mass 0.9 kg, water content 0.111111, wet mass 1 kg
  note on carbon content, fossil: Tab A.6, ecoinvent v2.2 report 13_I. C content has been calculated after data in the tables, and then referred to 1 kg DM
- electricity, low voltage: 0 kWh; source KWB 2011; pedigree (1,1,1,1,1)
  Estimation - data derives from comparison between old dataset value, energy required for steel manufacturing (similar weight device) and suggestions from KWB technician
  EcoSpold01Location=CH
- polyethylene, high density, granulate: 5.49373 kg; source KWB 2011; lognormal variance with pedigree 0.0358, pedigree (2,5,4,5,1)
  estimation
  EcoSpold01Location=RER
  properties: carbon content, fossil 0.857143, wet mass 1 kg, dry mass 1 kg
  note on carbon content, fossil: Polyethylene is formed out of a huge amount of ethylene monomers (C2H4) (ecoinvent v2.2 report 11_II). MW=28 g/mol
- lubricating oil: 2.99658 kg; source KWB 2011; lognormal variance with pedigree 0.1724, pedigree (5,5,5,5,1)
  EcoSpold01Location=RER
  estimation - used for furnace manufacturing and for maintenance
  properties: wet mass 1 kg, dry mass 1 kg, carbon content, fossil 0.75
  note on carbon content, fossil: Lubricating oil is produced from diesel. C-content/dry mass of fats and oils considered 75%, from: ecoinvent v2.2 report, n 15a, pg 40
- steel, low-alloyed, hot rolled: 2886.7 kg; source KWB 2011; lognormal variance with pedigree 0.0352, pedigree (1,5,4,5,1)
  EcoSpold01Location=RER
  Calculated value - calculated with the difference of the total weight of the device with the summa of the weight of all the other materials (also based on qualified technician suggestions)
  properties: carbon content, fossil 0.005, wet mass 1 kg, dry mass 1 kg
  note on carbon content, fossil: Low alloyed steel composition given in Tab. 3.2 ecoinvent v2.2 report 10_partII. Steel assumed to have a C content of 0.5%
- sheet rolling, steel: 183.79 kg; source KWB 2011; lognormal variance with pedigree 0.0352, pedigree (1,5,4,5,1)
  EcoSpold01Location=RER
  estimation
- waste polystyrene isolation, flame-retardant: -14.6927, -37.248 kg (2 entries); lognormal variance with pedigree 0.0186, pedigree (1,5,4,5,1)
  Insulation for the water storage
  production volume 596284 kg
- scrap copper: -1.44735, -3.04752 kg (2 entries); lognormal variance with pedigree 0.0186, pedigree (1,5,4,5,1)
  disposal for copper
  production volume 51601.5 kg
- concrete, normal: 0.387582, 0.0403855, 0.326949, 0.183909, 0.778802, 0.0262685, 15.1368 m3 (7 entries); source KWB 2011; lognormal variance with pedigree 0.0352, pedigree (1,5,4,5,1)
  (same comment as for concrete, normal)
- waste concrete: -2707.91, -36913.8 kg (2 entries); lognormal variance with pedigree 0.0186, pedigree (1,5,4,5,1)
  (same comment as for waste concrete)
  production volume 4.5486e8 kg
- waste mineral wool, for final disposal: -114.447, -151.249 kg (2 entries); lognormal variance with pedigree 0.0186, pedigree (1,5,4,5,1)
  EcoSpold01Location=CH
  disposal of insulation material
  production volume 3.05022e6 kg
- heat, central or small-scale, other than natural gas: 38.0067, 2658.91 MJ (2 entries); source KWB 2011; lognormal variance with pedigree 0.1344, pedigree (3,5,5,5,1)
  (same comment as for heat, central or small-scale, other than natural gas)
- scrap aluminium: -3.05551, -6.43365 kg (2 entries); lognormal variance with pedigree 0.0186, pedigree (1,5,4,5,1)
  EcoSpold01Location=CH
  components of the furnace
  production volume 108936 kg
- waste polyethylene: -0.611132, -0.0408335, -0.00308817, -0.0168657, -0.00681355, -0.0160156, -0.520713, -4.27826 kg (8 entries); lognormal variance with pedigree 0.0186, pedigree (1,5,4,5,1)
  EcoSpold01Location=CH
  plastics materials
  production volume 63068.5 kg
- scrap steel: -710.414, -2206.26 kg (2 entries); lognormal variance with pedigree 0.0186, pedigree (1,5,4,5,1)
  (same comment as for scrap steel)
  production volume 3.34836e7 kg
- waste mineral oil: -0.753807, -2.24277 kg (2 entries); lognormal variance with pedigree 0.0186, pedigree (1,5,4,5,1)
  disposal of lubricating oil
  production volume 34401 kg
- electricity, low voltage: 14.196, 2.48979, 56.4686, 202.454, 40.9422, 619.165, 102.058, 290.709 kWh (8 entries); source KWB 2011; lognormal variance with pedigree 0.1344, pedigree (3,5,5,5,1)
  (same comment as for electricity, low voltage)

## Inputs from nature
- Occupation, industrial area [natural resource, land]: 1498.29 m2*year; = land_use*20; source KWB 2011; lognormal variance with pedigree 0.0752, pedigree (4,5,5,5,1)
  calculated value - (transformation * lifetime of the furnace) [lifetime of the furnace: 20 years]
  Uncertainty: basic uncertainty:2;
- Transformation, from unspecified [natural resource, land]: 74.9144 m2; name land_use; source KWB 2011; lognormal variance with pedigree 0.0752, pedigree (4,5,5,5,1)
  calculated value - calculated area necessary for the furnace installation based on specific picture in the furnace manual
  Uncertainty: basic uncertainty:2;
- Transformation, to industrial area [natural resource, land]: 74.9144 m2; source KWB 2011; lognormal variance with pedigree 0.0752, pedigree (4,5,5,5,1)
  (same comment as for Transformation, from unspecified)

## Sampling procedure
literature, furnace manual available for customers, investigation and personal communication from producer and technician

## Extrapolations
extrapolated from Austrian data

## Review by Bo Weidema 2012-01-25
As an exception, this dataset has only been reviewed by one reviewer. As an infraqstructure dataset, this exception is reasonable.

## Review by Bo Weidema 2012-01-25
Passed. Documentation adequate, inputs relevant, mass balance correct, and correct handling of capacity utilisation.
