# treatment of brake wear emissions, lorry

Dataset: EcoSpold 2, unit process
Geography: RoW
Time period: 2009-01-01 to 2019-12-31
Technology level: current
Classification: ISIC rev.4 ecoinvent: 3821:Treatment and disposal of non-hazardous waste
Scenario: Business-as-Usual
System model: Allocation at the point of substitution
Generated by: Andrew Simons
Published in: Ntziachristos L., Paul P. 2009
Database: ecoinvent
isCopyrightProtected: true
accessRestrictedTo: 1

## General comment
This dataset represents the treatment of non-exhaust emissions produced by brake abrasion from road freight transport. The datasets are treatments because they represent a removal of substances from the technosphere (removal of tyre material).

This dataset and the emission factors within it relate to 1kg brake wear. It is valid for Europe and represents the average data for road freight transport.

Calculation of non-exhaust emissions (tyre, brake and road wear emissions) are based on EMEP/EEA (2013) and values for net vehicle weights and average load factors. Net vehicle weights are taken from the EcoTransIT (2011) report whilst the average load factors are taken from the Tremove model v2.7b (2009) and EcoTransIT (2011) report.

The brake wear emissions are to air only. All particulates are accounted for as emissions to air and have particle sizes below 100um. Anything above this does not remain airborne over longer periods.

It must be noted that elementary and organic carbon, substances very dominant in the emissions profile from brake wear are currently not available in the ecoinvent database and are therfore not accounted for in this datase other than their representation as unspecified particulate emissions. This means that although the datasets represent 1kg of brake wear the emissions do not sum up to 1kg.

In order to use the treatment of non-exhaust emissions in a transport dataset the quantity of emissions per tkm must be calculated. This must then be devided by the specific load factor of the transport in question.Non-exhaust emissions are considered to be linearly scalable to gross vehicle weight (GVW). For brake wear emissions from lorries the specific quantity is 8.13E-9 kg/kg GVW*km.

Main data sources:

De Ceuster, G., et al. (2009) TREMOVE: Final Report. Model code v2.7b, 2009. European Commission, Brussels, BE.

Knörr, W. et al. (2011) Ecological Transport Information Tool for Worldwide Transports (EcoTransIT): Methodology and data update. Berlin, Hannover, Heidelberg, DE.

Ntziachristos, L., Boulter, P. (2013) EMEP/EEA air pollutant emissions inventory guidebook 2009: Road vehicle tyre and brake wear; Road surface wear. European Environment Agency, Copenhagen, DK.

## Included activities start
The activity starts with the friction of lorry brakes

## Included activities end
The activity ends with emissions of lorry brake wear

## Reference product
- brake wear emissions, lorry: -1 kg; source Ntziachristos, L. 2013; By-product classification Waste; CPC 49129: Other parts and accessories n.e.c. of motor vehicles (including brakes, gear boxes, axles, road wheels, suspen[…]
  Road freight specific non-exhaust emissions.
  This dataset and the emission factors within it relate to 1kg of brake wear. In order to use the treatment of non-exhaust emissions in a transport dataset the quantity of emissions per km must be calculated. This must then be devided by the specific load factor of the transport in question. Non-exhaust emissions are considered to be linearly scalable to gross vehicle weight (GVW). For brake wear emissions from lorries the specific quantity is 8.13E-9 kg/kg GVW*km.
  production volume 1.18836e8 kg; = 4.83e7*(1/0.289)
    Extrapolation from annual production volume in RER.
    Value of truck tyre wear emissions for RER in 2010 taken as a basis and extrapolated to the GLO using the scaling factors of the UN according to GDP. Scaling factors provided centrally by ecoinvent.
  property price 0 EUR2005
    Waste products are assigned a price of zero as they are assumed to require further treatment.
  property carbon content, fossil 0.149
    fossil carbon content on a dry matter basis. Represents the total organic carbon emissions to air, water and soil.
  property carbon content 0.149
    carbon content on a dry matter basis (reserved; not for manual entry)
  properties: dry mass 1 kg, wet mass 1 kg, carbon content, non-fossil 0, carbon allocation 0.149 kg

## Emissions to nature
All rows: source Ntziachristos, L. 2013; lognormal variance with pedigree 0.0419, pedigree (2,2,5,4,1)
- Copper [air, unspecified]: 0.071 kg
  Calculated value. Derived from EMEP/EEA (2013) and based on an average gross vehicle weight (GVW) of all truck categories and load factors.
- Particulates, < 2.5 um [air, unspecified]: 0.39 kg
  (same comment as for Copper)
- Iron [air, unspecified]: 0.291 kg
  (same comment as for Copper)
- Vanadium [air, unspecified]: 0.000917 kg
  (same comment as for Copper)
- Chromium [air, unspecified]: 8.89e-6 kg
  (same comment as for Copper)
- Arsenic [air, unspecified]: 9.38e-5 kg
  (same comment as for Copper)
- Strontium [air, unspecified]: 0.000722 kg
  (same comment as for Copper)
- Barium [air, unspecified]: 0.0535 kg
  (same comment as for Copper)
- Sodium [air, unspecified]: 0.0108 kg
  (same comment as for Copper)
- Chlorine [air, unspecified]: 0.00208 kg
  (same comment as for Copper)
- Particulates, > 2.5 um, and < 10um [air, unspecified]: 0.59 kg
  (same comment as for Copper)
- Sulfur dioxide [air, unspecified]: 0.0356 kg
  (same comment as for Copper)
- Cadmium [air, unspecified]: 3.11e-5 kg
  (same comment as for Copper)
- Titanium [air, unspecified]: 0.005 kg
  (same comment as for Copper)
- Particulates, > 10 um [air, unspecified]: 0.02 kg
  (same comment as for Copper)
- Bromine [air, unspecified]: 5.56e-5 kg
  (same comment as for Copper)
- Aluminium [air, unspecified]: 0.00285 kg
  (same comment as for Copper)
- Nickel [air, unspecified]: 0.000454 kg
  (same comment as for Copper)
- Antimony [air, unspecified]: 0.139 kg
  (same comment as for Copper)
- Zinc [air, unspecified]: 0.0121 kg
  (same comment as for Copper)
- Sulfate [air, unspecified]: 0.0464 kg
  (same comment as for Copper)
- Calcium [air, unspecified]: 0.0107 kg
  (same comment as for Copper)
- Tin [air, unspecified]: 0.00972 kg
  (same comment as for Copper)
- Lead [air, unspecified]: 0.00843 kg
  (same comment as for Copper)
- Nitrate [air, unspecified]: 0.00222 kg
  (same comment as for Copper)
- PAH, polycyclic aromatic hydrocarbons [air, unspecified]: 2.47e-6 kg
  (same comment as for Copper)
- Cobalt [air, unspecified]: 8.89e-6 kg
  (same comment as for Copper)
- Silicon [air, unspecified]: 0.0943 kg
  (same comment as for Copper)
- Molybdenum [air, unspecified]: 0.0139 kg
  (same comment as for Copper)
- Potassium [air, unspecified]: 0.000727 kg
  (same comment as for Copper)
- Selenium [air, unspecified]: 2.78e-5 kg
  (same comment as for Copper)
- Manganese [air, unspecified]: 0.00342 kg
  (same comment as for Copper)

## Sampling procedure
Literature

## Extrapolations
Currently copied 1-to-1 from the same datasets for RER, with changes to uncertainties (Geography) and annual production volumes only.
