# treatment of sulfidic tailings, from copper mine operation, tailings impoundment

Dataset: EcoSpold 2, unit process
Geography: US
Time period: 2015-01-01 to 2019-12-31
Technology level: current
Classification: ISIC rev.4 ecoinvent: 3822:Treatment and disposal of hazardous waste
Synonyms: tails; tailing; pond; sulphidic
Scenario: Business-as-Usual
System model: Allocation at the point of substitution
Share of production covered: 80 %
Generated by: David Turner
Database: ecoinvent
isCopyrightProtected: true
accessRestrictedTo: 1

## General comment
This dataset represents the activity of waste disposal of sulfidic tailings, from copper mine operation in a tailings impoundment in the United States.
Background: Tailings, a waste material produced during mineral concentration (beneficiation), often contain significant quantities of mobile toxic metals and are typically produced in large quantities. To manage these wastes, tailings are commonly stored behind dammed impoundments, known as tailings ponds. These ponds pose a significant long-term pollution risk as metals may leach out into the surrounding environment, potentially over very long timeframes.
Modelling approach: This dataset was produced using a model developed specifically for assessing the long-term emissions of tailings disposal (see Doka, 2017). The tailings disposal model is based on the modelling framework applied in existing landfill process models used in ecoinvent and is based on a top-down approach. Literature data on measurements of deposited tailings compositions (solids) and measured current concentrations in leachate (liquid) form the basis of the model and are used to characterise pollutant mobility and calculate the currently occurring rate of emissions of the landfill. Heeding chief parameters, such as hydrology, pH development and elemental chemistry, these emissions are then projected into the future. Tailings composition is based on the typical composition of tailings at copper mine sites worldwide; i.e. composition is not region-specific. Land use was calculated following the approach described by Doka (2008). Based on an assumed generic final height of a tailings impoundment of 60 m and an assumed tailings density of 2200 kg/m3, a land area of 7.58E-06 m2 is required per kilogram of sulfidic tailings. The land is assumed to be converted from unknown origin to a disposal site. After an operational phase of 30 years, spontaneous restoration of a consolidated state is assumed to be reached after one hundred years. The total occupation time is therefore 130 years and the land occupation per kilogram tailings is 9.85E-04 m2.
Waste composition (wet, in ppm): H2O 300000; O 622290; H na; C 6145; S 289.86; N 5.0454; P 212.27; B 54.583; Cl 102.61; Br 0.22894; F 772.88; I na; Ag 8.304; As 46.473; Ba 335.12; Cd 3.6523; Co 13.907; Cr 60.142; Cu 876.83; Hg 0.24258; Mn 158.19; Mo 12.151; Ni 19.339; Pb 133.55; Sb 28.698; Se 3.3486; Sn 28.153; V 136.61; Zn 182.34; Be 1.6625; Sc 13.352; Sr 90.588; Ti 229.49; Tl 8.6074; W 9.7967; Si 38694; Fe 10340; Ca 3158.3; Al 11031; K 1832.5; Mg 1606.1; Na 1060.3. // Share of carbon in waste that is biogenic 0%.
Activity extent: The dataset includes all potential emissions to the environment and land use changes. Input exchanges of infrastructure, materials, energy, and water are not included here but are accounted for in the activity, copper mine operation.
References
Doka, G. (2008). Life Cycle Inventory data of mining waste: Emissions from sulfidic tailings disposal. Zürich, Switzerland: Doka Life Cycle Assessments.
Doka, G. (2017). A model for waste-specific and climate-specific life cycle inventories of tailings impoundments. Zürich, Switzerland: Doka Life Cycle Assessments.

## Included activities start
The activity starts at the point of waste deposition in the impoundment. All upstream activities, including the pumping of tailings to the site, any dewatering or treatment, or other transport-related activities are excluded.

## Included activities end
Waste-specific short- and long-term emissions to the environment via impoundment leachate; land transformation and occupation. Note that the structural integrity of the site is assumed to be unwavering during the entie modelled time horizon; i.e. accidental releases of leachate (due to impoundment failure) are not considered.

## Geography
Given name of site is 'Copper deposits; United States'. Impoundment site with mean annual temperature (MAT) of 11.0325660199246 degC, mean annual precipitation (MAP) of 528.035447622682 mm/year, mean annual actual evaporation (EAT) of 307.912553007684 mm/year, and net infiltration of 374.07917111884 mm/year (using half of natural surface evapotranspiration).

## Technology
This is an inventory for an impoundment of copper ore beneficiation tailings waste. The following assumptions were made concerning technology: final impoundment height is 60 meters; operation phase duration is 30 years; and impoundment leachates are released into the environment untreated.

## Time period
'Data on average composition of tailings and tailings-derived leachates from literature sources published between 1994 and 2017 (mean publication date: 2009±6). Mean annual temperature and precipitation data for 1970-2000 (source: Fick and Hijmans, 2017); mean annual evapotranspiration for 1950-2000 (source: Fekete et al., 2002). Production volume based on world mine production data from the USGS Minerals Yearbook 2015. Transfer coefficients from prospective, tailings-specific model.
References:
Fekete, B. M., Vorosmarty, C. J. & Grabs, W. (2002). High-resolution fields of global runoff combining observed river discharge and simulated water balances. Global Biogeochemical Cycles, 16, 15-1 - 15-10.
Fick, S. E. & Hijmans, R. J. (2017). Worldclim 2: New 1-km spatial resolution climate surfaces for global land areas. International Journal of Climatology, 37, 4302-4315.'

## Reference product
- sulfidic tailings, from copper mine operation: -1 kg; By-product classification Waste
  main reference product of this activity (supply of disposal service).
  production volume 1.27e11 kg
    Estimate of the national tailings production volume from the mining and concentration of sulfidic copper ores, based on national mine production of copper from sulfide mineral deposits (kg) multiplied by estimated tailings generation rate per kg copper concentrate produced (160 kg per kg copper concentrate).
  property price 0 EUR2005
    Waste products are assigned a price of zero as they are assumed to require further treatment.
  property carbon content 0.0087785
    carbon content on a dry matter basis (reserved; not for manual entry)
  properties: cadmium content 5.2176e-6, strontium content 0.00012941, nickel content 2.7626e-5, molybdenum content 1.7358e-5, vanadium content 0.00019515, chromium content 8.5917e-5, iron content 0.014771, barium content 0.00047874, mercury content 3.4654e-7, thallium content 1.2296e-5, sodium content 0.0015148, aluminium content 0.015758, arsenic content 6.639e-5, antimony content 4.0998e-5, carbon content, fossil 0.0087785, manganese content 0.00022598, silicon content 0.055278, potassium content 0.0026178, tin content 4.0219e-5, selenium content 4.7837e-6, cobalt content 1.9866e-5, dry mass 0.7 kg, calcium content 0.0045119, silver content 1.1863e-5, nitrogen content 7.2076e-6, lead content 0.00019078, scandium content 1.9074e-5, titanium content 0.00032784, beryllium content 2.375e-6, phosphorus content 0.00030324, chlorine content 0.00014659, wet mass 1 kg, boron content 7.7976e-5, carbon content, non-fossil 0, tungsten content 1.3995e-5, oxygen content 0.88899, sulfur content 0.00041409, fluorine content 0.0011041, bromine content 3.2706e-7, copper content 0.0012526, water in wet mass 0.3 kg, magnesium content 0.0022944, zinc content 0.00026049, water content 0.42857, carbon allocation 0.00614495 kg

## Emissions to nature
- Molybdenum [water, ground-, long-term]: 5.7992e-6 kg; lognormal variance with pedigree 0.34449, pedigree (1,1,1,1,1)
  Emissions from long-term leachate (>100a) directly from tailings impoundment.
  Uncertainty: U
- Barium [water, ground-]: 1.657e-9 kg; lognormal variance with pedigree 0.53841, pedigree (1,1,1,1,1)
  burden from short-term leachate to groundwater in uncontrolled impoundment in moist cimate.
  Uncertainty: U
- Manganese [water, ground-, long-term]: 0.00015729 kg; lognormal variance with pedigree 0.22525, pedigree (1,1,1,1,1)
  (same comment as for Molybdenum)
- Zinc, ion [water, ground-, long-term]: 0.00018168 kg; lognormal variance with pedigree 0.22053, pedigree (1,1,1,1,1)
  (same comment as for Molybdenum)
- Antimony [water, ground-, long-term]: 7.0184e-7 kg; lognormal variance with pedigree 1.1427, pedigree (1,1,1,1,1)
  (same comment as for Molybdenum)
- Mercury [water, ground-]: 1.8855e-10 kg; lognormal variance with pedigree 0.60927, pedigree (1,1,1,1,1)
  (same comment as for Barium)
- Vanadium, ion [water, ground-, long-term]: 1.9443e-7 kg; lognormal variance with pedigree 2.9155, pedigree (1,1,1,1,1)
  (same comment as for Molybdenum)
- Antimony [water, ground-]: 9.8079e-9 kg; lognormal variance with pedigree 0.48034, pedigree (1,1,1,1,1)
  (same comment as for Barium)
- Mercury [water, ground-, long-term]: 2.4239e-7 kg; lognormal variance with pedigree 0.43787, pedigree (1,1,1,1,1)
  (same comment as for Molybdenum)
- Zinc, ion [water, ground-]: 6.6345e-7 kg; lognormal variance with pedigree 0.34254, pedigree (1,1,1,1,1)
  (same comment as for Barium)
- Aluminium [water, ground-]: 6.0975e-6 kg; lognormal variance with pedigree 0.27145, pedigree (1,1,1,1,1)
  (same comment as for Barium)
- Magnesium [water, ground-]: 2.354e-5 kg; lognormal variance with pedigree 0.22894, pedigree (1,1,1,1,1)
  (same comment as for Barium)
- Vanadium, ion [water, ground-]: 2.6852e-9 kg; lognormal variance with pedigree 0.52283, pedigree (1,1,1,1,1)
  (same comment as for Barium)
- Nitrate [water, ground-]: 5.6495e-6 kg; lognormal variance with pedigree 0.34876, pedigree (1,1,1,1,1)
  (same comment as for Barium)
- Manganese [water, ground-]: 8.9878e-7 kg; lognormal variance with pedigree 0.33345, pedigree (1,1,1,1,1)
  (same comment as for Barium)
- Tungsten [water, ground-, long-term]: 1.1574e-6 kg; lognormal variance with pedigree 0.60267, pedigree (1,1,1,1,1)
  (same comment as for Molybdenum)
- Nitrate [water, ground-, long-term]: 1.2692e-5 kg; lognormal variance with pedigree 0.34063, pedigree (1,1,1,1,1)
  (same comment as for Molybdenum)
- Magnesium [water, ground-, long-term]: 0.0015825 kg; lognormal variance with pedigree 0.14903, pedigree (1,1,1,1,1)
  (same comment as for Molybdenum)
- Tungsten [water, ground-]: 1.7015e-8 kg; lognormal variance with pedigree 0.46308, pedigree (1,1,1,1,1)
  (same comment as for Barium)
- Aluminium [water, ground-, long-term]: 0.011025 kg; lognormal variance with pedigree 0.088925, pedigree (1,1,1,1,1)
  (same comment as for Molybdenum)
- Lead [water, ground-, long-term]: 0.00013354 kg; lognormal variance with pedigree 0.23088, pedigree (1,1,1,1,1)
  (same comment as for Molybdenum)
- Transformation, from unspecified [natural resource, land]: 7.5758e-6 m2; lognormal variance with pedigree 0.030596, pedigree (1,1,1,1,1)
  conversion of impoundment area.
  Uncertainty: U
- Ammonium, ion [water, ground-, long-term]: 8.0407e-7 kg; lognormal variance with pedigree 0.34063, pedigree (1,1,1,1,1)
  (same comment as for Molybdenum)
- Lead [water, ground-]: 1.2282e-8 kg; lognormal variance with pedigree 0.47254, pedigree (1,1,1,1,1)
  (same comment as for Barium)
- Transformation, to dump site [natural resource, land]: 7.5758e-6 m2; lognormal variance with pedigree 0.030596, pedigree (1,1,1,1,1)
  conversion to impoundment area.
  Uncertainty: U
- Arsenic, ion [water, ground-, long-term]: 7.1664e-7 kg; lognormal variance with pedigree 1.3539, pedigree (1,1,1,1,1)
  (same comment as for Molybdenum)
- Iron, ion [water, ground-, long-term]: 0.010336 kg; lognormal variance with pedigree 0.090851, pedigree (1,1,1,1,1)
  (same comment as for Molybdenum)
- TOC, Total Organic Carbon [water, ground-]: 8.5404e-7 kg; lognormal variance with pedigree 0.33462, pedigree (1,1,1,1,1)
  (same comment as for Barium)
- Arsenic, ion [water, ground-]: 9.9682e-9 kg; lognormal variance with pedigree 0.47967, pedigree (1,1,1,1,1)
  (same comment as for Barium)
- Iron, ion [water, ground-]: 4.1127e-6 kg; lognormal variance with pedigree 0.28417, pedigree (1,1,1,1,1)
  (same comment as for Barium)
- TOC, Total Organic Carbon [water, ground-, long-term]: 0.00051157 kg; lognormal variance with pedigree 0.49285, pedigree (1,1,1,1,1)
  (same comment as for Molybdenum)
- Ammonium, ion [water, ground-]: 3.5792e-7 kg; lognormal variance with pedigree 0.34876, pedigree (1,1,1,1,1)
  (same comment as for Barium)
- Hydrogen sulfide [water, ground-, long-term]: 4.5344e-5 kg; lognormal variance with pedigree 0.20659, pedigree (1,1,1,1,1)
  (same comment as for Molybdenum)
- Titanium, ion [water, ground-]: 7.2287e-9 kg; lognormal variance with pedigree 0.49002, pedigree (1,1,1,1,1)
  (same comment as for Barium)
- Fluoride [water, ground-, long-term]: 0.00032615 kg; lognormal variance with pedigree 0.21933, pedigree (1,1,1,1,1)
  (same comment as for Molybdenum)
- Titanium, ion [water, ground-, long-term]: 0.00022948 kg; lognormal variance with pedigree 0.21289, pedigree (1,1,1,1,1)
  (same comment as for Molybdenum)
- Hydrogen sulfide [water, ground-]: 2.6426e-5 kg; lognormal variance with pedigree 0.21199, pedigree (1,1,1,1,1)
  (same comment as for Barium)
- Tin, ion [water, ground-, long-term]: 2.8129e-5 kg; lognormal variance with pedigree 0.28267, pedigree (1,1,1,1,1)
  (same comment as for Molybdenum)
- Fluoride [water, ground-]: 7.0783e-7 kg; lognormal variance with pedigree 0.33889, pedigree (1,1,1,1,1)
  (same comment as for Barium)
- Thallium [water, ground-, long-term]: 8.606e-6 kg; lognormal variance with pedigree 0.32193, pedigree (1,1,1,1,1)
  (same comment as for Molybdenum)
- DOC, Dissolved Organic Carbon [water, ground-]: 8.5404e-7 kg; lognormal variance with pedigree 0.33462, pedigree (1,1,1,1,1)
  (same comment as for Barium)
- Tin, ion [water, ground-]: 2.4363e-8 kg; lognormal variance with pedigree 0.45058, pedigree (1,1,1,1,1)
  (same comment as for Barium)
- DOC, Dissolved Organic Carbon [water, ground-, long-term]: 0.00051157 kg; lognormal variance with pedigree 0.49285, pedigree (1,1,1,1,1)
  (same comment as for Molybdenum)
- Sulfate [water, ground-, long-term]: 0.00042137 kg; lognormal variance with pedigree 0.20659, pedigree (1,1,1,1,1)
  (same comment as for Molybdenum)
- COD, Chemical Oxygen Demand [water, ground-, long-term]: 4.6597e-5 kg; lognormal variance with pedigree 0.49285, pedigree (1,1,1,1,1)
  (same comment as for Molybdenum)
- Thallium [water, ground-]: 1.3299e-9 kg; lognormal variance with pedigree 0.54642, pedigree (1,1,1,1,1)
  (same comment as for Barium)
- Copper, ion [water, ground-, long-term]: 0.00087648 kg; lognormal variance with pedigree 0.16869, pedigree (1,1,1,1,1)
  (same comment as for Molybdenum)
- Sulfate [water, ground-]: 0.00024557 kg; lognormal variance with pedigree 0.21199, pedigree (1,1,1,1,1)
  (same comment as for Barium)
- Copper, ion [water, ground-]: 3.5154e-7 kg; lognormal variance with pedigree 0.36175, pedigree (1,1,1,1,1)
  (same comment as for Barium)
- Strontium [water, ground-]: 1.0551e-7 kg; lognormal variance with pedigree 0.40207, pedigree (1,1,1,1,1)
  (same comment as for Barium)
- COD, Chemical Oxygen Demand [water, ground-]: 7.7792e-8 kg; lognormal variance with pedigree 0.33462, pedigree (1,1,1,1,1)
  (same comment as for Barium)
- Strontium [water, ground-, long-term]: 9.0483e-5 kg; lognormal variance with pedigree 0.2438, pedigree (1,1,1,1,1)
  (same comment as for Molybdenum)
- Cobalt [water, ground-, long-term]: 1.3798e-5 kg; lognormal variance with pedigree 0.30607, pedigree (1,1,1,1,1)
  (same comment as for Molybdenum)
- Sodium, ion [water, ground-]: 8.4893e-6 kg; lognormal variance with pedigree 0.26027, pedigree (1,1,1,1,1)
  (same comment as for Barium)
- Chromium VI [water, ground-, long-term]: 5.3332e-7 kg; lognormal variance with pedigree 1.653, pedigree (1,1,1,1,1)
  (same comment as for Molybdenum)
- Sodium, ion [water, ground-, long-term]: 0.0010433 kg; lognormal variance with pedigree 0.1625, pedigree (1,1,1,1,1)
  (same comment as for Molybdenum)
- Cobalt [water, ground-]: 1.0869e-7 kg; lognormal variance with pedigree 0.40457, pedigree (1,1,1,1,1)
  (same comment as for Barium)
- Silver, ion [water, ground-, long-term]: 8.3032e-6 kg; lognormal variance with pedigree 0.32311, pedigree (1,1,1,1,1)
  (same comment as for Molybdenum)
- Chloride [water, ground-]: 1.5245e-5 kg; lognormal variance with pedigree 0.26141, pedigree (1,1,1,1,1)
  (same comment as for Barium)
- Silicon [water, ground-, long-term]: 0.00022911 kg; lognormal variance with pedigree 1.6979, pedigree (1,1,1,1,1)
  (same comment as for Molybdenum)
- Chromium VI [water, ground-]: 7.3934e-9 kg; lognormal variance with pedigree 0.48948, pedigree (1,1,1,1,1)
  (same comment as for Barium)
- Silicon [water, ground-]: 3.1618e-6 kg; lognormal variance with pedigree 0.29911, pedigree (1,1,1,1,1)
  (same comment as for Barium)
- Chloride [water, ground-, long-term]: 8.7365e-5 kg; lognormal variance with pedigree 0.24, pedigree (1,1,1,1,1)
  (same comment as for Molybdenum)
- Silver, ion [water, ground-]: 8.1209e-10 kg; lognormal variance with pedigree 0.56274, pedigree (1,1,1,1,1)
  (same comment as for Barium)
- Cadmium, ion [water, ground-, long-term]: 3.6417e-6 kg; lognormal variance with pedigree 0.35013, pedigree (1,1,1,1,1)
  (same comment as for Molybdenum)
- Selenium [water, ground-]: 2.2205e-9 kg; lognormal variance with pedigree 0.52956, pedigree (1,1,1,1,1)
  (same comment as for Barium)
- Calcium, ion [water, ground-, long-term]: 0.0031128 kg; lognormal variance with pedigree 0.12741, pedigree (1,1,1,1,1)
  (same comment as for Molybdenum)
- Selenium [water, ground-, long-term]: 1.5704e-7 kg; lognormal variance with pedigree 0.93807, pedigree (1,1,1,1,1)
  (same comment as for Molybdenum)
- Calcium, ion [water, ground-]: 4.5488e-5 kg; lognormal variance with pedigree 0.20782, pedigree (1,1,1,1,1)
  (same comment as for Barium)
- Potassium, ion [water, ground-, long-term]: 0.00028584 kg; lognormal variance with pedigree 0.36053, pedigree (1,1,1,1,1)
  (same comment as for Molybdenum)
- Cadmium, ion [water, ground-]: 1.0578e-8 kg; lognormal variance with pedigree 0.4793, pedigree (1,1,1,1,1)
  (same comment as for Barium)
- Scandium [water, ground-]: 3.3908e-8 kg; lognormal variance with pedigree 0.44074, pedigree (1,1,1,1,1)
  (same comment as for Barium)
- Boron [water, ground-, long-term]: 1.1508e-6 kg; lognormal variance with pedigree 1.1915, pedigree (1,1,1,1,1)
  (same comment as for Molybdenum)
- Scandium [water, ground-, long-term]: 1.3318e-5 kg; lognormal variance with pedigree 0.30742, pedigree (1,1,1,1,1)
  (same comment as for Molybdenum)
- Bromine [water, ground-, long-term]: 9.6612e-8 kg; lognormal variance with pedigree 0.48622, pedigree (1,1,1,1,1)
  (same comment as for Molybdenum)
- Phosphate [water, ground-, long-term]: 0.00061986 kg; lognormal variance with pedigree 0.21553, pedigree (1,1,1,1,1)
  (same comment as for Molybdenum)
- Bromine [water, ground-]: 2.0968e-10 kg; lognormal variance with pedigree 0.60578, pedigree (1,1,1,1,1)
  (same comment as for Barium)
- Potassium, ion [water, ground-]: 5.1888e-7 kg; lognormal variance with pedigree 0.34927, pedigree (1,1,1,1,1)
  (same comment as for Barium)
- BOD5, Biological Oxygen Demand [water, ground-, long-term]: 9.3195e-7 kg; lognormal variance with pedigree 0.49285, pedigree (1,1,1,1,1)
  (same comment as for Molybdenum)
- Phosphate [water, ground-]: 3.0639e-5 kg; lognormal variance with pedigree 0.2635, pedigree (1,1,1,1,1)
  (same comment as for Barium)
- BOD5, Biological Oxygen Demand [water, ground-]: 1.5558e-9 kg; lognormal variance with pedigree 0.33462, pedigree (1,1,1,1,1)
  (same comment as for Barium)
- Nickel, ion [water, ground-, long-term]: 1.9289e-5 kg; lognormal variance with pedigree 0.29514, pedigree (1,1,1,1,1)
  (same comment as for Molybdenum)
- Boron [water, ground-]: 1.6053e-8 kg; lognormal variance with pedigree 0.4639, pedigree (1,1,1,1,1)
  (same comment as for Barium)
- Nickel, ion [water, ground-]: 4.9794e-8 kg; lognormal variance with pedigree 0.42803, pedigree (1,1,1,1,1)
  (same comment as for Barium)
- Beryllium [water, ground-, long-term]: 1.6589e-6 kg; lognormal variance with pedigree 0.37585, pedigree (1,1,1,1,1)
  (same comment as for Molybdenum)
- Occupation, dump site [natural resource, land]: 0.00098485 m2*year; lognormal variance with pedigree 0.14966, pedigree (1,1,1,1,1)
  for impoundment operation phase and 100 year renaturation phase.
  Uncertainty: U
- Beryllium [water, ground-]: 3.5929e-9 kg; lognormal variance with pedigree 0.51429, pedigree (1,1,1,1,1)
  (same comment as for Barium)
- Molybdenum [water, ground-]: 1.0968e-7 kg; lognormal variance with pedigree 0.40471, pedigree (1,1,1,1,1)
  (same comment as for Barium)
- Barium [water, ground-, long-term]: 0.00014733 kg; lognormal variance with pedigree 0.24256, pedigree (1,1,1,1,1)
  (same comment as for Molybdenum)

## Sampling procedure
Tailings model based on observed leachate concentrations in literature. Extrapolated to 60'000 years heeding chemical characteristics. Initial waste composition from various literature sources. Climate information for national copper deposits (identified from the USGS Major Mineral Deposits database) from literature as follows: global mean annual temperature and precipitation data from Fick and Hijmans (2017); global mean annual evapotranspiration data from Fekete et al. (2002).

References:
Fekete, B. M., Vorosmarty, C. J. & Grabs, W. (2002). High-resolution fields of global runoff combining observed river discharge and simulated water balances. Global Biogeochemical Cycles, 16, 15-1 - 15-10.
Fick, S. E. & Hijmans, R. J. (2017). Worldclim 2: New 1-km spatial resolution climate surfaces for global land areas. International Journal of Climatology, 37, 4302-4315.

## Extrapolations
Climate data collected for copper deposits in the United States and aggregated to reflect average climatic conditions of copper deposits in the country. Initial tailings composition based on global average copper tailings composition, derived from literature data. Initial leachate concentration based on generic global average data also obtained from the literature.
