# drying, sewage sludge

Dataset: EcoSpold 2, unit process
Geography: CH
Time period: 2013-01-01 to 2019-12-31
Technology level: current
Classification: ISIC rev.4 ecoinvent: 3821:Treatment and disposal of non-hazardous waste
Scenario: Business-as-Usual
System model: Allocation at the point of substitution
Generated by: Frank Werner
Database: ecoinvent
isCopyrightProtected: true
accessRestrictedTo: 1

## General comment
The dataset contains the drying of raw sludge with a dry matter content of 5% up to 92%. The drying includes mechanical dewatering followed by thermal drying. Dried sewage sludge could be used as fertilizer (no longer allowed in Switzerland) or as alternative fuel and raw material in the clinker production.
The total heat demand for drying of mechanically dewatered sewage sludge (30% dry mass) to dried sewage sludge (92% dry mass) is 340.489 MJ per m3 raw sewage sludge input (5% dry mass). The heat demand is assumed to be covered to 50% by natural gas, 30% light fuel oil, 10% heat from borehole heat pump, and to 10% from waste heat. These values are based on calculation tool from ESU Services [ESU_SewageSludgeDrying.xls] which uses Vetter & Burger, 2006 as reference for energy requirements.

## Included activities start
The activity starts with the raw sewage sludge in a silo.

## Included activities end
The activity ends with the dried sewage sludge ready to be shiped; infrastructure is disregarded.

## Reference product
- raw sewage sludge: -1 kg; name m_sludge_raw; = -(m_sludge_dried*-1)*(1-0.08)/(1-0.95); CPC 39920: Sewage sludge; By-product classification Waste
  scaling the reduction in water content of 95% to 8% to 1 kg output
  production volume 4.6e7 kg; name p_sludge_raw
    estimated from amount used in cement production
  property price 0 EUR2005; name m_sludge_raw_price_EUR2005
    Waste products are assigned a price of zero as they are assumed to require further treatment.
  property carbon content 0.4096
    carbon content on a dry matter basis (reserved; not for manual entry)
  properties: carbon content, non-fossil 0.4096, dry mass 0.05 kg, carbon content, fossil 0, water content 19, wet mass 1 kg, water in wet mass 0.95 kg, carbon allocation 0.02048 kg

## By-products
- electricity, for reuse in municipal waste incineration only: 0 kWh; CPC 17100: Electrical energy; By-product classification allocatable product; pedigree (1,1,1,1,1)
  Net electricity generated from this waste and used in internal MSWI plant energy redistribution.
  Uncertainty: uncertainty is calculated from uncertainties in waste composition and uncertainties in energy efficiency and the uncertainty in internal energy demand
  property exergy 3.6 MJ; name E_el_prod_MSWI_exergy
    This exergy property is based on the exergy content of the product.
  property true value relation 3.6; name E_el_prod_MSWI_true_value_relation
    property to calculate "true value" from
  property price 0.1 EUR2005; name E_el_prod_MSWI_price_EUR2005
    Estimated to be the same price as in case of electricity, medium voltage.
- heat, for reuse in municipal waste incineration only: 0 MJ; CPC 17300: Steam and hot water; By-product classification allocatable product; pedigree (1,1,1,1,1)
  Net useful heat generated from this waste and used in internal MSWI plant energy redistribution.
  Uncertainty: uncertainty is calculated from uncertainties in waste composition and uncertainties in energy efficiency and the uncertainty in internal energy demand
  property true value relation 0.1842; name E_th_prod_MSWI_true_value_relation
    property to calculate "true value" from
  property exergy 0.1842 MJ; name E_th_prod_MSWI_exergy
    This exergy property is based on the exergy content of the product.
  property price 0.0106 EUR2005; name E_th_prod_MSWI_price_EUR2005
    Average European district heat price from Ecoheatcool and Euroheat 2005-2006, Ecoheat Work package 1: The European heat market. Final report. 10.6 EUR/GJ i s the price of district heat. http://www.solarthermalworld.org/files/Ecoheatcool%20WP1%20Web.pdf?download
- zinc concentrate: 0 kg; CPC 14290: Other non-ferrous metal ores and concentrates (other than uranium or thorium ores and concentrates); By-product classification allocatable product
  Calculated value from the knowledge of the properties of both products.
  property price 0.38 EUR2005; name ByP_price_EUR2005
    Temporary price data. Calculated as 90% of purchasers price based on: Zinc content in concentrate 53%. Concentrate price per kg Zn 86.5% of refined Zn price (13.5% treatment charges according to CHR Metals Limited 2005: Dynamic cost curves. http://www.minecost.com/dynamic.pdf). 2004 zinc price from USGS (2007) Mineral commodity summaries 2007. <http://minerals.usgs.gov/minerals/pubs/mcs/2007/mcs2007.pdf> [Accessed 25 May 2010]
  property zinc content 0.53; name zinc_C_zinc_concentrate
    Zinc content on a dry matter basis. Value taken from teh "zinc mine operation" /GLO dataset.
  property dry mass 1 kg; name DM_zinc_concentrate
  property carbon content 0
    carbon content on a dry matter basis (reserved; not for manual entry)
  properties: wet mass 1 kg, water content 0, carbon content, non-fossil 0, carbon content, fossil 0, water in wet mass 0 kg, carbon allocation 0 kg

## Inputs from technosphere
- heat, district or industrial, natural gas: 0.173364 MJ; = (ABS(m_sludge_raw)*(1-0.95)/0.3-ABS((m_sludge_dried*-1)))*(1000+715)/2/1000*3.6*0.5; source Vetter, H. 2006; lognormal variance with pedigree 0.3406, pedigree (2,1,5,1,1)
  Heat required for the dewatering of mechanically dried sludge (dry matter content of 30%) to dried sewage sludge with a dry matter content of 95%. The heat requirement lies between 715 kWh and 1000 kWh per t of removed water, converted to MJ with 3.6 MJ/kWh. 50% of the required heat are covered with fuel oil, 50% with heat from composting gas and heat pumps.
- wastewater, average: -0.000945652 m3; name m_waste_water; = ((ABS(m_sludge_raw)-(m_sludge_dried*-1))/1000)*-1; source Vetter, H. 2006
  converting the difference in weight as water loss from kg to m3; the selected intermediate exchange is used as a proxy due to the lack of data on the process specific composition of the waste water.
  production volume 43500 m3; = ABS(p_sludge_raw/m_sludge_raw*m_waste_water)
    amount of waste water proportional to waste water per amount of reference product
  property price 0 EUR2005; name m_waste_water_price_EUR2005
  properties: water content 2882.2, dry mass 0.346837 kg, wet mass 1000 kg, carbon content, non-fossil 0.194039
  note on carbon content, non-fossil: 0.0673 kg TOC/m3 (Tab A.17, ecoinvent v2.2 report 13_I). TOC was considered as Total Carbon.
- electricity, medium voltage: 0.00225 kWh; = (ABS(m_sludge_raw)-ABS(m_sludge_raw)*(1-0.95)/0.3)*2.7/1000; source Vetter, H. 2006; lognormal variance with pedigree 0.38, pedigree (5,1,5,1,1)
  The electricity demand represents the electricity requirements for mechanical dewatering of raw sewage sludge of 2.7 kWh/t of removed water, dewatered from 5% dry mass to 30% dry mass. This value is based on Vetter & Burger (2006) as reference for energy requirements.
- sewage sludge, dried: -0.0543478 kg; name m_sludge_dried
  production volume 2.5e6 kg; = p_sludge_raw*0.05/0.92
    Conversion of the use of raw sludge in cement kilns by scaling down the input from a water content of 95% to 8%.
  property water in wet mass 0.08 kg; name wwm
  property price 0 EUR2005; name m_sludge_dried_price_EUR2005
  property dry mass 0.92 kg; name dm
  properties: wet mass 1 kg, carbon content, non-fossil 0.4096, water content 0.0869565
- heat, district or industrial, other than natural gas: 0.173364 MJ; = (ABS(m_sludge_raw)*(1-0.95)/0.3-ABS((m_sludge_dried*-1)))*(1000+715)/2/1000*3.6*0.5; source Vetter, H. 2006; lognormal variance with pedigree 0.3406, pedigree (2,1,5,1,1)
  (same comment as for heat, district or industrial, natural gas)
  properties: corresponding fuel use, propane, furnace >100kW 1.05263 MJ
  note on corresponding fuel use, propane, furnace >100kW: Lower heating value of the fuel input related to the heat/electricity output, taken directly from ecoinvent v3.0 dataset "heat production, natural gas, at industrial furnace >100kW, GLO 2000".

## Sampling procedure
Literature

## Extrapolations
This dataset has been extrapolated from year 2013 to the year of the calculation (2019). The uncertainty has been adjusted accordingly.

## Review by Gabor Doka 2015-02-09
Passed.
Simple drying procedure for wet sewage sludge, vie dewatering and thermal drying. Some mathematical modelling.
