# polyethylene terephthalate production, granulate, amorphous, recycled

Dataset: EcoSpold 2, unit process
Geography: US
Time period: 2010-01-01 to 2019-12-31
Technology level: current
Classification: ISIC rev.4 ecoinvent: 3830:Materials recovery
Scenario: Business-as-Usual
System model: Allocation at the point of substitution
Generated by: Thomas Kägi
Published in: Franklin Associates 2011
Database: ecoinvent
isCopyrightProtected: true
accessRestrictedTo: 1

## General comment
The functional unit represents the production of 1 kg of polyethylene terephthalate granulate, recycled, amorphous.
Most of the reporting facilities receive postconsumer PET as individual resin bales. The bales must be broken down and the material sorted to remove foreign material. The sorted materials may or may not go through a pre-washing stage before they are granulated to flake. Some amount of reclaimed resin is received at the facility already in flake form. This flake may be clean or dirty, but all reclaimed flake is washed to market specifications as part of the reclaimer processing operations. This is most often achieved with a caustic wash, but different reclaimers reported using a variety of washing chemicals including surfactants, defoamers, and wetting agents. Even though the incoming material has undergone some presorting before it is received, other materials are mixed in with the PET. About 80 percent of the weight of incoming
material ends up as recycled PET resin. Unusable contaminants represent over 200 pounds of solid wastes per thousand pounds of useful output
The additional energy required to convert 1,000 pounds of recycled PET flake to resin pellets (218 kWh) is already included in the inventory.
The PET recycling data do not include solid stating to convert the resin to a bottle-ready state. If the recycled resin data are being used in a life cycle inventory for the production of bottles, the practitioner constructing the model may need to add energy for solid stating of the recycled PET resin.

## Included activities start
Service is starting with the receipt of bales of sorted waste PET

## Included activities end
This module includes all processes of the production of recycled PET granulate, amorphous up to the factory gate. Machinery infrastructure is excluded

## Allocation
no allocation involved

## Reference product
- polyethylene terephthalate, granulate, amorphous, recycled: 1 kg; name RP_amount; By-product classification allocatable product; CPC 34710: Polymers of ethylene, in primary forms
  production volume 7.5e8 kg; name RP_PV
    Assumption according to Association of Plastic Recyclers (APR; www.plasticsrecycling.org): 1.5 Mio t of plastic recycling, half of it PET; ; waste input material (for treatment) and by-product/waste generated scaled accordingly
  property carbon content 0.625
    carbon content on a dry matter basis (reserved; not for manual entry)
  property true value 0.84; name RP_amount_true_value
    allocation property applied in "true value" allocation // value calculated from revenue
  properties: carbon content, fossil 0.625, carbon content, non-fossil 0, water in wet mass 0 kg, wet mass 1 kg, dry mass 1 kg, water content 0, price 0.84 EUR2005, carbon allocation 0.625 kg

## By-products
- heat, for reuse in municipal waste incineration only: 0 MJ; CPC 17300: Steam and hot water; By-product classification allocatable product; pedigree (1,1,1,1,1)
  Net electricity generated from this waste and used in internal MSWI plant energy redistribution.
  Uncertainty: uncertainty is calculated from uncertainties in waste composition and uncertainties in energy efficiency and the uncertainty in internal energy demand
  production volume 2.98152e7 MJ
  property exergy 0.1842 MJ; name E_th_prod_MSWI_exergy
    This exergy property is based on the exergy content of the product.
  property price 0.0106 EUR2005; name E_th_prod_MSWI_price_EUR2005
    Average European district heat price from Ecoheatcool and Euroheat 2005-2006, Ecoheat Work package 1: The European heat market. Final report. 10.6 EUR/GJ i s the price of district heat. http://www.solarthermalworld.org/files/Ecoheatcool%20WP1%20Web.pdf?download
  property true value relation 0.1842; name E_th_prod_MSWI_true_value_relation
    property to calculate "true value" from
  property true value 0.000263196
    allocation property applied in "true value" allocation // value calculated from true value relation
- electricity, for reuse in municipal waste incineration only: 0 kWh; CPC 17100: Electrical energy; By-product classification allocatable product; pedigree (1,1,1,1,1)
  (same comment as for heat, for reuse in municipal waste incineration only)
  production volume 4.03626e6 kWh
  property price 0.1 EUR2005; name E_el_prod_MSWI_price_EUR2005
    Estimated to be the same price as in case of electricity, medium voltage.
  property exergy 3.6 MJ; name E_el_prod_MSWI_exergy
    This exergy property is based on the exergy content of the product.
  property true value relation 3.6; name E_el_prod_MSWI_true_value_relation
    property to calculate "true value" from
  property true value 0.00069636
    (same comment as for heat, for reuse in municipal waste incineration only)
- iron scrap, sorted, pressed: 0 kg; By-product classification Recyclable; CPC 39310: Slag, dross, scalings and other waste from the manufacture of iron or steel; pedigree (1,1,1,1,1)
  Iron scrap recovered from this waste.
  Uncertainty: uncertainty calculated from uncertainty in waste composition, uncertainty of share of recyclable metal, uncertainty of transfer coefficient to bottom ash, uncertainty of the efficiency of scrap removal in MSWI plant.
  production volume 507914 kg
  property price 0.175 EUR2005
    Temporary price data. Calculated as 90% of purchasers price based on: 2005 import and export prices (total trades (USD) divided by total weight (kg) in biggest economies of the world: EU27, USA, Brasil, China, India, Japan and Russia) from UN Commodity Trade Statistics Database (http://data.un.org/Explorer.aspxDatabase [Accessed 2011.06.20]). Commodity: Waste or scrap, of cast iron
  property carbon content 0
    carbon content on a dry matter basis (reserved; not for manual entry)
  property true value 0.000118513
    allocation property applied in "true value" allocation // value calculated from revenue
  properties: dry mass 1 kg, water content 0, carbon content, non-fossil 0, water in wet mass 0 kg, carbon content, fossil 0, wet mass 1 kg, carbon allocation 0 kg
- iron scrap, unsorted: 0 kg; source European Aluminium Association 2008; CPC 39310: Slag, dross, scalings and other waste from the manufacture of iron or steel; By-product classification Recyclable; pedigree (1,1,1,1,1)
  production volume 14.4507 kg
  property price 0.149 EUR2005; name ironScrapAmount_price_EUR2005
    Temporary price data. Calculated as 90% of purchasers price based on: estimated at 85% of sorted scrap
  property carbon content 0
    carbon content on a dry matter basis (reserved; not for manual entry)
  property true value 2.87087e-9
    allocation property applied in "true value" allocation // value calculated from revenue
  properties: water in wet mass 0 kg, water content 0, carbon content, fossil 0, carbon content, non-fossil 0, dry mass 1 kg, wet mass 1 kg, carbon allocation 0 kg
- aluminium oxide, non-metallurgical: 0 kg; source European Aluminium Association 2008; CPC 41432: Alumina (aluminium oxide), except artificial corundum; By-product classification allocatable product; CAS 1344-28-1; pedigree (1,1,1,1,1)
  production volume 909.329 kg
  property carbon content, non-fossil 0; name C_content_non_fossil
  property price 0.28 EUR2005; name Al2O3Amount_price_EUR2005
    From UN trade database. http://data.un.org/ Import data from the largest economies of the world are used (Brazil, India, USA, China, Japan and EU-27).
  property dry mass 1 kg; name DM
  property water content 0; name water_content
  property wet mass 1 kg; name WM
  property water in wet mass 0 kg; name WWM
  property carbon content, fossil 0; name C_content_fossil
  property carbon content 0
    carbon content on a dry matter basis (reserved; not for manual entry)
  property true value 3.39483e-7
    allocation property applied in "true value" allocation // value calculated from revenue
  properties: carbon allocation 0 kg
- aluminium, cast alloy: 0 kg; source European Aluminium Association 2008; By-product classification allocatable product; CPC 41431: Unwrought aluminium; pedigree (1,1,1,1,1)
  EcoSpold01Location=RER
  production volume 8500.21 kg
  property price 1.3 EUR2005; name castAlloyAmount_price_EUR2005
    Temporary price data. Calculated as 90% of purchasers price based on: Source: London Metal Exchange, Aluminium alloy price for 2005
  property carbon content 0
    carbon content on a dry matter basis (reserved; not for manual entry)
  property true value 1.47337e-5
    allocation property applied in "true value" allocation // value calculated from revenue
  properties: water in wet mass 0 kg, carbon content, non-fossil 0, water content 0, dry mass 1 kg, carbon content, fossil 0, wet mass 1 kg, carbon allocation 0 kg
- aluminium, wrought alloy: 0 kg; source European Aluminium Association 2008; By-product classification allocatable product; CPC 4153: Semi-finished products of aluminium or aluminium alloys; pedigree (1,1,1,1,1)
  production volume 3721.23 kg
  property price 1.44 EUR2005; name secondaryAluminiumOutput_price_EUR2005
    Estimated based on literature values and expert judgement. Aluminium ccast alloys are about 90% of the price of aluminium wrought alloys.
  property carbon content 0
    carbon content on a dry matter basis (reserved; not for manual entry)
  property true value 7.14476e-6
    allocation property applied in "true value" allocation // value calculated from revenue
  properties: wet mass 1 kg, water content 0, carbon content, fossil 0, water in wet mass 0 kg, carbon content, non-fossil 0, dry mass 1 kg, carbon allocation 0 kg
- copper: 0 kg; source Rentz O. 1999; By-product classification allocatable product; CPC 41413: Refined copper and copper alloys, unwrought; master alloys of copper
  Literature value. Copper uses: Before end-use copper is manufactured into semi fabricated products, such as shapes and ingots (known as 'semis'). These manufacturing processes are subdivided into hot working, cold working and, if necessary, process annealing. Few of the semis are ready for use as such. They more typically travel to first-stage manufacturers, who make metal rods, wire, and casting, and then to component manufacturers who produce such things as motors, valves, and insulated cables The components in turn are incorporated by final-stage manufacturers into a variety of finished products - automobiles, commercial buildings, residential housing, and so forth. These uses account for about 79% of the world-wide consumption of copper.
  production volume 16166.9 kg
  property price 5.52 EUR2005
    Literature value (http://www.economist.com/news/business/21576714-mining-industry-has-enriched-chile-its-future-precarious-copper-solution). Average price between 20015 and 2013.
  property carbon content 0
    carbon content on a dry matter basis (reserved; not for manual entry)
  property true value 0.000118989
    allocation property applied in "true value" allocation // value calculated from revenue
  properties: dry mass 1 kg, water in wet mass 0 kg, wet mass 1 kg, carbon content, non-fossil 0, water content 0, carbon content, fossil 0, carbon allocation 0 kg
- zinc concentrate: 0 kg; CPC 14290: Other non-ferrous metal ores and concentrates (other than uranium or thorium ores and concentrates); By-product classification allocatable product
  Calculated value from the knowledge of the properties of both products.
  production volume 1.28321e-5 kg
  property price 0.38 EUR2005; name ByP_price_EUR2005
    Temporary price data. Calculated as 90% of purchasers price based on: Zinc content in concentrate 53%. Concentrate price per kg Zn 86.5% of refined Zn price (13.5% treatment charges according to CHR Metals Limited 2005: Dynamic cost curves. http://www.minecost.com/dynamic.pdf). 2004 zinc price from USGS (2007) Mineral commodity summaries 2007. <http://minerals.usgs.gov/minerals/pubs/mcs/2007/mcs2007.pdf> [Accessed 25 May 2010]
  property zinc content 0.53; name zinc_C_zinc_concentrate
    Zinc content on a dry matter basis. Value taken from teh "zinc mine operation" /GLO dataset.
  property dry mass 1 kg; name DM_zinc_concentrate
  property carbon content 0
    carbon content on a dry matter basis (reserved; not for manual entry)
  property true value 6.50162e-15
    allocation property applied in "true value" allocation // value calculated from revenue
  properties: wet mass 1 kg, water content 0, carbon content, non-fossil 0, carbon content, fossil 0, water in wet mass 0 kg, carbon allocation 0 kg

## Inputs from technosphere
- propane, burned in building machine: 2.81591e-5 MJ; lognormal variance with pedigree 0.0806, pedigree (1,1,5,1,4)
- waste preparation facility: 1.9971e-9 unit; lognormal variance with pedigree 0.1712, pedigree (4,3,5,5,5)
  properties: lifetime 50 year, lifetime capacity [kg] 5e8 kg
- wastewater, average: -0.000394128 m3; name BP_ww; lognormal variance with pedigree 0.0406, pedigree (1,1,5,1,1)
  production volume 296025 m3; = ABS(BP_ww/RP_amount*RP_PV)
    Assumption according to Association of Plastic Recyclers (APR; www.plasticsrecycling.org): 1.5 Mio t of plastic recycling, half of it PET; waste input material (for treatment) and by-product/waste generated scaled accordingly
  property price 0 EUR2005; name BP_ww_price_EUR2005
  properties: carbon content, non-fossil 0.194039, water content 2882.2, dry mass 0.346837 kg, wet mass 1000 kg
  note on carbon content, non-fossil: 0.0673 kg TOC/m3 (Tab A.17, ecoinvent v2.2 report 13_I). TOC was considered as Total Carbon.
- heat, district or industrial, natural gas: 2.70869 MJ; lognormal variance with pedigree 0.0406, pedigree (1,1,5,1,1)
- waste polyethylene terephthalate, for recycling, sorted: 1.24819 kg; lognormal variance with pedigree 0.0406, pedigree (1,1,5,1,1)
  properties: water content 0.0141988, dry mass 0.986 kg, wet mass 1 kg, carbon content, fossil 0.624
- municipal solid waste: -0.219681 kg; name BP_MSW; lognormal variance with pedigree 0.0406, pedigree (1,1,5,1,1)
  production volume 1.65e8 kg; = ABS(BP_MSW/RP_amount*RP_PV)
    (same comment as for wastewater, average)
  property price 0 EUR2005; name BP_MSW_price_EUR2005
  properties: carbon content, fossil 0.171549, carbon content, non-fossil 0.261655, water content 0.297017, dry mass 0.771 kg, wet mass 1 kg
  note on carbon content, fossil: MSW composition in tab 4.1, ecoinvent v2.2 report 13_I. C content referred to 1 kg DM
- electricity, low voltage: 0.937801 kWh; lognormal variance with pedigree 0.0406, pedigree (1,1,5,1,1)
- sodium hydroxide, without water, in 50% solution state: 0.0237655 kg; lognormal variance with pedigree 0.0406, pedigree (1,1,5,1,1)
  properties: dry mass 1 kg, wet mass 1 kg
- chemical, organic: 0.00672025 kg; lognormal variance with pedigree 0.0406, pedigree (1,1,5,1,1)
  Proxy for cleaning chemicals
  properties: wet mass 1 kg, carbon content, fossil 0.628, dry mass 1 kg
  note on carbon content, fossil: This dataset is an unweighted average of 20 organic substances (listed in Tab 88.1, ecoinvent v2.2 report 8, part II), being part of the top100 chemicals included in this database. The C-content has also been calculated as an unweighted average of the C content of the substances composing this dataset.

## Inputs from nature
- Water, unspecified natural origin [natural resource, in water]: 0.000394128 m3; lognormal variance with pedigree 0.0406, pedigree (1,1,5,1,1)

## Emissions to nature
- VOC, volatile organic compounds, unspecified origin [air, unspecified]: 3.69464e-5 kg; lognormal variance with pedigree 0.0406, pedigree (1,1,5,1,1)
- Particulates, > 2.5 um, and < 10um [air, unspecified]: 3.89435e-5 kg; lognormal variance with pedigree 0.0406, pedigree (1,1,5,1,1)

## Sampling procedure
Uncertainty estimation according to the pedigree matrix
