# electricity production, photovoltaic, 3kWp facade installation, single-Si, panel, mounted

Dataset: EcoSpold 2, unit process
Geography: RoW
Time period: 2008-01-01 to 2019-12-31
Technology level: current
Classification: EcoSpold01Categories: photovoltaic/power plants
Classification: ISIC rev.4 ecoinvent: 3510b: Electric power generation, photovoltaic
Synonyms: Solar module; monocrystalline; silicon; single crystalline; PV-module
Tags: photovoltaic power
Scenario: Business-as-Usual
System model: Allocation at the point of substitution
Generated by: Karin Treyer
Published in: Jungbluth N. 2012
Database: ecoinvent
isCopyrightProtected: true
accessRestrictedTo: 1

## General comment
This dataset represents the production of grid-connected low voltage electricity with a 3 kWp building integrated photovoltaic (PV) module worldwide in 2011 as an extrapolation from Switzerland.. The 3 kWp module has been chosen as basic module for building integrated PV electricity production. Larger modules can easily be built with these 3 kWp modules without producing a significant error in environmental impact calculations. The module is a single-Si panel installed at a façade.
An inverter is used to convert the low voltage DC power into AC power.
An average yield of 1099 kWh/kWp was assumed for the calculations including a façade factor.

## Included activities start
From the PV module installed and ready to be used.

## Included activities end
This activity ends with low voltage electricity produced with the 3 kWp module, assuming an average yield.

This dataset includes tap water use for cleaning the module and it’s treatment.

## Technology
Electricity production with a grid-connected 3 kWp single-Si photovoltaic panel mounted on a building façade. See field "extrapolation" for comment on the output voltage.

## Parameters
- Share 3kWp facade installation, single-Si, panel, mounted, at building: 0.0248; name pv_3fi_sSi_pmb; lognormal variance with pedigree 0.25, pedigree (5,5,5,5,5)
  Literature values, calculated value.
  Calculated from the shares of different types of cells in 2008 (European Photovoltaic Technology Platform 2012) and the shares of different types of mounting systems (Jungbluth et al. 2012). The latter shares are valid for Europe (RER) and do not take into account open ground PV plants. Due to lack of data for other regions or even countries on the world, the shares have been taken as calculation basis for all PV datasets. Uncertainty has been adjusted accordingly. The shares are taken to calculate all combinations of cell and mounting systems types at buildings. Open ground plants have then been accounted for in a further step if present in a region.
  Data:
  Shares of different types of cells:
  - multi-Si: 47.7%
  - single-Si: 38.3%
  - CdTe: 6.4%
  - a-Si: 5.1%
  - ribbon-Si: 1.5%
  - CIS: 1.0%
  Shares of different types of mounting systems:
  - slanted-roof installation, panel, mounted, on roof: 65%
  - flat roof installation, on roof: 20%
  - facade installation, panel, mounted, at building: 10%
  - facade installation, laminated, integrated, at building: 2.5%
  - slanted-roof installation, laminated, integrated, on roof: 2.5%
  Sources:
  - European Photovoltaic Technology Platform. 2012. Photovoltaic Fact Sheets. The status of the PV industry (2008). LB-32-10-251-EN-D. retrieved from <http://www.eupvplatform.org/publications/misperceptions-fact-sheets.html#c2242> (accessed 31.01.2012)
  - Jungbluth N., Stucki M., Flury K., Frischknecht R. and Buesser S. (2012) Life Cycle Inventories of Photovoltaic Power Production. ESU-services Ltd., Uster, CH, retrieved from: www.esu-services.ch/data/public-lci-reports
- losses from gross electricity production: 0.05 dimensionless; name gross_net_electricity; lognormal variance with pedigree 0.0167, pedigree (3,3,1,3,3)
  Estimation. The factor for the loss of electricity from gross to net electricity production is an assumption based on experiences and expertise (5% losses for photovoltaics).
- Yield (Output), photovoltaics: 1099 kWh/kWp; name yield; lognormal variance with pedigree 0.010725, pedigree (4,2,1,2,2)
  Literature value / calculated value. Annual output (yield), roof-top [kWh* kWp-1*y-1]
  Weighted average (installed capacity kWp) of 30 countries based on six sources:
  AU, AT, BE, CA, CH, CZ, DE, DK, ES, FI, FR, GB, GR, HU, IN, IT, JP, KR, LU, MX, MY, NL, PT, SE, SI, TH, TW, ZA.
  Yield sources:
  1 - IEA. 2008: Analysis of PV system´s values beyond energy. International Energy Agency (IEA), Paris Cedex (FR)
  2 - IEA. 2006 Compared assessment of selected environmental indicators of PV electricity in OECD cities. International Energy Agency (IEA), Paris Cedex (FR)
  3 - JRC. 2011. Photovoltaic Geographical Information System - Interactive Maps.European Commission - Joint Research Centre (JRC) - European Solar Test Installation. http://re.jrc.ec.europa.eu/pvgis/apps4/pvest.php
  4 - McKinsey. 2008. The economics of solar power. TheMcKinsey Quarterly, Energy, Resources, Materials. June 2008.
  5 - Sopian, K., Haris, A.H., Rouss, D., Yusof, M.A. 2005. Building Integrated Photovoltaic (BIPV) in Malaysia - Potential, Current Status Strategies For Long Term Cost Reduction. ISESCO Science and Technology Vision. Volume 1 - May 2005 (40-44)
  6 - CONUEE. 2009. Market Niches for Grid-connected Photovoltaic Systems in Mexico. Comisión Nacional para el Uso Eficiente de la Energía (Conuee)
  Installed capacity sources:
  7 - IEA. 2010. Trends in Photovoltaic Applications:Survey report of selected IEA countries between1992 and 2009. International Energy Agency (IEA), Report IEA-PVPS T1-19:2010, Paris Cedex (FR)
  8 - Eurobserver, 2010. Photovoltaic barometer. Systèmes Solaires - le journal du photovoltaïque; Baromètre Photovoltaïque - Eurobserver Nr.3, avril 2010.
  9 - Eurobserver, 2011. Photovoltaic barometer. Systèmes Solaires - le journal du photovoltaïque; Baromètre Photovoltaïque - Eurobserver Nr.5, avril 2011.
  10 - EPIA.Global Market Outlook for Photovoltaics until 2015. European Photovoltaic Industry Association.
  Uncertainty: Use of different sources.
- Facade factor: 0.667 dimensionless; name facade; lognormal variance with pedigree 0.212, pedigree (5,5,5,5,5)
  Ratio between the annual solar yield at façade and the annual solar yield at roof-top.
- correction factor: 0.92; name corr; lognormal variance with pedigree 0.0175, pedigree (4,3,2,3,3)
  Estimation. Literature data on the yield for optimum installation and not real performance in the country have been corrected with a factor of 92% according to experiences in Switzerland for average production. This is based on the ratio of actual yield and published IEA data (820/892 = 0.92 - see Jungbluth et al. 2012 for detailed discussion)
- capacity: 0.003 MW; lognormal variance with pedigree 0.001925, pedigree (2,2,1,2,2)
  Capacity of the photovoltaic cell in MWp per installation unit [MWp/unit]
- Yield (Output), photovoltaics, corrected: 1011.08 kWh/kWp; name yield_corr; = yield*corr
  Estimated value. The annual yield is corrected with a correction factor of 0.92 according to Jungbluth et al. 2012.
  Annual output (yield), roof-top [kWh* kWp-1*y-1]
- fraction, process water, to air: 0.15 dimensionless; name fraction_PW_to_air; lognormal variance with pedigree 0.092025, pedigree (4,4,3,2,4)
  Literature value. In case when no industry/process specific data are available, default evaporation fraction value is used. This value is 15% and is based on literature (Statistics Canada, 2007 & Shaffer, K.H., 2008, Consumptive water use in the Great Lakes Basin, USGS & Shiklomanov, 2003, World Water Resources at the Beginning of the 21st Century) and has been approved by an expert.
- Panel area for one 3 kWp unit, sc-Si: 21.4 m2/unit; name panel_area_scSi; lognormal variance with pedigree 0.0199, pedigree (4,3,2,3,3)
  Literature value. Jungbluth N., Stucki M., Flury K., Frischknecht R. and Buesser S. (2012) Life Cycle Inventories of Photovoltaic Power Production. ESU-services Ltd., Uster, CH, retrieved from: www.esu-services.ch/data/public-lci-reports/
  Tab. 12.3, p.127
- lifetime: 30 year; lognormal variance with pedigree 0.026625, pedigree (4,3,3,2,3)
  Oral communication. Gnos, S. 2002. Personal Communication, 10.2002. NET AG, Switzerland
- fraction, tap water, to air: 0.15; name fraction_TW_to_air; = fraction_PW_to_air; lognormal variance with pedigree 0.092025, pedigree (4,4,3,2,4)
  Calculated value. See comment in the other parametres present in this dataset. Tap water is considered to be always used as process water, thus process water fractions to air are applied to all tap water input flows to calculate the amount of water consumed in the processes.
- water use for cleaning photovoltaic panels: 20 l/m2; name water_pv_panels_cleaning; lognormal variance with pedigree 0.1227, pedigree (5,4,5,3,4)
  Estimation

## Reference product
- electricity, low voltage: 1 kWh; CPC 17100: Electrical energy; By-product classification allocatable product
  EcoSpold01Location=CH
  production volume 1.87309e7 kWh; name apv
    Assumption. Value as the only local dataset (Switzerland) multiplied with a factor 10.
  property price 0.107 EUR2005
    Temporary price data. Calculated as 90% of purchasers price based on: IEA Key world energy statistics 2004 (www.iea.org/textbase/nppdf/free/2004/keyworld2004.pdf)
  property true value 0.107
    allocation property applied in "true value" allocation // value calculated from revenue

## By-products
- heat, for reuse in municipal waste incineration only: 0 MJ; CPC 17300: Steam and hot water; By-product classification allocatable product; pedigree (1,1,1,1,1)
  Net electricity generated from this waste and used in internal MSWI plant energy redistribution.
  Uncertainty: uncertainty is calculated from uncertainties in waste composition and uncertainties in energy efficiency and the uncertainty in internal energy demand
  production volume 8.39242 MJ
  property exergy 0.1842 MJ; name E_th_prod_MSWI_exergy
    This exergy property is based on the exergy content of the product.
  property price 0.0106 EUR2005; name E_th_prod_MSWI_price_EUR2005
    Average European district heat price from Ecoheatcool and Euroheat 2005-2006, Ecoheat Work package 1: The European heat market. Final report. 10.6 EUR/GJ i s the price of district heat. http://www.solarthermalworld.org/files/Ecoheatcool%20WP1%20Web.pdf?download
  property true value relation 0.1842; name E_th_prod_MSWI_true_value_relation
    property to calculate "true value" from
  property true value 2.98352e-9
    allocation property applied in "true value" allocation // value calculated from true value relation
- electricity, for reuse in municipal waste incineration only: 0 kWh; CPC 17100: Electrical energy; By-product classification allocatable product; pedigree (1,1,1,1,1)
  (same comment as for heat, for reuse in municipal waste incineration only)
  production volume 1.16561 kWh
  property price 0.1 EUR2005; name E_el_prod_MSWI_price_EUR2005
    Estimated to be the same price as in case of electricity, medium voltage.
  property exergy 3.6 MJ; name E_el_prod_MSWI_exergy
    This exergy property is based on the exergy content of the product.
  property true value relation 3.6; name E_el_prod_MSWI_true_value_relation
    property to calculate "true value" from
  property true value 8.09857e-9
    (same comment as for heat, for reuse in municipal waste incineration only)

## Inputs from technosphere
- wastewater, from residence: -7.05164e-6 m3; name sewage; = (tapwater/1000)*-1; lognormal variance with pedigree 0.0047, pedigree (2,2,3,5,1)
  Calculated value.
  EcoSpold01Location=CH
  Uncertainty: Estimation 20l/m2 panel
  production volume 130.775 m3; = sewage*apv
    Calculated value
  property price 0 EUR2005; name sewage_price_EUR2005
  properties: dry mass 0.337476 kg, wet mass 1000 kg, carbon content, non-fossil 0.199421, water content 2962.17
  note on carbon content, non-fossil: 0.0673 kg TOC/m3 (Tab A.17, ecoinvent v2.2 report 13_I). TOC was considered as Total Carbon.
- photovoltaic facade installation, 3kWp, single-Si, panel, mounted, at building: 1.64758e-5 unit; name installation; = 1/(lifetime*(capacity*1000)*yield_corr*facade); lognormal variance with pedigree 0.0161, pedigree (3,2,3,5,1)
  EcoSpold01Location=CH
  Calculated value. Lifetime*capacity*annual yield = y * kWp/unit * kWh/(kWp*y) = kWh/unit and then the reciproke.
  Uncertainty: yield at good installation, average is lower while optimum would be higher, basic uncertainty = 1.2
- tap water: 0 kg; name tapwater; pedigree (1,1,1,1,1)
  EcoSpold01Location=CH
  Calculated value. Amount of installation needed to produce 1 kWh * panel area per installation * water need to clean 1 m2 of panel. [unit/kWh * m2/unit * l/m2 = l/kWh]. A density of 1 kg/dm3 is assumed.
  Uncertainty: Estimation 20l/m2 panel
  properties: wet mass 1 kg, carbon content, fossil 0.00178991, dry mass 0.000337476 kg, water content 2962.17
  note on carbon content, fossil: Bicarbonate content is 2.93 mol/m3. CO2 content is 0.1 mol/m3 (ecoinvent v2.2 report 8, Tab 93.1).
- tap water: 7.93157e-6, 6.58915e-5, 1.31082e-5, 0.0028186, 0.000330538, 8.59885e-6, 2.44593e-5, 0.00378251 kg (8 entries); lognormal variance with pedigree 0.0047, pedigree (2,2,3,5,1)
  (same comment as for tap water)

## Inputs from nature
- Energy, solar, converted [natural resource, in air]: 3.8503 MJ; lognormal variance with pedigree 0.00388441, pedigree (2,2,3,1,1)
  Energy loss in the system is included.

## Emissions to nature
- Water [air, unspecified]: 1.05775e-6 m3; name water_to_air_unspecified; = (tapwater/1000)*fraction_TW_to_air; lognormal variance with pedigree 0.098025, pedigree (4,4,4,2,4)
  Calculated value based on literature values and expert opinion. See comments in the parametres' comment field.
  property fraction, origin: salt water 0; name fraction_origin_salt_water
  property fraction, origin: fresh water 1; name fraction_origin_fresh_water
  property fraction, origin: unspecified 0; name fraction_origin_unspecified

## Sampling procedure
Literature, statistics

## Extrapolations
The simplifying assumption was made that all electricity is directly provided as low voltage electricity, so that no transformation has to take place. Even in countries with high shares of open ground installations (where medium or high voltage electricity might arrive at the busbar), the mistake due to this assumption is not significant, as transformation processes do only have a low influence on environmental impacts.

## Review by Carl Vadenbo 2015-07-23
The update of the whole electricity sector for the ecoinvent v3.2 database consist of hundreds of datasets. All these datasets have passed through a streamlined review processes where the underlying modelling of production volumes, technology shares and efficiencies was reviewed in detail prior to the datasets being submitted to the database.
