# transport, freight, aircraft with reefer, freezing

Dataset: EcoSpold 2, unit process
Geography: GLO
Time period: 2010-01-01 to 2019-12-31
Technology level: current
Classification: ISIC rev.4 ecoinvent: 5120:Freight air transport
Scenario: Business-as-Usual
System model: Allocation at the point of substitution
Generated by: Tereza Levova
Database: ecoinvent
isCopyrightProtected: true
accessRestrictedTo: 1

## General comment
This dataset represent transport of reefer (refrigerated container) on a freight plane. The operation mode of the reefer is freezing (temperature between -35°C and -18°C).
The amount of operation of the reefer needed is calculated using the assumption of the average speed of the plane.
Reefer transported by plane (http://commons.wikimedia.org/wiki/File:Unloading_JAL_747.jpg, accessed 20141217)
Transport of food by plane is by far the most expensive type of transport with the highest environmental impact. There are several types of food which has high value and short duration of freshness and thus are usually being transported by plane. These foods are for example flowers, seafood, some pharmaceutical products, papaya and strawberries.

## Included activities start
This dataset simply combine two other activities - transport, freight, aircraft and operation of reefer, For more information on these two activities please see the datasets representing these two activities.

## Parameters
- speed: 500 km/hour; name speed_plane; lognormal variance with pedigree 0.0166, pedigree (4,5,1,1,1)
  Estimated value based on an expert judgement. This value represents an average speed of freight train including all stops and breaks.

## Reference product
- transport, freight, aircraft with reefer, freezing: 1 metric ton*km; name transport_plane_RP; CPC 65319: Air transport services of other freight; By-product classification allocatable product
  production volume 3.565e9 metric ton*km; = 155E9*0.05*0.46
    Estimated based on literature.
    155E+09 tkm is the amount of freight transport transported by planes in 2011 (International Transport Forum, http://www.internationaltransportforum.org/statistics/StatBrief/2013-12-Trends-Perspective.pdf, accessed 20150108).
    It is estimated, that out of all the cargo 5% was cargo in need of atmosphere control.
    According to literature (Drawry, 2008, published in http://www.hamburg-sued.com/group/media/sharedmedia/dokumente/brochures/Reefer_guide.pdf, accessed 20141216) the type of food transported in reefers is following;
    31% fresh fruits and vegetables (excl. bananas)
    20% bananas
    24% meat and poultry
    19% fish and seafood
    6% various (medicine, flowers, etc.)
    The fruits and vegetables (54%) in general need to be cooled during its storage and transport and the meat and seafood (46%) need to be frozen. The various is divided half/half between cooling and freezing.
  property price 0.0324273 EUR2005; name transport_plane_RP_price_EUR2005
    Calculated based on inputs: The price of the product has been calculated as a sum of the values of the material and energy inputs for this product. This value is therefore a rough estimation. It may underestimate the real price since there are additional expenses when producing any product. These expences can include for example labour costs, treatment of waste materials and profit for the producer. Please consider carefully whether this level of data quality is acceptable for your application.

## Inputs from technosphere
- transport, freight, aircraft, unspecified: 1 metric ton*km; lognormal variance with pedigree 0.0026, pedigree (1,1,3,1,1)
  Calculated value.
- operation, reefer, freezing: 0.0833333 kg*day; = 1000*(transport_plane_RP/ speed_plane/24); lognormal variance with pedigree 0.0186, pedigree (4,5,3,1,1)
  Calculated value based on estimated speed of the plane.
  While the reefers for planes are quite specific (very light and much smaller than the big 40-foot, high-cube reefer) it is estimated, that the impacts of the operation of both of the reefers are very similar. Thus the operation of the traditional 40-foot, HC container is assumed to be adequate proxy for the specific container used in transport by plane.

## Extrapolations
This dataset has been extrapolated from year 2014 to the year of the calculation (2019). The uncertainty has been adjusted accordingly.
