# steam production, in chemical industry

Dataset: EcoSpold 2, unit process
Geography: RER
Time period: 2010-01-01 to 2019-12-31
Technology level: current
Classification: ISIC rev.4 ecoinvent: 3530:Steam and air conditioning supply
Classification: EcoSpold01Categories: washing agents/auxiliary agents
Scenario: Business-as-Usual
System model: Allocation at the point of substitution
Generated by: David FitzGerald
Published in: Althaus H.-J. 2007
Database: ecoinvent
isCopyrightProtected: true
accessRestrictedTo: 1

## General comment
This dataset represents the production of 1 kg of steam used for heating in the chemical industry. The heat is produced with the average fuel mix used in the European chemical industry.
This dataset represents only the unit conversion of steam in MJ to steam in kg, with an assumed energy content of 2.75 MJ/kg. The energy losses and water use are taken into account in the upstream process, which is based on data from Eurostat (2017). Even though the reference product is expressed in kg, the exchange does not have any mass, as all inputs and emissions are already included in its supply chain. It can be used as an exchange for a massless carrier of energy.
References:
Althaus H.-J., Chudacoff M., Hischier R., Jungbluth N., Osses M. and Primas A. (2007) Life Cycle Inventories of Chemicals. ecoinvent report No. 8, v2.0. EMPA Dübendorf, Swiss Centre for Life Cycle Inventories, Dübendorf, CH.
Eurostat (2017) Energy Balances (2017 edition), http://ec.europa.eu/eurostat/web/energy/data/energy-balances (last accessed on the 2017-08-22).

## Included activities start
The activity starts with the input of heat required to produce 1 kg of steam.

## Included activities end
The activity ends with the production of 1 kg of steam. The energy and water losses are taken into account in the upstream process. Assuming a closed loop of water with the losses already taken into account, no further water flows are included in this process.

## Geography
Average steam production in the European chemical industry.

## Technology
Average technology used in the chemical and plastics industry in Europe.
Two types of boilers are commonly used:
1) fired tube boilers, which are cylinder-shaped, and closed at both ends by tubular plates enclosing the following items: a large diameter furnace tube passing longitudinally through the cylindrical body, and in which combustion occurs; flue gas tubes (or smoke tubes) in which the flue gas circulate.
Schematic view of a fire tube boiler:
These boilers produce steam and high pressure hot water, and their power ranges from 3 to 20 MWt. They are currently most often equipped with low NOx type burners, which use primary measures for the reduction of NOx emissions (natural gas staging technique or/and flue gas recirculation).
2) water tube boiler, which comprises many tubes connected to 1 or 2 tanks; the upper tank containing the water-steam emulsion, and the lower tank containing water.
Schematic view of a water tube boiler:
Most often this type of boiler is built specifically according to the power and specifications required. The range of powers starts at 15 or 20 MWt, up to several hundreds of MWth, and even beyond. They are currently most often equipped with low NOx type burners, that use natural gas staging technique or/and internal flue gas recirculation.
Reference:
Zah R., Hischier R. (2007) Life Cycle Inventories of Detergents. ecoinvent report No.
12. Swiss Centre for Life Cycle Inventories, Dübendorf, 2007.

## Reference product
- steam, in chemical industry: 1 kg; By-product classification allocatable product; CPC 17300: Steam and hot water; CAS 108-31-6
  Steam made from water serves as process reactant or heat carrier in many chemical processes. Even though the functional unit is in kg, the exchange does not have any mass, as all inputs and emissions are already included in its supply chain. It can be used as an exchange for a massless carrier of energy.
  production volume 3.27023e11 kg; = 53.6994*41868000000*0.4/2.75
    According to Cefic (2016), the fuel and power consumption in the EU chemical industry in 2010 amounted to 53.6994 million tonnes of oil equivalent. Roughly 40% of the energy is assumed to be delivered in the form of steam, based on data for the United States (JISEA, 2016). The mass of steam is calculated assuming an energy content of steam of 2.75 MJ/kg (Althaus et al., 2007).
    References:
    Cefic (2016). The European Chemical Industry - Facts & Figures 2016, Chart 5.1 - Fuel and power consumption in the EU chemical industry.
    The Joint Institute for Strategic Energy Analysis (JISEA) (2016). Generation and Use of Thermal Energy in the U.S. Industrial Sector and Opportunities to Reduce its Carbon Emissions. National Renewable Energy Laboratory (NREL), www.nrel.gov/publications.
    Althaus H.-J., Chudacoff M., Hischier R., Jungbluth N., Osses M. and Primas A. (2007) Life Cycle Inventories of Chemicals. ecoinvent report No. 8, v2.0. EMPA Dübendorf, Swiss Centre for Life Cycle Inventories, Dübendorf, CH.
  property price 0.0396281 EUR2005
    Calculated based on inputs: The price of the product has been calculated as a sum of the values of the material and energy inputs for this product. This value is therefore a rough estimation. It may underestimate the real price since there are additional expenses when producing any product. These expences can include for example labour costs, treatment of waste materials and profit for the producer. Please consider carefully whether this level of data quality is acceptable for your application.
  property carbon content 0
    carbon content on a dry matter basis (reserved; not for manual entry)
  properties: dry mass 0 kg, carbon content, fossil 0, water in wet mass 0 kg, wet mass 0 kg, carbon content, non-fossil 0, water content 0, carbon allocation 0 kg

## Inputs from technosphere
- heat, from steam, in chemical industry: 2.75 MJ; source Althaus H.-J. 2007; lognormal variance with pedigree 0.010025, pedigree (2,3,2,2,3)
  Energy content of steam = 2.75 MJ/kg or 2.4 MJ/kg (latter if condensed steam is reheated).

## Sampling procedure
This dataset represents only the conversion of steam in MJ to steam in kg. The underlying data for steam production in the chemical industry are described in the upstream process.

## Extrapolations
This dataset has been extrapolated from year 2017 to the year of the calculation (2019). The uncertainty has been adjusted accordingly.
