# operation, computer, laptop, standby/sleep mode

Dataset: EcoSpold 2, unit process
Geography: CH
Time period: 2001-01-01 to 2019-12-31
Technology level: current
Classification: EcoSpold01Categories: electronics/services
Classification: ISIC rev.4 ecoinvent: 8219:Photocopying, document preparation and other specialized office support act
Synonyms: Notebook; Lifebook
Tags: ConvertedDataset; Operation
Scenario: Business-as-Usual
System model: Allocation at the point of substitution
Generated by: Martin Lehmann
Published in: Hischier R. 2007
Database: ecoinvent
isCopyrightProtected: false
accessRestrictedTo: 1

## General comment
The laptop use in the standby/sleep mode includes the share of the laptop computer production, the energy consumption (use-phase) for the laptop (incl. monitor) and the rail and road transport from factory to user. Energy consumption of laptop computers (use-phase) vary a lot depending on the device looked at. Min.-Max. values are listed; the mean value is calculated via the most likely value according to the reference data. Due to relatively vague literature data for laptop computer life span, assumptions had to be made.
[This dataset was already contained in the ecoinvent database version 2. It was not individually updated during the transfer to ecoinvent version 3. Life Cycle Impact Assessment results may still have changed, as they are affected by changes in the supply chain, i.e. in other datasets. This dataset was generated following the ecoinvent quality guidelines for version 2. It may have been subject to central changes described in the ecoinvent version 3 change report (http://www.ecoinvent.org/database/ecoinvent-version-3/reports-of-changes/), and the results of the central updates were reviewed extensively. The changes added e.g. consistent water flows and other information throughout the database. The documentation of this dataset can be found in the ecoinvent reports of version 2, which are still available via the ecoinvent website. The change report linked above covers all central changes that were made during the conversion process.]

## Included activities end
Describes the use of a laptop computer in the standby/sleep mode. Calculated per 1 hour of laptop use. Laptop computer life span assumed to be 4 years. Standby/sleep mode 2 hours a day (office use), 240 days a year. Swiss supply mix applied for electricity consumption (low voltage).

## Geography
The data is based on information by international computer manufacturers and literature (standby/sleep mode consumption).

## Technology
No technology involved, except for the production of the laptop computer, which is described in another dataset.

## Reference product
- operation, computer, laptop, standby/sleep mode: 1 hour; CPC 85: Support services; By-product classification allocatable product
  EcoSpold01Location=CH
  production volume 0.0336675 hour
    This is a placeholder value that does not reflect real-world production volumes. This dataset does not currently require a real-world production volume to work in the database framework, and no actual data were collected yet. This has no negative effect on the results of the ecoinvent database. The placeholder value of this activity was scaled according to the nominal GDP of 2005 (source: United Nations, http://data.un.org/Glossary.aspx?q=GDP+%28current+US%24%29, accessed 20130726) to reflect an appropriate share of the global production volume, which is also a placeholder value.
  property price 0.0249715 EUR2005
    Calculated based on inputs: The price of the product has been calculated as a sum of the values of the material and energy inputs for this product. This value is therefore a rough estimation. It may underestimate the real price since there are additional expenses when producing any product. These expences can include for example labour costs, treatment of waste materials and profit for the producer. Please consider carefully whether this level of data quality is acceptable for your application.

## Inputs from technosphere
- electricity, low voltage: 0.004 kWh; lognormal variance with pedigree 0.041225, pedigree (2,3,5,2,1)
  EcoSpold01Location=CH
- computer, laptop: 2.8539e-5 unit; lognormal variance with pedigree 0.052625, pedigree (3,3,5,2,1)
  EcoSpold01Location=GLO
  properties: carbon content, non-fossil 1.2662e-5, carbon content, fossil 0.257799, wet mass 3.15 kg, dry mass 3.15 kg
  note on carbon content, non-fossil: Calculated as the addition of C contents in the product composition, then referred to 1 kg DM

## Sampling procedure
Manufacturers, literature and own assumptions.

## Extrapolations
This dataset has been extrapolated from year 2006 to the year of the calculation (2019). The uncertainty has been adjusted accordingly.

## Review by Jürgen Sutter 2007-09-14
passed
none
