# treatment of filter dust from Al electrolysis, residual material landfill

Dataset: EcoSpold 2, unit process
Geography: CH
Time period: 1994-01-01 to 2019-12-31
Technology level: current
Classification: EcoSpold01Categories: waste management/residual material landfill
Classification: ISIC rev.4 ecoinvent: 3822:Treatment and disposal of hazardous waste
Synonyms: electrostatic precipitator dust from aluminium electrolysis; filter dust from aluminium electrolysis; Cyclone filter dust from aluminium electrolysis
Tags: ConvertedDataset; Treatment
Scenario: Business-as-Usual
System model: Allocation at the point of substitution
Generated by: Gabor Doka (obsolete)
Published in: Doka G. 2009
Database: ecoinvent
isCopyrightProtected: true
accessRestrictedTo: 1

## General comment
Inventoried waste contains 100% filter dust, aluminium electrolysis; .
waste composition (wet, in ppm): upper heating value 0.18 MJ/kg; lower heating value 0.18 MJ/kg; H2O n.a.; O 382240; H n.a.; C 115860; S n.a.; N n.a.; P 580; B n.a.; Cl n.a.; Br n.a.; F 90510; I n.a.; Ag n.a.; As n.a.; Ba n.a.; Cd n.a.; Co n.a.; Cr 50; Cu 570; Hg n.a.; Mn n.a.; Mo n.a.; Ni 510; Pb 390; Sb n.a.; Se n.a.; Sn n.a.; V 480; Zn 30; Be n.a.; Sc n.a.; Sr n.a.; Ti 390; Tl n.a.; W n.a.; Si 460; Fe 5450; Ca n.a.; Al 338200; K n.a.; Mg 900; Na 63080;
Share of carbon in waste that is biogenic 0%.
Additional solidification with 0.3999 kg of cement.
[This dataset was already contained in the ecoinvent database version 2. It was not individually updated during the transfer to ecoinvent version 3. Life Cycle Impact Assessment results may still have changed, as they are affected by changes in the supply chain, i.e. in other datasets. This dataset was generated following the ecoinvent quality guidelines for version 2. It may have been subject to central changes described in the ecoinvent version 3 change report (http://www.ecoinvent.org/database/ecoinvent-version-3/reports-of-changes/), and the results of the central updates were reviewed extensively. The changes added e.g. consistent water flows and other information throughout the database. The documentation of this dataset can be found in the ecoinvent reports of version 2, which are still available via the ecoinvent website. The change report linked above covers all central changes that were made during the conversion process.]

## Included activities end
Waste-specific short-term emissions to water from leachate. Long-term emissions from landfill to ground water. Expenditures for solidificalion with cement (user-specified option)

## Geography
Technology encountered in Switzerland in 2000. Landfill includes base seal and leachate collection system.

## Technology
Swiss residual material landfill for polluted, inorganic waste. With base seal and leachate collection system. Recultivation after closure.

## Time period
Waste composition as given in literature reference, theoretical data or other source. Transfer coefficients from prospective model.

## Reference product
- filter dust from Al electrolysis: -1 kg; CPC 39990: Other wastes n.e.c.; By-product classification Waste
  EcoSpold01Location=CH
  production volume 0.0336675 kg
    This is a placeholder value that does not reflect real-world production volumes. This dataset does not currently require a real-world production volume to work in the database framework, and no actual data were collected yet. This has no negative effect on the results of the ecoinvent database. The placeholder value of this activity was scaled according to the nominal GDP of 2005 (source: United Nations, http://data.un.org/Glossary.aspx?q=GDP+%28current+US%24%29, accessed 20130726) to reflect an appropriate share of the global production volume, which is also a placeholder value.
  property price 0 EUR2005
    Waste products are assigned a price of zero as they are assumed to require further treatment.
  property carbon content 0.11586
    carbon content on a dry matter basis (reserved; not for manual entry)
  properties: water content 0, carbon content, non-fossil 0, dry mass 1 kg, water in wet mass 0 kg, wet mass 1 kg, carbon content, fossil 0.11586, carbon allocation 0.11586 kg

## Inputs from technosphere
- cement, unspecified: 0.39988 kg; lognormal variance with pedigree 0.05, pedigree (1,1,5,1,1)
  Cement for solidification of residual material waste. Uncertainty in mass from solidification recipe.
  EcoSpold01Location=CH
  properties: dry mass 1 kg, wet mass 1 kg
- residual material landfill: 2.0827e-9 unit; lognormal variance with pedigree 0.04, pedigree (1,1,5,1,1)
  demands per kilogram waste. uncertainty is heeded in the module
  EcoSpold01Location=CH
- process-specific burdens, residual material landfill: 0.9997 kg; lognormal variance with pedigree 0.04, pedigree (1,1,5,1,1)
  EcoSpold01Location=CH
  demands per kilogram waste. uncertainty is heeded in the module;activityLink introduced to establish a direct link to the corresponding regional supply of this product
- waste cement, hydrated: -0.9997 kg; lognormal variance with pedigree 0.05, pedigree (1,1,5,1,1)
  EcoSpold01Location=CH
  Hydrated cement for solidification of residual material waste. Uncertainty in mass from solidification recipe.
  production volume 0.9997 kg
    Calculated from the production volume of filter dust from Al electrolysis, 0% water in proportion to the respective output amounts.
  properties: dry mass 1 kg, wet mass 1 kg

## Emissions to nature
- Copper, ion [water, surface water]: 3.6631e-8 kg; lognormal variance with pedigree 1.79, pedigree (1,1,5,1,1)
  uncertainty is calculated from uncertainties in waste composition and transfer coefficients in residual landfill
- TOC, Total Organic Carbon [water, surface water]: 0.000125 kg; lognormal variance with pedigree 0.79, pedigree (1,1,5,1,1)
  (same comment as for Copper, ion)
- DOC, Dissolved Organic Carbon [water, ground-, long-term]: 0.074875 kg; lognormal variance with pedigree 0.2, pedigree (1,1,5,1,1)
  uncertainty is calculated from uncertainties in waste composition and transfer coefficients in incinerator and landfills.
- Iron, ion [water, surface water]: 4.5601e-8 kg; lognormal variance with pedigree 1.76, pedigree (1,1,5,1,1)
  (same comment as for Copper, ion)
- Vanadium, ion [water, surface water]: 1.178e-6 kg; lognormal variance with pedigree 1.33, pedigree (1,1,5,1,1)
  (same comment as for Copper, ion)
- DOC, Dissolved Organic Carbon [water, surface water]: 0.000125 kg; lognormal variance with pedigree 0.79, pedigree (1,1,5,1,1)
  (same comment as for Copper, ion)
- Titanium, ion [water, surface water]: 1.9328e-7 kg; lognormal variance with pedigree 1.57, pedigree (1,1,5,1,1)
  (same comment as for Copper, ion)
- Nickel, ion [water, surface water]: 3.0825e-7 kg; lognormal variance with pedigree 1.5, pedigree (1,1,5,1,1)
  (same comment as for Copper, ion)
- Copper, ion [water, ground-, long-term]: 2.1942e-5 kg; lognormal variance with pedigree 3.42, pedigree (1,1,5,1,1)
  (same comment as for DOC, Dissolved Organic Carbon)
- Zinc, ion [water, ground-, long-term]: 3.6768e-7 kg; lognormal variance with pedigree 6.01, pedigree (1,1,5,1,1)
  (same comment as for DOC, Dissolved Organic Carbon)
- Nickel, ion [water, ground-, long-term]: 0.00018464 kg; lognormal variance with pedigree 1.04, pedigree (1,1,5,1,1)
  (same comment as for DOC, Dissolved Organic Carbon)
- TOC, Total Organic Carbon [water, ground-, long-term]: 0.074875 kg; lognormal variance with pedigree 0.2, pedigree (1,1,5,1,1)
  (same comment as for DOC, Dissolved Organic Carbon)
- Titanium, ion [water, ground-, long-term]: 0.00011577 kg; lognormal variance with pedigree 1.19, pedigree (1,1,5,1,1)
  (same comment as for DOC, Dissolved Organic Carbon)
- Silicon [water, surface water]: 1.0345e-6 kg; lognormal variance with pedigree 1.35, pedigree (1,1,5,1,1)
  (same comment as for Copper, ion)
- Sodium, ion [water, surface water]: 0.023673 kg; lognormal variance with pedigree 0.23, pedigree (1,1,5,1,1)
  (same comment as for Copper, ion)
- Aluminium [water, surface water]: 0.00016761 kg; lognormal variance with pedigree 0.82, pedigree (1,1,5,1,1)
  (same comment as for Copper, ion)
- Chromium VI [water, ground-, long-term]: 9.4944e-6 kg; lognormal variance with pedigree 1.1, pedigree (1,1,5,1,1)
  (same comment as for DOC, Dissolved Organic Carbon)
- Magnesium [water, surface water]: 1.7072e-7 kg; lognormal variance with pedigree 1.58, pedigree (1,1,5,1,1)
  (same comment as for Copper, ion)
- BOD5, Biological Oxygen Demand [water, ground-, long-term]: 0.061893 kg; lognormal variance with pedigree 0.2, pedigree (1,1,5,1,1)
  (same comment as for DOC, Dissolved Organic Carbon)
- Fluoride [water, surface water]: 0.0049049 kg; lognormal variance with pedigree 0.35, pedigree (1,1,5,1,1)
  (same comment as for Copper, ion)
- Phosphate [water, surface water]: 6.6329e-7 kg; lognormal variance with pedigree 1.55, pedigree (1,1,5,1,1)
  (same comment as for Copper, ion)
- Chromium VI [water, surface water]: 3.0056e-6 kg; lognormal variance with pedigree 1.26, pedigree (1,1,5,1,1)
  (same comment as for Copper, ion)
- Iron, ion [water, ground-, long-term]: 2.7315e-5 kg; lognormal variance with pedigree 7.49, pedigree (1,1,5,1,1)
  (same comment as for DOC, Dissolved Organic Carbon)
- Aluminium [water, ground-, long-term]: 0.1004 kg; lognormal variance with pedigree 0.44, pedigree (1,1,5,1,1)
  (same comment as for DOC, Dissolved Organic Carbon)
- COD, Chemical Oxygen Demand [water, ground-, long-term]: 0.18922 kg; lognormal variance with pedigree 0.2, pedigree (1,1,5,1,1)
  (same comment as for DOC, Dissolved Organic Carbon)
- Silicon [water, ground-, long-term]: 0.00045897 kg; lognormal variance with pedigree 0.8, pedigree (1,1,5,1,1)
  (same comment as for DOC, Dissolved Organic Carbon)
- Phosphate [water, ground-, long-term]: 0.00039731 kg; lognormal variance with pedigree 1.33, pedigree (1,1,5,1,1)
  (same comment as for DOC, Dissolved Organic Carbon)
- Fluoride [water, ground-, long-term]: 0.085605 kg; lognormal variance with pedigree 0.17, pedigree (1,1,5,1,1)
  (same comment as for DOC, Dissolved Organic Carbon)
- Lead [water, surface water]: 3.3772e-9 kg; lognormal variance with pedigree 2.1, pedigree (1,1,5,1,1)
  (same comment as for Copper, ion)
- Sodium, ion [water, ground-, long-term]: 0.039407 kg; lognormal variance with pedigree 0.21, pedigree (1,1,5,1,1)
  (same comment as for DOC, Dissolved Organic Carbon)
- Vanadium, ion [water, ground-, long-term]: 0.00036893 kg; lognormal variance with pedigree 0.81, pedigree (1,1,5,1,1)
  (same comment as for DOC, Dissolved Organic Carbon)
- Lead [water, ground-, long-term]: 2.023e-6 kg; lognormal variance with pedigree 7.74, pedigree (1,1,5,1,1)
  (same comment as for DOC, Dissolved Organic Carbon)
- BOD5, Biological Oxygen Demand [water, surface water]: 0.00010333 kg; lognormal variance with pedigree 0.79, pedigree (1,1,5,1,1)
  (same comment as for Copper, ion)
- Zinc, ion [water, surface water]: 6.1382e-10 kg; lognormal variance with pedigree 2.33, pedigree (1,1,5,1,1)
  (same comment as for Copper, ion)
- Magnesium [water, ground-, long-term]: 0.00010226 kg; lognormal variance with pedigree 1.89, pedigree (1,1,5,1,1)
  (same comment as for DOC, Dissolved Organic Carbon)
- COD, Chemical Oxygen Demand [water, surface water]: 0.00031589 kg; lognormal variance with pedigree 0.79, pedigree (1,1,5,1,1)
  (same comment as for Copper, ion)

## Sampling procedure
Landfill model based on observed leachate concentrations in literature. Extrapolated to 60'000 years heeding chemical characteristics. Initial waste composition from various literature sources.

## Extrapolations
This dataset has been extrapolated from year 2000 to the year of the calculation (2019). The uncertainty has been adjusted accordingly.

## Review by Niels Jungbluth 2009-02-15
passed.
