# gold mine operation with extraction

Dataset: EcoSpold 2, unit process
Geography: PE
Time period: 2010-01-01 to 2019-12-31
Technology level: current
Classification: ISIC rev.4 ecoinvent: 072:Mining of non-ferrous metal ores
Scenario: Business-as-Usual
System model: Allocation at the point of substitution
Share of production covered: 9.23 %
Generated by: Katherine Matos
Database: ecoinvent
isCopyrightProtected: true
accessRestrictedTo: 1

## General comment
This dataset describes the production of gold-silver dore in Peru.
The mining operations are located in Ancash (Peru). The data set includes the mining, beneficiation, and smelting process to obtain gold-silver dore containing gold, silver and impurities.
The data were collected from the available information reported on the Environmental Impact Studies and available information from a representative gold mine in Peru. The emissions were analyzed based on the Environmental.monitoring reports of the mining company.
The system includes energy, reagents water consumption, and air and water emissions.
The metallurgical process treats mineralized material through a conventional two-stage crushing plant, followed by a heap leaching process, minerals of greater granulometry are directly sent to the leach pad system. The solution from the leach pad system is captured in the column carbon process plant (CIC) to concentrate part of the rich solution, and then recover the gold and silver metals through the Merrill Crowe process of precipitation with zinc dust.
The industrial process mainly comprises the following stages:
- Handling the ore to the crushing area.
- Primary and secondary crushing.
- Transport and unloading of crushed ore to the heap leaching system.
- Leaching in piles applying irrigation of diluted solution of sodium cyanide.
- CIC Plant
- Precipitation with zinc dust.
- Filtration of the precipitate.
- Smelting
The activity ends when the gold-silver ingots (dore) are ready to be transported to their final destination.

[This dataset is meant to replace the following datasets:
- gold-silver mine operation with refinery, PE, 2004 - 2006]

## Included activities start
The modeled system starts with the explotation of the mineral ore.

## Included activities end
This dataset includes the mining, beneficiation and smelting process to obtain gold-silver dore. The system includes energy, reagents water consumption, and air and water emissions. Industrial water is treated before is discharged to the environment. Note that the water emissions are limited on what is reported on site.

## Geography
Inputs and outputs for mining, beneficiation and smelting are from a peruvian mining company located in Huaraz province. Mining and smelting activitites take place in only one location.

## Technology
Modeled mine is an open pit (100%), gold recovery is done through a leaching process.
The solution from the leach pad system is captured in the column carbon process plant (CIC) to concentrate part of the rich solution, and then recover the gold and silver metals through the Merrill Crowe process of precipitation with zinc dust.
The industrial process mainly comprises the following stages:
- Handling the ore to the crushing area.
- Primary and secondary crushing.
- Transport and unloading of crushed ore to the heap leaching system.
- Leaching in piles applying irrigation of diluted solution of sodium cyanide.
- CIC Plant
- Precipitation with zinc dust.
- Filtration of the precipitate.
- Smelting
.

## Time period
The data was collected from the Environmental Impact Studies (2011-2014), monitoring reports (2015-2016) and other technical information (2010-2016). Therefore the time period is set on 2010-2016.

## Reference product
- gold-silver, ingot: 1 kg; name Gold; source Peruvian Ministry of Energy and Mines  2016; CPC 41320: Gold (including gold plated with platinum), unwrought or in semi-manufactured forms, or in powder form; By-product classification allocatable product
  Calculated value based on the gold anual production reported by the Ministry of Energy and Mines (2016),
  production volume 323697 kg; name gold_PV
    Estimated value, based on the anual national production of Au reported by the Peruvian Ministry of Energy and Mines (2016). An average grade of 40%.
  property price 1011 EUR2005; name Gold_price_EUR2005
    The price of gold is estimated to be 10600 Euro (Temporary price data. Calculated as 90% of purchasers price based on: Source: ecoinvent v2 report 10-part IX, Tab 2.5). The price of silver is estimated to be 178 Euro (Temporary price data. Calculated as 90% of purchasers price based on: Source: ecoinvent v2 report 10-part IX, Tab 5.10 & 2.5). The amount of gold in this gold-silver ingot is 0.0853kg based on the properties supplied by the data provider. The amount of silver in this gold-ingot is 0.5992kg based on the properties supplied by the data provider.
  property carbon content 0
    carbon content on a dry matter basis (reserved; not for manual entry)
  property true value 1011; name Gold_true_value
    allocation property applied in "true value" allocation // value calculated from revenue
  properties: wet mass 1 kg, water in wet mass 0 kg, dry mass 1 kg, gold content 0.2741, silver content 0.6295, carbon content, fossil 0, water content 0, carbon content, non-fossil 0, carbon allocation 0 kg

## By-products
- heat, for reuse in municipal waste incineration only: 0 MJ; CPC 17300: Steam and hot water; By-product classification allocatable product; pedigree (1,1,1,1,1)
  Net electricity generated from this waste and used in internal MSWI plant energy redistribution.
  Uncertainty: uncertainty is calculated from uncertainties in waste composition and uncertainties in energy efficiency and the uncertainty in internal energy demand
  production volume 2.02122e6 MJ
  property exergy 0.1842 MJ; name E_th_prod_MSWI_exergy
    This exergy property is based on the exergy content of the product.
  property price 0.0106 EUR2005; name E_th_prod_MSWI_price_EUR2005
    Average European district heat price from Ecoheatcool and Euroheat 2005-2006, Ecoheat Work package 1: The European heat market. Final report. 10.6 EUR/GJ i s the price of district heat. http://www.solarthermalworld.org/files/Ecoheatcool%20WP1%20Web.pdf?download
  property true value relation 0.1842; name E_th_prod_MSWI_true_value_relation
    property to calculate "true value" from
  property true value 0.0411672
    allocation property applied in "true value" allocation // value calculated from true value relation
- electricity, for reuse in municipal waste incineration only: 0 kWh; CPC 17100: Electrical energy; By-product classification allocatable product; pedigree (1,1,1,1,1)
  (same comment as for heat, for reuse in municipal waste incineration only)
  production volume 280725 kWh
  property price 0.1 EUR2005; name E_el_prod_MSWI_price_EUR2005
    Estimated to be the same price as in case of electricity, medium voltage.
  property exergy 3.6 MJ; name E_el_prod_MSWI_exergy
    This exergy property is based on the exergy content of the product.
  property true value relation 3.6; name E_el_prod_MSWI_true_value_relation
    property to calculate "true value" from
  property true value 0.111746
    (same comment as for heat, for reuse in municipal waste incineration only)

## Inputs from technosphere
All rows: source Golder Associates Peru S.A. 2014
- nitric acid, without water, in 50% solution state: 3.25487 kg; lognormal variance with pedigree 0.0038, pedigree (2,3,3,1,1)
  Literature value based on the chemicals requirements projected on the Environmental Impact Study (2014).
  properties: dry mass 1 kg, wet mass 1 kg
- iron sulfate: 0.833093 kg; lognormal variance with pedigree 0.002, pedigree (2,3,2,1,1)
  (same comment as for nitric acid, without water, in 50% solution state)
  properties: dry mass 1 kg, wet mass 1 kg
- sodium cyanide: 75.8308 kg; lognormal variance with pedigree 0.0038, pedigree (2,3,3,1,1)
  (same comment as for nitric acid, without water, in 50% solution state)
  properties: carbon content, fossil 0.244898, dry mass 1 kg, wet mass 1 kg
- soda ash, dense: 0.39994 kg; lognormal variance with pedigree 0.002, pedigree (2,3,2,1,1)
  Literature value, reported on the chemicals requirements projected on the Environmental Impact Study (2014).
  properties: carbon content, fossil 0.113208, dry mass 1 kg, wet mass 1 kg
- lime, packed: 1087.84 kg; lognormal variance with pedigree 0.0038, pedigree (2,3,3,1,1)
  (same comment as for nitric acid, without water, in 50% solution state)
  properties: carbon content, fossil 0.117492, dry mass 0.998 kg, wet mass 1 kg, water content 0.00200401
- activated carbon, granular: 2.16992 kg; lognormal variance with pedigree 0.002, pedigree (2,3,2,1,1)
  (same comment as for nitric acid, without water, in 50% solution state)
  property dry mass 0.97 kg; name GAC_DM
  property carbon content, non-fossil 0; name GAC_C_content_non_fossil
  property wet mass 1 kg; name GAC_WM
  property carbon content, fossil 0.81; name GAC_C_content_fossil
  property water in wet mass 0.03 kg; name GAC_WWM
  property water content 0.0309278; name GAC_water_content
  note on carbon content, fossil: Literature value. From Biomass and Bioenergy: Processing and Properties (2014) edited by Khalid Rehman Hakeem, Mohammad Jawaid, Umer Rashid (p. 252). Carbon content is in the range of 72-90%, an average value of 81% is taken.
- blasting: 119.523 kg; lognormal variance with pedigree 0.002, pedigree (2,3,2,1,1)
  Literature valure reported on the Environmental Impact Study (2014) from a representative peruvian gold mining company.
- wastewater, unpolluted: -97.2853 m3; name ByP_2; lognormal variance with pedigree 0.002, pedigree (2,3,2,1,1)
  Water is treated before being discharged to the river.
  production volume 3.14957e7 m3; = ByP_2/gold*gold_PV
    Calculated from production volume of reference product using the relative outputs.
  property price 0 EUR2005; name ByP_2_price_EUR2005
  properties: water content 2962.17, dry mass 0.337476 kg, carbon content, fossil 0.00178991, wet mass 1000 kg, carbon content, non-fossil 0.00178991
  note on carbon content, fossil: Assumed to be like in tap water. Bicarbonate content is 2.93 mol/m3. CO2 content is 0.1 mol/m3 (ecoinvent v2.2 report 8, Tab 93.1).
- sulfuric acid: 2.09242 kg; lognormal variance with pedigree 0.0038, pedigree (2,3,3,1,1)
  (same comment as for nitric acid, without water, in 50% solution state)
  properties: wet mass 1 kg, dry mass 1 kg
- diesel, burned in building machine: 21479.1 MJ; lognormal variance with pedigree 0.002, pedigree (2,3,2,1,1)
  Calculated value based on the diesel requirements reported on the Environmental Impact Study (2014) from a representative mining company. The calorific value used is 32 MJ/L of diesel.
- sulfidic tailings, from gold mine operation: -489296 kg; name ByP_1; lognormal variance with pedigree 0.0052, pedigree (3,3,3,1,1)
  Calculated value based on the amount of mineral removed for the production of the reference product.
  production volume 1.58407e11 kg; = byP_1/gold*gold_PV
    Calculated from production volume of reference product using the relative outputs.
  property gold content 2.59923e-7; name ByP_1_Au_content
  property price 0 EUR2005; name ByP_1_price_EUR2005
  property silver content 1.91369e-6; name ByP_1_Ag_content
  properties: oxygen content 0.88758, dry mass 0.85 kg, water content 0.176471, silicon content 0.056714, iron content 0.014628, aluminium content 0.017079, wet mass 1 kg, calcium content 0.0089, magnesium content 0.0020127, fluorine content 0.0011041, potassium content 0.0031243, sodium content 0.0014916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
- zinc: 2.07304 kg; lognormal variance with pedigree 0.0038, pedigree (2,3,3,1,1)
  (same comment as for nitric acid, without water, in 50% solution state)
  properties: dry mass 1 kg, wet mass 1 kg
- electricity, medium voltage: 1406.76 kWh; lognormal variance with pedigree 0.002, pedigree (2,3,2,1,1)
  (same comment as for blasting)
- sodium hydroxide, without water, in 50% solution state: 4.68857 kg; lognormal variance with pedigree 0.0038, pedigree (2,3,3,1,1)
  (same comment as for nitric acid, without water, in 50% solution state)
  properties: wet mass 1 kg, dry mass 1 kg
- petrol, unleaded, burned in machinery: 223.242 MJ; lognormal variance with pedigree 0.002, pedigree (2,3,2,1,1)
  (same comment as for diesel, burned in building machine)
- mine infrastructure, gold and silver: 1.93742e-5 unit; lognormal variance with pedigree 0.0014, pedigree (1,3,2,1,1)
  Own calculation based on the annual production.;activityLink introduced to establish a direct link to the corresponding regional supply of this product
- sodium borates: 0.999849 kg; lognormal variance with pedigree 0.002, pedigree (2,3,2,1,1)
  (same comment as for nitric acid, without water, in 50% solution state)
  properties: wet mass 1 kg, dry mass 1 kg

## Inputs from nature
- Gold, in ground [natural resource, in ground]: 0.401223 kg; source Golder Associates Peru S.A. 2014; lognormal variance with pedigree 0.0034, pedigree (3,3,2,1,1)
  Calculated value based on the mineral ore grade (0.82 g/ton Au , 3.2 g/ton Ag) and the anual Au production reported by the Ministry of Energy and Mines (2016).
- Water, unspecified natural origin [natural resource, in water]: 53.7674 m3; name Water_undefined; source Golder Associates Peru S.A. 2014; lognormal variance with pedigree 0.0052, pedigree (3,3,3,1,1)
  Literature value based on the overall water that is collected during the mining operations. Includes filtration water from the open pit and surface run-off water. Water is treated and reused for the mining operations.
- Gangue, in ground [natural resource, in ground]: 488018 kg; source Peruvian Ministry of Energy and Mines  2016; lognormal variance with pedigree 0.0052, pedigree (3,3,3,1,1)
  (same comment as for Gold, in ground)
- Silver, in ground [natural resource, in ground]: 1.56575 kg; source Golder Associates Peru S.A. 2014; lognormal variance with pedigree 0.0034, pedigree (3,3,2,1,1)
  (same comment as for Gold, in ground)
- Water, lake [natural resource, in water]: 51.4922 m3; name water_lake; source Golder Associates Peru S.A. 2014; lognormal variance with pedigree 0.0072, pedigree (3,3,3,5,1)
  Literature value based on the water requirement

## Emissions to nature
- Particulates, > 2.5 um, and < 10um [air, non-urban air or from high stacks]: 6.85687 kg; source Golder Associates Peru S.A. 2014; lognormal variance with pedigree 0.1246, pedigree (3,3,3,1,1)
  Calculated value based on EPA equations for the following activities: Truckloading, material handling, nivelation, drilling, blasting, and erosion.
  Process characteristics were extracted from the environmental impact study (MEIA,2014).
- Cyanide [water, surface water]: 0.00150695 kg; source Golder Associates Peru S.A. 2014; lognormal variance with pedigree 0.6514, pedigree (2,3,2,1,1)
  Calculated value based on the monitoring report and the annual discharged water reportd for 2016 .
- Copper, ion [water, surface water]: 0.00219121 kg; source Minera Barrick Misquichilca S.A. 2016; lognormal variance with pedigree 0.6514, pedigree (2,3,2,1,1)
  (same comment as for Cyanide)
- Aluminium [water, surface water]: 0.0155049 kg; source Golder Associates Peru S.A. 2014; lognormal variance with pedigree 0.6514, pedigree (2,3,2,1,1)
  Calculated value based on the water quality data available on en Environmental Impact Study.
- Cadmium, ion [water, surface water]: 4.38623e-5 kg; source Minera Barrick Misquichilca S.A. 2016; lognormal variance with pedigree 0.6514, pedigree (2,3,2,1,1)
  (same comment as for Cyanide)
- Mercury [air, non-urban air or from high stacks]: 1.59661e-9 kg; source Golder Associates Peru S.A. 2014; lognormal variance with pedigree 0.6606, pedigree (4,3,3,1,1)
  Calculated value based on the soil metal content registered on the Environmental Impact Study.
- Sodium, ion [water, surface water]: 0.0947478 kg; source Golder Associates Peru S.A. 2014; lognormal variance with pedigree 0.6514, pedigree (2,3,2,1,1)
  (same comment as for Aluminium)
- Arsenic, ion [water, surface water]: 8.90031e-5 kg; source Golder Associates Peru S.A. 2014; lognormal variance with pedigree 0.6514, pedigree (2,3,2,1,1)
  (same comment as for Aluminium)
- Magnesium [air, non-urban air or from high stacks]: 9.82263e-7 kg; source Golder Associates Peru S.A. 2014; lognormal variance with pedigree 0.6588, pedigree (4,3,2,1,1)
  (same comment as for Mercury)
- Water [air, non-urban air or from high stacks]: 7.72383 m3; name Water_evap; = 15%*water_lake; source Golder Associates Peru S.A. 2014; lognormal variance with pedigree 0.0072, pedigree (3,3,3,5,1)
  Calculated value based on an evaporation rate of 15% and the water balance.
- Particulates, < 2.5 um [air, non-urban air or from high stacks]: 0.0849189 kg; source Golder Associates Peru S.A. 2014; lognormal variance with pedigree 0.3028, pedigree (3,3,2,1,1)
  (same comment as for Particulates, > 2.5 um, and < 10um)
- Arsenic [air, non-urban air or from high stacks]: 1.58967e-6 kg; source Golder Associates Peru S.A. 2014; lognormal variance with pedigree 0.6588, pedigree (4,3,2,1,1)
  (same comment as for Mercury)
- Manganese [water, surface water]: 0.00660653 kg; source Golder Associates Peru S.A. 2014; lognormal variance with pedigree 0.6514, pedigree (2,3,2,1,1)
  (same comment as for Aluminium)
- Iron, ion [water, surface water]: 0.00248468 kg; source Golder Associates Peru S.A. 2014; lognormal variance with pedigree 0.6514, pedigree (2,3,2,1,1)
  (same comment as for Aluminium)
- Zinc, ion [water, surface water]: 0.00102789 kg; source Minera Barrick Misquichilca S.A. 2016; lognormal variance with pedigree 0.6514, pedigree (2,3,2,1,1)
  (same comment as for Cyanide)
- Iron [air, non-urban air or from high stacks]: 0.000104252 kg; source Golder Associates Peru S.A. 2014; lognormal variance with pedigree 0.6588, pedigree (4,3,2,1,1)
  Calculation based on the soil metal content registered on the Environmental Impact Study.
- Mercury [water, surface water]: 4.62529e-6 kg; source Golder Associates Peru S.A. 2014; lognormal variance with pedigree 0.6514, pedigree (2,3,2,1,1)
  (same comment as for Aluminium)
- Copper [air, non-urban air or from high stacks]: 4.02624e-8 kg; source Golder Associates Peru S.A. 2014; lognormal variance with pedigree 0.6588, pedigree (4,3,2,1,1)
  (same comment as for Mercury)
- Calcium, ion [water, surface water]: 0.390991 kg; source Golder Associates Peru S.A. 2014; lognormal variance with pedigree 0.6588, pedigree (2,5,2,1,1)
  (same comment as for Aluminium)
- Lead [water, surface water]: 2.83857e-5 kg; source Golder Associates Peru S.A. 2014; lognormal variance with pedigree 0.6514, pedigree (2,3,2,1,1)
  (same comment as for Aluminium)

## Sampling procedure
The data were collected from a gold company with open pit method that represent the 9.23% of the gold production in Peru (Peruvian Ministry of Mine production stadistics, 2016).

## Extrapolations
see Geography and Technology
