# treatment of spent nuclear fuel, conditioning

Dataset: EcoSpold 2, unit process
Geography: RoW
Time period: 2002-01-01 to 2019-12-31
Technology level: current
Classification: EcoSpold01Categories: nuclear power/waste treatment
Classification: ISIC rev.4 ecoinvent: 3822:Treatment and disposal of hazardous waste
Tags: ConvertedDataset; Treatment
Scenario: Business-as-Usual
System model: Allocation at the point of substitution
Generated by: Roberto Dones
Published in: Dones, R. 2007
Database: ecoinvent
isCopyrightProtected: true
accessRestrictedTo: 1

## General comment
Complying with the current Swiss project for repository of high active waste, a distance of 70 km for transport of spent fuel elements from the intermediate repository (or power plant) to the conditioning plant is assumed. This plant is hypothesized at the same site of the repository, although the final place is not yet established. As first approximation the welding of lid and bottom of the canister is described with the ecoinvent module with double lenght. Electricity use is estimated hypothesizing 50 m total movement of the canister within the plant. The total spent fuel to condition is assumed to be 1800 t heavy metal, complying with the current Swiss scenario.
[This dataset was already contained in the ecoinvent database version 2. It was not individually updated during the transfer to ecoinvent version 3. Life Cycle Impact Assessment results may still have changed, as they are affected by changes in the supply chain, i.e. in other datasets. This dataset was generated following the ecoinvent quality guidelines for version 2. It may have been subject to central changes described in the ecoinvent version 3 change report (http://www.ecoinvent.org/database/ecoinvent-version-3/reports-of-changes/), and the results of the central updates were reviewed extensively. The changes added e.g. consistent water flows and other information throughout the database. The documentation of this dataset can be found in the ecoinvent reports of version 2, which are still available via the ecoinvent website. The change report linked above covers all central changes that were made during the conversion process.]

## Included activities end
It includes transport of spent fuel elements and steel for canister, requirement of steel for canisters, steel welding, electricity consumption, and infrastructure requirement.

## Geography
Swiss conditions

## Technology
Estimation of current technologies

## Reference product
- spent nuclear fuel: -1 kg; CPC 33720: Spent (irradiated) fuel elements (cartridges) of nuclear reactors; By-product classification Waste
  EcoSpold01Location=CH
  production volume 8.5e6 kg
    Literature value. Source: International Panel on Fissile Materials (IPFP), 2011: http://fissilematerials.org/library/ipfm-spent-fuel-overview-june-2011.pdf
  property price 0 EUR2005
    Waste products are assigned a price of zero as they are assumed to require further treatment.
  property carbon content 0
    carbon content on a dry matter basis (reserved; not for manual entry)
  properties: dry mass 1 kg, water content 0, water in wet mass 0 kg, carbon content, fossil 0, wet mass 1 kg, carbon content, non-fossil 0, carbon allocation 0 kg

## Inputs from technosphere
- steel, chromium steel 18/8, hot rolled: 15.7 kg; lognormal variance with pedigree 0.042, pedigree (1,1,5,5,1)
  EcoSpold01Location=RER
  variation in lenght of canister
  properties: carbon content, fossil 0.0008, wet mass 1 kg, dry mass 1 kg
  note on carbon content, fossil: Stainless steel model is the grade 304 steel (18/8 stainless, 18% chromium 8% nickel; max. 0.08% C)
- nuclear spent fuel conditioning facility: 5.56e-7 unit; lognormal variance with pedigree 0.162, pedigree (1,1,5,5,1)
  EcoSpold01Location=CH
  uncertainty in the scenario
- welding, arc, steel: 0.008 m; lognormal variance with pedigree 0.342, pedigree (1,1,5,5,1)
  own assumption
  EcoSpold01Location=RER
- electricity, medium voltage: 0 kWh; pedigree (1,1,1,1,1)
  own assumption
  EcoSpold01Location=CH
- high level radioactive waste for final repository: -0.00235 m3; lognormal variance with pedigree 0.042, pedigree (1,1,5,5,1)
  EcoSpold01Location=CH
  uncertainty from dimension of container & content of U in heavy metal
  production volume 0.0047 m3
    Calculated from the production volume of spent nuclear fuel in proportion to the respective output amounts.
  properties: wet mass 5400 kg, dry mass 5400 kg
- electricity, medium voltage: 4.78612e-5, 8.70872e-6, 0.000201022, 0.00068417, 0.000147687, 0.000306461, 0.00100409 kWh (7 entries); lognormal variance with pedigree 0.162, pedigree (1,1,5,5,1)
  own assumption
  EcoSpold01Location=CH

## Sampling procedure
Literature

## Extrapolations
none This dataset has been copied from an original dataset covering the geography CH. The uncertainty has been adjusted accordingly.

## Review by Roberto Dones 2004-04-02
Corrected for v1.1

## Review by Emilia Moreno Ruiz 2015-10-09
price corrected
