# petroleum and gas production, off-shore

Dataset: EcoSpold 2, unit process
Geography: GB
Time period: 1998-01-01 to 2019-12-31
Technology level: current
Classification: EcoSpold01Categories: oil/production
Classification: ISIC rev.4 ecoinvent: 0610:Extraction of crude petroleum
Tags: combined production; Combined Production
Scenario: Business-as-Usual
System model: Allocation at the point of substitution
Share of production covered: 100 %
Generated by: Niels Jungbluth
Published in: Jungbluth, N. 2007
Database: ecoinvent
isCopyrightProtected: true
accessRestrictedTo: 1

## General comment
The multioutput-process 'combined offshore gas and oil production' delivers the co-products crude oil and natural gas. Allocation for co-products is based on heating value.

## Included activities end
Production of oil and gas including energy use, infrastructure and emissions. Transport by pipeline to the coast.

## Geography
Data are valid for GB.

## Technology
Mainly offshore production in the North Sea.

## Time period
Most data could be found for 1998-2000.

## Parameters
- scaling factor: 7.29927e-12 dimensionless; name scaling_factor
- total weight of all reference products: 1.06384e11 kg; name t_weight; = (0.5* 137000000000 +0.5*90200000000 *0.84)
  Used in combined production calculations

## Reference product
- natural gas, high pressure: 1 m3; name natural_gas; = (90200000000) * scaling_factor; CPC 12020: Natural gas, liquefied or in the gaseous state; By-product classification allocatable product
  Production, flare, venting, use
  Amount was scaled to the amount of reference product.
  production volume 3.76838e10 m3; name natural_gas_PV
    m3 of natural gas produced in GB in 2012 (BP, 2014). Almost all petroleum and natural gas extracted in GB comes from offshore fields (up to 98%). Value converted from BP LHV (1 cubic meter natural gas in (BP, 2014) corresponds to 0.9 kg oil equivalent. 1 kg oil equivalent corresponds to 42 MJ) to ecoinvent standard LHV of 39MJ/m3. (The source does not specify if the cubic meters are standard or norm cubic meters. See 2015, Faist Emmenegger, Mireille, Del Duce, Andrea; Zah, Rainer, Update and extension of the inventory data for energy gases, 3 - SeparatePublication.) Refrence(s): BP (2014). Statistical Review of World Energy, June 2014. Retrieved online from http://www.bp.com/content/dam/bp/excel/energy-economics/statistical-review-2015/bp-statistical-review-of-world-energy-2015-workbook.xlsx, 30 August, 2017
  property amount in multioutput activity_m3 9.02e10 m3; name natural_gas_amountMO_m3
  property carbon content, fossil 0.602381
    An average C content of 0.506 kg C/ m3 has been assumed (this average has been calculated using data in Tab 3.5, ecoinvent v2.2 report 6_V
  property amount in multioutput activity_kg 0.553051 kg; name natural_gas_amount_MO_kg; = 0.84*0.658394160583942
    The density of natural gas is considered 0.84 kg/m3. The multioutput activity produces 0.65839 m3 natural gas
  property price 0.166 EUR2005; name natural_gas_price_EUR2005
    Temporary price data. Calculated as 90% of purchasers price based on: 2005 price for Europe-27 Import (US$ and kg) in UN Commodity Trade Statistics Database - Natural gas in gaseous state (http://data.un.org/Data.aspx?q=natural+gas&d=ComTrade&f=_l1Code%3a28%3bcmdCode%3a271121; accessed 4 January 2011), using density of natural gas of 0.8 kg/m3 for unit conversion.
  property carbon content 0.602381
    carbon content on a dry matter basis (reserved; not for manual entry)
  property true value 0.109293; name natural_gas_true_value
    allocation property applied in "true value" allocation // value calculated from revenue
  properties: heating value, gross 0 MJ, carbon content, non-fossil 0, wet mass 0.84 kg, water content 0, water in wet mass 0 kg, dry mass 0.84 kg, carbon allocation 0.506 kg
- petroleum: 0 kg; CPC 12010: Petroleum oils and oils obtained from bituminous minerals, crude; By-product classification allocatable product
  EcoSpold01Location=GB
  Production
  Amount was scaled to 1.
  production volume 0 kg; name petroleum_apv
    kg of petroleum produced in GB in 2012 (BP, 2014). Almost all petroleum and natural gas extracted in GB comes from offshore fields (up to 98%). Refrence(s): BP (2014). Statistical Review of World Energy, June 2014. Retrieved online from http://www.bp.com/content/dam/bp/excel/energy-economics/statistical-review-2015/bp-statistical-review-of-world-energy-2015-workbook.xlsx, 30 August, 2017
  property price 0.192 EUR2005
    Temporary price data. Calculated as 90% of purchasers price based on: Crude oil prices from U.S. energy information administration_Independent statistics and analysis: Weekly All Countries Spot Price FOB Weighted by Estimated Export Volume (Dollars per Barrel) (http://tonto.eia.doe.gov/dnav/pet/pet_pri_wco_k_w.htm; accessed 06072010). Conversion factors - 0.159 m3/barrel with crude oil density of 853 kg/m3
  property carbon content, fossil 0.85
    C-content of crude oil is 83-87% (ecoinven report 6_IV, Tab 3.2). An average C-content of 0.85 kg C/kg crude oil was considered
  property amount in multioutput activity_kg 1 kg; name petroleum_amount_MO_kg
  property carbon content 0.85
    carbon content on a dry matter basis (reserved; not for manual entry)
  properties: water in wet mass 0 kg, dry mass 1 kg, water content 0, carbon content, non-fossil 0, wet mass 1 kg, carbon allocation 0.85 kg

## By-products
- electricity, for reuse in municipal waste incineration only: 0 kWh; CPC 17100: Electrical energy; By-product classification allocatable product; pedigree (1,1,1,1,1)
  Net electricity generated from this waste and used in internal MSWI plant energy redistribution.
  Uncertainty: uncertainty is calculated from uncertainties in waste composition and uncertainties in energy efficiency and the uncertainty in internal energy demand
  production volume 33503 kWh
  property exergy 3.6 MJ; name E_el_prod_MSWI_exergy
    This exergy property is based on the exergy content of the product.
  property true value relation 3.6; name E_el_prod_MSWI_true_value_relation
    property to calculate "true value" from
  property price 0.1 EUR2005; name E_el_prod_MSWI_price_EUR2005
    Estimated to be the same price as in case of electricity, medium voltage.
  property true value 3.14577e-8
    allocation property applied in "true value" allocation // value calculated from true value relation
- iron scrap, sorted, pressed: 0 kg; By-product classification Recyclable; CPC 39310: Slag, dross, scalings and other waste from the manufacture of iron or steel; pedigree (1,1,1,1,1)
  Iron scrap recovered from this waste.
  Uncertainty: uncertainty calculated from uncertainty in waste composition, uncertainty of share of recyclable metal, uncertainty of transfer coefficient to bottom ash, uncertainty of the efficiency of scrap removal in MSWI plant.
  production volume 858.471 kg
  property price 0.175 EUR2005
    Temporary price data. Calculated as 90% of purchasers price based on: 2005 import and export prices (total trades (USD) divided by total weight (kg) in biggest economies of the world: EU27, USA, Brasil, China, India, Japan and Russia) from UN Commodity Trade Statistics Database (http://data.un.org/Explorer.aspxDatabase [Accessed 2011.06.20]). Commodity: Waste or scrap, of cast iron
  property carbon content 0
    carbon content on a dry matter basis (reserved; not for manual entry)
  property true value 1.09016e-9
    allocation property applied in "true value" allocation // value calculated from revenue
  properties: dry mass 1 kg, water content 0, carbon content, non-fossil 0, water in wet mass 0 kg, carbon content, fossil 0, wet mass 1 kg, carbon allocation 0 kg
- heat, for reuse in municipal waste incineration only: 0 MJ; CPC 17300: Steam and hot water; By-product classification allocatable product; pedigree (1,1,1,1,1)
  (same comment as for electricity, for reuse in municipal waste incineration only)
  production volume 247484 MJ
  property exergy 0.1842 MJ; name E_th_prod_MSWI_exergy
    This exergy property is based on the exergy content of the product.
  property true value relation 0.1842; name E_th_prod_MSWI_true_value_relation
    property to calculate "true value" from
  property price 0.0106 EUR2005; name E_th_prod_MSWI_price_EUR2005
    Average European district heat price from Ecoheatcool and Euroheat 2005-2006, Ecoheat Work package 1: The European heat market. Final report. 10.6 EUR/GJ i s the price of district heat. http://www.solarthermalworld.org/files/Ecoheatcool%20WP1%20Web.pdf?download
  property true value 1.18898e-8
    (same comment as for electricity, for reuse in municipal waste incineration only)
- copper: 0 kg; source Rentz O. 1999; By-product classification allocatable product; CPC 41413: Refined copper and copper alloys, unwrought; master alloys of copper
  Literature value. Copper uses: Before end-use copper is manufactured into semi fabricated products, such as shapes and ingots (known as 'semis'). These manufacturing processes are subdivided into hot working, cold working and, if necessary, process annealing. Few of the semis are ready for use as such. They more typically travel to first-stage manufacturers, who make metal rods, wire, and casting, and then to component manufacturers who produce such things as motors, valves, and insulated cables The components in turn are incorporated by final-stage manufacturers into a variety of finished products - automobiles, commercial buildings, residential housing, and so forth. These uses account for about 79% of the world-wide consumption of copper.
  production volume 8.48064 kg
  property price 5.52 EUR2005
    Literature value (http://www.economist.com/news/business/21576714-mining-industry-has-enriched-chile-its-future-precarious-copper-solution). Average price between 20015 and 2013.
  property carbon content 0
    carbon content on a dry matter basis (reserved; not for manual entry)
  property true value 3.39699e-10
    allocation property applied in "true value" allocation // value calculated from revenue
  properties: dry mass 1 kg, water in wet mass 0 kg, wet mass 1 kg, carbon content, non-fossil 0, water content 0, carbon content, fossil 0, carbon allocation 0 kg
- zinc concentrate: 0 kg; CPC 14290: Other non-ferrous metal ores and concentrates (other than uranium or thorium ores and concentrates); By-product classification allocatable product
  Calculated value from the knowledge of the properties of both products.
  production volume 8.12262e-7 kg
  property price 0.38 EUR2005; name ByP_price_EUR2005
    Temporary price data. Calculated as 90% of purchasers price based on: Zinc content in concentrate 53%. Concentrate price per kg Zn 86.5% of refined Zn price (13.5% treatment charges according to CHR Metals Limited 2005: Dynamic cost curves. http://www.minecost.com/dynamic.pdf). 2004 zinc price from USGS (2007) Mineral commodity summaries 2007. <http://minerals.usgs.gov/minerals/pubs/mcs/2007/mcs2007.pdf> [Accessed 25 May 2010]
  property zinc content 0.53; name zinc_C_zinc_concentrate
    Zinc content on a dry matter basis. Value taken from teh "zinc mine operation" /GLO dataset.
  property dry mass 1 kg; name DM_zinc_concentrate
  property carbon content 0
    carbon content on a dry matter basis (reserved; not for manual entry)
  property true value 2.23978e-18
    allocation property applied in "true value" allocation // value calculated from revenue
  properties: wet mass 1 kg, water content 0, carbon content, non-fossil 0, carbon content, fossil 0, water in wet mass 0 kg, carbon allocation 0 kg
- iron scrap, unsorted: 0 kg; source European Aluminium Association 2008; CPC 39310: Slag, dross, scalings and other waste from the manufacture of iron or steel; By-product classification Recyclable; pedigree (1,1,1,1,1)
  production volume 0.120014 kg
  property price 0.149 EUR2005; name ironScrapAmount_price_EUR2005
    Temporary price data. Calculated as 90% of purchasers price based on: estimated at 85% of sorted scrap
  property carbon content 0
    carbon content on a dry matter basis (reserved; not for manual entry)
  property true value 1.29761e-13
    allocation property applied in "true value" allocation // value calculated from revenue
  properties: water in wet mass 0 kg, water content 0, carbon content, fossil 0, carbon content, non-fossil 0, dry mass 1 kg, wet mass 1 kg, carbon allocation 0 kg
- aluminium oxide, non-metallurgical: 0 kg; source European Aluminium Association 2008; CPC 41432: Alumina (aluminium oxide), except artificial corundum; By-product classification allocatable product; CAS 1344-28-1; pedigree (1,1,1,1,1)
  production volume 7.55204 kg
  property carbon content, non-fossil 0; name C_content_non_fossil
  property price 0.28 EUR2005; name Al2O3Amount_price_EUR2005
    From UN trade database. http://data.un.org/ Import data from the largest economies of the world are used (Brazil, India, USA, China, Japan and EU-27).
  property dry mass 1 kg; name DM
  property water content 0; name water_content
  property wet mass 1 kg; name WM
  property water in wet mass 0 kg; name WWM
  property carbon content, fossil 0; name C_content_fossil
  property carbon content 0
    carbon content on a dry matter basis (reserved; not for manual entry)
  property true value 1.53443e-11
    allocation property applied in "true value" allocation // value calculated from revenue
  properties: carbon allocation 0 kg
- aluminium, cast alloy: 0 kg; source European Aluminium Association 2008; By-product classification allocatable product; CPC 41431: Unwrought aluminium; pedigree (1,1,1,1,1)
  EcoSpold01Location=RER
  production volume 70.5948 kg
  property price 1.3 EUR2005; name castAlloyAmount_price_EUR2005
    Temporary price data. Calculated as 90% of purchasers price based on: Source: London Metal Exchange, Aluminium alloy price for 2005
  property carbon content 0
    carbon content on a dry matter basis (reserved; not for manual entry)
  property true value 6.65951e-10
    allocation property applied in "true value" allocation // value calculated from revenue
  properties: water in wet mass 0 kg, carbon content, non-fossil 0, water content 0, dry mass 1 kg, carbon content, fossil 0, wet mass 1 kg, carbon allocation 0 kg
- aluminium, wrought alloy: 0 kg; source European Aluminium Association 2008; By-product classification allocatable product; CPC 4153: Semi-finished products of aluminium or aluminium alloys; pedigree (1,1,1,1,1)
  production volume 30.9051 kg
  property price 1.44 EUR2005; name secondaryAluminiumOutput_price_EUR2005
    Estimated based on literature values and expert judgement. Aluminium ccast alloys are about 90% of the price of aluminium wrought alloys.
  property carbon content 0
    carbon content on a dry matter basis (reserved; not for manual entry)
  property true value 3.22937e-10
    allocation property applied in "true value" allocation // value calculated from revenue
  properties: wet mass 1 kg, water content 0, carbon content, fossil 0, water in wet mass 0 kg, carbon content, non-fossil 0, dry mass 1 kg, carbon allocation 0 kg

## Inputs from technosphere
- municipal solid waste: -1.47654e-6 kg; name MSW; = (( MSW_amount_MO_kg*(0.5* (petroleum/scaling_factor) +0.5* (natural_gas/scaling_factor) *0.84) / t_weight) * scaling_factor)*-1; lognormal variance with pedigree 0.04, pedigree (1,1,5,1,1)
  EcoSpold01Location=CH
  Environmental report
  Amount was scaled to the amount of reference product.
  Uncertainty: Environmental report
  production volume 133969 kg; = MSW_amount_MO_kg*(0.5* petroleum_apv +0.5* natural_gas_PV *0.84) / t_weight
    Calculated from the production volume of reference products.
  property amount in multioutput activity_kg 374000 kg; name MSW_amount_MO_kg
  properties: water content 0.297017, carbon content, non-fossil 0.261655, dry mass 0.771 kg, carbon content, fossil 0.171549, wet mass 1 kg
  note on carbon content, non-fossil: MSW composition in tab 4.1, ecoinvent v2.2 report 13_I. C content referred to 1 kg DM
- offshore platform, petroleum: 2.76357e-11 unit; name offshore_plattform_petr; = ( offshore_plattform_amount_MO_unit*(0.5* (petroleum/scaling_factor) +0.5* (natural_gas/scaling_factor) *0.84) / t_weight) * scaling_factor; lognormal variance with pedigree 0.34, pedigree (1,1,5,1,1)
  Environmental report
  Amount was scaled to the amount of reference product.
  EcoSpold01Location=OCE
  Uncertainty: Environmental report
  property amount in multioutput activity_unit 7 unit; name offshore_plattform_amount_MO_unit
- low level radioactive waste: -1.07779e-7 m3; name low_level_radwaste; = (( low_level_radwaste_amount_MO_m3*(0.5* (petroleum/scaling_factor) +0.5* (natural_gas/scaling_factor) *0.84) / t_weight) * scaling_factor)*-1; lognormal variance with pedigree 0.162, pedigree (4,4,5,5,1)
  EcoSpold01Location=CH
  Generic assumption, basic uncertainity = 2
  Amount was scaled to the amount of reference product.
  Uncertainty: Generic assumption, basic uncertainity = 2
  production volume 9779.02 m3; = low_level_radwaste_amount_MO_m3*(0.5* petroleum_APV +0.5* natural_gas_PV *0.84) / t_weight
    Calculated from the production volume of reference products.
  property price 0 EUR2005; name low_level_radwaste_price_EUR2005
  property amount in multioutput activity_m3 27300 m3; name low_level_radwaste_amount_MO_m3
  properties: dry mass 2500 kg, wet mass 2500 kg
- water discharge from petroleum extraction, offshore: 0 kg; name water_discharge; = (( water_discharge_amount_MO_kg* (petroleum/scaling_factor)/(1* 137000000000 +0 *90200000000 *0.84)) * scaling_factor)*-1; pedigree (1,1,1,1,1)
  (same comment as for offshore platform, petroleum)
  production volume 5.33424e10 kg; = water_discharge_amount_MO_kg* petroleum_APV/(1* 137000000000 +0 *90200000000 *0.84)
    Calculated from the production volume of reference products.
  property price 0 EUR2005; name water_discharge_price_EUR2005
  property amount in multioutput activity_kg 1.64e11 kg; name water_discharge_amount_MO_kg
  properties: carbon content, fossil 0.00168491, dry mass 0.0848608 kg, wet mass 1 kg, water content 10.784, carbon content, non-fossil 0.00101223
- diesel: 0.00225429 kg; = ( diesel_amount_MO_kg*(0.5* (petroleum/scaling_factor) +0.5* (natural_gas/scaling_factor) *0.84) / t_weight) * scaling_factor; lognormal variance with pedigree 0.04, pedigree (1,1,5,1,1)
  EcoSpold01Location=RER
  Environmental report
  Amount was scaled to the amount of reference product.
  Uncertainty: Environmental report
  property amount in multioutput activity_kg 5.71e8 kg; name diesel_amount_MO_kg
  properties: carbon content, fossil 0.865, wet mass 1 kg, dry mass 1 kg
  note on carbon content, fossil: C-content of diesel is 86.5% (ecoinvent v2.2 report 6_IV, Tab 3.14)
- heavy fuel oil: 0.00184765 kg; name heavy_fuel; = ( heavy_fuel_amount_MO_kg*(0.5* (petroleum/scaling_factor) +0.5* (natural_gas/scaling_factor) *0.84) / t_weight) * scaling_factor; lognormal variance with pedigree 0.04, pedigree (1,1,5,1,1)
  (same comment as for diesel)
  property amount in multioutput activity_kg 4.68e8 kg; name heavy_fuel_amount_MO_kg
  properties: wet mass 1 kg, carbon content, fossil 0.849, dry mass 1 kg
- offshore well, oil/gas: 3.94796e-6 m; name offshore_well; = ( offshore_well_amount_MO_m*(0.5* (petroleum/scaling_factor) +0.5* (natural_gas/scaling_factor) *0.84) / t_weight) * scaling_factor; lognormal variance with pedigree 0.34, pedigree (1,1,5,1,1)
  (same comment as for offshore platform, petroleum)
  property amount in multioutput activity_m 1e6 m; name offshore_well_amount_MO_m
- chemical, organic: 4.14536e-5 kg; name chem_org; = ( chem_org_amount_MO_kg*(0.5* (petroleum/scaling_factor) +0.5* (natural_gas/scaling_factor) *0.84) / t_weight) * scaling_factor; lognormal variance with pedigree 0.04, pedigree (1,1,5,1,1)
  EcoSpold01Location=GLO
  Environmental report
  Amount was scaled to the amount of reference product.
  Uncertainty: Environmental report
  property amount in multioutput activity_kg 1.05e7 kg; name chem_org_amount_MO_kg
  properties: wet mass 1 kg, dry mass 1 kg, carbon content, fossil 0.628
  note on carbon content, fossil: This dataset is an unweighted average of 20 organic substances (listed in Tab 88.1, ecoinvent v2.2 report 8, part II), being part of the top100 chemicals included in this database. The C-content has also been calculated as an unweighted average of the C content of the substances composing this dataset.
- pipeline, petroleum, offshore: 2.7991e-9 km; name offshore_pipeline; = ( offshore_pipeline_amount_MO_km*(0.5* (petroleum/scaling_factor) +0.5* (natural_gas/scaling_factor) *0.84) / t_weight) * scaling_factor; lognormal variance with pedigree 0.34, pedigree (1,1,5,1,1)
  (same comment as for offshore platform, petroleum)
  property amount in multioutput activity_km 709 km; name offshore_pipeline_amount_MO_km
- chemical, inorganic: 4.65859e-5 kg; name chem_inorg; = ( chem_inorg_amount_MO_kg*(0.5* (petroleum/scaling_factor) +0.5* (natural_gas/scaling_factor) *0.84) / t_weight) * scaling_factor; lognormal variance with pedigree 0.04, pedigree (1,1,5,1,1)
  Environmental report
  Amount was scaled to the amount of reference product.
  EcoSpold01Location=GLO
  Uncertainty: Environmental report
  property amount in multioutput activity_kg 1.18e7 kg; name chem_inorg_amount_MO_kg
  properties: wet mass 1 kg, carbon content, fossil 0.003, dry mass 1 kg
  note on carbon content, fossil: This dataset is an unweighted average of 20 inorganic substances (listed in Tab 88.1, ecoinvent v2.2 report 8, part II), being part of the top100 chemicals included in this database. The C-content has also been calculated as an unweighted average of the C content of the substances composing this dataset.

## Inputs from nature
- Oil, crude, in ground [natural resource, in ground]: 0 kg; name oil_ground; = (oil_ground_amount_MO_kg* (petroleum/scaling_factor)/(1* 137000000000 +0 *90200000000 *0.84)) * scaling_factor; pedigree (1,1,1,1,1)
  Environmental report
  Amount was scaled to the amount of reference product.
  Uncertainty: Environmental report
  property amount in multioutput activity_kg 1.37e11 kg; name oil_ground_amount_MO_kg
- Gas, natural, in ground [natural resource, in ground]: 1.03796 m3; name gas_ground; = (gas_ground_amount_MO_m3*(0.0352* (petroleum/scaling_factor)+0.9648* (natural_gas/scaling_factor)*0.84)/(0.0352* 137000000000 +0.9648*90200000000 *0.84)) * scaling_factor; lognormal variance with pedigree 0.04, pedigree (1,1,5,1,1)
  (same comment as for Oil, crude, in ground)
  property amount in multioutput activity_m3 9.98e10 m3; name gas_ground_amount_MO_m3

## Emissions to nature
- DOC, Dissolved Organic Carbon [water, ocean]: 0.000457963 kg; name DOC; = ( DOC_amount_MO_kg *(0.5* (petroleum/scaling_factor) +0.5* (natural_gas/scaling_factor) *0.84) / t_weight) * scaling_factor; lognormal variance with pedigree 0.0901, pedigree (3,5,5,3,1)
  Extrapolation for sum parameter
  Amount was scaled to the amount of reference product.
  Uncertainty: Extrapolation for sum parameter
  property amount in multioutput activity_kg 1.16e8 kg; name DOC_amount_MO_kg
- Radon-222 [air, non-urban air or from high stacks]: 8.96187e-5 kBq; name Rd; = ( Rd_amount_MO_kBq*(0.5* (petroleum/scaling_factor) +0.5* (natural_gas/scaling_factor) *0.84) / t_weight) * scaling_factor; lognormal variance with pedigree 0.69, pedigree (3,1,5,1,3)
  Calculation from fuel use
  Amount was scaled to the amount of reference product.
  Uncertainty: Calculation from fuel use
  property amount in multioutput activity_kBq 2.27e7 kBq; name Rd_amount_MO_kBq
- Benzene [air, non-urban air or from high stacks]: 7.30373e-12 kg; name benzene; = ( benzene_amount_MO_kg*(0.5* (petroleum/scaling_factor) +0.5* (natural_gas/scaling_factor) *0.84) / t_weight) * scaling_factor; lognormal variance with pedigree 0.09, pedigree (3,1,5,1,3)
  (same comment as for Radon-222)
  property amount in multioutput activity_kg 1.85 kg; name benzene_amount_MO_kg
- Methane, bromotrifluoro-, Halon 1301 [air, non-urban air or from high stacks]: 3.93612e-10 kg; name halon; = ( halon_amount_MO_kg*(0.5* (petroleum/scaling_factor) +0.5* (natural_gas/scaling_factor) *0.84) / t_weight) * scaling_factor; lognormal variance with pedigree 0.692, pedigree (4,4,5,5,1)
  Literature for NO
  Amount was scaled to the amount of reference product.
  Uncertainty: Literature for NO
  property amount in multioutput activity_kg 99.7 kg; name halon_amount_MO_kg
- BOD5, Biological Oxygen Demand [water, ocean]: 0.00166209 kg; name BOD5; = ( BOD5_amount_MO_kg*(0.5* (petroleum/scaling_factor) +0.5* (natural_gas/scaling_factor) *0.84) / t_weight) * scaling_factor; lognormal variance with pedigree 0.0901, pedigree (3,5,5,3,1)
  Extrapolation for sum parameter
  Amount was scaled to the amount of reference product.
  Uncertainty: Extrapolation for sum parameter
  property amount in multioutput activity_kg 4.21e8 kg; name BOD5_amount_MO_kg
- COD, Chemical Oxygen Demand [water, ocean]: 0.00166209 kg; name COD; = ( COD_amount_MO_kg*(0.5* (petroleum/scaling_factor) +0.5* (natural_gas/scaling_factor) *0.84) / t_weight) * scaling_factor; lognormal variance with pedigree 0.0901, pedigree (3,5,5,3,1)
  (same comment as for BOD5, Biological Oxygen Demand)
  property amount in multioutput activity_kg 4.21e8 kg; name COD_amount_MO_kg
- Helium [air, non-urban air or from high stacks]: 1.24756e-7 kg; name He; = ( He_amount_MO_kg*(0.5* (petroleum/scaling_factor) +0.5* (natural_gas/scaling_factor) *0.84) / t_weight) * scaling_factor; lognormal variance with pedigree 0.69, pedigree (3,1,5,1,3)
  (same comment as for Radon-222)
  property amount in multioutput activity_kg 31600 kg; name He_amount_MO_kg
- Mercury [air, non-urban air or from high stacks]: 7.50112e-11 kg; name Hg; = ( Hg_amount_MO_kg*(0.5* (petroleum/scaling_factor) +0.5* (natural_gas/scaling_factor) *0.84) / t_weight) * scaling_factor; lognormal variance with pedigree 0.04, pedigree (1,1,5,1,1)
  Calculation from fuel use
  Amount was scaled to the amount of reference product.
  Uncertainty: Environmental report
  property amount in multioutput activity_kg 19 kg; name Hg_amount_MO_kg
- Oils, unspecified [water, ocean]: 0.000529027 kg; name oils; = ( oils_amount_MO_kg*(0.5* (petroleum/scaling_factor) +0.5* (natural_gas/scaling_factor) *0.84) / t_weight) * scaling_factor; lognormal variance with pedigree 0.34, pedigree (1,1,5,1,1)
  (same comment as for Oil, crude, in ground)
  property amount in multioutput activity_kg 1.34e8 kg; name oils_amount_MO_kg
- Particulates, > 2.5 um, and < 10um [air, non-urban air or from high stacks]: 1.29888e-7 kg; name PM; = ( PM_amount_MO_kg*(0.5* (petroleum/scaling_factor) +0.5* (natural_gas/scaling_factor) *0.84) / t_weight) * scaling_factor; lognormal variance with pedigree 0.17, pedigree (3,1,5,1,3)
  (same comment as for Radon-222)
  property amount in multioutput activity_kg 32900 kg; name PM_amount_MO_kg
- Nitrogen oxides [air, non-urban air or from high stacks]: 2.39641e-6 kg; name NOx; = ( NOx_amount_MO_kg*(0.5* (petroleum/scaling_factor) +0.5* (natural_gas/scaling_factor) *0.84) / t_weight) * scaling_factor; lognormal variance with pedigree 0.082, pedigree (3,1,5,1,1)
  Extrapolation from 1998
  Amount was scaled to the amount of reference product.
  Uncertainty: Extrapolation from 1998
  property amount in multioutput activity_kg 607000 kg; name NOx_amount_MO_kg
- Dinitrogen monoxide [air, non-urban air or from high stacks]: 1.28309e-8 kg; name N2O; = ( N2O_amount_MO_kg*(0.5* (petroleum/scaling_factor) +0.5* (natural_gas/scaling_factor) *0.84) / t_weight) * scaling_factor; lognormal variance with pedigree 0.09, pedigree (3,1,5,1,3)
  (same comment as for Radon-222)
  property amount in multioutput activity_kg 3250 kg; name N2O_amount_MO_kg
- NMVOC, non-methane volatile organic compounds, unspecified origin [air, non-urban air or from high stacks]: 1.32257e-7 kg; name NMVOC; = ( NMVOC_amount_MO_kg*(0.5* (petroleum/scaling_factor) +0.5* (natural_gas/scaling_factor) *0.84) / t_weight) * scaling_factor; lognormal variance with pedigree 0.082, pedigree (3,1,5,1,1)
  (same comment as for Nitrogen oxides)
  property amount in multioutput activity_kg 33500 kg; name NMVOC_amount_MO_kg
- Carbon monoxide, fossil [air, non-urban air or from high stacks]: 1.52391e-6 kg; name CO_fossil; = ( CO_fossil_amount_MO_kg*(0.5* (petroleum/scaling_factor) +0.5* (natural_gas/scaling_factor) *0.84) / t_weight) * scaling_factor; lognormal variance with pedigree 0.692, pedigree (3,1,5,1,1)
  (same comment as for Nitrogen oxides)
  property amount in multioutput activity_kg 386000 kg; name CO_fossil_amount_MO_kg
- Carbon dioxide, fossil [air, non-urban air or from high stacks]: 0.00120413 kg; name CO2_fossil; = ( CO2_fossil_amount_MO_kg*(0.5* (petroleum/scaling_factor) +0.5* (natural_gas/scaling_factor) *0.84) / t_weight) * scaling_factor; lognormal variance with pedigree 0.0426, pedigree (3,1,5,1,1)
  Extrapolation from 1998 and fuel use
  Amount was scaled to the amount of reference product.
  Uncertainty: Extrapolation from 1998 and fuel use
  property amount in multioutput activity_kg 3.05e8 kg; name CO2_fossil_amount_MO_kg
- Nitrogen [water, ocean]: 4.0664e-7 kg; name N2; = ( N2_amount_MO_kg*(0.5* (petroleum/scaling_factor) +0.5* (natural_gas/scaling_factor) *0.84) / t_weight) * scaling_factor; lognormal variance with pedigree 0.0901, pedigree (3,5,5,3,1)
  (same comment as for DOC, Dissolved Organic Carbon)
  property amount in multioutput activity_kg 103000 kg; name N2_amount_MO_kg
- Sulfur [water, ocean]: 1.41337e-6 kg; name S2; = ( S2_amount_MO_kg*(0.5* (petroleum/scaling_factor) +0.5* (natural_gas/scaling_factor) *0.84) / t_weight) * scaling_factor; lognormal variance with pedigree 0.0901, pedigree (3,5,5,3,1)
  (same comment as for BOD5, Biological Oxygen Demand)
  property amount in multioutput activity_kg 358000 kg; name S2_amount_MO_kg
- Methane, fossil [air, non-urban air or from high stacks]: 1.52786e-7 kg; name CH4_fossil; = ( CH4_fossil_amount_MO_kg*(0.5* (petroleum/scaling_factor) +0.5* (natural_gas/scaling_factor) *0.84) / t_weight) * scaling_factor; lognormal variance with pedigree 0.082, pedigree (3,1,5,1,1)
  (same comment as for Nitrogen oxides)
  property amount in multioutput activity_kg 38700 kg; name CH4_fossil_amount_MO_kg
- Sulfur dioxide [air, non-urban air or from high stacks]: 1.11727e-8 kg; name SO2; = ( SO2_amount_MO_kg*(0.5* (petroleum/scaling_factor) +0.5* (natural_gas/scaling_factor) *0.84) / t_weight) * scaling_factor; lognormal variance with pedigree 0.0426, pedigree (3,1,5,1,1)
  (same comment as for Nitrogen oxides)
  property amount in multioutput activity_kg 2830 kg; name SO2_amount_MO_kg
- AOX, Adsorbable Organic Halogen as Cl [water, ocean]: 5.44819e-9 kg; name AOX; = ( AOX_amount_MO_kg*(0.5* (petroleum/scaling_factor) +0.5* (natural_gas/scaling_factor) *0.84) / t_weight) * scaling_factor; lognormal variance with pedigree 0.0901, pedigree (3,5,5,3,1)
  (same comment as for DOC, Dissolved Organic Carbon)
  property amount in multioutput activity_kg 1380 kg; name AOX_amount_MO_kg
- TOC, Total Organic Carbon [water, ocean]: 0.000457963 kg; name TOC; = ( TOC_amount_MO_kg*(0.5* (petroleum/scaling_factor) +0.5* (natural_gas/scaling_factor) *0.84) / t_weight) * scaling_factor; lognormal variance with pedigree 0.0901, pedigree (3,5,5,3,1)
  (same comment as for DOC, Dissolved Organic Carbon)
  property amount in multioutput activity_kg 1.16e8 kg; name TOC_amount_MO_kg
- Benzo(a)pyrene [air, non-urban air or from high stacks]: 3.65976e-14 kg; name benzo_pyrene; = ( benzo_pyrene_amount_MO_kg*(0.5* (petroleum/scaling_factor) +0.5* (natural_gas/scaling_factor) *0.84) / t_weight) * scaling_factor; lognormal variance with pedigree 0.09, pedigree (3,1,5,1,3)
  (same comment as for Radon-222)
  property amount in multioutput activity_kg 0.00927 kg; name benzo_pyrene_amount_MO_kg

## Sampling procedure
Environmental reports.

## Extrapolations
Emission data for 1999 extrapolated for 2000. Specific air emissions calculated with generic assumptions for other countries.

## Review by Michael Spielmann (obsolete) 2003-08-14
Passed.

## Review by Emilia Moreno Ruiz 2017-09-06
PV adjusted
