# anode production, prebake, for aluminium electrolysis

Dataset: EcoSpold 2, unit process
Geography: UN-OCEANIA
Time period: 2015-01-01 to 2019-12-31
Technology level: current
Classification: EcoSpold01Categories: metals/extraction
Classification: ISIC rev.4 ecoinvent: 2790:Manufacture of other electrical equipment
Scenario: Business-as-Usual
System model: Allocation at the point of substitution
Share of production covered: 78 %
Generated by: Linlin Wu
Published in: International Aluminium Insitute 2015
Database: ecoinvent
isCopyrightProtected: false
accessRestrictedTo: 1

## General comment
Industry average of prebake anodes for use in the Hall-Héroult process using prebake technology.
[This dataset is meant to replace the following datasets:]

## Included activities start
The unit process begins with the unloading of process materials to the storage areas on site. The operations associated with this unit process include:
* anode mix preparation, anode block forming and baking;
* rodding of baked anodes;
* maintenance and repair of plant and equipment; and
* treatment of process air, liquids and solids.
The original data also accounts for recovery of spent anode materials (anode butts). However, these are recycled in closed loop and are not explicitly accounted for in the inventory, although inputs and outputs of other flows are influenced by this recycling.
Treatment of scrubber sludges are excluded, as there is no corresponding waste treatment in the ecoinvent database.

## Included activities end
The output of this process is rodded anodes to be transported to electrolysis plants employing prebake technology.

## Geography
Data mostly from global surveys by IAI.

## Reference product
- anode, prebake, for aluminium electrolysis: 1 kg; name anodePrebakeAmount; CPC 42950: Wire, rods, tubes, plates, electrodes and similar products, of base metal or of metal carbides, coated or core[…]; By-product classification allocatable product
  production volume 8.227e8 kg; name anodePrebakeProductionVolume_oc
    Calculated value based on reported data, scaled up to correspond with Annual Production Volume of aluminium using Prebake technology.
  property price 0.15 EUR2005; name anodePrebakeAmount_price_EUR2005
    Literature value; U.S. Department of Energy (Inert Anode Roadmap, 1998, http://www1.eere.energy.gov/manufacturing/industries_technologies/aluminum/pdfs/inertroad.pdf).
  property carbon content 0.875012
    carbon content on a dry matter basis (reserved; not for manual entry)
  property true value 0.15; name anodePrebakeAmount_true_value
    allocation property applied in "true value" allocation // value calculated from revenue
  properties: carbon content, non-fossil 0, water in wet mass 0 kg, carbon content, fossil 0.875012, dry mass 1 kg, water content 0, wet mass 1 kg, carbon allocation 0.875012 kg

## By-products
- heat, for reuse in municipal waste incineration only: 0 MJ; CPC 17300: Steam and hot water; By-product classification allocatable product; pedigree (1,1,1,1,1)
  Net electricity generated from this waste and used in internal MSWI plant energy redistribution.
  Uncertainty: uncertainty is calculated from uncertainties in waste composition and uncertainties in energy efficiency and the uncertainty in internal energy demand
  production volume 384.188 MJ
  property exergy 0.1842 MJ; name E_th_prod_MSWI_exergy
    This exergy property is based on the exergy content of the product.
  property price 0.0106 EUR2005; name E_th_prod_MSWI_price_EUR2005
    Average European district heat price from Ecoheatcool and Euroheat 2005-2006, Ecoheat Work package 1: The European heat market. Final report. 10.6 EUR/GJ i s the price of district heat. http://www.solarthermalworld.org/files/Ecoheatcool%20WP1%20Web.pdf?download
  property true value relation 0.1842; name E_th_prod_MSWI_true_value_relation
    property to calculate "true value" from
  property true value 3.07178e-9
    allocation property applied in "true value" allocation // value calculated from true value relation
- electricity, for reuse in municipal waste incineration only: 0 kWh; CPC 17100: Electrical energy; By-product classification allocatable product; pedigree (1,1,1,1,1)
  (same comment as for heat, for reuse in municipal waste incineration only)
  production volume 54.1083 kWh
  property price 0.1 EUR2005; name E_el_prod_MSWI_price_EUR2005
    Estimated to be the same price as in case of electricity, medium voltage.
  property exergy 3.6 MJ; name E_el_prod_MSWI_exergy
    This exergy property is based on the exergy content of the product.
  property true value relation 3.6; name E_el_prod_MSWI_true_value_relation
    property to calculate "true value" from
  property true value 8.45517e-9
    (same comment as for heat, for reuse in municipal waste incineration only)

## Inputs from technosphere
- scrap steel: -0.00351 kg; name wasteSteelAmount; source International Aluminium Insitute 2015; lognormal variance with pedigree 0.0032, pedigree (1,3,3,1,1)
  Reported as scrap steel.
  production volume 2.88768e6 kg; = wasteSteelAmount* anodePrebakeProductionVolume_oc
    Calculated from the production volume of anode and output of waste per reference flow.
  property price 0 EUR2005; name wasteSteelAmount_price_EUR2005
  properties: dry mass 1 kg, wet mass 1 kg
- anode factory: 2.5e-10 unit; source Classen M. 2008; lognormal variance with pedigree 0.5, pedigree (5,5,5,5,5)
  EcoSpold01Location=RER
  Rough estimate
  Uncertainty: rough guess
- inert waste, for final disposal: -0.02178 kg; name wasteInertAmount; = (wasteI_nonspecifiedWasteToLandfillAmou_0 +wasteI_refractoryWasteToRecyclingAmoun_0 +wasteI_refractoryWasteToLandfillAmount_0 +wasteI_nonspecifiedByproductsToRecycli_0 )*-1; source International Aluminium Insitute 2015; lognormal variance with pedigree 0.002, pedigree (1,1,3,1,1)
  EcoSpold01Location=CH
  Amount includes "Byproducts for external recycling", "Refractory material for external recycling", "Refractory (excluding SPL) sent to landfill" and "Other landfilled waste" in IAI report. If it becomes possible to specify byproducts and other landfilled waste, then these should be broken out of this total. Currently, no recycling process exists in ecoinvent for refractory material, and hence these are modelled as sent to landfill.
  Uncertainty: Uncertainty based entirely on uncertainty ofunderlying parameters.
  production volume 1.79184e7 kg; = wasteInertAmount* anodePrebakeProductionVolume_oc
    Calculated from the production volume of anode and output of waste per reference flow.
  property amount of non-specified waste to recycling 0.00856 kg; name wasteI_nonspecifiedByproductsToRecycli_0
  property amount of refractory material sent to recycling 0.00838 kg; name wasteI_refractoryWasteToRecyclingAmoun_0
  property amount of refractory material sent to landfill 0 kg; name wasteI_refractoryWasteToLandfillAmount_0
  property price 0 EUR2005; name wasteInertAmount_price_EUR2005
  property amount of non-specified waste to landfill 0.00484 kg; name wasteI_nonspecifiedWasteToLandfillAmou_0
  properties: dry mass 0.995 kg, water content 0.00502513, wet mass 1 kg
- refractory, fireclay, packed: 0.00624 kg; source International Aluminium Insitute 2015; lognormal variance with pedigree 0.0032, pedigree (1,3,3,1,1)
  Reported as "Refractory material" in IAI Survey
  properties: wet mass 1 kg, dry mass 1 kg
- waste asphalt: -0.012 kg; name wasteCarbonAmount; source International Aluminium Insitute 2015; lognormal variance with pedigree 0.2106, pedigree (5,5,5,5,5)
  Proxy for treatment of waste carbon
  production volume 9.8724e6 kg; = anodePrebakeProductionVolume_oc * ((Ref('e476325a-a58d-4496-a800-50617a070591')*-1) / anodePrebakeAmount)
    Calculated from production volume of reference product using the relative outputs.
  property price 0 EUR2005; name wasteCarbonAmount_price_EUR2005
  properties: wet mass 1 kg, dry mass 0.999 kg, carbon content, fossil 0.0440796, water content 0.001001
- petroleum coke: 0.663 kg; source International Aluminium Insitute 2015; lognormal variance with pedigree 0.0027, pedigree (1,2,3,1,1)
  EcoSpold01Location=RER
  properties: carbon content, fossil 0.885, wet mass 1 kg, dry mass 1 kg
- cast iron: 0.00582 kg; source International Aluminium Insitute 2015; lognormal variance with pedigree 0.2106, pedigree (5,5,5,5,5)
  Reported as Steel in IAI report
  properties: wet mass 1 kg, carbon content, fossil 0.04, dry mass 1 kg
  note on carbon content, fossil: Cast iron is made by remelting pig iron in small furnaces (e.g. cupola furnaces or electric arc furnaces) and poured into moulds to make castings. It usually contains 2% to 6% carbon (ecoinvent v2.2 report 10_partII). An average content of 4% was considered
- heat, district or industrial, other than natural gas: 0.0129763 MJ; = Net_Heat_Value_LFO *kgFuel_Input_LFO_diesel /fuel_use_LFO; source International Aluminium Insitute 2015; lognormal variance with pedigree 0.002, pedigree (1,1,3,1,1)
  Diesel combustion.
  Uncertainty: No uncertainty added - uncertainty should be based on propagation of the uncertainty of the underlying parameters.
  property heating value, net 42.7 MJ; name Net_Heat_Value_LFO
  property fuel input in physical units, kg 0.00032 kg; name kgFuel_Input_LFO_diesel
  property Corresponding fuel use 1.053 MJ; name fuel_use_LFO
  note on Corresponding fuel use: Lower heating value of the fuel input related to the heat/electricity output
- fly ash and scrubber sludge: -4.7e-5 kg; source International Aluminium Insitute 2015; lognormal variance with pedigree 0.2106, pedigree (5,5,5,5,5)
  Used as a weak proxy for treatment of scrubber sludges
  production volume 38666.9 kg; = anodePrebakeProductionVolume_oc * ((Ref('921d00ff-22a3-4b74-82a3-183cdb8e8ab2')*-1) / anodePrebakeAmount)
    Calculated from production volume of reference product using the relative outputs.
  properties: wet mass 1 kg, dry mass 0.1 kg, water content 9, carbon content, fossil 0.167
  note on carbon content, fossil: Tab A.6, ecoinvent v2.2 report 13_I. C content has been calculated after data in the tables, and then referred to 1 kg DM
- heat, district or industrial, other than natural gas: 0.463438 MJ; = Net_Heat_Value_HFO * kgFuel_Input_HFO /fuel_use_HFO; source International Aluminium Insitute 2015; lognormal variance with pedigree 0.002, pedigree (1,1,3,1,1)
  Heavy oil combustion.
  property fuel input in physical units, kg 0.0122 kg; name kgFuel_Input_HFO
  property Corresponding fuel use 1.053 MJ; name fuel_use_HFO
  property heating value, net 40 MJ; name Net_Heat_Value_HFO
- heat, district or industrial, natural gas: 2.22977 MJ; = Net_Heat_Value_ng * m3fuel_use_ng/ fuel_use_ng; source International Aluminium Insitute 2015; lognormal variance with pedigree 0.002, pedigree (1,1,3,1,1)
  Natural gas combustion.
  Uncertainty: No uncertainty added - uncertainty should be based on propagation of the uncertainty of the underlying parameters.
  property Corresponding fuel use 1.04 MJ; name fuel_use_ng
  property heating value, net 40.4 MJ; name Net_Heat_Value_ng
  property fuel input in physical units, m3 0.0574 m3; name m3fuel_use_ng
  note on Corresponding fuel use: Lower heating value of the fuel input related to the heat/electricity output, based on an efficiency of 96%
  note on heating value, net: net (lower) heating (calorific) value. Based on European average as reported in Dones et al. 2007.
- electricity, medium voltage: 0 kWh; source International Aluminium Insitute 2015; pedigree (1,1,1,1,1)
  EcoSpold01Location=UCTE
- pitch: 0.138 kg; source International Aluminium Insitute 2015; lognormal variance with pedigree 0.0027, pedigree (1,2,3,1,1)
  EcoSpold01Location=RER
  Reported as Pitch in IAI report
  properties: carbon content, fossil 0.83, dry mass 1 kg, wet mass 1 kg
- electricity, medium voltage: 0.0146865, 0.0807135 kWh (2 entries); source International Aluminium Insitute 2015; lognormal variance with pedigree 0.0026, pedigree (1,1,3,1,1)
  EcoSpold01Location=UCTE

## Inputs from nature
- Water, cooling, unspecified natural origin [natural resource, in water]: 0.000126 m3; source International Aluminium Insitute 2015; lognormal variance with pedigree 0.0032, pedigree (1,3,3,1,1)
  Specified as freshwater in IAI report.

## Emissions to nature
- Fluoride [water, unspecified]: 9e-6 kg; source International Aluminium Insitute 2015; lognormal variance with pedigree 0.2106, pedigree (5,5,5,5,5)
- Particulates, > 2.5 um, and < 10um [air, unspecified]: 1.848e-5 kg; = PM_total_3 * PM_btw_2_5_and_10um; source International Aluminium Insitute 2015; lognormal variance with pedigree 0.0033, pedigree (2,2,3,1,1)
  Total amount from IAI survey, distributed among three class sizes using CEPMEIP database emission factors for Production of primary aluminium. Abatement level: medium.
  property total particulates 4.2e-5 kg; name PM_total_3
  property ratio of particulates between 2.5 and 10 microns 0.44; name PM_btw_2_5_and_10um; = (3.2-1.44)/4
- Suspended solids, unspecified [water, unspecified]: 9e-5 kg; source International Aluminium Insitute 2015; lognormal variance with pedigree 0.2106, pedigree (5,5,5,5,5)
- PAH, polycyclic aromatic hydrocarbons [air, unspecified]: 2.07e-5 kg; source International Aluminium Insitute 2015; lognormal variance with pedigree 0.0021, pedigree (1,2,3,1,1)
  Uncertainty: Uncertainty calculated from that of underlying variables.
  property total PAH emission to air 5.1e-5 kg; name totalPAH
- Water [water, surface water]: 0.000135 m3; lognormal variance with pedigree 0.0032, pedigree (1,3,3,1,1)
  Reported as Fresh Water
- Nitrogen oxides [air, unspecified]: 0.0013 kg; source International Aluminium Insitute 2015; lognormal variance with pedigree 0.0426, pedigree (1,3,3,1,1)
- Particulates, > 10 um [air, unspecified]: 8.4e-6 kg; = PM_total_2 *PM_greater_10um; source International Aluminium Insitute 2015; lognormal variance with pedigree 0.0033, pedigree (2,2,3,1,1)
  (same comment as for Particulates, > 2.5 um, and < 10um)
  property ratio pf particulates greater than 10 microns 0.2; name PM_greater_10um; = (4-3.2)/4
  property total particulates 4.2e-5 kg; name PM_total_2
- Hydrogen fluoride [air, unspecified]: 6e-6 kg; source International Aluminium Insitute 2015; lognormal variance with pedigree 0.0421, pedigree (1,2,3,1,1)
  Reported as F in IAI data,sum of particulate F and gaseous F
- Water [air, unspecified]: 0.00065 m3; source International Aluminium Insitute 2015; lognormal variance with pedigree 0.2106, pedigree (5,5,5,5,5)
  IAI data reported as "Fresh Water Consumption" plus "Sea Water consumption"
- Benzo(a)pyrene [air, unspecified]: 7.13e-5 kg; name BaPAmount; source International Aluminium Insitute 2015; lognormal variance with pedigree 0.3026, pedigree (1,3,3,1,1)
- Oils, unspecified [water, unspecified]: 2e-5 kg; source International Aluminium Insitute 2015; lognormal variance with pedigree 0.2106, pedigree (5,5,5,5,5)
- Particulates, < 2.5 um [air, unspecified]: 1.512e-5 kg; = PM_total_1* PM2_5; source International Aluminium Insitute 2015; lognormal variance with pedigree 0.0033, pedigree (2,2,3,1,1)
  (same comment as for Particulates, > 2.5 um, and < 10um)
  property total particulates 4.2e-5 kg; name PM_total_1
  property ratio of total particulates less than 2.5 microns 0.36; name PM2_5; = 1.44/4
- PAH, polycyclic aromatic hydrocarbons [water, unspecified]: 1e-8 kg; source International Aluminium Insitute 2015; lognormal variance with pedigree 0.2106, pedigree (5,5,5,5,5)
  Reported as PAH (6 Borneff components)
- Sulfur dioxide [air, unspecified]: 0.00274 kg; source International Aluminium Insitute 2015; lognormal variance with pedigree 0.0032, pedigree (1,3,3,1,1)

## Sampling procedure
2015 data is included where available from annual IAI surveys (electricity, fuel, petrol coke & pitch inputs). Other flows are based on a life cycle inventory survey carried out by IAI for its member and non member companies. The survey was conducted in 2016 for 2015 data. Total percent representativeness is based on 2015 LCI data, using 2015 production volumes.

## Extrapolations
The infrastructure input was not covered by the IAI survey and uses the rough guess in ecoinvent 2.2.
