# anodising, aluminium sheet

Dataset: EcoSpold 2, unit process
Geography: RER
Time period: 1996-01-01 to 2019-12-31
Technology level: current
Classification: EcoSpold01Categories: metals/processing
Classification: ISIC rev.4 ecoinvent: 2592:Treatment and coating of metals; machining
Synonyms: Anodisieren
Tags: ConvertedDataset
Scenario: Business-as-Usual
System model: Allocation at the point of substitution
Generated by: Hans-Jörg Althaus
Published in: Althaus H.-J. 2004
Database: ecoinvent
isCopyrightProtected: true
accessRestrictedTo: 1

## General comment
Colourless anodising is inventoried. The coating thickness is 20 um.
[This dataset was already contained in the ecoinvent database version 2. It was not individually updated during the transfer to ecoinvent version 3. Life Cycle Impact Assessment results may still have changed, as they are affected by changes in the supply chain, i.e. in other datasets. This dataset was generated following the ecoinvent quality guidelines for version 2. It may have been subject to central changes described in the ecoinvent version 3 change report (http://www.ecoinvent.org/database/ecoinvent-version-3/reports-of-changes/), and the results of the central updates were reviewed extensively. The changes added e.g. consistent water flows and other information throughout the database. The documentation of this dataset can be found in the ecoinvent reports of version 2, which are still available via the ecoinvent website. The change report linked above covers all central changes that were made during the conversion process.]

## Included activities end
Mechanical surface treatment (50% of the workpieces), degreasing, pickling, anodising (20 um layer thickness) and sealing. Waste water treatment is included. Dying is not included.

## Geography
Swiss waste treatment assumed

## Technology
Porous anodising

## Parameters
- fraction, cooling water, to air: 0.3875; name fraction_CW_to_air; = (0.5*fraction_CW_OT_to_air)+(0.5*fraction_CW_R_to_air); lognormal variance with pedigree 0.092025, pedigree (4,4,3,2,4)
  Calculated value based on literature value (see comments of the other parametres present in this dataset) and expert opinion. In the case when no industry/literature data are available about the type of cooling or directly fraction, cooling water, to air specific for the process a default assumption is applied. It is assumed that the once-through cooling system is used in 50% of all cases and recirculating system is used in another 50% of all cases.
- fraction, cooling water, recirculating system, to air: 0.771; name fraction_CW_R_to_air; lognormal variance with pedigree 0.0413, pedigree (2,3,1,3,1)
  Calculated based on literature value (Scown, C.D., 2011, Water Footprint of U.S. Transportation Fuels and supplying information of the article) (Vionnet, S., Quantis Water Database - Technical Report, 2012).
- fraction, water, decarbonised, to air: 0.3875; name fraction_WDC_to_air; = fraction_CW_to_air; lognormal variance with pedigree 0.092025, pedigree (4,4,3,2,4)
  Calculated value. See comments in the other parametres present in this dataset. Decarbonised water is considered to be always used as cooling water, thus cooling water fractions to air are applied to all carbonised water input flows to calculate the amount of water consumed in the processes.
- fraction, cooling water, once-through system, to air: 0.004; name fraction_CW_OT_to_air; lognormal variance with pedigree 0.0413, pedigree (2,3,1,3,1)
  (same comment as for fraction, cooling water, recirculating system, to air)

## Reference product
- anodising, aluminium sheet: 1 m2; CPC 88731: Metal treatment and coating services; By-product classification allocatable product
  EcoSpold01Location=RER
  production volume 1.617e10 m2
    Unknown
    55% of gross aluminium production is estimated to be sheet and foil (Davis J R. 1993. Aluminum and aluminum alloys. ASM International); 30% assumed to be anodised; 0.0028 kg/m3; 0.0003 m average thickness
  property price 1.31174 EUR2005
    Calculated based on inputs: The price of the product has been calculated as a sum of the values of the material and energy inputs for this product. This value is therefore a rough estimation. It may underestimate the real price since there are additional expenses when producing any product. These expences can include for example labour costs, treatment of waste materials and profit for the producer. Please consider carefully whether this level of data quality is acceptable for your application.
  property true value 1.31174
    allocation property applied in "true value" allocation // value calculated from revenue

## By-products
- electricity, for reuse in municipal waste incineration only: 0 kWh; CPC 17100: Electrical energy; By-product classification allocatable product; pedigree (1,1,1,1,1)
  Net electricity generated from this waste and used in internal MSWI plant energy redistribution.
  Uncertainty: uncertainty is calculated from uncertainties in waste composition and uncertainties in energy efficiency and the uncertainty in internal energy demand
  production volume 6.66922e8 kWh
  property exergy 3.6 MJ; name E_el_prod_MSWI_exergy
    This exergy property is based on the exergy content of the product.
  property true value relation 3.6; name E_el_prod_MSWI_true_value_relation
    property to calculate "true value" from
  property price 0.1 EUR2005; name E_el_prod_MSWI_price_EUR2005
    Estimated to be the same price as in case of electricity, medium voltage.
  property true value 0.00527579
    allocation property applied in "true value" allocation // value calculated from true value relation
- heat, for reuse in municipal waste incineration only: 0 MJ; CPC 17300: Steam and hot water; By-product classification allocatable product; pedigree (1,1,1,1,1)
  Net useful heat generated from this waste and used in internal MSWI plant energy redistribution.
  Uncertainty: uncertainty is calculated from uncertainties in waste composition and uncertainties in energy efficiency and the uncertainty in internal energy demand
  production volume 4.67384e9 MJ
  property true value relation 0.1842; name E_th_prod_MSWI_true_value_relation
    property to calculate "true value" from
  property exergy 0.1842 MJ; name E_th_prod_MSWI_exergy
    This exergy property is based on the exergy content of the product.
  property price 0.0106 EUR2005; name E_th_prod_MSWI_price_EUR2005
    Average European district heat price from Ecoheatcool and Euroheat 2005-2006, Ecoheat Work package 1: The European heat market. Final report. 10.6 EUR/GJ i s the price of district heat. http://www.solarthermalworld.org/files/Ecoheatcool%20WP1%20Web.pdf?download
  property true value 0.00189185
    (same comment as for electricity, for reuse in municipal waste incineration only)
- zinc concentrate: 0 kg; CPC 14290: Other non-ferrous metal ores and concentrates (other than uranium or thorium ores and concentrates); By-product classification allocatable product
  Calculated value from the knowledge of the properties of both products.
  production volume 477000 kg
  property price 0.38 EUR2005; name ByP_price_EUR2005
    Temporary price data. Calculated as 90% of purchasers price based on: Zinc content in concentrate 53%. Concentrate price per kg Zn 86.5% of refined Zn price (13.5% treatment charges according to CHR Metals Limited 2005: Dynamic cost curves. http://www.minecost.com/dynamic.pdf). 2004 zinc price from USGS (2007) Mineral commodity summaries 2007. <http://minerals.usgs.gov/minerals/pubs/mcs/2007/mcs2007.pdf> [Accessed 25 May 2010]
  property zinc content 0.53; name zinc_C_zinc_concentrate
    Zinc content on a dry matter basis. Value taken from teh "zinc mine operation" /GLO dataset.
  property dry mass 1 kg; name DM_zinc_concentrate
  property carbon content 0
    carbon content on a dry matter basis (reserved; not for manual entry)
  property true value 1.12096e-5
    allocation property applied in "true value" allocation // value calculated from revenue
  properties: wet mass 1 kg, water content 0, carbon content, non-fossil 0, carbon content, fossil 0, water in wet mass 0 kg, carbon allocation 0 kg
- iron scrap, unsorted: 0 kg; source European Aluminium Association 2008; CPC 39310: Slag, dross, scalings and other waste from the manufacture of iron or steel; By-product classification Recyclable; pedigree (1,1,1,1,1)
  production volume 170091 kg
  property price 0.149 EUR2005; name ironScrapAmount_price_EUR2005
    Temporary price data. Calculated as 90% of purchasers price based on: estimated at 85% of sorted scrap
  property carbon content 0
    carbon content on a dry matter basis (reserved; not for manual entry)
  property true value 7.83659e-7
    allocation property applied in "true value" allocation // value calculated from revenue
  properties: water in wet mass 0 kg, water content 0, carbon content, fossil 0, carbon content, non-fossil 0, dry mass 1 kg, wet mass 1 kg, carbon allocation 0 kg
- aluminium oxide, non-metallurgical: 0 kg; source European Aluminium Association 2008; CPC 41432: Alumina (aluminium oxide), except artificial corundum; By-product classification allocatable product; CAS 1344-28-1; pedigree (1,1,1,1,1)
  production volume 1.07032e7 kg
  property carbon content, non-fossil 0; name C_content_non_fossil
  property price 0.28 EUR2005; name Al2O3Amount_price_EUR2005
    From UN trade database. http://data.un.org/ Import data from the largest economies of the world are used (Brazil, India, USA, China, Japan and EU-27).
  property dry mass 1 kg; name DM
  property water content 0; name water_content
  property wet mass 1 kg; name WM
  property water in wet mass 0 kg; name WWM
  property carbon content, fossil 0; name C_content_fossil
  property carbon content 0
    carbon content on a dry matter basis (reserved; not for manual entry)
  property true value 9.26681e-5
    allocation property applied in "true value" allocation // value calculated from revenue
  properties: carbon allocation 0 kg
- aluminium, cast alloy: 0 kg; source European Aluminium Association 2008; By-product classification allocatable product; CPC 41431: Unwrought aluminium; pedigree (1,1,1,1,1)
  EcoSpold01Location=RER
  production volume 1.00051e8 kg
  property price 1.3 EUR2005; name castAlloyAmount_price_EUR2005
    Temporary price data. Calculated as 90% of purchasers price based on: Source: London Metal Exchange, Aluminium alloy price for 2005
  property carbon content 0
    carbon content on a dry matter basis (reserved; not for manual entry)
  property true value 0.00402184
    allocation property applied in "true value" allocation // value calculated from revenue
  properties: water in wet mass 0 kg, carbon content, non-fossil 0, water content 0, dry mass 1 kg, carbon content, fossil 0, wet mass 1 kg, carbon allocation 0 kg
- aluminium, wrought alloy: 0 kg; source European Aluminium Association 2008; By-product classification allocatable product; CPC 4153: Semi-finished products of aluminium or aluminium alloys; pedigree (1,1,1,1,1)
  production volume 4.38004e7 kg
  property price 1.44 EUR2005; name secondaryAluminiumOutput_price_EUR2005
  properties: wet mass 1 kg, water content 0, carbon content, fossil 0, water in wet mass 0 kg, carbon content, non-fossil 0, dry mass 1 kg, carbon content 0, carbon allocation 0 kg, true value 0.00195029

## Inputs from technosphere
- waste wood, untreated: -0.0396002 kg; lognormal variance with pedigree 0.0407, pedigree (1,3,5,3,1)
  EcoSpold01Location=CH
  production volume 6.468e8 kg
    Calculated from the production volume of anodising, aluminium sheet in proportion to the respective output amounts.
  properties: water content 0.25, dry mass 0.8 kg, wet mass 1 kg, carbon content, non-fossil 0.48632
  note on carbon content, non-fossil: Tab A.4, ecoinvent v2.2 report 13_I. C content has been referred to 1 kg DM,
- ethoxylated alcohol (AE7): 0.00297001 kg; = 0.006*0.5; lognormal variance with pedigree 0.0407, pedigree (1,3,5,3,1)
  Calculated value. The value of 0.006 kg of ethoxylated alcohol, production mix has been allocated to the concrete ethoxylated alcohols. The ratio between (AE3) and (AE7) is used the same as in case of the original eiv2 "ethoxylated alcohol, production mix" dataset.
  properties: carbon content, fossil 0.321663, carbon content, non-fossil 0.321663, dry mass 1 kg, wet mass 1 kg
- polyethylene, low density, granulate: 0.000990004 kg; lognormal variance with pedigree 0.0407, pedigree (1,3,5,3,1)
  EcoSpold01Location=RER
  properties: dry mass 1 kg, wet mass 1 kg, carbon content, fossil 0.857143
  note on carbon content, fossil: Polyethylene is formed out of a huge amount of ethylene monomers (C2H4) (ecoinvent v2.2 report 11_II). MW=28 g/mol
- aluminium, wrought alloy: 0.00185131 kg; lognormal variance with pedigree 0.0407, pedigree (1,3,5,3,1)
  EcoSpold01Location=RER
  properties: dry mass 1 kg, wet mass 1 kg
- sodium chlorate, powder: 0.01089 kg; lognormal variance with pedigree 0.0407, pedigree (1,3,5,3,1)
  EcoSpold01Location=RER
  properties: wet mass 1 kg, dry mass 1 kg
- wastewater, unpolluted: -0.454783 m3; = ((water_decarbonised_input/1000)*(1-fraction_WDC_to_air))*-1; lognormal variance with pedigree 0.0407, pedigree (1,3,5,3,1)
  EcoSpold01Location=CH
  Calculated value based on literature values and expert opinion. See comments in the parametres' comment field.
  production volume 7.42809e9 m3
    (same comment as for waste wood, untreated)
  properties: water content 2962.17, carbon content, non-fossil 0.00178991, carbon content, fossil 0.00178991, wet mass 1000 kg, dry mass 0.337476 kg
  note on carbon content, fossil: Assumed to be like in tap water. Bicarbonate content is 2.93 mol/m3. CO2 content is 0.1 mol/m3 (ecoinvent v2.2 report 8, Tab 93.1).
- sulfuric acid: 0.144541 kg; lognormal variance with pedigree 0.0407, pedigree (1,3,5,3,1)
  EcoSpold01Location=RER
  properties: wet mass 1 kg, dry mass 1 kg
- chemical, organic: 0.0257401 kg; lognormal variance with pedigree 0.0407, pedigree (1,3,5,3,1)
  EcoSpold01Location=GLO
  properties: carbon content, fossil 0.628, dry mass 1 kg, wet mass 1 kg
  note on carbon content, fossil: This dataset is an unweighted average of 20 organic substances (listed in Tab 88.1, ecoinvent v2.2 report 8, part II), being part of the top100 chemicals included in this database. The C-content has also been calculated as an unweighted average of the C content of the substances composing this dataset.
- sodium hydroxide, without water, in 50% solution state: 0.120483 kg; lognormal variance with pedigree 0.0407, pedigree (1,3,5,3,1)
  EcoSpold01Location=RER
  properties: wet mass 1 kg, dry mass 1 kg
- nitric acid, without water, in 50% solution state: 0.0297001 kg; lognormal variance with pedigree 0.0407, pedigree (1,3,5,3,1)
  EcoSpold01Location=RER
  properties: wet mass 1 kg, dry mass 1 kg
- scrap aluminium: 0 kg; pedigree (1,1,1,1,1)
  EcoSpold01Location=CH
  production volume 0 kg
    (same comment as for waste wood, untreated)
  properties: wet mass 1 kg, dry mass 1 kg
- heat, district or industrial, other than natural gas: 7.76163 MJ; lognormal variance with pedigree 0.0407, pedigree (1,3,5,3,1)
  EcoSpold01Location=RER
- ethoxylated alcohol (AE3): 0.00297001 kg; = 0.006*0.5; lognormal variance with pedigree 0.0407, pedigree (1,3,5,3,1)
  (same comment as for ethoxylated alcohol (AE7))
  property dry mass 1 kg; name DM
  property water in wet mass 0 kg; name WWM
  property wet mass 1 kg; name WM
  property carbon content, fossil 0.207952; name C_content_fossil
  property water content 0; name water_content
  property carbon content, non-fossil 0.485221; name C_content_non_fossil
- water, decarbonised: 0 kg; name water_decarbonised_input; pedigree (1,1,1,1,1)
  EcoSpold01Location=RER
  properties: wet mass 1 kg
- lubricating oil: 0.0272251 kg; lognormal variance with pedigree 0.0407, pedigree (1,3,5,3,1)
  EcoSpold01Location=RER
  properties: carbon content, fossil 0.75, dry mass 1 kg, wet mass 1 kg
  note on carbon content, fossil: Lubricating oil is produced from diesel. C-content/dry mass of fats and oils considered 75%, from: ecoinvent v2.2 report, n 15a, pg 40
- aluminium sulfate, powder: 0.0139591 kg; lognormal variance with pedigree 0.0407, pedigree (1,3,5,3,1)
  EcoSpold01Location=RER
  properties: dry mass 1 kg, wet mass 1 kg
- hazardous waste, for incineration: 0 kg; pedigree (1,1,1,1,1)
  EcoSpold01Location=CH
  production volume 0 kg
    (same comment as for waste wood, untreated)
  properties: dry mass 0.75 kg, carbon content, fossil 0.554667, wet mass 1 kg, water content 0.333333
  note on carbon content, fossil: Tab A.6, ecoinvent v2.2 report 13_I. C content has been calculated after data in the tables, and then referred to 1 kg DM
- wood chips, dry, measured as dry mass: 0.029614 kg; lognormal variance with pedigree 0.0407, pedigree (1,3,5,3,1)
  EcoSpold01Location=RER
  properties: wet mass 1.4 kg, dry mass 1 kg, water content 0.4, carbon content, non-fossil 0.494
  note on carbon content, non-fossil: C content of dry mass is 0.494 kgC/kg dry wood (ecoinvent v2.2 report 9).
- white spirit: 0.000123751 kg; lognormal variance with pedigree 0.0407, pedigree (1,3,5,3,1)
  EcoSpold01Location=RER
  properties: wet mass 1 kg, carbon content, fossil 0.863404, dry mass 1 kg
  note on carbon content, fossil: The most common variety of white spirit is a mixture of saturated aliphatic and alicyclic C7-C12 hydrocarbons with a content of 15-20% (by weight) of aromatic C7-C12 hydrocarbons (ecoinvent v2.2 report 8-part 94). The average composition was assumed as being 82.5% C9.5 saturated aliphatic and alicyclic hydrocarbons (average formula C9.5H20), and 17.5% C9.5 aromatic hydrocarbons (average formula C9.5H9.5).
- electricity, medium voltage: 4.79162 kWh; lognormal variance with pedigree 0.0407, pedigree (1,3,5,3,1)
  EcoSpold01Location=UCTE
- waste bitumen sheet: -0.0272251 kg; lognormal variance with pedigree 0.0407, pedigree (1,3,5,3,1)
  EcoSpold01Location=CH
  production volume 4.44675e8 kg
    (same comment as for waste wood, untreated)
  properties: wet mass 1 kg, dry mass 0.985 kg, carbon content, fossil 0.643207, water content 0.0152284
  note on carbon content, fossil: The bitumen sheet is made of 63% bitumen, 24% surface spread and filler (assumed to be pure SiO2), 6% carrier fleece (assumed to be PE) and 7% elastomer (assumed to be PS) (ecoinvent v2.2 report 13_I, pg 40). C content of bitumen, PE and PS from Tab A.6 and A.1 (ecoinvent v2.2 report 13_I, pg 40), respectively. C content of waste also given in the dataset
- chemical factory, organics: 3.96002e-10 unit; lognormal variance with pedigree 0.68, pedigree (5,5,5,5,5)
  EcoSpold01Location=RER
  activityLink introduced to establish a direct link to the corresponding regional supply of this product
- scrap aluminium: -0.0141846, -0.000665507 kg (2 entries); lognormal variance with pedigree 0.0407, pedigree (1,3,5,3,1)
  EcoSpold01Location=CH
  production volume 2.4255e8 kg
- water, decarbonised: 390.44, 78.7108, 258.816, 0.247917, 14.2882 kg (5 entries); lognormal variance with pedigree 0.0407, pedigree (1,3,5,3,1)
  EcoSpold01Location=RER
- hazardous waste, for incineration: -0.00120598, -3.15236e-5 kg (2 entries); lognormal variance with pedigree 0.0407, pedigree (1,3,5,3,1)
  EcoSpold01Location=CH
  production volume 2.02125e7 kg

## Emissions to nature
- Copper, ion [water, unspecified]: 1.48501e-5 kg; lognormal variance with pedigree 0.6907, pedigree (1,3,5,3,1)
- Zinc, ion [water, unspecified]: 4.45502e-5 kg; lognormal variance with pedigree 0.6907, pedigree (1,3,5,3,1)
- Tin, ion [water, unspecified]: 0.000123751 kg; lognormal variance with pedigree 0.6907, pedigree (1,3,5,3,1)
- Iron, ion [water, unspecified]: 2.22751e-5 kg; lognormal variance with pedigree 0.6907, pedigree (1,3,5,3,1)
- Chloride [water, unspecified]: 0.00659343 kg; lognormal variance with pedigree 0.0807, pedigree (1,3,5,3,1)
- Sodium, ion [water, unspecified]: 0.0428672 kg; lognormal variance with pedigree 0.6907, pedigree (1,3,5,3,1)
- Water [air, unspecified]: 0.28772 m3; = (water_decarbonised_input/1000)*fraction_WDC_to_air; lognormal variance with pedigree 0.0807, pedigree (2,2,5,1,1)
  Calculated value based on literature values and expert opinion. See comments in the parametres' comment field.
  property fraction, origin: unspecified 0; name fraction_origin_unspecified
  property fraction, origin: fresh water 1; name fraction_origin_fresh_water
  property fraction, origin: salt water 0; name fraction_origin_salt_water
- Manganese [water, unspecified]: 0.000126721 kg; lognormal variance with pedigree 0.6907, pedigree (1,3,5,3,1)
- Particulates, > 2.5 um, and < 10um [air, unspecified]: 1.33651e-5 kg; lognormal variance with pedigree 0.1607, pedigree (1,3,5,3,1)
- Aluminium [water, unspecified]: 0.00148501 kg; lognormal variance with pedigree 0.6907, pedigree (1,3,5,3,1)
- Lead [water, unspecified]: 1.98001e-5 kg; lognormal variance with pedigree 0.6907, pedigree (1,3,5,3,1)
- Cadmium, ion [water, unspecified]: 7.42503e-7 kg; lognormal variance with pedigree 0.6907, pedigree (1,3,5,3,1)
- Sulfate [water, unspecified]: 0.11187 kg; lognormal variance with pedigree 0.0807, pedigree (1,3,5,3,1)
- Nickel, ion [water, unspecified]: 0.000215821 kg; lognormal variance with pedigree 0.6907, pedigree (1,3,5,3,1)

## Sampling procedure
Literature / survey

## Review by Bo Weidema 2012-07-24
input of ethoxylated alchohols (degreaser) specified

## Review by Roland Hischier 2004-04-13
passed

## Review by Emilia Moreno Ruiz 2017-08-17
Water outputs were adjusted
