# blast furnace production

Dataset: EcoSpold 2, unit process
Geography: RER
Time period: 2002-01-01 to 2019-12-31
Technology level: current
Classification: ISIC rev.4 ecoinvent: 2815:Manufacture of ovens, furnaces and furnace burners
Classification: EcoSpold01Categories: metals/extraction
Tags: ConvertedDataset
Scenario: Business-as-Usual
System model: Allocation at the point of substitution
Generated by: Hans-Jörg Althaus
Published in: Classen M. 2009
Database: ecoinvent
isCopyrightProtected: true
accessRestrictedTo: 1

## General comment
Assumptions for medium sized plant. Output: 1'500'000 t/a, life time: 50 years. Site is shared with BOF converter.
[This dataset was already contained in the ecoinvent database version 2. It was not individually updated during the transfer to ecoinvent version 3. Life Cycle Impact Assessment results may still have changed, as they are affected by changes in the supply chain, i.e. in other datasets. This dataset was generated following the ecoinvent quality guidelines for version 2. It may have been subject to central changes described in the ecoinvent version 3 change report (http://www.ecoinvent.org/database/ecoinvent-version-3/reports-of-changes/), and the results of the central updates were reviewed extensively. The changes added e.g. consistent water flows and other information throughout the database. The documentation of this dataset can be found in the ecoinvent reports of version 2, which are still available via the ecoinvent website. The change report linked above covers all central changes that were made during the conversion process.]

## Included activities end
Infrastructure for input material unloading and storage, blast furnace processes and casting and for administrative buildings

## Geography
Some Swiss datasets are used for European processes.

## Technology
Assumed technology of medium sized plant.

## Reference product
- blast furnace: 1 unit; CPC 43420: Industrial or laboratory furnaces and ovens, except non-electric bakery ovens; other industrial or laboratory […]; By-product classification allocatable product
  production volume 2.69327 unit
    Unknown
    Calculated from the demand from pig iron (from IISI: Steel Statistical Yearbook 2007 ; http://www.worldsteel.org/pictures/programfiles/SSY2007.pdf)
  property price 2.05511e7 EUR2005
    Calculated based on inputs: The price of the product has been calculated as a sum of the values of the material and energy inputs for this product. This value is therefore a rough estimation. It may underestimate the real price since there are additional expenses when producing any product. These expences can include for example labour costs, treatment of waste materials and profit for the producer. Please consider carefully whether this level of data quality is acceptable for your application.
  property true value 2.05511e7
    allocation property applied in "true value" allocation // value calculated from revenue

## By-products
- iron scrap, sorted, pressed: 0 kg; By-product classification Recyclable; CPC 39310: Slag, dross, scalings and other waste from the manufacture of iron or steel; pedigree (1,1,1,1,1)
  Iron scrap recovered from this waste.
  production volume 3125.52 kg
  property price 0.175 EUR2005
    Temporary price data. Calculated as 90% of purchasers price based on: 2005 import and export prices (total trades (USD) divided by total weight (kg) in biggest economies of the world: EU27, USA, Brasil, China, India, Japan and Russia) from UN Commodity Trade Statistics Database (http://data.un.org/Explorer.aspxDatabase [Accessed 2011.06.20]). Commodity: Waste or scrap, of cast iron
  property carbon content 0
    carbon content on a dry matter basis (reserved; not for manual entry)
  property true value 16.7253
    allocation property applied in "true value" allocation // value calculated from revenue
  properties: water content 0, water in wet mass 0 kg, carbon content, fossil 0, dry mass 1 kg, carbon content, non-fossil 0, wet mass 1 kg, carbon allocation 0 kg

## Inputs from technosphere
- conveyor belt: 1800 m; lognormal variance with pedigree 0.8, pedigree (5,5,5,5,5)
  Rough estimation
  Uncertainty: r
- steel, low-alloyed, hot rolled: 467970 kg; lognormal variance with pedigree 0.8, pedigree (5,5,5,5,5)
  Rough estimation
  Uncertainty: r
  properties: dry mass 1 kg, wet mass 1 kg, carbon content, fossil 0.005
  note on carbon content, fossil: Low alloyed steel composition given in Tab. 3.2 ecoinvent v2.2 report 10_partII. Steel assumed to have a C content of 0.5%
- waste reinforced concrete: 0 kg; pedigree (1,1,1,1,1)
  Rough estimation
  Uncertainty: r
  production volume 0 kg
    Calculated from the production volume of blast furnace in proportion to the respective output amounts.
  properties: water content 0.00585407, wet mass 1 kg, dry mass 0.99418 kg
- refractory, basic, packed: 200000 kg; lognormal variance with pedigree 0.8, pedigree (5,5,5,5,5)
  Rough estimation
  Uncertainty: r
  properties: wet mass 1 kg, dry mass 1 kg
- reinforcing steel: 793799 kg; lognormal variance with pedigree 0.8, pedigree (5,5,5,5,5)
  Rough estimation
  Uncertainty: r
  properties: carbon content, fossil 0.004, dry mass 1 kg, wet mass 1 kg
- waste brick: 0 kg; pedigree (1,1,1,1,1)
  Rough estimation
  Uncertainty: r
  production volume 0 kg
    (same comment as for waste reinforced concrete)
  properties: wet mass 1 kg, dry mass 1 kg
- building, hall: 19500 m2; lognormal variance with pedigree 0.8, pedigree (5,5,5,5,5)
  Rough estimation
  Uncertainty: r
- concrete, normal: 10328.4 m3; lognormal variance with pedigree 0.8, pedigree (5,5,5,5,5)
  Rough estimation
  Uncertainty: r
  properties: water content 0.086758, wet mass 2380 kg, dry mass 2190 kg
- waste concrete, not reinforced: 0 kg; pedigree (1,1,1,1,1)
  Rough estimation
  Uncertainty: r
  production volume 0 kg
    (same comment as for waste reinforced concrete)
  properties: dry mass 1 kg, wet mass 1 kg
- building, multi-storey: 25000 m3; lognormal variance with pedigree 0.8, pedigree (5,5,5,5,5)
  Rough estimation
  Uncertainty: r
- industrial machine, heavy, unspecified: 2.02e7 kg; lognormal variance with pedigree 0.8, pedigree (5,5,5,5,5)
  Rough estimation
  Uncertainty: r
- waste reinforced concrete: -3.28153e6, -34770.3 kg (2 entries); lognormal variance with pedigree 0.8, pedigree (5,5,5,5,5)
  Rough estimation
  Uncertainty: r
  production volume 8.93168e6 kg
- waste brick: -173824, -26176 kg (2 entries); lognormal variance with pedigree 0.8, pedigree (5,5,5,5,5)
  Rough estimation
  Uncertainty: r
  production volume 538653 kg
- waste concrete, not reinforced: -1.99882e7, -211790 kg (2 entries); lognormal variance with pedigree 0.8, pedigree (5,5,5,5,5)
  Rough estimation
  Uncertainty: r
  production volume 5.4404e7 kg

## Inputs from nature
- Transformation, from unspecified [natural resource, land]: 975999 m2; lognormal variance with pedigree 0.8, pedigree (5,5,5,5,5)
  Rough estimation
  Uncertainty: r
- Occupation, industrial area [natural resource, land]: 4.88e7 m2*year; lognormal variance with pedigree 0.8, pedigree (5,5,5,5,5)
  Rough estimation
  Uncertainty: r
- Transformation, to industrial area [natural resource, land]: 975999 m2; lognormal variance with pedigree 0.8, pedigree (5,5,5,5,5)
  Rough estimation
  Uncertainty: r

## Sampling procedure
Internet search

## Extrapolations
see Geography

## Review by Roland Hischier 2007-08-13
passed
