# control cabinet production, heat and power co-generation unit, 160kW electrical

Dataset: EcoSpold 2, unit process
Geography: RoW
Time period: 1987-01-01 to 2019-12-31
Technology level: current
Classification: EcoSpold01Categories: natural gas/cogeneration
Classification: ISIC rev.4 ecoinvent: 2811:Manufacture of engines and turbines, except aircraft, vehicle and cycle eng
Tags: ConvertedDataset
Scenario: Business-as-Usual
System model: Allocation at the point of substitution
Generated by: Thomas Heck
Published in: Heck, T. 2007
Database: ecoinvent
isCopyrightProtected: true
accessRestrictedTo: 1

## General comment
Inventory refers to infrastructure of an existing natural gas cogeneration plant (lambda=1 motor, 160kWe, operation start 1987) at Jakobsberg, Basel, Switzerland. (Life time for operation assumed 100'000 h.)
[This dataset was already contained in the ecoinvent database version 2. It was not individually updated during the transfer to ecoinvent version 3. Life Cycle Impact Assessment results may still have changed, as they are affected by changes in the supply chain, i.e. in other datasets. This dataset was generated following the ecoinvent quality guidelines for version 2. It may have been subject to central changes described in the ecoinvent version 3 change report (http://www.ecoinvent.org/database/ecoinvent-version-3/reports-of-changes/), and the results of the central updates were reviewed extensively. The changes added e.g. consistent water flows and other information throughout the database. The documentation of this dataset can be found in the ecoinvent reports of version 2, which are still available via the ecoinvent website. The change report linked above covers all central changes that were made during the conversion process.]

## Included activities end
The module includes the most important materials used for production. It includes also the transport of these materials and the energy and water needed for production.

## Geography
Data refers to a plant in Switzerland, assumed valid for Europe (RER)

## Technology
Component of a specific cogeneration unit installed in Switzerland. Technology at end of 1980s.

## Parameters
- fraction, process water, to air: 0.15 dimensionless; name fraction_PW_to_air; lognormal variance with pedigree 0.092025, pedigree (4,4,3,2,4)

## Reference product
- control cabinet, heat and power co-generation unit, 160kW electrical: 1 unit; By-product classification allocatable product; CPC 4315: Parts for the goods of classes 4311 to 4314
  EcoSpold01Location=RER
  production volume 2.67763 unit
    This is a placeholder value that does not reflect real-world production volumes. This dataset does not currently require a real-world production volume to work in the database framework, and no actual data were collected yet. This has no negative effect on the results of the ecoinvent database.
  property price 10985 EUR2005
    EU27 I/O database(in the 'EU & DK Input Output Database' (available in SimaPro)); -79 Building, non-residential EU 27 (calculated to be 38.169 EUR2003/kg). Based on consumption of (_53 Iron basic, virgin, EU27;7.25517782294095E-3 kg/EUR building; 0.45 EUR2003 per kg DS), (_61 Iron, after first processing, EU27;5.8766830719783E-3kg/EUR building; 0.62 EUR2003 per kg DS), (_65 Fabricated metal products, except machinery, EU27; 8.9167022775554E-3 kg/EUR building; 3.63 EUR2003 per kg DS) and (_66 Machinery and equipment n.e.c., EU27;4.15071881936446E-3 kg/EUR building; 5.71 EUR2003 per kg DS) -290 kg
  property true value 10985
    allocation property applied in "true value" allocation // value calculated from revenue

## By-products
- heat, for reuse in municipal waste incineration only: 0 MJ; CPC 17300: Steam and hot water; By-product classification allocatable product; pedigree (1,1,1,1,1)
  Net electricity generated from this waste and used in internal MSWI plant energy redistribution.
  Uncertainty: uncertainty is calculated from uncertainties in waste composition and uncertainties in energy efficiency and the uncertainty in internal energy demand
  production volume 223.842 MJ
  property exergy 0.1842 MJ; name E_th_prod_MSWI_exergy
    This exergy property is based on the exergy content of the product.
  property price 0.0106 EUR2005; name E_th_prod_MSWI_price_EUR2005
    Average European district heat price from Ecoheatcool and Euroheat 2005-2006, Ecoheat Work package 1: The European heat market. Final report. 10.6 EUR/GJ i s the price of district heat. http://www.solarthermalworld.org/files/Ecoheatcool%20WP1%20Web.pdf?download
  property true value relation 0.1842; name E_th_prod_MSWI_true_value_relation
    property to calculate "true value" from
  property true value 0.403696
    allocation property applied in "true value" allocation // value calculated from true value relation
- electricity, for reuse in municipal waste incineration only: 0 kWh; CPC 17100: Electrical energy; By-product classification allocatable product; pedigree (1,1,1,1,1)
  (same comment as for heat, for reuse in municipal waste incineration only)
  production volume 31.8423 kWh
  property price 0.1 EUR2005; name E_el_prod_MSWI_price_EUR2005
    Estimated to be the same price as in case of electricity, medium voltage.
  property exergy 3.6 MJ; name E_el_prod_MSWI_exergy
    This exergy property is based on the exergy content of the product.
  property true value relation 3.6; name E_el_prod_MSWI_true_value_relation
    property to calculate "true value" from
  property true value 1.12235
    (same comment as for heat, for reuse in municipal waste incineration only)

## Inputs from technosphere
- copper: 10.7985 kg; lognormal variance with pedigree 0.188, pedigree (4,5,5,5,1)
  Basic uncertainty:2
  EcoSpold01Location=RER
  properties: dry mass 1 kg, wet mass 1 kg
- reinforcing steel: 275.962 kg; lognormal variance with pedigree 0.188, pedigree (4,5,5,5,1)
  EcoSpold01Location=RER
  Basic uncertainty:2
  properties: dry mass 1 kg, carbon content, fossil 0.004, wet mass 1 kg
- wastewater from pig iron production: -0.346952 m3; lognormal variance with pedigree 0.342, pedigree (1,1,5,5,1)
  EcoSpold01Location=CH
  rough estimate, uncertainty refers to amount of water only; not quantified here: composition of waste water unkown, therefore high uncertainty of applicability of modul.
  production volume 1.041 m3
    Calculated from the production volume of control cabinet, cogen unit 160kWe in proportion to the respective output amounts.
  properties: water content 2962.17, carbon content, fossil 1.2149e-5, wet mass 1000 kg, dry mass 0.337476 kg
  note on carbon content, fossil: TOC = 0.0000041 kg/m3 (Tab A.19, ecoinvent v2.2 report 13_I). TOC was considered as Total Carbon.
- tin: 1.61977 kg; lognormal variance with pedigree 0.188, pedigree (4,5,5,5,1)
  EcoSpold01Location=RER
  Basic uncertainty:2
  properties: wet mass 1 kg, dry mass 1 kg
- polyvinylchloride, suspension polymerised: 6.54164 kg; lognormal variance with pedigree 0.188, pedigree (4,5,5,5,1)
  Basic uncertainty:2
  EcoSpold01Location=RER
  properties: carbon content, fossil 0.387097, wet mass 1 kg, dry mass 1 kg
  note on carbon content, fossil: Monomer is vynyl chloride, C2H3Cl (ecoinvent v2.2 report 11_II). MW=62 g/mol
- aluminium, wrought alloy: 0.149979 kg; lognormal variance with pedigree 0.188, pedigree (4,5,5,5,1)
  EcoSpold01Location=RER
  Basic uncertainty:2
  properties: wet mass 1 kg, dry mass 1 kg
- nickel, 99.5%: 0.339953 kg; lognormal variance with pedigree 0.188, pedigree (4,5,5,5,1)
  Basic uncertainty:2
  EcoSpold01Location=GLO
  properties: dry mass 1 kg, wet mass 1 kg
- zinc: 0.249965 kg; lognormal variance with pedigree 0.188, pedigree (4,5,5,5,1)
  EcoSpold01Location=RER
  Basic uncertainty:2
  properties: wet mass 1 kg, dry mass 1 kg
- electricity, medium voltage: 0 kWh; pedigree (1,1,1,1,1)
  EcoSpold01Location=UCTE
- polyvinylchloride, emulsion polymerised: 0.957317 kg; lognormal variance with pedigree 0.188, pedigree (4,5,5,5,1)
  EcoSpold01Location=RER
  Basic uncertainty:2
  properties: wet mass 1 kg, dry mass 1 kg, carbon content, fossil 0.387097
- polyethylene, low density, granulate: 78.4891 kg; lognormal variance with pedigree 0.188, pedigree (4,5,5,5,1)
  EcoSpold01Location=RER
  Basic uncertainty:2
  properties: carbon content, fossil 0.857143, wet mass 1 kg, dry mass 1 kg
  note on carbon content, fossil: Polyethylene is formed out of a huge amount of ethylene monomers (C2H4) (ecoinvent v2.2 report 11_II). MW=28 g/mol
- heat, district or industrial, other than natural gas: 0 MJ; pedigree (1,1,1,1,1)
  EcoSpold01Location=RER
- waste plastic, mixture: 0 kg; pedigree (1,1,1,1,1)
  EcoSpold01Location=CH
  production volume 0 kg
    (same comment as for wastewater from pig iron production)
  properties: water content 0.180638, carbon content, fossil 0.747344, wet mass 1 kg, dry mass 0.847 kg
  note on carbon content, fossil: C content in 1 kg DM was calculated using data in Tab A.2, ecoinvent v2.2 report 13_I
- platinum: 0.00209971 kg; lognormal variance with pedigree 0.188, pedigree (4,5,5,5,1)
  Basic uncertainty:2
  EcoSpold01Location=RER
  properties: wet mass 1 kg, dry mass 1 kg
- heat, district or industrial, natural gas: 0 MJ; pedigree (1,1,1,1,1)
  EcoSpold01Location=RER
- lead: 0.759894 kg; lognormal variance with pedigree 0.188, pedigree (4,5,5,5,1)
  Basic uncertainty:2
  EcoSpold01Location=RER
  properties: wet mass 1 kg, dry mass 1 kg
- electricity, medium voltage: 22.1203, 4.02496, 68.2572, 989.658, 141.639, 464.066 kWh (6 entries); lognormal variance with pedigree 0.1246, pedigree (3,3,5,5,4)
  EcoSpold01Location=UCTE
- heat, district or industrial, other than natural gas: 35.2003, 78518.9 MJ (2 entries); lognormal variance with pedigree 0.1246, pedigree (3,3,5,5,4)
  EcoSpold01Location=RER
- waste plastic, mixture: -10.5671, -0.70605, -0.0533974, -0.291624, -0.117813, -0.276924, -73.9752 kg (7 entries); lognormal variance with pedigree 0.1246, pedigree (3,3,5,5,4)
  EcoSpold01Location=CH
  production volume 258 kg
- heat, district or industrial, natural gas: 1365.33, 77188.8 MJ (2 entries); lognormal variance with pedigree 0.1246, pedigree (3,3,5,5,4)
  EcoSpold01Location=RER

## Inputs from nature
- Water, unspecified natural origin [natural resource, in water]: 0.43394 m3; name water_UNO_input; lognormal variance with pedigree 0.342, pedigree (1,1,5,5,1)
  rough estimate

## Emissions to nature
- Water [water, unspecified]: 0.021897 m3; name water_to_water_unspecified; lognormal variance with pedigree 0.0827, pedigree (2,2,5,5,1)
  Calculated value based on literature values and expert opinion. See comments in the parametres' comment field.
  property carbon content, fossil 0; name C_content_fossil
  property water in wet mass 1000 kg; name WWM
  property fraction, origin: salt water 0; name fraction_origin_salt_water_Ww
  property fraction, origin: fresh water 0; name fraction_origin_fresh_water_Ww
  property fraction, origin: unspecified 1; name fraction_origin_unspecified_Ww
  property dry mass 0 kg; name DM
  property carbon content, non-fossil 0; name C_content_non_fossil
  property wet mass 1000 kg; name WM
- Water [air, unspecified]: 0.065091 m3; name water_to_air_unspecified; lognormal variance with pedigree 0.0827, pedigree (2,2,5,5,1)
  (same comment as for Water)
  property fraction, origin: salt water 0; name fraction_origin_salt_water
  property fraction, origin: unspecified 1; name fraction_origin_unspecified
  property fraction, origin: fresh water 0; name fraction_origin_fresh_water

## Sampling procedure
Operator and manufacturer information

## Extrapolations
see Geography/Text This dataset has been copied from an original dataset covering the geography RER. The uncertainty has been adjusted accordingly.

## Review by Gerald Rebitzer (obsolete) 2003-08-27
had passed
