# ammonia production, steam reforming, liquid

Dataset: EcoSpold 2, unit process
Geography: RoW
Time period: 2000-01-01 to 2019-12-31
Technology level: current
Classification: ISIC rev.4 ecoinvent: 2012:Manufacture of fertilizers and nitrogen compounds
Scenario: Business-as-Usual
System model: Allocation at the point of substitution
Generated by: Maggie Osses
Published in: Althaus H.-J. 2007
Database: ecoinvent
isCopyrightProtected: true
accessRestrictedTo: 1

## General comment
This dataset represents the production of 1 kg of liquid ammonia using the steam reforming process. Ammonia is a colourless gas with a penetrating, pungent suffocating odour. It is liquid when under pressure. It is hygroscopic and soluble in water
(89.9 g/L at 0°C).
The most important use for ammonia is as a supply of vital agricultural nitrogen for crops. It is either applied as a fertiliser directly or it is used as a feedstock in the manufacture of urea, ammonium nitrate or nitric acid. The industrial use of ammonia as a nitrogen source has consumed an increasingly greater share of total ammonia production, amounting now to about 20% of world output. Virtually all nitrogen used in the chemical industry enters the process as ammonia. The major uses of industrial ammonia-nitrogen , in part after conversion into nitric acid, are the manufacture of plastics and fibres. Other important applications are the manufacture of explosives, hydrazine, amines, amides, nitriles, and other organic nitrogen compounds serving as intermediates for dyes and pharmaceuticals. The most important products manufactured from ammonia are nitric acid, urea, sodium cyanide and sodium carbonate.
Ammonia is used in the area of environmental protection to remove SO2 and NOx from steam boiler flue gases. The resulting ammonium sulphate (and sometimes ammonium nitrate) is marketed as a fertiliser product. Liquid ammonia has a considerable importance as a solvent. Ammonia is also used in the nitriding of steel. It is also still used as a refrigerant in industrial and commercial refrigeration and air-conditioning installations.
Ammonia is an inexpensive and easily managed starting material for manufacturing protective gas mixtures for chemical products and for metal-working processes. It is also used for manufacturing hydrogen and is even proposed for use in energy-related applications.
The main data sources for this dataset are EFMA (2000) and Frischknecht (1999). Additional sources are Davis (1999), Patyk and Reinhardt (1997) and Dones et al. (2007). UNEP (1998) is taken into account for plausibility checks and comparison reasons.
References:
Althaus H.-J., Chudacoff M., Hischier R., Jungbluth N., Osses M. and Primas A. (2007) Life Cycle Inventories of Chemicals. ecoinvent report No. 8, v2.0. EMPA Dübendorf, Swiss Centre for Life Cycle Inventories, Dübendorf, CH.
European Fertiliser Manufacturers´ Association (2000) Production of Ammonia. Best Available Techniques for Pollution Prevention and Control in the European Fertiliser Industries. Booklet N°1. Brussel. http://www.efma.org/publications/BAT%202000/bat01/booklet1.pdf.
Frischknecht R. (1999) Umweltrelevanz natürlicher Kältemittel. Ökobilanzen von Wärmepumpen und Kälteanlagen. Herstellung Ammoniak (NH3, R-717). Bundesamt für Energie.
Davis J. and Haglund C. (1999) The Swedish Institute for Food and Biotechnology. SIK Report N° 654 1999 Life Cycle Inventory of Fertilizer Production. pages 57-67.
Dones R., Bauer C., Bolliger R., Burger B., Faist Emmenegger M., Frischknecht R., Heck T., Jungbluth N., Röder A., Tuchschmid M. (2007) Life Cycle Inventories of Energy Systems: Results for Current Systems in Switzerland and other UCTE Countries. ecoinvent report No. 5. Paul Scherrer Institut Villigen, Swiss Centre for Life Cycle Inventories, Dübendorf, CH.
United Nations Environment Programme (UNEP) Industry and the Environment, United Nations Industrial Development Organization (UNIDO) and International Fertiliser Association (IFA). (1998) Mineral Fertiliser Production and the Environment. Part 1. The Fertiliser Industry's Manufacturing Processes and Environmental Issues. United Nations Publications, New York.
Patyk A. and Reinhardt G. (1997) Düngemittel - Energie- und Strombilanzen. Vieweg Verlag. Braunschweig/Wiesbaden.

## Included activities start
The activity starts when the raw materials enter the process.

## Included activities end
This activity ends with the production of ammonia. The inputs of natural gas, energy plus auxiliaries are considered. The infrastructure and land use are also taken into account, as well as wastes and emissions into air and water. Emissions into water are assumed to be emitted into rivers.

## Geography
European average values. The inventory is assumed to be representative of the global production.

## Technology
According to EFMA (2000), two main types of production processes for ammonia synthesis gas are currently in operation in Europe:
- Steam reforming of natural gas or other light hydrocarbons (natural gas liquids, liquefied petroleum gas, naphtha) and
- Partial oxidation of heavy fuel oil or vacuum residue
Coal gasification and water electrolysis are no longer in use in the European ammonia industry. The ammonia synthesis process is principally independent of the type of synthesis gas production process, but synthesis gas quality influences the loop design and operation conditions.
This dataset represents the production of liquid ammonia by the steam reforming process. About 85% of world ammonia production is based on steam reforming concepts.
The theoretical process conversions, based on methane feedstock, are given in the following approximate formulae:
0.88CH4 + 1.26Air + 1.24H2O → 0.88CO2 + N2 + 3H2
N2 + 3H2 → 2NH3
Various feedstocks are available, but most of the ammonia plants use natural gas to supply hydrogen. The use of alternate feedstocks, such as naphtha, fuel oil and coal has been evaluated, but natural gas is the most convenient.
Desulphuration of the feedstock is the first step in the ammonia manufacturing process. The sulphur concentration is reduced to below 0.1 ppm to avoid adverse effects on the reformer catalysts. Desulphuration is typically performed using a cobalt molybdenum catalyst and then a pelletised zinc oxide bed. Zinc sulphide remains in the adsorption bed. The hydrogen for the reaction is usually recycled from the synthesis section.
The gas from the desulphuriser is mixed with process steam coming from an extraction turbine, and the steam/gas mixture is then heated further in the convection section before entering the primary reformer. This consists of a large number of high-nickel chromium alloy tubes filled with nickelcontaining reforming catalyst. In the primary reformer the gas yields hydrogen and carbon monoxide, under high temperature and pressure. Since this reaction is highly endothermic, additional heat is required. This is achieved by burning natural gas or other gaseous fuel in burners of a radiant box containing the tubes. After supplying the necessary high level heat to the reforming process, this gas has a surplus of heat content. (Only about 50-60% of the fuel’s heat value is used in the process itself). This surplus is recovered for its reuse in the production process.
Only 30 to 40% of the hydrocarbon feed are reformed in the primary reformer because of the chemical equilibrium at the actual operating conditions. The temperature must be raised to increase the conversion. This is done in the secondary reformer by internal combustion of part of the gas with the process air, which also provides the nitrogen for the final synthesis gas.
After being cooled, the gas enters a two stage converter called shift section, where the carbon monoxide (CO) in the process gas undergoes a conversion to carbon dioxide (CO2). The removal of the CO is important for the efficiency of the process. In the high temperature shift converter the CO present in the gas reacts with steam, thereby producing CO2 and hydrogen. The gas is cooled and enters the low temperature shift converter, where additional CO is removed. The converters use iron oxide/chromium oxide- and copper oxide/zinc oxide-based catalysts. At this point, the process gas contains mainly H2, N2, CO2 and the excess process steam. The gas is cooled and most of the excess steam is condensed before it enters the CO2 removal system. Minor amounts of amines, formic acid and acetic acid could be present in the condensate. All these components are stripped from the condensate and/or recycled if using BAT techniques. The heat released during cooling/condensation is further used in the production process.
Since CO2 adversely affects the catalyst used in ammonia synthesis it is removed from the gas stream through scrubbing with monoethanolamine, activated diethanolamine or hot potassium carbonate solution (chemical absorption process). Instead of the mentioned process, physical absorption can also be used. Physical solvents are glycol dimethylethers (selenexol), propylene carbonate and others. The liquor is regenerated using steam stripping.
The next step is methanation. The small amounts of CO and CO2 remaining in the gas are poisonous for the ammonia synthesis catalyst and must be removed by conversion to methane (CH4) in the methanator. Methane is formed by a reaction between H2 and trace amounts of CO and CO2 present in the gas, with the reaction occurring in the presence of a nickel catalyst. The purified gas is comprised at this point of H2, nitrogen and small quantities of argon, CH4 and helium. This gas is then compressed and routed to the synthesis operation.
The compressed gas enters the ammonia converter, where ammonia is synthesised by reacting H2 and N2 in the presence of an iron catalyst. In order to attain the necessary high pressures, small plants use reciprocating compressors, while larger plants implement centrifugal machines for gas compression. Modern ammonia plants use centrifugal compressors for synthesis gas compression, usually driven by steam turbines, with the steam being produced in the ammonia plant. The refrigeration compressor, needed for condensation of product ammonia, is also usually driven by a steam turbine.
Only 10 to 20 % of the gas is converted to ammonia per pass in the converter due to unfavourable equilibrium conditions. The ammonia that is formed is separated from the recycle gas by cooling/condensation, and the reacted gas is substituted by the fresh make-up synthesis gas, thus maintaining the loop pressure. In addition, extensive heat exchange is required due to the exothermic reaction and the large temperature range in the loop.
Conventional reforming with methanation as the final purification step produces a synthesis gas containing inerts (CH4 and argon) in quantities that does not dissolve in the condensed ammonia. The major part of these inerts is removed by taking out a purge stream from the loop. The purge gas is scrubbed with water to remove ammonia before being used as fuel or before being sent for hydrogen recovery.
In most ammonia plants and in order to achieve an efficient ammonia condensation, vaporising ammonia is used as a refrigerant (instead of water or air) to achieve sufficiently low ammonia concentrations in the gas recycled to the converter. The ammonia vapours are liquefied after recompression in the refrigeration compressor.
Production of Carbon Dioxide: Carbon Dioxide is a by-product generated according to a stoichiometric conversion and may be recovered
for down stream uses.
Other steam reforming processes
The excess air steam reforming process is similar to the conventional, but just more efficient. The features diverging from conventional steam reforming are: decreased firing in the primary reformer, increased process air flow to the secondary reforming, cryogenic final purification and lower synthesis gas inert level.
The heat exchange autothermal reforming was 1999 mostly at the pilot stage, with only two manufacturing plants operating such process. Instead of using the heat of the two reformer outlet gas just to raise steam (what is wasteful from a thermodynamic point of view), it is recycled to the process itself. This is achieved by using this heat in a newly developed primary reformer thus eliminating the fired furnace.

## Time period
Values based on reports from 1995 and 2000, and on literature with data from unknown date.

## Parameters
- fraction, cooling water, to air: 0.3875; name fraction_CW_to_air; = (0.5*fraction_CW_OT_to_air)+(0.5*fraction_CW_R_to_air); lognormal variance with pedigree 0.092025, pedigree (4,4,3,2,4)
  Calculated value based on literature value (see comments of the other parametres present in this dataset) and expert opinion. In the case when no industry/literature data are available about the type of cooling or directly fraction, cooling water, to air specific for the process a default assumption is applied. It is assumed that the once-through cooling system is used in 50% of all cases and recirculating system is used in another 50% of all cases.
- fraction, process water, to air: 0.205 dimensionless; name fraction_PW_to_air; lognormal variance with pedigree 0.092025, pedigree (4,4,3,2,4)
  Literature value (Statistics Canada, 2007 & Shaffer, K.H., 2008, Consumptive water use in the Great Lakes Basin, USGS) (Vionnet, S., Quantis Water Database - Technical Report, 2012).
- fraction, cooling water, recirculating system, to air: 0.771; name fraction_CW_R_to_air; lognormal variance with pedigree 0.0413, pedigree (2,3,1,3,1)
  Calculated based on literature value (Scown, C.D., 2011, Water Footprint of U.S. Transportation Fuels and supplying information of the article) (Vionnet, S., Quantis Water Database - Technical Report, 2012).
- fraction, cooling water, cooling pond system, to air: 0.032; name fraction_CW_CP_to_air; lognormal variance with pedigree 0.0413, pedigree (2,3,1,3,1)
  (same comment as for fraction, cooling water, recirculating system, to air)
- fraction, cooling water, once-through system, to air: 0.004; name fraction_CW_OT_to_air; lognormal variance with pedigree 0.0413, pedigree (2,3,1,3,1)
  (same comment as for fraction, cooling water, recirculating system, to air)

## Reference product
- ammonia, liquid: 1 kg; name RP; CPC 3465: Other fertilizers; By-product classification allocatable product; CAS 7664-41-7
  Ammonia is a colourless gas with a penetrating, pungent suffocating odour. It is liquid when under pressure. It is hygroscopic and soluble in water (89.9 g/L at 0°C).
  The most important use for ammonia is as a supply of vital agricultural nitrogen for crops. It is either applied as a fertiliser directly or it is used as a feedstock in the manufacture of urea, ammonium nitrate or nitric acid. The industrial use of ammonia as a nitrogen source has consumed an increasingly greater share of total ammonia production, amounting now to about 20% of world output. Virtually all nitrogen used in the chemical industry enters the process as ammonia. The major uses of industrial ammonia-nitrogen , in part after conversion into nitric acid, are the manufacture of plastics and fibres. Other important applications are the manufacture of explosives, hydrazine, amines, amides, nitriles, and other organic nitrogen compounds serving as intermediates for dyes and pharmaceuticals. The most important products manufactured from ammonia are nitric acid, urea, sodium cyanide and sodium carbonate.
  Ammonia is used in the area of environmental protection to remove SO2 and NOx from steam boiler flue gases. The resulting ammonium sulphate (and sometimes ammonium nitrate) is marketed as a fertiliser product. Liquid ammonia has a considerable importance as a solvent. Ammonia is also used in the nitriding of steel. It is also still used as a refrigerant in industrial and commercial refrigeration and air-conditioning installations.
  Ammonia is an inexpensive and easily managed starting material for manufacturing protective gas mixtures for chemical products and for metal-working processes. It is also used for manufacturing hydrogen and is even proposed for use in energy-related applications.
  production volume 1.05652e11 kg; name RP_PV; = 138529000000*0.85
    Calculated value. Source: IFA production and trade statistics http://www.fertilizer.org/ifa/Home-Page/STATISTICS/Production-and-trade (accessed 20151120); reports a production volume for 2014 of 138,529 million tons. Proportion to steam reforming is 85%; the rest is produced by partial oxidation (from ecoinvent v2 report 8 'Life Cycle Inventory of Chemicals' & van Balken 'Best Available Techniques for the Production of Ammmonia' 2007 available from: http://www.fertilizer.org/imis20/images/Library_Downloads/2007_tech_hcmc_van_balken_slides.pdf?WebsiteKey=411e9724-4bda-422f-abfc-, accessed 20151120).
  property price 0.348925 EUR2005
    Calculated based on inputs: The price of the product has been calculated as a sum of the values of the material and energy inputs for this product. This value is therefore a rough estimation. It may underestimate the real price since there are additional expenses when producing any product. These expences can include for example labour costs, treatment of waste materials and profit for the producer. Please consider carefully whether this level of data quality is acceptable for your application.
  property carbon content 0
    carbon content on a dry matter basis (reserved; not for manual entry)
  property true value 0.348925; name RP_true_value
    allocation property applied in "true value" allocation // value calculated from revenue
  properties: carbon content, fossil 0, water in wet mass 0 kg, wet mass 1 kg, dry mass 1 kg, water content 0, carbon content, non-fossil 0, carbon allocation 0 kg

## By-products
- heat, for reuse in municipal waste incineration only: 0 MJ; CPC 17300: Steam and hot water; By-product classification allocatable product; pedigree (1,1,1,1,1)
  Net electricity generated from this waste and used in internal MSWI plant energy redistribution.
  Uncertainty: uncertainty is calculated from uncertainties in waste composition and uncertainties in energy efficiency and the uncertainty in internal energy demand
  production volume 3.81716e6 MJ
  property exergy 0.1842 MJ; name E_th_prod_MSWI_exergy
    This exergy property is based on the exergy content of the product.
  property price 0.0106 EUR2005; name E_th_prod_MSWI_price_EUR2005
    Average European district heat price from Ecoheatcool and Euroheat 2005-2006, Ecoheat Work package 1: The European heat market. Final report. 10.6 EUR/GJ i s the price of district heat. http://www.solarthermalworld.org/files/Ecoheatcool%20WP1%20Web.pdf?download
  property true value relation 0.1842; name E_th_prod_MSWI_true_value_relation
    property to calculate "true value" from
  property true value 2.38595e-7
    allocation property applied in "true value" allocation // value calculated from true value relation
- electricity, for reuse in municipal waste incineration only: 0 kWh; CPC 17100: Electrical energy; By-product classification allocatable product; pedigree (1,1,1,1,1)
  (same comment as for heat, for reuse in municipal waste incineration only)
  production volume 516753 kWh
  property price 0.1 EUR2005; name E_el_prod_MSWI_price_EUR2005
    Estimated to be the same price as in case of electricity, medium voltage.
  property exergy 3.6 MJ; name E_el_prod_MSWI_exergy
    This exergy property is based on the exergy content of the product.
  property true value relation 3.6; name E_el_prod_MSWI_true_value_relation
    property to calculate "true value" from
  property true value 6.31266e-7
    (same comment as for heat, for reuse in municipal waste incineration only)
- iron scrap, sorted, pressed: 0 kg; By-product classification Recyclable; CPC 39310: Slag, dross, scalings and other waste from the manufacture of iron or steel; pedigree (1,1,1,1,1)
  metallic iron scrap removed from ash reamains and recycled.
  Uncertainty: uncertainty is calculated from uncertainties in waste composition and transfer coefficients to soild residues
  production volume 69950 kg
  property price 0.175 EUR2005
    Temporary price data. Calculated as 90% of purchasers price based on: 2005 import and export prices (total trades (USD) divided by total weight (kg) in biggest economies of the world: EU27, USA, Brasil, China, India, Japan and Russia) from UN Commodity Trade Statistics Database (http://data.un.org/Explorer.aspxDatabase [Accessed 2011.06.20]). Commodity: Waste or scrap, of cast iron
  property carbon content 0
    carbon content on a dry matter basis (reserved; not for manual entry)
  property true value 1.07497e-7
    allocation property applied in "true value" allocation // value calculated from revenue
  properties: carbon content, non-fossil 0, wet mass 1 kg, dry mass 1 kg, water content 0, carbon content, fossil 0, water in wet mass 0 kg, carbon allocation 0 kg
- copper: 0 kg; source Rentz O. 1999; By-product classification allocatable product; CPC 41413: Refined copper and copper alloys, unwrought; master alloys of copper
  Literature value. Copper uses: Before end-use copper is manufactured into semi fabricated products, such as shapes and ingots (known as 'semis'). These manufacturing processes are subdivided into hot working, cold working and, if necessary, process annealing. Few of the semis are ready for use as such. They more typically travel to first-stage manufacturers, who make metal rods, wire, and casting, and then to component manufacturers who produce such things as motors, valves, and insulated cables The components in turn are incorporated by final-stage manufacturers into a variety of finished products - automobiles, commercial buildings, residential housing, and so forth. These uses account for about 79% of the world-wide consumption of copper.
  production volume 2254.02 kg
  property price 5.52 EUR2005
    Literature value (http://www.economist.com/news/business/21576714-mining-industry-has-enriched-chile-its-future-precarious-copper-solution). Average price between 20015 and 2013.
  property carbon content 0
    carbon content on a dry matter basis (reserved; not for manual entry)
  property true value 1.07929e-7
    allocation property applied in "true value" allocation // value calculated from revenue
  properties: dry mass 1 kg, water in wet mass 0 kg, wet mass 1 kg, carbon content, non-fossil 0, water content 0, carbon content, fossil 0, carbon allocation 0 kg
- zinc concentrate: 0 kg; CPC 14290: Other non-ferrous metal ores and concentrates (other than uranium or thorium ores and concentrates); By-product classification allocatable product
  Calculated value from the knowledge of the properties of both products.
  production volume 1.78908e-6 kg
  property price 0.38 EUR2005; name ByP_price_EUR2005
    Temporary price data. Calculated as 90% of purchasers price based on: Zinc content in concentrate 53%. Concentrate price per kg Zn 86.5% of refined Zn price (13.5% treatment charges according to CHR Metals Limited 2005: Dynamic cost curves. http://www.minecost.com/dynamic.pdf). 2004 zinc price from USGS (2007) Mineral commodity summaries 2007. <http://minerals.usgs.gov/minerals/pubs/mcs/2007/mcs2007.pdf> [Accessed 25 May 2010]
  property zinc content 0.53; name zinc_C_zinc_concentrate
    Zinc content on a dry matter basis. Value taken from teh "zinc mine operation" /GLO dataset.
  property dry mass 1 kg; name DM_zinc_concentrate
  property carbon content 0
    carbon content on a dry matter basis (reserved; not for manual entry)
  property true value 5.8973e-18
    allocation property applied in "true value" allocation // value calculated from revenue
  properties: wet mass 1 kg, water content 0, carbon content, non-fossil 0, carbon content, fossil 0, water in wet mass 0 kg, carbon allocation 0 kg
- iron scrap, unsorted: 0 kg; source European Aluminium Association 2008; CPC 39310: Slag, dross, scalings and other waste from the manufacture of iron or steel; By-product classification Recyclable; pedigree (1,1,1,1,1)
  production volume 1.85059 kg
  property price 0.149 EUR2005; name ironScrapAmount_price_EUR2005
    Temporary price data. Calculated as 90% of purchasers price based on: estimated at 85% of sorted scrap
  property carbon content 0
    carbon content on a dry matter basis (reserved; not for manual entry)
  property true value 2.60395e-12
    allocation property applied in "true value" allocation // value calculated from revenue
  properties: water in wet mass 0 kg, water content 0, carbon content, fossil 0, carbon content, non-fossil 0, dry mass 1 kg, wet mass 1 kg, carbon allocation 0 kg
- aluminium oxide, non-metallurgical: 0 kg; source European Aluminium Association 2008; CPC 41432: Alumina (aluminium oxide), except artificial corundum; By-product classification allocatable product; CAS 1344-28-1; pedigree (1,1,1,1,1)
  production volume 116.451 kg
  property carbon content, non-fossil 0; name C_content_non_fossil
  property price 0.28 EUR2005; name Al2O3Amount_price_EUR2005
    From UN trade database. http://data.un.org/ Import data from the largest economies of the world are used (Brazil, India, USA, China, Japan and EU-27).
  property dry mass 1 kg; name DM
  property water content 0; name water_content
  property wet mass 1 kg; name WM
  property water in wet mass 0 kg; name WWM
  property carbon content, fossil 0; name C_content_fossil
  property carbon content 0
    carbon content on a dry matter basis (reserved; not for manual entry)
  property true value 3.07919e-10
    allocation property applied in "true value" allocation // value calculated from revenue
  properties: carbon allocation 0 kg
- aluminium, cast alloy: 0 kg; source European Aluminium Association 2008; By-product classification allocatable product; CPC 41431: Unwrought aluminium; pedigree (1,1,1,1,1)
  EcoSpold01Location=RER
  production volume 1088.56 kg
  property price 1.3 EUR2005; name castAlloyAmount_price_EUR2005
    Temporary price data. Calculated as 90% of purchasers price based on: Source: London Metal Exchange, Aluminium alloy price for 2005
  property carbon content 0
    carbon content on a dry matter basis (reserved; not for manual entry)
  property true value 1.33638e-8
    allocation property applied in "true value" allocation // value calculated from revenue
  properties: water in wet mass 0 kg, carbon content, non-fossil 0, water content 0, dry mass 1 kg, carbon content, fossil 0, wet mass 1 kg, carbon allocation 0 kg
- aluminium, wrought alloy: 0 kg; source European Aluminium Association 2008; By-product classification allocatable product; CPC 4153: Semi-finished products of aluminium or aluminium alloys; pedigree (1,1,1,1,1)
  production volume 476.55 kg
  property price 1.44 EUR2005; name secondaryAluminiumOutput_price_EUR2005
    Estimated based on literature values and expert judgement. Aluminium ccast alloys are about 90% of the price of aluminium wrought alloys.
  property carbon content 0
    carbon content on a dry matter basis (reserved; not for manual entry)
  property true value 6.48046e-9
    allocation property applied in "true value" allocation // value calculated from revenue
  properties: wet mass 1 kg, water content 0, carbon content, fossil 0, water in wet mass 0 kg, carbon content, non-fossil 0, dry mass 1 kg, carbon allocation 0 kg

## Inputs from technosphere
- nickel, 99.5%: 0.000349999 kg; lognormal variance with pedigree 0.0541, pedigree (3,2,5,5,1)
  Data from survey from literature (Frischknecht 1999)
  Uncertainty: d
  properties: wet mass 1 kg, dry mass 1 kg
- chemical factory, organics: 3.99999e-10 unit; lognormal variance with pedigree 0.3498, pedigree (2,3,5,4,3)
  Calculated based on literature data published by the industry. For this activity, no information was readily available concerning infrastructure and land-use. Therefore, the infrastructure is estimated based on data from two chemical factories, the BASF site of Ludwigshafen and the chemical factory in Gendorf (which are both located in Germany), which produce a wide range of chemical substances. Based on this data, the following assumptions are made: the built area amounts to about 4.2 ha, the plant has an average output of 50'000 t/a and a lifespan of fifty years. The estimated infrastructure amount is therefore 4.00 E-10 units per kg of produced chemical.
  References:
  Althaus H.-J., Chudacoff M., Hischier R., Jungbluth N., Osses M. and Primas A. (2007) Life Cycle Inventories of Chemicals. ecoinvent report No. 8, v2.0. EMPA Dübendorf, Swiss Centre for Life Cycle Inventories, Dübendorf, CH.
  Gendorf (2000) Umwelterklärung 2000, Werk Gendorf. Werk Gendorf, Burgkirchen.
- natural gas, high pressure: 0 m3; pedigree (1,1,1,1,1)
  Data from survey from literature (EFMA 2000)
  Uncertainty: d
  properties: wet mass 0.84 kg, heating value, gross 39 MJ, dry mass 0.84 kg, carbon content, fossil 0.602381
  note on carbon content, fossil: An average C content of 0.506 kg C/ m3 has been assumed (this average has been calculated using data in Tab 3.5, ecoinvent v2.2 report 6_V
- municipal solid waste: 0 kg; name BP_municipal_solid_waste; pedigree (1,1,1,1,1)
  Data from survey from literature (EFMA 2000)
  Uncertainty: d
  production volume 0 kg
    Calculated from the production volume of ammonia, liquid in proportion to the respective output amounts.
  properties: dry mass 0.771 kg, water content 0.297017, wet mass 1 kg, carbon content, non-fossil 0.261655, carbon content, fossil 0.171549
  note on carbon content, non-fossil: MSW composition in tab 4.1, ecoinvent v2.2 report 13_I. C content referred to 1 kg DM
- heavy fuel oil: 0 kg; pedigree (1,1,1,1,1)
  Data from survey from literature (EFMA 2000)
  Uncertainty: d
  properties: wet mass 1 kg, dry mass 1 kg, carbon content, fossil 0.849
- solvent, organic: 2.99999e-5 kg; lognormal variance with pedigree 0.0541, pedigree (3,2,5,5,1)
  Data from survey from literature (EFMA 2000)
  Uncertainty: d
  properties: dry mass 1 kg, wet mass 1 kg, carbon content, fossil 0.63072
  note on carbon content, fossil: Mixture of 15 of the most often used solvents (list in ecoinvent v2.2 report 11-III, pg 293). C content was calculated as an unweighted average of C content of the different solvents
- electricity, medium voltage: 0 kWh; pedigree (1,1,1,1,1)
  Data from survey from literature (Davis 1999)
  Uncertainty: d
- natural gas, high pressure: 0.0118992, 0.0198087, 0.161735, 0.0273021, 0.379253 m3 (5 entries); lognormal variance with pedigree 0.0541, pedigree (3,2,5,5,1)
  Data from survey from literature (EFMA 2000)
  Uncertainty: d
- municipal solid waste: -2.82146e-7, -7.10936e-8, -1.01597e-7, -0.000199545 kg (4 entries); lognormal variance with pedigree 0.0541, pedigree (3,2,5,5,1)
  Data from survey from literature (EFMA 2000)
  Uncertainty: d
  production volume 2.11303e7 kg
- heavy fuel oil: 0.00965382, 0.00251495, 0.00744518, 0.00146449, 0.00187872, 0.174042 kg (6 entries); lognormal variance with pedigree 0.0541, pedigree (3,2,5,5,1)
  Data from survey from literature (EFMA 2000)
  Uncertainty: d
- electricity, medium voltage: 0.000908495, 0.000165308, 0.00280337, 0.0406459, 0.0058172, 0.0190595 kWh (6 entries); lognormal variance with pedigree 0.0527, pedigree (2,2,5,5,1)
  Data from survey from literature (Davis 1999)
  Uncertainty: d

## Inputs from nature
- Water, unspecified natural origin [natural resource, in water]: 0.000899997 m3; name water_UNO_input; source Byers, W. 2003; lognormal variance with pedigree 0.0546, pedigree (3,3,5,5,1)
  Data from survey from literature (EFMA 2000)
  Calculated based on literature, (Vionnet, S., Quantis Water Database - Technical Report, 2012).
  Uncertainty: d
- Water, cooling, unspecified natural origin [natural resource, in water]: 0.14 m3; name water_cooling_UNO_input; source Byers, W. 2003; lognormal variance with pedigree 0.0526, pedigree (2,1,5,5,1)
  Calculated based on literature, (Vionnet, S., Quantis Water Database - Technical Report, 2012). The process includes the ammonia production.
  property wet mass 1000 kg; name WM
  property water in wet mass 999.89 kg; name WWM
  property carbon content, non-fossil 0; name C_content_non_fossil
  property carbon content, fossil 0.0104329; name C_content_fossil
  property water content 9081.65; name water_content
  property dry mass 0.1101 kg; name DM

## Emissions to nature
- Dioxins, measured as 2,3,7,8-tetrachlorodibenzo-p-dioxin [air, urban air close to ground]: 4.34999e-15 kg; lognormal variance with pedigree 0.1806, pedigree (2,5,5,5,4)
  Estimation, based on industrial heating modules of energy carriers used
  Uncertainty: e
- PAH, polycyclic aromatic hydrocarbons [air, urban air close to ground]: 2.38999e-7 kg; lognormal variance with pedigree 0.1806, pedigree (2,5,5,5,4)
  Estimation, based on industrial heating modules of energy carriers used
  Uncertainty: e
- Dinitrogen monoxide [air, urban air close to ground]: 1.53e-5 kg; lognormal variance with pedigree 0.1806, pedigree (2,5,5,5,4)
  Estimation, based on industrial heating modules of energy carriers used
  Uncertainty: e
- Nitrogen oxides [air, urban air close to ground]: 0.000999997 kg; lognormal variance with pedigree 0.0941, pedigree (3,2,5,5,1)
  Data from survey from literature (EFMA 2000)
  Uncertainty: d
- Copper [air, urban air close to ground]: 3.96999e-7 kg; lognormal variance with pedigree 0.7406, pedigree (2,5,5,5,4)
  Estimation, based on industrial heating modules of energy carriers used
  Uncertainty: e
- Nitrogen [water, surface water]: 9.99997e-5 kg; lognormal variance with pedigree 0.0941, pedigree (3,2,5,5,1)
  Data from survey from literature (EFMA 2000)
  Uncertainty: d
- Cobalt [air, urban air close to ground]: 2.66999e-7 kg; lognormal variance with pedigree 0.7406, pedigree (2,5,5,5,4)
  Estimation, based on industrial heating modules of energy carriers used
  Uncertainty: e
- Nickel [air, urban air close to ground]: 5.26998e-6 kg; lognormal variance with pedigree 0.7406, pedigree (2,5,5,5,4)
  Estimation, based on industrial heating modules of energy carriers used
  Uncertainty: e
- Chromium VI [air, urban air close to ground]: 1.3e-9 kg; lognormal variance with pedigree 0.7406, pedigree (2,5,5,5,4)
  Estimation, based on industrial heating modules of energy carriers used
  Uncertainty: e
- Zinc [air, urban air close to ground]: 3.23999e-7 kg; lognormal variance with pedigree 0.7406, pedigree (2,5,5,5,4)
  Estimation, based on industrial heating modules of energy carriers used
  Uncertainty: e
- Molybdenum [air, urban air close to ground]: 1.3e-7 kg; lognormal variance with pedigree 0.7406, pedigree (2,5,5,5,4)
  Estimation, based on industrial heating modules of energy carriers used
  Uncertainty: e
- Chromium [air, urban air close to ground]: 1.28e-7 kg; lognormal variance with pedigree 0.7406, pedigree (2,5,5,5,4)
  Estimation, based on industrial heating modules of energy carriers used
  Uncertainty: e
- Water [water, unspecified]: 0.0864652 m3; = water_cooling_UNO_input*(1-fraction_CW_to_air)+water_UNO_input*(1-fraction_PW_to_air); lognormal variance with pedigree 0.0827, pedigree (2,2,5,5,1)
  Calculated as a fraction of the input of water. For more details, refer to the mathematical relation and the parameters.
  property fraction, origin: unspecified 1; name fraction_origin_unspecified_Ww
  property fraction, origin: salt water 0; name fraction_origin_salt_water_Ww
  property fraction, origin: fresh water 0; name fraction_origin_fresh_water_Ww
- Methanol [air, urban air close to ground]: 4.12999e-6 kg; lognormal variance with pedigree 0.1806, pedigree (2,5,5,5,4)
  Estimation, based on industrial heating modules of energy carriers used
  Uncertainty: e
- Carbon monoxide, fossil [air, urban air close to ground]: 8.39997e-5 kg; lognormal variance with pedigree 0.6941, pedigree (3,2,5,5,1)
  Data from survey from literature (Frischknecht 1999)
  Uncertainty: d
- Water [air, unspecified]: 0.0544343 m3; = (water_cooling_UNO_input*fraction_CW_to_air)+(water_UNO_input*fraction_PW_to_air); lognormal variance with pedigree 0.0827, pedigree (2,2,5,5,1)
  (same comment as for Water)
  property fraction, origin: unspecified 1; name fraction_origin_unspecified
  property fraction, origin: salt water 0; name fraction_origin_salt_water
  property fraction, origin: fresh water 0; name fraction_origin_fresh_water
- Methane, fossil [air, urban air close to ground]: 1.2e-5 kg; lognormal variance with pedigree 0.0941, pedigree (3,2,5,5,1)
  Data from survey from literature (Frischknecht 1999)
  Uncertainty: d
- Carbon dioxide, fossil [air, urban air close to ground]: 1.46 kg; lognormal variance with pedigree 0.0541, pedigree (3,2,5,5,1)
  Data from survey from literature (Frischknecht 1999)
  Uncertainty: d
- Vanadium [air, urban air close to ground]: 2.10999e-5 kg; lognormal variance with pedigree 0.7406, pedigree (2,5,5,5,4)
  Estimation, based on industrial heating modules of energy carriers used
  Uncertainty: e
- Mercury [air, urban air close to ground]: 1.91999e-9 kg; lognormal variance with pedigree 0.7406, pedigree (2,5,5,5,4)
  Estimation, based on industrial heating modules of energy carriers used
  Uncertainty: e
- Calcium [air, urban air close to ground]: 6.47998e-7 kg; lognormal variance with pedigree 0.4406, pedigree (2,5,5,5,4)
  Estimation, based on industrial heating modules of energy carriers used
  Uncertainty: e
- Toluene [air, urban air close to ground]: 4.91998e-6 kg; lognormal variance with pedigree 0.1806, pedigree (2,5,5,5,4)
  Estimation, based on industrial heating modules of energy carriers used
  Uncertainty: e
- Lead [air, urban air close to ground]: 4.61999e-7 kg; lognormal variance with pedigree 0.7406, pedigree (2,5,5,5,4)
  Estimation, based on industrial heating modules of energy carriers used
  Uncertainty: e
- Cadmium [air, urban air close to ground]: 2.66999e-7 kg; lognormal variance with pedigree 0.7406, pedigree (2,5,5,5,4)
  Estimation, based on industrial heating modules of energy carriers used
  Uncertainty: e
- Sulfur dioxide [air, urban air close to ground]: 9.99997e-6 kg; lognormal variance with pedigree 0.0541, pedigree (3,2,5,5,1)
  Data from survey from literature (EFMA 2000)
  Uncertainty: d
- Iron [air, urban air close to ground]: 1.46e-6 kg; lognormal variance with pedigree 0.7406, pedigree (2,5,5,5,4)
  Estimation, based on industrial heating modules of energy carriers used
  Uncertainty: e
- Butane [air, urban air close to ground]: 1.63999e-5 kg; lognormal variance with pedigree 0.4406, pedigree (2,5,5,5,4)
  Estimation, based on industrial heating modules of energy carriers used
  Uncertainty: e
- Sodium [air, urban air close to ground]: 6.07998e-6 kg; lognormal variance with pedigree 0.1306, pedigree (2,5,5,5,4)
  Estimation, based on industrial heating modules of energy carriers used
  Uncertainty: e
- Hydrogen fluoride [air, urban air close to ground]: 1.17e-6 kg; lognormal variance with pedigree 0.1806, pedigree (2,5,5,5,4)
  Estimation, based on industrial heating modules of energy carriers used
  Uncertainty: e
- Benzo(a)pyrene [air, urban air close to ground]: 4.60999e-10 kg; lognormal variance with pedigree 0.1806, pedigree (2,5,5,5,4)
  Estimation, based on industrial heating modules of energy carriers used
  Uncertainty: e
- Selenium [air, urban air close to ground]: 9.71997e-8 kg; lognormal variance with pedigree 0.7406, pedigree (2,5,5,5,4)
  Estimation, based on industrial heating modules of energy carriers used
  Uncertainty: e
- Hydrogen chloride [air, urban air close to ground]: 1.17e-5 kg; lognormal variance with pedigree 0.1806, pedigree (2,5,5,5,4)
  Estimation, based on industrial heating modules of energy carriers used
  Uncertainty: e
- Benzene [air, urban air close to ground]: 9.35997e-6 kg; lognormal variance with pedigree 0.1806, pedigree (2,5,5,5,4)
  Estimation, based on industrial heating modules of energy carriers used
  Uncertainty: e
- Propionic acid [air, urban air close to ground]: 4.67999e-7 kg; lognormal variance with pedigree 0.1806, pedigree (2,5,5,5,4)
  Estimation, based on industrial heating modules of energy carriers used
  Uncertainty: e
- Hydrocarbons, aromatic [air, urban air close to ground]: 1.21e-6 kg; lognormal variance with pedigree 0.1806, pedigree (2,5,5,5,4)
  Estimation, based on industrial heating modules of energy carriers used
  Uncertainty: e
- Arsenic [air, urban air close to ground]: 1.05e-7 kg; lognormal variance with pedigree 0.1806, pedigree (2,5,5,5,4)
  Estimation, based on industrial heating modules of energy carriers used
  Uncertainty: e
- Propane [air, urban air close to ground]: 4.91998e-6 kg; lognormal variance with pedigree 0.1806, pedigree (2,5,5,5,4)
  Estimation, based on industrial heating modules of energy carriers used
  Uncertainty: e
- Hydrocarbons, aliphatic, unsaturated [air, urban air close to ground]: 2.42999e-7 kg; lognormal variance with pedigree 0.1806, pedigree (2,5,5,5,4)
  Estimation, based on industrial heating modules of energy carriers used
  Uncertainty: e
- Ammonia [air, urban air close to ground]: 8.09997e-8 kg; lognormal variance with pedigree 0.1806, pedigree (2,5,5,5,4)
  Estimation, based on industrial heating modules of energy carriers used
  Uncertainty: e
- Pentane [air, urban air close to ground]: 2.80999e-5 kg; lognormal variance with pedigree 0.1806, pedigree (2,5,5,5,4)
  Estimation, based on industrial heating modules of energy carriers used
  Uncertainty: e
- Hydrocarbons, aliphatic, alkanes, unspecified [air, urban air close to ground]: 4.85998e-6 kg; lognormal variance with pedigree 0.1806, pedigree (2,5,5,5,4)
  Estimation, based on industrial heating modules of energy carriers used
  Uncertainty: e
- Acetone [air, urban air close to ground]: 1.21e-6 kg; lognormal variance with pedigree 0.1806, pedigree (2,5,5,5,4)
  Estimation, based on industrial heating modules of energy carriers used
  Uncertainty: e
- Particulates, > 2.5 um, and < 10um [air, urban air close to ground]: 4.04999e-5 kg; lognormal variance with pedigree 0.2506, pedigree (2,5,5,5,4)
  Estimation, based on industrial heating modules of energy carriers used
  Uncertainty: e
- Formaldehyde [air, urban air close to ground]: 5.98998e-6 kg; lognormal variance with pedigree 0.1806, pedigree (2,5,5,5,4)
  Estimation, based on industrial heating modules of energy carriers used
  Uncertainty: e
- Acetic acid [air, urban air close to ground]: 8.36997e-6 kg; lognormal variance with pedigree 0.1806, pedigree (2,5,5,5,4)
  Estimation, based on industrial heating modules of energy carriers used
  Uncertainty: e
- Particulates, > 10 um [air, urban air close to ground]: 8.09997e-5 kg; lognormal variance with pedigree 0.1806, pedigree (2,5,5,5,4)
  Estimation, based on industrial heating modules of energy carriers used
  Uncertainty: e
- Ethanol [air, urban air close to ground]: 2.42999e-6 kg; lognormal variance with pedigree 0.1806, pedigree (2,5,5,5,4)
  Estimation, based on industrial heating modules of energy carriers used
  Uncertainty: e
- Acetaldehyde [air, urban air close to ground]: 1.24e-6 kg; lognormal variance with pedigree 0.1806, pedigree (2,5,5,5,4)
  Estimation, based on industrial heating modules of energy carriers used
  Uncertainty: e
- Particulates, < 2.5 um [air, urban air close to ground]: 0.000287999 kg; lognormal variance with pedigree 0.4406, pedigree (2,5,5,5,4)
  Estimation, based on industrial heating modules of energy carriers used
  Uncertainty: e

## Sampling procedure
Literature data.

## Extrapolations
This dataset has been copied from an original dataset covering the geography RER. The uncertainty has been adjusted accordingly.

## Review by Gregor Wernet 2017-08-04
This dataset was additionally reviewed in a separate review process by Eric Johnson of Atlantic Consulting as well as Emilia Moreno Ruiz and Gregor Wernet of ecoinvent.
