# blower and heat exchange unit production, decentralized, 180-250 m3/h

Dataset: EcoSpold 2, unit process
Geography: RER
Time period: 2003-01-01 to 2019-12-31
Technology level: current
Classification: ISIC rev.4 ecoinvent: 2819:Manufacture of other general-purpose machinery
Classification: EcoSpold01Categories: ventilation/production of components
Tags: ConvertedDataset
Scenario: Business-as-Usual
System model: Allocation at the point of substitution
Generated by: Alex Primas
Published in: Hässig, W. 2007
Database: ecoinvent
isCopyrightProtected: true
accessRestrictedTo: 1

## General comment
Production of a typical component used for a decentral ventilation system in a multi family house. The house considered in the investigation includes 6 flats with 130 m2 floor area each and a ventilation rate of 120 m3/h.
[This dataset was already contained in the ecoinvent database version 2. It was not individually updated during the transfer to ecoinvent version 3. Life Cycle Impact Assessment results may still have changed, as they are affected by changes in the supply chain, i.e. in other datasets. This dataset was generated following the ecoinvent quality guidelines for version 2. It may have been subject to central changes described in the ecoinvent version 3 change report (http://www.ecoinvent.org/database/ecoinvent-version-3/reports-of-changes/), and the results of the central updates were reviewed extensively. The changes added e.g. consistent water flows and other information throughout the database. The documentation of this dataset can be found in the ecoinvent reports of version 2, which are still available via the ecoinvent website. The change report linked above covers all central changes that were made during the conversion process.]

## Included activities end
Materials used for the production. Estimation of electricity use for the different production steps. Energy use for heating of the production building. Transport of raw materials to the plant. Estimation for the Infrastructure of the Production site included.

## Geography
Data for average production in western Europe used.

## Technology
Ventilation unit for decentral ventilation systems with 120 m3/h average air flow. Average of four different ventilation units with 180-250 m3/h maximal air flow considered. Housing mainly made of galvanised steel. Total weight of component 43.1 kg

## Time period
Materials investigated in 2003

## Reference product
- blower and heat exchange unit, decentralized, 180-250 m3/h: 1 unit; CPC 43911: Producer gas or water gas generators; acetylene gas generators and similar water process gas generators; disti[…]; By-product classification allocatable product
  EcoSpold01Location=RER
  production volume 1.32237 unit
    This is a placeholder value that does not reflect real-world production volumes. This dataset does not currently require a real-world production volume to work in the database framework, and no actual data were collected yet. This has no negative effect on the results of the ecoinvent database. The placeholder value of this activity was scaled according to the nominal GDP of 2005 (source: United Nations, http://data.un.org/Glossary.aspx?q=GDP+%28current+US%24%29, accessed 20130726) to reflect an appropriate share of the global production volume, which is also a placeholder value.
  property price 80.2908 EUR2005
    Calculated based on inputs: The price of the product has been calculated as a sum of the values of the material and energy inputs for this product. This value is therefore a rough estimation. It may underestimate the real price since there are additional expenses when producing any product. These expences can include for example labour costs, treatment of waste materials and profit for the producer. Please consider carefully whether this level of data quality is acceptable for your application.
  property carbon content, fossil 0.225044
    C content was calculated as an addition of C content in the product components
  property carbon content, non-fossil 6.48865e-7
    C content was calculated as an addition of C content in the product components
  property carbon content 0.225045
    carbon content on a dry matter basis (reserved; not for manual entry)
  property true value 80.2908
    allocation property applied in "true value" allocation // value calculated from revenue
  properties: wet mass 43.1 kg, water in wet mass 0 kg, dry mass 43.1 kg, water content 0, carbon allocation 9.69943 kg

## By-products
- heat, for reuse in municipal waste incineration only: 0 MJ; CPC 17300: Steam and hot water; By-product classification allocatable product; pedigree (1,1,1,1,1)
  Net useful heat generated from this waste and used in internal MSWI plant energy redistribution.
  Uncertainty: uncertainty is calculated from uncertainties in waste composition and uncertainties in energy efficiency and the uncertainty in internal energy demand
  production volume 2.15776 MJ
  property true value relation 0.1842; name E_th_prod_MSWI_true_value_relation
    property to calculate "true value" from
  property exergy 0.1842 MJ; name E_th_prod_MSWI_exergy
    This exergy property is based on the exergy content of the product.
  property price 0.0106 EUR2005; name E_th_prod_MSWI_price_EUR2005
    Average European district heat price from Ecoheatcool and Euroheat 2005-2006, Ecoheat Work package 1: The European heat market. Final report. 10.6 EUR/GJ i s the price of district heat. http://www.solarthermalworld.org/files/Ecoheatcool%20WP1%20Web.pdf?download
  property true value 0.01379
    allocation property applied in "true value" allocation // value calculated from true value relation
- electricity, for reuse in municipal waste incineration only: 0 kWh; CPC 17100: Electrical energy; By-product classification allocatable product; pedigree (1,1,1,1,1)
  Net electricity generated from this waste and used in internal MSWI plant energy redistribution.
  Uncertainty: uncertainty is calculated from uncertainties in waste composition and uncertainties in energy efficiency and the uncertainty in internal energy demand
  production volume 0.309646 kWh
  property true value relation 3.6; name E_el_prod_MSWI_true_value_relation
    property to calculate "true value" from
  property exergy 3.6 MJ; name E_el_prod_MSWI_exergy
    This exergy property is based on the exergy content of the product.
  property price 0.1 EUR2005; name E_el_prod_MSWI_price_EUR2005
    Estimated to be the same price as in case of electricity, medium voltage.
  property true value 0.0386843
    (same comment as for heat, for reuse in municipal waste incineration only)
- zinc concentrate: 0 kg; CPC 14290: Other non-ferrous metal ores and concentrates (other than uranium or thorium ores and concentrates); By-product classification allocatable product
  Calculated value from the knowledge of the properties of both products.
  production volume 5.26865e-5 kg
  property price 0.38 EUR2005; name ByP_price_EUR2005
    Temporary price data. Calculated as 90% of purchasers price based on: Zinc content in concentrate 53%. Concentrate price per kg Zn 86.5% of refined Zn price (13.5% treatment charges according to CHR Metals Limited 2005: Dynamic cost curves. http://www.minecost.com/dynamic.pdf). 2004 zinc price from USGS (2007) Mineral commodity summaries 2007. <http://minerals.usgs.gov/minerals/pubs/mcs/2007/mcs2007.pdf> [Accessed 25 May 2010]
  property zinc content 0.53; name zinc_C_zinc_concentrate
    Zinc content on a dry matter basis. Value taken from teh "zinc mine operation" /GLO dataset.
  property dry mass 1 kg; name DM_zinc_concentrate
  property carbon content 0
    carbon content on a dry matter basis (reserved; not for manual entry)
  property true value 1.61519e-5
    allocation property applied in "true value" allocation // value calculated from revenue
  properties: wet mass 1 kg, water content 0, carbon content, non-fossil 0, carbon content, fossil 0, water in wet mass 0 kg, carbon allocation 0 kg

## Inputs from technosphere
- sheet rolling, aluminium: 7.68498 kg; lognormal variance with pedigree 0.054, pedigree (3,4,5,1,1)
  Questionnaire, estimations
  EcoSpold01Location=RER
  Uncertainty: Questionnaire, estimations
- steel, unalloyed: 16.3893 kg; lognormal variance with pedigree 0.0526, pedigree (2,4,5,1,1)
  Questionnaire
  EcoSpold01Location=RER
  Uncertainty: Questionnaire
  properties: carbon content, fossil 0.0025, dry mass 1 kg, wet mass 1 kg
  note on carbon content, fossil: Unalloyed steels or carbon steels are those in which the level of an individual element in no case reaches or exceeds the limiting concentration given in Tab. 3.1 ecoinvent v2.2 report 10_partII. Assumed to have a C content of 0.25%
- powder coat, steel: 1.77884 m2; lognormal variance with pedigree 0.054, pedigree (3,4,5,1,1)
  EcoSpold01Location=RER
  Questionnaire, estimations
  Uncertainty: Questionnaire, estimations
- heat, district or industrial, natural gas: 86.0138 MJ; lognormal variance with pedigree 0.076, pedigree (4,5,5,1,1)
  EcoSpold01Location=RER
  Data estimated from related companies
  Uncertainty: Data estimated from related companies
- injection moulding: 7.43514 kg; lognormal variance with pedigree 0.0526, pedigree (2,4,5,1,1)
  Questionnaire
  EcoSpold01Location=RER
  Uncertainty: Questionnaire
- waste expanded polystyrene: -0.25983 kg; lognormal variance with pedigree 0.07, pedigree (4,4,5,1,1)
  EcoSpold01Location=CH
  Estimations on precentage material disposed
  Uncertainty: Estimations on precentage material disposed
  production volume 0.26 kg
    Calculated from the production volume of blower and heat exchange unit, decentralized, 180-250 m3/h in proportion to the respective output amounts.
  properties: carbon content, fossil 0.864875, water content 0.0526316, wet mass 1 kg, dry mass 0.95 kg
  note on carbon content, fossil: Average of different polystyrene extruded. Shares are 50% (w/w) extruded using CO2/acetone as blowing agent, 25% (w/w) using HFC-134a as a blowing agent and 25% (w/w) using HFC-152a as a blowing agent (ecoinvent v2.2 report 16, part XIV, Tab 4.21). Similar result is reported in Tab A.5, ecoinvent report 13_I.
- stone wool, packed: 2.41842 kg; lognormal variance with pedigree 0.0526, pedigree (2,4,5,1,1)
  EcoSpold01Location=CH
  Questionnaire
  Uncertainty: Questionnaire
  properties: wet mass 1 kg, carbon content, fossil 0.015401, dry mass 1 kg
  note on carbon content, fossil: The chemical composition of the glass fibres used in the rock wool production is similar to the composition of naturally cooled volcano basalt and has a composition listed in Tab. 3.1 and 3.2 in ecoinvent v2.2 report 16, part XIV. Rock wool contains: a minimum of 96% mineral fibres,between 0.5 and 3.0 weight percent of phenolic resin depending on the specific product characteristics, and about 0.2 percent mineral oil (ecoinvent v2.2 report 16, part XIV). An average composition of 1.8% phenolic resin, 0.2% mineral oil, and 98% mineral fibres has been assumed and used to calculate C content of the rock wool
- sheet rolling, steel: 25.2835 kg; lognormal variance with pedigree 0.054, pedigree (3,4,5,1,1)
  EcoSpold01Location=RER
  Questionnaire, estimations
  Uncertainty: Questionnaire, estimations
- electronics, for control units: 0.22885 kg; lognormal variance with pedigree 0.072, pedigree (3,4,5,1,3)
  EcoSpold01Location=RER
  Questionnaire, approximation for technology
  Uncertainty: Questionnaire, approximation for technology
  properties: carbon content, fossil 0.337146, carbon content, non-fossil 0.00013442, dry mass 1 kg, wet mass 1 kg
  note on carbon content, fossil: The control unit has a composition of 46% steel (housing), 32% plastics, 14% printed wiring boards and 8% cables (various types).;
- synthetic rubber: 0.181881 kg; lognormal variance with pedigree 0.0526, pedigree (2,4,5,1,1)
  EcoSpold01Location=RER
  Questionnaire
  Uncertainty: Questionnaire
  properties: carbon content, fossil 0.871949, wet mass 1 kg, dry mass 1 kg
  note on carbon content, fossil: EPDM (Ethylene-propene-diene terpolymer) rubber is a terpolymer of ethylene, propene, and a diene with the residual unsaturated portion of the diene in the side chain (ecoinvent v2.2 report 7-part XX & Ullmann). Chemical formula (deduced from Evidences of Solvent-Induced Miscibility in Polychloroprene-co-Ethylene-Propene Diene Terpolymer Blends, Dubey et al., Journal of Applied Polymer Science, 2009, 111:1884–1891): C20H35
- electricity, medium voltage: 21.7858 kWh; lognormal variance with pedigree 0.108, pedigree (3,5,5,1,3)
  EcoSpold01Location=UCTE
  Data estimated from related processes
  Uncertainty: Data estimated from related processes
- inert waste, for final disposal: -0.219856 kg; lognormal variance with pedigree 0.07, pedigree (4,4,5,1,1)
  (same comment as for waste expanded polystyrene)
  production volume 0.22 kg
    (same comment as for waste expanded polystyrene)
  properties: dry mass 0.995 kg, wet mass 1 kg, water content 0.00502513
- polystyrene foam slab: 2.85813 kg; lognormal variance with pedigree 0.0526, pedigree (2,4,5,1,1)
  Questionnaire
  EcoSpold01Location=RER
  Uncertainty: Questionnaire
  properties: carbon content, fossil 0.859091, dry mass 1 kg, wet mass 1 kg
  note on carbon content, fossil: XPS consists in 91% of polystyrene, 7% of blowing agent and the re-maining 2% are flame retardants (bromine compounds) and other additives (ecoinvent v2.2 report 7, part XIV, pg69). The chemical formula of polystyrene is (C8H8)n. Here, the blowing agent is CO2.
- zinc coat, coils: 4.23723 m2; lognormal variance with pedigree 0.054, pedigree (3,4,5,1,1)
  EcoSpold01Location=RER
  Questionnaire, estimations
  Uncertainty: Questionnaire, estimations
- waste polystyrene: -0.659569 kg; lognormal variance with pedigree 0.07, pedigree (4,4,5,1,1)
  (same comment as for waste expanded polystyrene)
  production volume 0.66 kg
    (same comment as for waste expanded polystyrene)
  properties: carbon content, fossil 0.922579, water content 0.00200401, dry mass 0.998 kg, wet mass 1 kg
- waste rubber, unspecified: 0 kg; pedigree (1,1,1,1,1)
  Estimations on precentage material disposed
  EcoSpold01Location=CH
  Uncertainty: Estimations on precentage material disposed
  production volume 0 kg
    (same comment as for waste expanded polystyrene)
  properties: dry mass 1 kg, carbon content, fossil 0.853, wet mass 1 kg
- ventilation components factory: 1.72887e-7 unit; lognormal variance with pedigree 0.394, pedigree (4,5,5,1,3)
  Calculated with data of a similar company
  EcoSpold01Location=RER
  Uncertainty: Calculated with data of a similar company
- polystyrene, high impact: 7.25526 kg; lognormal variance with pedigree 0.0526, pedigree (2,4,5,1,1)
  Questionnaire
  EcoSpold01Location=RER
  Uncertainty: Questionnaire
  properties: carbon content, fossil 0.923077, wet mass 1 kg, dry mass 1 kg
  note on carbon content, fossil: Chemical formula of polystyrene is (C8H8)n (ecoinvent v2.2 report 11_II)
- aluminium, wrought alloy: 7.68498 kg; lognormal variance with pedigree 0.0526, pedigree (2,4,5,1,1)
  EcoSpold01Location=RER
  Questionnaire
  Uncertainty: Questionnaire
  properties: dry mass 1 kg, wet mass 1 kg
- steel, chromium steel 18/8, hot rolled: 0.897413 kg; lognormal variance with pedigree 0.0526, pedigree (2,4,5,1,1)
  Questionnaire
  EcoSpold01Location=RER
  Uncertainty: Questionnaire
  properties: dry mass 1 kg, wet mass 1 kg, carbon content, fossil 0.0008
  note on carbon content, fossil: Stainless steel model is the grade 304 steel (18/8 stainless, 18% chromium 8% nickel; max. 0.08% C)
- wire drawing, copper: 0.620594 kg; lognormal variance with pedigree 0.054, pedigree (3,4,5,1,1)
  EcoSpold01Location=RER
  Questionnaire, estimations
  Uncertainty: Questionnaire, estimations
- steel, low-alloyed: 8.8742 kg; lognormal variance with pedigree 0.0526, pedigree (2,4,5,1,1)
  Questionnaire
  EcoSpold01Location=RER
  Uncertainty: Questionnaire
  properties: carbon content, fossil 0.005, dry mass 1 kg, wet mass 1 kg
  note on carbon content, fossil: Low alloyed steel composition given in Tab. 3.2 ecoinvent v2.2 report 10_partII. Steel assumed to have a C content of 0.5%
- heat, district or industrial, other than natural gas: 86.0138 MJ; lognormal variance with pedigree 0.07, pedigree (1,1,5,1,1)
  EcoSpold01Location=RER
  4,5,1,1,1,5; Data estimated from related companies
- sheet rolling, chromium steel: 0.897413 kg; lognormal variance with pedigree 0.054, pedigree (3,4,5,1,1)
  Questionnaire, estimations
  EcoSpold01Location=RER
  Uncertainty: Questionnaire, estimations
- copper: 0.620594 kg; lognormal variance with pedigree 0.054, pedigree (3,4,5,1,1)
  Questionnaire, estimations
  EcoSpold01Location=RER
  Uncertainty: Questionnaire, estimations
  properties: wet mass 1 kg, dry mass 1 kg
- waste rubber, unspecified: -0.00830567, -0.000348671 kg (2 entries); lognormal variance with pedigree 0.07, pedigree (4,4,5,1,1)
  (same comment as for waste rubber, unspecified)
  production volume 0.00866 kg

## Sampling procedure
Questionnaire and technical information of four producer used. Average data of four common products used.

## Review by Rolf Frischknecht 2007-08-16
passed
none
