# weaned calves production on native pasture, Pantanal

Dataset: EcoSpold 2, unit process
Geography: BR
Time period: 2006-01-01 to 2019-12-31
Technology level: current
Classification: ISIC rev.4 ecoinvent: 0141:Raising of cattle and buffaloes
Scenario: Business-as-Usual
System model: Allocation at the point of substitution
Share of production covered: 3 %
Generated by: Fernando Dias
Published in: Folegatti-Matsuura M. 2018
Database: ecoinvent
isCopyrightProtected: true
accessRestrictedTo: 1

## General comment
This dataset represents the production of 1 kg of live weight of weaned calves for beef cattle, in Brazil, mostly on native pasture (2% of planted pasture), at farm, in Brazilian Pantanal biome, for fattening by other systems. Discarded cattle (bulls and culled cows) are considered by product. Culled cows are replaced by some of the weaned heifers, all other weaned heifers are sold for fattening by other systems, and are considered by product. Fences are the only infrastructure included. The production of young bulls for reproduction is not included, but their emissions in the farm and their live weight as product are considered. Direct field emissions are included, with important regionalizations added. Farm manure as an organic fertiliser is only accounted for in terms of direct field emissions.

## Included activities start
This activity starts at the replacing of culled cows by weaned heifers.

## Included activities end
This activity ends with the provision of weaned calves at farm gate, ready to be sent to slaughterhouses as live weight.

## Geography
'At more than 138 000 km2, the Brazilian Pantanal is known as the largest freshwater wetland in the world. The Pantanal is home to at least 650 species of birds, 260 species of fish, 80 mammal species, 50 species of reptiles (Wade et al., 1993), and more than 2000 identified floral species (Pott, 1998). Among its most renowned fauna are the jaguar, jaburu stork, blue hyacinth macaw, capybara, anaconda, giant anteater, coati and piranha. The Pantanal's principal economic activities include fishing, mining, tourism, and cattle ranching. Extensive cattle ranching has been the dominant economic activity and land use in the region for the past two centuries. About 95% of Pantanal lands are privately owned. About 80% (118 000 km2) of the lands are found on cattle ranches (Silva et al., 2000). The estimated present value of the existing herd of 3 million is about US$1 billion (Seidl et al., 1999).' Ecological Economics Volume 36, Issue 3, March 2001, Pages 413-425 Cattle ranching and deforestation in the Brazilian Pantanal
Andrew F Seidl Joao dos Santos Vila de Silva Andre Steffens Moraes.
https://doi.org/10.1016/S0921-8009(00)00238-X

## Technology
Mineral salt is served as supplement feed for all cattle in troughs on the field. Besides pasture and mineral salt, no suplement is served to cattle. The dataset does not include pharmaceuticals, although typical production systems use them. Use of hormones for cattle raising is forbidden in Brazil.

## Time period
Time period of the most of the data collected for this dataset.

## Parameters
- fraction, process water, to air: 0.15 dimensionless; name fraction_PW_to_air
- fraction, process water to water, to surface water: 0.85 dimensionless; name fraction_PWtoW_to_surface_water
- total nitrogen: 16.8049 kg/ha; name Ntot; = (N_ex + N_urea_fert + N_fert) / (T_t * 10^-4); lognormal variance with pedigree 0.0573, pedigree (4,3,4,3,4)
  Total nitrogen in mineral and organic fertilisers (kg N/ha)
- nitrogen fertilizer, as N: 0 kg; name N_fert
  Nitrogen fertilizer (not urea) for fertilization. Parameter was kept because it is used in a formula that is the same for many datasets.
- LUC_crop_specific: 1
  This parameter allows to switch between a 'crop specific' and a 'country specific' approach when calculating the LUC of a crop. By default, the chosen approach is 'crop specific', so the value of the parameter is 1. If you want to apply a 'country specific' approach, turn the parameter to 0.
- rooting depth: 0.2205 m; name root_depth; lognormal variance with pedigree 0.0573, pedigree (4,3,4,3,4)
  Plant rooting depth for pasture. Used in the SQCB-NO3 model for the calculation of leaching of NO3. From Cunha et al. (2010).
- precipitation, annual: 1201.3 mm/year; name precipitation; lognormal variance with pedigree 0.0573, pedigree (4,3,4,3,4)
  Average annual precipitation in the BR-CO geographic region, calculated as the average of the 3 states of BR-CO weighted by their production volumes. Used in the SQCB-NO3 model for the calculation of leaching of NO3.
- organic nitrogen into soil: 5520.7 kg N/ha; name Norg_soil; lognormal variance with pedigree 0.0573, pedigree (4,3,4,3,4)
  Mass of organic N contained in the upper 50 cm of soil per ha. Used in the SQCB-NO3 model for the calculation of leaching of NO3. From Folegatti et al. (2015).
- nitrogen uptake by plant: 176.62 kg N/ha; name Nuptake_plant; lognormal variance with pedigree 0.0573, pedigree (4,3,4,3,4)
  N taken by plant during its growth. Used in the SQCB-NO3 model for the calculation of leaching of NO3. From Bernardi (2012).
- urea, as N, as fertilizer: 0 kg; name N_urea_fert
  Urea as fertilizer for pasture planting and maintenance. Parameter was kept because it is used in a formula that is the same for many datasets.
- clay content into soil: 53.06 % (obsolete); name Clay_content; lognormal variance with pedigree 0.0573, pedigree (4,3,4,3,4)
  Fraction of clay content into soil. Used in the SQCB-NO3 model for the calculation of leaching of NO3. From Folegatti et al. (2015).
- nitrogen in manure on pasture: 1.6575 kg; name N_ex; lognormal variance with pedigree 0.0573, pedigree (4,3,4,3,4)
  Manure deposited on pasture, as N, per year and kg of product.
- emission factor N2O: 0.02; name EF_N2O; lognormal variance with pedigree 0.0573, pedigree (4,3,4,3,4)
  Emission factor of N2O from manure deposited in pasture. From IPCC (2006).

## Reference product
- iron scrap, unsorted: 1 kg; name BY_PRODUCT_3; = wire; CPC 39310: Slag, dross, scalings and other waste from the manufacture of iron or steel; By-product classification Recyclable; pedigree (1,1,1,1,1)
  Fencing the farm: steel wire.
  production volume 196840 kg; name BY_PRODUCT_3_VOLUME; = REF_PRODUCT_VOLUME * ( BY_PRODUCT_3 / REF_PRODUCT)
    Calculated from production volume of reference product using the relative outputs.
  property price 0.149 EUR2005; name BY_PRODUCT_3_price_EUR2005
    Temporary price data. Calculated as 90% of purchasers price based on: estimated at 85% of sorted scrap
  property carbon content 0
    carbon content on a dry matter basis (reserved; not for manual entry)
  property true value 0.000395461; name BY_PRODUCT_3_true_value
    allocation property applied in "true value" allocation // value calculated from revenue
  properties: water content 0, water in wet mass 0 kg, carbon content, fossil 0, dry mass 1 kg, wet mass 1 kg, carbon content, non-fossil 0, carbon allocation 0 kg
- weaned calves, live weight: 0 kg; name REF_PRODUCT; EcoSpold01Categories agricultural production/animal production; By-product classification allocatable product; CPC 02111: Cattle
  Weaned calves sold.
  production volume 7.41644e7 kg; name REF_PRODUCT_VOLUME; = BY_PRODUCT_2_VOLUME / BY_PRODUCT_2
    Calculated from cattle for slaughtering production volume.
  property dry mass 0.6 kg; name REF_PRODUCT_DM; = REF_PRODUCT_WM - REF_PRODUCT_WWM
  property price 1.57 EUR2005; name REF_PRODUCT_price_EUR2005
    Current price for weaners is R 35/kg. Suggested price [7]: 2.1 €/kg
    Suggest to use the same price for heifers.Source: http://www.mpo.co.za/wp-content/uploads/2018/04/Agri-Trends-23-April-2018-GrainsOilseedsLlivestock-Fibre-.pdf
  property water content 0.666667; name REF_PRODUCT_water_content; = REF_PRODUCT_WWM / REF_PRODUCT_DM
  property energy content 14.937 MJ; name REF_PRODUCT_energy_content
    as gross calorific value (when relevant)
  property carbon content, non-fossil 0.4928; name REF_PRODUCT_C_content_non_fossil
    biogene carbon content on a dry matter basis
  property carbon content, fossil 0; name REF_PRODUCT_C_content_fossil
    fossil carbon content on a dry matter basis
  property wet mass 1 kg; name REF_PRODUCT_WM
  property water in wet mass 0.4 kg; name REF_PRODUCT_WWM
  property carbon content 0.4928
    carbon content on a dry matter basis (reserved; not for manual entry)
  property true value 1.57; name REF_PRODUCT_true_value
    allocation property applied in "true value" allocation // value calculated from revenue
  properties: carbon allocation 0.29568 kg

## By-products
- weaned heifers, live weight: 0 kg; name BY_PRODUCT; By-product classification allocatable product; CPC 02111: Cattle; EcoSpold01Categories agricultural production/animal production
  Weaned heifers sold.
  production volume 3.57294e7 kg; name BY_PRODUCT_VOLUME; = BY_PRODUCT_2_VOLUME / BY_PRODUCT_2 * BY_PRODUCT
    Calculated from cattle for slaughtering production volume.
  property water in wet mass 0.4 kg; name BY_PRODUCT_WWM
  property energy content 14.937 MJ; name BY_PRODUCT_energy_content
    as gross calorific value (when relevant)
  property carbon content, non-fossil 0.4928; name BY_PRODUCT_C_content_non_fossil
    biogene carbon content on a dry matter basis
  property wet mass 1 kg; name BY_PRODUCT_WM
  property price 1.18 EUR2005; name BY_PRODUCT_price_EUR2005
    Calculated price specifically and exclusively for Brazil. The price is calculated using yearly values from 2006 till 2015 in Brazil. Data from embrapa are used.
  property water content 0.666667; name BY_PRODUCT_water_content; = BY_PRODUCT_WWM / BY_PRODUCT_DM
  property dry mass 0.6 kg; name BY_PRODUCT_DM; = BY_PRODUCT_WM - BY_PRODUCT_WWM
  property carbon content, fossil 0; name BY_PRODUCT_C_content_fossil
    fossil carbon content on a dry matter basis
  property carbon content 0.4928
    carbon content on a dry matter basis (reserved; not for manual entry)
  property true value 0.568477; name BY_PRODUCT_true_value
    allocation property applied in "true value" allocation // value calculated from revenue
  properties: carbon allocation 0.29568 kg
- cattle for slaughtering, live weight: 0 kg; name BY_PRODUCT_2; By-product classification allocatable product; CPC 02111: Cattle
  Culled cows and bulls.
  production volume 8.52816e7 kg; name BY_PRODUCT_2_VOLUME; = 8358976000 * 0.5668% * (1 - 10%) / 0.5
    (BR beef production in 2015) * (% of system in BR in 2015) * (1 - % beef production from milk cattle in BR) / (carcass as live weight, BR average).
  property carbon content, fossil 0; name BY_PRODUCT_2_C_content_fossil
  property carbon content, non-fossil 0.4928; name BY_PRODUCT_2_C_content_non_fossil
    Calculated from live weight empty body composition in fat and protein (
    Johnson, I.R. et al. (2012). J. Anim. Sci. 90(13):4741-475 ; Williams, C.B. (2005). J. Anim. Sci. 83(6):1262-1266) and from C content of nutrients (protein, fat) according to A.D. Kay and T. Vrede ('Evolutionary and Biochemical Aspects', in Global Ecology, 2010, Elsevier B.V., S.E. Jørgensen Ed.).
  property water content 0.666667; name BY_PRODUCT_2_water_content; = BY_PRODUCT_2_WWM / BY_PRODUCT_2_DM
  property price 1.25 EUR2005; name BY_PRODUCT_2_price_EUR2005
    (same comment as for weaned heifers, live weight)
  property dry mass 0.6 kg; name BY_PRODUCT_2_DM; = BY_PRODUCT_2_WM - BY_PRODUCT_2_WWM
  property wet mass 1 kg; name BY_PRODUCT_2_WM
  property water in wet mass 0.4 kg; name BY_PRODUCT_2_WWM
  property energy content 14.9367 MJ; name BY_PRODUCT_2_energy_content
    Energy content calculated from animal fat and protein composition and energy content for animal fat and protein of 39.3 and 23.6 MJ/kg, respectively.
    Johnson, I.R. et al. (2012). J. Anim. Sci. 90(13):4741-475.
    Williams, C.B. (2005). J. Anim. Sci. 83(6):1262-1266.
  property carbon content 0.4928
    carbon content on a dry matter basis (reserved; not for manual entry)
  property true value 1.43738; name BY_PRODUCT_2_true_value
    allocation property applied in "true value" allocation // value calculated from revenue
  properties: carbon allocation 0.29568 kg
- heat, for reuse in municipal waste incineration only: 0 MJ; CPC 17300: Steam and hot water; By-product classification allocatable product; pedigree (1,1,1,1,1)
  Net electricity generated from this waste and used in internal MSWI plant energy redistribution.
  Uncertainty: uncertainty is calculated from uncertainties in waste composition and uncertainties in energy efficiency and the uncertainty in internal energy demand
  production volume 48569 MJ
  property price 0.0106 EUR2005; name E_th_prod_MSWI_price_EUR2005
    Average European district heat price from Ecoheatcool and Euroheat 2005-2006, Ecoheat Work package 1: The European heat market. Final report. 10.6 EUR/GJ i s the price of district heat. http://www.solarthermalworld.org/files/Ecoheatcool%20WP1%20Web.pdf?download
  property exergy 0.1842 MJ; name E_th_prod_MSWI_exergy
    This exergy property is based on the exergy content of the product.
  property true value relation 0.1842; name E_th_prod_MSWI_true_value_relation
    property to calculate "true value" from
  property true value 4.32098e-6
    allocation property applied in "true value" allocation // value calculated from true value relation
- electricity, for reuse in municipal waste incineration only: 0 kWh; CPC 17100: Electrical energy; By-product classification allocatable product; pedigree (1,1,1,1,1)
  (same comment as for heat, for reuse in municipal waste incineration only)
  production volume 6713.25 kWh
  property exergy 3.6 MJ; name E_el_prod_MSWI_exergy
    This exergy property is based on the exergy content of the product.
  property true value relation 3.6; name E_el_prod_MSWI_true_value_relation
    property to calculate "true value" from
  property price 0.1 EUR2005; name E_el_prod_MSWI_price_EUR2005
    Estimated to be the same price as in case of electricity, medium voltage.
  property true value 1.16726e-5
    (same comment as for heat, for reuse in municipal waste incineration only)

## Inputs from technosphere
- waste wood pole, chrome preserved: -7.81217e-6 kg; name BY_PRODUCT_1; = (poles*1237.5)*-1; lognormal variance with pedigree 0.0439, pedigree (3,3,5,3,2)
  Fencing the farm: waste wood poles from fences (after periodic replacement).
  production volume 13906.3 kg; name BY_PRODUCT_1_VOLUME; = REF_PRODUCT_VOLUME * (BY_PRODUCT_1 / REF_PRODUCT)
    Calculated from production volume of reference product using the relative outputs.
  property price 0 EUR2005; name BY_PRODUCT_1_price_EUR2005
  properties: dry mass 0.8 kg, wet mass 1 kg, carbon content, non-fossil 0.483676, water content 0.25
- fertilising, by broadcaster: 4.13003e-6 ha; lognormal variance with pedigree 0.0439, pedigree (3,3,5,3,2)
  Activity link to BR dataset, as there is no market modeled for this activity in BR region.
- tillage, harrowing, by offset disk harrow: 4.13003e-6 ha; lognormal variance with pedigree 0.0513, pedigree (3,5,5,3,2)
  Activity link to BR dataset, as there is no market modeled for this activity in BR region.
- steel, unalloyed: 0.000110579 kg; = wire; lognormal variance with pedigree 0.0439, pedigree (3,3,5,3,2)
  Fencing the farm: steel wire.
  properties: dry mass 1 kg, wet mass 1 kg, carbon content, fossil 0.0025
- roundwood, eucalyptus ssp. from sustainable forest management, under bark: 6.31287e-9 m3; name poles; lognormal variance with pedigree 0.0439, pedigree (3,3,5,3,2)
  Fencing the farm: roundwood from eucalyptus for poles.
  property water in wet mass 412.5 kg; name WOOD_WWM
  properties: dry mass 825 kg, water content 0.5, carbon content, non-fossil 0.494, wet mass 1237.5 kg
- wire drawing, steel: 0.000110579 kg; name wire; lognormal variance with pedigree 0.0439, pedigree (3,3,5,3,2)
  Fencing the farm: steel wire.
- limestone and gypsum application, by spreader: 4.13003e-6 ha; lognormal variance with pedigree 0.0439, pedigree (3,3,5,3,2)
  Activity link to BR dataset, as there is no market modeled for this activity in BR region.
- potassium fertiliser, as K2O: 0.000247803 kg; lognormal variance with pedigree 0.0439, pedigree (3,3,5,3,2)
  Potassium fertilizer for pasture replanting and maintenance.
  properties: dry mass 1 kg, wet mass 1 kg
- sowing: 4.13003e-6 ha; lognormal variance with pedigree 0.0439, pedigree (3,3,5,3,2)
  Activity link to BR dataset, as there is no market modeled for this activity in BR region.
- lime: 0.00619496 kg; lognormal variance with pedigree 0.0439, pedigree (3,3,5,3,2)
  Lime applied for pasture replanting or maintenance.
  properties: wet mass 1 kg, carbon content, fossil 0.120005, dry mass 1 kg
- mineral supplement, for beef cattle: 0.0224566 kg; lognormal variance with pedigree 0.0078, pedigree (3,3,3,5,2)
  Mineral supplement is used to raise the cattle. The need of mineral supplement depend on animal weight, function and season and varies from 10 g (calves and heifers right after decalving) to 80 g (bulls in the system for reproduction only) per day. Each herd stays on the system from 8 months (heifers sold right right after decalving) up to 5 years (bulls and cows for reproduction). This is a weghted average considering the live weight of each animal, the amount per live-weight perscribed to each animal for each season, and the time the animal stays on system for each season.
  properties: wet mass 1 kg, dry mass 1 kg
- tillage, harrowing, by offset leveling disc harrow: 8.26023e-6 ha; lognormal variance with pedigree 0.0439, pedigree (3,3,5,3,2)
  Activity link to BR dataset, as there is no market modeled for this activity in BR region.
- wood preservation, vaccum pressure method, inorganic salt, containing Cr, outdoor use, ground contact: 5.47335e-6 kg; name WOOD; lognormal variance with pedigree 0.0439, pedigree (3,3,5,3,2)
  Fencing the farm: poles preservation by treatment with inorganic CCB (chromium, copper, boron) salt with the vacuum pressure method. Emissions in farm or after used were not included.
- zinc coat, pieces: 2.62614e-5 m2; lognormal variance with pedigree 0.0439, pedigree (3,3,5,3,2)
  Fencing the farm: steel wire zinc coating.
- land use change, pasture, man made: 6.57498e-6 ha; = (0.00789056*LUC_crop_specific +(0.0163568491287115*(1-LUC_crop_specific)))*0.02
  Calculated value. Land use change (LUC) related to the planted pasture only (native pasture not included). From Novaes et al. (2017).
- phosphate fertiliser, as P2O5: 0.000330401 kg; lognormal variance with pedigree 0.0439, pedigree (3,3,5,3,2)
  Phosphate fertilizer for pasture replanting or maintenance.
  properties: dry mass 1 kg, wet mass 1 kg
- weed control, by brush cutter, pasture: 1.652e-5 ha; lognormal variance with pedigree 0.0439, pedigree (3,3,5,3,2)
  Activity link to BR dataset, as there is no market modeled for this activity in BR region.

## Inputs from nature
- Transformation, to pasture, man made [natural resource, land]: 0.0410936 m2; = T_t*1/20*0.02; lognormal variance with pedigree 0.0513, pedigree (3,3,5,3,2)
  Land transformation related to the planted pasture only (native pasture not included). From Folegatti et al. (2015).
- Water, unspecified natural origin [natural resource, in water]: 0.0218008 m3; name drinking_water; lognormal variance with pedigree 0.0078, pedigree (3,3,3,5,2)
  Drinking water for animals, from well, lakes, rivers or rain. Consumption of 0.14 liters per day per kg of cattle live weight was multiplied per kg of average live weight for each heard category. Consumption per kg of live weight was estimated from PALHARES, 2013 considering that each range of weight and consumption begins at the end of the previous range, and that the first range presented on Palhares, 2013 begins at the average weight of weaned calves (170 kg).
- Transformation, from pasture, man made [natural resource, land]: 0.0410936 m2; = T_t*1/20*0.02; lognormal variance with pedigree 0.0513, pedigree (3,3,5,3,2)
  (same comment as for Transformation, to pasture, man made)
- Occupation, pasture, man made [natural resource, land]: 41.0936 m2*year; name T_t; lognormal variance with pedigree 0.0453, pedigree (3,3,5,3,2)
  From Folegatti et al. (2015).
- Energy, gross calorific value, in biomass [natural resource, biotic]: 1.63774 MJ; = REF_PRODUCT_energy_content + BY_PRODUCT_energy_content * BY_PRODUCT + BY_PRODUCT_2_energy_content * BY_PRODUCT_2; lognormal variance with pedigree 0.0439, pedigree (3,3,5,3,2)
  Balance of energy content, considering product, by-product and the main exchanges from technosphere, only.

## Emissions to nature
- Nitrogen oxides [air, non-urban air or from high stacks]: 0.000463983 kg; = N2O*0.21; lognormal variance with pedigree 0.0733, pedigree (3,3,5,3,2)
  Emissions of NOx to the air. See '2.5 EMISSIONS OF NOX TO THE AIR' in Nemecek and Schnetzer (2011).
- Nitrate [water, ground-]: 0 kg; name NO3
  There are specific cases (i.e. when the nitrogen uptake by plants is higher than input) in which the SQCB model calculates negative NO3 emissions. In practice, negative NO3 emission would mean that there would be a NO3 uptake from groundwater by the roots of the plants. This would be the case here, if the SQCL model were applied. This does not happen in reality, therefore NO3 emissions were set to 0 in this specific case.
- Phosphorus [water, ground-]: 0 kg
  Exchange kept with zero amount only for information that phosphorus leaching must be disregarded due to its low mobility in Brazilian soils (Novais & Smyth, 1999).
- Phosphorus [water, surface water]: 0.00029045 kg; = T_t*10^-4 * 200 * 0.00095 * 1.86 * 0.2; lognormal variance with pedigree 0.0833, pedigree (3,3,5,3,2)
  As phosphorus leaching must be disregarded due to its low mobility in Brazilian soils (Novais & Smyth, 1999), only P emission by water erosion through surface water was considered, as in '2.3.3 Phorsphorous Emissions Through Water Erosion to Surface Water' Nemecek and Schnetzer (2011). Soil eroded is 200 kg/ha.yr.
- Lead [water, surface water]: 1.18812e-7 kg; normal variance with pedigree 0.1446, pedigree (3,3,5,3,2)
  Emissions of heavy metals to soil and surface water estimated from mineral fertilisers and liming as recommended by Canals (2003) and regionalized following Folegatti et al. (2015).
- Cadmium, ion [water, surface water]: 1.29078e-8 kg; normal variance with pedigree 0.1446, pedigree (3,3,5,3,2)
  (same comment as for Lead)
- Lead [soil, agricultural]: 0.001188 kg; normal variance with pedigree 0.0946, pedigree (3,3,5,3,2)
  (same comment as for Lead)
- Chromium, ion [water, surface water]: 1.08205e-7 kg; normal variance with pedigree 0.1446, pedigree (3,3,5,3,2)
  (same comment as for Lead)
- Nickel, ion [water, surface water]: 1.66796e-7 kg; normal variance with pedigree 0.1446, pedigree (3,3,5,3,2)
  (same comment as for Lead)
- Copper, ion [water, surface water]: 8.54937e-7 kg; normal variance with pedigree 0.1446, pedigree (3,3,5,3,2)
  (same comment as for Lead)
- Zinc, ion [water, surface water]: 3.97521e-6 kg; normal variance with pedigree 0.1446, pedigree (3,3,5,3,2)
  (same comment as for Lead)
- Nickel [soil, agricultural]: 0.00166779 kg; normal variance with pedigree 0.0946, pedigree (3,3,5,3,2)
  (same comment as for Lead)
- Chromium [soil, agricultural]: 0.00108192 kg; normal variance with pedigree 0.0946, pedigree (3,3,5,3,2)
  (same comment as for Lead)
- Cadmium [soil, agricultural]: 0.000129065 kg; normal variance with pedigree 0.0946, pedigree (3,3,5,3,2)
  (same comment as for Lead)
- Zinc [soil, agricultural]: 0.0397483 kg; normal variance with pedigree 0.0946, pedigree (3,3,5,3,2)
  (same comment as for Lead)
- Methane, non-fossil [air, non-urban air or from high stacks]: 0.0521337 kg; lognormal variance with pedigree 0.0513, pedigree (3,3,5,3,2)
  Enteric fermentation and manure management (IPCC, 2006).
- Water [air, unspecified]: 0.00327012 m3; = drinking_water*fraction_PW_to_air; lognormal variance with pedigree 0.0439, pedigree (3,3,5,3,2)
- Water [water, surface water]: 0.0185307 m3; = drinking_water*fraction_PWtoW_to_surface_water; lognormal variance with pedigree 0.0439, pedigree (3,3,5,3,2)
- Ammonia [air, non-urban air or from high stacks]: 0.0030188 kg; name NH3; = 17/14 * (N_fert*0.20 + N_ex*0.6*0.06); lognormal variance with pedigree 0.0513, pedigree (3,3,5,3,2)
  NH3 emissions from applied mineral fertilisers are calculated by constant emission factors for each group of fertiliser. For Urea 20%. See Nemecek et al. (2015).
- Copper [soil, agricultural]: 0.00854854 kg; normal variance with pedigree 0.0946, pedigree (3,3,5,3,2)
  (same comment as for Lead)
- Carbon dioxide, fossil [air, non-urban air or from high stacks]: 0.00295293 kg; = 44/12 * 0.13 * lime + 1.57 * N_fert; lognormal variance with pedigree 0.0439, pedigree (3,3,5,3,2)
  Emissions of CO2 to air from limestone and urea application based on IPCC (2006).
- Dinitrogen monoxide [air, non-urban air or from high stacks]: 0.00220944 kg; name N2O; = 44/28*(0.01*N_fert + 0.01*14/17*NH3 + 0.0075*14/62*NO3 + N_ex*EF_N2O); lognormal variance with pedigree 0.0733, pedigree (3,3,5,3,2)
  Emissions of N2O to the air from drylot and pasture, with no N from crop residues or feedlot. See IPCC (2006).

## Sampling procedure
Inventory data for cattle systems obtained from Embrapa’s PECUS Project, literature and expert knowledge. Emissions from the agricultural process estimated according to Nemecek and Schnetzer (2011) and Canals (2003) and other references mentioned.

## Extrapolations
Carbon content, water and gross calorific value are based on ecoinvent database.
