# treatment of waste polyethylene, open dump, moist infiltration class (300mm)

Dataset: EcoSpold 2, unit process
Geography: GLO
Time period: 2006-01-01 to 2019-12-31
Technology level: current
Classification: ISIC rev.4 ecoinvent: 3821:Treatment and disposal of non-hazardous waste
Synonyms: municipal waste landfill
Scenario: Business-as-Usual
System model: Allocation at the point of substitution
Share of production covered: 1 %
Generated by: Avraam Symeonidis
Database: ecoinvent
isCopyrightProtected: true
accessRestrictedTo: 1

## General comment
This dataset represents the activity of waste disposal of waste polyethylene in a open dump. Recommended use of this dataset: For PE, which goes to disposal as part of unmanaged communal waste mixture. // Waste composition (wet, in ppm): upper heating value 42.82 MJ/kg; lower heating value 42.47 MJ/kg; H2O 4000; O 38435; H 122490; C 822050; S 426.9; N 1297.2; P n.a.; B n.a.; Cl 1461.5; Br 9.5896; F 14.384; I n.a.; Ag n.a.; As 1.822; Ba 239.74; Cd 33.946; Co 1.6782; Cr 12.466; Cu 41.367; Hg 0.047948; Mn 30.047; Mo n.a.; Ni 0.95896; Pb 22.596; Sb 10.069; Se 2.0138; Sn 3.814; V 2205.6; Zn 342.01; Be 0.47948; Sc n.a.; Sr 84.868; Ti 958.96; Tl 0.38358; W n.a.; Si n.a.; Fe 1534.3; Ca 2589.2; Al 191.79; K n.a.; Mg 95.896; Na 1405.4; . // Share of carbon in waste that is biogenic 0%. Share of metals in waste not oxidised and bulk-recyclable (exclude very small or thin parts) Iron: 0%; Alu: 0%; Copper: 0%. Overall degradability of waste during 100 years: 1%.

## Included activities start
from final waste deposition (without transports to the site)

## Included activities end
Waste-specific short-term emissions to air via landfill gas and landfill leachate. Waste-specific long-term emissions from landfill.

## Geography
Given name of landfill location is 'infiltration class 3 moist (2018)'. Landfill site with mean annual temperature (MAT) of 8 degC, mean annual precipitation (MAP) of 900 mm/year, and net infiltration of 300 mm/year.
Climate adjustments result in an alpha t (temperature) for permafrost areas of 0.999. Total climate adjustments with alpha pt of 0.999.

## Technology
This is an inventory for an open, uncontrolled waste dump for municipal solid waste. Ultimate average landfill height is 7 meters. Operation phase duration is 15 years.Percentage of landfill gas directly emitted is 100w%. A Methane Correction Factor (MCF) for landfill air emissions of 0.7057 is employed.
Leachate of the landfill is not treated. Based on average waste composition and climate data the end of carbonate phase is estimated to be reached 2658 years after waste deposition.

## Reference product
- waste polyethylene: -1 kg; CPC 39270: Waste, parings and scrap of plastics; By-product classification Waste; CAS 9002-88-4; pedigree (1,1,1,1,1)
  main reference product of this activity (supply of disposal service).
  Uncertainty: Uncertainty is not adjusted, as this is the refence product
  production volume 1 kg
    The amount of the annual production volume is a placeholder value. The contribution of this technology to the different local markets can be found in the markets themselves.
  property price 0 EUR2005
    Waste products are assigned a price of zero as they are assumed to require further treatment.
  property carbon content 0.82535
    carbon content on a dry matter basis (reserved; not for manual entry)
  properties: dry mass 0.996 kg, wet mass 1 kg, water content 0.0040161, water in wet mass 0.004 kg, sodium content 0.001411, carbon content, fossil 0.82535, selenium content 2.0219e-6, chlorine content 0.0014674, zinc content 0.00034338, barium content 0.0002407, aluminium content 0.00019256, bromine content 9.6281e-6, nitrogen content 0.0013024, fluorine content 1.4442e-5, thallium content 3.8512e-7, vanadium content 0.0022145, titanium content 0.00096281, heating value, net 42.474 MJ, nickel content 9.6281e-7, antimony content 1.011e-5, mercury content 4.8141e-8, beryllium content 4.8141e-7, tin content 3.8294e-6, cadmium content 3.4082e-5, hydrogen content 0.12298, copper content 4.1533e-5, cobalt content 1.6849e-6, iron content 0.0015405, oxygen content 0.03859, magnesium content 9.6281e-5, arsenic content 1.8293e-6, manganese content 3.0168e-5, chromium content 1.2517e-5, lead content 2.2687e-5, calcium content 0.0025996, sulfur content 0.00042861, strontium content 8.5209e-5, heating value, gross 42.823 MJ, carbon allocation 0.822049 kg

## Emissions to nature
- DOC, Dissolved Organic Carbon [water, ground-, long-term]: 0.81384 kg; lognormal variance with pedigree 0.00230669, pedigree (1,1,3,1,1)
  Emissions from long-term leachate (>100a) directly from MSW landfill and indirectly via incineration of treatement sludge from leachate treatement.
  Uncertainty: Uncertainty calculated depending on waste input and uncertainty of long-term transfer coefficents in landfill.
- Occupation, dump site [natural resource, land]: 0.0035714 m2*year; lognormal variance with pedigree 0.082256, pedigree (1,1,3,1,1)
  for landfill operation phase and spontaneous renaturation.
  Uncertainty: Uncertainty calculated from uncertainty in base parameters.
- Nitrate [water, ground-]: 1.2983e-6 kg; lognormal variance with pedigree 0.22466, pedigree (1,1,3,1,1)
  burden from short-term leachate to groundwater in uncontrolled landfill in moist cimate.
  Uncertainty: Uncertainty calculated from unertainty of the waste composition of this waste, uncertainty in waste decomposition and short-term leaching in landfill
- Methane, fossil [air, non-urban air or from high stacks]: 0.0041965 kg; lognormal variance with pedigree 0.10536, pedigree (1,1,3,1,1)
  burden from direct release or incineration of landfill biogas.
  Uncertainty: Uncertainty calculated from unertainty of the waste composition of this waste, uncertainty in waste decomposition and short-term leaching in landfill
- Sulfate [water, ground-]: 4.437e-6 kg; lognormal variance with pedigree 0.31566, pedigree (1,1,3,1,1)
  (same comment as for Nitrate)
- Carbon dioxide, fossil [air, non-urban air or from high stacks]: 0.017689 kg; lognormal variance with pedigree 0.095231, pedigree (1,1,3,1,1)
  (same comment as for Methane, fossil)
- Ammonium, ion [water, ground-]: 1.2345e-5 kg; lognormal variance with pedigree 0.22466, pedigree (1,1,3,1,1)
  (same comment as for Nitrate)
- Magnesium [water, ground-, long-term]: 9.5305e-5 kg; lognormal variance with pedigree 0.2439, pedigree (1,1,3,1,1)
  (same comment as for DOC, Dissolved Organic Carbon)
- Hydrogen sulfide [water, ground-]: 1.1566e-7 kg; lognormal variance with pedigree 0.31566, pedigree (1,1,3,1,1)
  (same comment as for Nitrate)
- Sodium, ion [water, ground-, long-term]: 0.0013473 kg; lognormal variance with pedigree 0.15538, pedigree (1,1,3,1,1)
  (same comment as for DOC, Dissolved Organic Carbon)
- TOC, Total Organic Carbon [water, ground-]: 0.00023915 kg; lognormal variance with pedigree 0.20591, pedigree (1,1,3,1,1)
  (same comment as for Nitrate)
- Aluminium [water, ground-, long-term]: 0.0001917 kg; lognormal variance with pedigree 0.22085, pedigree (1,1,3,1,1)
  (same comment as for DOC, Dissolved Organic Carbon)
- COD, Chemical Oxygen Demand [water, ground-]: 0.00026157 kg; lognormal variance with pedigree 0.20591, pedigree (1,1,3,1,1)
  (same comment as for Nitrate)
- Titanium, ion [water, ground-, long-term]: 0.00095848 kg; lognormal variance with pedigree 0.16777, pedigree (1,1,3,1,1)
  (same comment as for DOC, Dissolved Organic Carbon)
- DOC, Dissolved Organic Carbon [water, ground-]: 0.00023915 kg; lognormal variance with pedigree 0.20591, pedigree (1,1,3,1,1)
  (same comment as for Nitrate)
- Calcium, ion [water, ground-, long-term]: 0.0025858 kg; lognormal variance with pedigree 0.13571, pedigree (1,1,3,1,1)
  (same comment as for DOC, Dissolved Organic Carbon)
- BOD5, Biological Oxygen Demand [water, ground-]: 6.1922e-5 kg; lognormal variance with pedigree 0.20591, pedigree (1,1,3,1,1)
  (same comment as for Nitrate)
- Thallium [water, ground-, long-term]: 3.8336e-7 kg; lognormal variance with pedigree 0.42523, pedigree (1,1,3,1,1)
  (same comment as for DOC, Dissolved Organic Carbon)
- Heat, waste [soil, industrial]: 0.36145 MJ; lognormal variance with pedigree 0.055228, pedigree (1,1,3,1,1)
  burden from short-term decomposition of waste (0-100a).
  Uncertainty: Uncertainty calculated from unertainty of the waste composition of this waste, uncertainty in waste decomposition and short-term leaching in landfill
- Iron, ion [water, ground-, long-term]: 0.0015341 kg; lognormal variance with pedigree 0.1525, pedigree (1,1,3,1,1)
  (same comment as for DOC, Dissolved Organic Carbon)
- Magnesium [air, non-urban air or from high stacks]: 1.4776e-10 kg; lognormal variance with pedigree 0.61992, pedigree (1,1,3,1,1)
  burden from direct release or incineration of landfill biogas; or windblown leachate evaporite in arid climates.
  Uncertainty: Uncertainty calculated from unertainty of the waste composition of this waste, uncertainty in waste decomposition and short-term leaching in landfill
- Beryllium [water, ground-, long-term]: 4.792e-7 kg; lognormal variance with pedigree 0.41807, pedigree (1,1,3,1,1)
  (same comment as for DOC, Dissolved Organic Carbon)
- Sodium [air, non-urban air or from high stacks]: 1.4522e-8 kg; lognormal variance with pedigree 0.46923, pedigree (1,1,3,1,1)
  (same comment as for Magnesium)
- Aluminium [water, ground-]: 9.5758e-8 kg; lognormal variance with pedigree 0.40671, pedigree (1,1,3,1,1)
  (same comment as for Nitrate)
- Zinc, ion [water, ground-, long-term]: 0.00034184 kg; lognormal variance with pedigree 0.20167, pedigree (1,1,3,1,1)
  (same comment as for DOC, Dissolved Organic Carbon)
- Heat, waste [water, ground-, long-term]: 42.395 MJ; lognormal variance with pedigree 0.014651, pedigree (1,1,3,1,1)
  burden from long-term decomposition of waste (>100a).
  Uncertainty: Uncertainty calculated from unertainty of the waste composition of this waste, uncertainty in waste decomposition and short-term leaching in landfill
- Sodium, ion [water, ground-]: 5.8089e-5 kg; lognormal variance with pedigree 0.20671, pedigree (1,1,3,1,1)
  (same comment as for Nitrate)
- Strontium [water, ground-, long-term]: 8.4819e-5 kg; lognormal variance with pedigree 0.24797, pedigree (1,1,3,1,1)
  (same comment as for DOC, Dissolved Organic Carbon)
- Iron [air, non-urban air or from high stacks]: 5.2624e-11 kg; lognormal variance with pedigree 0.64917, pedigree (1,1,3,1,1)
  (same comment as for Magnesium)
- Magnesium [water, ground-]: 5.9105e-7 kg; lognormal variance with pedigree 0.34961, pedigree (1,1,3,1,1)
  (same comment as for Nitrate)
- Tin, ion [water, ground-, long-term]: 3.8138e-6 kg; lognormal variance with pedigree 0.35071, pedigree (1,1,3,1,1)
  (same comment as for DOC, Dissolved Organic Carbon)
- Calcium [air, non-urban air or from high stacks]: 8.4184e-10 kg; lognormal variance with pedigree 0.5617, pedigree (1,1,3,1,1)
  (same comment as for Magnesium)
- Thallium [water, ground-]: 2.2274e-10 kg; lognormal variance with pedigree 0.60614, pedigree (1,1,3,1,1)
  (same comment as for Nitrate)
- Vanadium, ion [water, ground-, long-term]: 0.00041925 kg; lognormal variance with pedigree 0.31307, pedigree (1,1,3,1,1)
  (same comment as for DOC, Dissolved Organic Carbon)
- Aluminium [air, non-urban air or from high stacks]: 2.394e-11 kg; lognormal variance with pedigree 0.67716, pedigree (1,1,3,1,1)
  (same comment as for Magnesium)
- Calcium, ion [water, ground-]: 3.3674e-6 kg; lognormal variance with pedigree 0.29043, pedigree (1,1,3,1,1)
  (same comment as for Nitrate)
- Lead [water, ground-, long-term]: 2.2595e-5 kg; lognormal variance with pedigree 0.29198, pedigree (1,1,3,1,1)
  (same comment as for DOC, Dissolved Organic Carbon)
- Thallium [air, non-urban air or from high stacks]: 5.5685e-14 kg; lognormal variance with pedigree 0.87678, pedigree (1,1,3,1,1)
  (same comment as for Magnesium)
- Iron, ion [water, ground-]: 2.105e-7 kg; lognormal variance with pedigree 0.38093, pedigree (1,1,3,1,1)
  (same comment as for Nitrate)
- Antimony [water, ground-, long-term]: 6.3115e-7 kg; lognormal variance with pedigree 0.79812, pedigree (1,1,3,1,1)
  (same comment as for DOC, Dissolved Organic Carbon)
- Titanium [air, non-urban air or from high stacks]: 1.197e-10 kg; lognormal variance with pedigree 0.62408, pedigree (1,1,3,1,1)
  (same comment as for Magnesium)
- Strontium [water, ground-]: 4.9281e-8 kg; lognormal variance with pedigree 0.42888, pedigree (1,1,3,1,1)
  (same comment as for Nitrate)
- Selenium [water, ground-, long-term]: 3.6973e-7 kg; lognormal variance with pedigree 0.55113, pedigree (1,1,3,1,1)
  (same comment as for DOC, Dissolved Organic Carbon)
- Zinc [air, non-urban air or from high stacks]: 3.5961e-11 kg; lognormal variance with pedigree 0.66338, pedigree (1,1,3,1,1)
  (same comment as for Magnesium)
- Titanium, ion [water, ground-]: 4.7879e-7 kg; lognormal variance with pedigree 0.35363, pedigree (1,1,3,1,1)
  (same comment as for Nitrate)
- Mercury [water, ground-, long-term]: 4.7902e-8 kg; lognormal variance with pedigree 0.48245, pedigree (1,1,3,1,1)
  (same comment as for DOC, Dissolved Organic Carbon)
- Beryllium [air, non-urban air or from high stacks]: 6.9607e-14 kg; lognormal variance with pedigree 0.86962, pedigree (1,1,3,1,1)
  (same comment as for Magnesium)
- Beryllium [water, ground-]: 2.7843e-10 kg; lognormal variance with pedigree 0.59898, pedigree (1,1,3,1,1)
  (same comment as for Nitrate)
- Manganese [water, ground-, long-term]: 2.9704e-5 kg; lognormal variance with pedigree 0.28251, pedigree (1,1,3,1,1)
  (same comment as for DOC, Dissolved Organic Carbon)
- Vanadium [air, non-urban air or from high stacks]: 5.8079e-10 kg; lognormal variance with pedigree 0.57353, pedigree (1,1,3,1,1)
  (same comment as for Magnesium)
- Vanadium, ion [water, ground-]: 2.3231e-6 kg; lognormal variance with pedigree 0.30236, pedigree (1,1,3,1,1)
  (same comment as for Nitrate)
- Nickel, ion [water, ground-, long-term]: 9.584e-7 kg; lognormal variance with pedigree 0.39571, pedigree (1,1,3,1,1)
  (same comment as for DOC, Dissolved Organic Carbon)
- Strontium [air, non-urban air or from high stacks]: 1.232e-11 kg; lognormal variance with pedigree 0.69952, pedigree (1,1,3,1,1)
  (same comment as for Magnesium)
- Zinc, ion [water, ground-]: 1.6183e-7 kg; lognormal variance with pedigree 0.38929, pedigree (1,1,3,1,1)
  (same comment as for Nitrate)
- Cobalt [water, ground-, long-term]: 1.6728e-6 kg; lognormal variance with pedigree 0.37754, pedigree (1,1,3,1,1)
  (same comment as for DOC, Dissolved Organic Carbon)
- Tin [air, non-urban air or from high stacks]: 5.612e-14 kg; lognormal variance with pedigree 0.87346, pedigree (1,1,3,1,1)
  (same comment as for Magnesium)
- Tin, ion [water, ground-]: 2.2448e-10 kg; lognormal variance with pedigree 0.60715, pedigree (1,1,3,1,1)
  (same comment as for Nitrate)
- Chromium VI [water, ground-, long-term]: 3.465e-8 kg; lognormal variance with pedigree 2.4766, pedigree (1,1,3,1,1)
  (same comment as for DOC, Dissolved Organic Carbon)
- Antimony [air, non-urban air or from high stacks]: 2.6514e-12 kg; lognormal variance with pedigree 0.75145, pedigree (1,1,3,1,1)
  (same comment as for Magnesium)
- Antimony [water, ground-]: 1.0606e-8 kg; lognormal variance with pedigree 0.48028, pedigree (1,1,3,1,1)
  (same comment as for Nitrate)
- Copper, ion [water, ground-, long-term]: 4.1365e-5 kg; lognormal variance with pedigree 0.27188, pedigree (1,1,3,1,1)
  (same comment as for DOC, Dissolved Organic Carbon)
- Selenium [air, non-urban air or from high stacks]: 5.3028e-13 kg; lognormal variance with pedigree 0.8043, pedigree (1,1,3,1,1)
  (same comment as for Magnesium)
- Selenium [water, ground-]: 2.1211e-9 kg; lognormal variance with pedigree 0.53313, pedigree (1,1,3,1,1)
  (same comment as for Nitrate)
- Arsenic, ion [water, ground-, long-term]: 1.8187e-6 kg; lognormal variance with pedigree 0.37487, pedigree (1,1,3,1,1)
  (same comment as for DOC, Dissolved Organic Carbon)
- Lead [air, non-urban air or from high stacks]: 4.4327e-13 kg; lognormal variance with pedigree 0.80589, pedigree (1,1,3,1,1)
  (same comment as for Magnesium)
- Lead [water, ground-]: 1.3298e-9 kg; lognormal variance with pedigree 0.54841, pedigree (1,1,3,1,1)
  (same comment as for Nitrate)
- Cadmium, ion [water, ground-, long-term]: 3.3886e-5 kg; lognormal variance with pedigree 0.27846, pedigree (1,1,3,1,1)
  (same comment as for DOC, Dissolved Organic Carbon)
- Nickel [air, non-urban air or from high stacks]: 1.3921e-13 kg; lognormal variance with pedigree 0.84726, pedigree (1,1,3,1,1)
  (same comment as for Magnesium)
- Nickel, ion [water, ground-]: 5.5685e-10 kg; lognormal variance with pedigree 0.57662, pedigree (1,1,3,1,1)
  (same comment as for Nitrate)
- Barium [water, ground-, long-term]: 0.000237 kg; lognormal variance with pedigree 0.21345, pedigree (1,1,3,1,1)
  (same comment as for DOC, Dissolved Organic Carbon)
- Copper [air, non-urban air or from high stacks]: 5.7808e-13 kg; lognormal variance with pedigree 0.79621, pedigree (1,1,3,1,1)
  (same comment as for Magnesium)
- Mercury [water, ground-]: 3.2806e-11 kg; lognormal variance with pedigree 0.65801, pedigree (1,1,3,1,1)
  (same comment as for Nitrate)
- Chloride [water, ground-, long-term]: 0.0014243 kg; lognormal variance with pedigree 0.15409, pedigree (1,1,3,1,1)
  (same comment as for DOC, Dissolved Organic Carbon)
- Chromium [air, non-urban air or from high stacks]: 3.5483e-13 kg; lognormal variance with pedigree 0.81412, pedigree (1,1,3,1,1)
  (same comment as for Magnesium)
- Manganese [water, ground-]: 3.4372e-7 kg; lognormal variance with pedigree 0.36966, pedigree (1,1,3,1,1)
  (same comment as for Nitrate)
- Fluoride [water, ground-, long-term]: 1.4319e-5 kg; lognormal variance with pedigree 0.30695, pedigree (1,1,3,1,1)
  (same comment as for DOC, Dissolved Organic Carbon)
- Mercury [air, non-urban air or from high stacks]: 1.3122e-11 kg; lognormal variance with pedigree 0.68807, pedigree (1,1,3,1,1)
  (same comment as for Magnesium)
- Chromium VI [water, ground-]: 1.4193e-9 kg; lognormal variance with pedigree 0.54628, pedigree (1,1,3,1,1)
  (same comment as for Nitrate)
- Bromine [water, ground-, long-term]: 9.345e-6 kg; lognormal variance with pedigree 0.32038, pedigree (1,1,3,1,1)
  (same comment as for DOC, Dissolved Organic Carbon)
- Manganese [air, non-urban air or from high stacks]: 8.5931e-11 kg; lognormal variance with pedigree 0.63845, pedigree (1,1,3,1,1)
  (same comment as for Magnesium)
- Copper, ion [water, ground-]: 2.0233e-9 kg; lognormal variance with pedigree 0.53444, pedigree (1,1,3,1,1)
  (same comment as for Nitrate)
- Nitrate [water, ground-, long-term]: 5.4237e-5 kg; lognormal variance with pedigree 0.15796, pedigree (1,1,3,1,1)
  (same comment as for DOC, Dissolved Organic Carbon)
- Barium [air, non-urban air or from high stacks]: 6.8562e-10 kg; lognormal variance with pedigree 0.56938, pedigree (1,1,3,1,1)
  (same comment as for Magnesium)
- Cobalt [water, ground-]: 5.3876e-9 kg; lognormal variance with pedigree 0.50347, pedigree (1,1,3,1,1)
  (same comment as for Nitrate)
- Nitrite [water, ground-, long-term]: 2.807e-5 kg; lognormal variance with pedigree 0.15796, pedigree (1,1,3,1,1)
  (same comment as for DOC, Dissolved Organic Carbon)
- Cobalt [air, non-urban air or from high stacks]: 1.3469e-12 kg; lognormal variance with pedigree 0.77461, pedigree (1,1,3,1,1)
  (same comment as for Magnesium)
- Cadmium, ion [water, ground-]: 5.966e-8 kg; lognormal variance with pedigree 0.4235, pedigree (1,1,3,1,1)
  (same comment as for Nitrate)
- Nitrogen, organic bound [water, ground-, long-term]: 0.00084292 kg; lognormal variance with pedigree 0.15796, pedigree (1,1,3,1,1)
  (same comment as for DOC, Dissolved Organic Carbon)
- Cadmium [air, non-urban air or from high stacks]: 3.9773e-10 kg; lognormal variance with pedigree 0.58821, pedigree (1,1,3,1,1)
  (same comment as for Magnesium)
- Barium [water, ground-]: 2.7425e-6 kg; lognormal variance with pedigree 0.30059, pedigree (1,1,3,1,1)
  (same comment as for Nitrate)
- Hydrogen sulfide [water, ground-, long-term]: 3.096e-5 kg; lognormal variance with pedigree 0.19435, pedigree (1,1,3,1,1)
  (same comment as for DOC, Dissolved Organic Carbon)
- Hydrogen fluoride [air, non-urban air or from high stacks]: 5.727e-8 kg; lognormal variance with pedigree 0.42774, pedigree (1,1,3,1,1)
  (same comment as for Magnesium)
- Arsenic, ion [water, ground-]: 3.2687e-9 kg; lognormal variance with pedigree 0.51925, pedigree (1,1,3,1,1)
  (same comment as for Nitrate)
- Ammonium, ion [water, ground-, long-term]: 0.00051572 kg; lognormal variance with pedigree 0.15796, pedigree (1,1,3,1,1)
  (same comment as for DOC, Dissolved Organic Carbon)
- Bromine [air, non-urban air or from high stacks]: 3.3813e-9 kg; lognormal variance with pedigree 0.51764, pedigree (1,1,3,1,1)
  (same comment as for Magnesium)
- Bromine [water, ground-]: 2.412e-7 kg; lognormal variance with pedigree 0.38502, pedigree (1,1,3,1,1)
  (same comment as for Nitrate)
- Sulfate [water, ground-, long-term]: 0.0011877 kg; lognormal variance with pedigree 0.19435, pedigree (1,1,3,1,1)
  (same comment as for DOC, Dissolved Organic Carbon)
- Arsenic [air, non-urban air or from high stacks]: 4.5823e-11 kg; lognormal variance with pedigree 0.65943, pedigree (1,1,3,1,1)
  (same comment as for Magnesium)
- Fluoride [water, ground-]: 1.0555e-8 kg; lognormal variance with pedigree 0.48022, pedigree (1,1,3,1,1)
  (same comment as for Nitrate)
- BOD5, Biological Oxygen Demand [water, ground-, long-term]: 0.21073 kg; lognormal variance with pedigree 0.00230669, pedigree (1,1,3,1,1)
  (same comment as for DOC, Dissolved Organic Carbon)
- Nitrogen oxides [air, non-urban air or from high stacks]: 1.777e-8 kg; lognormal variance with pedigree 0.31689, pedigree (1,1,3,1,1)
  (same comment as for Methane, fossil)
- Nitrogen, organic bound [water, ground-]: 2.0178e-5 kg; lognormal variance with pedigree 0.22466, pedigree (1,1,3,1,1)
  (same comment as for Nitrate)
- TOC, Total Organic Carbon [water, ground-, long-term]: 0.81384 kg; lognormal variance with pedigree 0.00230669, pedigree (1,1,3,1,1)
  (same comment as for DOC, Dissolved Organic Carbon)
- Sulfur dioxide [air, non-urban air or from high stacks]: 5.5645e-7 kg; lognormal variance with pedigree 0.37149, pedigree (1,1,3,1,1)
  (same comment as for Methane, fossil)
- Chloride [water, ground-]: 3.6761e-5 kg; lognormal variance with pedigree 0.21873, pedigree (1,1,3,1,1)
  (same comment as for Nitrate)
- COD, Chemical Oxygen Demand [water, ground-, long-term]: 0.89014 kg; lognormal variance with pedigree 0.00230669, pedigree (1,1,3,1,1)
  (same comment as for DOC, Dissolved Organic Carbon)
- Hydrogen chloride [air, non-urban air or from high stacks]: 5.2988e-7 kg; lognormal variance with pedigree 0.35135, pedigree (1,1,3,1,1)
  (same comment as for Magnesium)
- Nitrite [water, ground-]: 6.7192e-7 kg; lognormal variance with pedigree 0.22466, pedigree (1,1,3,1,1)
  (same comment as for Nitrate)

## Extrapolations
This dataset has been extrapolated from year 2012 to the year of the calculation (2019). The uncertainty has been adjusted accordingly.
