# oat grain, feed production

Dataset: EcoSpold 2, unit process
Geography: RoW
Time period: 1996-01-01 to 2019-12-31
Technology level: current
Classification: ISIC rev.4 ecoinvent: 0111:Growing of cereals (except rice), leguminous crops and oil seeds
Classification: EcoSpold01Categories: agricultural means of production/feed
Scenario: Business-as-Usual
System model: Allocation at the point of substitution
Generated by: Dominique Maxime
Database: ecoinvent
isCopyrightProtected: true
accessRestrictedTo: 1

## General comment
The inventory refers to the processing of oats into 1 kg of feedstuff (fresh weight) in an animal feed mill.

## Included activities start
The dataset starts with the reception of feedstuff at the processing centre.

## Included activities end
The inventory includes the processing of feedstuff (crushing or milling, heat treatment, dosing, mixing squeezing and pelleting) and the storage of the feed mixes. It also includes water use and wastewater treatment, the transformation and use of land related to the storage buildings. No process emissions were included. Packaging is not included.

## Geography
This dataset is extrapolated from an original dataset covering the geography of Switzerland.

## Technology
This dataset is extrapolated from an original dataset which technology refers to expanded feedstuff from organic grain.

## Time period
Years of the publications of the main sources

## Parameters
- fraction, process water, to air: 0.9 dimensionless; lognormal variance with pedigree 0.092025, pedigree (4,4,3,2,4)
- fraction, tap water, to air: 0.9; lognormal variance with pedigree 0.092025, pedigree (4,4,3,2,4)

## Reference product
- oat grain, feed: 1 kg; name REF_PRODUCT; CPC 23319: Preparations used in animal feeding n.e.c.; By-product classification allocatable product
  oat grain processed primarily for animal feed
  production volume 2.02272e10 kg; name REF_PRODUCT_PV
    1996-1999 annual average of World feed oats, expressed as crop primary equivalent. (FAOSTAT 2016, website section of Commodity balances/Crops primary equivalent (http://faostat3.fao.org/faostat-gateway/go/to/download/B/BC/E).
  property water content 0.156069; name REF_PRODUCT_water_content
  property dry mass 0.865 kg; name REF_PRODUCT_DM
  property wet mass 1 kg; name REF_PRODUCT_WM
  property price 0.123189 EUR2005; name REF_PRODUCT_price_EUR2005
    Calculated based on inputs: The price of the product has been calculated as a sum of the values of the material and energy inputs for this product. This value is therefore a rough estimation. It may underestimate the real price since there are additional expenses when producing any product. These expences can include for example labour costs, treatment of waste materials and profit for the producer. Please consider carefully whether this level of data quality is acceptable for your application.
  property carbon content, fossil 0; name REF_PRODUCT_C_content_fossil
    fossil carbon content on a dry matter basis
  property water in wet mass 0.135 kg; name REF_PRODUCT_WWM
  property carbon content, non-fossil 0.4916; name REF_PRODUCT_C_content_non_fossil
    biogene carbon content on a dry matter basis. Content is assumed the same as oat grain.
  property carbon content 0.4916
    carbon content on a dry matter basis (reserved; not for manual entry)
  property true value 0.123189; name REF_PRODUCT_true_value
    allocation property applied in "true value" allocation // value calculated from revenue
  properties: carbon allocation 0.425234 kg

## By-products
- electricity, for reuse in municipal waste incineration only: 0 kWh; CPC 17100: Electrical energy; By-product classification allocatable product; pedigree (1,1,1,1,1)
  Net electricity generated from this waste and used in internal MSWI plant energy redistribution.
  Uncertainty: uncertainty is calculated from uncertainties in waste composition and uncertainties in energy efficiency and the uncertainty in internal energy demand
  production volume 24419.2 kWh
  property exergy 3.6 MJ; name E_el_prod_MSWI_exergy
    This exergy property is based on the exergy content of the product.
  property true value relation 3.6; name E_el_prod_MSWI_true_value_relation
    property to calculate "true value" from
  property price 0.1 EUR2005; name E_el_prod_MSWI_price_EUR2005
    Estimated to be the same price as in case of electricity, medium voltage.
  property true value 4.46783e-8
    allocation property applied in "true value" allocation // value calculated from true value relation
- heat, for reuse in municipal waste incineration only: 0 MJ; CPC 17300: Steam and hot water; By-product classification allocatable product; pedigree (1,1,1,1,1)
  Net useful heat generated from this waste and used in internal MSWI plant energy redistribution.
  Uncertainty: uncertainty is calculated from uncertainties in waste composition and uncertainties in energy efficiency and the uncertainty in internal energy demand
  production volume 173670 MJ
  property true value relation 0.1842; name E_th_prod_MSWI_true_value_relation
    property to calculate "true value" from
  property exergy 0.1842 MJ; name E_th_prod_MSWI_exergy
    This exergy property is based on the exergy content of the product.
  property price 0.0106 EUR2005; name E_th_prod_MSWI_price_EUR2005
    Average European district heat price from Ecoheatcool and Euroheat 2005-2006, Ecoheat Work package 1: The European heat market. Final report. 10.6 EUR/GJ i s the price of district heat. http://www.solarthermalworld.org/files/Ecoheatcool%20WP1%20Web.pdf?download
  property true value 1.64401e-8
    (same comment as for electricity, for reuse in municipal waste incineration only)
- zinc concentrate: 0 kg; CPC 14290: Other non-ferrous metal ores and concentrates (other than uranium or thorium ores and concentrates); By-product classification allocatable product
  Calculated value from the knowledge of the properties of both products.
  production volume 3.30363 kg
  property price 0.38 EUR2005; name ByP_price_EUR2005
    Temporary price data. Calculated as 90% of purchasers price based on: Zinc content in concentrate 53%. Concentrate price per kg Zn 86.5% of refined Zn price (13.5% treatment charges according to CHR Metals Limited 2005: Dynamic cost curves. http://www.minecost.com/dynamic.pdf). 2004 zinc price from USGS (2007) Mineral commodity summaries 2007. <http://minerals.usgs.gov/minerals/pubs/mcs/2007/mcs2007.pdf> [Accessed 25 May 2010]
  property zinc content 0.53; name zinc_C_zinc_concentrate
    Zinc content on a dry matter basis. Value taken from teh "zinc mine operation" /GLO dataset.
  property dry mass 1 kg; name DM_zinc_concentrate
  property carbon content 0
    carbon content on a dry matter basis (reserved; not for manual entry)
  property true value 6.05872e-12
    allocation property applied in "true value" allocation // value calculated from revenue
  properties: wet mass 1 kg, water content 0, carbon content, non-fossil 0, carbon content, fossil 0, water in wet mass 0 kg, carbon allocation 0 kg

## Inputs from technosphere
- heat, district or industrial, natural gas: 0 MJ; source InfoMil  1996; pedigree (1,1,1,1,1)
  Literature Value. The value from InfoMil (1996) was used, namely an average of 4 m3 natural gas per tonne of feedstuff. The natural gas was converted into final energy (=145 MJ), using the lower heating value given in the quality guidelines of ecoinvent 2000.
  Salzgeber & Lörcher (1996) give the total energy and water consumption of a mill processing about 30,000 tonnes of cereals per year. This mill produces flour for human consumption. The total process energy consumption of this mill was approx. 350 MJ per tonne of cereal grain processed (98% as electricity and 2% as fuel) or 440 MJ per tonne of flour produced; the CED was calculated by the authors as 970 MJ/tonne cereals. For production of feed mixes in the feed processing centres, Cederberg (1998) gives an energy consumption (CED) of 374 MJ per tonne of expander-treated feed for dairy cows. In the process, the expander and pelleting treatments use about 80% of the total energy consumed (40% as electricity and 60% as gas). The grinding and mixing requires only 47 MJ per tonne of feed. Hilger et al. (1997) calculated that the production of feed mixes from raw materials on an industrial scale requires about 270 MJ per tonne feedstuff (CED). InfoMil (1996) gives a total energy consumption for the production of feed mixes of 300 to 500 MJ (CED) per tonne of final product by units processing from a few thousand to more than 200,000 tonnes per year. The size of the production units corresponds to the conditions in Switzerland, where the largest feed processing centre produces 275,000 tonnes of feed per year. These data stem from a survey of the Dutch feed industry. The feed mills use about 25-45 kWh electricity and 2-6 m3 gas per tonne of feedstuff produced. The production step “dosing, milling and mixing” uses 18-32 MJ per tonne in production units processing 1 to 6 tons per charge and about 10 charges per hour. The 2-6 m3 of gas is used in the production step “pelleting and expanding”, which also uses 25-30 kWh electricity. The data from the different sources seem to give a relatively consistent picture, despite the different conditions in the various countries. The CED reported levels of between 270 and 500 MJ/tonne of feedstuff. The values for the flour mill (Salzgeber and Lörcher 1996) are higher, but the quality requirements are stricter for the production of food than for feedstuffs, hence the processes are more complex.
  Further References:
  Salzgeber Ch. & Lörcher M. (1996) Produktökobilanz Brot unter verschiedenen Landbaubedingungen. In: Umweltverträgliche Pflanzenproduktion: Indikatoren, Bilanzierungsansätze und ihre Einbindung in Ökobilanzen. 11-12 July 1996, Wittenberg, 249-269.
  Cederberg C. (1998) Life cycle assessment of milk production. A comparison of conventional and organic farming. The Swedish Institute for Food and Biotechnology. SIK-Rapport 1998 No. 643, 86 p.
  Higler J., Kühl R., Fries R., Pfeffer E. & Schulze Lammers P. (1997) Oekonomische und energetische Bewertung einer umweltgerechten Verwertung von Koppelprodukten der Ernährungsbranche und sonstigen organischen Reststoffen in der Landwirtschaft sowie Ansätze zur Entwicklung eines Recyclingkonzeptes. Forschungsberichte / Lehr- und Forschungsschwerpunkt "Umweltverträgliche und Standortgerechte Landwirtschaft" an der Landwirtschaftlichen Fakultät der Rheinischen Friedrich-Wilhelms-Universität 1364765. Bonn Institut für Landwirtschaftliche Betriebslehre.
  EcoSpold01Location=RER
- electricity, low voltage: 0 kWh; source InfoMil  1996; pedigree (1,1,1,1,1)
  EcoSpold01Location=CH
  Literature Value. The value from InfoMil (1996) was used, namely an average of 35 kWh electricity per tonne of feedstuff.
  Salzgeber & Lörcher (1996) give the total energy and water consumption of a mill processing about 30,000 tonnes of cereals per year. This mill produces flour for human consumption. The total process energy consumption of this mill was approx. 350 MJ per tonne of cereal grain processed (98% as electricity and 2% as fuel) or 440 MJ per tonne of flour produced; the CED was calculated by the authors as 970 MJ/tonne cereals. For production of feed mixes in the feed processing centres, Cederberg (1998) gives an energy consumption (CED) of 374 MJ per tonne of expander-treated feed for dairy cows. In the process, the expander and pelleting treatments use about 80% of the total energy consumed (40% as electricity and 60% as gas). The grinding and mixing requires only 47 MJ per tonne of feed. Hilger et al. (1997) calculated that the production of feed mixes from raw materials on an industrial scale requires about 270 MJ per tonne feedstuff (CED). InfoMil (1996) gives a total energy consumption for the production of feed mixes of 300 to 500 MJ (CED) per tonne of final product by units processing from a few thousand to more than 200,000 tonnes per year. The size of the production units corresponds to the conditions in Switzerland, where the largest feed processing centre produces 275,000 tonnes of feed per year. These data stem from a survey of the Dutch feed industry. The feed mills use about 25-45 kWh electricity and 2-6 m3 gas per tonne of feedstuff produced. The production step “dosing, milling and mixing” uses 18-32 MJ per tonne in production units processing 1 to 6 tons per charge and about 10 charges per hour. The 2-6 m3 of gas is used in the production step “pelleting and expanding”, which also uses 25-30 kWh electricity. The data from the different sources seem to give a relatively consistent picture, despite the different conditions in the various countries. The CED reported levels of between 270 and 500 MJ/tonne of feedstuff. The values for the flour mill (Salzgeber and Lörcher 1996) are higher, but the quality requirements are stricter for the production of food than for feedstuffs, hence the processes are more complex.
  Further References:
  Salzgeber Ch. & Lörcher M. (1996) Produktökobilanz Brot unter verschiedenen Landbaubedingungen. In: Umweltverträgliche Pflanzenproduktion: Indikatoren, Bilanzierungsansätze und ihre Einbindung in Ökobilanzen. 11-12 July 1996, Wittenberg, 249-269.
  Cederberg C. (1998) Life cycle assessment of milk production. A comparison of conventional and organic farming. The Swedish Institute for Food and Biotechnology. SIK-Rapport 1998 No. 643, 86 p.
  Higler J., Kühl R., Fries R., Pfeffer E. & Schulze Lammers P. (1997) Oekonomische und energetische Bewertung einer umweltgerechten Verwertung von Koppelprodukten der Ernährungsbranche und sonstigen organischen Reststoffen in der Landwirtschaft sowie Ansätze zur Entwicklung eines Recyclingkonzeptes. Forschungsberichte / Lehr- und Forschungsschwerpunkt "Umweltverträgliche und Standortgerechte Landwirtschaft" an der Landwirtschaftlichen Fakultät der Rheinischen Friedrich-Wilhelms-Universität 1364765. Bonn Institut für Landwirtschaftliche Betriebslehre.
- oat grain: 1 kg; lognormal variance with pedigree 0.06, pedigree (1,1,5,5,3)
  Grain input for feed production. Due to lack of representative data, no loss is considered.
  properties: price 0.1169 EUR2005, water content 0.156069, dry mass 0.865 kg, wet mass 1 kg, carbon content, non-fossil 0.4916
  note on carbon content, non-fossil: biogene carbon content on a dry matter basis. Composition data obtained from http://ndb.nal.usda.gov/ndb/search/list (DB number: 20038, Oats). First, composition data were refered to 1 kg dry mass. Then, C-contents were calculated considering a C-content/dry mass of 46% in carbohydrates (including fibres), 53% in proteins and 75% in fats. All data from "Evolutionary and Biochemical Aspects", A.D. Kay and T. Vrede (in Global Ecology, 2010, Elsevier B.V., S.E. Jørgensen Ed.).
- wastewater, average: 0 m3; name WW; source Salzgeber Ch. 1996; pedigree (1,1,1,1,1)
  EcoSpold01Location=CH
  Literature Value. Salzgeber & Lörcher (1996) give the total energy and water consumption of a mill processing about 30,000 tonnes of cereals per year. The mill consumes 1800 m3 water and produces 1200 m3 wastewater per year. Water consumption and wastewater output was completed from Salzgeber and Lörcher (1996), namely 56 litres tap water and 38 litres wastewater per tonne of feedstuff produced.
  production volume 0 m3
    Calculated from the production volume of oat grain, feed, in proportion to the respective output amounts.
  property price 0 EUR2005; name WW_price_EUR2005
  properties: water content 2882.2, wet mass 1000 kg, dry mass 0.346837 kg, carbon content, non-fossil 0.194039
  note on carbon content, non-fossil: 0.0673 kg TOC/m3 (Tab A.17, ecoinvent v2.2 report 13_I). TOC was considered as Total Carbon.
- building, multi-storey: 8.5e-6 m3; source UFA 2002; lognormal variance with pedigree 0.3446, pedigree (3,3,5,5,1)
  Estimation. The typical storage capacity of the cereal silo found in some feed processing centres in Switzerland is 10,000 tonnes, with an effective storage volume of about 80% of the building volume. With an average grain specific weight of 750 kg/m3, this gives a building volume of about 16,650 m3. Assuming that these feed processing centres process 25,000 tonnes of grain per year, the cereals will be stored for about three months before being processed.
  The largest feed processing centre in Switzerland (UFA-Biblis) has a feedstuff storage compound of 29,440 m3 (80 m length * 23 m * 16 m height) with an effective storage capacity of 4,140 tonnes (5520 palettes of 750 kg), or about 150 kg/m3 (UFA 2002). This centre processes 275,000 tonnes of concentrate feeds yearly. After processing, the feedstuff must therefore be stored for approx. one week in the processing centre before being sent to the regional storehouse.
  The average length of storage of the raw materials is set at 3 months in the calculations. The storage volume required was estimated as 1.7 m3/tonne of raw material (grain specific weight 750 kg/m3 and 80% of the building volume used for storage). The lifetime of the storage silo was assumed to be 50 years, the length of the construction phase 2 years. Land use was estimated from the height of Biblis’s storage silo (UFA 2002). Taking the height of 16 m, the area used is 0.1 m2/tonne of feedstuff for 3 months.
  EcoSpold01Location=RER
- tap water: 0 kg; source Salzgeber Ch. 1996; pedigree (1,1,1,1,1)
  Literature Value. Salzgeber & Lörcher (1996) give the total energy and water consumption of a mill processing about 30,000 tonnes of cereals per year. The mill consumes 1800 m3 water and produces 1200 m3 wastewater per year. Water consumption and wastewater output was completed from Salzgeber and Lörcher (1996), namely 56 litres tap water and 38 litres wastewater per tonne of feedstuff produced.
  properties: water content 2962.17, carbon content, fossil 0.00178991, wet mass 1 kg, dry mass 0.000337476 kg
  note on carbon content, fossil: Bicarbonate content is 2.93 mol/m3. CO2 content is 0.1 mol/m3 (ecoinvent v2.2 report 8, Tab 93.1).
- heat, district or industrial, natural gas: 0.0395929, 0.098157 MJ (2 entries); source InfoMil  1996; lognormal variance with pedigree 0.0532, pedigree (2,3,5,5,1)
  (same comment as for heat, district or industrial, natural gas)
- electricity, low voltage: 0.000376185, 6.5978e-5, 0.00149639, 0.000526237, 0.00108494, 0.0164075, 0.00545293, 0.00270448, 0.00688534 kWh (9 entries); source InfoMil  1996; lognormal variance with pedigree 0.0532, pedigree (2,3,5,5,1)
  (same comment as for electricity, low voltage)
- wastewater, average: -3.70958e-6, -3.42904e-5 m3 (2 entries); source Salzgeber Ch. 1996; lognormal variance with pedigree 0.1246, pedigree (3,3,5,5,4)
  (same comment as for wastewater, average)
  production volume 768632 m3
- tap water: 0.022437, 0.000523423, 0.000104128, 0.0026257, 6.83068e-5, 0.000194298, 0.0300472 kg (7 entries); source Salzgeber Ch. 1996; lognormal variance with pedigree 0.1246, pedigree (3,3,5,5,4)
  (same comment as for tap water)

## Inputs from nature
- Transformation, to industrial area [natural resource, land]: 1e-6 m2; source UFA 2002; lognormal variance with pedigree 0.1646, pedigree (3,3,5,5,1)
  Estimation. Corresponds to occupation industrial area/50 years (the lifetime of the storage silo was assumed to be 50 years).
- Transformation, from unspecified [natural resource, land]: 1e-6 m2; source UFA 2002; lognormal variance with pedigree 0.1646, pedigree (3,3,5,5,1)
  (same comment as for Transformation, to industrial area)
- Occupation, industrial area [natural resource, land]: 5e-5 m2*year; source UFA 2002; lognormal variance with pedigree 0.0846, pedigree (3,3,5,5,1)
  Estimation. Corresponds to 0.2m2/tonne (because the total area occupied as “industrial area” was estimated as twice as high, namely 0.2 m2/tonne) multiplied by 3 months (because the average length of storage of the raw materials is set at 3 months in the calculations).
- Occupation, construction site [natural resource, land]: 2e-6 m2*year; source UFA 2002; lognormal variance with pedigree 0.0846, pedigree (3,3,5,5,1)
  Estimation. Corresponds to land use Transformation*2 years (the length of the construction phase is 2 years).

## Emissions to nature
- Water [air, unspecified]: 1.8e-5 m3; lognormal variance with pedigree 0.0827, pedigree (2,2,5,5,1)
  Emission calculated from tap water input and wastewater generation for water balance.

## Sampling procedure
Data based on literature, trade statistics and information from feedstuff processing enterprises.

## Extrapolations
This dataset has been extrapolated from an original dataset covering the geography GLO and the technology of organic barley feed production, which was already extrapolated from the geography CH and the technology of organic barley feed production with uncertainty adjustments. Production volume has been adjusted for oat feed. The technology of grain processing can be assumed the same for conventional grain as for organic grain, hence no change is made to the technology-related uncertainty index. Furthermore, the geography-related uncertainty index still remains to "5" since data originate from a CH geography. Note that exchange properties of the reference product (carbon and water contents) are the same as the input grain, as it is also the case for the original dataset. No loss of grain is considered, due to lack of comprehensive data.
