# water supply network construction

Dataset: EcoSpold 2, unit process
Geography: RoW
Time period: 2012-01-01 to 2019-12-31
Technology level: current
Classification: ISIC rev.4 ecoinvent: 4220:Construction of utility projects
Classification: EcoSpold01Categories: water supply/production
Scenario: Business-as-Usual
System model: Allocation at the point of substitution
Share of production covered: 10 %
Generated by: Marylène Dussault
Published in: Althaus H.-J. 2004
Database: ecoinvent
isCopyrightProtected: true
accessRestrictedTo: 1

## General comment
This datasets represents the construction of a water distribution network in an average town, providing water to households and industries. The dataset is based on two sources. The first source is data from a CH company, which was also the basis for preceding versions of this dataset (v3.0 and below). The second source is the “Anytown Water Distribution Network” distribution network model (http://emps.exeter.ac.uk/engineering/research/cws/resources/benchmarks/expansion/anytown.html), which is meant to represent a typical, generic medium-sized town transporting 5334 m3/day over a 69.53 km network. The Anytown model was used to update the data for cast iron (pipes) and to add reinforced concrete associated with two 591 m3 tanks. Life time of infrastructure is estimated at 70 years. Operation and maintenance of network is not considered and should be considered in the tap water production market dataset.

## Included activities start
This activity starts with the excavation required to put in infrastructure.

## Included activities end
This dataset ends at end of life of infrastructure. It includes materials (pipes with coating, tanks), excavation, and end-of-life disposal of infrastructure materials. Estimation for building process. Connectors to end-users, plumbing at end-users are excluded, as are brass and Zinc at end of life. No land use for construction work. Operation of infrastructure also excluded.

## Geography
Data provided by a CH company in Marin (NE).

## Technology
Supply network for drinking water.

## Parameters
- global tap water yearly production volume: 7.74e14 m3; name global_tap_water_PV; lognormal variance with pedigree 0.0106, pedigree (3,5,1,1,1)
  http://www.worldometers.info/water/

## Reference product
- water supply network: 1 km; name RefFlow; CPC 53253: Sewage and water treatment plants; By-product classification allocatable product
  EcoSpold01Location=CH
  production volume 394613 km; name PV; = (RefFlow_length /(RefFlow_lifetime * RefFlow_amount_per_year))*global_tap_water_PV
    Estimated value, based on generic distributed amount over generic distribution network (both from Anytown model), assumed network lifetime of 70 years and approximation of global potable water production.
  property length 69.53 km; name RefFlow_length
    length, based on Anytown network.
  property lifetime 70 year; name RefFlow_lifetime
    Assumed lifetime of infrastructure, in years.
  property price 851974 EUR2005; name RefFlow_price_EUR2005
    Convert from EU 27 price to the world by currency exchange rate.
  property yearly_distributed_amount 1.94824e9 kg; name RefFlow_amount_per_year; = 5334*UnitConversion(1, 'm3', 'l')*365.25
    Amount distributed per year, in kg, based on Anytown network
  property true value 851974; name RefFlow_true_value
    allocation property applied in "true value" allocation // value calculated from revenue

## By-products
- heat, for reuse in municipal waste incineration only: 0 MJ; CPC 17300: Steam and hot water; By-product classification allocatable product; pedigree (1,1,1,1,1)
  Net electricity generated from this waste and used in internal MSWI plant energy redistribution.
  Uncertainty: uncertainty is calculated from uncertainties in waste composition and uncertainties in energy efficiency and the uncertainty in internal energy demand
  production volume 1.9377e9 MJ
  property exergy 0.1842 MJ; name E_th_prod_MSWI_exergy
    This exergy property is based on the exergy content of the product.
  property price 0.0106 EUR2005; name E_th_prod_MSWI_price_EUR2005
    Average European district heat price from Ecoheatcool and Euroheat 2005-2006, Ecoheat Work package 1: The European heat market. Final report. 10.6 EUR/GJ i s the price of district heat. http://www.solarthermalworld.org/files/Ecoheatcool%20WP1%20Web.pdf?download
  property true value relation 0.1842; name E_th_prod_MSWI_true_value_relation
    property to calculate "true value" from
  property true value 30.0734
    allocation property applied in "true value" allocation // value calculated from true value relation
- electricity, for reuse in municipal waste incineration only: 0 kWh; CPC 17100: Electrical energy; By-product classification allocatable product; pedigree (1,1,1,1,1)
  (same comment as for heat, for reuse in municipal waste incineration only)
  production volume 2.76634e8 kWh
  property exergy 3.6 MJ; name E_el_prod_MSWI_exergy
    This exergy property is based on the exergy content of the product.
  property true value relation 3.6; name E_el_prod_MSWI_true_value_relation
    property to calculate "true value" from
  property price 0.1 EUR2005; name E_el_prod_MSWI_price_EUR2005
    Estimated to be the same price as in case of electricity, medium voltage.
  property true value 83.9471
    (same comment as for heat, for reuse in municipal waste incineration only)
- iron scrap, sorted, pressed: 0 kg; By-product classification Recyclable; CPC 39310: Slag, dross, scalings and other waste from the manufacture of iron or steel; pedigree (1,1,1,1,1)
  Iron scrap recovered from this waste.
  production volume 9.77536e6 kg
  property price 0.175 EUR2005
    Temporary price data. Calculated as 90% of purchasers price based on: 2005 import and export prices (total trades (USD) divided by total weight (kg) in biggest economies of the world: EU27, USA, Brasil, China, India, Japan and Russia) from UN Commodity Trade Statistics Database (http://data.un.org/Explorer.aspxDatabase [Accessed 2011.06.20]). Commodity: Waste or scrap, of cast iron
  property carbon content 0
    carbon content on a dry matter basis (reserved; not for manual entry)
  property true value 4.31774
    allocation property applied in "true value" allocation // value calculated from revenue
  properties: water content 0, water in wet mass 0 kg, carbon content, fossil 0, dry mass 1 kg, carbon content, non-fossil 0, wet mass 1 kg, carbon allocation 0 kg

## Inputs from technosphere
- steel, chromium steel 18/8, hot rolled: 12.2713 kg; name Cr_steel; lognormal variance with pedigree 0.0152, pedigree (2,3,3,5,1)
  EcoSpold01Location=RER
  Literature
  Uncertainty: Literature
  properties: wet mass 1 kg, dry mass 1 kg, carbon content, fossil 0.0008
  note on carbon content, fossil: Stainless steel model is the grade 304 steel (18/8 stainless, 18% chromium 8% nickel; max. 0.08% C)
- polyurethane, rigid foam: 535.016 kg; name Polyurethane; lognormal variance with pedigree 0.0152, pedigree (2,3,3,5,1)
  EcoSpold01Location=RER
  Literature
  Uncertainty: Literature
  properties: carbon content, fossil 0.69089, wet mass 1 kg, dry mass 1 kg
  note on carbon content, fossil: Polyurethanes (PUR) is the collective name for an extensive group of polymers with very different compositions and correspondingly varied property profiles, though their molecule chain contains all a urethane group (-NH-CO-O-). All PURs are built on a common principle : they are produced by the diisocyanate polyaddition process, that links polyols and (di)isocyanates. In this dataset, an example of typical polyurethane mixture is described (Ullmann, Polyurethanes, Dieterich et al. & ecoinvent v2 report 11_II). C content was calculated as an addition of C contents in its components.
- waste bitumen sheet: -535.016 kg; name W_bitumen; = (Bitumen)*-1; lognormal variance with pedigree 0.002, pedigree (1,1,3,1,1)
  Materials at end of life. Amount based on inputs.
  EcoSpold01Location=CH
  Uncertainty: Calculated value. Uncertainty calculated from that of underlying parameters,
  production volume 2.11153e8 kg; = PV*(W_bitumen/RefFlow)
    Calculated from the production volume of water supply network in proportion to the respective output amounts.
  property price 0 EUR2005; name W_bitumen_price_EUR2005
  properties: wet mass 1 kg, carbon content, fossil 0.643207, dry mass 0.985 kg, water content 0.0152284
  note on carbon content, fossil: The bitumen sheet is made of 63% bitumen, 24% surface spread and filler (assumed to be pure SiO2), 6% carrier fleece (assumed to be PE) and 7% elastomer (assumed to be PS) (ecoinvent v2.2 report 13_I, pg 40). C content of bitumen, PE and PS from Tab A.6 and A.1 (ecoinvent v2.2 report 13_I, pg 40), respectively. C content of waste also given in the dataset
- reinforcing steel: 88.0528 kg; name ReinfSteel; source Walski, T. M. 1987; lognormal variance with pedigree 0.0986, pedigree (4,5,5,5,4)
  Literature value. Value taken from AnyTown - For tanks (reinforced conrete). It is calculated as 2% of the mass of concrete. This value of 2% represents average reinforcing steel content of structural concrete equipment in water treatment as estimated by an expert. AnyTown model was originally published by (Walski, T. M., 1987) and is available online at http://emps.exeter.ac.uk/engineering/research/cws/resources/benchmarks/expansion/anytown.html.
  Uncertainty: Theoretical data for simulations, representing typical generic mid-sized town
  properties: carbon content, fossil 0.004, wet mass 1 kg, dry mass 1 kg
- brass: 2.1755 kg; name Brass; lognormal variance with pedigree 0.0152, pedigree (2,3,3,5,1)
  Literature
  EcoSpold01Location=CH
  Uncertainty: Literature
  properties: dry mass 1 kg, wet mass 1 kg
- tetrafluoroethylene: 0.0593858 kg; name C2F4; lognormal variance with pedigree 0.0152, pedigree (2,3,3,5,1)
  EcoSpold01Location=RER
  Literature
  Uncertainty: Literature
  properties: carbon content, fossil 0.24, dry mass 1 kg, wet mass 1 kg
- bitumen seal: 535.016 kg; name Bitumen; lognormal variance with pedigree 0.0152, pedigree (2,3,3,5,1)
  Literature
  EcoSpold01Location=RER
  Uncertainty: Literature
  properties: wet mass 1 kg, carbon content, fossil 0.643968, dry mass 1 kg
  note on carbon content, fossil: It was considered that the production of bitumen sealing does not include any chemical processes (ecoinvent v2.2 report 7_part XXIII). Therefore, C content of bitumen sealing was calculated as a weighted average of C content of the different components listed in Tab 15.2, ecoinvent v2.2 report 8-part 15
- waste plastic, mixture: 0 kg; name W_plastics; pedigree (1,1,1,1,1)
  Materials (tetrafluoroethylene) at end of life. Amount based on inputs.
  EcoSpold01Location=CH
  Uncertainty: Calculated value. Uncertainty calculated from that of underlying parameters,
  production volume 0 kg
    (same comment as for waste bitumen sheet)
  property price 0 EUR2005; name W_plastics_price_EUR2005
  properties: dry mass 0.847 kg, carbon content, fossil 0.747344, wet mass 1 kg, water content 0.180638
  note on carbon content, fossil: C content in 1 kg DM was calculated using data in Tab A.2, ecoinvent v2.2 report 13_I
- waste reinforcement steel: -84001.3 kg; name W_reinfSteel; = (CastIron)*-1; lognormal variance with pedigree 0.002, pedigree (1,1,3,1,1)
  (same comment as for waste bitumen sheet)
  production volume 3.31526e10 kg; = PV*(W_reinfSteel/RefFlow)
    (same comment as for waste bitumen sheet)
  property price 0 EUR2005; name W_reinfSteel_price_EUR2005
  properties: dry mass 1 kg, wet mass 1 kg
- synthetic rubber: 33.0824 kg; name Rubber; lognormal variance with pedigree 0.0152, pedigree (2,3,3,5,1)
  Literature
  EcoSpold01Location=RER
  Uncertainty: Literature
  properties: carbon content, fossil 0.871949, wet mass 1 kg, dry mass 1 kg
  note on carbon content, fossil: EPDM (Ethylene-propene-diene terpolymer) rubber is a terpolymer of ethylene, propene, and a diene with the residual unsaturated portion of the diene in the side chain (ecoinvent v2.2 report 7-part XX & Ullmann). Chemical formula (deduced from Evidences of Solvent-Induced Miscibility in Polychloroprene-co-Ethylene-Propene Diene Terpolymer Blends, Dubey et al., Journal of Applied Polymer Science, 2009, 111:1884–1891): C20H35
- waste bulk iron, excluding reinforcement: 0 kg; name W_iron; pedigree (1,1,1,1,1)
  Materials (Chromium steel) at end of life. Amount based on inputs.
  Uncertainty: Calculated value. Uncertainty calculated from that of underlying parameters,
  production volume 0 kg
    Calculated from production volume of reference product using the relative outputs.
  property price 0 EUR2005; name W_iron_price_EUR2005
  properties: dry mass 1 kg, wet mass 1 kg
- excavation, hydraulic digger: 5446.24 m3; lognormal variance with pedigree 0.08, pedigree (3,5,5,5,3)
  Rough estimation with data for class 3 sewer system
  EcoSpold01Location=RER
  Uncertainty: Rough estimation with data for class 3 sewer system
- diesel, burned in building machine: 29345.9 MJ; lognormal variance with pedigree 0.08, pedigree (3,5,5,5,3)
  Rough estimation with data for class 3 sewer system
  EcoSpold01Location=GLO
  Uncertainty: Rough estimation with data for class 3 sewer system
- waste reinforced concrete: 0 kg; name wasteConcrete; pedigree (1,1,1,1,1)
  Materials at end of life. Amount based on inputs. Density of concrete is 2440 kg/m3
  Uncertainty: Calculated value. Uncertainty calculated from that of underlying parameters,
  production volume 0 kg
    Calculated from production volume of reference product using the relative outputs.
  property price 0 EUR2005; name wasteConcrete_price_EUR2005
  properties: dry mass 0.99418 kg, wet mass 1 kg, water content 0.00585407
- waste rubber, unspecified: 0 kg; name W_rubber; pedigree (1,1,1,1,1)
  EcoSpold01Location=CH
  Materials at end of life. Amount based on inputs.
  Uncertainty: Calculated value. Uncertainty calculated from that of underlying parameters,
  production volume 0 kg
    (same comment as for waste bitumen sheet)
  property price 0 EUR2005; name W_rubber_price_EUR2005
  properties: dry mass 1 kg, carbon content, fossil 0.853, wet mass 1 kg
- zinc: 146.65 kg; name Zinc; lognormal variance with pedigree 0.0152, pedigree (2,3,3,5,1)
  Literature
  EcoSpold01Location=RER
  Uncertainty: Literature
  properties: wet mass 1 kg, dry mass 1 kg
- waste polyurethane: 0 kg; name W_polyure; pedigree (1,1,1,1,1)
  (same comment as for waste bitumen sheet)
  production volume 0 kg
    (same comment as for waste bitumen sheet)
  property price 0 EUR2005; name W_polyure_price_EUR2005
  properties: wet mass 1 kg, water content 0.00200401, dry mass 0.998 kg, carbon content, fossil 0.641283
  note on carbon content, fossil: C content was calculated for 1 kg DM, using data in Tab A.2, ecoinvent v2.2 report 13_I.
- concrete, normal: 0 m3; name Concrete; source Walski, T. M. 1987; pedigree (1,1,1,1,1)
  Literature value. Value taken from AnyTown - For tanks. AnyTown model was originally published by (Walski, T. M., 1987) and is available online at http://emps.exeter.ac.uk/engineering/research/cws/resources/benchmarks/expansion/anytown.html.
  Uncertainty: Theoretical data for simulations, representing typical generic mid-sized town
  properties: water content 0.086758, dry mass 2190 kg, wet mass 2380 kg
- cast iron: 84001.3 kg; name CastIron; source Walski, T. M. 1987; lognormal variance with pedigree 0.0986, pedigree (4,5,5,5,4)
  EcoSpold01Location=RER
  Literature value. Value taken from AnyTown model- For pipes.
  AnyTown model was originally published by (Walski, T. M., 1987) and is available online at http://emps.exeter.ac.uk/engineering/research/cws/resources/benchmarks/expansion/anytown.html.
  Uncertainty: Theoretical data for simulations, representing typical generic mid-sized town
  properties: dry mass 1 kg, wet mass 1 kg, carbon content, fossil 0.04
  note on carbon content, fossil: Cast iron is made by remelting pig iron in small furnaces (e.g. cupola furnaces or electric arc furnaces) and poured into moulds to make castings. It usually contains 2% to 6% carbon (ecoinvent v2.2 report 10_partII). An average content of 4% was considered
- waste plastic, mixture: -0.00660618, -0.0004414, -3.33823e-5, -0.000182314, -7.36527e-5, -0.000173124, -0.00562877, -0.0462469 kg (8 entries); lognormal variance with pedigree 0.002, pedigree (1,1,3,1,1)
  (same comment as for waste plastic, mixture)
  production volume 23437.6 kg
- waste bulk iron, excluding reinforcement: -3.9849, -8.2864 kg (2 entries); lognormal variance with pedigree 0.002, pedigree (1,1,3,1,1)
  (same comment as for waste bulk iron, excluding reinforcement)
  production volume 4.84309e6 kg
- waste reinforced concrete: -270.479, -3860.21 kg (2 entries); lognormal variance with pedigree 0.002, pedigree (1,1,3,1,1)
  (same comment as for waste reinforced concrete)
  production volume 1.63025e9 kg
- waste rubber, unspecified: -16.5412, -16.5412 kg (2 entries); lognormal variance with pedigree 0.002, pedigree (1,1,3,1,1)
  (same comment as for waste rubber, unspecified)
  production volume 1.30565e7 kg
- waste polyurethane: -59.5161, -3.97664, -0.300747, -1.64249, -0.663549, -1.5597, -50.7105, -416.646 kg (8 entries); lognormal variance with pedigree 0.002, pedigree (1,1,3,1,1)
  (same comment as for waste bitumen sheet)
  production volume 2.11153e8 kg
- concrete, normal: 0.0414371, 0.00431769, 0.0349547, 0.019662, 0.0832632, 0.00280842, 1.61831 m3 (7 entries); source Walski, T. M. 1987; lognormal variance with pedigree 0.0986, pedigree (4,5,5,5,4)
  (same comment as for concrete, normal)

## Sampling procedure
Amounts for cast iron and reinforced concrete taken from the distribution network modelled with AnyTown (first published by Walski, T. M. (1987) and available on-line at http://emps.exeter.ac.uk/engineering/research/cws/resources/benchmarks/expansion/anytown.html). This model represents an average town formed around an old centre and a surrounding residential area, with some existing industries, and is used for economic simulation by hydraulic experts. The other flows are based on literature and estimations based on data from a single Swiss company.

## Extrapolations
Cast iron and reinforced concrete : From Anytown. The other flows: From single data to Swiss situation, copied from an original dataset covering the geography CH. The uncertainty has been adjusted accordingly.
