# water production, deionised

Dataset: EcoSpold 2, unit process
Geography: Europe without Switzerland
Time period: 2012-01-01 to 2019-12-31
Technology level: current
Classification: ISIC rev.4 ecoinvent: 3600:Water collection, treatment and supply
Synonyms: Demineralized water
Scenario: Business-as-Usual
System model: Allocation at the point of substitution
Generated by: Laura Rubio
Published in: Gmünder S. 2017
Database: ecoinvent
isCopyrightProtected: false
accessRestrictedTo: 1

## General comment
This dataset represents the production of 1 kg of deionised water, delivered at the user, by ion exchange.

This dataset is a copy of the GLO deionised water production dataset.

Deionised (DI) water, also known as demineralized water has become an essential ingredient in many applications as is water that has had almost all its mineral ions removed (such as iron, sodium, calcium, copper, sulphate, chloride among others). It is typically used in cooling systems, machines lubrication, cosmetic and pharmaceutical sectors, medicine production, food processing and countless other industrial processes. The quality of water needed in the different applications varies considerably. E.g., the conductivity (used as quality parameter) for demineralised water is 1-10 μS cm-1. Such water is used as boiler feed water for boilers up to 30 bar pressure. On the other hand, the conductivity of completely demineralised water is in the range of 0.055-1.0 μS cm-1. The purest water is used within the waver and electronic circuit production. For the process analysed in this inventory the production plants includes an strong type anionic resion or combined cation/anion exchange resin. Such systems obtain, by operation with counterflow regeneration. The ion exchanger resin is essential throughout the operation of the system; large amounts of salt may be necessary for regenerationing it. Energy usage is required for pumping and mixing. Large uncertainties exist due to the influence of raw water quality and operation mode on the regeneration chemical demand and electricity used.
Reference:
Althaus H.-J., Chudacoff M., Hischier R., Jungbluth N., Osses M. and Primas A. (2007) Life Cycle Inventories of Chemicals. ecoinvent report No. 8, v2.0. EMPA Dübendorf, Swiss Centre for Life Cycle Inventories, Dübendorf, CH.
de Dardel, F. and Arden, T. V. 2008. Ion Exchangers. Ullmann's Encyclopedia of Industrial Chemistry.
[This dataset is meant to replace the following datasets:
- water production, deionised, from tap water, at user, Europe without Switzerland, 1992 - 2002]

## Included activities start
The activity starts when the raw materials enter the process.

## Included activities end
This activity ends with the production of deionised water. The dataset includes the energy for operation, chemicals used for regeneration, emissions from regeneration chemicals, infrastructure of the plant and replacement of spent exchange resin. The process does not include very small units (cartridges) or very large units with >>100 m3/h (power stations). Other production methods, such as reverse osmosis, electrodialysis or distillation, are not covered with this process (which represents only ion exchange).The concentration of the chemicals in the treated water is assumed to be negligible

## Geography
The inventory is modelled from two LCA studies one in the United States and the other one in South Africa, to the rest of the world.

## Technology
The process includes an anionic resion or combined cation/anion exchange resin. The unit is operated with counterflow regeneration. Obtained water quality: about 1-0.1 uS/ cm for the conductivity and a silica content (as SiO2) of 5-25 ug/l. For the water source, tap water from a public supply with a total hardness of 1.71 mol/m3 (range 0.7 - 3.2) was assumed.
Reference:
Althaus H.-J., Chudacoff M., Hischier R., Jungbluth N., Osses M. and Primas A. (2007) Life Cycle Inventories of Chemicals. ecoinvent report No. 8, v2.0. EMPA Dübendorf, Swiss Centre for Life Cycle Inventories, Dübendorf, CH.

## Time period
The time period is set from 2012 to the year 2017 as it is considered to be a period in which deionised treatment plants have not passed through drastical technological changes.

## Reference product
- water, deionised: 1 kg; name RP; CPC 18000: Natural water; By-product classification allocatable product; CAS 7732-18-5
  Deionised water which is free of mineral salts. Deionised (Dl) water has become an essential ingredient in many applications including: medical, laboratory, pharmaceutical, cosmetics, electronics manufacturing, food processing, plating and countless other industrial processes.
  Reference:
  Althaus H.-J., Chudacoff M., Hischier R., Jungbluth N., Osses M. and Primas A. (2007) Life Cycle Inventories of Chemicals. ecoinvent report No. 8, v2.0. EMPA Dübendorf, Swiss Centre for Life Cycle Inventories, Dübendorf, CH.
  production volume 1.7854e12 kg; = 1.7854E+14*0.01
    Estimated value based on the total industrial water withdrawal according to AQUASTAT and assuming that 1% of the industrial water withdrawal is used for deionised water production.
    Source for industrial water withdrawals: Table 7.1 in World Water Assessment Programme. 2009. The United Nations World Water Development Report 3: Water in a Changing World. Paris: UNESCO, and London: Earthscan.
    Industrial water withdrawals value was taken from the AQUASTAT (FAO's global water information system, developed by the Land and Water Division and the most quoted source on global water statistics). This value comprises industrial water withdrawal which can include water from primary renewable and secondary freshwater resources, as well as water from over-abstraction of renewable groundwater or withdrawal from fossil groundwater, direct use of agricultural drainage water, direct use of (treated) wastewater, and desalinated water. This sector refers to self-supplied industries not connected to the public distribution network. The ratio between net consumption and withdrawal is estimated at less than 5%. It includes water for the cooling of thermoelectric and nuclear power plants, but it does not include hydropower. Water withdrawn by industries that are connected to the public supply network is generally included in municipal water withdrawal.
  property price 0.000184118 EUR2005
    Calculated based on inputs: The price of the product has been calculated as a sum of the values of the material and energy inputs for this product. This value is therefore a rough estimation. It may underestimate the real price since there are additional expenses when producing any product. These expences can include for example labour costs, treatment of waste materials and profit for the producer. Please consider carefully whether this level of data quality is acceptable for your application.
  property carbon content 0
    carbon content on a dry matter basis (reserved; not for manual entry)
  property true value 0.000184118; name RP_true_value
    allocation property applied in "true value" allocation // value calculated from revenue
  properties: dry mass 0 kg, wet mass 1 kg, carbon content, fossil 0, water in wet mass 1 kg, carbon content, non-fossil 0, carbon allocation 0 kg

## By-products
- heat, for reuse in municipal waste incineration only: 0 MJ; CPC 17300: Steam and hot water; By-product classification allocatable product; pedigree (1,1,1,1,1)
  Net electricity generated from this waste and used in internal MSWI plant energy redistribution.
  Uncertainty: uncertainty is calculated from uncertainties in waste composition and uncertainties in energy efficiency and the uncertainty in internal energy demand
  production volume 9.20089e6 MJ
  property exergy 0.1842 MJ; name E_th_prod_MSWI_exergy
    This exergy property is based on the exergy content of the product.
  property price 0.0106 EUR2005; name E_th_prod_MSWI_price_EUR2005
    Average European district heat price from Ecoheatcool and Euroheat 2005-2006, Ecoheat Work package 1: The European heat market. Final report. 10.6 EUR/GJ i s the price of district heat. http://www.solarthermalworld.org/files/Ecoheatcool%20WP1%20Web.pdf?download
  property true value relation 0.1842; name E_th_prod_MSWI_true_value_relation
    property to calculate "true value" from
  property true value 3.39758e-8
    allocation property applied in "true value" allocation // value calculated from true value relation
- electricity, for reuse in municipal waste incineration only: 0 kWh; CPC 17100: Electrical energy; By-product classification allocatable product; pedigree (1,1,1,1,1)
  (same comment as for heat, for reuse in municipal waste incineration only)
  production volume 1.2779e6 kWh
  property price 0.1 EUR2005; name E_el_prod_MSWI_price_EUR2005
    Estimated to be the same price as in case of electricity, medium voltage.
  property exergy 3.6 MJ; name E_el_prod_MSWI_exergy
    This exergy property is based on the exergy content of the product.
  property true value relation 3.6; name E_el_prod_MSWI_true_value_relation
    property to calculate "true value" from
  property true value 9.22252e-8
    (same comment as for heat, for reuse in municipal waste incineration only)
- biogas: 0 m3; By-product classification allocatable product; CPC 17200: Coal gas, water gas, producer gas and similar gases, other than petroleum gases and other gaseous hydrocarbons
  EcoSpold01Location=CH
  production volume 6.57595e8 m3
  property price 0.109 EUR2005
    Temporary price data. Calculated as 90% of purchasers price based on: Same prices per energy output as natural gas, based on the proportional lower heating value (2/3 that of natural gas)
  property carbon content, non-fossil 0.449939
    Total C content in kg/Nm3 (Tab 12.8, ecoinvent v2.2 report n17), referred to 1kg DM
  property carbon content 0.449939
    carbon content on a dry matter basis (reserved; not for manual entry)
  property true value 4.01467e-5
    allocation property applied in "true value" allocation // value calculated from revenue
  properties: wet mass 1.15 kg, water in wet mass 0 kg, dry mass 1.15 kg, water content 0, carbon content, fossil 0, carbon allocation 0.51743 kg

## Inputs from technosphere
- wastewater, unpolluted: -6.58904e-5 m3; = (((water_input + water_input2) - RP/1000 - WWM_BP01*(sewage_sludge*-1)/1000)*0.85)*-1; lognormal variance with pedigree 0.0072, pedigree (1,4,3,5,2)
  Estimated value based on water balance ( WaterIN - Water Out)
  production volume 1.43373e8 m3; = Ref('ae3f0d4a-c6fd-4f79-99a4-1b69486166e7', 'ProductionVolume') * ((Ref('f9acf5d2-7183-4b33-9495-fdb52955ea2e')*-1) / RP)
    Calculated from production volume of reference product using the relative outputs.
  properties: carbon content, non-fossil 0.00178991, wet mass 1000 kg, dry mass 0.337476 kg, carbon content, fossil 0.00178991, water content 2962.17
  note on carbon content, fossil: Assumed to be like in tap water. Bicarbonate content is 2.93 mol/m3. CO2 content is 0.1 mol/m3 (ecoinvent v2.2 report 8, Tab 93.1).
- hydrochloric acid, without water, in 30% solution state: 3.10979e-5 kg; name hydrochloric_acid; lognormal variance with pedigree 0.0072, pedigree (1,4,3,5,2)
  Calculated value based on two LCA studies: A comparative life cycle assessment of process water treatment technologies at the Secunda industrial complex, South Africa (Ras & Blottnitz, 2012) and The Sustainability of Ion Exchange Water treatment Technology (Amin, 2016).
  properties: dry mass 1 kg, wet mass 1 kg
- sewage sludge: -1.82156e-5 m3; name sewage_sludge; = ((water_input + water_input2)*0.02)*-1; lognormal variance with pedigree 0.1629, pedigree (2,2,2,5,5)
  Estimated value based on the EPA guideline "Drinking Water Treatment Plant Residuals Management Technical Report" in which typical lime softening sludge volumes produced by water treatment plants are computed. 2% of the total water input was assumed as the produced sludge. The sludge contains calcium carbonate, magnesium hydroxide, other divalent ions, natural organic matter from the source water, inorganics, suspended solids, microorganisms, and radionuclides. Metals found in the softening sludges include calcium, magnesium, arsenic, barium, cadmium, chromium, lead, mercury, selenium, and silver (Cornwell, 1999). (retrieved from: https://www.epa.gov/sites/production/files/2015-11/documents/dw-treatment-residuals-mgmt-tech-report-sept-2011.pdf)
  production volume 3.96359e7 m3; = Ref('ae3f0d4a-c6fd-4f79-99a4-1b69486166e7', 'ProductionVolume') * ((Ref('90a23ea6-82c7-4ed7-af77-e27025370d3a')*-1) / RP)
    Calculated from production volume of reference product using the relative outputs.
  property price 0 EUR2005; name sewage_sludge_price_EUR2005
  property dry mass 21.63 kg; name DM_BP01; = 0.03*WM_BP01
  property wet mass 721 kg; name WM_BP01
  property water in wet mass 699.37 kg; name WWM_BP01; = WM_BP01 - DM_BP01
  properties: carbon content, non-fossil 0.4096, water content 32.3333
- sodium hydroxide, without water, in 50% solution state: 7.3601e-5 kg; name sodium_hydroxide; lognormal variance with pedigree 0.0186, pedigree (1,5,3,5,2)
  (same comment as for hydrochloric acid, without water, in 30% solution state)
  properties: wet mass 1 kg, dry mass 1 kg
- electricity, medium voltage: 2.13336e-5 kWh; lognormal variance with pedigree 0.0072, pedigree (1,4,3,5,2)
  Calculated value based on two LCA studies: A comparative life cycle assessment of process water treatment technologies at the Secunda industrial complex, South Africa (Ras & Blottnitz, 2012) and The Sustainability of Ion Exchange Water treatment Technology (Amin, 2016). Energy values range from 3.96E-05 MJ/kg to 4.59E-04 MJ/kg.
- aluminium sulfate, without water, in 4.33% aluminium solution state: 1.97746e-5 kg; name aluminium_sulfate; lognormal variance with pedigree 0.0072, pedigree (1,4,3,5,2)
  (same comment as for hydrochloric acid, without water, in 30% solution state)
  properties: dry mass 1 kg, wet mass 1 kg
- sulfuric acid: 0.00015672 kg; name sulfuric_acid; lognormal variance with pedigree 0.2106, pedigree (5,5,5,5,5)
  (same comment as for hydrochloric acid, without water, in 30% solution state)
  properties: wet mass 1 kg, dry mass 1 kg
- steam, in chemical industry: 1.07489e-5 kg; name steam; lognormal variance with pedigree 0.0072, pedigree (1,4,3,5,2)
  (same comment as for hydrochloric acid, without water, in 30% solution state)
  properties: dry mass 1 kg, wet mass 1 kg
- ion-exchanger for water treatment: 7.38471e-11 unit; lognormal variance with pedigree 0.0126, pedigree (1,4,3,5,2)
  Literature value, copied from the existing dataset " water production, deionised, from tap water, at user, GLO" (accessed in 20171201) as it was also considered adequate for this dataset.
  Reference:
  Althaus H.-J., Chudacoff M., Hischier R., Jungbluth N., Osses M. and Primas A. (2007) Life Cycle Inventories of Chemicals. ecoinvent report No. 8, v2.0. EMPA Dübendorf, Swiss Centre for Life Cycle Inventories, Dübendorf, CH.
- sodium chloride, powder: 9.18987e-5 kg; name sodium_chloride; lognormal variance with pedigree 0.0072, pedigree (1,4,3,5,2)
  (same comment as for hydrochloric acid, without water, in 30% solution state)
  properties: dry mass 1 kg, wet mass 1 kg
- magnesium oxide: 7.49959e-6 kg; name magnesium_oxide; lognormal variance with pedigree 0.0072, pedigree (1,4,3,5,2)
  (same comment as for hydrochloric acid, without water, in 30% solution state)
  properties: dry mass 1 kg, wet mass 1 kg

## Inputs from nature
- Water, well, in ground [natural resource, in water]: 0.000471801 m3; name water_input; lognormal variance with pedigree 0.0072, pedigree (1,4,3,5,2)
  (same comment as for hydrochloric acid, without water, in 30% solution state)
- Water, river [natural resource, in water]: 0.00043898 m3; name water_input2; = 1.11/1000-water_input; lognormal variance with pedigree 0.0072, pedigree (1,4,3,5,2)
  (same comment as for hydrochloric acid, without water, in 30% solution state)

## Emissions to nature
- Aluminium [water, surface water]: 3.1188e-6 kg; = aluminium_sulfate/342.15*(26.9815*2); lognormal variance with pedigree 0.28, pedigree (5,5,5,5,5)
  Calculated value. Stoechiometric calculations were used to calculate the emissions to water based on the type and amount of chemicals used. Since the actual fate of the chemical is unknown, it was assume that all aluminum is emitted to the water (so basically remain in the water)
- Water [air, low population density, long-term]: 1.16385e-5 m3; name water_to_air; = (((water_input + water_input2) - RP/1000 - WWM_BP01*(sewage_sludge*-1)/1000)*0.15) + steam/1000; lognormal variance with pedigree 0.0072, pedigree (1,4,3,5,2)
  Calculated value based on literature values and expert opinion taken from the pre-existing dataset “water production, deionised, from tap water" (GLO) (accessed on the 2017-12-18) as it was also considered adequate for this dataset. 15% of water lost during production of deionised water is considered to be lost to air.
- Chloride [water, surface water]: 8.59909e-5 kg; = hydrochloric_acid/36.45*35.45+ sodium_chloride/58.44*35.45; lognormal variance with pedigree 0.28, pedigree (5,5,5,5,5)
  Calculated value. Stoechiometric calculations were used to calculate the emissions to water based on the type and amount of chemicals used.
- Magnesium [water, surface water]: 4.52252e-6 kg; = magnesium_oxide/40.3044*24.305; lognormal variance with pedigree 0.28, pedigree (5,5,5,5,5)
  Calculated value. Stoechiometric calculations were used to calculate the emissions to water based on the type and amount of chemicals used. Since the actual fate of the chemical is unknown, it was assume that all magnesium is emitted to the water (so basically remain in the water)
- Sodium, ion [water, surface water]: 7.84577e-5 kg; = sodium_hydroxide/39.9971*22.99+ sodium_chloride/58.44*22.99; lognormal variance with pedigree 0.28, pedigree (5,5,5,5,5)
  (same comment as for Chloride)
- Sulfate [water, surface water]: 5.55961e-6 kg; = aluminium_sulfate/342.15*(32.065*3); lognormal variance with pedigree 0.28, pedigree (5,5,5,5,5)
  Calculated value. Stoechiometric calculations were used to calculate the emissions to water based on the type and amount of chemicals used.Since the actual fate of the chemical is unknown, it was assume that all sulfate is emitted to the water (so basically remain in the water)

## Sampling procedure
Data for regeneration chemical, infrastucture and energy demand based mainly on two LCA studies.

References: A comparative life cycle assessment of process water treatment technologies at the Secunda industrial complex, South Africa (Ras & Blottnitz, 2012) and The Sustainability of Ion Exchange Water treatment Technology (Amin, 2016)

## Extrapolations
This dataset is a copy of the GLO deionised water production dataset.

From two LCA studies, one in the United States and the other one in South Africa, to Global deionised facilities. Data was used for updating chemicals, infrastucture and energy exchanges. Emission are assumed to be in a negligible concentration in the treated water, so they are modeled as emissions to water ( conservative assumption). The Uncertainty has been changed accordingly
