# concrete production 50MPa

Dataset: EcoSpold 2, unit process
Geography: RoW
Time period: 2017-01-01 to 2019-12-31
Technology level: current
Classification: EcoSpold01Categories: construction materials/concrete
Classification: ISIC rev.4 ecoinvent: 2395:Manufacture of articles of concrete, cement and plaster
Synonyms: ready-mix concrete; 50MPa ready mixed concrete; ready mixed concrete
Scenario: Business-as-Usual
System model: Allocation at the point of substitution
Generated by: [System]
Published in: Muigai, R. 2017
Database: ecoinvent
isCopyrightProtected: true
accessRestrictedTo: 1

## General comment
This dataset represents the production of South African 50MPa ready-mix concrete. Density: 2,232 kg/m³. The composition of concrete (for 1 m³) contains: Portland fly ash cement 545 kg, Water 157 kg, Gravel 950kg, Sand 737 kg, Admixtures (air-entrainers and superplastisizers) 2.96kg. [The amount of ingredients indicated here do not include the production waste amount of 24.5kg per 1m3 of concrete adopted from "concrete production, 50MPa, RNA only, GLO 2006" dataset [accessed on 2017/12/14 ]. The production waste volume is proportionally shared between the inputs: cement, sand and gravel. The adjusted input values are indicated in the exchange section. In addition, the amount of water included here refers to the batch water. Non-process water is adopted from "concrete production, 50MPa, RNA only, GLO 2006" dataset [accessed on 2017/12/14 ]]. 50 MPa concrete is Ultra high strength concrete is suitable for suspended structural beams and slabs, columns and water-retaining structures.

Annual production volume of Ready-Mix concrete for South Africa is published in www.statssa.gov.za.
Distribution by Ready-Mix concrete for South Africa is estimated based on a sample of 1% of ready-mix producers in SA. Distribution by ready-mix strength class is estimate as: • 15MPa = 3.6% 20 MPa = 4 %
• 25 MPa = 32 %
• 30 MPa = 49%
• 35 MPa = 4 %
• 40 MPa = 6 %
• 45 MPa = 0.1 %
• 50 MPa = 1.3%
This dataset is a copy of the corresponding ZA dataset. The production volume is set equal to the local activity so that the RoW is not created.

## Included activities start
From reception of raw materials at the ready-mix plant gate.

## Included activities end
This activity ends with the input of concrete in the mixing truck.
The dataset includes the whole manufacturing processes to produce ready-mixed concrete, internal processes (material handling and mixing) and infrastructure. The dataset does not include the transportation of concrete in the mixing truck. An average of 4.64 litres of diesel is used on average transportation of 1m3 concrete.

## Geography
South African data. For some exchanges RER-modules have been used as proxy. Data quality indicators adjusted accordingly.

## Technology
Typical technology for South Africa production.

## Parameters
- fraction_01: 0.8 dimensionless; name fraction_ethylene_oxide
  Literature value. Superplastisizer assumed to be 80% ehtlyne oxide. 20 MPa mix admixtures. Source: Athena and morrison Hershfield (2012): Life Cycle Assessment of Precast Concrete Commerical Buildings Cradle-to-Grave. Adopted from "20MPa, RNA only, CA-QC 2006" dataset on 2017/11/05
- fraction, process water, to air: 0.15 dimensionless; name fraction_PW_to_air
  Rough estimation to represent water evaporation of process water. Adopted from "20MPa, RNA only, CA-QC 2006" dataset on 2017/11/05
- fraction of 50 MPa concrete to overall concrete production: 0.013 dimensionless; name fraction_50MPa_concrete
  For Annual production volume purpose. Calculated value based on primary data collection in South Africa. In South Africa, 50MPa concrete represents 1.3% of the overall ready-mix concrete production.
- superplastisizer: 2.96 kg
  Estimated value from primary data collection
- fraction_02: 0.2 dimensionless; name fraction_acetic_acid
  Literature value. Superplastisizer assumed to be 20% acetic acid. 20 MPa mix admixtures. Source: Athena and morrison Hershfield (2012): Life Cycle Assessment of Precast Concrete Commerical Buildings Cradle-to-Grave. Adopted from "20MPa, RNA only, CA-QC 2006" dataset on 2017/11/05
- south africa concrete prod: 5.30815e6 m3; name PV_ready_mix_ZA
  Annual concrete production in South Africa
- fraction of 20 MPa concrete to overall concrete production: 0.04 dimensionless; name fraction_20MPa_concrete; lognormal variance with pedigree 0.0014, pedigree (2,2,1,3,1)
  For Annual production volume purpose. Calculated value based on primary data collection in South Africa. In South Africa, 20MPa concrete represents 4% of the overall ready-mix concrete production.

## Reference product
- concrete, 50MPa: 1 m3; name ref; CPC 37510: Non-refractory mortars and concretes; By-product classification allocatable product
  50 MPa concrete is Ultra high strength concrete is suitable for suspended structural beams and slabs, columns and water-retaining structures.
  production volume 1.2257e7 m3; name PV_ref
    The global production volume was calculated as follows:
    1) The total production volume of each country was calculated
    2) The production volume was scaled based construction output (*)
    3) The average of the results was assumed to be the GLO PV
    4) The share of each different technology per country was calculated
    5) The weighted average of the shares for each country was used to split the GLO PV into different technologies
    (*)
    Construction output assumed per country
    Country Share
    ZA 0.50%
    BR 2.01%
    CH 0.36%
    CO 0.58%
    IN 9.67%
    PE 0.31%
    CA-QC 0.37%
    RNA without CA-QC 9.03%
    Source:
    OECD. 2018. Input-Output Tables. http://www.oecd.org/trade/input-outputtables.htm.
    United Nations Statistics Division. 2019. UN data. A world of information. http://data.un.org/.
    Timmer, M.P., E. Dietzenbacher, B. Los, R. Stehrer, and G.J. de Vries. 2015. An Illustrated User Guide to the World Input-Output Database: the Case of Global Automotive Production. Review of International Economics 23(3): 575-605. http://doi.wiley.com/10.1111/roie.12178.
    The data was adjusted based on PPP, data from:
    The World Bank. 2019. World Bank Open Data. https://data.worldbank.org/
  property gravel content 950 kg; name gravel
    Calculated value. From primary data callection
  property cement content 545 kg; name cement
    Calculated value. From primary data callection
  property dry mass 2232 kg; name ref_DM; = sand+gravel+cement
  property carbon content, fossil 1e-51; name ref_C_content_fossil
    Estimated value to zero, based on components properties.
  property water in wet mass 157 kg; name ref_WWM; = batch_water
  property price 185 EUR2005; name ref_price_EUR2005
    Estimated to be the same price as in case of concrete, normal (Data are not easily available. Therefore, an average price of products supplied by the activities in the same ISIC 3 code has been applied.This price is obtained as '_49 Concrete, asphalt and other mineral products, EU27 virgin, EU27' in the 'EU & DK Input Output Database' (available in SimaPro). The price is assumed to be valid for both RER2003, RER 2004, world 2003 and world 2004. Multiplied by density.).
  property sand content 737 kg; name sand
    Calculated value. From primary data callection
  property water content 0.0703405; name ref_water_content; = ref_WWM/ref_DM
  property wet mass 2389 kg; name ref_WM; = ref_WWM+ref_DM
  property carbon content 1e-51
    carbon content on a dry matter basis (reserved; not for manual entry)
  property true value 185; name ref_true_value
    allocation property applied in "true value" allocation // value calculated from revenue
  properties: carbon allocation 2.232e-48 kg

## By-products
- electricity, for reuse in municipal waste incineration only: 0 kWh; CPC 17100: Electrical energy; By-product classification allocatable product; pedigree (1,1,1,1,1)
  Net electricity generated from this waste and used in internal MSWI plant energy redistribution.
  Uncertainty: uncertainty is calculated from uncertainties in waste composition and uncertainties in energy efficiency and the uncertainty in internal energy demand
  production volume 10357.7 kWh
  property exergy 3.6 MJ; name E_el_prod_MSWI_exergy
    This exergy property is based on the exergy content of the product.
  property true value relation 3.6; name E_el_prod_MSWI_true_value_relation
    property to calculate "true value" from
  property price 0.1 EUR2005; name E_el_prod_MSWI_price_EUR2005
    Estimated to be the same price as in case of electricity, medium voltage.
  property true value 0.000108573
    allocation property applied in "true value" allocation // value calculated from true value relation
- heat, for reuse in municipal waste incineration only: 0 MJ; CPC 17300: Steam and hot water; By-product classification allocatable product; pedigree (1,1,1,1,1)
  Net useful heat generated from this waste and used in internal MSWI plant energy redistribution.
  Uncertainty: uncertainty is calculated from uncertainties in waste composition and uncertainties in energy efficiency and the uncertainty in internal energy demand
  production volume 73279.3 MJ
  property true value relation 0.1842; name E_th_prod_MSWI_true_value_relation
    property to calculate "true value" from
  property exergy 0.1842 MJ; name E_th_prod_MSWI_exergy
    This exergy property is based on the exergy content of the product.
  property price 0.0106 EUR2005; name E_th_prod_MSWI_price_EUR2005
    Average European district heat price from Ecoheatcool and Euroheat 2005-2006, Ecoheat Work package 1: The European heat market. Final report. 10.6 EUR/GJ i s the price of district heat. http://www.solarthermalworld.org/files/Ecoheatcool%20WP1%20Web.pdf?download
  property true value 3.93032e-5
    (same comment as for electricity, for reuse in municipal waste incineration only)
- zinc concentrate: 0 kg; CPC 14290: Other non-ferrous metal ores and concentrates (other than uranium or thorium ores and concentrates); By-product classification allocatable product
  Calculated value from the knowledge of the properties of both products.
  production volume 1.83332 kg
  property price 0.38 EUR2005; name ByP_price_EUR2005
    Temporary price data. Calculated as 90% of purchasers price based on: Zinc content in concentrate 53%. Concentrate price per kg Zn 86.5% of refined Zn price (13.5% treatment charges according to CHR Metals Limited 2005: Dynamic cost curves. http://www.minecost.com/dynamic.pdf). 2004 zinc price from USGS (2007) Mineral commodity summaries 2007. <http://minerals.usgs.gov/minerals/pubs/mcs/2007/mcs2007.pdf> [Accessed 25 May 2010]
  property zinc content 0.53; name zinc_C_zinc_concentrate
    Zinc content on a dry matter basis. Value taken from teh "zinc mine operation" /GLO dataset.
  property dry mass 1 kg; name DM_zinc_concentrate
  property carbon content 0
    carbon content on a dry matter basis (reserved; not for manual entry)
  property true value 5.68375e-8
    allocation property applied in "true value" allocation // value calculated from revenue
  properties: wet mass 1 kg, water content 0, carbon content, non-fossil 0, carbon content, fossil 0, water in wet mass 0 kg, carbon allocation 0 kg

## Inputs from technosphere
- acetic acid, without water, in 98% solution state: 0.592 kg; name AA_Amount; = fraction_acetic_acid*superplastisizer; lognormal variance with pedigree 0.0022, pedigree (1,1,2,5,1)
  Superplastisizer. Primary data collection of superplasticizer (kg) per m3 of concrete
  Uncertainty: Calculated variable. Uncertainty will be determined from propagation of uncertainty factors of underlying variables.
  property carbon content, fossil 0.400016; name AA_C_content_fossil
  properties: wet mass 1 kg, dry mass 1 kg
  note on carbon content, fossil: Adopted from "20MPa, RNA only, CA-QC 2006" dataset on 2017/11/05
- steel, low-alloyed, hot rolled: 0.0238 kg; source Kellenberger D. 2007; lognormal variance with pedigree 0.0146, pedigree (2,1,3,5,1)
  Adopted value. From "concrete production, 50 MPa, RNA only, GLO" dataset. Accessed 20171213
  EcoSpold01Location=RER
  properties: dry mass 1 kg, carbon content, fossil 0.005, wet mass 1 kg
  note on carbon content, fossil: Low alloyed steel composition given in Tab. 3.2 ecoinvent v2.2 report 10_partII. Steel assumed to have a C content of 0.5%. Adopted from "20MPa, RNA only, CA-QC 2006" dataset on 2017/11/05
- electricity, medium voltage: 0 kWh; pedigree (1,1,1,1,1)
  Primary data collected from ready mix plant plant. Energy use in ready-mix plant.
  EcoSpold01Location=CH
  Uncertainty: There is an important variability of energy consumption between plants
- lubricating oil: 0.0119 kg; source Kellenberger D. 2007; lognormal variance with pedigree 0.0146, pedigree (2,1,3,5,1)
  EcoSpold01Location=RER
  Adopted value. Adopted from "concrete production, 50MPa, RNA only, GLO 2006" dataset [accessed on 2017/12/14 ]
  properties: carbon content, fossil 0.75, dry mass 1 kg, wet mass 1 kg
  note on carbon content, fossil: Lubricating oil is produced from diesel. C-content/dry mass of fats and oils considered 75%, from: ecoinvent v2.2 report, n 15a, pg 40. Adopted from "20MPa, RNA only, CA-QC 2006" dataset on 2017/11/05
- waste concrete: 0 kg; name Waste; source Marceau, M.L. 2007; pedigree (1,1,1,1,1)
  Adopted from "concrete production, 50MPa, RNA only, GLO 2006" dataset [accessed on 2017/12/14 ] Solid waste consists of concrete and small amounts of paste (cement and water after aggregate has been reclaimed)
  EcoSpold01Location=CH
  production volume 0 kg
    Calculated in proportion to the reference product.
  property price 0 EUR2005; name Waste_price_EUR2005
  properties: wet mass 1 kg, water content 0.0722503, carbon content, fossil 1e-51, dry mass 0.932618 kg
  note on carbon content, fossil: Adopted from "20MPa, RNA only, CA-QC 2006" dataset on 2017/11/05 .Tab A.3, ecoinvent v2.2 report 13_I
- diesel, burned in building machine: 15.6427 MJ; = diesel_input*1000*density_diesel*NHV_diesel; lognormal variance with pedigree 0.0022, pedigree (1,1,2,5,1)
  Ready mix plant data. Energy use in ready-mix plant. Adopted from "concrete production, 50MPa, RNA only, GLO 2006" dataset [accessed on 2017/12/14 ]
  Uncertainty: Calculated variable. Uncertainty will be determined from propagation of uncertainty factors of underlying variables.
  property net heating value 42.8 MJ/kg; name NHV_diesel
  property density 0.84 kg/l; name density_diesel
  property fuel input in physical units, m3 0.0004351 m3; name diesel_input
  note on net heating value: ecoinvent, report 1, table 4.6. Adopted from "20MPa, RNA only, CA-QC 2006" dataset on 2017/11/05
  note on density: ecoinvent report 1, table 4.6. Adopted from "20MPa, RNA only, CA-QC 2006" dataset on 2017/11/05
- concrete mixing factory: 4.57e-7 unit; source Kellenberger D. 2007; lognormal variance with pedigree 0.3246, pedigree (2,1,3,5,1)
  EcoSpold01Location=CH
  Adopted value. Adopted from "concrete production, 50MPa, RNA only, GLO 2006" dataset [accessed on 2017/12/14 ]
- cement, portland fly ash cement 21-35%: 550.589 kg; = cement*(1+ (Waste*-1)/ ref_WM); lognormal variance with pedigree 0.0033, pedigree (2,1,2,5,1)
  Primary data collected from ready mix plant plant. Portland fly ash cement content in 1 m3 of concrete. Value includes production waste.
  properties: dry mass 1 kg, wet mass 1 kg
- tap water: 0 kg; pedigree (1,1,1,1,1)
  Water use in ready-mix plant, assumed to be sourced from municipal water system. Primary data collected from ready mix plant plant. Consists of batch water and non-process water used in producing 1 m3 of concrete.
  EcoSpold01Location=CH
  Uncertainty: Calculated variable. Uncertainty will be determined from propagation of uncertainty factors of underlying variables.
  property batch water 157 kg; name batch_water
  property non-process water, net 40.9412 kg; name non_process_water
  properties: wet mass 1 kg, dry mass 0.000337476 kg, carbon content, fossil 0.00178991, water content 2962.17
  note on non-process water, net: The average water consumption (not including batch water) is 65 L/m3 of ready mixed concrete. The average amount of water disposed is 34,8 L/m3. Water not discarded is recycled back into the process or into other products. Source: Athena (2005):Cement and Structural Concrete: LCI Update 2005 An amount of 15% water evaporated to air was assumed, in order to calculate to non-process water input.: Adopted from "20MPa, RNA only, CA-QC 2006" dataset on 2017/11/05
  note on carbon content, fossil: Bicarbonate content is 2.93 mol/m3. CO2 content is 0.1 mol/m3 (ecoinvent v2.2 report 8, Tab 93.1). Adopted from "20MPa, RNA only, CA-QC 2006" dataset on 2017/11/05
- ethylene oxide: 2.368 kg; name EO_Amount; = fraction_ethylene_oxide*superplastisizer; lognormal variance with pedigree 0.0022, pedigree (1,1,2,5,1)
  Superplastisizer. Literature value
  Uncertainty: Calculated variable. Uncertainty will be determined from propagation of uncertainty factors of underlying variables.
  property carbon content, fossil 0.545455; name EO_C_content_fossil
  properties: dry mass 1 kg, wet mass 1 kg
- wastewater from concrete production: -0.0348 m3; name WWater; source Marceau, M.L. 2007; lognormal variance with pedigree 0.0128, pedigree (2,1,2,5,1)
  EcoSpold01Location=CH
  Adopted from "concrete production, 20MPa, RNA only, GLO 2006" dataset [accessed on 2017/12/14 ]
  production volume 426545 m3; = PV_ref*WWater/ref
    Calculated in proportion to the reference product.
  property price 0 EUR2005; name WWater_price_EUR2005
  properties: dry mass 0.449139 kg, wet mass 1000 kg, carbon content, fossil 0.027074, water content 2225.48
  note on carbon content, fossil: TOC =0.01216 kg/m3 (Tab A.20, ecoinvent v2.2 report 13_I). TOC was considered as Total Carbon. Adopted from "20MPa, RNA only, CA-QC 2006" dataset on 2017/11/05
- sand: 0 kg; pedigree (1,1,1,1,1)
  Primary data collected from ready mix plant plant. Sand content in 1 m3 of concrete. Value includes production waste.
  Uncertainty: Calculated variable. Uncertainty will be determined from propagation of uncertainty factors of underlying variables.
  properties: dry mass 1 kg, wet mass 1 kg
- gravel, round: 959.742 kg; = gravel*(1+(Waste*-1)/Ref_WM); lognormal variance with pedigree 0.0022, pedigree (1,1,2,5,1)
  Primary data collected from ready mix plant plant. Gravel content in 1 m3 of concrete. Value includes production waste.
  EcoSpold01Location=CH
  Uncertainty: Calculated variable. Uncertainty will be determined from propagation of uncertainty factors of underlying variables.
  properties: dry mass 1 kg, wet mass 1 kg
- electricity, medium voltage: 0.00203483, 0.0487783, 0.000278559, 0.000893716, 0.00183353, 0.000167873, 0.00156788, 0.00100836, 0.0129513, 0.038878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 kWh (35 entries); lognormal variance with pedigree 0.0202, pedigree (4,1,2,5,1)
  (same comment as for electricity, medium voltage)
- waste concrete: -0.0863172, -24.4137 kg (2 entries); source Marceau, M.L. 2007; lognormal variance with pedigree 0.0128, pedigree (2,1,2,5,1)
  (same comment as for waste concrete)
  production volume 3.00298e8 kg
- tap water: 172.417, 4.02224, 0.80017, 20.1771, 0.524903 kg (5 entries); lognormal variance with pedigree 0.0022, pedigree (1,1,2,5,1)
  (same comment as for tap water)
  properties: wet mass 1 kg, batch water 157 kg, non-process water, net 40.9412 kg, dry mass 0.000337476 kg, carbon content, fossil 0.00178991, water content 2962.17
- sand: 3.80017, 731.993, 8.76432 kg (3 entries); lognormal variance with pedigree 0.0022, pedigree (1,1,2,5,1)
  (same comment as for sand)

## Emissions to nature
- Oils, unspecified [water, unspecified]: 2.32e-7 kg; source Marceau, M.L. 2007; lognormal variance with pedigree 0.0034, pedigree (2,1,2,5,1)
  Adopted value. Adopted from "concrete production, 50MPa, RNA only, GLO 2006" dataset [accessed on 2017/12/14 ]
- Copper, ion [water, unspecified]: 1.55e-8 kg; source Marceau, M.L. 2007; lognormal variance with pedigree 0.0034, pedigree (2,1,2,5,1)
  Adopted from "concrete production, 20MPa, RNA only, GLO 2006" dataset [accessed on 2017/12/14 ]
- Iron, ion [water, unspecified]: 1.55e-8 kg; source Marceau, M.L. 2007; lognormal variance with pedigree 0.0034, pedigree (2,1,2,5,1)
  (same comment as for Oils, unspecified)
- Carbon dioxide, fossil [air, non-urban air or from high stacks]: 1.52844 kg; = (AA_Amount* AA_C_content_fossil)+ (EO_Amount* EO_C_content_fossil); lognormal variance with pedigree 0.0033, pedigree (2,1,2,5,1)
  Amount of carbon dioxide, fossil to the environment due to the use of superplasticizers in the concrete mix
- Water [air, unspecified]: 0.00614117 m3; = non_process_water/1000*fraction_PW_to_air; lognormal variance with pedigree 0.0022, pedigree (1,1,2,5,1)
  Adopted value - non-process water. Adopted from "concrete production, 50 MPa, RNA only, GLO 2006" dataset [accessed on 2017/12/14 ]
  Uncertainty: Calculated variable. Uncertainty will be determined from propagation of uncertainty factors of underlying variables.
- Chlorides, unspecified [water, unspecified]: 3.09e-9 kg; source Marceau, M.L. 2007; lognormal variance with pedigree 0.0034, pedigree (2,1,2,5,1)
  (same comment as for Oils, unspecified)
- Suspended solids, unspecified [water, unspecified]: 4.64e-7 kg; source Marceau, M.L. 2007; lognormal variance with pedigree 0.0034, pedigree (2,1,2,5,1)
  (same comment as for Oils, unspecified)

## Sampling procedure
The data presented in this dataset is representative of ready-mix producers who represent 35% of the concrete production market in ZA.

## Extrapolations
This activity represents South Africa ready mix concrete production, Some of the data were taken from the "concrete production 50MPa, RNA only, GLO 2006" dataset [Accessed on 2017/12/14]. Whereas some of the values were calculated based on primary data collection in South Africa. The concrete constituents (cement, gravel, and sand), the electricity consumption and the acetic acid (superplasticizer) consumption were calculated based on primary data collection in South Africa.The uncertainty has been adjusted accordingly.

## Review by Bruno Peuportier 2017-11-13
The exchange table has been corrected and the dataset is consistent.
