# treatment of sewage sludge by anaerobic digestion

Dataset: EcoSpold 2, unit process
Geography: RoW
Time period: 2000-01-01 to 2019-12-31
Technology level: current
Classification: ISIC rev.4 ecoinvent: 3821:Treatment and disposal of non-hazardous waste
Classification: EcoSpold01Categories: biomass/fuels
Tags: ConvertedDataset
Scenario: Business-as-Usual
System model: Allocation at the point of substitution
Share of production covered: 100 %
Generated by: Michael Spielmann (obsolete)
Published in: Jungbluth N. 2007
Database: ecoinvent
isCopyrightProtected: true
accessRestrictedTo: 1

## General comment
The process is modelled in a way that a maximum amount of biogas is obtained. Raw sludge is assumed to have a share of dry matter of 4-6%. Raw sludge digestion fulfils only onefunctions: production of biogas (sewage gas).
[This dataset was already contained in the ecoinvent database version 2. It was not individually updated during the transfer to ecoinvent version 3. Life Cycle Impact Assessment results may still have changed, as they are affected by changes in the supply chain, i.e. in other datasets. This dataset was generated following the ecoinvent quality guidelines for version 2. It may have been subject to central changes described in the ecoinvent version 3 change report (http://www.ecoinvent.org/database/ecoinvent-version-3/reports-of-changes/), and the results of the central updates were reviewed extensively. The changes added e.g. consistent water flows and other information throughout the database. The documentation of this dataset can be found in the ecoinvent reports of version 2, which are still available via the ecoinvent website. The change report linked above covers all central changes that were made during the conversion process.]

## Included activities end
Data represents the environmental exchanges due to raw sludge digestion and gas storage. Emissions due to the disposal of sludge are not accounted for. Also, gas purification and the use of the gas for co-generation are not included.

## Geography
Data represents conditions of large plants in Switzerland

## Technology
anaerob-mesophile digestion (35 C)

## Reference product
- sewage sludge: 0 m3; CPC 39920: Sewage sludge; By-product classification Waste
  Concentrated, 5.6% dry matter content. Values from the original dataset, taken from Ronchetti (2002)
  production volume 0 m3; name pvrp
    Production volume amount was scaled from the respective Swiss value. GDP scaling was employed with Switzerland accounting for roughly 0.8% of the global GDP.
  property price 0 EUR2005
    Waste products are assigned a price of zero as they are assumed to require further treatment.
  property carbon content 0.4096
    carbon content on a dry matter basis (reserved; not for manual entry)
  properties: carbon content, fossil 0, dry mass 36.05 kg, water in wet mass 684.95 kg, wet mass 721 kg, water content 19, carbon content, non-fossil 0.4096, carbon allocation 14.7661 kg
- biogas: 1 m3; By-product classification allocatable product; CPC 17200: Coal gas, water gas, producer gas and similar gases, other than petroleum gases and other gaseous hydrocarbons
  EcoSpold01Location=CH
  production volume 6.36881e8 m3

## By-products
- biogas: 0 m3; name bp1; By-product classification allocatable product; CPC 17200: Coal gas, water gas, producer gas and similar gases, other than petroleum gases and other gaseous hydrocarbons
  EcoSpold01Location=CH
  production volume 0 m3
    Production volume amount was scaled from the respective Swiss value. GDP scaling was employed with Switzerland accounting for roughly 0.8% of the global GDP, yielding a global production volume of 692261905 m3. Production volume comment for Switzerland: According to the Swiss ministry of Environment, in 2016 in Switzerland, 1163 TJ of energy produced from anaerobic digestion dedicated to the treatment of Sewage sludge. Values aexpressed in gross energy production. Assuming a calorific value of 21 MJ per Nm3 of biogas, the production volume is calculated to be 55380952 m3 of biogass. Source: Kaufmann, U. (2017). Schweizerische Statistik der erneuerbaren Energien. Ausgabe 2016, (2016), 75. Retrieved from http://www.bfe.admin.ch/php/modules/publikationen/stream.php?extlang=de&name=de_729286095.pdf&endung=Schweizerische
  property price 0.109 EUR2005
    Temporary price data. Calculated as 90% of purchasers price based on: Same prices per energy output as natural gas, based on the proportional lower heating value (2/3 that of natural gas)
  property carbon content, non-fossil 0.449939
    Total C content in kg/Nm3 (Tab 12.8, ecoinvent v2.2 report n17), referred to 1kg DM
  property carbon content 0.449939
    carbon content on a dry matter basis (reserved; not for manual entry)
  properties: wet mass 1.15 kg, water in wet mass 0 kg, dry mass 1.15 kg, water content 0, carbon content, fossil 0, carbon allocation 0.51743 kg

## Inputs from technosphere
- heat, district or industrial, natural gas: 0, 0, 0, 0 MJ (4 entries); pedigree (1,1,1,1,1)
  Literature studies and own calculations
  EcoSpold01Location=RER
  Uncertainty: literature studies and own calculations
- anaerobic digestion plant, for sewage sludge: 0 unit; pedigree (1,1,1,1,1)
  Literature studies and own calculations
  EcoSpold01Location=CH
  Uncertainty: literature studies and own calculations
- lubricating oil: 0 kg; pedigree (1,1,1,1,1)
  (same comment as for heat, district or industrial, natural gas)
  properties: wet mass 1 kg, carbon content, fossil 0.75, dry mass 1 kg
  note on carbon content, fossil: Lubricating oil is produced from diesel. C-content/dry mass of fats and oils considered 75%, from: ecoinvent v2.2 report, n 15a, pg 40
- electricity, low voltage: 0, 0, 0, 0, 0, 0, 0, 0, 0 kWh (9 entries); pedigree (1,1,1,1,1)
  (same comment as for anaerobic digestion plant, for sewage sludge)
- wastewater, unpolluted: -0.0260052 m3; lognormal variance with pedigree 0.0072, pedigree (1,4,3,5,2)
  Estimated value based on water balance ( WaterIN - Water Out)
  production volume 1.43373e8 m3
- hydrochloric acid, without water, in 30% solution state: 0.00613675, 0.00613675 kg (2 entries); lognormal variance with pedigree 0.0072, pedigree (1,4,3,5,2)
  Calculated value based on two LCA studies: A comparative life cycle assessment of process water treatment technologies at the Secunda industrial complex, South Africa (Ras & Blottnitz, 2012) and The Sustainability of Ion Exchange Water treatment Technology (Amin, 2016).
- sewage sludge: -0.00718943 m3; lognormal variance with pedigree 0.1629, pedigree (2,2,2,5,5)
  Estimated value based on the EPA guideline "Drinking Water Treatment Plant Residuals Management Technical Report" in which typical lime softening sludge volumes produced by water treatment plants are computed. 2% of the total water input was assumed as the produced sludge. The sludge contains calcium carbonate, magnesium hydroxide, other divalent ions, natural organic matter from the source water, inorganics, suspended solids, microorganisms, and radionuclides. Metals found in the softening sludges include calcium, magnesium, arsenic, barium, cadmium, chromium, lead, mercury, selenium, and silver (Cornwell, 1999). (retrieved from: https://www.epa.gov/sites/production/files/2015-11/documents/dw-treatment-residuals-mgmt-tech-report-sept-2011.pdf)
  production volume 3.96359e7 m3
- sodium hydroxide, without water, in 50% solution state: 0.0298115 kg; lognormal variance with pedigree 0.0186, pedigree (1,5,3,5,2)
  (same comment as for hydrochloric acid, without water, in 30% solution state)
- electricity, medium voltage: 0.00420991, 0.00115618 kWh (2 entries); lognormal variance with pedigree 0.0072, pedigree (1,4,3,5,2)
  Calculated value based on two LCA studies: A comparative life cycle assessment of process water treatment technologies at the Secunda industrial complex, South Africa (Ras & Blottnitz, 2012) and The Sustainability of Ion Exchange Water treatment Technology (Amin, 2016). Energy values range from 3.96E-05 MJ/kg to 4.59E-04 MJ/kg.
- aluminium sulfate, without water, in 4.33% aluminium solution state: 0.00780453 kg; lognormal variance with pedigree 0.0072, pedigree (1,4,3,5,2)
  (same comment as for hydrochloric acid, without water, in 30% solution state)
- sulfuric acid: 0.0309266, 0.0309266 kg (2 entries); lognormal variance with pedigree 0.2106, pedigree (5,5,5,5,5)
  (same comment as for hydrochloric acid, without water, in 30% solution state)
- steam, in chemical industry: 0.00212115, 0.00212115 kg (2 entries); lognormal variance with pedigree 0.0072, pedigree (1,4,3,5,2)
  (same comment as for hydrochloric acid, without water, in 30% solution state)
- ion-exchanger for water treatment: 2.91455e-8 unit; lognormal variance with pedigree 0.0126, pedigree (1,4,3,5,2)
  Literature value, copied from the existing dataset " water production, deionised, from tap water, at user, GLO" (accessed in 20171201) as it was also considered adequate for this dataset.
  Reference:
  Althaus H.-J., Chudacoff M., Hischier R., Jungbluth N., Osses M. and Primas A. (2007) Life Cycle Inventories of Chemicals. ecoinvent report No. 8, v2.0. EMPA Dübendorf, Swiss Centre for Life Cycle Inventories, Dübendorf, CH.
- sodium chloride, powder: 0.03627 kg; lognormal variance with pedigree 0.0072, pedigree (1,4,3,5,2)
  (same comment as for hydrochloric acid, without water, in 30% solution state)
- magnesium oxide: 0.00295989 kg; lognormal variance with pedigree 0.0072, pedigree (1,4,3,5,2)
  (same comment as for hydrochloric acid, without water, in 30% solution state)
- waste mineral oil: -2.0265e-6 kg; lognormal variance with pedigree 0.0152, pedigree (3,3,3,5,3)
  Weighted average of reported waste
  production volume 650504 kg
- chemical, organic: 0.000403989 kg; lognormal variance with pedigree 0.0152, pedigree (3,3,3,5,3)
  Sum input parameter covering partly confidential information on additives, solvents, catalysts. Weighted average of reported input materials.
- chemical factory, organics: 2.16911e-11 unit; lognormal variance with pedigree 0.31, pedigree (2,3,2,4,3)
  Calculated based on literature data published by the industry. For this activity, no information was readily available concerning infrastructure and land-use. Therefore, the infrastructure is estimated based on data from two chemical factories, the BASF site of Ludwigshafen and the chemical factory in Gendorf (which are both located in Germany), which produce a wide range of chemical substances. Based on this data, the following assumptions are made: the built area amounts to about 4.2 ha, the plant has an average output of 50'000 t/a and a lifespan of fifty years. The estimated infrastructure amount is therefore 4.00 E-10 units per kg of produced chemical.
  References:
  Althaus H.-J., Chudacoff M., Hischier R., Jungbluth N., Osses M. and Primas A. (2007) Life Cycle Inventories of Chemicals. ecoinvent report No. 8, v2.0. EMPA Dübendorf, Swiss Centre for Life Cycle Inventories, Dübendorf, CH.
  Gendorf (2000) Umwelterklärung 2000, Werk Gendorf. Werk Gendorf, Burgkirchen.
- wastewater, average: -0.000297078 m3; lognormal variance with pedigree 0.0152, pedigree (3,3,3,5,3)
  Weighted average of reported waste
  production volume 9.53618e7 m3
- manganese: 1.17927e-5 kg; lognormal variance with pedigree 0.0152, pedigree (3,3,3,5,3)
  Weighted average of reported input
- hazardous waste, for incineration: -2.56495e-6 kg; lognormal variance with pedigree 0.0152, pedigree (3,3,3,5,3)
  Weighted average of reported waste
  production volume 823345 kg
- chemical, inorganic: 3.32105e-5 kg; lognormal variance with pedigree 0.0152, pedigree (3,3,3,5,3)
  (same comment as for chemical, organic)
- acetic acid, without water, in 98% solution state: 0.00300963 kg; lognormal variance with pedigree 0.0152, pedigree (3,3,3,5,3)
  Weighted average of reported input
- nitrogen, liquid: 0.00187571 kg; lognormal variance with pedigree 0.0152, pedigree (3,3,3,5,3)
  Weighted average of reported input
- heat, from steam, in chemical industry: 0.100613 MJ; lognormal variance with pedigree 0.0152, pedigree (3,3,3,5,3)
  Weighted average of reported input
- cobalt: 1.19057e-5 kg; lognormal variance with pedigree 0.0152, pedigree (3,3,3,5,3)
  Weighted average of reported input
- compressed air, 600 kPa gauge: 0.018762 m3; lognormal variance with pedigree 0.0152, pedigree (3,3,3,5,3)
  Weighted average of reported input
- xylene: 0.0357112 kg; lognormal variance with pedigree 0.0152, pedigree (3,3,3,5,3)
  Weighted average of reported input
- electricity, medium voltage: 0.000242831, 4.4185e-5, 0.000276838, 0.000749311, 0.0108642, 0.00155488, 0.00350672 kWh (7 entries); lognormal variance with pedigree 0.0152, pedigree (3,3,3,5,3)
  Weighted average of reported input
- municipal solid waste: -1.72244e-9, -2.46147e-9, -4.83452e-6 kg (3 entries); lognormal variance with pedigree 0.0152, pedigree (3,3,3,5,3)
  Weighted average of reported waste
  production volume 1.55322e6 kg
- natural gas, high pressure: 2.45561e-5, 4.08789e-5, 0.00033377, 0.000782658 m3 (4 entries); lognormal variance with pedigree 0.0152, pedigree (3,3,3,5,3)
  Weighted average of reported input

## Inputs from nature
- Carbon dioxide, in air [natural resource, in air]: 0 kg; pedigree (1,1,1,1,1)
  Own calculations
  Uncertainty: own calculations
- Water, well, in ground [natural resource, in water]: 0.186212 m3; lognormal variance with pedigree 0.0072, pedigree (1,4,3,5,2)
  (same comment as for hydrochloric acid, without water, in 30% solution state)
- Water, river [natural resource, in water]: 0.173332 m3; lognormal variance with pedigree 0.0072, pedigree (1,4,3,5,2)
  (same comment as for hydrochloric acid, without water, in 30% solution state)
- Water, cooling, unspecified natural origin [natural resource, in water]: 9.0725e-5 m3; lognormal variance with pedigree 0.0152, pedigree (3,3,3,5,3)
  Weighted average of reported input
- Water, unspecified natural origin [natural resource, in water]: 0.000151547 m3; lognormal variance with pedigree 0.0152, pedigree (3,3,3,5,3)
  Weighted average of reported input

## Emissions to nature
- Methane, non-fossil [air, unspecified]: 0 kg; pedigree (1,1,1,1,1)
  Literature studies and own calculations
  Uncertainty: literature studies and own calculations
- Carbon dioxide, non-fossil [air, unspecified]: 0 kg; pedigree (1,1,1,1,1)
  (same comment as for Methane, non-fossil)
- Aluminium [water, surface water]: 0.00123091 kg; lognormal variance with pedigree 0.28, pedigree (5,5,5,5,5)
  Calculated value. Stoechiometric calculations were used to calculate the emissions to water based on the type and amount of chemicals used. Since the actual fate of the chemical is unknown, it was assume that all aluminum is emitted to the water (so basically remain in the water)
- Water [air, low population density, long-term]: 0.0045934 m3; lognormal variance with pedigree 0.0072, pedigree (1,4,3,5,2)
  Calculated value based on literature values and expert opinion taken from the pre-existing dataset “water production, deionised, from tap water" (GLO) (accessed on the 2017-12-18) as it was also considered adequate for this dataset. 15% of water lost during production of deionised water is considered to be lost to air.
- Chloride [water, surface water]: 0.0339383 kg; lognormal variance with pedigree 0.28, pedigree (5,5,5,5,5)
  Calculated value. Stoechiometric calculations were used to calculate the emissions to water based on the type and amount of chemicals used.
- Magnesium [water, surface water]: 0.00178492 kg; lognormal variance with pedigree 0.28, pedigree (5,5,5,5,5)
  Calculated value. Stoechiometric calculations were used to calculate the emissions to water based on the type and amount of chemicals used. Since the actual fate of the chemical is unknown, it was assume that all magnesium is emitted to the water (so basically remain in the water)
- Sodium, ion [water, surface water]: 0.0309652 kg; lognormal variance with pedigree 0.28, pedigree (5,5,5,5,5)
  (same comment as for Chloride)
- Sulfate [water, surface water]: 0.00219423 kg; lognormal variance with pedigree 0.28, pedigree (5,5,5,5,5)
  Calculated value. Stoechiometric calculations were used to calculate the emissions to water based on the type and amount of chemicals used.Since the actual fate of the chemical is unknown, it was assume that all sulfate is emitted to the water (so basically remain in the water)
- Nitrogen oxides [air, unspecified]: 3.37288e-6 kg; lognormal variance with pedigree 0.0546, pedigree (3,3,3,5,3)
  Weighted average of reported emissions
- Benzene [air, unspecified]: 4.72562e-7 kg; lognormal variance with pedigree 0.1346, pedigree (3,3,3,5,3)
  Weighted average of reported emissions
- Sulfur dioxide [air, unspecified]: 1.69231e-7 kg; lognormal variance with pedigree 0.0152, pedigree (3,3,3,5,3)
  Weighted average of reported emissions
- Xylene [air, unspecified]: 1.97084e-6 kg; lognormal variance with pedigree 0.1346, pedigree (3,3,3,5,3)
  Weighted average of reported emissions
- Methyl acetate [air, unspecified]: 8.75577e-7 kg; lognormal variance with pedigree 0.1346, pedigree (3,3,3,5,3)
  Weighted average of reported emissions
- Methanol [air, unspecified]: 4.81626e-7 kg; lognormal variance with pedigree 0.1346, pedigree (3,3,3,5,3)
  Weighted average of reported emissions
- Nitrogen, organic bound [water, unspecified]: 1.92062e-6 kg; lognormal variance with pedigree 0.0546, pedigree (3,3,3,5,3)
  Weighted average of reported emissions
- Toluene [air, unspecified]: 6.38191e-7 kg; lognormal variance with pedigree 0.1346, pedigree (3,3,3,5,3)
  Weighted average of reported emissions
- Zinc, ion [water, unspecified]: 7.04381e-9 kg; lognormal variance with pedigree 0.6646, pedigree (3,3,3,5,3)
  Weighted average of reported emissions
- Phosphorus [water, unspecified]: 2.89765e-7 kg; lognormal variance with pedigree 0.0546, pedigree (3,3,3,5,3)
  Weighted average of reported emissions
- Water [air, unspecified]: 2.72175e-5 m3; lognormal variance with pedigree 0.0152, pedigree (3,3,3,5,3)
  Calculated to close water balance
- Arsenic, ion [water, unspecified]: 1.41843e-11 kg; lognormal variance with pedigree 0.6646, pedigree (3,3,3,5,3)
  Weighted average of reported emissions
- Cadmium, ion [water, unspecified]: 3.34878e-12 kg; lognormal variance with pedigree 0.6646, pedigree (3,3,3,5,3)
  Weighted average of reported emissions
- Lead [water, unspecified]: 2.54891e-11 kg; lognormal variance with pedigree 0.6646, pedigree (3,3,3,5,3)
  Weighted average of reported emissions
- Chromium, ion [water, unspecified]: 2.22548e-9 kg; lognormal variance with pedigree 0.6646, pedigree (3,3,3,5,3)
  Weighted average of reported emissions
- Methane, fossil [air, unspecified]: 1.10399e-5 kg; lognormal variance with pedigree 0.0546, pedigree (3,3,3,5,3)
  Weighted average of reported emissions
- Nickel, ion [water, unspecified]: 3.07644e-9 kg; lognormal variance with pedigree 0.6646, pedigree (3,3,3,5,3)
  Weighted average of reported emissions
- Suspended solids, unspecified [water, unspecified]: 2.12863e-6 kg; lognormal variance with pedigree 0.0546, pedigree (3,3,3,5,3)
  Weighted average of reported emissions
- Mercury [water, unspecified]: 5.37297e-11 kg; lognormal variance with pedigree 0.6646, pedigree (3,3,3,5,3)
  Weighted average of reported emissions
- Carbon monoxide, fossil [air, unspecified]: 5.27272e-5 kg; lognormal variance with pedigree 0.6646, pedigree (3,3,3,5,3)
  Weighted average of reported emissions
- Copper, ion [water, unspecified]: 2.39533e-11 kg; lognormal variance with pedigree 0.6646, pedigree (3,3,3,5,3)
  Weighted average of reported emissions
- Carbon dioxide, fossil [air, unspecified]: 0.00577285 kg; lognormal variance with pedigree 0.0152, pedigree (3,3,3,5,3)
  Weighted average of reported emissions
- Cobalt [water, unspecified]: 9.4801e-8 kg; lognormal variance with pedigree 0.6646, pedigree (3,3,3,5,3)
  Weighted average of reported emissions
- NMVOC, non-methane volatile organic compounds, unspecified origin [air, unspecified]: 2.0494e-5 kg; lognormal variance with pedigree 0.0546, pedigree (3,3,3,5,3)
  Weighted average of reported emissions
- Dinitrogen monoxide [air, unspecified]: 3.60433e-8 kg; lognormal variance with pedigree 0.0546, pedigree (3,3,3,5,3)
  Weighted average of reported emissions

## Sampling procedure
Literature data

## Extrapolations
none This dataset has been copied from an original dataset covering the geography CH. The uncertainty has been adjusted accordingly.

## Review by Niels Jungbluth 2006-05-05
Passed.
none
