# iron(III) sulfate production, without water, in 12.5% iron solution state

Dataset: EcoSpold 2, unit process
Geography: RoW
Time period: 2013-01-01 to 2019-12-31
Technology level: current
Classification: ISIC rev.4 ecoinvent: 2011:Manufacture of basic chemicals
Classification: EcoSpold01Categories: chemicals/inorganics
Synonyms: Ferric sulfate
Scenario: Business-as-Usual
System model: Allocation at the point of substitution
Generated by: Jean-Francois Menard
Database: ecoinvent
isCopyrightProtected: true
accessRestrictedTo: 1

## General comment
This dataset represents the production of iron(III) sulfate. The functional unit represent 1 kg of iron(III) sulfate (Fe2(SO4)3). The final product is however sold in a 12.5% iron solution state, which corresponds to 44.75% Fe2(SO4)3 or 62.88% hydrated iron(III) sulfate (if the hydrated iron(III) sulfate form is assumed to be Fe2(SO4)3.9H2O).
The data providing manufacturing company makes two grades of product solution, 12.5% iron and 13.3% iron, the first grade represented 90% of the production for the dataset reference year and has been chosen as the reference grade for the dataset, however the collected data represent the annual average per kg of product solution, regardless of the grade.
This dataset has been copied from an original dataset covering the geography Québec. The uncertainty has been adjusted accordingly.

## Included activities start
This activity starts with the raw material delivery at the manufacturing plant gate.

## Included activities end
This activity ends with the iron(III) sulfate solution at the manufacturing plant gate.
The dataset includes the raw materials and energy consumption for production, waste generation, estimation of the infrastructure (approximation), and sulfuric acid emissions.
The process starts with the mixing of iron ore (magnetite, 67% Fe) and water to make a slurry (67% solids), which is pumped in an agitated digester to react with sulfuric acid (93% solution) for 3 hours. The slurry is then transfered to another reactor to react with pure oxygen to convert the remaining Fe2+ into Fe3+. The slurry in then transfered to a cooling tank, perlite is added and the slurry is passed through a filter press. The iron(III) sulfate solution (two grades are produced, 12.5% and 13.3% Fe, which will be selected by users depending on the transport distance and location and climate of the use site, cf. cold weather will change the viscocity of the solution and make the more concentrated grade less practical) is finally sent to storage tanks and the sludge from the filter press (70% solids, essentially a mix of silica and non-digested ore plus some calcium sulfate and iron(III) sulfate), whose acidic and oxidative characteristics make it a hazardous waste, is sent to a treatment facilty to be neutralized/stabilized using cement.

## Parameters
- world gross domestic product 2011: 7e13 USD(2011); name worldGDP2011; lognormal variance with pedigree 0.0006, pedigree (1,1,1,1,1)
  World Gross domestic product for 2011, expressed in 2011 USD. Source: World Bank
- Quebec gross domestic product 2011: 3.11e11 USD(2011); name quebecGDP2011; lognormal variance with pedigree 0.0006, pedigree (1,1,1,1,1)
  Quebec Gross domestic product for 2011, expressed in 2011 USD. Source: Institut de la statistique du Québec. Converted from CAD to USD using a yearly average exchange rate of 0.989 CAD/USD (Source: bank of Canada)
- quebec production volume: 2.745e7 kg; name PV_Quebec; lognormal variance with pedigree 0.0106, pedigree (4,4,1,1,1)
  Value taken from the ecoinvent v3.0 dataset "Aluminium sulfate production, without water, 4.33% aluminium solution state, Québec 2013".

## Reference product
- iron(III) sulfate, without water, in 12.5% iron solution state: 1 kg; name RefProd; By-product classification allocatable product; CPC 34240: Phosphates of triammonium; salts and peroxysalts of inorganic acids and metals n.e.c.; CAS 10028-22-5
  production volume 6.16615e9 kg; name ProdVol; = PV_Quebec*worldGDP2011/quebecGDP2011
    Gross approximation of world production volume using relative value of world GDP to Québec GDP.
  property price 0.37 EUR2005; name RefProd_price_EUR2005
    Calculated value based on data from United Nations Commodity Trade Statistics Database (comtrade.un.org). UN comtrade category: 283329 Sulphates of metals nes. Year 2005. Using exchange rate of 1EURO = 1.209 USD. Average of price of import into 5 main markets (EU, US, JP, IN and CN).
  property wet mass 1 kg; name RefProd_WM
  property water in wet mass 0 kg; name RefProd_WWM
  property carbon content, non-fossil 0; name RefProd_C_content_non_fossil
    biogene carbon content on a dry matter basis
  property carbon content, fossil 0; name RefProd_C_content_fossil
    fossil carbon content on a dry matter basis
  property dry mass 1 kg; name RefProd_DM
  property water content 0; name RefProd_water_content
  property carbon content 0
    carbon content on a dry matter basis (reserved; not for manual entry)
  properties: carbon allocation 0 kg

## Inputs from technosphere
- tap water: 0 kg; name TapWater; pedigree (1,1,1,1,1)
  Measured value. Represents the extra amount of water (0.000134913 kg) added to the reaction tank to compensate for the evaporation losses during the mixing and reaction, and the make-up water (0.134069562 kg) for the cooling system (exothermic reaction).
  properties: carbon content, fossil 0.00178991, dry mass 0.000337476 kg, water content 2962.17, wet mass 1 kg
  note on carbon content, fossil: Bicarbonate content is 2.93 mol/m3. CO2 content is 0.1 mol/m3 (ecoinvent v2.2 report 8, Tab 93.1).
- perlite: 0.000580968 kg; lognormal variance with pedigree 0.0046, pedigree (1,4,3,1,1)
  Measured value. Reported as used as filtering aid for the filter press.
  properties: wet mass 1 kg, dry mass 1 kg
- electricity, medium voltage: 0 kWh; pedigree (1,1,1,1,1)
  Measured and calculated value. Represents the electricity used for the production process itself (agitator and pumps) and the electricity used for the heating of the exterior piping system during winter, building air conditioning during summer (exothermic reaction) and lighting.
  EcoSpold01Location=UCTE
- sludge, pig iron production: 0 kg; name Sludge; pedigree (1,1,1,1,1)
  Proxy, measured value. Reported as sludge from the filter press (70% solids, essentially a mix of silica and non-digested ore plus some calcium sulfate and iron(III) sulfate), whose acidic and oxidative characteristics make it a hazardous waste, is sent to a treatment facilty to be neutralized/stabilized using cement.
  production volume 0 kg
    Calculated from production volume of reference product using the relative outputs.
  property price 0 EUR2005; name Sludge_price_EUR2005
  properties: water content 0.0940919, carbon content, fossil 0.339168, wet mass 1 kg, dry mass 0.914 kg
- heat, district or industrial, natural gas: 0 MJ; pedigree (1,1,1,1,1)
  Reported as for building heating only. Calculated value (see Exchange Properties).
  Uncertainty: Calculated variable. Uncertainty will be determined from propagation of uncertainty factors of underlying variables. Uncertainty of actual relation between variables not accounted at this time, although this could be included in a future update.
  property heating value, net 36.3 MJ; name NaturalGasNetHeatingValue
  property Corresponding fuel use 1.0417 MJ; name NaturalGasFuelUse
  property fuel input in physical units, m3 0.000759728 m3; name NaturalGas
  note on heating value, net: net (lower) heating (calorific) value. Value taken from Table 5.1 of report "Overview and methodology, Data quality guidelines for the ecoinvent database version 3" (ecoinvent report No. 1 (v3), 2011).
  note on Corresponding fuel use: Lower heating value of the fuel input related to the heat/electricity output. Assume a 96% energy efficiency based on Section 5.3.6 of report "Life cycle Inventories of Energy Systems, Results for Current Systems in Switzerland and other UCTE Countries" (ecoinvent report No. 5, 2007)
  note on fuel input in physical units, m3: Estimated value. Represents the natural gas used for the building heating.
- oxygen, liquid: 0.0580968 kg; lognormal variance with pedigree 0.0046, pedigree (1,4,3,1,1)
  Measured value.
  properties: wet mass 1 kg, dry mass 1 kg
- chemical factory, organics: 4e-10 unit; lognormal variance with pedigree 0.48, pedigree (5,5,5,5,5)
  Default value using the generic chemical factory dataset created within the ecoinvent project, based on a 50'000 t annual production and a 50 year lifetime.
  Uncertainty: The uncertainty could not be determined, it has then been maximized.
- water, deionised: 0 kg; pedigree (1,1,1,1,1)
  Calculated value. Calculated from the amount of sulfuric acid and the concentration of the acid solutions given by the data providing manufacturing company.
  properties: wet mass 1 kg
- iron ore, beneficiated, 65% Fe: 0.426788 kg; lognormal variance with pedigree 0.0046, pedigree (1,4,3,1,1)
  Measure value. Reported as magnetite ore with a 67% iron content (or 92.59% Fe3O4 content).
  properties: dry mass 1 kg, wet mass 1 kg
- sulfuric acid: 0.724847 kg; lognormal variance with pedigree 0.0046, pedigree (1,4,3,1,1)
  EcoSpold01Location=RER
  Measured value. Reported amounts adjusted for the concentration of the acid solutions used (93% and 73% (used acid from the chlor-alkali industry used to dry the chlorine product)) given by the data providing manufacturing company.
  properties: wet mass 1 kg, dry mass 1 kg
- tap water: 0.0537704, 0.00125439, 0.000249544, 0.0062925, 0.000163698, 0.000465636, 0.0720083 kg (7 entries); lognormal variance with pedigree 0.0046, pedigree (1,4,3,1,1)
  (same comment as for tap water)
- electricity, medium voltage: 0.000326056, 5.93285e-5, 0.00136947, 0.000480847, 0.00100612, 0.0145877, 0.00473669, 0.00208778, 0.00609093 kWh (9 entries); lognormal variance with pedigree 0.0052, pedigree (2,4,3,1,1)
  (same comment as for electricity, medium voltage)
- sludge, pig iron production: -0.00047456, -0.0106979 kg (2 entries); lognormal variance with pedigree 0.0046, pedigree (1,4,3,1,1)
  (same comment as for sludge, pig iron production)
  production volume 6.8891e7 kg
- heat, district or industrial, natural gas: 0.00760936, 0.0188648 MJ (2 entries); lognormal variance with pedigree 0.002, pedigree (1,1,3,1,1)
  (same comment as for heat, district or industrial, natural gas)
  properties: heating value, net 36.3 MJ, Corresponding fuel use 1.0417 MJ, fuel input in physical units, m3 0.000759728 m3
- water, deionised: 0.00030945, 0.0859643 kg (2 entries); lognormal variance with pedigree 0.0052, pedigree (2,4,3,1,1)
  (same comment as for water, deionised)

## Emissions to nature
- Water [air, non-urban air or from high stacks]: 0.000134204 m3; = TapWater/1000; lognormal variance with pedigree 0.002, pedigree (1,1,3,1,1)
  Calculated value. Based on amount of tap water input, all water is assumed to be evaporated. The water included in the sulfuric acid input is part of the final product solution so not included in the emission flow.
  Uncertainty: Calculated variable. Uncertainty will be determined from propagation of uncertainty factors of underlying variables. Uncertainty of actual relation between variables not accounted at this time, although this could be included in a future update.
- Sulfur dioxide [air, non-urban air or from high stacks]: 2.01104e-6 kg; lognormal variance with pedigree 0.0046, pedigree (1,4,3,1,1)
  Measured value.
- Sulfuric acid [air, non-urban air or from high stacks]: 5.58623e-7 kg; lognormal variance with pedigree 0.0046, pedigree (1,4,3,1,1)
  Measured value.

## Sampling procedure
Data based on questionnaire from one manufacturing company, except for the infrastructure which is based on standard assumptions on plant lifetime and annual production volume.
