# air separation facility construction

Dataset: EcoSpold 2, unit process
Geography: RER
Time period: 1997-01-01 to 2019-12-31
Technology level: current
Classification: ISIC rev.4 ecoinvent: 4290:Construction of other civil engineering projects
Classification: EcoSpold01Categories: chemicals/inorganics
Tags: ConvertedDataset
Scenario: Business-as-Usual
System model: Allocation at the point of substitution
Generated by: Alex Primas
Published in: Althaus H.-J. 2007
Database: ecoinvent
isCopyrightProtected: true
accessRestrictedTo: 1

## General comment
This dataset represents a facility construction for air separation process. In this dataset, there are large uncertainties for equipment used due to weak data from small air separation plants. The plant refers to an estimated air separation plant with 80'000 t liquid products per year, and it accounts for an assumed life time of 20 years.
[This dataset was already contained in the ecoinvent database version 2. It was not individually updated during the transfer to ecoinvent version 3. Life Cycle Impact Assessment results may still have changed, as they are affected by changes in the supply chain, i.e. in other datasets. This dataset was generated following the ecoinvent quality guidelines for version 2. It may have been subject to central changes described in the ecoinvent version 3 change report (http://www.ecoinvent.org/database/ecoinvent-version-3/reports-of-changes/), and the results of the central updates were reviewed extensively. The changes added e.g. consistent water flows and other information throughout the database. The documentation of this dataset can be found in the ecoinvent reports of version 2, which are still available via the ecoinvent website. The change report linked above covers all central changes that were made during the conversion process.]

## Included activities start
From an unknown land to industrial area, used to build up the facility.

## Included activities end
This activity ends with the dismantling of the air separation facility. The dataset includes the aluminium for the column and cold resistant steel for the piping, low-alloyed steel and various other materials in the compressors, cladding and other components. Besides the infrastructure in this module also the land use of the plant is included. This dataset is only a rough approximation for the infrastructure and land use of an air separation plant. The dataset does not include energy for construction processes.

## Geography
Data partly from U.S. plant producer.

## Technology
No specific technology modelled

## Reference product
- air separation facility: 1 unit; CPC 53269: Other constructions for manufacturing; By-product classification allocatable product
  Air separation plant with a liquid product output of 0.08 Mt a-1 or 0.8 Mt during the whole lifetime (20 years) of the site. Per kg of liquid product therefore a share of 625 * 10-12 units of the infrastructure is needed.
  EcoSpold01Location=RER
  production volume 1.32237 unit
    This is a placeholder value that does not reflect real-world production volumes. This dataset does not currently require a real-world production volume to work in the database framework, and no actual data were collected yet. This has no negative effect on the results of the ecoinvent database. The placeholder value of this activity was scaled according to the nominal GDP of 2005 (source: United Nations, http://data.un.org/Glossary.aspx?q=GDP+%28current+US%24%29, accessed 20130726) to reflect an appropriate share of the global production volume, which is also a placeholder value.
  property price 2.95463e6 EUR2005
    Convert from EU 27 price to the world by currency exchange rate.
  property true value 2.95463e6
    allocation property applied in "true value" allocation // value calculated from revenue

## By-products
- electricity, for reuse in municipal waste incineration only: 0 kWh; CPC 17100: Electrical energy; By-product classification allocatable product; pedigree (1,1,1,1,1)
  Net electricity generated from this waste and used in internal MSWI plant energy redistribution.
  Uncertainty: uncertainty is calculated from uncertainties in waste composition and uncertainties in energy efficiency and the uncertainty in internal energy demand
  production volume 1632.01 kWh
  property true value relation 3.6; name E_el_prod_MSWI_true_value_relation
    property to calculate "true value" from
  property exergy 3.6 MJ; name E_el_prod_MSWI_exergy
    This exergy property is based on the exergy content of the product.
  property price 0.1 EUR2005; name E_el_prod_MSWI_price_EUR2005
    Estimated to be the same price as in case of electricity, medium voltage.
  property true value 209.378
    allocation property applied in "true value" allocation // value calculated from true value relation
- heat, for reuse in municipal waste incineration only: 0 MJ; CPC 17300: Steam and hot water; By-product classification allocatable product; pedigree (1,1,1,1,1)
  Net useful heat generated from this waste and used in internal MSWI plant energy redistribution.
  Uncertainty: uncertainty is calculated from uncertainties in waste composition and uncertainties in energy efficiency and the uncertainty in internal energy demand
  production volume 11442.6 MJ
  property true value relation 0.1842; name E_th_prod_MSWI_true_value_relation
    property to calculate "true value" from
  property exergy 0.1842 MJ; name E_th_prod_MSWI_exergy
    This exergy property is based on the exergy content of the product.
  property price 0.0106 EUR2005; name E_th_prod_MSWI_price_EUR2005
    Average European district heat price from Ecoheatcool and Euroheat 2005-2006, Ecoheat Work package 1: The European heat market. Final report. 10.6 EUR/GJ i s the price of district heat. http://www.solarthermalworld.org/files/Ecoheatcool%20WP1%20Web.pdf?download
  property true value 75.1138
    (same comment as for electricity, for reuse in municipal waste incineration only)
- zinc concentrate: 0 kg; CPC 14290: Other non-ferrous metal ores and concentrates (other than uranium or thorium ores and concentrates); By-product classification allocatable product
  Calculated value from the knowledge of the properties of both products.
  production volume 0.0900771 kg
  property price 0.38 EUR2005; name ByP_price_EUR2005
    Temporary price data. Calculated as 90% of purchasers price based on: Zinc content in concentrate 53%. Concentrate price per kg Zn 86.5% of refined Zn price (13.5% treatment charges according to CHR Metals Limited 2005: Dynamic cost curves. http://www.minecost.com/dynamic.pdf). 2004 zinc price from USGS (2007) Mineral commodity summaries 2007. <http://minerals.usgs.gov/minerals/pubs/mcs/2007/mcs2007.pdf> [Accessed 25 May 2010]
  property zinc content 0.53; name zinc_C_zinc_concentrate
    Zinc content on a dry matter basis. Value taken from teh "zinc mine operation" /GLO dataset.
  property dry mass 1 kg; name DM_zinc_concentrate
  property carbon content 0
    carbon content on a dry matter basis (reserved; not for manual entry)
  property true value 0.0342293
    allocation property applied in "true value" allocation // value calculated from revenue
  properties: wet mass 1 kg, water content 0, carbon content, non-fossil 0, carbon content, fossil 0, water in wet mass 0 kg, carbon allocation 0 kg
- copper: 0 kg; By-product classification allocatable product; CPC 41413: Refined copper and copper alloys, unwrought; master alloys of copper
  production volume 332.773 kg
  property price 5.52 EUR2005
    Literature value (http://www.economist.com/news/business/21576714-mining-industry-has-enriched-chile-its-future-precarious-copper-solution). Average price between 20015 and 2013.
  property carbon content 0
    carbon content on a dry matter basis (reserved; not for manual entry)
  property true value 1836.91
    allocation property applied in "true value" allocation // value calculated from revenue
  properties: water in wet mass 0 kg, water content 0, carbon content, non-fossil 0, dry mass 1 kg, carbon content, fossil 0, wet mass 1 kg, carbon allocation 0 kg
- lead: 0 kg; CPC 41441: Lead, unwrought; By-product classification allocatable product
  EcoSpold01Location=SE
  production volume 8.67011 kg
  property price 0.744 EUR2005
    Temporary price data. Calculated as 90% of purchasers price based on: Source: ecoinvent v2 report 10-part IX, Tab 5.10 & 2.5
  property carbon content 0
    carbon content on a dry matter basis (reserved; not for manual entry)
  property true value 6.45056
    allocation property applied in "true value" allocation // value calculated from revenue
  properties: wet mass 1 kg, water content 0, carbon content, non-fossil 0, carbon content, fossil 0, dry mass 1 kg, water in wet mass 0 kg, carbon allocation 0 kg
- nickel, 99.5%: 0 kg; CPC 41422: Unwrought nickel; By-product classification allocatable product
  EcoSpold01Location=SE
  production volume 18.0986 kg
  property price 10.4 EUR2005
    Temporary price data. Calculated as 90% of purchasers price based on: 2004 nickel price from USGS (2007) Mineral commodity summaries 2007. <http://minerals.usgs.gov/minerals/pubs/mcs/2007/mcs2007.pdf> [Accessed 25 May 2010]
  property carbon content 0
    carbon content on a dry matter basis (reserved; not for manual entry)
  property true value 188.226
    allocation property applied in "true value" allocation // value calculated from revenue
  properties: water in wet mass 0 kg, wet mass 1 kg, carbon content, non-fossil 0, dry mass 1 kg, water content 0, carbon content, fossil 0, carbon allocation 0 kg
- silver: 0 kg; CPC 41310: Silver (including silver plated with gold or platinum), unwrought or in semi-manufactured forms, or in powder […]; By-product classification allocatable product; CAS 7440-22-4
  EcoSpold01Location=SE
  production volume 2.98881 kg
  property price 178 EUR2005
    (same comment as for lead)
  property carbon content 0
    carbon content on a dry matter basis (reserved; not for manual entry)
  property true value 532.008
    allocation property applied in "true value" allocation // value calculated from revenue
  properties: wet mass 1 kg, carbon content, non-fossil 0, dry mass 1 kg, water content 0, carbon content, fossil 0, water in wet mass 0 kg, carbon allocation 0 kg
- palladium: 0 kg; CPC 4160: Other non-ferrous metals and articles thereof (including waste and scrap of some metals); cermets and articles […]; By-product classification allocatable product
  EcoSpold01Location=SE
  production volume 0.16545 kg
  property price 5640 EUR2005
    Temporary price data. Calculated as 90% of purchasers price based on: 2004 price from USGS (2007) Mineral commodity summaries 2007. <http://minerals.usgs.gov/minerals/pubs/mcs/2007/mcs2007.pdf> [Accessed 25 May 2010]
  property carbon content 0
    carbon content on a dry matter basis (reserved; not for manual entry)
  property true value 933.138
    allocation property applied in "true value" allocation // value calculated from revenue
  properties: wet mass 1 kg, carbon content, fossil 0, water in wet mass 0 kg, water content 0, carbon content, non-fossil 0, dry mass 1 kg, carbon allocation 0 kg
- gold: 0 kg; CPC 41320: Gold (including gold plated with platinum), unwrought or in semi-manufactured forms, or in powder form; By-product classification allocatable product; CAS 7440-57-5
  EcoSpold01Location=SE
  production volume 0.0907321 kg
  property price 10600 EUR2005
    Temporary price data. Calculated as 90% of purchasers price based on: Source: ecoinvent v2 report 10-part IX, Tab 2.5
  property carbon content 0
    carbon content on a dry matter basis (reserved; not for manual entry)
  property true value 961.761
    allocation property applied in "true value" allocation // value calculated from revenue
  properties: wet mass 1 kg, carbon content, fossil 0, dry mass 1 kg, carbon content, non-fossil 0, water content 0, water in wet mass 0 kg, carbon allocation 0 kg
- iron scrap, sorted, pressed: 0 kg; By-product classification Recyclable; CPC 39310: Slag, dross, scalings and other waste from the manufacture of iron or steel; pedigree (1,1,1,1,1)
  Iron scrap recovered from this waste.
  production volume 42.7634 kg
  property price 0.175 EUR2005
    Temporary price data. Calculated as 90% of purchasers price based on: 2005 import and export prices (total trades (USD) divided by total weight (kg) in biggest economies of the world: EU27, USA, Brasil, China, India, Japan and Russia) from UN Commodity Trade Statistics Database (http://data.un.org/Explorer.aspxDatabase [Accessed 2011.06.20]). Commodity: Waste or scrap, of cast iron
  property carbon content 0
    carbon content on a dry matter basis (reserved; not for manual entry)
  property true value 7.48359
    allocation property applied in "true value" allocation // value calculated from revenue
  properties: water content 0, water in wet mass 0 kg, carbon content, fossil 0, dry mass 1 kg, carbon content, non-fossil 0, wet mass 1 kg, carbon allocation 0 kg

## Inputs from technosphere
- aluminium, wrought alloy: 9983.95 kg; source Starzner S. and Wurmer-Weiss P.  2000; lognormal variance with pedigree 0.1461, pedigree (5,5,5,3,3)
  Estimated from data of small plants. The infrastructure of the air separation plant contains besides cold resistant steel and aluminium for the piping and the column also low-alloyed steel and various other materials in the compressors and other components. . The weight of the equipment is largely dependent of the size of the plant. For small plants with an output of 100 kg liquefied product per hour a plant weight of 8-10 t is common. For very large plants the specific weight (referred to the output per hour) of the plant is estimated to be more than 10 times smaller. For this inventory an amount of 10 kg per kg hourly production output was assumed. This leads to a total plant weight of 100 t. 10% of the total weight was accounted as aluminium for the column. The rest was assumed to be a similar material composition as used for the production facilities in the chemical industry.
  EcoSpold01Location=RER
  Uncertainty: Estimated from data of small plants
  properties: wet mass 1 kg, dry mass 1 kg
- decommissioned chemical production facilities: -89855.5 kg; lognormal variance with pedigree 0.4461, pedigree (5,5,5,3,3)
  EcoSpold01Location=RER
  Estimated from data of small plants. For the disposal it was assumed that the aluminium column is recycled and therefore no disposal process was included for this part. For the rest of the plant the process "decommissioned chemical production facilities” is applied.
  Uncertainty: Estimated from data of small plants
  production volume 90000 kg
    Calculated from the production volume of air separation facility in proportion to the respective output amounts.
  properties: carbon content, non-fossil 5.78006e-6, wet mass 1 kg, dry mass 1 kg, carbon content, fossil 0.0169382
  note on carbon content, non-fossil: Calculated from C content in input materials in the infrastructure
- chemical factory: 89855.5 kg; source Starzner S. and Wurmer-Weiss P.  2000; lognormal variance with pedigree 0.4461, pedigree (5,5,5,3,3)
  (same comment as for aluminium, wrought alloy)

## Inputs from nature
- Transformation, from unspecified [natural resource, land]: 998.395 m2; source Schmocker A. 2002; lognormal variance with pedigree 0.2141, pedigree (4,5,5,3,3)
  Estimated from data of small plants. The land use of the air separation plant depends on the size of the plant. For small plants with an output of 100 kg liquefied product per hour a space requirement of 0.3 m2 per kg hourly production is reported. For larger plants with an output of 3000 kg liquefied product per hour the space requirement lowers to 0.2 m2 per kg hourly production. For very large plants the land use was estimated to be about 0.1 m2 per kg hourly production. For this inventory an average amount of 0.1 m2 per kg hourly production output was assumed. This leads to a total area occupied by the plant of 1000 m2.
  Further references:
  Cosmodyne (2001) Performance Specifications, Aspen 1000 / Aspen 2000. Cosmodyne, Torrance, (CA, USA). Retrieved 16.01.2002 from www.cosmodyne.com
  Uncertainty: Estimated from data of small plants
- Occupation, industrial area [natural resource, land]: 19967.9 m2*year; lognormal variance with pedigree 0.1341, pedigree (4,5,5,3,3)
  Estimated from data of small plants. For the time of occupation 20 years were assumed as plant lifetime, thus a total of 20000 m2*year was obtained.
  Uncertainty: Estimated from data of small plants
- Occupation, construction site [natural resource, land]: 998.395 m2*year; lognormal variance with pedigree 0.1341, pedigree (4,5,5,3,3)
  Estimated from data of small plants. One year of occupation as construction site for construction and dismantling was assumed. The occupation of the area before the occupation as industrial area is not known (transformation from unknown).
  Uncertainty: Estimated from data of small plants
- Transformation, to industrial area [natural resource, land]: 998.395 m2; source Schmocker A. 2002; lognormal variance with pedigree 0.2141, pedigree (4,5,5,3,3)
  (same comment as for Transformation, from unspecified)

## Sampling procedure
Estimation from weak data of smaller plants.

## Extrapolations
Extrapolation small plants with a production volume of 0.1-3 t per hour to a larger plant with 10 t per hour production.

## Review by Emilia Moreno Ruiz 2012-03-25
trainee DS, ok, Alba Canovas

## Review by Emilia Moreno Ruiz 2012-04-04
trainee DS; ok, Alba Canovas

## Review by Roland Hischier 2003-08-26
Passed.
