# copper mine operation, sulfide ore

Dataset: EcoSpold 2, unit process
Geography: RAS
Time period: 1994-01-01 to 2019-12-31
Technology level: current
Classification: ISIC rev.4 ecoinvent: 0729:Mining of other non-ferrous metal ores
Synonyms: Molybdenite; Molybdänit; Copper concentrate; Kupfererz konzentrat
Tags: ConvertedDataset
Scenario: Business-as-Usual
System model: Allocation at the point of substitution
Share of production covered: 84 %
Generated by: [System]
Published in: Althaus H.-J. 2004
Database: ecoinvent
isCopyrightProtected: true
accessRestrictedTo: 1

## General comment
The multi-output-process 'mining copper-ore' delivers the co-products 'copper concentrate, at beneficiation' and 'molybdenum, molybdenite concentrate, couple production Cu'. The product 'copper concentrate' is a intermediary process required in the following copper production (5.2.5 Winning of primary copper in ecoinvent). The module 'molybdenite concentrate' is designed for the use in Ecoinvent as starting material for the manufacturing of molybdenum trioxide and ferromolybdenum, both materials which used in the manufacturing of high quality steels and alloys.
[This dataset was already contained in the ecoinvent database version 2. It was not individually updated during the transfer to ecoinvent version 3. Life Cycle Impact Assessment results may still have changed, as they are affected by changes in the supply chain, i.e. in other datasets. This dataset was generated following the ecoinvent quality guidelines for version 2. It may have been subject to central changes described in the ecoinvent version 3 change report (http://www.ecoinvent.org/database/ecoinvent-version-3/reports-of-changes/), and the results of the central updates were reviewed extensively. The changes added e.g. consistent water flows and other information throughout the database. The documentation of this dataset can be found in the ecoinvent reports of version 2, which are still available via the ecoinvent website. The change report linked above covers all central changes that were made during the conversion process.]

## Included activities end
The module includes a mining and a beneficiation step with the mining infrastructure and disposal of overburden and tailings (see part II 'Auxiliary Processes').

## Geography
This module is valid for the whole corresponding region. Some agents used like lime or sodium cyanide originate from data sets valid for Switzerland or Europe. Processes like blasting and transport originate from data sets valid for Switzerland or Europe.

## Technology
Mining is done 70% open pit and 30% underground, followed by joint beneficiation of copper and molybdenite trough flotation, where considerable amounts of agents are added. Overburden and tailings are disposed near the mining site.

## Parameters
- fraction, process water, to air: 0.5 dimensionless; name fraction_PW_to_air; lognormal variance with pedigree 0.092025, pedigree (4,4,3,2,4)
  Literature value. In case when no industry/process specific data are available, default evaporation fraction value is used. This value is 15% and is based on literature (Statistics Canada, 2007 & Shaffer, K.H., 2008, Consumptive water use in the Great Lakes Basin, USGS & Shiklomanov, 2003, World Water Resources at the Beginning of the 21st Century) and has been approved by an expert.

## Reference product
- copper concentrate, sulfide ore: 1 kg; By-product classification allocatable product; CPC 14290: Other non-ferrous metal ores and concentrates (other than uranium or thorium ores and concentrates)
  production volume 1.11009e10 kg; = 4.06*(2971200000-237000000)
    Concentrate per kg Cu (4.06) times the RAS primary Cu production minus the amount of Cu from Nickel mine operation
  property silver content 0; name copper_conc_Ag_content
    silver content on a dry matter basis
  property price 0.534 EUR2005
    Temporary price data. Calculated as 90% of purchasers price based on: Concentrate per kg Cu (3.15). Concentrate price per kg Cu 77% of refined Cu price (23% treatment and refining charges according to Barr G, Defreyne J, Jones D, Mean R (2005). On-site processing vs. sale of copper concentrates. Perth: CESL. http://www.cesl.com/DocumentViewer.aspx?elementId=152856&portalName=tc ). 2004 copper price from USGS (2007) Mineral commodity summaries 2007. <http://minerals.usgs.gov/minerals/pubs/mcs/2007/mcs2007.pdf> [Accessed 25 May 2010]
  property zinc content 0; name copper_conc_Zn_content
    zinc content on a dry matter basis
  property copper content 0; name copper_conc_Cu_content
    copper content on a dry matter basis
  property carbon content 0
    carbon content on a dry matter basis (reserved; not for manual entry)
  property true value 0.534
    allocation property applied in "true value" allocation // value calculated from revenue
  properties: water content 0, wet mass 1 kg, carbon content, non-fossil 0, carbon content, fossil 0, dry mass 1 kg, water in wet mass 0 kg, carbon allocation 0 kg

## By-products
- molybdenite: 0 kg; CPC 4160: Other non-ferrous metals and articles thereof (including waste and scrap of some metals); cermets and articles […]; By-product classification allocatable product
  production volume 4.85367e7 kg; = 50243000*0.579*1.66846
    9.5 million tonnes in Cu in 1994
    USGS (2006) Molybdenum Table 11 for 2005; share of Mo from this ore type (57.9%); Mo concentrate = MoS2 per kg Mo (1.66846)
  property price 37.5 EUR2005
    Calculated based on literature data. The price of molybdenum in 2005 was between 70 and 81 USD (http://minerals.usgs.gov/minerals/pubs/commodity/molybdenum/molybmyb05.pdf, accessed 20140612). The amount of molybdenum in 1kg of molebnite is calculated based on molar mass to be 0.599kg. The resulting price for this type of molybdenite is thus 37.43 Euro.
  property carbon content 0
    carbon content on a dry matter basis (reserved; not for manual entry)
  property true value 0.154125
    allocation property applied in "true value" allocation // value calculated from revenue
  properties: wet mass 1 kg, water content 0, dry mass 1 kg, carbon content, fossil 0, carbon content, non-fossil 0, water in wet mass 0 kg, carbon allocation 0 kg

## Inputs from technosphere
- conveyor belt: 3.6861e-6 m; lognormal variance with pedigree 0.446, pedigree (5,5,5,1,3)
- electricity, medium voltage: 0.419828 kWh; lognormal variance with pedigree 0.0412, pedigree (2,3,5,1,1)
- blasting: 0.0487342 kg; lognormal variance with pedigree 0.0407, pedigree (2,2,5,1,1)
- mine infrastructure, underground, non-ferrous metal: 1.82365e-10 unit; lognormal variance with pedigree 0.446, pedigree (5,5,5,1,3)
- aluminium hydroxide factory: 4.0974e-10 unit; lognormal variance with pedigree 0.3601, pedigree (3,2,5,1,3)
- electricity, high voltage: 0.63013 kWh; lognormal variance with pedigree 0.0412, pedigree (2,3,5,1,1)
  activityLink added to better reflect the reality of the supply chain
- chemical, inorganic: 0.0374819 kg; lognormal variance with pedigree 0.16, pedigree (1,1,5,1,1)
  reported values
  properties: wet mass 1 kg, dry mass 1 kg, carbon content, fossil 0.003
  note on carbon content, fossil: This dataset is an unweighted average of 20 inorganic substances (listed in Tab 88.1, ecoinvent v2.2 report 8, part II), being part of the top100 chemicals included in this database. The C-content has also been calculated as an unweighted average of the C content of the substances composing this dataset.
- steel, chromium steel 18/8, hot rolled: 0.0336017 kg; lognormal variance with pedigree 0.05, pedigree (1,1,5,1,1)
  reported values
  properties: carbon content, fossil 0.0008, wet mass 1 kg, dry mass 1 kg
  note on carbon content, fossil: Stainless steel model is the grade 304 steel (18/8 stainless, 18% chromium 8% nickel; max. 0.08% C)
- sodium cyanide: 0.00170725 kg; lognormal variance with pedigree 0.16, pedigree (1,1,5,1,1)
  reported values
  properties: wet mass 1 kg, dry mass 1 kg, carbon content, fossil 0.244898
- diesel, burned in building machine: 0.00266951 MJ; lognormal variance with pedigree 0.0407, pedigree (2,2,5,1,1)
- sulfidic tailings, from copper mine operation: 0 kg; pedigree (1,1,1,1,1)
  production volume 0 kg
    Calculated from the production volume of copper concentrate in proportion to the respective output amounts.
  properties: aluminium content 0.015758, oxygen content 0.88899, magnesium content 0.0022944, sodium content 0.0015148, potassium content 0.0026178, silicon content 0.055278, iron content 0.014771, water content 0.428571, dry mass 0.7 kg, carbon content, fossil 0.0087785, wet mass 1 kg, calcium content 0.0045119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
- lime, packed: 0.0642546 kg; lognormal variance with pedigree 0.04, pedigree (1,1,5,1,1)
  reported values
  properties: wet mass 1 kg, carbon content, fossil 0.117492, water content 0.00200401, dry mass 0.998 kg
  note on carbon content, fossil: Table 3.1, ecoinvent v2.2 report 7, part VII, pg 3. MW CaCO3=100, MW MgCO3=84
- mine infrastructure, open cast, non-ferrous metal: 4.175e-10 unit; lognormal variance with pedigree 0.446, pedigree (5,5,5,1,3)
- chemical, organic: 0.0110195 kg; lognormal variance with pedigree 0.16, pedigree (1,1,5,1,1)
  reported values
  properties: dry mass 1 kg, carbon content, fossil 0.628, wet mass 1 kg
  note on carbon content, fossil: This dataset is an unweighted average of 20 organic substances (listed in Tab 88.1, ecoinvent v2.2 report 8, part II), being part of the top100 chemicals included in this database. The C-content has also been calculated as an unweighted average of the C content of the substances composing this dataset.
- sulfidic tailings, from copper mine operation: -59.8176, -16.673, -20.5121 kg (3 entries); lognormal variance with pedigree 0.0407, pedigree (2,2,5,1,1)
  production volume 1.38761e12 kg

## Inputs from nature
- Copper, in ground [natural resource, in ground]: 0.253759 kg; lognormal variance with pedigree 0.0407, pedigree (2,2,5,1,1)
  0.52% Cu in sulfide; 0.27% Cu and 82 ppm Mo in ore
- Occupation, mineral extraction site [natural resource, land]: 0.00254535 m2*year; lognormal variance with pedigree 0.0807, pedigree (2,2,5,1,1)
- Transformation, from unspecified [natural resource, land]: 8.45864e-5 m2; lognormal variance with pedigree 0.1607, pedigree (2,2,5,1,1)
- Water, river [natural resource, in water]: 0.0651858 m3; name water_river_input; lognormal variance with pedigree 0.0407, pedigree (2,2,5,1,1)
- Transformation, to mineral extraction site [natural resource, land]: 8.45864e-5 m2; lognormal variance with pedigree 0.1607, pedigree (2,2,5,1,1)
- Holmium, in ground [natural resource, in ground]: 0.00608401 kg; lognormal variance with pedigree 0.0407, pedigree (2,2,5,1,1)
  160 ppm Mo in sulfide; 0.27% Cu and 82 ppm Mo in ore

## Emissions to nature
- Calcium, ion [water, surface water]: 0.0446989 kg; lognormal variance with pedigree 1.37, pedigree (1,1,5,1,1)
  reported values
- Antimony [air, non-urban air or from high stacks]: 4.48541e-9 kg; lognormal variance with pedigree 0.1001, pedigree (3,2,5,1,3)
- Copper [air, non-urban air or from high stacks]: 1.11747e-6 kg; lognormal variance with pedigree 0.1001, pedigree (3,2,5,1,3)
- Iron, ion [water, surface water]: 1.89349e-5 kg; lognormal variance with pedigree 1.37, pedigree (1,1,5,1,1)
  reported values
- Nitrogen, organic bound [water, surface water]: 0.0014822 kg; lognormal variance with pedigree 1.37, pedigree (1,1,5,1,1)
  reported values
- Nickel [air, non-urban air or from high stacks]: 1.79261e-6 kg; lognormal variance with pedigree 0.1001, pedigree (3,2,5,1,3)
- Carbon dioxide, fossil [air, non-urban air or from high stacks]: 0.0282472 kg; lognormal variance with pedigree 0.3326, pedigree (5,3,5,5,5)
- Cadmium [air, non-urban air or from high stacks]: 2.46775e-9 kg; lognormal variance with pedigree 0.1001, pedigree (3,2,5,1,3)
- Arsenic [air, non-urban air or from high stacks]: 3.36017e-8 kg; lognormal variance with pedigree 0.1001, pedigree (3,2,5,1,3)
- Fluorine [air, non-urban air or from high stacks]: 2.1263e-5 kg; lognormal variance with pedigree 0.1001, pedigree (3,2,5,1,3)
- Aluminium [water, surface water]: 5.62616e-6 kg; lognormal variance with pedigree 1.37, pedigree (1,1,5,1,1)
  reported values
- Zinc, ion [water, surface water]: 4.94326e-6 kg; lognormal variance with pedigree 1.37, pedigree (1,1,5,1,1)
  reported values
- COD, Chemical Oxygen Demand [water, surface water]: 0.000679019 kg; lognormal variance with pedigree 1.37, pedigree (1,1,5,1,1)
  reported values
- Cobalt [air, non-urban air or from high stacks]: 4.48541e-7 kg; lognormal variance with pedigree 0.1001, pedigree (3,2,5,1,3)
- Mercury [air, non-urban air or from high stacks]: 1.11747e-9 kg; lognormal variance with pedigree 0.1001, pedigree (3,2,5,1,3)
- Particulates, > 10 um [air, non-urban air or from high stacks]: 0.00110195 kg; lognormal variance with pedigree 0.3721, pedigree (3,2,5,1,5)
- Water [air, unspecified]: 0.0325929 m3; name water_to_air_unspecified; = (water_river_input*fraction_PW_to_air); lognormal variance with pedigree 0.0807, pedigree (2,2,5,1,1)
  Calculated value based on literature values and expert opinion. See comments in the parametres' comment field.
  property fraction, origin: salt water 0; name fraction_origin_salt_water
  property fraction, origin: unspecified 0; name fraction_origin_unspecified
  property fraction, origin: fresh water 1; name fraction_origin_fresh_water
- Dissolved solids [water, surface water]: 0.000336793 kg; lognormal variance with pedigree 1.37, pedigree (1,1,5,1,1)
  reported values
- Selenium [air, non-urban air or from high stacks]: 1.11747e-9 kg; lognormal variance with pedigree 0.1001, pedigree (3,2,5,1,3)
- Nickel, ion [water, surface water]: 1.58308e-6 kg; lognormal variance with pedigree 1.37, pedigree (1,1,5,1,1)
  reported values
- Cyanide [water, surface water]: 0.000189349 kg; lognormal variance with pedigree 0.1682, pedigree (4,2,5,3,4)
- BOD5, Biological Oxygen Demand [water, surface water]: 0.000679019 kg; lognormal variance with pedigree 1.37, pedigree (1,1,5,1,1)
  reported values
- Manganese [air, non-urban air or from high stacks]: 2.1263e-5 kg; lognormal variance with pedigree 0.1001, pedigree (3,2,5,1,3)
- TOC, Total Organic Carbon [water, surface water]: 0.000265399 kg; lognormal variance with pedigree 1.37, pedigree (1,1,5,1,1)
  reported values
- Arsenic, ion [water, surface water]: 1.92453e-7 kg; lognormal variance with pedigree 1.37, pedigree (1,1,5,1,1)
  reported values
- Cadmium, ion [water, surface water]: 2.05646e-8 kg; lognormal variance with pedigree 1.37, pedigree (1,1,5,1,1)
  reported values
- Particulates, > 2.5 um, and < 10um [air, non-urban air or from high stacks]: 0.00993308 kg; lognormal variance with pedigree 0.5521, pedigree (3,2,5,1,5)
- DOC, Dissolved Organic Carbon [water, surface water]: 0.000265399 kg; lognormal variance with pedigree 1.37, pedigree (1,1,5,1,1)
  reported values
- Zinc [air, non-urban air or from high stacks]: 4.26036e-6 kg; lognormal variance with pedigree 0.1001, pedigree (3,2,5,1,3)
- Water [water, unspecified]: 0.0325929 m3; name water_to_water_unspecified; = water_river_input*(1-fraction_PW_to_air); lognormal variance with pedigree 0.0807, pedigree (2,2,5,1,1)
  (same comment as for Water)
  property carbon content, non-fossil 0; name C_content_non_fossil
  property dry mass 0 kg; name DM
  property water in wet mass 1000 kg; name WWM
  property fraction, origin: unspecified 0; name fraction_origin_unspecified_Ww
  property carbon content, fossil 0; name C_content_fossil
  property wet mass 1000 kg; name WM
  property fraction, origin: fresh water 1; name fraction_origin_fresh_water_Ww
  property fraction, origin: salt water 0; name fraction_origin_salt_water_Ww
- Cobalt [water, surface water]: 5.0907e-8 kg; lognormal variance with pedigree 1.37, pedigree (1,1,5,1,1)
  reported values
- Chromium [air, non-urban air or from high stacks]: 2.2427e-6 kg; lognormal variance with pedigree 0.1001, pedigree (3,2,5,1,3)
- Carbon disulfide [air, non-urban air or from high stacks]: 0.00487342 kg; lognormal variance with pedigree 0.2501, pedigree (4,2,5,5,4)
- Lead [water, surface water]: 1.82365e-7 kg; lognormal variance with pedigree 1.37, pedigree (1,1,5,1,1)
  reported values
- Particulates, < 2.5 um [air, non-urban air or from high stacks]: 0.0114075 kg; lognormal variance with pedigree 0.3721, pedigree (3,2,5,1,5)
- Lead [air, non-urban air or from high stacks]: 3.13513e-7 kg; lognormal variance with pedigree 0.1001, pedigree (3,2,5,1,3)
- Beryllium [air, non-urban air or from high stacks]: 5.82792e-8 kg; lognormal variance with pedigree 0.1001, pedigree (3,2,5,1,3)
- Mercury [water, surface water]: 2.45223e-9 kg; lognormal variance with pedigree 1.37, pedigree (1,1,5,1,1)
  reported values
- Sulfate [water, surface water]: 0.153652 kg; lognormal variance with pedigree 1.37, pedigree (1,1,5,1,1)
  reported values
- Chromium, ion [water, surface water]: 3.56194e-8 kg; lognormal variance with pedigree 1.37, pedigree (1,1,5,1,1)
  reported values
- Boron [air, non-urban air or from high stacks]: 2.2427e-7 kg; lognormal variance with pedigree 0.1001, pedigree (3,2,5,1,3)
- Copper, ion [water, surface water]: 5.16054e-7 kg; lognormal variance with pedigree 1.37, pedigree (1,1,5,1,1)
  reported values
- Manganese [water, surface water]: 1.60637e-6 kg; lognormal variance with pedigree 1.37, pedigree (1,1,5,1,1)
  reported values

## Sampling procedure
literature

## Extrapolations
see Geography and Technology
