# iron mine operation and iron ore beneficiation to 65% Fe

Dataset: EcoSpold 2, unit process
Geography: CA-QC
Time period: 2011-01-01 to 2019-12-31
Technology level: current
Classification: EcoSpold01Categories: metals/extraction
Classification: ISIC rev.4 ecoinvent: 0710:Mining of iron ores
Scenario: Business-as-Usual
System model: Allocation at the point of substitution
Share of production covered: 65 %
Generated by: Catherine Reid
Database: ecoinvent
isCopyrightProtected: true
accessRestrictedTo: 1

## General comment
This dataset represents the production of 1 kg of iron concentrate containing 66.15% of Fe (dry basis) in Quebec in 2011. The concentrate is produced at 4% humidity.
Specific data were collected for one compagny which represents nearly 65% of the Québec's production for the year 2011.
The iron ore is extracted in two open pit mine; the main pit, where 92% of the ore is extracted, is located on the same site as the concentrator and the extra pit, used only when needed, is located 60 km from the concentrator. The ore is then transported by train.
65% of the 2011 production have been used in the production of iron pellet in Québec, the rest has been sold to other part of Canada, United States, Europe and China.

## Included activities start
From the extraction of iron ore.

## Included activities end
This activity ends at the gate of the beneficiation plant.

The dataset includes :
1- Extraction of the iron ore in a open pit mine. The site includes a main pit and extra pit used when needed.
2- Crushing and concentration of the ore. The crushing is done with gyratory crushers and the concentration is realized by separating the silica and the iron by gravity.
3- Waste rocks piles
4- Taillings site and polishing pond (main pit only)
5- Wastewater treatment
6- Tranport of the ore extracted in the extra pit to the concentrator

Note that the solid waste produce on site are buried in the waste rock piles (7.51E-7 m³/kg : 33% domestic waste, 31% wood, 13% cardboard, 3% metals not contaminated with oil, 9% glass/textiles/plastics and 10% construction and demolition waste).

The dataset doesn't include :
1- the wastewater chemicals
2- Some of the waste because of a lack of information and because the end of life of these waste didn't exist in ecoinvent when this data was created. Note that the quantities of these waste have a very low importance.
a) Landfill : sediment sludge or oil settling (1.938E-5 kg/kg), activated carbon (4.309E-8 kg/kg), Labpack HW (water reactive) (2.789E-10 kg/kg), sodium carbonate (7.286E-8 kg/kg), contaminated equipment (2.317E-6 kg/kg), contaminated absorbent (4.28E-5 kg/kg)
b) Recycling : used oil filters (6.095E-6 kg/kg), antifreeze/brake and hydraulic fluid (4.003E-6 kg/kg), lead batteries (1.206E-6 k/kg), activated glass (4.557E-7 kg/kg), batteries/other accumulators (2.45E-7 kg/kg), sikagrout and waste contaminated to mercury (6.251E-7 kg/kg), contaminated containers (4.652E-7 kg/kg), Aerosol cans/lubricant/paint (4.415E-7 kg/kg), empty barrels contaminated with sulfuric acid (1.883E-8 kg/kg) and empty barrels contaminated with toluene (2.101E-7 kg/kg)
c) Physico-chemical treatement : oily water/emulsions (3.775E-6 kg/kg), laboratory acid and base (4.846E-8 kg/kg)
d) Lack of information on the product (not able to add the input) : laboratory product sent to incineration (7.6E-8E-8 kg/kg), flammable solid sent to incineration (5.564E-7 kg/kg)

## Geography
Data relate to the Quebec average

## Technology
Milling and mechanical sorting. Average iron yield is 75%.
Specific data were collected on one of the two production site in Quebec. According to the documentation available, the technologies of the 2 mines seems similar. Uncertainity has been adjusted accordingly.

## Time period
Collected data for Quebec industry for the year 2011

## Parameters
- fraction, process water, to air: 0.095 dimensionless; name fraction_PW_to_air; lognormal variance with pedigree 0.25, pedigree (5,5,5,5,5)
  Literature value (Statistics Canada, 2007 & Shaffer, K.H., 2008, Consumptive water use in the Great Lakes Basin, USGS) (Vionnet, S., Quantis Water Database - Technical Report, 2012).
  Uncertainty: Proxy. The uncertainty has been maximized.
- yield: 0.75; name yield_iron_recovery; lognormal variance with pedigree 0.0141, pedigree (4,2,1,1,1)
  Data estimated by the data provider (source : questionnaire).
- annual production: 1.43422e10 kg; name annualProduction; lognormal variance with pedigree 0.0007, pedigree (1,2,1,1,1)
  Annual production of the data provider of iron ore 65%.
  Assumption : constant production over the years.

## Reference product
- iron ore, beneficiated, 65% Fe: 1 kg; name prod_ironOre65_kg; CPC 14100: Iron ores and concentrates, other than roasted iron pyrites; By-product classification allocatable product
  Measured Value. Reference product given on a dry basis but produce at 4% humidity.
  EcoSpold01Location=GLO
  production volume 2.23422e10 kg; name annualProd_ironOre65; = 14342188000+8000000000
    The first quantity represent the production volume of the company who provided the data.
    The second quantity is an estimation of the production volume of the other company located in Québec (http://www.mrn.gouv.qc.ca/publications/mines/publications/publication-2011-chapitre6.pdf).
  property iron content 0.6615; name prod_ironOre65_kg_Fe_content
    Measured Value. Iron content on a dry matter basis.
  property input 0 l; name prod_ironOre65_kg_input
  property carbon content, non-fossil 0
    Iron ores are mixtures of up to 400 different minerals. The most important ones are the iron oxides and sulphides (ecoinvent v2.2 report 10_partII)
  property carbon content, fossil 0
    (same comment as for iron ore, beneficiated, 65% Fe)
  property price 0.0467 EUR2005; name prod_ironOre65_kg_price_EUR2005
    Calculated based on literature value (UN Commodity Trade Statistics Database) using data on trade value and net weight (kg) for 5 reference countries/regions (EU-27, USA, JP, CN and IN) which weighted (by net weight) average is assumed to be a good approximation of the global price. The UN classification; 2601 Iron ores and concentrates, roasted iron pyrites (accessed 20140508). Data for the year 2005.
  property carbon content 0
    carbon content on a dry matter basis (reserved; not for manual entry)
  properties: water in wet mass 0 kg, dry mass 1 kg, water content 0, wet mass 1 kg, carbon allocation 0 kg

## Inputs from technosphere
- mine infrastructure, iron: 3.23331e-13 unit; = 1/(yearly_output*lifetime); lognormal variance with pedigree 0.008, pedigree (1,1,4,1,1)
  Estimation based on the ecoinvent iron mine operation, crude ore, 46%, GLO dataset (ecoinvent v3).
  Uncertainty: Calculated variable. Uncertainty will be determined from propagation of uncertainty factors of underlying variables.
  property yearly output 4.61612e10 kg; name yearly_output
  note on yearly output: Measured Value given by data provider (source : questionnaire).
- electricity, high voltage: 0.03992 kWh; lognormal variance with pedigree 0.0087, pedigree (1,2,4,1,1)
  Measured Value given by data provider (source : questionnaire). Reported as 161 kV mainly and 44 kV. The high voltage is between 44 kV and 315 kV in Quebec
  Souce: http://www.hydroquebec.com/transenergie/fr/commerce/pdf/characteristics-and-target-values-of-voltage.pdf
- hazardous waste, for incineration: -8.953e-5 kg; name hazardousWaste; lognormal variance with pedigree 0.0087, pedigree (1,2,4,1,1)
  Measured Value given by data provider (source : questionnaire). Reported as diesel sent to incineration.
  production volume 2.0003e6 kg; = annualProd_ironOre65*hazardousWaste/prod_ironOre65_kg
    Calculated from production volume of reference product using the relative outputs.
  property price 0 EUR2005; name hazardousWaste_price_EUR2005
  properties: carbon content, fossil 0.554667, dry mass 0.75 kg, wet mass 1 kg, water content 0.333333
  note on carbon content, fossil: Tab A.6, ecoinvent v2.2 report 13_I. C content has been calculated after data in the tables, and then referred to 1 kg DM
- heat, district or industrial, other than natural gas: 0.0247127 MJ; = fuel_input_HFO*density_HFO*1000*Net_heat_value_HFO/fuel_use_HFO; lognormal variance with pedigree 0.008, pedigree (1,1,4,1,1)
  Calculated Value. Calculation is based on reported fuel input (in m3), the Net Heating Value of the fuel and efficiency (1/Fuel_use).
  Uncertainty: Calculated variable. Uncertainty will be determined from propagation of uncertainty factors of underlying variables.
  property fuel input in physical units, m3 6.796e-7 m3; name fuel_input_HFO
  property heating value, net 41.2 MJ; name Net_heat_value_HFO
  property density 1 kg/l; name density_HFO
  property Corresponding fuel use 1.133 MJ; name fuel_use_HFO
  note on fuel input in physical units, m3: Measured Value given by data provider (source : questionnaire). Fuel input in m³.
  note on heating value, net: Net (lower) heating (calorific) value. Value Taken from Table 5.1 of report "Overview and methodology, Data quality guideline for the ecoinvent database version 3" (ecoinvent report No. 1 (v3), 2011)
  note on density: Density value. Value Taken from Table 5.1 of report "Overview and methodology, Data quality guideline for the ecoinvent database version 3" (ecoinvent report No. 1 (v3), 2011)
  note on Corresponding fuel use: Lower heating value of the fuel input related to the heat/electricity output Source : heat production, heavy fuel oil, at industrial furnace 1MW, GLO
- diesel, low-sulfur: 0.00014946 kg; = (input_ammoniumNitrate*fractionFuel_input_ammoniumNitrate); lognormal variance with pedigree 0.008, pedigree (1,1,4,1,1)
  Calculated Value based on this estimation : the explosive Anfo is made of about 94 percent of ammonium nitrate and 6 percent of diesel.
  Assumption : diesel low sulfur.
  Uncertainty: Calculated variable. Uncertainty will be determined from propagation of uncertainty factors of underlying variables.
  properties: wet mass 1 kg, dry mass 1 kg, carbon content, fossil 0.865
- spent solvent mixture: -2.189e-6 kg; name spentSolventMixture; lognormal variance with pedigree 0.0087, pedigree (1,2,4,1,1)
  Measured Value given by data provider (source : questionnaire). Reported as non-halogenated organic solvents sent to incineration.
  production volume 48907 kg; = annualProd_ironOre65*spentSolventMixture/prod_ironOre65_kg
    Calculated from production volume of reference product using the relative outputs.
  property price 0 EUR2005; name spentSolventMixture_price_EUR2005
  properties: carbon content, fossil 0.571257, wet mass 1 kg, water content 0.197605, dry mass 0.835 kg
  note on carbon content, fossil: Tab A.7, ecoinvent v2.2 report 13_I. C content has been calculated after data in the tables, and then referred to 1 kg DM
- diesel, burned in building machine: 0.0989784 MJ; = ((fuel_input_diesel*density_diesel_buildingmachine*1000)-(input_ammoniumNitrate*fractionFuel_input_ammoniumNitrate))*Net_heat_value_diesel_buildingmachine; lognormal variance with pedigree 0.008, pedigree (1,1,4,1,1)
  Calculated Value using the total consumption of the plant and substract the amount used for the explosive. Reported in m³.
  Uncertainty: Calculated variable. Uncertainty will be determined from propagation of uncertainty factors of underlying variables.
  property density 0.84 kg/l; name density_diesel_buildingmachine
  property fuel input in physical units, m3 2.931e-6 m3; name fuel_input_diesel
  property heating value, net 42.8 MJ; name Net_heat_value_diesel_buildingmachine
  note on fuel input in physical units, m3: Measured Value given by data provider (source : questionnaire). Total fuel input in m³ (used in the machinery and for the explosive preparation).
- lubricating oil: 5.0456e-5 kg; = (wasteMineralOil*-1)+(used_oil_burned_onsite*lubricant_density); lognormal variance with pedigree 0.0487, pedigree (5,2,4,1,1)
  Estimation based on the amount of lubricant burned on site and with the amount of used oil sent to incineration plant.
  property input 5.159e-5 l; name used_oil_burned_onsite
  property density 0.9 kg/l; name lubricant_density
  properties: carbon content, fossil 0.75, wet mass 1 kg, dry mass 1 kg
  note on carbon content, fossil: Lubricating oil is produced from diesel. C-content/dry mass of fats and oils considered 75%, from: ecoinvent v2.2 report, n 15a, pg 40
  note on density: Estimations taken directly from http://www.engineeringtoolbox.com/liquids-densities-d_743.html.
- ammonium nitrate, as N: 0.00087185 kg; name input_ammoniumNitrate_asN; = input_ammoniumNitrate*N_content_ammoniumNitrate; lognormal variance with pedigree 0.008, pedigree (1,1,4,1,1)
  Calculated Value. Use as an explosive (Anfor).
  Uncertainty: Calculated variable. Uncertainty will be determined from propagation of uncertainty factors of underlying variables.
  property N content 0.35; name N_content_ammoniumNitrate
  property input_kg 0.002491 kg; name input_ammoniumNitrate
  property fuel input, fraction 0.06; name fractionFuel_input_ammoniumNitrate
  properties: dry mass 1 kg, wet mass 1 kg
  note on fuel input, fraction: Estimation : the explosive Anfo is made of about 94 percent of ammonium nitrate and 6 percent of diesel. http://en.wikipedia.org/wiki/ANFO
- solvent, organic: 2.189e-6 kg; = (spentSolventMixture*-1); lognormal variance with pedigree 0.008, pedigree (1,1,4,1,1)
  Estimation based on the amount of waste solvent.
  Uncertainty: Calculated variable. Uncertainty will be determined from propagation of uncertainty factors of underlying variables.
  properties: dry mass 1 kg, carbon content, fossil 0.63072, wet mass 1 kg
- waste mineral oil: -4.025e-6 kg; name wasteMineralOil; lognormal variance with pedigree 0.0087, pedigree (1,2,4,1,1)
  Measured Value given by data provider (source : questionnaire). Reported as waste oil with BPC concentration less or equal to 3 mg/kg and waste grease sent to incineration.
  production volume 89927.3 kg; = annualProd_ironOre65*wasteMineralOil/prod_ironOre65_kg
    Calculated from production volume of reference product using the relative outputs.
  property price 0 EUR2005; name wasteMineralOil_price_EUR2005
  properties: dry mass 0.9 kg, water content 0.111111, carbon content, fossil 0.864444, wet mass 1 kg
- transport, freight train: 0.0159 metric ton*km; = (ore_extraPit/1000)*distance_extraPit; lognormal variance with pedigree 0.008, pedigree (1,1,4,1,1)
  Calculated Value.Transport of the ore from the extra pit to the concentrator.
  Uncertainty: Calculated variable. Uncertainty will be determined from propagation of uncertainty factors of underlying variables.
  property distance 60 km; name distance_extraPit
  property input_kg 0.265 kg; name ore_extraPit
  note on input_kg: Measured Value given by data provider (source : questionnaire). Ore transported from the extra pit to the concentrator on a distance of 60 km (empty return).

## Inputs from nature
- Water, lake [natural resource, in water]: 0.0006621 m3; name water_UNO_input; lognormal variance with pedigree 0.0087, pedigree (1,2,4,1,1)
  Measured Value given by data provider (source : questionnaire).
- Transformation, from forest, unspecified [natural resource, land]: 7.67488e-5 m2; = surfaceSite/(annualProduction*lifetime); lognormal variance with pedigree 0.008, pedigree (1,1,4,1,1)
  Calculated Value. See exchange properties for details.
  Uncertainty: Calculated variable. Uncertainty will be determined from propagation of uncertainty factors of underlying variables.
  property Surface 7.375e7 m2; name surfaceSite
- Transformation, to mineral extraction site [natural resource, land]: 7.67488e-5 m2; = surfaceSite/(annualProduction*lifetime); lognormal variance with pedigree 0.008, pedigree (1,1,4,1,1)
  (same comment as for Transformation, from forest, unspecified)
- Occupation, mineral extraction site [natural resource, land]: 0.00514217 m2*year; = (surfaceSite*lifetime)/(annualProduction*lifetime); lognormal variance with pedigree 0.008, pedigree (1,1,4,1,1)
  (same comment as for Transformation, from forest, unspecified)
  property lifetime 67 year; name lifetime
- Iron, in ground [natural resource, in ground]: 0.882 kg; = prod_ironOre65_kg_Fe_content/yield_iron_recovery; lognormal variance with pedigree 0.008, pedigree (1,1,4,1,1)
  46% Fe in siderite; 25% Fe in ore; Calculated Value. Reported as ore containing 31% of iron.
  3.22 kg of ore are extracted per kg of iron ore beneficated to 66.15% Fe.
  Uncertainty: Calculated variable. Uncertainty will be determined from propagation of uncertainty factors of underlying variables.

## Emissions to nature
- Dinitrogen monoxide [air, non-urban air or from high stacks]: 3.302e-9 kg; lognormal variance with pedigree 0.0487, pedigree (2,2,4,1,1)
  Measured Value given by data provider (source : questionnaire). Emissions related to the combustion of waste oil on site (4.4644E-5 kg/kg).
- Lead [air, non-urban air or from high stacks]: 3.171e-13 kg; lognormal variance with pedigree 0.86, pedigree (5,5,5,5,5)
  Estimation based on the amount of waste oil burned on site (4.4644E-5 kg/kg) and the dataset treatment of waste mineral oil, hazardous waste incineration GLO (ecoinvent v3).
  Uncertainty: Rough estimation
- Water [air, unspecified]: 6.28995e-5 m3; name water_to_air_unspecified; = (water_UNO_input*fraction_PW_to_air); lognormal variance with pedigree 0.0487, pedigree (2,2,4,1,1)
  Calculated value based on literature values and expert opinion. See comments in the parametres' comment field.
- Mercury [air, non-urban air or from high stacks]: 0 kg; pedigree (1,1,1,1,1)
  (same comment as for Lead)
- Nitrogen oxides [air, non-urban air or from high stacks]: 1.993e-5 kg; lognormal variance with pedigree 0.0487, pedigree (2,2,4,1,1)
  Measured Value given by data provider (source : questionnaire). Emissions related to explosive (Anfor) for the main pit and extra pit.
- Methane, fossil [air, non-urban air or from high stacks]: 6.191e-9 kg; lognormal variance with pedigree 0.0487, pedigree (2,2,4,1,1)
  (same comment as for Dinitrogen monoxide)
- Phosphorus [air, non-urban air or from high stacks]: 2.438e-11 kg; lognormal variance with pedigree 0.25, pedigree (5,5,5,5,5)
  (same comment as for Lead)
- Particulates, < 2.5 um [air, non-urban air or from high stacks]: 4.343e-6 kg; lognormal variance with pedigree 0.3087, pedigree (2,2,4,1,1)
  Measured Value given by data provider (source : questionnaire). Emissions related to stationnary sources (process), material transfer activities, fugitive sources (tailings) and road dust.
- Hydrocarbons, unspecified [water, surface water]: 2.689e-8 kg; lognormal variance with pedigree 0.0487, pedigree (2,2,4,1,1)
  Measured Value given by data provider (source : questionnaire). Emissions in the final effluent.
- Thallium [air, non-urban air or from high stacks]: 2.786e-14 kg; lognormal variance with pedigree 0.86, pedigree (5,5,5,5,5)
  (same comment as for Lead)
- Particulates, > 10 um [air, non-urban air or from high stacks]: 7.854e-5 kg; lognormal variance with pedigree 0.0487, pedigree (2,2,4,1,1)
  (same comment as for Particulates, < 2.5 um)
- Lead [water, surface water]: 1.958e-9 kg; lognormal variance with pedigree 0.6587, pedigree (2,2,4,1,1)
  (same comment as for Hydrocarbons, unspecified)
- Zinc [air, non-urban air or from high stacks]: 2.21e-11 kg; lognormal variance with pedigree 0.86, pedigree (5,5,5,5,5)
  (same comment as for Lead)
- Ammonium, ion [water, surface water]: 4.549e-6 kg; lognormal variance with pedigree 0.0487, pedigree (2,2,4,1,1)
  (same comment as for Hydrocarbons, unspecified)
- Sulfur dioxide [air, non-urban air or from high stacks]: 2.491e-6 kg; lognormal variance with pedigree 0.0093, pedigree (2,2,4,1,1)
  (same comment as for Nitrogen oxides)
- Particulates, > 2.5 um, and < 10um [air, non-urban air or from high stacks]: 2.904e-5 kg; lognormal variance with pedigree 0.1287, pedigree (2,2,4,1,1)
  (same comment as for Particulates, < 2.5 um)
- BOD5, Biological Oxygen Demand [water, surface water]: 8.6867e-5 kg; lognormal variance with pedigree 0.106, pedigree (4,5,5,5,3)
  Estimation based on iron ore beneficiation to 65% Fe GLO dataset (ecoinvent v3).
- Cadmium, ion [water, surface water]: 1.948e-9 kg; lognormal variance with pedigree 0.6587, pedigree (2,2,4,1,1)
  (same comment as for Hydrocarbons, unspecified)
- Arsenic, ion [water, surface water]: 1.958e-9 kg; lognormal variance with pedigree 0.6587, pedigree (2,2,4,1,1)
  (same comment as for Hydrocarbons, unspecified)
- DOC, Dissolved Organic Carbon [water, surface water]: 3.136e-6 kg; lognormal variance with pedigree 0.106, pedigree (4,5,5,5,3)
  Estimation based on iron ore beneficiation to 65% Fe GLO dataset (ecoinvent v3).
- Copper, ion [water, surface water]: 1.086e-8 kg; lognormal variance with pedigree 0.6587, pedigree (2,2,4,1,1)
  (same comment as for Hydrocarbons, unspecified)
- TOC, Total Organic Carbon [water, surface water]: 3.136e-6 kg; lognormal variance with pedigree 0.106, pedigree (4,5,5,5,3)
  Estimation based on iron ore beneficiation to 65% Fe GLO dataset (ecoinvent v3).
- Iron, ion [water, surface water]: 1.04e-6 kg; lognormal variance with pedigree 0.6587, pedigree (2,2,4,1,1)
  (same comment as for Hydrocarbons, unspecified)
- Cyanide [water, surface water]: 5.7911e-7 kg; lognormal variance with pedigree 0.106, pedigree (4,5,5,5,3)
  Estimation based on iron ore beneficiation to 65% Fe GLO dataset (ecoinvent v3).
- Nitrate [water, surface water]: 2.929e-5 kg; lognormal variance with pedigree 0.0487, pedigree (2,2,4,1,1)
  (same comment as for Hydrocarbons, unspecified)
- Arsenic [air, non-urban air or from high stacks]: 0 kg; pedigree (1,1,1,1,1)
  (same comment as for Lead)
- Nickel, ion [water, surface water]: 5.246e-8 kg; lognormal variance with pedigree 0.6587, pedigree (2,2,4,1,1)
  (same comment as for Hydrocarbons, unspecified)
- COD, Chemical Oxygen Demand [water, surface water]: 8.6867e-5 kg; lognormal variance with pedigree 0.106, pedigree (4,5,5,5,3)
  Estimation based on iron ore beneficiation to 65% Fe GLO dataset (ecoinvent v3).
- Mercury [water, surface water]: 4.472e-11 kg; lognormal variance with pedigree 0.6587, pedigree (2,2,4,1,1)
  (same comment as for Hydrocarbons, unspecified)
- Cadmium [air, non-urban air or from high stacks]: 2.046e-15 kg; lognormal variance with pedigree 0.86, pedigree (5,5,5,5,5)
  (same comment as for Lead)
- Suspended solids, unspecified [water, surface water]: 3.198e-5 kg; lognormal variance with pedigree 0.0487, pedigree (2,2,4,1,1)
  (same comment as for Hydrocarbons, unspecified)
- Copper [air, non-urban air or from high stacks]: 3.25e-12 kg; lognormal variance with pedigree 0.86, pedigree (5,5,5,5,5)
  (same comment as for Lead)
- Water [water, unspecified]: 0.0005992 m3; name water_to_water_unspecified; = water_UNO_input*(1-fraction_PW_to_air); lognormal variance with pedigree 0.0487, pedigree (2,2,4,1,1)
  (same comment as for Water)
  property carbon content, non-fossil 0; name C_content_non_fossil
  property carbon content, fossil 0; name C_content_fossil
  property water in wet mass 1000 kg; name WWM
  property wet mass 1000 kg; name WM
  property dry mass 0 kg; name DM
- Chromium [air, non-urban air or from high stacks]: 0 kg; pedigree (1,1,1,1,1)
  (same comment as for Lead)
- Carbon monoxide, fossil [air, non-urban air or from high stacks]: 8.471e-5 kg; lognormal variance with pedigree 0.6587, pedigree (2,2,4,1,1)
  Measured Value given by data provider (source : questionnaire). Emissions related to explosive (Anfor) for the main pit and extra pit.
  The combustion of waste oil on site is also generating carbon monoxide. The estimation based on the amount of waste oil burned on site (4.4644E-5 kg/kg) and the dataset treatment of waste mineral oil, hazardous waste incineration GLO (ecoinvent v3) is very small in comparaison to the above mentionned measured value (5.608E-10 kg/kg).
- Zinc, ion [water, surface water]: 3.884e-8 kg; lognormal variance with pedigree 0.6587, pedigree (2,2,4,1,1)
  (same comment as for Hydrocarbons, unspecified)
- Nickel [air, non-urban air or from high stacks]: 1.04e-13 kg; lognormal variance with pedigree 0.86, pedigree (5,5,5,5,5)
  (same comment as for Lead)
- Carbon dioxide, fossil [air, non-urban air or from high stacks]: 0.0005947 kg; lognormal variance with pedigree 0.0093, pedigree (2,2,4,1,1)
  Measured Value given by data provider (source : questionnaire). Emissions related to explosive (Anfor) for the main pit and extra pit and the emissions related to the combustion of waste oil on site (4.4644E-5 kg/kg).

## Extrapolations
This dataset has been extrapolated from year 2011 to the year of the calculation (2019). The uncertainty has been adjusted accordingly.

## Review by Hans-Jörg Althaus 2013-12-05
ok
