# electricity production, hard coal, conventional

Dataset: EcoSpold 2, unit process
Geography: ZA
Time period: 2016-04-01 to 2019-03-31
Technology level: current
Classification: EcoSpold01Categories: hard coal/power plants
Classification: ISIC rev.4 ecoinvent: 3510:Electric power generation, transmission and distribution
Synonyms: bituminous coal
Tags: hard coal power; coal power; fossil fuels
Scenario: Business-as-Usual
System model: Allocation at the point of substitution
Generated by: Philippa Notten
Published in: Notten P.J. 2017
Database: ecoinvent
isCopyrightProtected: true
accessRestrictedTo: 1

## General comment
This dataset represents the production of high voltage electricity in conventional pulverised fuel hard coal power plants in South Africa in 2016. 85% of South Africa's electricity is produced from coal, with Eskom, the state-owned electricity utility, producing 92% of South Africa's electricity and over 98% of the coal-based electricity. This dataset represents Eskom's existing fleet of coal-fired power stations. The two super-critical power stations currently under construction are represented in a separate dataset.
In 2016, Eskom had 13 power stations in operation, with a combined installed capacity of 37,754 MW (this total excludes the first unit of Medupi power station, currently under construction, that was brought online in 2016). Five of the power stations are in excess of 40 years old, with unit sizes ranging from 90 to 400 MW. These stations contribute approximately 20% of the coal-based electricity. The majority of the coal-based electricity is produced in the eight "six-pack" power stations, each with 6 units, ranging in size from 500 to 713 MW per unit (installed capacity). All of the power stations employ conventional pulverised fuel technology, with either wet or dry ashing facilities. Particulate removal is either via electrostatic precipitators (ESP) with flue gas conditioning or by fabric filters (baghouse). None of the stations employ flue gas desulphurisation (FGD) or selective catalytic reduction (SCR) for SOx and NOx abatement, respectively. The majority of the stations operate with recirculating wet cooling towers, with two of the stations fully dry-cooled, and another with three of its units dry-cooled. All of the power stations operate on a policy of zero liquid effluent, i.e. there are no return water flows. The power stations operate water circuits of cascading water quality, with all water either evaporated in the cooling towers, lost as steam leaks, used in ashing or evaporated in storage dams.
This dataset uses key performance data published annually by Eskom to calculate coal consumption, water consumption and ash waste, and emissions of carbon dioxide, nitrous oxide, nitrogen oxides, sulphur dioxide and particulates (with the size distribution of particulate emissions taken from the previous ecoinvent electricity production dataset, in which particulate size distribution was derived from German data). Mercury emissions are taken from the literature (Garnham & Langeman, 2016).
All other emissions to air are taken from the existing electricity production from hard coal dataset in ecoinvent. Exchange factors per MJ are derived from production-weighted averages of the exchanges in datasets of 14 countries. These are extrapolated using the net electrical efficiency of the power plant. The following comments apply to these extapolated emissions:
- Halogene emissions have been estimated on the basis of the content of the species in the country-specific coal input mix, assuming average retention rates.
- For CO emissions average values for the former UCTE are included (Union for the Coordination of the Transmission of Electricity, since 2009 replaced by ENTSO-E European Network of Transmission System Operators for Electricity).
- Emissions of trace elements were calculated by means of a formula (CORINAIR) using the ash content in the country-specific coal input mix and average transfer coefficients for coal power plants, taking into account the share of DeSOx installed.
- Emission of uranium and thorium radioactive isotopes were assumed proportional to the corresponding element emitted with particles; the other non-gaseous radioactive isotopes of the uranium and thorium decay chain were assumed proportional to the emitted U-238 or Th-232.
- The emission of gaseous radon and K-40 are taken from the literature.
No emissions to water are included (no official discharge streams occur on the power stations) with the occasional spills from storage dams in high rainfall events not included due to a lack of data. Seepage from ash dams and storage ponds are similarly not included due to a lack of data.
Sources:
Eskom Integrated Report 31 March 2017, Available at: http://www.eskom.co.za/IR2017/Documents/Eskom_integrated_report_2017.pdf
Garnham, B and Langeman, K (2016) Mercury emissions from South Africa’s coal-fired power stations, Clean Air Journal, Vol. 26, No2, 2016. Available at: http://www.cleanairjournal.org.za/download/caj_vol26_no2_2016_p14.pdf
European Environment Agency (1991) CORINAIR Inventory; VOC's Default Emission Factors
[This dataset is meant to replace the following datasets:]

## Included activities start
From the constructed hard coal power plant ready to produce electricity.
From reception of hard coal and operating materials at power plant gate.

## Included activities end
This activity ends with 1kWh of high voltage electricity produced at the power plant and arrival at the busbar.

This dataset includes:
- Inputs of hard coal and outputs of ash waste;
- Inputs of decarbonised water for the cooling circuits and demineralised water for the boiler circuit to make up for water losses;
- Inputs of fuel oil for boiler start-up and stabilisation;
- Particulate removal;
- Emissions to air;
- Power station infrastructure (excludes cooling towers)

This dataset doesn't include
- Raw materials extraction, decommissioning and waste treatment (including ash disposal) as these activities are included in linked datasets
- Transformation of the electricity produced
-Spills and leachate/seepage from water containment dams.

## Geography
This dataset is representative of the coal fired power plants in operation in South Africa in 2016.It thus represents the older conventional power plants, with the supercritical power plants currently under construction represented in "electricity production, hard coal, supercritical, ZA".

## Technology
This dataset is representative of the coal-fired power plants currently in operation in South Africa. These are conventional pulverised fuel boilers employing a mix of either wet or dry cooling, wet or dry ashing and electrostatic precipitators or fabric filters. The stations do not have flue gas desulphurisation (FGD) or selective catalytic reduction (SCR) for NOx removal.The stations range in age from 19 to 54 years, and are each comprised of 6 to 10 units, with the units ranging in installed capacity from 90 to 713 MW each. This dataset is representative of Eskom's installed capacity of 38,548 MW, which accounts for approximately 98.5% of South Africa's coal-fired electricity.
Overall thermal efficiency is 31%, with the average coal burnt of low quality: 28.6% ash and calorific value of 20 MJ/kg
No flue gas desulphurisation is installed (coal is low sulphur, at 0.84% sulphur on a dry basis).

## Time period
The Annual Production Volume is valid for the year 2016.

## Parameters
- factor: input of MJ for the production of 1 kWh: 11.3565 MJ/kWh; name factor_MJ_kWh; = 1*3.6/efficiency; undefined min 11.1801, max 11.1801, standardDeviation95 0, pedigree (1,1,1,1,1)
  Calculated value. 3.6 MJ = 1kWh.
  nan
- efficiency: 0.317 dimensionless; lognormal variance with pedigree 0.0151, pedigree (1,2,1,1,1)
  Calculated from Eskom technical statistics for 2016 (net power output, coal calorific value and mass coal burnt). Reported efficiency for coal generation in 2016 is marginally lower (31.2%). Ignores share of non-Eskom coal power stations but these provide only a very small share of the power (<2%). Source: Eskom Integrated report, 31 March 2017. Available at: http://www.eskom.co.za/IR2017/Documents/Eskom_integrated_report_2017.pdf
  Uncertainty: Basic variance from variance across Eskom power stations

## Reference product
- electricity, high voltage: 1 kWh; name electricity; CPC 17100: Electrical energy; By-product classification allocatable product
  This is power sent out from power station, i.e. net power generated after allowing for own use
  production volume 1.99e11 kWh; name electricity_apv
    Eskom net power output from coal-fired generation in 2016/2017, adjusted to include non-Eskom coal-fired power generation (estimated at 1.6% of total coal-fired power generation), and deducting contribution from new build (covered under its own dataset).
  property price 0.0977 EUR2005
    Temporary price data. Calculated as 90% of purchasers price based on: 94% of the average price (to account for a 6% loss in transformation and transmission) for electricity for industrial consumersin 2005 (excluded taxes). From IEA.
  property true value 0.0977; name electricity_true_value
    allocation property applied in "true value" allocation // value calculated from revenue

## By-products
- heat, for reuse in municipal waste incineration only: 0 MJ; CPC 17300: Steam and hot water; By-product classification allocatable product; pedigree (1,1,1,1,1)
  Net electricity generated from this waste and used in internal MSWI plant energy redistribution.
  Uncertainty: uncertainty is calculated from uncertainties in waste composition and uncertainties in energy efficiency and the uncertainty in internal energy demand
  production volume 8914.28 MJ
  property exergy 0.1842 MJ; name E_th_prod_MSWI_exergy
    This exergy property is based on the exergy content of the product.
  property price 0.0106 EUR2005; name E_th_prod_MSWI_price_EUR2005
    Average European district heat price from Ecoheatcool and Euroheat 2005-2006, Ecoheat Work package 1: The European heat market. Final report. 10.6 EUR/GJ i s the price of district heat. http://www.solarthermalworld.org/files/Ecoheatcool%20WP1%20Web.pdf?download
  property true value relation 0.1842; name E_th_prod_MSWI_true_value_relation
    property to calculate "true value" from
  property true value 2.94659e-10
    allocation property applied in "true value" allocation // value calculated from true value relation
- electricity, for reuse in municipal waste incineration only: 0 kWh; CPC 17100: Electrical energy; By-product classification allocatable product; pedigree (1,1,1,1,1)
  (same comment as for heat, for reuse in municipal waste incineration only)
  production volume 1255.47 kWh
  property true value relation 3.6; name E_el_prod_MSWI_true_value_relation
    property to calculate "true value" from
  property price 0.1 EUR2005; name E_el_prod_MSWI_price_EUR2005
    Estimated to be the same price as in case of electricity, medium voltage.
  property exergy 3.6 MJ; name E_el_prod_MSWI_exergy
    This exergy property is based on the exergy content of the product.
  property true value 8.1106e-10
    (same comment as for heat, for reuse in municipal waste incineration only)

## Inputs from technosphere
- water, completely softened: 0.031 kg; name water_boiler_makeup; lognormal variance with pedigree 0.054, pedigree (4,5,4,5,3)
  Eskom report only an overall specific raw water consumption, which in 2016, was 1.39 litres per kilowatt-hour sent out (Eskom, 2017). This raw water use includes both water required for cooling purposes and ultrapure water for use in the boilers. Detailed water balance data from three power stations was used to estimate an average boiler water requirement of 0.03 litres per kilowatt-hour sent out (2.2% of total raw water use at the power stations). Source: Eskom Integrated Report 31 March 2017, Available at: http://www.eskom.co.za/IR2017/Documents/Eskom_integrated_report_2017.pdf
  properties: wet mass 1 kg
- hard coal ash: -0.162822 kg; name amount_ash; = ((hard_coal*hard_coal_ash)-(particulates_lt2_5+particulates_gt10+particulates_2_5_to_10))*-1; source Eskom 2017; lognormal variance with pedigree 0.0986, pedigree (5,3,4,5,3)
  Total coal ash produced (bottom ash as well as fly ash collected from bag filters). Coal burnt is on average 28.6% ash. In 2016, 8.5% of total ash produced was recycled (sold). Coal ash percentage as well as total ash produced and sold is reported by Eskom. Source: Eskom Integrated Report 31 March 2017, Available at: http://www.eskom.co.za/IR2017/Documents/Eskom_integrated_report_2017.pdf
  production volume 3.24015e10 kg; = amount_ash/electricity*electricity_apv
    Calculated from proportion to the respective output amounts.
  property price 0 EUR2005; name amount_ash_price_EUR2005
  property water in wet mass 0.15 kg; name WWM_ash
  properties: water content 0.176471, dry mass 0.85 kg, wet mass 1 kg, carbon content, fossil 0.019
  note on carbon content, fossil: Industry data (average value across multiple power stations, combined coarse and fly ash value)
- light fuel oil: 0.000297 kg; name light_fuel_oil; lognormal variance with pedigree 0.024, pedigree (3,4,4,5,1)
  Fuel oil use for start ups and stabilsation. Value not Eskom-wide but based on annual fuel oil use at a single large (6x600 MW) power station in South Africa.
  properties: dry mass 1 kg, wet mass 1 kg, carbon content, fossil 0.862
- hard coal: 0.602561 kg; name hard_coal; = (1*factor_MJ_kWh/hard_coal_CV)/(1-(WWM_coal/wet_mass_coal)); source Eskom 2017; lognormal variance with pedigree 0.0153, pedigree (1,2,2,1,1)
  Specific coal use is calculated from total coal burnt in 2016 divided by net power output from coal-fired power stations in 2016, as report by Eskom. Source: Eskom Integrated Report 31 March 2017, Available at: http://www.eskom.co.za/IR2017/Documents/Eskom_integrated_report_2017.pdf
  Uncertainty: Basic variance derived from variance across Eskom power stations
  property ash content 0.270755 kg; name hard_coal_ash; = 0.287/(1+(WWM_coal/wet_mass_coal))
  property low calorific value 20.05 MJ/kg; name hard_coal_CV
  property sulfur content 0.0084; name hard_coal_S_content
  property wet mass 1 kg; name wet_mass_coal
  property water in wet mass 0.06 kg; name WWM_coal
  properties: dry mass 0.94 kg, water content 0.0638298, carbon content, fossil 0.55
  note on ash content: Average ash content of coal burnt in 2016 ( Eskom intergrated report, 2017), adjusted for wet basis.
  note on low calorific value: Average calorific value of coal burnt in 2016 (Eskom integrated report, 2017)
  note on sulfur content: Average sulfur content of coal burnt in 2016 (Eskom intergrated report, 2017), dry basis
  note on carbon content, fossil: Representative fixed carbon content of high ash, low CV South African hard coal (as burnt by Eskom in 2016). Reference(s): Hancox, P. J. and Götz, A. E. (2014) South Africa's coalfields - A 2014 perspective. International Journal of Coal Geology, Volume 132, pp 170-254.
- water, decarbonised: 1.39 kg; name cooling_water; source Eskom 2017; lognormal variance with pedigree 0.054, pedigree (4,5,4,5,3)
  Cooling water requirement taken from Eskom's overall specific raw water consumption (1.39 litres per kWh sent out (Eskom, 2017)), less water required for boiler water make up (estimated at 2.2% of total raw water use at the power stations). Source: Eskom Integrated Report 31 March 2017, Available at: http://www.eskom.co.za/IR2017/Documents/Eskom_integrated_report_2017.pdf
  properties: wet mass 1 kg
- hard coal power plant: 9.37235e-12 unit; name hard_coal_power_plant; = 1/ ((365*24*0.58*35)*600*1000); source Eskom 2017; lognormal variance with pedigree 0.3686, pedigree (5,3,4,5,3)
  Eskom's power stations range from nominal 200 MW units to 600 MW units, however 80% of the power is generated from eight 6 x 600 MW power stations. The overall generation load factor in 2016 was 57.9%. The nominal plant life is 30 years, although eight of the thirteen currently operating power station are older than 30 years (with the oldest at 52 years).

## Emissions to nature
- Particulates, < 2.5 um [air, non-urban air or from high stacks]: 8.09e-5 kg; name particulates_lt2_5; source Eskom 2017; lognormal variance with pedigree 0.093, pedigree (4,4,5,5,4)
  Total particulate emissions reported by Eskom (10-year technical statistics). The figure reported by Eskom is a calculated figure based on power station design parameters, coal characteristics and coal tonnages burnt. Eskom reports total particulates only, so the size distribution is taken from the existing ecoinvent dataset for electricity production from hard coal, i.e. 25% of the particulate emissions are < 2.5um, 72% are > 10 um and 3% are between 2.5 um and 10 um. Source: Eskom Integrated Report 31 March 2017, Available at: http://www.eskom.co.za/IR2017/Documents/Eskom_integrated_report_2017.pdf
- Uranium-234 [air, non-urban air or from high stacks]: 2.29401e-5 kBq; name uranium_234; = factor_MJ_kWh*0.00000202; lognormal variance with pedigree 0.3586, pedigree (5,3,4,5,3)
  Value not specific to South Africa. Generic value from previous ecoinvent dataset, with original comment as follows: Literature value/calculated value. Emissions when producing 1kWh of electricity from hard coal, based on the value for burning 1MJ of hard coal. Weighted average with electricity production data (Itten&Frischknecht 2012) and emission values of 14 countries
  (AT, BE, ES, FR, IT, NL, PT, DE, CZ, HR, PL, SK, CN, US) (Röder et al. 2007)
  Country emissions values based on literature.
  Source:
  Itten R. and Frischknecht R. (2012) Life Cycle Inventories of Electricity Mixes and Grid. ESU-services Ltd., Uster, Switzerland.
- Thorium-228 [air, non-urban air or from high stacks]: 3.74763e-5 kBq; name throium_228; = factor_MJ_kWh*0.0000033; lognormal variance with pedigree 0.3986, pedigree (5,3,4,5,3)
  Value not specific to South Africa. Generic value from previous ecoinvent dataset, with original comment as follows: Literature value/calculated value. Emissions when producing 1kWh of electricity from hard coal, based on the value for burning 1MJ of hard coal. Weighted average with electricity production data (Itten&Frischknecht 2012) and emission values of 14 countries
  (AT, BE, ES, FR, IT, NL, PT, DE, CZ, HR, PL, SK, CN, US) (Röder et al. 2007)
  Country emissions values calculated from trace element balance, input uncertain
  Source:
  Itten R. and Frischknecht R. (2012) Life Cycle Inventories of Electricity Mixes and Grid. ESU-services Ltd., Uster, Switzerland.
- Strontium [air, non-urban air or from high stacks]: 6.72303e-7 kg; name strontium; = factor_MJ_kWh*0.0000000592; lognormal variance with pedigree 0.7486, pedigree (5,3,4,5,3)
  (same comment as for Thorium-228)
- Hydrocarbons, aliphatic, alkanes, unspecified [air, non-urban air or from high stacks]: 1.53312e-6 kg; name hydrocarbons_al_al_unspec; = factor_MJ_kWh*0.000000135; lognormal variance with pedigree 0.08, pedigree (3,5,4,5,1)
  (same comment as for Uranium-234)
- Methane, dichloro-, HCC-30 [air, non-urban air or from high stacks]: 2.7142e-8 kg; name methane_dichloro; = factor_MJ_kWh*0.00000000239; lognormal variance with pedigree 0.1786, pedigree (5,3,4,5,3)
  (same comment as for Uranium-234)
- Bromine [air, non-urban air or from high stacks]: 3.55457e-6 kg; name bromine; = factor_MJ_kWh*0.000000313; lognormal variance with pedigree 0.1806, pedigree (3,3,4,5,3)
  (same comment as for Thorium-228)
- Cobalt [air, non-urban air or from high stacks]: 3.79306e-8 kg; name cobalt; = factor_MJ_kWh*0.00000000334; lognormal variance with pedigree 0.7486, pedigree (5,3,4,5,3)
  (same comment as for Thorium-228)
- Boron [air, non-urban air or from high stacks]: 4.34953e-6 kg; name boron; = factor_MJ_kWh*0.000000383; lognormal variance with pedigree 0.7486, pedigree (5,3,4,5,3)
  (same comment as for Thorium-228)
- Carbon disulfide [air, non-urban air or from high stacks]: 1.21514e-8 kg; name carbon_disulfide; = factor_MJ_kWh*0.00000000107; lognormal variance with pedigree 0.3206, pedigree (3,3,4,5,3)
  Value not specific to South Africa. Generic value from previous ecoinvent dataset, with original comment as follows: Literature value/calculated value. Emissions when producing 1kWh of electricity from hard coal, based on the value for burning 1MJ of hard coal. Weighted average with electricity production data (Itten&Frischknecht 2012) and emission values of 14 countries
  (AT, BE, ES, FR, IT, NL, PT, DE, CZ, HR, PL, SK, CN, US) (Röder et al. 2007)
  Source:
  Itten R. and Frischknecht R. (2012) Life Cycle Inventories of Electricity Mixes and Grid. ESU-services Ltd., Uster, Switzerland.
- Dioxins, measured as 2,3,7,8-tetrachlorodibenzo-p-dioxin [air, non-urban air or from high stacks]: 1.20379e-13 kg; name dioxins; = factor_MJ_kWh*1.06E-14; lognormal variance with pedigree 0.34, pedigree (3,5,4,5,1)
  (same comment as for Uranium-234)
- Pentane [air, non-urban air or from high stacks]: 9.88013e-7 kg; name pentane; = factor_MJ_kWh*0.000000087; lognormal variance with pedigree 0.08, pedigree (3,5,4,5,1)
  (same comment as for Uranium-234)
- Propane [air, non-urban air or from high stacks]: 2.35079e-7 kg; name propane; = factor_MJ_kWh*0.0000000207; lognormal variance with pedigree 0.08, pedigree (3,5,4,5,1)
  (same comment as for Uranium-234)
- Methane, monochloro-, R-40 [air, non-urban air or from high stacks]: 4.96278e-8 kg; name methane_monochloro; = factor_MJ_kWh*0.00000000437; lognormal variance with pedigree 0.1406, pedigree (3,3,4,5,3)
  (same comment as for Uranium-234)
- Particulates, > 10 um [air, non-urban air or from high stacks]: 0.000234 kg; name particulates_gt10; source Eskom 2017; lognormal variance with pedigree 0.093, pedigree (4,4,5,5,4)
  (same comment as for Particulates, < 2.5 um)
- Hydrocarbons, aliphatic, unsaturated [air, non-urban air or from high stacks]: 1.45363e-6 kg; name hydrocarbons_aliphatic_unsaturated; = factor_MJ_kWh*0.000000128; lognormal variance with pedigree 0.08, pedigree (3,5,4,5,1)
  (same comment as for Uranium-234)
- Zinc [air, non-urban air or from high stacks]: 4.72429e-7 kg; name zinc; = factor_MJ_kWh*0.0000000416; lognormal variance with pedigree 0.7486, pedigree (5,3,4,5,3)
  (same comment as for Thorium-228)
- Hydrocarbons, chlorinated [air, non-urban air or from high stacks]: 1.89653e-8 kg; name hydrocarbons_chlorinated; = factor_MJ_kWh*0.00000000167; lognormal variance with pedigree 0.1786, pedigree (5,3,4,5,3)
  (same comment as for Uranium-234)
- Arsenic [air, non-urban air or from high stacks]: 1.13224e-7 kg; name arsenic; = factor_MJ_kWh*0.00000000997; lognormal variance with pedigree 0.7486, pedigree (5,3,4,5,3)
  (same comment as for Thorium-228)
- Toluene [air, non-urban air or from high stacks]: 7.55205e-7 kg; name toluene; = factor_MJ_kWh*0.0000000665; lognormal variance with pedigree 0.08, pedigree (3,5,4,5,1)
  (same comment as for Uranium-234)
- Acenaphthene [air, non-urban air or from high stacks]: 4.76972e-11 kg; name acenaphthene; = factor_MJ_kWh*0.0000000000042; lognormal variance with pedigree 0.1406, pedigree (3,3,4,5,3)
  (same comment as for Uranium-234)
- Hexane [air, non-urban air or from high stacks]: 6.30284e-9 kg; name hexane; = factor_MJ_kWh*0.000000000555; lognormal variance with pedigree 0.1786, pedigree (5,3,4,5,3)
  (same comment as for Uranium-234)
- Chromium [air, non-urban air or from high stacks]: 9.3123e-8 kg; name chromium; = factor_MJ_kWh*0.0000000082; lognormal variance with pedigree 0.7486, pedigree (5,3,4,5,3)
  (same comment as for Thorium-228)
- Uranium-238 [air, non-urban air or from high stacks]: 0.000180568 kBq; name uranium_238; = factor_MJ_kWh*0.0000159; lognormal variance with pedigree 0.3986, pedigree (5,3,4,5,3)
  (same comment as for Thorium-228)
- Mercury [air, non-urban air or from high stacks]: 9.81e-8 kg; name mercury; lognormal variance with pedigree 0.7486, pedigree (5,3,4,5,3)
  Mercury emissions from Eskom's coal-fired power stations from a study by Garnham and Langeman (2016). Calculated value based on the amount of coal burnt per annum per power station, the mercury content (ppm) of the coal used at each power and technology-specific mercury emission reduction factors sourced from the US EPA (2013) and UNEP (2015). Overall approach is that of ‘Toolkit for Identification and Quantification of Mercury Releases’ (UNEP 2015).
  Source:
  Garnham, B and Langeman, K (2016) Mercury emissions from South Africa’s coal-fired power stations, Clean Air Journal, Vol. 26, No2, 2016. Available at: http://www.cleanairjournal.org.za/download/caj_vol26_no2_2016_p14.pdf
- Lead-210 [air, non-urban air or from high stacks]: 0.000787003 kBq; name lead_210; = factor_MJ_kWh*0.0000693; lognormal variance with pedigree 0.3986, pedigree (5,3,4,5,3)
  (same comment as for Thorium-228)
- Nitrogen oxides [air, non-urban air or from high stacks]: 0.00441 kg; name nitrogen_oxides; source Eskom 2017; lognormal variance with pedigree 0.093, pedigree (4,4,5,5,4)
  Total nitrous oxide emissions reported by Eskom (10-year technical statistics). The figure reported by Eskom as NO2 is calculated using average station-specific emission factors (which are measured intermittently) and tonnages of coal burnt. Source: Eskom Integrated Report 31 March 2017, Available at: http://www.eskom.co.za/IR2017/Documents/Eskom_integrated_report_2017.pdf
- Polonium-210 [air, non-urban air or from high stacks]: 0.00139685 kBq; name polonium_210; = factor_MJ_kWh*0.000123; lognormal variance with pedigree 0.3986, pedigree (5,3,4,5,3)
  (same comment as for Thorium-228)
- Hydrogen chloride [air, non-urban air or from high stacks]: 0.000300946 kg; name hydrogen_chloride; = factor_MJ_kWh*0.0000265; lognormal variance with pedigree 0.2186, pedigree (5,3,4,5,3)
  (same comment as for Thorium-228)
- Molybdenum [air, non-urban air or from high stacks]: 1.30599e-8 kg; name molybdenum; = factor_MJ_kWh*0.00000000115; lognormal variance with pedigree 0.7486, pedigree (5,3,4,5,3)
  (same comment as for Thorium-228)
- PAH, polycyclic aromatic hydrocarbons [air, non-urban air or from high stacks]: 8.50599e-8 kg; name pah; = factor_MJ_kWh*0.00000000749; lognormal variance with pedigree 0.34, pedigree (3,5,4,5,1)
  (same comment as for Uranium-234)
- Propene [air, non-urban air or from high stacks]: 1.07546e-7 kg; name propene; = factor_MJ_kWh*0.00000000947; lognormal variance with pedigree 0.08, pedigree (3,5,4,5,1)
  (same comment as for Uranium-234)
- Antimony [air, non-urban air or from high stacks]: 1.36278e-8 kg; name antimony; = factor_MJ_kWh*0.0000000012; lognormal variance with pedigree 0.7486, pedigree (5,3,4,5,3)
  (same comment as for Thorium-228)
- Vanadium [air, non-urban air or from high stacks]: 1.68076e-7 kg; name vanadium; = factor_MJ_kWh*0.0000000148; lognormal variance with pedigree 0.7486, pedigree (5,3,4,5,3)
  (same comment as for Thorium-228)
- Lead [air, non-urban air or from high stacks]: 4.21325e-7 kg; name lead; = factor_MJ_kWh*0.0000000371; lognormal variance with pedigree 0.7486, pedigree (5,3,4,5,3)
  (same comment as for Thorium-228)
- Thorium-232 [air, non-urban air or from high stacks]: 5.48517e-5 kBq; name thorium_232; = factor_MJ_kWh*0.00000483; lognormal variance with pedigree 0.3986, pedigree (5,3,4,5,3)
  (same comment as for Thorium-228)
- Radium-226 [air, non-urban air or from high stacks]: 0.000207823 kBq; name radium_226; = factor_MJ_kWh*0.0000183; lognormal variance with pedigree 0.3907, pedigree (3,3,5,3,3)
  (same comment as for Thorium-228)
- Sulfur dioxide [air, non-urban air or from high stacks]: 0.00879 kg; name sulfur_dioxide; source Eskom 2017; lognormal variance with pedigree 0.093, pedigree (4,4,5,5,4)
  Total sulphur dioxide emissions reported by Eskom (10-year technical statistics). The figure reported by Eskom is a calculated figure based on power station design parameters, coal analysis and coal tonnages burnt, and includes coal-fired and gas turbine power stations (burning diesel), as well as oil consumed during power station start-ups. Source: Eskom Integrated Report 31 March 2017, Available at: http://www.eskom.co.za/IR2017/Documents/Eskom_integrated_report_2017.pdf
- Radium-228 [air, non-urban air or from high stacks]: 6.71167e-5 kBq; name radium_228; = factor_MJ_kWh*0.00000591; lognormal variance with pedigree 0.3986, pedigree (5,3,4,5,3)
  (same comment as for Thorium-228)
- Hydrocarbons, aliphatic, alkanes, cyclic [air, non-urban air or from high stacks]: 5.41703e-8 kg; name hydrocarbons_al_al_cyclic; = factor_MJ_kWh*0.00000000477; lognormal variance with pedigree 0.1406, pedigree (3,3,4,5,3)
  (same comment as for Uranium-234)
- Nickel [air, non-urban air or from high stacks]: 2.27129e-7 kg; name nickel; = factor_MJ_kWh*0.00000002; lognormal variance with pedigree 0.7486, pedigree (5,3,4,5,3)
  (same comment as for Thorium-228)
- Butane [air, non-urban air or from high stacks]: 1.27192e-7 kg; name butane; = factor_MJ_kWh*0.0000000112; lognormal variance with pedigree 0.08, pedigree (3,5,4,5,1)
  (same comment as for Uranium-234)
- Selenium [air, non-urban air or from high stacks]: 1.87382e-7 kg; name selenium; = factor_MJ_kWh*0.0000000165; lognormal variance with pedigree 0.7486, pedigree (5,3,4,5,3)
  (same comment as for Thorium-228)
- Thorium-230 [air, non-urban air or from high stacks]: 1.16972e-5 kBq; name thorium_230; = factor_MJ_kWh*0.00000103; lognormal variance with pedigree 0.3586, pedigree (5,3,4,5,3)
  (same comment as for Uranium-234)
- Furan [air, non-urban air or from high stacks]: 4.67886e-13 kg; name furan; = factor_MJ_kWh*4.12E-14; lognormal variance with pedigree 0.1406, pedigree (3,3,4,5,3)
  (same comment as for Uranium-234)
- Manganese [air, non-urban air or from high stacks]: 4.06562e-7 kg; name manganese; = factor_MJ_kWh*0.0000000358; lognormal variance with pedigree 0.7486, pedigree (5,3,4,5,3)
  (same comment as for Thorium-228)
- Cumene [air, non-urban air or from high stacks]: 5.09905e-10 kg; name cumene; = factor_MJ_kWh*0.0000000000449; lognormal variance with pedigree 0.1222, pedigree (1,1,2,5,1)
  (same comment as for Carbon disulfide)
- Xylene [air, non-urban air or from high stacks]: 6.20063e-6 kg; name xylene; = factor_MJ_kWh*0.000000546; lognormal variance with pedigree 0.08, pedigree (3,5,4,5,1)
  (same comment as for Uranium-234)
- Water [air, unspecified]: 0.00143273 m3; name water_to_air_unspecified; = ((water_boiler_makeup+cooling_water)+(hard_coal*(WWM_coal/wet_mass_coal)-(amount_ash*-1)*WWM_ash))/1000; lognormal variance with pedigree 0.098025, pedigree (4,4,4,2,4)
  All water loss assumed to be evaporative, i.e. water to air = boiler water makeup + cooling water makeup. All water use at the power stations is consumptive, i.e. there are no return flows to rivers. In the power station water plants, water use is optimised through cascading water quality cycles (e.g. boiler blowdown goes into the cooling water clarifiers). Water of the lowest quality is used for ash quenching and ash slurrying (wet ashing stations only). Any remaining water of too poor quality to be used is stored in dams on site. All water loss is therefore assumed to be evaporative, i.e. cooling towers in wet cooled stations, steam leaks and evaporation from ash dams and storage ponds. Potential seepage losses from ash dams and storage ponds are not accounted for due to a lack of data, neither are occasional spills from storage dams in high rainfall events.
  property fraction, origin: salt water 0; name fraction_origin_salt_water
  property fraction, origin: fresh water 1; name fraction_origin_fresh_water
  property fraction, origin: unspecified 0; name fraction_origin_unspecified
- Benzo(a)pyrene [air, non-urban air or from high stacks]: 4.89464e-12 kg; name benzo_a_pyrene; = factor_MJ_kWh*0.000000000000431; lognormal variance with pedigree 0.08, pedigree (3,5,4,5,1)
  (same comment as for Uranium-234)
- Protactinium-234 [air, non-urban air or from high stacks]: 1.16972e-5 kBq; name protactinium_234; = factor_MJ_kWh*0.00000103; lognormal variance with pedigree 0.3206, pedigree (3,3,4,5,3)
  (same comment as for Uranium-234)
- Thorium-234 [air, non-urban air or from high stacks]: 1.16972e-5 kBq; name thorium_234; = factor_MJ_kWh*0.00000103; lognormal variance with pedigree 0.3206, pedigree (3,3,4,5,3)
  (same comment as for Uranium-234)
- Carbon dioxide, fossil [air, non-urban air or from high stacks]: 1.056 kg; name carbon_dioxide_fossil; source Eskom 2017; lognormal variance with pedigree 0.0206, pedigree (3,3,4,5,3)
  Total carbon dioxide emissions reported by Eskom (10-year technical statistics). The figure reported by Eskom is a calculated figure based on power station design parameters, coal analysis and coal tonnages burnt, and includes coal-fired and gas turbine power stations (burning diesel) and the underground coal gasification pilot plant, as well as oil consumed during power station start-ups. The Eskom figure has been adjusted using the IPCC default CO2 emission factor for Gas/Diesel oil combustion in energy industries and the quantity of diesel burnt by Eskom to deduct the CO2 emissions from the OCGT power stations (the figure has not been adjusted for the UCG pilot plant but as the output of this is extremely small the effect is negligible).
  Source:
  Eskom Integrated Report 31 March 2017, Available at: http://www.eskom.co.za/IR2017/Documents/Eskom_integrated_report_2017.pdf
- Ethane [air, non-urban air or from high stacks]: 2.75962e-7 kg; name ethane; = factor_MJ_kWh*0.0000000243; lognormal variance with pedigree 0.08, pedigree (3,5,4,5,1)
  (same comment as for Uranium-234)
- Potassium-40 [air, non-urban air or from high stacks]: 0.000261199 kBq; name potassium_40; = factor_MJ_kWh*0.000023; lognormal variance with pedigree 0.3986, pedigree (5,3,4,5,3)
  (same comment as for Thorium-228)
- Magnesium [air, non-urban air or from high stacks]: 1.0289e-6 kg; name magnesium; = factor_MJ_kWh*0.0000000906; lognormal variance with pedigree 0.7086, pedigree (5,3,4,5,3)
  (same comment as for Uranium-234)
- Phenol [air, non-urban air or from high stacks]: 1.49905e-9 kg; name phenol; = factor_MJ_kWh*0.000000000132; lognormal variance with pedigree 0.1406, pedigree (3,3,4,5,3)
  (same comment as for Uranium-234)
- Cyanide [air, non-urban air or from high stacks]: 2.33943e-7 kg; name cyanide; = factor_MJ_kWh*0.0000000206; lognormal variance with pedigree 0.1786, pedigree (5,3,4,5,3)
  (same comment as for Carbon disulfide)
- Ethane, 1,2-dichloro- [air, non-urban air or from high stacks]: 3.73628e-9 kg; name ethane_dichloro; = factor_MJ_kWh*0.000000000329; lognormal variance with pedigree 0.1786, pedigree (5,3,4,5,3)
  (same comment as for Uranium-234)
- Particulates, > 2.5 um, and < 10um [air, non-urban air or from high stacks]: 9.71e-6 kg; name particulates_2_5_to_10; source Eskom 2017; lognormal variance with pedigree 0.093, pedigree (4,4,5,5,4)
  (same comment as for Particulates, < 2.5 um)
- Benzene, ethyl- [air, non-urban air or from high stacks]: 8.80126e-9 kg; name benzene_ethyl; = factor_MJ_kWh*0.000000000775; lognormal variance with pedigree 0.1406, pedigree (3,3,4,5,3)
  (same comment as for Carbon disulfide)
- Iodine [air, non-urban air or from high stacks]: 1.80568e-6 kg; name iodine; = factor_MJ_kWh*0.000000159; lognormal variance with pedigree 0.2186, pedigree (5,3,4,5,3)
  (same comment as for Thorium-228)
- Beryllium [air, non-urban air or from high stacks]: 1.96467e-9 kg; name beryllium; = factor_MJ_kWh*0.000000000173; lognormal variance with pedigree 0.6706, pedigree (3,3,4,5,3)
  (same comment as for Carbon disulfide)
- NMVOC, non-methane volatile organic compounds, unspecified origin [air, non-urban air or from high stacks]: 1.05615e-5 kg; name nmvoc; = factor_MJ_kWh*0.00000093; lognormal variance with pedigree 0.1406, pedigree (3,3,4,5,3)
  (same comment as for Uranium-234)
- Styrene [air, non-urban air or from high stacks]: 2.31672e-9 kg; name styrene; = factor_MJ_kWh*0.000000000204; lognormal variance with pedigree 0.1406, pedigree (3,3,4,5,3)
  (same comment as for Uranium-234)
- Dinitrogen monoxide [air, non-urban air or from high stacks]: 1.39e-5 kg; name dinitrogen_monoxide; source Eskom 2017; lognormal variance with pedigree 0.074, pedigree (3,4,4,5,1)
  Total nitrous oxide emissions reported by Eskom (10-year technical statistics). The figure reported by Eskom is a calculated figure based on power station design parameters, coal characteristics and coal tonnages burnt, and includes coal-fired and gas turbine power stations (burning diesel), as well as oil consumed during power station start-ups. The Eskom figure has been adjusted using the IPCC default N2O emission factor for Gas/Diesel oil combustion in energy industries and the quantity of diesel burnt by Eskom to deduct the N2O emissions from the OCGT power stations.
  Source:
  Eskom Integrated Report 31 March 2017, Available at: http://www.eskom.co.za/IR2017/Documents/Eskom_integrated_report_2017.pd
- Radon-220 [air, non-urban air or from high stacks]: 0.00575773 kBq; name radon_220; = factor_MJ_kWh*0.000507; lognormal variance with pedigree 0.3986, pedigree (5,3,4,5,3)
  (same comment as for Thorium-228)
- Actinides, radioactive, unspecified [air, non-urban air or from high stacks]: 0.000194196 kBq; name actinides_radioactive_unspecified; = factor_MJ_kWh*0.0000171; lognormal variance with pedigree 0.3206, pedigree (3,3,4,5,3)
  (same comment as for Uranium-234)
- Carbon monoxide, fossil [air, non-urban air or from high stacks]: 0.000100164 kg; name carbon_monoxide_fossil; = factor_MJ_kWh*0.00000882; lognormal variance with pedigree 0.674, pedigree (3,4,4,5,1)
  (same comment as for Uranium-234)
- Benzene [air, non-urban air or from high stacks]: 1.57855e-6 kg; name benzene; = factor_MJ_kWh*0.000000139; lognormal variance with pedigree 0.088, pedigree (3,5,4,5,3)
  (same comment as for Uranium-234)
- Radon-222 [air, non-urban air or from high stacks]: 0.00565552 kBq; name radon_222; = factor_MJ_kWh*0.000498; lognormal variance with pedigree 0.3986, pedigree (5,3,4,5,3)
  (same comment as for Thorium-228)
- Sulfate [air, non-urban air or from high stacks]: 4.47445e-9 kg; name sulfate; = factor_MJ_kWh*0.000000000394; lognormal variance with pedigree 0.1786, pedigree (5,3,4,5,3)
  (same comment as for Uranium-234)
- Chromium VI [air, non-urban air or from high stacks]: 1.58991e-8 kg; name chromium_vi; = factor_MJ_kWh*0.0000000014; lognormal variance with pedigree 0.5006, pedigree (3,3,4,5,3)
  Value not specific to South Africa. Generic value from previous ecoinvent dataset, with original comment as follows: Literature value/calculated value. Emissions when producing 1kWh of electricity from hard coal, based on the value for burning 1MJ of hard coal. Weighted average with electricity production data (Itten&Frischknecht 2012) and emission values of 14 countries
  (AT, BE, ES, FR, IT, NL, PT, DE, CZ, HR, PL, SK, CN, US) (Röder et al. 2007)
  Country emissions values based on range of data.
  Source:
  Itten R. and Frischknecht R. (2012) Life Cycle Inventories of Electricity Mixes and Grid. ESU-services Ltd., Uster, Switzerland.
- Copper [air, non-urban air or from high stacks]: 9.32366e-8 kg; name copper; = factor_MJ_kWh*0.00000000821; lognormal variance with pedigree 0.7486, pedigree (5,3,4,5,3)
  (same comment as for Thorium-228)
- Hydrogen fluoride [air, non-urban air or from high stacks]: 3.21388e-5 kg; name hydrogen_fluoride; = factor_MJ_kWh*0.00000283; lognormal variance with pedigree 0.2186, pedigree (5,3,4,5,3)
  (same comment as for Thorium-228)
- Aldehydes, unspecified [air, non-urban air or from high stacks]: 8.89211e-8 kg; name aldehydes_unspecified; = factor_MJ_kWh*0.00000000783; lognormal variance with pedigree 0.1406, pedigree (3,3,4,5,3)
  (same comment as for Uranium-234)
- Barium [air, non-urban air or from high stacks]: 7.37035e-7 kg; name barium; = factor_MJ_kWh*0.0000000649; lognormal variance with pedigree 0.7486, pedigree (5,3,4,5,3)
  (same comment as for Thorium-228)
- Ethane, 1,1,1-trichloro-, HCFC-140 [air, non-urban air or from high stacks]: 1.87382e-9 kg; name ethane_trichloro; = factor_MJ_kWh*0.000000000165; lognormal variance with pedigree 0.1406, pedigree (3,3,4,5,3)
  (same comment as for Uranium-234)
- Chloroform [air, non-urban air or from high stacks]: 9.17603e-9 kg; name chloroform; = factor_MJ_kWh*0.000000000808; lognormal variance with pedigree 0.1406, pedigree (3,3,4,5,3)
  (same comment as for Carbon disulfide)
- Methane, fossil [air, non-urban air or from high stacks]: 1.02435e-5 kg; name methane_fossil; = factor_MJ_kWh*0.000000902; lognormal variance with pedigree 0.074, pedigree (3,4,4,5,1)
  (same comment as for Uranium-234)
- Cadmium [air, non-urban air or from high stacks]: 1.18107e-8 kg; name cadmium; = factor_MJ_kWh*0.00000000104; lognormal variance with pedigree 0.7486, pedigree (5,3,4,5,3)
  (same comment as for Thorium-228)
- Acrolein [air, non-urban air or from high stacks]: 2.7142e-8 kg; name acrolein; = factor_MJ_kWh*0.00000000239; lognormal variance with pedigree 0.3586, pedigree (5,3,4,5,3)
  (same comment as for Uranium-234)
- Ethene, tetrachloro- [air, non-urban air or from high stacks]: 4.02019e-9 kg; name ethene_tetrachloro; = factor_MJ_kWh*0.000000000354; lognormal variance with pedigree 0.1786, pedigree (5,3,4,5,3)
  (same comment as for Uranium-234)
- Formaldehyde [air, non-urban air or from high stacks]: 4.1224e-7 kg; name formaldehyde; = factor_MJ_kWh*0.0000000363; lognormal variance with pedigree 0.08, pedigree (3,5,4,5,1)
  (same comment as for Uranium-234)

## Sampling procedure
Technical statistics published annually by Eskom in their Integrated report is used to provide data on coal quality, electrical efficiency, coal consumption, water consumption, ash volumes, and emissions of carbon dioxide, nitrous oxide, nitrogen oxides, sulphur dioxide and particulates. Individual power station data was used where Eskom-wide figures were not available (fuel oil and boiler water makeup). Mercury emissions are taken from the literature (Garnham and Langeman, 2016). Power station infrastructure and all other emissions to air are taken from the existing electricity production from hard coal dataset in ecoinvent (see extrapolation comment). Sources: Eskom Integrated Report 31 March 2017, Available at: http://www.eskom.co.za/IR2017/Documents/Eskom_integrated_report_2017.pdf; Garnham, B and Langeman, K (2016) Mercury emissions from South Africa’s coal-fired power stations, Clean Air Journal, Vol. 26, No2, 2016. Available at: http://www.cleanairjournal.org.za/download/caj_vol26_no2_2016_p14.pdf

## Extrapolations
Emissions to air other than CO2, N2O, NOx, SOx, particulates and Hg are taken from the existing ecoivent dataset, where the following comments apply:

Data from 1993 were updated for the years 2000 (v1.0), and 2004-2005 (v2.0). Uncertainty was adjusted accordingly.

Most of the exchanges were extrapolated through production-weighted averages of the datasets of the following 14 countries: AT, BE, ES, FR, IT, NL, PT, DE, CZ, HR, PL, SK, CN, US.

The original data were valid for the burning of 1MJ of hard coal. In this dataset, the values are scaled to the net output of 1kWh of electricity, based on the electrical efficiency.

## Review by Christian Bauer 2017-12-07
passed
