# electric parts production, heat and power co-generation unit, 160kW electrical

Dataset: EcoSpold 2, unit process
Geography: RER
Time period: 1987-01-01 to 2019-12-31
Technology level: current
Classification: EcoSpold01Categories: natural gas/cogeneration
Classification: ISIC rev.4 ecoinvent: 2710:Manufacture of electric motors, generators, transformers and electricity di
Tags: ConvertedDataset
Scenario: Business-as-Usual
System model: Allocation at the point of substitution
Generated by: Thomas Heck
Published in: Heck, T. 2007
Database: ecoinvent
isCopyrightProtected: true
accessRestrictedTo: 1

## General comment
Inventory refers to infrastructure of an existing natural gas cogeneration plant (lambda=1 motor, 160kWe, operation start 1987) at Jakobsberg, Basel, Switzerland. (Life time for operation assumed 100'000 h.)
[This dataset was already contained in the ecoinvent database version 2. It was not individually updated during the transfer to ecoinvent version 3. Life Cycle Impact Assessment results may still have changed, as they are affected by changes in the supply chain, i.e. in other datasets. This dataset was generated following the ecoinvent quality guidelines for version 2. It may have been subject to central changes described in the ecoinvent version 3 change report (http://www.ecoinvent.org/database/ecoinvent-version-3/reports-of-changes/), and the results of the central updates were reviewed extensively. The changes added e.g. consistent water flows and other information throughout the database. The documentation of this dataset can be found in the ecoinvent reports of version 2, which are still available via the ecoinvent website. The change report linked above covers all central changes that were made during the conversion process.]

## Included activities end
The module includes the most important materials used for production. It includes also the transport of these materials and the energy and water needed for production.

## Geography
Data refers to a plant in Switzerland, assumed valid for Europe (RER)

## Technology
Component of a specific cogeneration unit installed in Switzerland. Technology at end of 1980s.

## Parameters
- fraction, process water, to air: 0.15 dimensionless; name fraction_PW_to_air; lognormal variance with pedigree 0.092025, pedigree (4,4,3,2,4)
  Literature value. In case when no industry/process specific data are available, default evaporation fraction value is used. This value is 15% and is based on literature (Statistics Canada, 2007 & Shaffer, K.H., 2008, Consumptive water use in the Great Lakes Basin, USGS & Shiklomanov, 2003, World Water Resources at the Beginning of the 21st Century) and has been approved by an expert.

## Reference product
- electric parts, heat and power co-generation unit, 160kW electrical: 1 unit; CPC 461: Electric motors, generators and transformers, and parts thereof; By-product classification allocatable product
  EcoSpold01Location=RER
  production volume 1.32237 unit
    This is a placeholder value that does not reflect real-world production volumes. This dataset does not currently require a real-world production volume to work in the database framework, and no actual data were collected yet. This has no negative effect on the results of the ecoinvent database. The placeholder value of this activity was scaled according to the nominal GDP of 2005 (source: United Nations, http://data.un.org/Glossary.aspx?q=GDP+%28current+US%24%29, accessed 20130726) to reflect an appropriate share of the global production volume, which is also a placeholder value.
  property price 1943.6 EUR2005
    Calculated based on inputs: The price of the product has been calculated as a sum of the values of the material and energy inputs for this product. This value is therefore a rough estimation. It may underestimate the real price since there are additional expenses when producing any product. These expences can include for example labour costs, treatment of waste materials and profit for the producer. Please consider carefully whether this level of data quality is acceptable for your application.
  property true value 1943.6
    allocation property applied in "true value" allocation // value calculated from revenue

## By-products
- heat, for reuse in municipal waste incineration only: 0 MJ; CPC 17300: Steam and hot water; By-product classification allocatable product; pedigree (1,1,1,1,1)
  Net electricity generated from this waste and used in internal MSWI plant energy redistribution.
  Uncertainty: uncertainty is calculated from uncertainties in waste composition and uncertainties in energy efficiency and the uncertainty in internal energy demand
  production volume 0.0165167 MJ
  property exergy 0.1842 MJ; name E_th_prod_MSWI_exergy
    This exergy property is based on the exergy content of the product.
  property price 0.0106 EUR2005; name E_th_prod_MSWI_price_EUR2005
    Average European district heat price from Ecoheatcool and Euroheat 2005-2006, Ecoheat Work package 1: The European heat market. Final report. 10.6 EUR/GJ i s the price of district heat. http://www.solarthermalworld.org/files/Ecoheatcool%20WP1%20Web.pdf?download
  property true value relation 0.1842; name E_th_prod_MSWI_true_value_relation
    property to calculate "true value" from
  property true value 3.91136e-5
    allocation property applied in "true value" allocation // value calculated from true value relation
- electricity, for reuse in municipal waste incineration only: 0 kWh; CPC 17100: Electrical energy; By-product classification allocatable product; pedigree (1,1,1,1,1)
  (same comment as for heat, for reuse in municipal waste incineration only)
  production volume 0.00232237 kWh
  property true value relation 3.6; name E_el_prod_MSWI_true_value_relation
    property to calculate "true value" from
  property price 0.1 EUR2005; name E_el_prod_MSWI_price_EUR2005
    Estimated to be the same price as in case of electricity, medium voltage.
  property exergy 3.6 MJ; name E_el_prod_MSWI_exergy
    This exergy property is based on the exergy content of the product.
  property true value 0.000106841
    (same comment as for heat, for reuse in municipal waste incineration only)
- zinc concentrate: 0 kg; CPC 14290: Other non-ferrous metal ores and concentrates (other than uranium or thorium ores and concentrates); By-product classification allocatable product
  Calculated value from the knowledge of the properties of both products.
  production volume 3.14188e-7 kg
  property price 0.38 EUR2005; name ByP_price_EUR2005
    Temporary price data. Calculated as 90% of purchasers price based on: Zinc content in concentrate 53%. Concentrate price per kg Zn 86.5% of refined Zn price (13.5% treatment charges according to CHR Metals Limited 2005: Dynamic cost curves. http://www.minecost.com/dynamic.pdf). 2004 zinc price from USGS (2007) Mineral commodity summaries 2007. <http://minerals.usgs.gov/minerals/pubs/mcs/2007/mcs2007.pdf> [Accessed 25 May 2010]
  property zinc content 0.53; name zinc_C_zinc_concentrate
    Zinc content on a dry matter basis. Value taken from teh "zinc mine operation" /GLO dataset.
  property dry mass 1 kg; name DM_zinc_concentrate
  property carbon content 0
    carbon content on a dry matter basis (reserved; not for manual entry)
  property true value 2.74944e-8
    allocation property applied in "true value" allocation // value calculated from revenue
  properties: wet mass 1 kg, water content 0, carbon content, non-fossil 0, carbon content, fossil 0, water in wet mass 0 kg, carbon allocation 0 kg

## Inputs from technosphere
- lead: 0.47 kg; lognormal variance with pedigree 0.34, pedigree (1,1,5,1,1)
  EcoSpold01Location=RER
  estimate based on material price
  properties: wet mass 1 kg, dry mass 1 kg
- transport, passenger car: 5700 km; lognormal variance with pedigree 0.25, pedigree (1,1,5,1,1)
  EcoSpold01Location=RER
  uncertainty of person kilometres
- electricity, medium voltage: 5670 kWh; lognormal variance with pedigree 0.34, pedigree (1,1,5,1,1)
  estimate based on material price
  EcoSpold01Location=UCTE
- reinforcing steel: 52.7 kg; lognormal variance with pedigree 0.34, pedigree (1,1,5,1,1)
  EcoSpold01Location=RER
  estimate based on material price
  properties: carbon content, fossil 0.004, dry mass 1 kg, wet mass 1 kg
- aluminium, wrought alloy: 0.1 kg; lognormal variance with pedigree 0.34, pedigree (1,1,5,1,1)
  estimate based on material price
  EcoSpold01Location=RER
  properties: dry mass 1 kg, wet mass 1 kg
- wastewater from pig iron production: 0 m3; name wastewater_output; pedigree (1,1,1,1,1)
  rough estimate, uncertainty refers to amount of water only; not quantified here: composition of waste water unkown, therefore high uncertainty of applicability of modul.
  EcoSpold01Location=CH
  production volume 0 m3
    Calculated from the production volume of electric parts, cogen unit 160kWe in proportion to the respective output amounts.
  property price 0 EUR2005; name wastewater_output_price_EUR2005
  properties: water content 2962.17, dry mass 0.337476 kg, carbon content, fossil 1.2149e-5, wet mass 1000 kg
  note on carbon content, fossil: TOC = 0.0000041 kg/m3 (Tab A.19, ecoinvent v2.2 report 13_I). TOC was considered as Total Carbon.
- zinc: 0.154 kg; lognormal variance with pedigree 0.34, pedigree (1,1,5,1,1)
  EcoSpold01Location=RER
  estimate based on material price
  properties: dry mass 1 kg, wet mass 1 kg
- tin: 0.997 kg; lognormal variance with pedigree 0.34, pedigree (1,1,5,1,1)
  estimate based on material price
  EcoSpold01Location=RER
  properties: dry mass 1 kg, wet mass 1 kg
- polyethylene, low density, granulate: 47.4 kg; lognormal variance with pedigree 0.34, pedigree (1,1,5,1,1)
  estimate based on material price
  EcoSpold01Location=RER
  properties: carbon content, fossil 0.857143, wet mass 1 kg, dry mass 1 kg
  note on carbon content, fossil: Polyethylene is formed out of a huge amount of ethylene monomers (C2H4) (ecoinvent v2.2 report 11_II). MW=28 g/mol
- platinum: 0.0013 kg; lognormal variance with pedigree 0.34, pedigree (1,1,5,1,1)
  EcoSpold01Location=RER
  estimate based on material price
  properties: dry mass 1 kg, wet mass 1 kg
- waste plastic, mixture: -52 kg; lognormal variance with pedigree 0.1227, pedigree (3,3,5,3,4)
  EcoSpold01Location=CH
  production volume 52 kg
    (same comment as for wastewater from pig iron production)
  properties: wet mass 1 kg, dry mass 0.847 kg, water content 0.180638, carbon content, fossil 0.747344
  note on carbon content, fossil: C content in 1 kg DM was calculated using data in Tab A.2, ecoinvent v2.2 report 13_I
- nickel, 99.5%: 0.21 kg; lognormal variance with pedigree 0.34, pedigree (1,1,5,1,1)
  EcoSpold01Location=GLO
  estimate based on material price
  properties: wet mass 1 kg, dry mass 1 kg
- copper: 6.5 kg; lognormal variance with pedigree 0.34, pedigree (1,1,5,1,1)
  estimate based on material price
  EcoSpold01Location=RER
  properties: wet mass 1 kg, dry mass 1 kg
- heat, district or industrial, other than natural gas: 29355 MJ; lognormal variance with pedigree 0.34, pedigree (1,1,5,1,1)
  EcoSpold01Location=RER
  estimate based on material price
- polyvinylchloride, suspension polymerised: 0.501133 kg; lognormal variance with pedigree 0.34, pedigree (1,1,5,1,1)
  estimate based on material price
  EcoSpold01Location=RER
  properties: carbon content, fossil 0.387097, wet mass 1 kg, dry mass 1 kg
  note on carbon content, fossil: Monomer is vynyl chloride, C2H3Cl (ecoinvent v2.2 report 11_II). MW=62 g/mol
- wastewater from pig iron production: -0.056266, -0.016834 m3 (2 entries); lognormal variance with pedigree 0.34, pedigree (1,1,5,1,1)
  (same comment as for wastewater from pig iron production)
  production volume 0.0731 m3

## Inputs from nature
- Water, unspecified natural origin [natural resource, in water]: 0.0914 m3; name water_UNO_input; lognormal variance with pedigree 0.34, pedigree (1,1,5,1,1)
  rough estimate

## Emissions to nature
- Water [air, unspecified]: 0.01371 m3; name water_to_air_unspecified; = (water_UNO_input*fraction_PW_to_air); lognormal variance with pedigree 0.0807, pedigree (2,2,5,1,1)
  Calculated value based on literature values and expert opinion. See comments in the parametres' comment field.
  property fraction, origin: unspecified 1; name fraction_origin_unspecified
  property fraction, origin: salt water 0; name fraction_origin_salt_water
  property fraction, origin: fresh water 0; name fraction_origin_fresh_water
- Water [water, unspecified]: 0.00459 m3; name water_to_water_unspecified; = water_UNO_input*(1-fraction_PW_to_air)-(wastewater_output*-1); lognormal variance with pedigree 0.0807, pedigree (2,2,5,1,1)
  (same comment as for Water)
  property dry mass 0 kg; name DM
  property water in wet mass 1000 kg; name WWM
  property fraction, origin: salt water 0; name fraction_origin_salt_water_Ww
  property fraction, origin: fresh water 0; name fraction_origin_fresh_water_Ww
  property fraction, origin: unspecified 1; name fraction_origin_unspecified_Ww
  property carbon content, fossil 0; name C_content_fossil
  property wet mass 1000 kg; name WM
  property carbon content, non-fossil 0; name C_content_non_fossil

## Sampling procedure
Operator and manufacturer information

## Extrapolations
see Geography/Text

## Review by Gerald Rebitzer (obsolete) 2003-08-27
had passed
