# transport, freight train, steam

Dataset: EcoSpold 2, unit process
Geography: CN
Time period: 1999-01-01 to 2019-12-31
Technology level: current
Classification: EcoSpold01Categories: transport systems/train
Classification: ISIC rev.4 ecoinvent: 4912:Freight rail transport
Scenario: Business-as-Usual
System model: Allocation at the point of substitution
Generated by: Frédéric Gindroz
Published in: Spielmann M. 2007
Database: ecoinvent
isCopyrightProtected: true
accessRestrictedTo: 1

## General comment
The dataset represents the entire transport life cycle of a steam freight train in China. Coal use per tkm estimated from energy content in diesel consumed in diesel locomotives and a factor 6 lower efficiency for steam locomotives compared to diesel locomotives. Emissions are based on the dataset "hard coal, burned in coal mine power plant" and 24 MJ/kg LHV. However, emissions to air but CO2, NOx, N2O and CH4 have been arbitrarily increased by a factor of 2 per MJ, CO by a factor of 5, particles by a factor of 10, whereas ashes have been decreased by a factor of 2 compared to small coal mine power plants. This dataset should not be used for comparisons of locomotive types nor of transport means across different countries but only when transport is not a major contributor to total environmental burdens of a process or product being analyzed.

## Included activities start
The dataset starts with the production of a locomotive.

## Included activities end
The dataset ends with the service of transporting 1 ton over a distance of 1 km by a freight train. The dataset includes the production and the maintenance of the locomotive and the goods wagon, the construction of the railway track and the energy use and operation emissions of a freight trains using steam. The data of the energy use and operation emissions are based on "transport, freight train, diesel" dataset for RER adapting coal as fuel.

## Geography
RER model and operation model with own estimation for coal consumption & emissions per tkm. The 2004 China official statistics on the number of locomotives in operation in all railway Companies (national and local) give the shares 69.7%, 28.7% and 1.5% for diesel, electricity and steam , respectively. Coal for steam locomotives has a presumably lower ash content (say approximately 25% of coal weight) compared with coal for small coal mine plants (up to 50% of coal weight (Dones et al. 2003)), the retention efficiency is likely lower. Considering also that these locomotives are used mostly within Coal Bureaus, therefore in already highly polluted areas, and that pictures of some steam locomotive show dark and abundant plumes, the PM emission is likely high. Due to the assumptions on ash content, the disposal of ashes has been halved for the locomotive compared to small plants.
References:
Spielmann M., Kägi T., Stadler P. and Tietje O. (2004) Life cycle inventoriesof transport services. Final report ecoinvent 2000 No. 14. UNS, ETH-Zurich,Swiss Centre for Life Cycle Inventories, Duebendorf, CH, retrieved from:www.ecoinvent.ch.

## Technology
The dataset transport of coal by train in China is based on “transport, freight train (RER)” but instead of “transport, freight train (RER)” the input is defined to reflect the use of steam locomotives in the coal industry and in China in general. Demand factors of various transport components (as described in the previous sections) required to fulfill the functional unit of one tkm fright transport are presented. In order to account for the fact that the same rail tracks are used for both passenger and goods transportation are applied allocation factors.

## Reference product
- transport, freight train: 1 metric ton*km; CPC 6512: Railway transport services of freight; By-product classification allocatable product
  EcoSpold01Location=CN
  production volume 3.09536e10 metric ton*km; = 1.9346E+12 *0.016
    Share of fuel type from ecoinvent v2 report 14 citing official Chinese statistics for 2004. Total transport work from UIC statistical synopsis 2005 http://www.uic.org/IMG/xls/synth2005-2.xls
  property true value 0.026
    allocation property applied in "true value" allocation // value calculated from revenue
  properties: price 0.026 EUR2005

## By-products
- heat, for reuse in municipal waste incineration only: 0 MJ; CPC 17300: Steam and hot water; By-product classification allocatable product; pedigree (1,1,1,1,1)
  Net electricity generated from this waste and used in internal MSWI plant energy redistribution.
  Uncertainty: uncertainty is calculated from uncertainties in waste composition and uncertainties in energy efficiency and the uncertainty in internal energy demand
  production volume 126.887 MJ
  property exergy 0.1842 MJ; name E_th_prod_MSWI_exergy
    This exergy property is based on the exergy content of the product.
  property price 0.0106 EUR2005; name E_th_prod_MSWI_price_EUR2005
    Average European district heat price from Ecoheatcool and Euroheat 2005-2006, Ecoheat Work package 1: The European heat market. Final report. 10.6 EUR/GJ i s the price of district heat. http://www.solarthermalworld.org/files/Ecoheatcool%20WP1%20Web.pdf?download
  property true value relation 0.1842; name E_th_prod_MSWI_true_value_relation
    property to calculate "true value" from
  property true value 2.69646e-11
    allocation property applied in "true value" allocation // value calculated from true value relation
- electricity, for reuse in municipal waste incineration only: 0 kWh; CPC 17100: Electrical energy; By-product classification allocatable product; pedigree (1,1,1,1,1)
  (same comment as for heat, for reuse in municipal waste incineration only)
  production volume 17.8706 kWh
  property true value relation 3.6; name E_el_prod_MSWI_true_value_relation
    property to calculate "true value" from
  property price 0.1 EUR2005; name E_el_prod_MSWI_price_EUR2005
    Estimated to be the same price as in case of electricity, medium voltage.
  property exergy 3.6 MJ; name E_el_prod_MSWI_exergy
    This exergy property is based on the exergy content of the product.
  property true value 7.42211e-11
    (same comment as for heat, for reuse in municipal waste incineration only)

## Inputs from technosphere
- maintenance, locomotive: 7.11e-10 unit; lognormal variance with pedigree 0.11, pedigree (1,1,5,1,1)
  Calculated value, required to fulfill the functional unit of one tkm fright transport.
- hard coal ash: -0.0149 kg; lognormal variance with pedigree 0.34, pedigree (1,1,5,1,1)
  Estimated value. Emissions from the steam locomotive have been roughly estimated adjusting the emission rates (per MJ) from “hard coal, burned in coal mine power plant (CN)” by the average LHV (24 MJ/kg bituminous coal assumed to be used for locomotives vs. 12 MJ/kg poor quality coal for small power plants). Coal for steam locomotives has a presumably lower ash content (say approximately 25% of coal weight) compared with coal for small coal mine plants (up to 50% of coal weight (Dones et al. 2003)), the retention efficiency is likely lower. Energy use and operation emissions
  production volume 4.61209e8 kg; = Ref('e9f4d30e-c626-46f1-9632-20e533f4e634', 'ProductionVolume') * ((Ref('e1a50fef-d442-4dd0-969a-eab575253462')*-1) / Ref('e9f4d30e-c626-46f1-9632-20e533f4e634'))
    Calculated from production volume of reference product using the relative outputs.
  properties: dry mass 1 kg, wet mass 1 kg
- railway track: 9.3e-5 m*year; lognormal variance with pedigree 0.11, pedigree (1,1,5,1,1)
  EcoSpold01Location=CH
  Calculated value, required to fulfill the functional unit of one tkm fright transport.
- maintenance, goods wagon: 4.59e-8 unit; lognormal variance with pedigree 0.11, pedigree (1,1,5,1,1)
  Calculated value, required to fulfill the functional unit of one tkm fright transport.
- hard coal: 0.0467 kg; lognormal variance with pedigree 0.16, pedigree (1,1,5,1,1)
  Estimated value. The steam locomotive dataset is modelled in first approximation by assuming a factor of 4 in fuel (equivalent) utilization compared with a diesel locomotive, based on consideration of likely actual efficiencies (mix of first generation steam locomotives with typical drawbar thermal efficiency of approximately 7% and some second generation with superheating with efficiency up to 15%). Further correction has been applied using the factor 2.67. Energy use and operations emissions
  properties: dry mass 0.94 kg, water content 0.0638298, carbon content, fossil 0.845, wet mass 1 kg
  note on carbon content, fossil: C content 75-94% (specified in Tab 1.1, report 6, part VI). A mean content of 0.845 kg C/ kg dry hard coal was considered
- goods wagon: 4.59e-8 unit; lognormal variance with pedigree 0.11, pedigree (1,1,5,1,1)
  Calculated value, required to fulfill the functional unit of one tkm fright transport.
  EcoSpold01Location=RER
- locomotive: 7.11e-10 unit; lognormal variance with pedigree 0.11, pedigree (1,1,5,1,1)
  (same comment as for goods wagon)

## Emissions to nature
- Antimony [air, unspecified]: 4.43e-9 kg; lognormal variance with pedigree 1.09, pedigree (1,1,5,1,1)
  Estimated value. Emissions from the steam locomotive have been roughly estimated adjusting the emission rates (per MJ) from “hard coal, burned in coal mine power plant (CN)” by the average LHV (24 MJ/kg bituminous coal assumed to be used for locomotives vs. 12 MJ/kg poor quality coal for small power plants). Additionally, to somewhat take into account the less efficient combustion characteristics, emissions rates have been modified upwards using a factor 2 greater than the, corresponding ones (per MJ) from a small power plants. Energy use and operation emissions
- Potassium-40 [air, unspecified]: 6.69e-5 kBq; lognormal variance with pedigree 0.92, pedigree (1,1,5,1,1)
  (same comment as for Antimony)
- Methane, fossil [air, unspecified]: 1.12e-6 kg; lognormal variance with pedigree 0.39, pedigree (1,1,5,1,1)
  Estimated value. Emissions from the steam locomotive have been roughly estimated adjusting the emission rates (per MJ) from “hard coal, burned in coal mine power plant (CN)” by the average LHV (24 MJ/kg bituminous coal assumed to be used for locomotives vs. 12 MJ/kg poor quality coal for small power plants). Energy use and operation emissions
- Cobalt [air, unspecified]: 1.06e-8 kg; lognormal variance with pedigree 1.09, pedigree (1,1,5,1,1)
  (same comment as for Antimony)
- Lead [air, unspecified]: 1.42e-7 kg; lognormal variance with pedigree 1.09, pedigree (1,1,5,1,1)
  (same comment as for Antimony)
- Manganese [air, unspecified]: 1.35e-7 kg; lognormal variance with pedigree 1.09, pedigree (1,1,5,1,1)
  (same comment as for Antimony)
- Lead-210 [air, unspecified]: 0.000272 kBq; lognormal variance with pedigree 1.09, pedigree (1,1,5,1,1)
  (same comment as for Antimony)
- Xylene [air, unspecified]: 2.06e-6 kg; lognormal variance with pedigree 0.39, pedigree (1,1,5,1,1)
  (same comment as for Antimony)
- Particulates, > 10 um [air, unspecified]: 0.000281 kg; lognormal variance with pedigree 0.39, pedigree (1,1,5,1,1)
  Estimated value. Emissions from the steam locomotive have been roughly estimated adjusting the emission rates (per MJ) from “hard coal, burned in coal mine power plant (CN)” by the average LHV (24 MJ/kg bituminous coal assumed to be used for locomotives vs. 12 MJ/kg poor quality coal for small power plants). Coal for steam locomotives has a presumably lower ash content (say approximately 25% of coal weight) compared with coal for small coal mine plants (up to 50% of coal weight (Dones et al. 2003)), the retention efficiency is likely lower. Considering also that these locomotives are used mostly within Coal Bureaus, therefore in already highly polluted areas, and that pictures of some steam locomotive show dark and abundant plumes, the PM emission is likely high. Due to the assumptions on ash content, the disposal of ashes has been halved for the locomotive compared to small plants.
  Energy use and operation emissions
- Radium-226 [air, unspecified]: 7.02e-5 kBq; lognormal variance with pedigree 0.92, pedigree (1,1,5,1,1)
  (same comment as for Antimony)
- Zinc [air, unspecified]: 1.72e-7 kg; lognormal variance with pedigree 1.09, pedigree (1,1,5,1,1)
  (same comment as for Antimony)
- Benzo(a)pyrene [air, unspecified]: 4.48e-13 kg; lognormal variance with pedigree 0.39, pedigree (1,1,5,1,1)
  (same comment as for Antimony)
- Hydrocarbons, aliphatic, unsaturated [air, unspecified]: 4.84e-7 kg; lognormal variance with pedigree 0.39, pedigree (1,1,5,1,1)
  (same comment as for Antimony)
- Radon-220 [air, unspecified]: 0.00146 kBq; lognormal variance with pedigree 0.92, pedigree (1,1,5,1,1)
  (same comment as for Antimony)
- Mercury [air, unspecified]: 7.16e-9 kg; lognormal variance with pedigree 1.09, pedigree (1,1,5,1,1)
  (same comment as for Antimony)
- Selenium [air, unspecified]: 2.21e-8 kg; lognormal variance with pedigree 1.09, pedigree (1,1,5,1,1)
  (same comment as for Antimony)
- Boron [air, unspecified]: 1.57e-6 kg; lognormal variance with pedigree 1.09, pedigree (1,1,5,1,1)
  (same comment as for Antimony)
- Chromium VI [air, unspecified]: 3.16e-9 kg; lognormal variance with pedigree 0.72, pedigree (1,1,5,1,1)
  (same comment as for Antimony)
- Dinitrogen monoxide [air, unspecified]: 1.12e-6 kg; lognormal variance with pedigree 0.27, pedigree (1,1,5,1,1)
  (same comment as for Antimony)
- Uranium-238 [air, unspecified]: 5.85e-5 kBq; lognormal variance with pedigree 0.92, pedigree (1,1,5,1,1)
  (same comment as for Antimony)
- Dioxins, measured as 2,3,7,8-tetrachlorodibenzo-p-dioxin [air, unspecified]: 1.57e-14 kg; lognormal variance with pedigree 0.72, pedigree (1,1,5,1,1)
  (same comment as for Antimony)
- Thorium-232 [air, unspecified]: 1.76e-5 kBq; lognormal variance with pedigree 0.92, pedigree (1,1,5,1,1)
  (same comment as for Antimony)
- Arsenic [air, unspecified]: 2.7e-8 kg; lognormal variance with pedigree 1.09, pedigree (1,1,5,1,1)
  (same comment as for Antimony)
- Carbon dioxide, fossil [air, unspecified]: 0.106 kg; lognormal variance with pedigree 0.07, pedigree (1,1,5,1,1)
  (same comment as for Methane, fossil)
- Benzene [air, unspecified]: 4.86e-7 kg; lognormal variance with pedigree 0.39, pedigree (1,1,5,1,1)
  (same comment as for Antimony)
- Hydrogen fluoride [air, unspecified]: 6.11e-6 kg; lognormal variance with pedigree 0.5, pedigree (1,1,5,1,1)
  (same comment as for Antimony)
- Radium-228 [air, unspecified]: 2.08e-5 kBq; lognormal variance with pedigree 0.92, pedigree (1,1,5,1,1)
  (same comment as for Antimony)
- Pentane [air, unspecified]: 3.29e-7 kg; lognormal variance with pedigree 0.39, pedigree (1,1,5,1,1)
  (same comment as for Antimony)
- Cadmium [air, unspecified]: 2.59e-9 kg; lognormal variance with pedigree 1.09, pedigree (1,1,5,1,1)
  (same comment as for Antimony)
- Hydrocarbons, aliphatic, alkanes, unspecified [air, unspecified]: 4.9e-7 kg; lognormal variance with pedigree 0.39, pedigree (1,1,5,1,1)
  (same comment as for Antimony)
- Butane [air, unspecified]: 4.25e-8 kg; lognormal variance with pedigree 0.39, pedigree (1,1,5,1,1)
  (same comment as for Antimony)
- Polonium-210 [air, unspecified]: 0.000497 kBq; lognormal variance with pedigree 0.92, pedigree (1,1,5,1,1)
  (same comment as for Antimony)
- Thorium-228 [air, unspecified]: 1.12e-5 kBq; lognormal variance with pedigree 0.92, pedigree (1,1,5,1,1)
  (same comment as for Antimony)
- Nitrogen oxides [air, unspecified]: 0.000457 kg; lognormal variance with pedigree 0.27, pedigree (1,1,5,1,1)
  (same comment as for Methane, fossil)
- Radon-222 [air, unspecified]: 0.00082 kBq; lognormal variance with pedigree 0.92, pedigree (1,1,5,1,1)
  (same comment as for Antimony)
- PAH, polycyclic aromatic hydrocarbons [air, unspecified]: 2.24e-9 kg; lognormal variance with pedigree 0.72, pedigree (1,1,5,1,1)
  (same comment as for Antimony)
- Vanadium [air, unspecified]: 6.25e-8 kg; lognormal variance with pedigree 1.09, pedigree (1,1,5,1,1)
  (same comment as for Antimony)
- Formaldehyde [air, unspecified]: 1.3e-7 kg; lognormal variance with pedigree 0.39, pedigree (1,1,5,1,1)
  (same comment as for Antimony)
- Propane [air, unspecified]: 7.84e-8 kg; lognormal variance with pedigree 0.39, pedigree (1,1,5,1,1)
  (same comment as for Antimony)
- Copper [air, unspecified]: 3.42e-8 kg; lognormal variance with pedigree 1.09, pedigree (1,1,5,1,1)
  (same comment as for Antimony)
- Bromine [air, unspecified]: 1.28e-6 kg; lognormal variance with pedigree 0.43, pedigree (1,1,5,1,1)
  (same comment as for Antimony)
- Propene [air, unspecified]: 3.58e-8 kg; lognormal variance with pedigree 0.39, pedigree (1,1,5,1,1)
  (same comment as for Antimony)
- Particulates, > 2.5 um, and < 10um [air, unspecified]: 0.000132 kg; lognormal variance with pedigree 0.61, pedigree (1,1,5,1,1)
  (same comment as for Particulates, > 10 um)
- Ethane [air, unspecified]: 9.18e-8 kg; lognormal variance with pedigree 0.39, pedigree (1,1,5,1,1)
  (same comment as for Antimony)
- Toluene [air, unspecified]: 2.44e-7 kg; lognormal variance with pedigree 0.39, pedigree (1,1,5,1,1)
  (same comment as for Antimony)
- Nickel [air, unspecified]: 7.47e-8 kg; lognormal variance with pedigree 1.09, pedigree (1,1,5,1,1)
  (same comment as for Antimony)
- Barium [air, unspecified]: 2.72e-7 kg; lognormal variance with pedigree 1.09, pedigree (1,1,5,1,1)
  (same comment as for Antimony)
- Particulates, < 2.5 um [air, unspecified]: 0.00113 kg; lognormal variance with pedigree 0.72, pedigree (1,1,5,1,1)
  (same comment as for Particulates, > 10 um)
- Carbon monoxide, fossil [air, unspecified]: 8.96e-5 kg; lognormal variance with pedigree 1.09, pedigree (1,1,5,1,1)
  (same comment as for Antimony)
- Sulfur dioxide [air, unspecified]: 0.0028 kg; lognormal variance with pedigree 0.27, pedigree (1,1,5,1,1)
  (same comment as for Antimony)
- Iodine [air, unspecified]: 6.55e-7 kg; lognormal variance with pedigree 0.5, pedigree (1,1,5,1,1)
  (same comment as for Antimony)
- Hydrogen chloride [air, unspecified]: 6.84e-5 kg; lognormal variance with pedigree 0.5, pedigree (1,1,5,1,1)
  (same comment as for Antimony)
- Strontium [air, unspecified]: 2.48e-7 kg; lognormal variance with pedigree 1.09, pedigree (1,1,5,1,1)
  (same comment as for Antimony)
- Chromium [air, unspecified]: 2.55e-8 kg; lognormal variance with pedigree 1.09, pedigree (1,1,5,1,1)
  (same comment as for Antimony)
- Molybdenum [air, unspecified]: 4.82e-9 kg; lognormal variance with pedigree 1.09, pedigree (1,1,5,1,1)
  (same comment as for Antimony)

## Extrapolations
see Technology and Geography

## Review by Carl Vadenbo 2012-06-29
In preparation for the release of ecoinvent v3.0, the datasets 'operation, coal freight train, steam CN' and 'transport, coal freight, rail CN' in ecoinvent v2.2 were merged into the dataset 'transport, freight train, steam, CN 1999-2004'. The amounts of the exchanges were reviewed and were found to correspond to the disaggregated datasets. The uncertainty information needs to be revised before subsequent releases of the database. Despite this shortcoming, the new dataset was accepted for inclusion into the ecoinvent database on 2012.07.05.
