# photovoltaic panel production, single-Si wafer

Dataset: EcoSpold 2, unit process
Geography: RoW
Time period: 2005-01-01 to 2019-12-31
Technology level: current
Classification: ISIC rev.4 ecoinvent: 2610:Manufacture of electronic components and boards
Classification: EcoSpold01Categories: photovoltaic/production of components
Synonyms: monocrystalline; PV-module; silicon; Solarmodul
Tags: ConvertedDataset
Scenario: Business-as-Usual
System model: Allocation at the point of substitution
Share of production covered: 5 %
Generated by: Niels Jungbluth
Published in: Jungbluth, N. 2007
Database: ecoinvent
isCopyrightProtected: true
accessRestrictedTo: 1

## General comment
Unit process raw data for 1 m2 of PV panel. Investigated for the production of solar panels and laminates with 60 solar cells a 156*156cm2 with a capacity of 224 Wp. Cell size and amount and capacity might differ between different producers.
[This dataset was already contained in the ecoinvent database version 2. It was not individually updated during the transfer to ecoinvent version 3. Life Cycle Impact Assessment results may still have changed, as they are affected by changes in the supply chain, i.e. in other datasets. This dataset was generated following the ecoinvent quality guidelines for version 2. It may have been subject to central changes described in the ecoinvent version 3 change report (http://www.ecoinvent.org/database/ecoinvent-version-3/reports-of-changes/), and the results of the central updates were reviewed extensively. The changes added e.g. consistent water flows and other information throughout the database. The documentation of this dataset can be found in the ecoinvent reports of version 2, which are still available via the ecoinvent website. The change report linked above covers all central changes that were made during the conversion process.]

## Included activities end
Production of the cell matrix, cutting of foils and washing of glass, production of laminate, isolation. Aluminium frame of the panel. Disposal after end of life. Data for direct air and water emissions were not available. It can be expected that small amount of NMVOC will be emitted from the lamination process.

## Geography
Production plants in Western Europe.

## Technology
Modern production plant.

## Time period
Date of data investigation. Some older data from 2001.

## Parameters
- fraction, tap water, to air: 0.15; name fraction_TW_to_air; lognormal variance with pedigree 0.092025, pedigree (4,4,3,2,4)
- fraction, process water, to air: 0.15 dimensionless; name fraction_PW_to_air; lognormal variance with pedigree 0.092025, pedigree (4,4,3,2,4)

## Reference product
- photovoltaic panel, single-Si wafer: 1 m2; CPC 47150: Diodes, transistors and similar semi-conductor devices; photosensitive semi-conductor devices; light emitting […]; By-product classification allocatable product
  EcoSpold01Location=RER
  production volume 3.96329e6 m2
    156*156cm2 with a capacity of 224 Wp (Tab 8.4, ecoinvent v2 report 6_XII). Total production worldwide of panels is 1500MW in 2005. Tab 12.6 (ecoinvent v2 report 6_XII) gives the share of the different types of photovoltaic cells, that was assumed as the share of the different panels.
  property price 488 EUR2005
    The production volume of this product is small compared to other products supplied by the activities within the same ISIC 3 category. Therefore, an average price of products supplied by the activities in the same ISIC 3 code has been applied.This price is obtained as '_69 Radio, television and communication equipment, EU27' in the 'EU & DK Input Output Database' (available in SimaPro, 19.28 EUR2003 per kg DS). The price is assumed to be valid for both RER2005, world 2005. Weight of product according to Ecoinvent: approx 25.5 kg per m2.
  property true value 488
    allocation property applied in "true value" allocation // value calculated from revenue

## By-products
- electricity, for reuse in municipal waste incineration only: 0 kWh; CPC 17100: Electrical energy; By-product classification allocatable product; pedigree (1,1,1,1,1)
  Net electricity generated from this waste and used in internal MSWI plant energy redistribution.
  Uncertainty: uncertainty is calculated from uncertainties in waste composition and uncertainties in energy efficiency and the uncertainty in internal energy demand
  production volume 1.25718e6 kWh
  property price 0.1 EUR2005; name E_el_prod_MSWI_price_EUR2005
    Estimated to be the same price as in case of electricity, medium voltage.
  property true value relation 3.6; name E_el_prod_MSWI_true_value_relation
    property to calculate "true value" from
  property exergy 3.6 MJ; name E_el_prod_MSWI_exergy
    This exergy property is based on the exergy content of the product.
  property true value 0.0360104
    allocation property applied in "true value" allocation // value calculated from true value relation
- heat, for reuse in municipal waste incineration only: 0 MJ; CPC 17300: Steam and hot water; By-product classification allocatable product; pedigree (1,1,1,1,1)
  (same comment as for electricity, for reuse in municipal waste incineration only)
  production volume 8.84023e6 MJ
  property exergy 0.1842 MJ; name E_th_prod_MSWI_exergy
    This exergy property is based on the exergy content of the product.
  property price 0.0106 EUR2005; name E_th_prod_MSWI_price_EUR2005
    Average European district heat price from Ecoheatcool and Euroheat 2005-2006, Ecoheat Work package 1: The European heat market. Final report. 10.6 EUR/GJ i s the price of district heat. http://www.solarthermalworld.org/files/Ecoheatcool%20WP1%20Web.pdf?download
  property true value relation 0.1842; name E_th_prod_MSWI_true_value_relation
    property to calculate "true value" from
  property true value 0.0129568
    (same comment as for electricity, for reuse in municipal waste incineration only)
- iron scrap, sorted, pressed: 0 kg; By-product classification Recyclable; CPC 39310: Slag, dross, scalings and other waste from the manufacture of iron or steel; pedigree (1,1,1,1,1)
  metallic iron scrap removed from ash reamains and recycled.
  Uncertainty: uncertainty is calculated from uncertainties in waste composition and transfer coefficients to soild residues
  production volume 393.604 kg
  property price 0.175 EUR2005
    Temporary price data. Calculated as 90% of purchasers price based on: 2005 import and export prices (total trades (USD) divided by total weight (kg) in biggest economies of the world: EU27, USA, Brasil, China, India, Japan and Russia) from UN Commodity Trade Statistics Database (http://data.un.org/Explorer.aspxDatabase [Accessed 2011.06.20]). Commodity: Waste or scrap, of cast iron
  property carbon content 0
    carbon content on a dry matter basis (reserved; not for manual entry)
  property true value 1.61246e-5
    allocation property applied in "true value" allocation // value calculated from revenue
  properties: carbon content, non-fossil 0, wet mass 1 kg, dry mass 1 kg, water content 0, carbon content, fossil 0, water in wet mass 0 kg, carbon allocation 0 kg
- copper: 0 kg; source Rentz O. 1999; By-product classification allocatable product; CPC 41413: Refined copper and copper alloys, unwrought; master alloys of copper
  Literature value. Copper uses: Before end-use copper is manufactured into semi fabricated products, such as shapes and ingots (known as 'semis'). These manufacturing processes are subdivided into hot working, cold working and, if necessary, process annealing. Few of the semis are ready for use as such. They more typically travel to first-stage manufacturers, who make metal rods, wire, and casting, and then to component manufacturers who produce such things as motors, valves, and insulated cables The components in turn are incorporated by final-stage manufacturers into a variety of finished products - automobiles, commercial buildings, residential housing, and so forth. These uses account for about 79% of the world-wide consumption of copper.
  production volume 12.6832 kg
  properties: dry mass 1 kg, water in wet mass 0 kg, wet mass 1 kg, carbon content, non-fossil 0, water content 0, price 5.52 EUR2005, carbon content, fossil 0, carbon content 0, carbon allocation 0 kg, true value 1.61893e-5
- zinc concentrate: 0 kg; CPC 14290: Other non-ferrous metal ores and concentrates (other than uranium or thorium ores and concentrates); By-product classification allocatable product
  Calculated value from the knowledge of the properties of both products.
  production volume 1.0067e-8 kg
  property price 0.38 EUR2005; name ByP_price_EUR2005
    Temporary price data. Calculated as 90% of purchasers price based on: Zinc content in concentrate 53%. Concentrate price per kg Zn 86.5% of refined Zn price (13.5% treatment charges according to CHR Metals Limited 2005: Dynamic cost curves. http://www.minecost.com/dynamic.pdf). 2004 zinc price from USGS (2007) Mineral commodity summaries 2007. <http://minerals.usgs.gov/minerals/pubs/mcs/2007/mcs2007.pdf> [Accessed 25 May 2010]
  property zinc content 0.53; name zinc_C_zinc_concentrate
    Zinc content on a dry matter basis. Value taken from teh "zinc mine operation" /GLO dataset.
  property dry mass 1 kg; name DM_zinc_concentrate
  property carbon content 0
    carbon content on a dry matter basis (reserved; not for manual entry)
  property true value 8.84596e-16
    allocation property applied in "true value" allocation // value calculated from revenue
  properties: wet mass 1 kg, water content 0, carbon content, non-fossil 0, carbon content, fossil 0, water in wet mass 0 kg, carbon allocation 0 kg
- iron scrap, unsorted: 0 kg; source European Aluminium Association 2008; CPC 39310: Slag, dross, scalings and other waste from the manufacture of iron or steel; By-product classification Recyclable; pedigree (1,1,1,1,1)
  production volume 0.0104132 kg
  property price 0.149 EUR2005; name ironScrapAmount_price_EUR2005
    Temporary price data. Calculated as 90% of purchasers price based on: estimated at 85% of sorted scrap
  property carbon content 0
    carbon content on a dry matter basis (reserved; not for manual entry)
  property true value 3.90593e-10
    allocation property applied in "true value" allocation // value calculated from revenue
  properties: water in wet mass 0 kg, water content 0, carbon content, fossil 0, carbon content, non-fossil 0, dry mass 1 kg, wet mass 1 kg, carbon allocation 0 kg
- aluminium oxide, non-metallurgical: 0 kg; source European Aluminium Association 2008; CPC 41432: Alumina (aluminium oxide), except artificial corundum; By-product classification allocatable product; CAS 1344-28-1; pedigree (1,1,1,1,1)
  production volume 0.655261 kg
  property carbon content, non-fossil 0; name C_content_non_fossil
  property price 0.28 EUR2005; name Al2O3Amount_price_EUR2005
    From UN trade database. http://data.un.org/ Import data from the largest economies of the world are used (Brazil, India, USA, China, Japan and EU-27).
  property dry mass 1 kg; name DM
  property water content 0; name water_content
  property wet mass 1 kg; name WM
  property water in wet mass 0 kg; name WWM
  property carbon content, fossil 0; name C_content_fossil
  property carbon content 0
    carbon content on a dry matter basis (reserved; not for manual entry)
  property true value 4.61878e-8
    allocation property applied in "true value" allocation // value calculated from revenue
  properties: carbon allocation 0 kg
- aluminium, cast alloy: 0 kg; source European Aluminium Association 2008; By-product classification allocatable product; CPC 41431: Unwrought aluminium; pedigree (1,1,1,1,1)
  EcoSpold01Location=RER
  production volume 6.12524 kg
  property price 1.3 EUR2005; name castAlloyAmount_price_EUR2005
    Temporary price data. Calculated as 90% of purchasers price based on: Source: London Metal Exchange, Aluminium alloy price for 2005
  property carbon content 0
    carbon content on a dry matter basis (reserved; not for manual entry)
  property true value 2.00457e-6
    allocation property applied in "true value" allocation // value calculated from revenue
  properties: water in wet mass 0 kg, carbon content, non-fossil 0, water content 0, dry mass 1 kg, carbon content, fossil 0, wet mass 1 kg, carbon allocation 0 kg
- aluminium, wrought alloy: 0 kg; source European Aluminium Association 2008; By-product classification allocatable product; CPC 4153: Semi-finished products of aluminium or aluminium alloys; pedigree (1,1,1,1,1)
  production volume 2.68151 kg
  property price 1.44 EUR2005; name secondaryAluminiumOutput_price_EUR2005
    Estimated based on literature values and expert judgement. Aluminium ccast alloys are about 90% of the price of aluminium wrought alloys.
  property carbon content 0
    carbon content on a dry matter basis (reserved; not for manual entry)
  property true value 9.7207e-7
    allocation property applied in "true value" allocation // value calculated from revenue
  properties: wet mass 1 kg, water content 0, carbon content, fossil 0, water in wet mass 0 kg, carbon content, non-fossil 0, dry mass 1 kg, carbon allocation 0 kg

## Inputs from technosphere
- glass fibre reinforced plastic, polyamide, injection moulded: 0.187791 kg; lognormal variance with pedigree 0.044, pedigree (1,4,5,5,1)
  EcoSpold01Location=RER
  De Wild 2007, polyphenylenoxid for junction box
  Uncertainty: de Wild 2007, polyphenylenoxid for junction box
  properties: carbon content, fossil 0.446018, dry mass 1 kg, wet mass 1 kg
  note on carbon content, fossil: Polyamide resin assimilate to Nylon 66 (ecoinvent v2.2 report 7_XIII). Nylon 66 is derived from hexamethylene diamine and adipic acid and has the following structure: -(HN-(CH2)6-NH-CO-(CH2)4-CO)n- (ecoinvent v2.2 report 11_II), C12H22N2O2. MW=226 g/mol. Here Nylon 66 is – mainly for improved stiffness and stability – modified with glass fibres. The glass fibre content in the product is assumed of 30%. (ecoinvent v2.2 report 11_II)
- 1-propanol: 0.00813778 kg; lognormal variance with pedigree 0.044, pedigree (1,4,5,5,1)
  De Wild 2007, soldering flux, 95% propanol
  EcoSpold01Location=RER
  Uncertainty: de Wild 2007, soldering flux, 95% propanol
  properties: carbon content, fossil 0.6, dry mass 1 kg, wet mass 1 kg
- corrugated board box: 0 kg; pedigree (1,1,1,1,1)
  De Wild 2007, packaging estimation
  EcoSpold01Location=RER
  Uncertainty: de Wild 2007, packaging estimation
  properties: carbon content, non-fossil 0.432275, wet mass 1 kg, water content 0.0582011, carbon content, fossil 0.000656085, dry mass 0.945 kg
  note on carbon content, non-fossil: Biogenic C content was calculated after biogenic C contents of chemicals used in the production of board (Tab 10.15 & 10.16, ecoinvent v2.2 report 11_III, part 10).
  note on carbon content, fossil: Fossil C content was calculated after fossil C contents of chemicals used in the production of board (Tab 10-15 & 10.16 ecoinvent v2.2 report 11_III, part 10)
- methanol: 0.00215538 kg; lognormal variance with pedigree 0.044, pedigree (1,4,5,5,1)
  GSS 2001, auxiliary material
  EcoSpold01Location=CH
  Uncertainty: GSS 2001, auxiliary material
  properties: carbon content, fossil 0.375, dry mass 1 kg, wet mass 1 kg
- tempering, flat glass: 10.078 kg; lognormal variance with pedigree 0.044, pedigree (1,4,5,5,1)
  EcoSpold01Location=RER
  De Wild 2007
  Uncertainty: de Wild 2007
- ethylvinylacetate, foil: 1.0016 kg; lognormal variance with pedigree 0.044, pedigree (1,4,5,5,1)
  EcoSpold01Location=RER
  De Wild 2007, EVA consumption 0.96 kg/m2, 6% more than glass area
  Uncertainty: de Wild 2007, EVA consumption 0.96 kg/m2, 6% more than glass area
  properties: carbon content, fossil 0.79734, wet mass 1 kg, dry mass 1 kg
  note on carbon content, fossil: Ethylene vinyl acetate copolymer contains 20% of vinyl acetate (ecoinvent v2.2 report 11_II)
- lubricating oil: 0.00160674 kg; lognormal variance with pedigree 0.044, pedigree (1,4,5,5,1)
  EcoSpold01Location=RER
  GSS 2001, auxiliary material
  Uncertainty: GSS 2001, auxiliary material
  properties: carbon content, fossil 0.75, dry mass 1 kg, wet mass 1 kg
  note on carbon content, fossil: Lubricating oil is produced from diesel. C-content/dry mass of fats and oils considered 75%, from: ecoinvent v2.2 report, n 15a, pg 40
- copper: 0.112679 kg; lognormal variance with pedigree 0.044, pedigree (1,4,5,5,1)
  EcoSpold01Location=RER
  De Wild 2007, copper ribbons for cell interconnection
  Uncertainty: de Wild 2007, copper ribbons for cell interconnection
  properties: dry mass 1 kg, wet mass 1 kg
- photovoltaic panel factory: 3.9996e-6 unit; lognormal variance with pedigree 0.344, pedigree (1,4,5,5,1)
  EcoSpold01Location=GLO
  Literature
  Uncertainty: Literature
- electricity, medium voltage: 0 kWh; pedigree (1,1,1,1,1)
  EcoSpold01Location=UCTE
  Calculated mean figure of 3 companies
  Uncertainty: calculated mean figure of 3 companies
- aluminium alloy, AlMg3: 2.62914 kg; lognormal variance with pedigree 0.044, pedigree (1,4,5,5,1)
  De Wild 2007, profile for frame
  EcoSpold01Location=RER
  Uncertainty: de Wild 2007, profile for frame
  properties: wet mass 1 kg, dry mass 1 kg
- tap water: 0 kg; name tap_water_input; pedigree (1,1,1,1,1)
  EcoSpold01Location=RER
  De Wild 2007, glass rinsing and general use
  Uncertainty: de Wild 2007, glass rinsing and general use
  properties: carbon content, fossil 0.00178991, water content 2962.17, wet mass 1 kg, dry mass 0.000337476 kg
  note on carbon content, fossil: Bicarbonate content is 2.93 mol/m3. CO2 content is 0.1 mol/m3 (ecoinvent v2.2 report 8, Tab 93.1).
- photovoltaic cell, single-Si wafer: 0.932316 m2; lognormal variance with pedigree 0.044, pedigree (1,4,5,5,1)
  EcoSpold01Location=RER
  De Wild 2007, Estimation 60 cells a 1.56dm2 +2% cell loss
  Uncertainty: de Wild 2007, Estimation 60 cells a 1.56dm2 +2% cell loss
  properties: carbon content, fossil 0.0126329, wet mass 0.75 kg, dry mass 0.75 kg
  note on carbon content, fossil: C content was calculated as the addition of C content in the components
- waste mineral oil: -0.00160674 kg; lognormal variance with pedigree 0.044, pedigree (1,4,5,5,1)
  EcoSpold01Location=CH
  Calculation, oil used during production
  Uncertainty: Calculation, oil used during production
  production volume 6368.61 kg
    Calculated from the production volume of photovoltaic panel, single-Si wafer in proportion to the respective output amounts.
  properties: water content 0.111111, carbon content, fossil 0.864444, dry mass 0.9 kg, wet mass 1 kg
  note on carbon content, fossil: Tab A.6, ecoinvent v2.2 report 13_I. C content has been calculated after data in the tables, and then referred to 1 kg DM
- acetone, liquid: 0.0129577 kg; lognormal variance with pedigree 0.044, pedigree (1,4,5,5,1)
  De Wild 2007, cleaning fluid
  EcoSpold01Location=RER
  Uncertainty: de Wild 2007, cleaning fluid
  properties: carbon content, fossil 0.62069, dry mass 1 kg, wet mass 1 kg
- waste plastic, mixture: 0 kg; pedigree (1,1,1,1,1)
  EcoSpold01Location=CH
  Calculation, including disposal of the panel after life time
  Uncertainty: Calculation, including disposal of the panel after life time
  production volume 0 kg
    (same comment as for waste mineral oil)
  properties: carbon content, fossil 0.747344, water content 0.180638, dry mass 0.847 kg, wet mass 1 kg
  note on carbon content, fossil: C content in 1 kg DM was calculated using data in Tab A.2, ecoinvent v2.2 report 13_I
- vinyl acetate: 0.00164323 kg; lognormal variance with pedigree 0.044, pedigree (1,4,5,5,1)
  EcoSpold01Location=RER
  GSS 2001, ethylacetat, auxiliary material
  Uncertainty: GSS 2001, ethylacetat, auxiliary material
  properties: carbon content, fossil 0.55814, wet mass 1 kg, dry mass 1 kg
  note on carbon content, fossil: Vinyl acetate (CH3CO2CH=CH2) (ecoinvent v2.2 report 11_II), C4H6O2. MW=86 g/mol
- solar glass, low-iron: 10.078 kg; lognormal variance with pedigree 0.062, pedigree (1,4,5,5,3)
  De Wild 2007, 4mm thickness (3.2-4 mm for different producers), 1% losses, density 2.5 g/cm3
  EcoSpold01Location=RER
  Uncertainty: de Wild 2007, 4mm thickness (3.2-4 mm for different producers), 1% losses, density 2.5 g/cm3
  properties: dry mass 1 kg, wet mass 1 kg
- heat, district or industrial, natural gas: 0 MJ; pedigree (1,1,1,1,1)
  Calculated mean figure of 3 companies
  EcoSpold01Location=RER
  Uncertainty: calculated mean figure of 3 companies
- waste polyvinylfluoride: -0.110389 kg; lognormal variance with pedigree 0.044, pedigree (1,4,5,5,1)
  (same comment as for waste plastic, mixture)
  production volume 437547 kg
    (same comment as for waste mineral oil)
  properties: carbon content, fossil 0.571142, water content 0.00200401, dry mass 0.998 kg, wet mass 1 kg
- silicone product: 0.121938 kg; lognormal variance with pedigree 0.044, pedigree (1,4,5,5,1)
  EcoSpold01Location=RER
  De Wild 2007, kit to attach frame and junction box and for diaphragm of laminator
  Uncertainty: de Wild 2007, kit to attach frame and junction box and for diaphragm of laminator
  properties: carbon content, fossil 0.324324, dry mass 1 kg, wet mass 1 kg
  note on carbon content, fossil: The term silicones is used for compounds in which silicon atoms are linked via oxygen atoms, each silicon atom bearing one or several organic groups. In industrially important silicones, these groups are usually methyl or phenyl (ecoinvent v2.2 report 8_part71 & Ullmann). The chemical formula was considered to be [Si(CH3)2O]n (Ullmann).
- polyvinylfluoride, film: 0.110389 kg; lognormal variance with pedigree 0.044, pedigree (1,4,5,5,1)
  De Wild 2007, back foil, for solar cell module, 350 micron thickness: 2x37 micron polyvinyl fluoride, 250 micron polyethylene terephthalate; 0.488 g/m2, 7% cutting loss
  EcoSpold01Location=US
  Uncertainty: de Wild 2007, back foil, for solar cell module, 350 micron thickness: 2x37 micron polyvinyl fluoride, 250 micron polyethylene terephthalate; 0.488 g/m2, 7% cutting loss
  properties: carbon content, fossil 0.521739, dry mass 1 kg, wet mass 1 kg
- wastewater, from residence: -0.0212839 m3; lognormal variance with pedigree 0.044, pedigree (1,4,5,5,1)
  Calculation, water use
  EcoSpold01Location=CH
  Uncertainty: Calculation, water use
  production volume 84362.6 m3
    (same comment as for waste mineral oil)
  properties: water content 2962.17, wet mass 1000 kg, carbon content, non-fossil 0.199421, dry mass 0.337476 kg
  note on carbon content, non-fossil: 0.0673 kg TOC/m3 (Tab A.17, ecoinvent v2.2 report 13_I). TOC was considered as Total Carbon.
- brazing solder, cadmium free: 0.00876382 kg; lognormal variance with pedigree 0.044, pedigree (1,4,5,5,1)
  De Wild 2007, Sn60Pb40 plating on tabbing material, Sn plating on interconnect/terminal ribbons
  EcoSpold01Location=RER
  Uncertainty: de Wild 2007, Sn60Pb40 plating on tabbing material, Sn plating on interconnect/terminal ribbons
  properties: dry mass 1 kg, wet mass 1 kg
- wire drawing, copper: 0.112679 kg; lognormal variance with pedigree 0.044, pedigree (1,4,5,5,1)
  EcoSpold01Location=RER
  Estimation for use of copper wires
  Uncertainty: estimation for use of copper wires
- nickel, 99.5%: 0.000162754 kg; lognormal variance with pedigree 0.044, pedigree (1,4,5,5,1)
  De Wild 2007, plating on interconnect ribbons
  EcoSpold01Location=GLO
  Uncertainty: de Wild 2007, plating on interconnect ribbons
  properties: wet mass 1 kg, dry mass 1 kg
- polyethylene terephthalate, granulate, amorphous: 0.372933 kg; lognormal variance with pedigree 0.044, pedigree (1,4,5,5,1)
  De Wild 2007, back foil, for solar cell module, 350 micron thickness: 2x37 micron polyvinyl fluoride, 250 micron polyethylene terephthalate; 0.488 g/m2, 7% cutting loss
  EcoSpold01Location=RER
  Uncertainty: de Wild 2007, back foil, for solar cell module, 350 micron thickness: 2x37 micron polyvinyl fluoride, 250 micron polyethylene terephthalate; 0.488 g/m2, 7% cutting loss
  properties: carbon content, fossil 0.625, wet mass 1 kg, dry mass 1 kg
  note on carbon content, fossil: Polymer of the ethylen terephtalate monomer (C10H8O4)n (ecoinvent v2.2 report 11_II), MW=192 g/mol
- municipal solid waste: 0 kg; pedigree (1,1,1,1,1)
  EcoSpold01Location=CH
  Alsema (personal communication) 2007, production waste
  Uncertainty: Alsema (personal communication) 2007, production waste
  production volume 0 kg
    (same comment as for waste mineral oil)
  properties: carbon content, non-fossil 0.261655, carbon content, fossil 0.171549, water content 0.297017, wet mass 1 kg, dry mass 0.771 kg
  note on carbon content, non-fossil: MSW composition in tab 4.1, ecoinvent v2.2 report 13_I. C content referred to 1 kg DM
- corrugated board box: 0.0127451, 1.08274 kg (2 entries); lognormal variance with pedigree 0.044, pedigree (1,4,5,5,1)
  (same comment as for corrugated board box)
- electricity, medium voltage: 0.0616604, 0.0112196, 0.190267, 2.75868, 0.394819, 1.29359 kWh (6 entries); lognormal variance with pedigree 0.0446, pedigree (3,3,5,5,1)
  (same comment as for electricity, medium voltage)
- tap water: 0.0398802, 0.331305, 0.0659086, 1.66196, 0.0432353, 0.122982, 19.0186 kg (7 entries); lognormal variance with pedigree 0.044, pedigree (1,4,5,5,1)
  (same comment as for tap water)
- waste plastic, mixture: -0.207184, -0.0138432, -0.00104694, -0.00571774, -0.0023099, -0.00542953, -1.4504 kg (7 entries); lognormal variance with pedigree 0.044, pedigree (1,4,5,5,1)
  (same comment as for waste plastic, mixture)
  production volume 6.68251e6 kg
- heat, district or industrial, natural gas: 0.0845728, 4.78133 MJ (2 entries); lognormal variance with pedigree 0.0446, pedigree (3,3,5,5,1)
  (same comment as for heat, district or industrial, natural gas)
- municipal solid waste: -4.23177e-5, -1.0663e-5, -1.52381e-5, -0.0299288 kg (4 entries); lognormal variance with pedigree 0.044, pedigree (1,4,5,5,1)
  (same comment as for municipal solid waste)
  production volume 118899 kg

## Emissions to nature
- Water [air, unspecified]: 0.00319258 m3; name water_to_air_unspecified; lognormal variance with pedigree 0.0827, pedigree (2,2,5,5,1)
  Calculated value based on literature values and expert opinion. See comments in the parametres' comment field.
  property fraction, origin: salt water 0; name fraction_origin_salt_water
  property fraction, origin: unspecified 0; name fraction_origin_unspecified
  property fraction, origin: fresh water 1; name fraction_origin_fresh_water

## Sampling procedure
Environmental reports, direct contacts with factory representatives and publication of plant data.

## Extrapolations
Rough assumption for the use of heat in the process. This dataset has been copied from an original dataset covering the geography RER. The uncertainty has been adjusted accordingly.

## Review by Roberto Dones 2007-08-23
Passed.
none
