# treatment of spent antifreezer liquid, hazardous waste incineration

Dataset: EcoSpold 2, unit process
Geography: RoW
Time period: 1997-01-01 to 2019-12-31
Technology level: current
Classification: ISIC rev.4 ecoinvent: 3822:Treatment and disposal of hazardous waste
Classification: EcoSpold01Categories: waste management/hazardous waste incineration
Synonyms: mixture of aqueous solutions of EG and PG; mixture of aqueous solutions of ethylene glycol and propylene glycol; mixture of aqueous solutions of 1,2-ethanediol and 1,2-propanediol
Tags: ConvertedDataset; Treatment
Scenario: Business-as-Usual
System model: Allocation at the point of substitution
Share of production covered: 39 %
Generated by: Gabor Doka (obsolete)
Published in: Doka G. 2008
Database: ecoinvent
isCopyrightProtected: true
accessRestrictedTo: 1

## General comment
Inventoried waste contains 100% Anti-Freeze liquid; .
waste composition (wet, in ppm): upper heating value 10.92 MJ/kg; lower heating value 0.5551 MJ/kg; H2O 518000; O 225500; H 48800; C 207900; S n.a.; N n.a.; P n.a.; B n.a.; Cl n.a.; Br n.a.; F n.a.; I n.a.; Ag n.a.; As n.a.; Ba n.a.; Cd n.a.; Co n.a.; Cr n.a.; Cu n.a.; Hg n.a.; Mn n.a.; Mo n.a.; Ni n.a.; Pb n.a.; Sb n.a.; Se n.a.; Sn n.a.; V n.a.; Zn n.a.; Be n.a.; Sc n.a.; Sr n.a.; Ti n.a.; Tl n.a.; W n.a.; Si n.a.; Fe n.a.; Ca n.a.; Al n.a.; K n.a.; Mg n.a.; Na n.a.;
Share of carbon in waste that is biogenic 0%.
Net energy produced in HWI: 17.11MJ/kg electric energy and 1.27MJ/kg thermal energy
Allocation of energy production: no substitution or expansion. 100% of burden allocated to waste disposal function of HWI.
One kg of this waste produces 0.002287 kg of residues, which are landfilled. Additional solidification with 0.0009147 kg of cement.
[This dataset was already contained in the ecoinvent database version 2. It was not individually updated during the transfer to ecoinvent version 3. Life Cycle Impact Assessment results may still have changed, as they are affected by changes in the supply chain, i.e. in other datasets. This dataset was generated following the ecoinvent quality guidelines for version 2. It may have been subject to central changes described in the ecoinvent version 3 change report (http://www.ecoinvent.org/database/ecoinvent-version-3/reports-of-changes/), and the results of the central updates were reviewed extensively. The changes added e.g. consistent water flows and other information throughout the database. The documentation of this dataset can be found in the ecoinvent reports of version 2, which are still available via the ecoinvent website. The change report linked above covers all central changes that were made during the conversion process.]

## Included activities end
waste-specific air and water emissions from incineration, auxiliary material consumption for flue gas cleaning. Short-term emissions to river water and long-term emissions to ground water from residual material landfill (from solidified fly ashes and scrubber slugde). Process energy demands for HWI.

## Geography
Specific to the technology encountered in Switzerland in 2000. Well applicable to modern incineration practices in Europe or North America or Japan.

## Technology
Swiss HWI plant in 2000 with wet flue gas scrubber and low-dust SCR DeNOx facility. Gross thermal efficiency 74.4% and gross electric efficiency 10%.

## Time period
Transfer coefficients for modern Swiss MSWI. Emission speciation based on early 90ies data.

## Parameters
- fraction, process water, to air: 1 dimensionless; name fraction_PW_to_air; lognormal variance with pedigree 0.092025, pedigree (4,4,3,2,4)

## Reference product
- spent antifreezer liquid: -1 kg; CPC 39920: Sewage sludge; By-product classification Waste
  EcoSpold01Location=CH
  production volume 3.96633 kg
    This is a placeholder value that does not reflect real-world production volumes. This dataset does not currently require a real-world production volume to work in the database framework, and no actual data were collected yet. This has no negative effect on the results of the ecoinvent database.
  property price 0 EUR2005
    Waste products are assigned a price of zero as they are assumed to require further treatment.
  property carbon content, fossil 0.431328
    Tab A.7, ecoinvent v2.2 report 13_I. C content has been calculated after data in the tables, and then referred to 1 kg DM
  property carbon content 0.431328
    carbon content on a dry matter basis (reserved; not for manual entry)
  properties: water content 1.07469, dry mass 0.482 kg, water in wet mass 0.518 kg, wet mass 1 kg, carbon content, non-fossil 0, carbon allocation 0.2079 kg

## Inputs from technosphere
- heat, central or small-scale, other than natural gas: 0 MJ; pedigree (1,1,1,1,1)
  EcoSpold01Location=CH
  Uncertainty dependent on total energy required and heating value present, using experimental GSd for substraction from uc=A*GSDa^2-B
- process-specific burdens, hazardous waste incineration plant: 1 kg; lognormal variance with pedigree 0.042, pedigree (1,1,5,5,1)
  demands per kilogram waste. uncertainty is heeded in the module
  EcoSpold01Location=CH
- hydrochloric acid, without water, in 30% solution state: 4.003e-5 kg; lognormal variance with pedigree 0.142, pedigree (1,1,5,5,1)
  EcoSpold01Location=RER
  uncertainty calculated from uncertainty in average auxiliary material input, and the unertainty of the waste composition of this waste
  properties: wet mass 1 kg, dry mass 1 kg
- process-specific burdens, residual material landfill: 0 kg; pedigree (1,1,1,1,1)
  EcoSpold01Location=CH
  uncertainty is calculated from uncertainties in waste composition and transfer coefficients in incinerator
- chemical, inorganic: 6.6716e-5 kg; lognormal variance with pedigree 0.142, pedigree (1,1,5,5,1)
  Proxy for Polyelectrolyte. uncertainty calculated from uncertainty in average auxiliary material input, and the unertainty of the waste composition of this waste
  EcoSpold01Location=GLO
  properties: carbon content, fossil 0.003, dry mass 1 kg, wet mass 1 kg
  note on carbon content, fossil: This dataset is an unweighted average of 20 inorganic substances (listed in Tab 88.1, ecoinvent v2.2 report 8, part II), being part of the top100 chemicals included in this database. The C-content has also been calculated as an unweighted average of the C content of the substances composing this dataset.
- hazardous waste incineration facility: 1.25e-9 unit; lognormal variance with pedigree 0.042, pedigree (1,1,5,5,1)
  EcoSpold01Location=CH
  demands per kilogram waste. uncertainty is heeded in the module
- cement, unspecified: 0 kg; pedigree (1,1,1,1,1)
  EcoSpold01Location=CH
  Cement for solidification of landfilled residual material. Uncertainty calculated from unertainty of the waste composition of this waste, of transfer coefficients in the incinerator and of the solidification recipe.
  properties: wet mass 1 kg, dry mass 1 kg
- waste cement, hydrated: 0 kg; pedigree (1,1,1,1,1)
  EcoSpold01Location=CH
  Hydrated cement for solidification of landfilled residual material. Uncertainty calculated from unertainty of the waste composition of this waste and transfer coefficients in the incinerator and of the solidification recipe.
  production volume 0 kg
    Calculated from the production volume of spent antifreezer liquid, 51.8% water in proportion to the respective output amounts.
  properties: wet mass 1 kg, dry mass 1 kg
- residual material landfill: 4.7639e-12 unit; lognormal variance with pedigree 0.112, pedigree (1,1,5,5,1)
  (same comment as for process-specific burdens, residual material landfill)
- heat, central or small-scale, other than natural gas: 0.297331, 20.801 MJ (2 entries); lognormal variance with pedigree 0.092, pedigree (1,1,5,5,1)
  (same comment as for heat, central or small-scale, other than natural gas)
- process-specific burdens, residual material landfill: 0.000646849, 0.00163985 kg (2 entries); lognormal variance with pedigree 0.112, pedigree (1,1,5,5,1)
  (same comment as for process-specific burdens, residual material landfill)
- cement, unspecified: 2.74805e-5, 2.01276e-6, 5.73701e-6, 0.000132073, 0.000129744, 3.81876e-6, 4.19413e-5, 5.07442e-6, 0.000566778 kg (9 entries); lognormal variance with pedigree 0.122, pedigree (1,1,5,5,1)
  (same comment as for cement, unspecified)
- waste cement, hydrated: -0.000646849, -0.00163985 kg (2 entries); lognormal variance with pedigree 0.122, pedigree (1,1,5,5,1)
  (same comment as for waste cement, hydrated)
  production volume 0.0068601 kg

## Emissions to nature
- Water [air, unspecified]: 0.000518 m3; name water_to_air_unspecified; lognormal variance with pedigree 0.0827, pedigree (2,2,5,5,1)
  Calculated value based on water balance.
  property fraction, origin: fresh water 0; name fraction_origin_fresh_water
  property fraction, origin: unspecified 1; name fraction_origin_unspecified
  property fraction, origin: salt water 0; name fraction_origin_salt_water
  property dry mass 0 kg; name DM
  property wet mass 1000 kg; name WM
  property water in wet mass 1000 kg; name WWM
  property carbon content, non-fossil 0; name C_content_non_fossil
  property carbon content, fossil 0; name C_content_fossil
- BOD5, Biological Oxygen Demand [water, ground-, long-term]: 0.0033777 kg; lognormal variance with pedigree 0.162, pedigree (1,1,5,5,1)
  Long-term emissions from landfilling of incineration residues. uncertainty is calculated from uncertainties in waste composition and transfer coefficients in incinerator and landfills.
- Carbon dioxide, fossil [air, urban air close to ground]: 0.75388 kg; lognormal variance with pedigree 0.102, pedigree (1,1,5,5,1)
  calculated from uncertainty in carbon in waste and transfer coefficients
- TOC, Total Organic Carbon [water, ground-, long-term]: 0.0014778 kg; lognormal variance with pedigree 0.162, pedigree (1,1,5,5,1)
  (same comment as for BOD5, Biological Oxygen Demand)
- Carbon monoxide, fossil [air, urban air close to ground]: 1.2076e-5 kg; lognormal variance with pedigree 0.712, pedigree (1,4,5,5,3)
  1 plant for waste solvent incineration in Switzerland
  Uncertainty: & basic uncertainty of 5; 1 plant for waste solvent incineration in Switzerland
- COD, Chemical Oxygen Demand [water, ground-, long-term]: 0.0033777 kg; lognormal variance with pedigree 0.162, pedigree (1,1,5,5,1)
  (same comment as for BOD5, Biological Oxygen Demand)
- TOC, Total Organic Carbon [water, surface water]: 4.5703e-6 kg; lognormal variance with pedigree 0.382, pedigree (1,1,5,5,1)
  uncertainty is calculated from uncertainties in waste composition and transfer coefficients in incinerator and landfills
- BOD5, Biological Oxygen Demand [water, surface water]: 1.0446e-5 kg; lognormal variance with pedigree 0.382, pedigree (1,1,5,5,1)
  (same comment as for TOC, Total Organic Carbon)
- DOC, Dissolved Organic Carbon [water, ground-, long-term]: 0.0014778 kg; lognormal variance with pedigree 0.162, pedigree (1,1,5,5,1)
  (same comment as for BOD5, Biological Oxygen Demand)
- COD, Chemical Oxygen Demand [water, surface water]: 1.0446e-5 kg; lognormal variance with pedigree 0.382, pedigree (1,1,5,5,1)
  (same comment as for TOC, Total Organic Carbon)
- DOC, Dissolved Organic Carbon [water, surface water]: 4.5703e-6 kg; lognormal variance with pedigree 0.382, pedigree (1,1,5,5,1)
  (same comment as for TOC, Total Organic Carbon)

## Sampling procedure
The 2 Swiss HWI plants, used as the inventory reference technology mix, have a total annual capacity of 53'000 tons of hazardous waste. This corresponds to 39% of the Swiss total installed capacity in 2000. Swiss average plants size is 20'000 t/a.

## Extrapolations
Available waste composition data. Transfer coefficients from one modern HWI completed with data from MSWI. Waste-specific auxiliary material consumption adapted from MSWI. This dataset has been copied from an original dataset covering the geography CH. The uncertainty has been adjusted accordingly.

## Review by Niels Jungbluth 2009-01-22
passed.
