# sawnwood production, softwood, raw, dried (u=20%)

Dataset: EcoSpold 2, unit process
Geography: RER
Time period: 2014-01-01 to 2019-12-31
Technology level: current
Classification: ISIC rev.4 ecoinvent: 1610:Sawmilling and planing of wood
Classification: EcoSpold01Categories: wooden materials/extraction
Scenario: Business-as-Usual
System model: Allocation at the point of substitution
Generated by: Emilia Moreno Ruiz
Database: ecoinvent
isCopyrightProtected: false
accessRestrictedTo: 1

## General comment
[Dataset to be replaced by 'sawnwood production, softwood, raw, dried (u=20%), CH, 2014 - 2014']
[Dataset to be replaced by 'sawnwood production, softwood, raw, dried (u=20%), Europe without Switzerland, 2014 - 2014']

## Included activities start
Entry of the specific products issued of the drying activity

## Included activities end
Delivery of the generic planed product

## Reference product
- sawnwood, softwood, raw, dried (u=20%): 1 m3; CPC 31101: Wood, sawn or chipped lengthwise, sliced or peeled, of a thickness exceeding 6 mm, of coniferous wood; By-product classification allocatable product
  production volume 3.062e6 m3; = 0.287*1.0669E+07
    10% of the Production Volume issued from the drying has been made accesible as this generic product.
    The Production Volumes have been downscaled from GLO to RER using the relative GDP values 2011 (source: United Nations, <http://data.un.org/Glossary.aspx?q=GDP+%28current+US%24%29>, accessed 20130726).
  property price 160 EUR2005
    Expert judgement (Urs Luginbühl, Swiss Sawmilling industry, personal communication in June 2014). Cross-reference; FAOSTAT (accessed 20140428). The price is calculated by using data on total world import quantity (m3) and import value (1000 USD), year 2005. 109432798 m3 of Sawnwood (C) - coniferous was imported in the world in 2005. The import value was 22249842000 USD. The calculated price is thus (22249842000/109432798=203*0.8=) 164 Euro.
  property carbon content 0.494
    carbon content on a dry matter basis (reserved; not for manual entry)
  properties: wet mass 540 kg, dry mass 450 kg, water content 0.2, water in wet mass 90 kg, carbon content, fossil 0, carbon content, non-fossil 0.494, carbon allocation 222.3 kg

## Inputs from technosphere
- sawnwood, board, softwood, raw, dried (u=20%): 0.333333 m3; = 1/3; lognormal variance with pedigree 0.0026, pedigree (1,1,3,1,1)
  The input share has been calculated using data from the drying activity
  properties: carbon content, non-fossil 0.494, wet mass 464.64 kg, dry mass 387.2 kg, water content 0.2
- sawnwood, beam, softwood, raw, dried (u=20%): 0.333333 m3; = 1/3; lognormal variance with pedigree 0.0026, pedigree (1,1,3,1,1)
  The input share has been calculated using data from the drying activity
  properties: water content 0.2, wet mass 464.64 kg, dry mass 387.2 kg, carbon content, non-fossil 0.494
- sawnwood, lath, softwood, raw, dried (u=20%): 0.333333 m3; = 1/3; lognormal variance with pedigree 0.0026, pedigree (1,1,3,1,1)
  The input share has been calculated using data from the drying activity
  properties: wet mass 464.64 kg, carbon content, non-fossil 0.494, water content 0.2, dry mass 387.2 kg

## Extrapolations
This dataset has been extrapolated from year 2014 to the year of the calculation (2019). The uncertainty has been adjusted accordingly.
