# primary zinc production from concentrate

Dataset: EcoSpold 2, unit process
Geography: CA-QC
Time period: 2011-01-01 to 2019-12-31
Technology level: current
Classification: EcoSpold01Categories: metals/extraction
Classification: ISIC rev.4 ecoinvent: 2420:Manufacture of basic precious and other non-ferrous metals
Scenario: Business-as-Usual
System model: Allocation at the point of substitution
Share of production covered: 100 %
Generated by: Catherine Reid
Database: ecoinvent
isCopyrightProtected: true
accessRestrictedTo: 1

## General comment
This dataset represents the production of high grade (SHG-Special High Grade) primary zinc by hydrometallurgical processes. Specific data were collected from the only producer in the Québec region, for the years 2011-2012.
Primary zinc is produced in the form of ingots and shot, respectively used as coating in steel work/die cast and for electroplating. About 25% of the produced zinc is in the form of an aluminium alloy.
The zinc concentrate, coming from all around the world (e.g. Canada (Québec and Ontario), Australia), is transported to the site by train or by ship and truck and mixed on site. The site is able to treate zinc concentrate contaminated with mercury and selenium but cannot recover silver and lead. Contrary to the GLO dataset, this dataset does not include waste contaning indium ("indium rich leaching residues, from zinc production" by-product flow).

## Included activities start
From reception of raw materials, at the factory gate.

## Included activities end
This activity ends with the production of primary zinc ingots or shot.
This dataset includes the following on-site steps: roasting (fluidized bed reactor); acid plant; hydrometallurgy (leaching, purification); electrolysis; melting and molding; wastewater treatment; disposal of mining residues and waste (Jarofix, wastewater sludge, hazardous waste). Jarofix is an inert waste produced by the addition of cement to Jarosite. It also includes the off-site treatment of hazardous waste, recycling of materials and metal working for anodes and cathodes production.
This dataset excludes: secondary production of zinc (negligible); transportation to the site of the zinc concentrate; infrastructures and process emissions for the cathodes and anodes production (only metal working is included, see below); water for chemicals dilution; inputs of V2O5 catalyst (2.514E-04 kg/kg zinc) and potassium antimony tartrate (5.883E-05 kg/kg) since they are in small amounts and there are no corresponding production datasets yet in the ecoinvent database. The following by-products and wastes have also been excluded:
- due to data gap: Cobalt cake treated by pyrometallurgical process to separate the different components (4.008E-3 kg dry/kg zinc)
- due to small amounts: 1) Hg-Se sludge treated with hydrometallurgical process and leaching with NaOH to extract Se (1.495E-4 kg/kg zinc), 2) Used catalysis sent to residual material landfil (1.86E-4 kg/kg zinc ), 3) Used amine sent to residual material landfill (6.604E-4 kg/kg zinc).

## Geography
This activity represents the production of primary zinc in the Québec region.

## Technology
Hydrometallurgical process
Sulphide concentrates are roasted first in fluidized bed roasters to produce zinc oxide (calcine) and sulphur dioxide. Roasting is an exothermic process and no additional fuel is used to sustain the reaction, the heat generated is recovered to produce steam. Calcine is then sent to the leaching step. Roaster gases are treated in hot electrostatics precipitators to remove dust. The remaining dust and volatile metals such as mercury and selenium are removed in the wet section of the acid plant through a cooling tour, a mist precipitator and a mercury tower (Boliden mercury removal processs). The sulphur dioxide is then converted to sulphuric acid in a conventional recovery system (converted and absorbing tower).
Leaching of the calcine is carried out in a number of successive stages using a gradually increasing strength of hot sulphuric acid. The initial stages dissolve the major part of the zinc oxide and the other stages dissolve the zinc ferrite (ZnO.Fe2O3) and convert iron into Jarosite (sodium Jarosite). Zinc sulfate (ZnSO4) entering the electrolysis stage produce electrolyte (H2SO4) that is returned to leaching plant. Other metals are also dissolved during the process and are removed after leaching. Iron is the major impurity, which is precipitated in the form of Jarosite.
Overall waste: The production of metals is related to the generation of several by-products, residues and wastes. Relatively large quantities of iron based solids, depending on the iron content, are generated by the leaching process (6.14E-1 kg Jarosite/kg zinc). Cement is added to the Jarosite to produce Jarofix (an inert waste). Solid residues also arise as the result of the liquid effluents treatment. The main waste stream is gypsum (CaSO4) and metal hydroxides that are produced at the wastewater neutralization plant. Mercury and selenium residues arise from the weak acid bleed treatment from the acid plant. Selenium can be recovered from these residues depending on the market demand for this metal.
Overall emissions: The emissions to air can either be stack emissions or fugitive emissions. Stack emissions are normally monitored continuously (SO2) or periodically (other emissions) and reported. The main emissions to air from zinc production are sulphur dioxide (SO2) and particulate matters including metals. Main emissions to water are metals and their compounds. The monitored metals are zinc, cadmium, lead, mercury, selenium, copper and arsenic.

## Parameters
- lifetime: 100 year; lognormal variance with pedigree 0.308, pedigree (4,1,1,1,1)
  Estimation by data provider. Lifetime of the site excluding the plant buildings and roads, includes the tailing pond, the wastewater treatment sludge pond and the Jarofix disposal site.
- surface site: 1.05e6 m2; name surfaceSite; lognormal variance with pedigree 0.308, pedigree (4,1,1,1,1)
  Estimation by data provider. Surface area of the site excluding the plant buildings and roads, includes the tailing pond, the wastewater treatment sludge pond and the Jarofix disposal site.
- fraction, process water, to air: 0.014 dimensionless; name fraction_PW_to_air; lognormal variance with pedigree 0.0406, pedigree (2,1,1,1,1)
  Estimation by data provider.

## Reference product
- cadmium sludge from zinc electrolysis: 1 kg; name prod_cadmiumSludge_kg; CPC 39367: Waste and scrap of tungsten, molybdenum, tantalum, magnesium, cobalt, cadmium, titanium, zirconium, beryllium […]; By-product classification allocatable product; pedigree (1,1,1,1,1)
  EcoSpold01Location=GLO
  Measured value. 60-65% of the sludge produced is sold to China to produce batteries. Process is used to estimate a treatment of cadmium sponge by pyrometallurgical process.
  production volume 500108 kg; = (prod_cadmiumSludge_kg/prod_zinc_kg)*annualProd_zinc
    Calculated from the production volume of zinc in proportion to the respective output amounts.
  property price 1.157 EUR2005
    Estimated based on the price of cadmium and cadmium content of cadmium sludge. Based on the production process of primary cadmium, it is assumed that the value of cadmium sludge is equal to 80% of the value of cadmium it contains.
  property carbon content 0
    carbon content on a dry matter basis (reserved; not for manual entry)
  property true value 0.00219599; name prod_cadmiumSludge_kg_true_value
    allocation property applied in "true value" allocation // value calculated from revenue
  properties: water content 0, carbon content, fossil 0, water in wet mass 0 kg, wet mass 1 kg, concentration, cadmium 0.45 kg/kg, carbon content, non-fossil 0, dry mass 1 kg, carbon allocation 0 kg
- zinc: 0 kg; name prod_zinc_kg; CPC 41442: Zinc, unwrought; By-product classification allocatable product; CAS 7440-66-6
  EcoSpold01Location=RER
  production volume 2.63492e8 kg; name annualProd_zinc
    Measured Value. Average annual production for the years 2011-2012, including all production of metallic zinc (shot, ingots) and excluding the alloys.
  property price 1.04 EUR2005
    Temporary price data. Calculated as 90% of purchasers price based on: Source: ecoinvent v2 report 10-part IX, Tab 5.10 & 2.5
  property carbon content 0
    carbon content on a dry matter basis (reserved; not for manual entry)
  property true value 1.04; name prod_zinc_kg_true_value
    allocation property applied in "true value" allocation // value calculated from revenue
  properties: carbon content, non-fossil 0, water content 0, carbon content, fossil 0, dry mass 1 kg, wet mass 1 kg, water in wet mass 0 kg, carbon allocation 0 kg

## By-products
- sulfur dioxide, liquid: 0 kg; name prod_sulfurDioxide_kg; By-product classification allocatable product; CPC 34210: Hydrogen, nitrogen, oxygen, carbon dioxide and rare gases; inorganic oxygen compounds of non-metals n.e.c.; CAS 7446-09-5; pedigree (1,1,1,1,1)
  Proxy. Reported as Cansolv (ep. SO2) : 14-15% SO2 into amine, the virgin amine is returned to the plant once he SO2 has been extracted..
  production volume 349917 kg; = (prod_sulfurDioxide_kg/prod_zinc_kg)*annualProd_zinc
    (same comment as for cadmium sludge from zinc electrolysis)
  property price 0.131 EUR2005; name prod_sulfurDioxide_kg_price_EUR2005
    From UN trade database. http://data.un.org/ Import data from the largest economies of the world are used (Brazil, India, USA, China, Japan and EU-27).
  property carbon content 0
    carbon content on a dry matter basis (reserved; not for manual entry)
  property true value 0.000173968; name prod_sulfurDioxide_kg_true_value
    allocation property applied in "true value" allocation // value calculated from revenue
  properties: carbon content, fossil 0, wet mass 1 kg, dry mass 1 kg, water in wet mass 0 kg, water content 0, carbon content, non-fossil 0, carbon allocation 0 kg
- iron scrap, unsorted: 0 kg; name prod_scrapSteel_kg; CPC 39310: Slag, dross, scalings and other waste from the manufacture of iron or steel; By-product classification Recyclable; pedigree (1,1,1,1,1)
  Measured value. Reported as scrap steel (49.6%), stainless steel (0.7%) and mild steel (49.7%) to recycling. Iron scrap is used as proxy.
  production volume 553062 kg; = (prod_scrapSteel_kg/prod_zinc_kg)*annualProd_zinc
    (same comment as for cadmium sludge from zinc electrolysis)
  property price 0.149 EUR2005; name prod_scrapSteel_kg_price_EUR2005
    Temporary price data. Calculated as 90% of purchasers price based on: estimated at 85% of sorted scrap
  property carbon content 0
    carbon content on a dry matter basis (reserved; not for manual entry)
  property true value 0.000312746; name prod_scrapSteel_kg_true_value
    allocation property applied in "true value" allocation // value calculated from revenue
  properties: dry mass 1 kg, water content 0, carbon content, fossil 0, water in wet mass 0 kg, wet mass 1 kg, carbon content, non-fossil 0, carbon allocation 0 kg
- sulfuric acid: 0 kg; name prod_sulfuricAcid_kg; CPC 34231: Chemical elements n.e.c.; inorganic acids except phosphoric, nitric and sulphonitric; inorganic oxygen compoun[…]; By-product classification allocatable product; pedigree (1,1,1,1,1)
  Measured value. Produced at concentrations between 98 to 99.5% but reported quantity on a 100% basis. 456 847 tons of sulfuric acid are produced annually: 42 000 tons are used on site for the electrolysis process and 414 847 tons are sold.
  production volume 4.14736e8 kg; = (prod_sulfuricAcid_kg/prod_zinc_kg)*annualProd_zinc
    (same comment as for cadmium sludge from zinc electrolysis)
  property price 0.031 EUR2005; name prod_sulfuricAcid_kg_price_EUR2005
    Temporary price data. Calculated as 90% of purchasers price based on: 2004 Import/Export data (total trades (USD) divided by total weight (kg) in EU27, USA, China, Japan and India) from UN Commodity Trade Statistics Database (http://data.un.org/Explorer.aspxDatabase [Accessed 2 July 2010]). Commodity: 'Sulphuric acid, oleum'
  property carbon content 0
    carbon content on a dry matter basis (reserved; not for manual entry)
  property true value 0.048794; name prod_sulfuricAcid_kg_true_value
    allocation property applied in "true value" allocation // value calculated from revenue
  properties: water content 0, carbon content, fossil 0, water in wet mass 0 kg, dry mass 1 kg, wet mass 1 kg, carbon content, non-fossil 0, carbon allocation 0 kg
- copper: 0 kg; By-product classification allocatable product; CPC 41413: Refined copper and copper alloys, unwrought; master alloys of copper
  Was the reference flow of the original dataset.
  production volume 973052 kg
  property price 5.52 EUR2005; name copper_price_EUR2005
  properties: dry mass 1 kg, carbon content, non-fossil 0, carbon content, fossil 0, water in wet mass 0 kg, water content 0, wet mass 1 kg, carbon content 0, carbon allocation 0 kg, true value 0.0203849
- electricity, for reuse in municipal waste incineration only: 0 kWh; CPC 17100: Electrical energy; By-product classification allocatable product; pedigree (1,1,1,1,1)
  Net electricity generated from this waste and used in internal MSWI plant energy redistribution.
  Uncertainty: uncertainty is calculated from uncertainties in waste composition and uncertainties in energy efficiency and the uncertainty in internal energy demand
  production volume 11660.8 kWh
  property exergy 3.6 MJ; name E_el_prod_MSWI_exergy
    This exergy property is based on the exergy content of the product.
  property true value relation 3.6; name E_el_prod_MSWI_true_value_relation
    property to calculate "true value" from
  property price 0.1 EUR2005; name E_el_prod_MSWI_price_EUR2005
    Estimated to be the same price as in case of electricity, medium voltage.
  property true value 5.6704e-6
    allocation property applied in "true value" allocation // value calculated from true value relation
- heat, for reuse in municipal waste incineration only: 0 MJ; CPC 17300: Steam and hot water; By-product classification allocatable product; pedigree (1,1,1,1,1)
  Net useful heat generated from this waste and used in internal MSWI plant energy redistribution.
  Uncertainty: uncertainty is calculated from uncertainties in waste composition and uncertainties in energy efficiency and the uncertainty in internal energy demand
  production volume 81114.2 MJ
  property true value relation 0.1842; name E_th_prod_MSWI_true_value_relation
    property to calculate "true value" from
  property exergy 0.1842 MJ; name E_th_prod_MSWI_exergy
    This exergy property is based on the exergy content of the product.
  property price 0.0106 EUR2005; name E_th_prod_MSWI_price_EUR2005
    Average European district heat price from Ecoheatcool and Euroheat 2005-2006, Ecoheat Work package 1: The European heat market. Final report. 10.6 EUR/GJ i s the price of district heat. http://www.solarthermalworld.org/files/Ecoheatcool%20WP1%20Web.pdf?download
  property true value 2.01822e-6
    (same comment as for electricity, for reuse in municipal waste incineration only)
- zinc concentrate: 0 kg; CPC 14290: Other non-ferrous metal ores and concentrates (other than uranium or thorium ores and concentrates); By-product classification allocatable product
  Calculated value from the knowledge of the properties of both products.
  production volume 0.000805969 kg
  property price 0.38 EUR2005; name ByP_price_EUR2005
  property zinc content 0.53; name zinc_C_zinc_concentrate
  property dry mass 1 kg; name DM_zinc_concentrate
  properties: wet mass 1 kg, water content 0, carbon content, non-fossil 0, carbon content, fossil 0, water in wet mass 0 kg, carbon content 0, carbon allocation 0 kg, true value 1.16234e-12
- aluminium alloy, AlLi: 0 kg; By-product classification allocatable product; CPC 41431: Unwrought aluminium
  reference flow
  production volume 107.423 kg
  property price 3.6 EUR2005; name ref_price_EUR2005
    Literature value (http://www.economist.com/news/business/21576714-mining-industry-has-enriched-chile-its-future-precarious-copper-solution). Average price between 20015 and 2013.
  property carbon content 0
    carbon content on a dry matter basis (reserved; not for manual entry)
  property true value 1.46768e-6
    allocation property applied in "true value" allocation // value calculated from revenue
  properties: carbon content, non-fossil 0, carbon content, fossil 0, dry mass 1 kg, wet mass 1 kg, water in wet mass 0 kg, carbon allocation 0 kg
- ground granulated blast furnace slag: 0 kg; By-product classification allocatable product; CPC 37440: Portland cement, aluminous cement, slag cement and similar hydraulic cements, except in the form of clinkers
  Functional unit of LCI by Marceau & VanGeem (2003) was 1 short ton of slag cement (GGBFS) output which was converted to 907.18 kg for the present inventory.
  production volume 12.3024 kg
  property water content 0; name GGBFS_water_content
  property carbon content, non-fossil 0; name GGBFS_C_content_non_fossil
  property water in wet mass 0 kg; name GGBFS_WWM
  property carbon content, fossil 0; name GGBFS_C_content_fossil
    Industry value; Arcelor Mittal, chemical composition of blast furnace slag (http://www.cst.com.br/english/products/co_products/catalog_products/blast_slag/blast_slag.asp, accessed: 20121003).
  property price 0.0615 EUR2005; name GGBFS_price_EUR2005
    2005 import and export prices (total trades (USD) divided by total weight (kg) in China, India, USA, Japan, Russia and Europe, major producers and consumers (http://www.cementchina.net/freport/showfre.asp?id=749) from UN Commodity Trade Statistics Database (http://data.un.org/Explorer.aspxDatabase [Accessed 2 July 2010]). Commodity: Cement (portland, aluminious, slag or hydraulic)
  property carbon content 0
    carbon content on a dry matter basis (reserved; not for manual entry)
  property true value 2.87141e-9
    allocation property applied in "true value" allocation // value calculated from revenue
  properties: wet mass 1 kg, dry mass 1 kg, carbon allocation 0 kg
- granulated blast furnace slag: 0 kg; By-product classification allocatable product
  production volume 50.9303 kg
  property wet mass 1 kg; name GBFS_WM
  property dry mass 1 kg; name GBFS_DM
  property price 0.0615 EUR2005; name GBFS_price_EUR2005
    (same comment as for ground granulated blast furnace slag)
  property water in wet mass 0 kg; name GBFS_WWM
  property carbon content, non-fossil 0; name GBFS_C_content_non_fossil
    biogene carbon content on a dry matter basis
  property carbon content, fossil 0; name GBFS_C_content_fossil
    fossil carbon content on a dry matter basis
  property water content 0; name GBFS_water_content
  property carbon content 0
    carbon content on a dry matter basis (reserved; not for manual entry)
  property true value 1.18873e-8
    allocation property applied in "true value" allocation // value calculated from revenue
  properties: carbon allocation 0 kg
- aluminium alloy, metal matrix composite: 0 kg; CPC 41431: Unwrought aluminium; By-product classification allocatable product
  reference flow
  production volume 86.8515 kg
  property water content 0; name Al_MMC_water_content
  property carbon content, non-fossil 0; name Al_MMC_C_content_non_fossil
    biogene carbon content on a dry matter basis
  property price 6.2 EUR2005; name ref_price_EUR2005
    (same comment as for aluminium alloy, AlLi)
  property carbon content, fossil 0.0475; name Al_MMC_C_content_fossil
    fossil carbon content on a dry matter basis
  property dry mass 1 kg; name Al_MMC_DM
  property water in wet mass 0 kg; name Al_MMC_WWM
  property wet mass 1 kg; name Al_MMC_WM
  property carbon content 0.0475
    carbon content on a dry matter basis (reserved; not for manual entry)
  property true value 2.04363e-6
    allocation property applied in "true value" allocation // value calculated from revenue
  properties: carbon allocation 0.0475 kg
- aluminium, primary, cast alloy slab from continuous casting: 0 kg; CPC 41431: Unwrought aluminium; By-product classification allocatable product
  reference flow
  production volume 5565.59 kg
  property price 3.67 EUR2005; name ref_price_EUR2005
    Estimated to be the same as in case of aluminium, primary, liquid.
  property carbon content 0
    carbon content on a dry matter basis (reserved; not for manual entry)
  property true value 7.75193e-5
    allocation property applied in "true value" allocation // value calculated from revenue
  properties: wet mass 1 kg, carbon content, fossil 0, water content 0, carbon content, non-fossil 0, water in wet mass 0 kg, dry mass 1 kg, carbon allocation 0 kg
- aluminium, cast alloy: 0 kg; source European Aluminium Association 2008; By-product classification allocatable product; CPC 41431: Unwrought aluminium; pedigree (1,1,1,1,1)
  EcoSpold01Location=RER
  production volume 277263 kg
  property price 1.3 EUR2005; name castAlloyAmount_price_EUR2005
    Temporary price data. Calculated as 90% of purchasers price based on: Source: London Metal Exchange, Aluminium alloy price for 2005
  property carbon content 0
    carbon content on a dry matter basis (reserved; not for manual entry)
  property true value 0.00136794
    allocation property applied in "true value" allocation // value calculated from revenue
  properties: dry mass 1 kg, carbon content, non-fossil 0, wet mass 1 kg, carbon content, fossil 0, water content 0, water in wet mass 0 kg, carbon allocation 0 kg
- aluminium oxide, non-metallurgical: 0 kg; source European Aluminium Association 2008; CPC 41432: Alumina (aluminium oxide), except artificial corundum; By-product classification allocatable product; CAS 1344-28-1; pedigree (1,1,1,1,1)
  production volume 29660.8 kg
  property water in wet mass 0 kg; name WWM
  property wet mass 1 kg; name WM
  property carbon content, fossil 0; name C_content_fossil
  property dry mass 1 kg; name DM
  property water content 0; name water_content
  property carbon content, non-fossil 0; name C_content_non_fossil
  property price 0.28 EUR2005; name Al2O3Amount_price_EUR2005
    (same comment as for sulfur dioxide, liquid)
  property carbon content 0
    carbon content on a dry matter basis (reserved; not for manual entry)
  property true value 3.15191e-5
    allocation property applied in "true value" allocation // value calculated from revenue
  properties: carbon allocation 0 kg
- aluminium, wrought alloy: 0 kg; source European Aluminium Association 2008; By-product classification allocatable product; CPC 4153: Semi-finished products of aluminium or aluminium alloys; pedigree (1,1,1,1,1)
  production volume 272032 kg
  property price 1.44 EUR2005; name secondaryAluminiumOutput_price_EUR2005
  properties: water content 0, carbon content, fossil 0, water in wet mass 0 kg, wet mass 1 kg, carbon content, non-fossil 0, dry mass 1 kg, carbon content 0, carbon allocation 0 kg, true value 0.00148667
- graphic paper, 100% recycled: 0 kg; CPC 32129: Other uncoated paper and paperboard, of a kind used for writing, printing or other graphic purposes, and punch[…]; By-product classification allocatable product
  production volume 7796.7 kg
  property price 0.0976 EUR2005; name paper_price_EUR2005
    Export prices for the World+ according to: http://faostat.fao.org/site/626/DesktopDefault.aspx?PageID=626#ancor downloaded 27 April 2009; calculated as export value divided by export volume.
  property carbon content 0.43299
    carbon content on a dry matter basis (reserved; not for manual entry)
  property true value 2.88798e-6
    allocation property applied in "true value" allocation // value calculated from revenue
  properties: water content 0.0582011, dry mass 0.945 kg, carbon content, non-fossil 0.43296, carbon content, fossil 3e-5, wet mass 1 kg, water in wet mass 0.055 kg, carbon allocation 0.409176 kg
- deinked pulp, wet lap: 0 kg; CPC 321: Pulp, paper and paperboard; By-product classification allocatable product; pedigree (1,1,1,1,1)
  Wet lap (40% water on a wet mass basis). Initial values of this dataset were given for the production of 1 ton of wet lap pulp scaled to 10% water on a wet mass basis.
  Amount was scaled to the amount of reference product.
  production volume 10549.5 kg
  property water content 0.666667; name Pulp_water_content; = Pulp_WWM / Pulp_DM
  property water in wet mass 0.4 kg; name Pulp_WWM
  property carbon content, fossil 0; name Pulp_C_content_fossil
    fossil carbon content on a dry matter basis
  property wet mass 1 kg; name Pulp_WM
  property price 0.178 EUR2005; name Pulp_price_EUR2005
    Estimated value. It is estimated, that the price of the deinked pulp is 50% of the sulfate pulp.
  property dry mass 0.6 kg; name Pulp_DM; = Pulp_WM - Pulp_WWM
  property carbon content, non-fossil 0.494; name Pulp_C_content_non_fossil
    Biogenic carbon content of dry mass is 0.494 kgC/kg dry wood (ecoinvent v2.2 report 6_IX & ecoinvent v2.2 report 9). No other C containing products in the formulation of the pulp assumed.
  property carbon content 0.494
    carbon content on a dry matter basis (reserved; not for manual entry)
  property true value 7.12662e-6
    allocation property applied in "true value" allocation // value calculated from revenue
  properties: carbon allocation 0.2964 kg
- potassium fertiliser, as K2O: 0 kg; source CRAAQ 2010; CPC 3463: Mineral or chemical fertilizers, potassic; By-product classification allocatable product; pedigree (1,1,1,1,1)
  This is the potassium (as K2O) output (organic and mineral forms of potassium contained) from organic origin. In practice, only a part of this total amount is available to the plants and the available amount has to be calculated considering efficiency of organic potassium (to replace mineral potassium ), which also depends on many factors, such as climate, soil, crop, timing and technique of application, etc. Since this dataset includes field emissions from the application of sludge, potassium availability has been accounted for in the calculation of direct field emissions.
  Uncertainty: The uncertainty of calculated values is determined from propagation of uncertainty factors of underlying variables.
  production volume 4.10682 kg
  property price 0.188 EUR2005; name K2O_fertiliser_price_EUR2005
    Temporary price data. Calculated as 90% of purchasers price based on: 2004 import price calulated from FAOSTAT (http://faostat.fao.org/site/575/DesktopDefault.aspx?PageID=575#ancor [accessed 2011.01.27] Potash Fertilizers (K20 total nutrients) in kUSD/Mg
  property carbon content 0
    carbon content on a dry matter basis (reserved; not for manual entry)
  property true value 2.93019e-9
    allocation property applied in "true value" allocation // value calculated from revenue
  properties: carbon content, fossil 0, dry mass 1 kg, water in wet mass 0 kg, water content 0, wet mass 1 kg, carbon content, non-fossil 0, carbon allocation 0 kg
- nitrogen fertiliser, as N: 0 kg; source CRAAQ 2010; CPC 3461: Mineral or chemical fertilizers, nitrogenous; By-product classification allocatable product; pedigree (1,1,1,1,1)
  This is the total nitrogen (as N) output (organic and mineral forms of nitrogen contained) from organic origin. In practice, only a part of this total amount is available to the plants and the available amount has to be calculated considering nitrogen efficiency (to replace mineral nitrogen), which also depends on many factors, such as climate, soil, crop, timing and technique of application, etc. Since this dataset includes field emissions from the application of sludge, nitrogen availability has been accounted for in the calculation of direct field emissions.
  Uncertainty: The uncertainty of calculated values is determined from propagation of uncertainty factors of underlying variables.
  production volume 25.3987 kg
  property price 0.473 EUR2005; name N_fertiliser_price_EUR2005
    Temporary price data. Calculated as 90% of purchasers price based on: 2004 prices are calculated on basis of Import/Export data (tonnes and US$) from UN Trade Statistics Database (http://data.un.org/Browse.aspx?d=ComTrade, accessed 7/7-2010). N, P2O5, or K2O content (http://www.fertilizer.org/ifa/Home-Page/STATISTICS/Conversions-factors)
  property carbon content 0
    carbon content on a dry matter basis (reserved; not for manual entry)
  property true value 4.55937e-8
    allocation property applied in "true value" allocation // value calculated from revenue
  properties: water content 0, wet mass 1 kg, dry mass 1 kg, carbon content, non-fossil 0, water in wet mass 0 kg, carbon content, fossil 0, carbon allocation 0 kg
- phosphate fertiliser, as P2O5: 0 kg; source CRAAQ 2010; CPC 3462: Mineral or chemical fertilizers, phosphatic; By-product classification allocatable product; pedigree (1,1,1,1,1)
  This is the total phosphate (as P2O5) output (organic and mineral forms of phosphate contained) from organic origin. In practice, only a part of this total amount is available to the plants and the available amount has to be calculated considering efficiency of organic phosphate (to replace mineral phosphate), which also depends on many factors, such as climate, soil, crop, timing and technique of application, etc. Since this dataset includes field emissions from the application of sludge, phosphate availability has been accounted for in the calculation of direct field emissions.
  Uncertainty: The uncertainty of calculated values is determined from propagation of uncertainty factors of underlying variables.
  production volume 17.0001 kg
  property price 0.241 EUR2005; name P2O5_fertiliser_price_EUR2005
    (same comment as for nitrogen fertiliser, as N)
  property carbon content 0
    carbon content on a dry matter basis (reserved; not for manual entry)
  property true value 1.5549e-8
    allocation property applied in "true value" allocation // value calculated from revenue
  properties: dry mass 1 kg, water content 0, carbon content, fossil 0, wet mass 1 kg, carbon content, non-fossil 0, water in wet mass 0 kg, carbon allocation 0 kg
- soil pH raising agent, as CaCO3: 0 kg; source Marianne Lemieux 2013; CPC 34659: Fertilizers n.e.c.; By-product classification allocatable product; pedigree (1,1,1,1,1)
  Calculated value of the amount of CaCO3 that can be substituted considered the liming efficiency of the sludge.
  Uncertainty: The uncertainty of calculated values is determined from propagation of uncertainty factors of underlying variables.
  production volume 473.486 kg
  property carbon content, fossil 0.12; name soil_pH_raising_agent_C_content_fossil_0; = 12/(40+12+3*16)
    Stoichiometric calculation. Fossil carbon content on a dry matter basis.
  property carbon content, non-fossil 0; name soil_pH_raising_a_C_content_non_fossil_0
    biogene carbon content on a dry matter basis
  property price 0.117 EUR2005; name soil_pH_raising_agent_as_CaCO3_price_EUR
    The price is estimated to be the same as for lime.
  property carbon content 0.12
    carbon content on a dry matter basis (reserved; not for manual entry)
  property true value 2.10245e-7
    allocation property applied in "true value" allocation // value calculated from revenue
  properties: wet mass 1 kg, water in wet mass 0 kg, water content 0, dry mass 1 kg, carbon allocation 0.12 kg
- fibre cement roof slate: 0 kg; CPC 37540: Tiles, flagstones, bricks and similar articles, of cement, concrete or artificial stone; By-product classification allocatable product
  EcoSpold01Location=CH
  production volume 7.02825e-7 kg
  property carbon content, non-fossil 0.01288
    Tab 5.1, ecoinvent v2.2 report 7, part IX. Fibres (pulp) 2.8%. Fibres (polyvinyl alcohol) 2.6%. C-content/dry mass of natural fibres was considered 46% (from "Evolutionary and Biochemical Aspects", A.D. Kay and T. Vrede (in Global Ecology, 2010, Elsevier B.V., S.E. Jørgensen Ed.)). C-content/dry mass of polyvinyl alcohol ((C2H4O)x) was considered =24/44.
  property carbon content, fossil 0.0141818
    Tab 5.1, ecoinvent v2.2 report 7, part IX. Fibres (pulp) 2.5%. Fibres (polyvinyl alcohol) 3.7%. C-content/dry mass of natural fibres was considered 46% (from "Evolutionary and Biochemical Aspects", A.D. Kay and T. Vrede (in Global Ecology, 2010, Elsevier B.V., S.E. Jørgensen Ed.)). C-content/dry mass of polyvinyl alcohol ((C2H4O)x) was considered =24/44.
  property carbon content 0.0270618
    carbon content on a dry matter basis (reserved; not for manual entry)
  property true value 4.72121e-15
    allocation property applied in "true value" allocation // value calculated from revenue
  properties: water content 0, water in wet mass 0 kg, wet mass 1 kg, price 1.77 EUR2005, dry mass 1 kg, carbon allocation 0.0270618 kg
- cellulose fibre, inclusive blowing in: 0 kg; CPC 32113: Mechanical wood pulp; semi-chemical wood pulp; pulps of fibrous cellulosic material other than wood; By-product classification allocatable product
  This cellulose fibre is intended for use as a thermal insulation material in buildings. It is made out of waste paper and for this application, the fibres are blown into cavities, e.g. between two planks of a wall. Cellulose fibre in this type of application has a density of 50 kg/m3 and a thermal conductivity of 0.04 W/mK when applied. Cellulose fibres are treated with borax and boric acid to enhance fire retarding properties.
  References:
  Kellenberger D., Althaus H.-J., Jungbluth N. and Künniger T. (2007) Life Cycle Inventories of Building Products. Final report ecoinvent data v2.0 No. 7. Swiss Centre for Life Cycle Inventories, Dübendorf, CH.
  Richter et al. (1996) Ökologische Bewertung von Wärmeschutzgläsern, Integraler Vergleich verschiedener Verglasungsvarianten. Forschungsprogramm 'Rationelle Energienutzung in Gebäuden', EMPA, Abteilung Holz. Auftrag Bundesamt für Energiewirtschaft.
  production volume 7.01703e-7 kg
  property carbon content, non-fossil 0.46
    C-content/dry mass of fibres was considered to be 46% ('Evolutionary and Biochemical Aspects', A.D. Kay and T. Vrede (in Global Ecology, 2010, Elsevier B.V., S.E. Jørgensen Ed.))
  property price 0.76 EUR2005
    The production volume of this product is small compared to other products supplied by the activities within the same ISIC 3 category. Therefore, an average price of products supplied by the activities in the same ISIC 3 code has been applied.This price is obtained as '_35 Paper and paper products, EU27' in the 'EU & DK Input Output Database' (available in SimaPro). The price is assumed to be valid for both RER2003, RER 2004, world 2003 and world 2004.
  property carbon content 0.46
    carbon content on a dry matter basis (reserved; not for manual entry)
  property true value 2.02395e-15
    allocation property applied in "true value" allocation // value calculated from revenue
  properties: water in wet mass 0 kg, wet mass 1 kg, carbon content, fossil 0, dry mass 1 kg, water content 0, carbon allocation 0.46 kg
- iron scrap, sorted, pressed: 0 kg; By-product classification Recyclable; CPC 39310: Slag, dross, scalings and other waste from the manufacture of iron or steel; pedigree (1,1,1,1,1)
  metallic iron scrap removed from ash reamains and recycled.
  Uncertainty: uncertainty is calculated from uncertainties in waste composition and transfer coefficients to soild residues
  production volume 0.873333 kg
  property price 0.175 EUR2005
    Temporary price data. Calculated as 90% of purchasers price based on: 2005 import and export prices (total trades (USD) divided by total weight (kg) in biggest economies of the world: EU27, USA, Brasil, China, India, Japan and Russia) from UN Commodity Trade Statistics Database (http://data.un.org/Explorer.aspxDatabase [Accessed 2011.06.20]). Commodity: Waste or scrap, of cast iron
  property carbon content 0
    carbon content on a dry matter basis (reserved; not for manual entry)
  property true value 5.8003e-10
    allocation property applied in "true value" allocation // value calculated from revenue
  properties: carbon content, non-fossil 0, wet mass 1 kg, dry mass 1 kg, water content 0, carbon content, fossil 0, water in wet mass 0 kg, carbon allocation 0 kg
- core board: 0 kg; CPC 321: Pulp, paper and paperboard; By-product classification allocatable product
  EcoSpold01Location=RER
  production volume 2.26412e-6 kg
  property carbon content, non-fossil 0.430314
    Biogenic C content was calculated after biogenic C contents of chemicals used in the production of board (ecoinvent v2.2 report 11_III, part 13). The cellulose content in 1 kg of paper (on a wet mas basis) was estimated as (1-chemical content), C content of cellulose was considered 0.44 kgC/kg dry mass (ecoinvent v2.2 report, n 15a, pg 40)
  property price 0.598 EUR2005
    Export prices for the World+ according to: http://faostat.fao.org/site/626/DesktopDefault.aspx?PageID=626#ancor downloaded 28 April 2009; calculated as export value divided by export volume.
  property carbon content, fossil 0
    Fossil C content was calculated after fossil C contents of chemicals used in the production of board (ecoinvent v2.2 report 11_III, part 13).
  property carbon content 0.430314
    carbon content on a dry matter basis (reserved; not for manual entry)
  property true value 5.13846e-15
    allocation property applied in "true value" allocation // value calculated from revenue
  properties: dry mass 0.945 kg, water in wet mass 0.055 kg, wet mass 1 kg, water content 0.0582011, carbon allocation 0.406646 kg
- residual wood, dry: 0 m3; CPC 39283: Non-agglomerated wood waste and scrap; By-product classification allocatable product; pedigree (1,1,1,1,1)
  Emission factor from DS on heat generation from industrial residual wood mulitplied by the input of wood fuel (direct wood fuel plus production residues)
  production volume 0.182934 m3
  property price 26.9 EUR2005; name w_chips_price_EUR2005
    Temporary price data. Calculated as 90% of purchasers price based on: 2004 prices for World Import/Export (USD/cubicmeter) from FaoStat (http://faostat.fao.org/site/626/default.aspx#ancor, [accessed 10th June 2010]) Commodity: 'Chips and Particles' assuming this is for air-dry chips (10% water on a dry matter basis at 650 kg/m3) and no price difference for water content (i.e. assuming air-drying).
  property carbon content 0.494
    carbon content on a dry matter basis (reserved; not for manual entry)
  property true value 1.86758e-8
    allocation property applied in "true value" allocation // value calculated from revenue
  properties: wet mass 632.5 kg, carbon content, fossil 0, dry mass 550 kg, carbon content, non-fossil 0.494, water content 0.15, water in wet mass 82.5 kg, carbon allocation 271.7 kg
- bark chips, wet, measured as dry mass: 0 kg; By-product classification allocatable product; CPC 31230: Wood in chips or particles; pedigree (1,1,1,1,1)
  bark from debarking of logs, not used energetically
  production volume 8.54932 kg
  property price 0.034 EUR2005; name w_bark_price_EUR2005
    Expert judgement (Urs Luginbühl, Swiss Sawmilling industry, personal communication in June 2014). Cross-reference; FAOSTAT database; http://faostat.fao.org/site/626/DesktopDefault.aspx?PageID=626#ancor; Average import/export prices of EU for 'chips and particles'. Price: 48.76 Euro/m3. The density of the wood chips is 650 kg/m3. The price is calculated to be 0.075 EUR/kg.
  property carbon content 0.494
    carbon content on a dry matter basis (reserved; not for manual entry)
  property true value 1.10317e-9
    allocation property applied in "true value" allocation // value calculated from revenue
  properties: carbon content, fossil 0, dry mass 1 kg, carbon content, non-fossil 0.494, wet mass 2.4 kg, water in wet mass 1.4 kg, water content 1.4, carbon allocation 0.494 kg
- fibreboard, soft: 0 m3; CPC 31449: Other fibreboard; By-product classification allocatable product
  production volume 5.34332 m3
  property dry mass 150.62 kg; name DM_FB; = WM_FB - WiWM_FB
  property price 148 EUR2005
    (same comment as for core board)
  property water in wet mass 8.38 kg; name WiWM_FB
  property wet mass 159 kg; name WM_FB
  property carbon content, non-fossil 0.461793; = 140.8*0.494/DM_FB
    wood content converted to carbon, divided by dry mass
  property water content 0.0556367; = WiWM_FB/DM_FB
  property carbon content 0.475101
    carbon content on a dry matter basis (reserved; not for manual entry)
  property true value 3.00128e-6
    allocation property applied in "true value" allocation // value calculated from revenue
  properties: carbon content, fossil 0.0133086, carbon allocation 71.5597 kg
- biogas: 0 m3; source Raboni, Massimo 2014; By-product classification allocatable product; CPC 17200: Coal gas, water gas, producer gas and similar gases, other than petroleum gases and other gaseous hydrocarbons; pedigree (1,1,1,1,1)
  An average yield of 100 litres of biogas per kg biowaste is assumed
  production volume 0.0122137 m3
  property price 0.109 EUR2005; name biogas_yield_price_EUR2005
    Temporary price data. Calculated as 90% of purchasers price based on: Same prices per energy output as natural gas, based on the proportional lower heating value (2/3 that of natural gas)
  property carbon content, non-fossil 0.449939
    Total C content in kg/Nm3 (Tab 12.8, ecoinvent v2.2 report n17), referred to 1kg DM
  property carbon content 0.449939
    carbon content on a dry matter basis (reserved; not for manual entry)
  property true value 5.05252e-12
    allocation property applied in "true value" allocation // value calculated from revenue
  properties: water in wet mass 0 kg, wet mass 1.15 kg, carbon content, fossil 0, lower heating value 0 MJ/Nm3, water content 0, dry mass 1.15 kg, carbon allocation 0.51743 kg
- compost: 0 kg; CPC 391: Wastes from food and tobacco industry; By-product classification allocatable product; pedigree (1,1,1,1,1)
  EcoSpold01Location=CH
  Biowaste is reduced in mass by a factor of 2 during composting
  production volume 0.1556 kg
  property water in wet mass 0.472 kg; name Water_in_wet_mass_compost; = 1- DM_compost
  property price 0.03 EUR2005
    Temporary price data. Calculated as 90% of purchasers price based on: Estimation done using the following sources: <http://www.wmaa.asn.au/uploads/documents/MarkWinser_1May2007.pdf>; <http://www.swlf.ait.ac.th/UpdData/International/Composting%20and%20anaerobic%20digestion_%20comparions%20for%20Europe%20and%20Asia.pdf>; <http://www.epa.gov/osw/conserve/rrr/composting/basic.htm>, accessed 2011.06.16
  property carbon content, non-fossil 0.1165
    calculation: dry matter 50%, organic matter 40% of dry matter, C content calculated from organic matter divided by 1.72. Relative to dry matter; relative to fresh matter: divided by 2 => 0.1156
  property dry mass 0.528 kg; name DM_compost
  property water content 0.893939; name Water_content_compost; = Water_in_wet_mass_compost/DM_compost
  property concentration, cadmium 0 kg/kg; name Mass_compost_concentration_Cd; = Mass_biowaste_concentration_Cd*2
    Biowaste mass is reduced by a factor of two during composting, therefore concentration is doubled
  property humus equivalent 0.061 kg
    Humus building fraction expressed in kg per kg product on a FM basis. Humus denotes the converted, primary biomass from plants or animals in the ground. More information can be found in the documentation of the composting itself: "treatment of biowaste, industrial composting".
  property concentration, copper 0 kg/kg; name Mass_compost_concentration_Cu; = Mass_biowaste_concentration_Cu*2
    (same comment as for compost)
  property concentration, calcium 0 kg/kg; name Mass_compost_Ca_concentration; = Mass_biowaste_concentration_Ca*2
    (same comment as for compost)
  property concentration, magnesium 0 kg/kg; name Mass_compost_Mg_concentration; = Mass_biowaste_concentration_Mg*2
    (same comment as for compost)
  property concentration, mercury 0 kg/kg; name Mass_compost_Hg_concentration; = Mass_biowaste_concentration_Hg*2
    (same comment as for compost)
  property concentration, lead 0 kg/kg; name Mass_compost_concentration_Pb; = Mass_biowaste_concentration_Pb*2
    (same comment as for compost)
  property concentration, nickel 0 kg/kg; name Mass_compost_Ni_concentration; = Mass_biowaste_concentration_Ni*2
    (same comment as for compost)
  property concentration, phosphorus 0 kg/kg; name Mass_compost_P_concentration; = Mass_biowaste_concentration_P*2
    (same comment as for compost)
  property concentration, sulfur 0 kg/kg; name Mass_compost_concentration_S; = Mass_biowaste_concentration_S*2
    (same comment as for compost)
  property concentration, potassium 0 kg/kg; name Mass_compost_K_concentration; = Mass_biowaste_concentration_K*2
    (same comment as for compost)
  property nickel content 1.60606e-5; name Mass_compost_Ni_content; = Mass_biowaste_Ni_content/0.5*( DM_biowaste / DM_compost)
    nickel content on a dry matter basis
  property concentration, nitrogen 0 kg/kg; = Mass_biowaste_concentration_N*2
    (same comment as for compost)
  property concentration, zinc 0 kg/kg; name Mass_compost_concentration_Zn; = Mass_biowaste_concentration_Zn*2
    (same comment as for compost)
  property lead content 2.66667e-5; name Mass_compost_Pb_content; = Mass_biowaste_Pb_content/0.5*( DM_biowaste / DM_compost)
    lead content on a dry matter basis
  property copper content 3.81818e-5; name Mass_compost_Cu_content; = Mass_biowaste_Cu_content/0.5*( DM_biowaste / DM_compost)
    copper content on a dry matter basis
  property cadmium content 2.89394e-7; name Mass_compost_Cd_content; = Mass_biowaste_Cd_content/0.5*( DM_biowaste / DM_compost)
    cadmium content on a dry matter basis
  property nitrogen content 0.0136364; name Mass_compost_N_content; = Mass_biowaste_N_content/0.5*( DM_biowaste / DM_compost)
    nitrogen content on a dry matter basis
  property magnesium content 0.00525758; name Mass_compost_Mg_content; = Mass_biowaste_Mg_content/0.5*( DM_biowaste / DM_compost)
    magnesium content on a dry matter basis
  property zinc content 0.000120303; name Mass_compost_Zn_content; = Mass_biowaste_Zn_content/0.5*( DM_biowaste / DM_compost)
    zinc content on a dry matter basis
  property potassium content 0.0099697; name Mass_compost_K_content; = Mass_biowaste_K_content/0.5*( DM_biowaste / DM_compost)
    potassium content on a dry matter basis
  property sulfur content 0.00190909; name Mass_compost_S_content; = Mass_biowaste_S_content/0.5*( DM_biowaste / DM_compost)
    sulfur content on a dry matter basis
  property calcium content 0.0504545; name Mass_compost_Ca_content; = Mass_biowaste_Ca_content/0.5*( DM_biowaste / DM_compost)
    calcium content on a dry matter basis
  property mercury content 1e-7; name Mass_compost_Hg_content; = Mass_biowaste_Hg_content/0.5*( DM_biowaste / DM_compost)
    mercury content on a dry matter basis
  property phosphorus content 0.00275758; name Mass_compost_P_content; = Mass_biowaste_P_content/0.5*( DM_biowaste / DM_compost)
    phosphorus content on a dry matter basis
  property carbon content 0.1165
    carbon content on a dry matter basis (reserved; not for manual entry)
  property true value 1.77159e-11
    allocation property applied in "true value" allocation // value calculated from revenue
  properties: carbon content, fossil 0, wet mass 1 kg, carbon allocation 0.061512 kg
- gypsum fibreboard: 0 kg; CPC 37530: Articles of plaster or of compositions based on plaster; By-product classification allocatable product
  EcoSpold01Location=CH
  production volume 2.26412e-6 kg
  property price 1.77 EUR2005
    Calculated by 2.o-The production volume of this product is small compared to other products supplied by the activities within the same ISIC 3 category. Therefore, an average price of products supplied by the activities in the same ISIC 3 code has been applied.This price is obtained as '_45 Glass, mineral wool and ceramic goods, virgin, EU27' in the 'EU & DK Input Output Database' (available in SimaPro). The price is assumed to be valid for both RER2003, RER 2004, world 2003 and world 2004.
  property carbon content, fossil 0
    Gypsum (CaSO4-2H2O) with 15-20% cellulose fibres (ecoinvent v2.2 report 7, part VIII, pg 5). C-content/dry mass of natural fibres was considered 46% (from "Evolutionary and Biochemical Aspects", A.D. Kay and T. Vrede (in Global Ecology, 2010, Elsevier B.V., S.E. Jørgensen Ed.))
  property carbon content, non-fossil 0.0805
    (same comment as for gypsum fibreboard)
  property carbon content 0.0805
    carbon content on a dry matter basis (reserved; not for manual entry)
  property true value 1.52092e-14
    allocation property applied in "true value" allocation // value calculated from revenue
  properties: water content 0, water in wet mass 0 kg, dry mass 1 kg, wet mass 1 kg, carbon allocation 0.0805 kg
- tissue paper: 0 kg; By-product classification allocatable product; CPC 321: Pulp, paper and paperboard
  EcoSpold01Location=RER
  production volume 5943.32 kg
  property carbon content, non-fossil 0.36169
    Biogenic C content was calculated after biogenic C contents of chemicals used in the production of the paper (in Tab 8.86 ecoinvent v2.2 report 11_III, part 8). The cellulose content in 1 kg of paper (on a wet mas basis) was estimated as (1-chemical content), C content of cellulose was considered 0.44 kgC/kg dry mass (ecoinvent v2.2 report, n 15a, pg 40)
  property price 1.34 EUR2005
    Calculated based on literature values. The price of 1 kg of tissue paper is calculated to be 1.34 euro/kg. This price is calculated as a weighted average of prices calculated based on import (net trade) of this material from the world into 5 big economies; EU, Japan, China, India, USA. The net weight and the trade value is obtained from the UN Comtrade database (average of commodity no. 730830 Doors, windows, frames of iron or steel and commodity no. 481820 Paper hankerchiefs, cleansing, facial tissues, towel), year 2005.
  property carbon content, fossil 2.22e-5
    Fossil C content was calculated after fossil C contents of chemicals used in the production of the paper (in Tab 8.86 ecoinvent v2.2 report 11_III, part 8).
  property carbon content 0.361712
    carbon content on a dry matter basis (reserved; not for manual entry)
  property true value 3.0225e-5
    allocation property applied in "true value" allocation // value calculated from revenue
  properties: dry mass 0.945 kg, wet mass 1 kg, water in wet mass 0.055 kg, water content 0.0582011, carbon allocation 0.341818 kg

## Inputs from technosphere
- copper sulfate: 0.000210358 kg; lognormal variance with pedigree 0.0026, pedigree (1,1,3,1,1)
  Measured value.
  properties: dry mass 1 kg, wet mass 1 kg
- foaming agent: 3.03393e-5 kg; = input_foamingAgent*density_foaming_agent; lognormal variance with pedigree 0.002, pedigree (1,1,3,1,1)
  Measured value. Reported in litres as foaming agent (saponin).
  Uncertainty: Calculated variable. Uncertainty will be determined from propagation of uncertainty factors of underlying variables. Uncertainty of actual relation between variables not accounted for at this time, although this could be included in a future update.
  property dry mass 0.87 kg; name DM; = WM-WWM
  property wet mass 1 kg; name WM
  property water in wet mass 0.13 kg; name WWM
  property input 2.758e-5 l; name input_foamingAgent
  property density 1.06 kg/l; name density_foaming_agent
  properties: carbon content, non-fossil 0.69224, water content 0.149425
  note on carbon content, non-fossil: "Soap (CnH2n+1 COO Na) is produced by a combined saponification and neutralisation process performed on a blend of oleochemical feedstocks comprised of short chain (C12-14, derived from coconut or palm kernel oil) and long chain (C16-18, from tallow or palm oil) esters.The ratio of short to long fatty acid chains is 20:80 (ecoinvent v2.2 report 12). Short fatty acid has been estimated as C12.5H(2*12.5+1); MW R=176 g/mol. Long fatty acid has been estimated as C16H(2*16+1); MW R=225 g/mol. MW of COONa=67 g/mol." as cited for soap reference product in ecoinvent v3.01 dataset "soap production, GLO 1995".
- quicklime, milled, loose: 0.0488275 kg; lognormal variance with pedigree 0.0026, pedigree (1,1,3,1,1)
  Measured value. Quicklime is hydrated on site.
  properties: water content 0.010101, dry mass 0.99 kg, wet mass 1 kg
- strontium carbonate: 0.00119241 kg; lognormal variance with pedigree 0.0026, pedigree (1,1,3,1,1)
  Measured value.
  properties: wet mass 1 kg, dry mass 1 kg
- copper cake: -0.00946455 kg; name prod_copperCake_kg; lognormal variance with pedigree 0.0026, pedigree (1,1,3,1,1)
  Measured Value. Proxy created to estimate the treatment of the copper cake.
  production volume 2.40305e6 kg; = (prod_copperCake_kg/prod_zinc_kg)*annualProd_zinc
    (same comment as for cadmium sludge from zinc electrolysis)
  property price 3.75 EUR2005; name prod_copperCake_kg_price_EUR2005
  properties: dry mass 1 kg, wet mass 1 kg
- ammonium chloride: 0.000652556 kg; lognormal variance with pedigree 0.0026, pedigree (1,1,3,1,1)
  Measured value.
  properties: dry mass 1 kg, wet mass 1 kg
- sodium silicate, without water, in 37% solution state: 2.61537e-5 kg; = input_silicate*concentration_silicate; lognormal variance with pedigree 0.002, pedigree (1,1,3,1,1)
  Measured value. Reported as 38% solution. Amount as been multiplied by concentration in order to have the active ingredient only.
  Uncertainty: Calculated variable. Uncertainty will be determined from propagation of uncertainty factors of underlying variables. Uncertainty of actual relation between variables not accounted for at this time, although this could be included in a future update.
  property concentration 0.38; name concentration_silicate
  property input_kg 6.632e-5 kg; name input_silicate
  properties: wet mass 1 kg, dry mass 1 kg
- aluminium scrap, new: -0.0022333 kg; name prod_scrapAluminium_kg; lognormal variance with pedigree 0.0026, pedigree (1,1,3,1,1)
  Measured value. Reported as scrap aluminium to recycling.
  production volume 567035 kg; = (prod_scrapAluminium_kg/prod_zinc_kg)*annualProd_zinc
    (same comment as for cadmium sludge from zinc electrolysis)
  property price 0.806 EUR2005; name prod_scrapAluminium_kg_price_EUR2005
  properties: wet mass 1 kg, dry mass 1 kg
- urea, as N: 2.02339e-5 kg; = input_urea*urea_nitrogen; lognormal variance with pedigree 0.002, pedigree (1,1,3,1,1)
  Measured value.
  Uncertainty: Calculated variable. Uncertainty will be determined from propagation of uncertainty factors of underlying variables. Uncertainty of actual relation between variables not accounted for at this time, although this could be included in a future update.
  property nitrogen content 0.467; name urea_nitrogen
  property input_kg 4.175e-5 kg; name input_urea
  properties: dry mass 1 kg, wet mass 1 kg, carbon content, fossil 0.2
- soda ash, dense: 0.0406706 kg; lognormal variance with pedigree 0.0026, pedigree (1,1,3,1,1)
  Measured value. Reported as sodium carbonate. Assumed to be dense soda ash.
  properties: carbon content, fossil 0.113208, wet mass 1 kg, dry mass 1 kg
- aluminium, wrought alloy: 0.00179951 kg; lognormal variance with pedigree 0.0026, pedigree (1,1,3,1,1)
  Measured value. Reported as secondary aluminium and used for alloy production.
  properties: wet mass 1 kg, dry mass 1 kg
- perlite: 9.34313e-5 kg; lognormal variance with pedigree 0.0026, pedigree (1,1,3,1,1)
  Measured value.
  properties: dry mass 1 kg, wet mass 1 kg
- diesel, burned in building machine: 0.0470109 MJ; = fuel_input_diesel_buildingmachine*density_diesel_buildingmachine*1000*Net_heat_value_diesel_buildingmachine; lognormal variance with pedigree 0.002, pedigree (1,1,3,1,1)
  EcoSpold01Location=GLO
  Measured value. Reported in m³.
  Uncertainty: Calculated variable. Uncertainty will be determined from propagation of uncertainty factors of underlying variables. Uncertainty of actual relation between variables not accounted for at this time, although this could be included in a future update.
  property heating value, net 42.8 MJ; name Net_heat_value_diesel_buildingmachine
  property density 0.84 kg/l; name density_diesel_buildingmachine
  property fuel input in physical units, m3 1.26e-6 m3; name fuel_input_diesel_buildingmachine
  note on heating value, net: Net (lower) heating (calorific) value. Value Taken from Table 5.1 of report "Overview and methodology, Data quality guideline for the ecoinvent database version 3" (ecoinvent report No. 1 (v3), 2011)
  note on density: Density value. Value Taken from Table 5.1 of report "Overview and methodology, Data quality guideline for the ecoinvent database version 3" (ecoinvent report No. 1 (v3), 2011)
- lubricating oil: 6.0624e-5 kg; = input_lubricating_oil*density_lubricating_oil+7.18E-6; lognormal variance with pedigree 0.002, pedigree (1,1,3,1,1)
  Measured value. Reported as oil and lubricant in litres.
  7.18E-6 kg is the amount reported in the original source as "gelatin". The lubricating oil is used as a proxy for the gelatin.
  Uncertainty: Calculated variable. Uncertainty will be determined from propagation of uncertainty factors of underlying variables. Uncertainty of actual relation between variables not accounted for at this time, although this could be included in a future update.
  property density 0.9 kg/l; name density_lubricating_oil
  property input 5.693e-5 l; name input_lubricating_oil
  properties: wet mass 1 kg, dry mass 1 kg, carbon content, fossil 0.75
  note on density: Taken directly from http://www.engineeringtoolbox.com/liquids-densities-d_743.html.
  note on carbon content, fossil: Lubricating oil is produced from diesel. C-content/dry mass of fats and oils considered 75%, from: ecoinvent v2.2 report, n 15a, pg 40
- lead: 0.00281965 kg; name lead_anode_input; lognormal variance with pedigree 0.0032, pedigree (2,1,3,1,1)
  Calculated value. Lead for anode production, excluding the amount recovered from restored anodes.
  properties: wet mass 1 kg, dry mass 1 kg
- zinc concentrate: 2.06933 kg; name zinc_concentrate_input; lognormal variance with pedigree 0.008, pedigree (1,1,3,1,1)
  EcoSpold01Location=GLO
  Measured value.
  property concentration, iron 0.08644 kg/kg; name zinc_concentrate_input_concentration_Fe
  property concentration, sulfur 0.324905 kg/kg; name zinc_concentrate_input_concentration_S
  property concentration, cadmium 0.001455 kg/kg; name zinc_concentrate_input_concentration_Cd
  property concentration, zinc 0.53932 kg/kg; name zinc_concentrate_input_concentration_Zn
  property concentration, copper 0.005715 kg/kg; name zinc_concentrate_input_concentration_Cu
  properties: dry mass 1 kg, wet mass 1 kg
- electricity, high voltage: 4.84747 kWh; lognormal variance with pedigree 0.0026, pedigree (1,1,3,1,1)
  Measured value. Reported in kWh at 120 kV. According to following document, high voltage is between 44 kV and 315 kV in Quebec region: http://www.hydroquebec.com/transenergie/fr/commerce/pdf/characteristics-and-target-values-of-voltage.pdf
- retention aid, for paper production: 0.000709738 kg; lognormal variance with pedigree 0.0026, pedigree (1,1,3,1,1)
  Proxy, reported as "flocculants (polyacrilamide)". Measured value.
  properties: carbon content, fossil 0.5, dry mass 1 kg, wet mass 1 kg
- oxygen, liquid: 0.0123394 kg; = input_oxygen*density_oxygen_liquid; lognormal variance with pedigree 0.002, pedigree (1,1,3,1,1)
  EcoSpold01Location=RER
  Measured value. Reported in litres.
  Uncertainty: Calculated variable. Uncertainty will be determined from propagation of uncertainty factors of underlying variables. Uncertainty of actual relation between variables not accounted for at this time, although this could be included in a future update.
  property input 0.01043 l; name input_oxygen
  property density 1.14 kg/l; name density_oxygen_liquid
  properties: wet mass 1 kg, dry mass 1 kg
  note on density: Taken from http://www.engineeringtoolbox.com/liquids-densities-d_743.html.
- diesel, burned in diesel-electric generating set, 10MW: 0.00106036 MJ; = fuel_input_diesel_generatorset*density_diesel_generatorset*1000*Net_heat_value_diesel_generatorset; lognormal variance with pedigree 0.002, pedigree (1,1,3,1,1)
  Measured Value. Reported as in m3. Used in generator.
  Uncertainty: Calculated variable. Uncertainty will be determined from propagation of uncertainty factors of underlying variables. Uncertainty of actual relation between variables not accounted for at this time, although this could be included in a future update.
  property heating value, net 42.8 MJ; name Net_heat_value_diesel_generatorSet
  property fuel input in physical units, m3 2.842e-8 m3; name fuel_input_diesel_generatorSet
  property density 0.84 kg/l; name density_diesel_generatorSet
- copper scrap, sorted, pressed: -0.000236302 kg; name prod_scrapCopper_kg; lognormal variance with pedigree 0.0026, pedigree (1,1,3,1,1)
  Measured value. Reported as scrap copper to recycling.
  production volume 59997.1 kg; = (prod_scrapCopper_kg/prod_zinc_kg)*annualProd_zinc
    (same comment as for cadmium sludge from zinc electrolysis)
  property price 2.84 EUR2005; name prod_scrapCopper_kg_price_EUR2005
  properties: wet mass 1 kg, dry mass 1 kg
- heat, district or industrial, natural gas: 1.50477 MJ; = fuel_input_naturalgas*Net_heat_value_naturalgas/fuel_use_naturalgas; lognormal variance with pedigree 0.002, pedigree (1,1,3,1,1)
  EcoSpold01Location=RER
  Calculated value based on reported fuel input (in m³), the Net Heating Value of the fuel and assumed efficiency (1/Fuel_use).
  Uncertainty: Calculated variable. Uncertainty will be determined from propagation of uncertainty factors of underlying variables. Uncertainty of actual relation between variables not accounted for at this time, although this could be included in a future update.
  property fuel input in physical units, m3 0.0418 m3; name fuel_input_naturalgas
  property Corresponding fuel use 1.04645 MJ; name fuel_use_naturalgas; = (0.98039+1.0417+1.0526+1.1111)/4
  property heating value, net 36.3 MJ; name Net_heat_value_naturalgas
  note on Corresponding fuel use: Lower heating value of the fuel input related to the heat/electricity output. Calculated with corresponding heat production datasets.
- heat, central or small-scale, other than natural gas: 0.00543307 MJ; = fuel_input_LFO_Buildings*density_LFO_buildings*1000*Net_heat_value_LFO_Buildings/fuel_use_LFO_Buildings; lognormal variance with pedigree 0.002, pedigree (1,1,3,1,1)
  Calculated value based on reported fuel input (in m³), the Net Heating Value of the fuel and assumed efficiency (1/Fuel_use).
  Uncertainty: Calculated variable. Uncertainty will be determined from propagation of uncertainty factors of underlying variables. Uncertainty of actual relation between variables not accounted for at this time, although this could be included in a future update.
  property heating value, net 42.6 MJ; name Net_heat_value_LFO_buildings
  property Corresponding fuel use 1 MJ; name fuel_use_LFO_buildings
  property density 0.86 kg/l; name density_LFO_buildings
  property fuel input in physical units, m3 1.429e-7 m3; name fuel_input_LFO_buildings
  note on Corresponding fuel use: Lower heating value of the fuel input related to the heat/electricity output
  note on fuel input in physical units, m3: Measured Value. Fuel input in m³, reported as heating oil no. 2. Used for the heating of the buildings.
- transport, passenger car, large size, petrol, EURO 3: 0.000986929 km; lognormal variance with pedigree 0.2906, pedigree (2,5,5,5,5)
  Calculated value. Reported as liters of petrol used in pickup trucks (1.031E-4 liter/kg). Conversion using : 0,081237 kg/km (taken directly from ecoinvent v3.0 dataset "transport, passenger car, large size, petrol, EURO 3, GLO") and 0.75 kg/l (taken from Table 5.1 of the data quality guideline).
- heat, district or industrial, other than natural gas: 0.00827749 MJ; = fuel_input_propane*density_propane*1000*Net_heat_value_propane/fuel_use_propane; lognormal variance with pedigree 0.002, pedigree (1,1,3,1,1)
  (same comment as for heat, central or small-scale, other than natural gas)
  property Corresponding fuel use 1.05263 MJ; name fuel_use_propane
  property fuel input in physical units, m3 3.509e-7 m3; name fuel_input_propane
  property heating value, net 46.46 MJ; name Net_heat_value_propane
  property density 0.515 kg/l; name density_propane
  note on heating value, net: Net (lower) heating (calorific) value. Taken directly from ecoinvent v3.0 dataset "propane, burned in building machine, GLO 2013".
  note on density: Density for liquid propane (at 15°C), taken from http://www.cfbp.fr/proprietes-des-gpl/caracteristiques-generales-et-physico-chimiques-n305.
- precious metal refinery: 7.87713e-11 unit; = 1/(annualProd_zinc*lifetime_refinery); lognormal variance with pedigree 0.002, pedigree (1,1,3,1,1)
  Proxy. Estimated value. The service life, surface area covered and annual production volume of the actual plant, 50 years, 30 ha and more than 250 000 t respectively, are very different than the values assumed for the precious metal refinery modeled by the dataset, 25 years, 0,5 ha and 243 t respectively.
  Uncertainty: Calculated variable. Uncertainty will be determined from propagation of uncertainty factors of underlying variables. Uncertainty of actual relation between variables not accounted for at this time, although this could be included in a future update.
  property lifetime 50 year; name lifetime_refinery
- heat, district or industrial, other than natural gas: 0.23692 MJ; = fuel_input_LFO_heat*density_LFO_heat*1000*Net_heat_value_LFO_heat/fuel_use_LFO_heat; lognormal variance with pedigree 0.002, pedigree (1,1,3,1,1)
  (same comment as for heat, district or industrial, natural gas)
  property Corresponding fuel use 1.05 MJ; name fuel_use_LFO_heat
  property heating value, net 42.6 MJ; name Net_heat_value_LFO_heat
  property density 0.86 kg/l; name density_LFO_heat
  property fuel input in physical units, m3 6.543e-6 m3; name fuel_input_LFO_heat
  note on Corresponding fuel use: Lower heating value of the fuel input related to the heat/electricity output.Calculated with corresponding heat production datasets.
  note on fuel input in physical units, m3: Measured value. Fuel input in m³, reported as heating oil no.1. Used for the preheating of the roasting furnace.
- municipal solid waste: -0.00365506 kg; name prod_municipalSolidWaste_kg; lognormal variance with pedigree 0.0026, pedigree (1,1,3,1,1)
  Measured value. Reported as household waste.
  production volume 928019 kg; = (prod_municipalSolidWaste_kg/prod_zinc_kg)*annualProd_zinc
    (same comment as for cadmium sludge from zinc electrolysis)
  property price 0 EUR2005; name prod_municipalSolidWaste_kg_price_EUR200
  properties: wet mass 1 kg, dry mass 0.771 kg, carbon content, fossil 0.171549, carbon content, non-fossil 0.261655, water content 0.297017
  note on carbon content, fossil: MSW composition in tab 4.1, ecoinvent v2.2 report 13_I. C content referred to 1 kg DM
- silver: 1.19656e-5 kg; name silver_anode_input; lognormal variance with pedigree 0.0032, pedigree (2,1,3,1,1)
  Calculated value. Silver for anode production, excluding the amount recovered from restored anodes.
  properties: wet mass 1 kg, dry mass 1 kg
- waste mineral oil: -6.69576e-5 kg; name prod_wasteMineralOil_kg; lognormal variance with pedigree 0.0026, pedigree (1,1,3,1,1)
  Measured value. Reported as used oil and grease and sent to an external company. Assumed to be incinerated (expert jugement).
  production volume 17000.5 kg; = (prod_wasteMineralOil_kg/prod_zinc_kg)*annualProd_zinc
    (same comment as for cadmium sludge from zinc electrolysis)
  property price 0 EUR2005; name prod_wasteMineralOil_kg_price_EUR2005
  properties: dry mass 0.9 kg, carbon content, fossil 0.864444, wet mass 1 kg, water content 0.111111
  note on carbon content, fossil: Tab A.6, ecoinvent v2.2 report 13_I. C content has been calculated after data in the tables, and then referred to 1 kg DM
- aluminium, primary, ingot: 0.00231632 kg; lognormal variance with pedigree 0.0026, pedigree (1,1,3,1,1)
  Measured value. Reported as primary aluminium for the cathode sheets.
  properties: wet mass 1 kg, dry mass 1 kg
- sodium hydroxide, without water, in 50% solution state: 0.00058894 kg; = input_hydroxide*concentration_hydroxide; lognormal variance with pedigree 0.002, pedigree (1,1,3,1,1)
  Measured value. Reported as 50% solution. Amount as been divided in half in order to have the active ingredient only.
  Uncertainty: Calculated variable. Uncertainty will be determined from propagation of uncertainty factors of underlying variables. Uncertainty of actual relation between variables not accounted for at this time, although this could be included in a future update.
  property concentration 0.5; name concentration_hydroxide
  property input_kg 0.001135 kg; name input_hydroxide
  properties: dry mass 1 kg, wet mass 1 kg
- waste paper, unsorted: -9.4521e-5 kg; name prod_wastePaper_kg; lognormal variance with pedigree 0.0026, pedigree (1,1,3,1,1)
  Measured value. Reported as cardboard/paper to recycling.
  production volume 23998.9 kg; = (prod_wastePaper_kg/prod_zinc_kg)*annualProd_zinc
    (same comment as for cadmium sludge from zinc electrolysis)
  property price 0.093 EUR2005; name prod_wastePaper_kg_price_EUR2005
- section bar extrusion, aluminium: 0.000125986 kg; = copper_bars_input; lognormal variance with pedigree 0.002, pedigree (1,1,3,1,1)
  Measured value. Proxy for the production of the copper bars (anodes and equipotentials).
  Uncertainty: Calculated variable. Uncertainty will be determined from propagation of uncertainty factors of underlying variables. Uncertainty of actual relation between variables not accounted for at this time, although this could be included in a future update.
- hydrogen peroxide, without water, in 50% solution state: 5.69741e-6 kg; = input_peroxide*concentration_peroxide; lognormal variance with pedigree 0.002, pedigree (1,1,3,1,1)
  Measured value. Reported as 50% solution. Amount as been multiplied by concentration in order to have the active ingredient only.
  Uncertainty: Calculated variable. Uncertainty will be determined from propagation of uncertainty factors of underlying variables. Uncertainty of actual relation between variables not accounted for at this time, although this could be included in a future update.
  property concentration 0.5; name concentration_peroxide
  property input_kg 1.098e-5 kg; name input_peroxide
  properties: wet mass 1 kg, dry mass 1 kg
- waste plastic, mixture: -1.18203e-5 kg; name prod_wastePlastic_kg; lognormal variance with pedigree 0.0026, pedigree (1,1,3,1,1)
  Measured value. Reported as plastics to recycling.
  production volume 3001.17 kg; = (prod_wastePlastic_kg/prod_zinc_kg)*annualProd_zinc
    (same comment as for cadmium sludge from zinc electrolysis)
  property price 0 EUR2005; name prod_wastePlastic_kg_price_EUR2005
  properties: wet mass 1 kg, water content 0.180638, carbon content, fossil 0.747344, dry mass 0.847 kg
- copper: 0.000125986 kg; name copper_bars_input; lognormal variance with pedigree 0.0032, pedigree (2,1,3,1,1)
  Calculated value. Reported as copper bars (anodes and equipotentials). About 75% of amount is for anode production.
  properties: wet mass 1 kg, dry mass 1 kg
- potassium permanganate: 4.68661e-5 kg; lognormal variance with pedigree 0.0026, pedigree (1,1,3,1,1)
  Measured value.
  properties: dry mass 1 kg, wet mass 1 kg
- waste wood, untreated: -4.52887e-5 kg; name prod_wasteWood_kg; lognormal variance with pedigree 0.0026, pedigree (1,1,3,1,1)
  Measured value. Reported as wood to recycling.
  production volume 11498.8 kg; = (prod_wasteWood_kg/prod_zinc_kg)*annualProd_zinc
    (same comment as for cadmium sludge from zinc electrolysis)
  property price 0 EUR2005; name prod_wasteWood_kg_price_EUR2005
  properties: wet mass 1 kg, water content 0.25, carbon content, non-fossil 0.48632, dry mass 0.8 kg
- pyridine: 0.000269823 kg; lognormal variance with pedigree 0.0026, pedigree (1,1,3,1,1)
  Measured value. Reported as cyclic amine (confidential).
  properties: dry mass 1 kg, carbon content, fossil 0.759215, wet mass 1 kg
- sodium dithionite, anhydrous: 0.00106684 kg; lognormal variance with pedigree 0.0026, pedigree (1,1,3,1,1)
  Measured value.
  properties: dry mass 1 kg, wet mass 1 kg
- hydrogen, liquid: 0.00476237 kg; lognormal variance with pedigree 0.0026, pedigree (1,1,3,1,1)
  Reported as gaseous hydrogen in m³.
  The amount of hydrogen liquid in kg obtained by calculating the number of moles with the ideal gas law at SPT and converting this amount with the molar mass of hydrogen (2 g/mol).
  properties: wet mass 1 kg, dry mass 1 kg
- hot rolling, steel: 0.00669112 kg; = lead_anode_input+silver_anode_input+inputRecycledAnode; lognormal variance with pedigree 0.002, pedigree (1,1,3,1,1)
  Measured value. Proxy for anodes production. Includes the amount of new metal and metal in the recycled anodes.
  Uncertainty: Calculated variable. Uncertainty will be determined from propagation of uncertainty factors of underlying variables. Uncertainty of actual relation between variables not accounted for at this time, although this could be included in a future update.
  property input_kg_recycled 0.003719 kg; name inputRecycledAnode
- cement, Portland: 0.0760693 kg; lognormal variance with pedigree 0.0026, pedigree (1,1,3,1,1)
  Measured value. Reported as Portland cement type10.
  properties: wet mass 1 kg, dry mass 1 kg
- waste glass: -1.98942e-6 kg; name prod_wasteGlass_kg; lognormal variance with pedigree 0.0026, pedigree (1,1,3,1,1)
  Measured value. Reported as glass to recycling.
  production volume 505.114 kg; = (prod_wasteGlass_kg/prod_zinc_kg)*annualProd_zinc
    (same comment as for cadmium sludge from zinc electrolysis)
  property price 0 EUR2005; name prod_wasteGlass_kg_price_EUR2005
  properties: wet mass 1 kg, dry mass 1 kg
- sheet rolling, aluminium: 0.00231632 kg; lognormal variance with pedigree 0.0026, pedigree (1,1,3,1,1)
  Measured value. Proxy for the production of aluminium cathode sheets.
- manganese dioxide: 0.00268577 kg; lognormal variance with pedigree 0.0026, pedigree (1,1,3,1,1)
  Measured value.
  properties: dry mass 1 kg, wet mass 1 kg
- sodium sulfide: 0.000372148 kg; lognormal variance with pedigree 0.0026, pedigree (1,1,3,1,1)
  Measured value.
  properties: wet mass 1 kg, dry mass 1 kg
- hazardous waste, for underground deposit: -0.00441887 kg; name prod_hazardousWaste_kg; lognormal variance with pedigree 0.0026, pedigree (1,1,3,1,1)
  Measured value. Process is used to estimate the end of life in a residual material landfill of Hg-Se sludge (45%) and cadmium sludge (55%).
  production volume 1.12195e6 kg; = (prod_hazardousWaste_kg/prod_zinc_kg)*annualProd_zinc
    (same comment as for cadmium sludge from zinc electrolysis)
  property price 0 EUR2005; name prod_hazardousWaste_kg_price_EUR2005
  properties: dry mass 1 kg, wet mass 1 kg, carbon content, fossil 0.554667
  note on carbon content, fossil: Tab A.6, ecoinvent v2.2 report 13_I, average hazardous waste composition was used, and referred to 0% water mass. No waste-specific emission are currently inventoried for underground deposits. Accordingly, no waste composition must be specified. For generic, average waste to underground deposit deposition in a 200 liter steel drum without cement solidification is assumed (ecoinvent v2.2 report 13_I).

## Inputs from nature
- Water, river [natural resource, in water]: 0.221358 m3; name water_river_input; lognormal variance with pedigree 0.0026, pedigree (1,1,3,1,1)
  Measured value. Used as cooling water.
- Occupation, inland waterbody, unspecified [natural resource, land]: 0.00413549 m2*year; = (surfaceSite*lifetime)/(annualProd_zinc*lifetime); lognormal variance with pedigree 0.002, pedigree (1,1,3,1,1)
  Calculated Value. Land use of the different ponds : tailings pond, wastewater treatment sludge pond and Jarofix disposal site.
  Uncertainty: Calculated variable. Uncertainty will be determined from propagation of uncertainty factors of underlying variables. Uncertainty of actual relation between variables not accounted for at this time, although this could be included in a future update.
- Transformation, to inland waterbody, unspecified [natural resource, land]: 4.13549e-5 m2; = surfaceSite/(annualProd_zinc*lifetime); lognormal variance with pedigree 0.002, pedigree (1,1,3,1,1)
  (same comment as for Occupation, inland waterbody, unspecified)
- Transformation, from unspecified [natural resource, land]: 4.13549e-5 m2; = surfaceSite/(annualProd_zinc*lifetime); lognormal variance with pedigree 0.002, pedigree (1,1,3,1,1)
  (same comment as for Occupation, inland waterbody, unspecified)

## Emissions to nature
- Copper, ion [water, surface water]: 7.2354e-7 kg; lognormal variance with pedigree 0.652, pedigree (1,1,3,1,1)
  Measured value.
- Cadmium [air, non-urban air or from high stacks]: 4.80077e-7 kg; lognormal variance with pedigree 0.652, pedigree (1,1,3,1,1)
  Measured value.
- DOC, Dissolved Organic Carbon [water, surface water]: 0.00018926 kg; source Xiao X. 2003; lognormal variance with pedigree 0.12, pedigree (3,5,5,5,3)
  Proxy. Taken directly from the ecoinvent v3.0 datatset "primary zinc production from concentrate, GLO 2003". The uncertainty has been adjusted accordingly
- Dioxins, measured as 2,3,7,8-tetrachlorodibenzo-p-dioxin [air, non-urban air or from high stacks]: 6.69576e-15 kg; lognormal variance with pedigree 0.042, pedigree (1,1,3,1,1)
  Measured value. Reported as Dioxins.
- Arsenic, ion [water, surface water]: 3.25759e-8 kg; lognormal variance with pedigree 0.652, pedigree (1,1,3,1,1)
  Measured value.
- Nitrogen oxides [air, non-urban air or from high stacks]: 0.000165526 kg; lognormal variance with pedigree 0.042, pedigree (1,1,3,1,1)
  Measured value. Reported as NO2.
- Copper [air, non-urban air or from high stacks]: 7.99506e-7 kg; lognormal variance with pedigree 0.652, pedigree (1,1,3,1,1)
  Measured value.
- Sulfur dioxide [air, non-urban air or from high stacks]: 0.0210254 kg; lognormal variance with pedigree 0.0026, pedigree (1,1,3,1,1)
  Measured value.
- Carbon dioxide, fossil [air, non-urban air or from high stacks]: 0.0157535 kg; lognormal variance with pedigree 0.0026, pedigree (1,1,3,1,1)
  Measured value. Emissions from carbonates and concentrate.
- Zinc, ion [water, surface water]: 1.01267e-5 kg; lognormal variance with pedigree 0.652, pedigree (1,1,3,1,1)
  Measured value.
- Carbon monoxide, fossil [air, non-urban air or from high stacks]: 6.10007e-5 kg; lognormal variance with pedigree 0.652, pedigree (1,1,3,1,1)
  Measured value.
- BOD5, Biological Oxygen Demand [water, surface water]: 0.000322677 kg; source Xiao X. 2003; lognormal variance with pedigree 0.12, pedigree (3,5,5,5,3)
  (same comment as for DOC, Dissolved Organic Carbon)
- Sulfuric acid [air, non-urban air or from high stacks]: 0.000215028 kg; lognormal variance with pedigree 0.042, pedigree (1,1,3,1,1)
  Measured value.
- Fluoride [water, surface water]: 3.09258e-5 kg; source Xiao X. 2003; lognormal variance with pedigree 0.108, pedigree (1,5,5,5,3)
  (same comment as for DOC, Dissolved Organic Carbon)
- Selenium [water, surface water]: 1.51308e-6 kg; lognormal variance with pedigree 0.652, pedigree (1,1,3,1,1)
  Measured value.
- Particulates, < 2.5 um [air, non-urban air or from high stacks]: 0.000220736 kg; lognormal variance with pedigree 0.302, pedigree (1,1,3,1,1)
  Measured value.
- Water [air, unspecified]: 0.00309902 m3; name water_to_air; = (water_river_input*fraction_PW_to_air); lognormal variance with pedigree 0.002, pedigree (1,1,3,1,1)
  Calculated value. See Parameters.
  Uncertainty: Calculated variable. Uncertainty will be determined from propagation of uncertainty factors of underlying variables. Uncertainty of actual relation between variables not accounted for at this time, although this could be included in a future update.
- TOC, Total Organic Carbon [water, surface water]: 0.00018926 kg; source Xiao X. 2003; lognormal variance with pedigree 0.12, pedigree (3,5,5,5,3)
  Proxy. Taken directly from the ecoinvent v3.1 datatset "primary zinc production from concentrate, GLO 2003". The uncertainty has been adjusted accordingly
- Water [water, surface water]: 0.218259 m3; name water_to_environment; = water_river_input-water_to_air; lognormal variance with pedigree 0.002, pedigree (1,1,3,1,1)
  Estimation by data provider.
  Uncertainty: Calculated variable. Uncertainty will be determined from propagation of uncertainty factors of underlying variables. Uncertainty of actual relation between variables not accounted for at this time, although this could be included in a future update.
- Particulates, > 2.5 um, and < 10um [air, non-urban air or from high stacks]: 3.3759e-5 kg; lognormal variance with pedigree 0.122, pedigree (1,1,3,1,1)
  Measured value.
- COD, Chemical Oxygen Demand [water, surface water]: 0.000484021 kg; source Xiao X. 2003; lognormal variance with pedigree 0.11, pedigree (3,5,5,5,3)
  (same comment as for DOC, Dissolved Organic Carbon)
- Mercury [water, surface water]: 6.66981e-9 kg; lognormal variance with pedigree 0.652, pedigree (1,1,3,1,1)
  Measured value.
- Zinc [air, non-urban air or from high stacks]: 8.6499e-5 kg; lognormal variance with pedigree 0.652, pedigree (1,1,3,1,1)
  Measured value.
- Mercury [air, non-urban air or from high stacks]: 9.14595e-8 kg; lognormal variance with pedigree 0.652, pedigree (1,1,3,1,1)
  Measured value.
- Cadmium, ion [water, surface water]: 1.43525e-7 kg; lognormal variance with pedigree 0.652, pedigree (1,1,3,1,1)
  Measured value.
- Particulates, > 10 um [air, non-urban air or from high stacks]: 3.2275e-5 kg; lognormal variance with pedigree 0.042, pedigree (1,1,3,1,1)
  Measured value.
- Lead [air, non-urban air or from high stacks]: 7.24889e-7 kg; lognormal variance with pedigree 0.652, pedigree (1,1,3,1,1)
  Measured value.
- Arsenic [air, non-urban air or from high stacks]: 9.4137e-8 kg; lognormal variance with pedigree 0.652, pedigree (1,1,3,1,1)
  Measured value.
- Lead [water, surface water]: 5.91535e-7 kg; lognormal variance with pedigree 0.652, pedigree (1,1,3,1,1)
  Measured value.

## Sampling procedure
Specific data collected with questionnaires

## Extrapolations
none. Data were collected from the only producer in the Québec region.

## Review by Emilia Moreno Ruiz 2015-10-19
aluminium scrap, new input corrected into wrought alloy
