# treatment of used liquid crystal display module, municipal incineration with fly ash extraction

Dataset: EcoSpold 2, unit process
Geography: CH
Time period: 2006-01-01 to 2019-12-31
Technology level: current
Classification: ISIC rev.4 ecoinvent: 3821:Treatment and disposal of non-hazardous waste
Synonyms: Kehrichtverbrennung; municipal waste incineration; Siedlungsabfallverbrennung
Scenario: Business-as-Usual
System model: Allocation at the point of substitution
Share of production covered: 100 %
Generated by: Gabor Doka
Published in: Doka G. 2015
Database: ecoinvent
isCopyrightProtected: true
accessRestrictedTo: 1

## General comment
This dataset represents the activity of waste disposal of liquid crystal display in a municipal solid waste incinerator (MSWI) // Recommended use of this dataset: Only for incineration of LCD modules (mostly glass and inorganics, some electronic components, copper and plastics) generated in the recycling (mechanical treatment) of LCD screens (Liquid Crystal Display screen residue) // Inventoried waste contains 0.87% Plastics from electronic consumer goods; 0.87% Plastics from electronic industrial goods; 82% Glass; 0.87% wiring copper; 0.83% liquid crystals; 0.12% ITO coating; 14.5% electronic goods; . // Waste composition (wet, in ppm): upper heating value 2.835 MJ/kg; lower heating value 2.551 MJ/kg; H2O 40144; O 430500; H 7674.6; C 63365; S 102.58; N 1270.5; P 46.362; B 0.0082045; Cl 1519.4; Br 95.711; F 11.587; I n.a.; Ag 30.387; As 0.1305; Ba 8.0249; Cd 10.593; Co 0.51291; Cr 317.5; Cu 26895; Hg 0.16101; Mn 71.044; Mo 0.56082; Ni 1905; Pb 4347.4; Sb 112.38; Se 0.034097; Sn 2351.8; V 0.01305; Zn 2573.8; Be 0.0081182; Sc n.a.; Sr 1.4369; Ti 77.9; Tl 0.0064946; W n.a.; Si 294410; Fe 5671.6; Ca 61772; Al 900.8; K 965.57; Mg 2.0446; Na 52850; // Share of carbon in waste that is biogenic 0%. // Share of metals in waste not oxidised and bulk-recyclable (exclude very small or thin parts) Iron: 99.52%; Alu: 57.22%; Copper: 99.77%. // Recovery of metal scrap from bottom ash to recycling: 3.1738g iron scrap, 0.131g aluminium scrap, 7.6938g copper scrap. From this waste, the FLUWA process in the technology mix recovers 0.000772kg (DM) of a hydroxide sludge to be recycled in zinc furnaces. // Ultimately one kg of this waste produces 0.9944 kg of bottom ash (can include some washed ash) and 0.006547 kg of residues, which are landfilled (technology mix). Additional solidification of residues with 0.002619 kg of cement.Net energy production: 0.28MJ/kg electric energy and 0.73MJ/kg thermal energy. //

## Included activities start
waste incineration from waste reception gate and delivery into waste bunker at incinerator plant site (without transports to the incinerator)

## Included activities end
Waste-specific short-term emissions to water from leachate. Long-term emissions from landfill to ground water.

## Geography
Specific to the technology mix encountered in Switzerland in 2012.

## Technology
average Swiss MSWI plants in 2010 (grate incinerators) with electrostatic precipitator for fly ash (ESP), wet flue gas scrubber and 25% SNCR , 42.77% SCR-high dust , 32.68% SCR-low dust -DeNOx facilities and 0% without Denox (weighted according to mass of burnt waste, representing Swiss average). Efficiency of iron scrap separation from slag : 58%. Efficiency of non-ferrous scrap separation from slag : 31%. The technology mix for this dataset includes a filter ash treatment (FLUWA) of a share of 46.22%. Gross electric efficiency technology mix 15.84% and Gross thermal efficiency technology mix 28.51%

## Time period
Waste composition as given in literature reference, theoretical data or other source. Transfer coefficients for modern MSWI.

## Reference product
- used liquid crystal display module: 0 kg; By-product classification Waste; CPC 39: Wastes or scraps
  Main reference product of this activity (supply of disposal service).
  production volume 0 kg
    based on corresponding global production volume of MSW fraction in conventional MSWI (wo fly ash extraction) and scaled down to annual Swiss incinerated MSW mass of 3.02 mio. tonnes.
  property price 0 EUR2005
    Waste products are assigned a price of zero as they are assumed to require further treatment.
  property carbon content 0.0660155
    carbon content on a dry matter basis (reserved; not for manual entry)
  properties: cobalt content 5.3436e-7, nickel content 0.0019846, strontium content 1.497e-6, chromium content 0.00033078, mercury content 1.6775e-7, copper content 0.02802, barium content 8.3605e-6, lead content 0.0045292, manganese content 7.4015e-5, beryllium content 8.4577e-9, aluminium content 0.00093847, tin content 0.0024502, titanium content 8.1158e-5, zinc content 0.0026814, iron content 0.0059088, vanadium content 1.3596e-8, selenium content 3.5523e-8, antimony content 0.00011708, potassium content 0.001006, silicon content 0.30672, water content 0.041823, calcium content 0.064356, water in wet mass 0.040144 kg, magnesium content 2.1301e-6, thallium content 6.7662e-9, sulfur content 0.00010687, dry mass 0.959856 kg, sodium content 0.05506, wet mass 1 kg, carbon content, fossil 0.0660155, hydrogen content 0.0079956, nitrogen content 0.0013236, chlorine content 0.001583, fluorine content 1.2072e-5, bromine content 9.9714e-5, oxygen content 0.4485, phosphorus content 4.8301e-5, silver content 3.1658e-5, arsenic content 1.3596e-7, molybdenum content 5.8428e-7, boron content 8.5476e-9, cadmium content 1.1036e-5, carbon allocation 0.0633654 kg
- iron scrap, sorted, pressed: 1 kg; By-product classification Recyclable; CPC 39310: Slag, dross, scalings and other waste from the manufacture of iron or steel; pedigree (1,1,1,1,1)
  Iron scrap recovered from this waste.
  Uncertainty: uncertainty calculated from uncertainty in waste composition, uncertainty of share of recyclable metal, uncertainty of transfer coefficient to bottom ash, uncertainty of the efficiency of scrap removal in MSWI plant.
  production volume 12271 kg

## By-products
- iron scrap, sorted, pressed: 0 kg; By-product classification Recyclable; CPC 39310: Slag, dross, scalings and other waste from the manufacture of iron or steel; pedigree (1,1,1,1,1)
  (same comment as for iron scrap, sorted, pressed)
  production volume 0 kg
    calculated in proportion to reference product waste input to incinerator
  property price 0.175 EUR2005
    Temporary price data. Calculated as 90% of purchasers price based on: 2005 import and export prices (total trades (USD) divided by total weight (kg) in biggest economies of the world: EU27, USA, Brasil, China, India, Japan and Russia) from UN Commodity Trade Statistics Database (http://data.un.org/Explorer.aspxDatabase [Accessed 2011.06.20]). Commodity: Waste or scrap, of cast iron
  property carbon content 0
    carbon content on a dry matter basis (reserved; not for manual entry)
  properties: carbon content, non-fossil 0, water in wet mass 0 kg, water content 0, wet mass 1 kg, dry mass 1 kg, carbon content, fossil 0, carbon allocation 0 kg
- electricity, for reuse in municipal waste incineration only: 0 kWh; name E_el_prod_MSWI; CPC 17100: Electrical energy; By-product classification allocatable product; pedigree (1,1,1,1,1)
  Net electricity generated from this waste and used in internal MSWI plant energy redistribution.
  Uncertainty: uncertainty is calculated from uncertainties in waste composition and uncertainties in energy efficiency and the uncertainty in internal energy demand
  production volume 0 kWh
    calculated in proportion to reference product waste input to incinerator
  property exergy 3.6 MJ; name E_el_prod_MSWI_exergy
    This exergy property is based on the exergy content of the product.
  property true value relation 3.6; name E_el_prod_MSWI_true_value_relation
    property to calculate "true value" from
  property price 0.1 EUR2005; name E_el_prod_MSWI_price_EUR2005
    Estimated to be the same price as in case of electricity, medium voltage.
- heat, for reuse in municipal waste incineration only: 0 MJ; name E_th_prod_MSWI; CPC 17300: Steam and hot water; By-product classification allocatable product; pedigree (1,1,1,1,1)
  Net useful heat generated from this waste and used in internal MSWI plant energy redistribution.
  Uncertainty: uncertainty is calculated from uncertainties in waste composition and uncertainties in energy efficiency and the uncertainty in internal energy demand
  production volume 0 MJ
    calculated in proportion to reference product waste input to incinerator
  property true value relation 0.1842; name E_th_prod_MSWI_true_value_relation
    property to calculate "true value" from
  property price 0.0106 EUR2005; name E_th_prod_MSWI_price_EUR2005
    Average European district heat price from Ecoheatcool and Euroheat 2005-2006, Ecoheat Work package 1: The European heat market. Final report. 10.6 EUR/GJ i s the price of district heat. http://www.solarthermalworld.org/files/Ecoheatcool%20WP1%20Web.pdf?download
  property exergy 0.1842 MJ; name E_th_prod_MSWI_exergy
    This exergy property is based on the exergy content of the product.
- iron scrap, unsorted: 0 kg; source European Aluminium Association 2008; CPC 39310: Slag, dross, scalings and other waste from the manufacture of iron or steel; By-product classification Recyclable; pedigree (1,1,1,1,1)
  property price 0.149 EUR2005; name ironScrapAmount_price_EUR2005
    Temporary price data. Calculated as 90% of purchasers price based on: estimated at 85% of sorted scrap
  property carbon content 0
    carbon content on a dry matter basis (reserved; not for manual entry)
  properties: water in wet mass 0 kg, water content 0, carbon content, fossil 0, carbon content, non-fossil 0, dry mass 1 kg, wet mass 1 kg, carbon allocation 0 kg
- aluminium oxide, non-metallurgical: 0 kg; source European Aluminium Association 2008; CPC 41432: Alumina (aluminium oxide), except artificial corundum; By-product classification allocatable product; CAS 1344-28-1; pedigree (1,1,1,1,1)
  property carbon content, non-fossil 0; name C_content_non_fossil
  property price 0.28 EUR2005; name Al2O3Amount_price_EUR2005
    From UN trade database. http://data.un.org/ Import data from the largest economies of the world are used (Brazil, India, USA, China, Japan and EU-27).
  property dry mass 1 kg; name DM
  property water content 0; name water_content
  property wet mass 1 kg; name WM
  property water in wet mass 0 kg; name WWM
  property carbon content, fossil 0; name C_content_fossil
  property carbon content 0
    carbon content on a dry matter basis (reserved; not for manual entry)
  properties: carbon allocation 0 kg
- aluminium, cast alloy: 0 kg; source European Aluminium Association 2008; By-product classification allocatable product; CPC 41431: Unwrought aluminium; pedigree (1,1,1,1,1)
  EcoSpold01Location=RER
  property price 1.3 EUR2005; name castAlloyAmount_price_EUR2005
    Temporary price data. Calculated as 90% of purchasers price based on: Source: London Metal Exchange, Aluminium alloy price for 2005
  property carbon content 0
    carbon content on a dry matter basis (reserved; not for manual entry)
  properties: water in wet mass 0 kg, carbon content, non-fossil 0, water content 0, dry mass 1 kg, carbon content, fossil 0, wet mass 1 kg, carbon allocation 0 kg
- aluminium, wrought alloy: 0 kg; source European Aluminium Association 2008; By-product classification allocatable product; CPC 4153: Semi-finished products of aluminium or aluminium alloys; pedigree (1,1,1,1,1)
  property price 1.44 EUR2005; name secondaryAluminiumOutput_price_EUR2005
    Estimated based on literature values and expert judgement. Aluminium ccast alloys are about 90% of the price of aluminium wrought alloys.
  property carbon content 0
    carbon content on a dry matter basis (reserved; not for manual entry)
  properties: wet mass 1 kg, water content 0, carbon content, fossil 0, water in wet mass 0 kg, carbon content, non-fossil 0, dry mass 1 kg, carbon allocation 0 kg
- copper: 0 kg; source Rentz O. 1999; By-product classification allocatable product; CPC 41413: Refined copper and copper alloys, unwrought; master alloys of copper
  Literature value. Copper uses: Before end-use copper is manufactured into semi fabricated products, such as shapes and ingots (known as 'semis'). These manufacturing processes are subdivided into hot working, cold working and, if necessary, process annealing. Few of the semis are ready for use as such. They more typically travel to first-stage manufacturers, who make metal rods, wire, and casting, and then to component manufacturers who produce such things as motors, valves, and insulated cables The components in turn are incorporated by final-stage manufacturers into a variety of finished products - automobiles, commercial buildings, residential housing, and so forth. These uses account for about 79% of the world-wide consumption of copper.
  property price 5.52 EUR2005
    Literature value (http://www.economist.com/news/business/21576714-mining-industry-has-enriched-chile-its-future-precarious-copper-solution). Average price between 20015 and 2013.
  property carbon content 0
    carbon content on a dry matter basis (reserved; not for manual entry)
  properties: dry mass 1 kg, water in wet mass 0 kg, wet mass 1 kg, carbon content, non-fossil 0, water content 0, carbon content, fossil 0, carbon allocation 0 kg
- zinc concentrate: 0 kg; CPC 14290: Other non-ferrous metal ores and concentrates (other than uranium or thorium ores and concentrates); By-product classification allocatable product
  Calculated value from the knowledge of the properties of both products.
  property price 0.38 EUR2005; name ByP_price_EUR2005
    Temporary price data. Calculated as 90% of purchasers price based on: Zinc content in concentrate 53%. Concentrate price per kg Zn 86.5% of refined Zn price (13.5% treatment charges according to CHR Metals Limited 2005: Dynamic cost curves. http://www.minecost.com/dynamic.pdf). 2004 zinc price from USGS (2007) Mineral commodity summaries 2007. <http://minerals.usgs.gov/minerals/pubs/mcs/2007/mcs2007.pdf> [Accessed 25 May 2010]
  property zinc content 0.53; name zinc_C_zinc_concentrate
    Zinc content on a dry matter basis. Value taken from teh "zinc mine operation" /GLO dataset.
  property dry mass 1 kg; name DM_zinc_concentrate
  property carbon content 0
    carbon content on a dry matter basis (reserved; not for manual entry)
  properties: wet mass 1 kg, water content 0, carbon content, non-fossil 0, carbon content, fossil 0, water in wet mass 0 kg, carbon allocation 0 kg

## Inputs from technosphere
- cationic resin: 0 kg; pedigree (1,1,1,1,1)
  Auxilliary input for mercury removal in filter ash treatment (FLUWA).
  Uncertainty: uncertainty calculated from uncertainty in of transfer coefficients in the incinerator, and the uncertainty of the waste composition of this waste
  properties: water content 1, carbon content, fossil 0.521606, dry mass 0.5 kg, wet mass 1 kg
- aluminium scrap, post-consumer, prepared for melting: -0.013355 kg; lognormal variance with pedigree 0.68323, pedigree (1,1,3,1,1)
  Aluminium scrap recovered from this waste.
  Uncertainty: uncertainty calculated from uncertainty in waste composition, uncertainty of share of recyclable metal, uncertainty of transfer coefficient to bottom ash, uncertainty of the efficiency of scrap removal in MSWI plant.
  production volume 0 kg
    calculated in proportion to reference product waste input to incinerator
  properties: price 0.806 EUR2005, dry mass 1 kg, wet mass 1 kg
- water, decarbonised: 0 kg; pedigree (1,1,1,1,1)
  Incinerator process water used in flue gas scrubber stage.
  Uncertainty: uncertainty calculated from uncertainty in average water input, and the uncertainty of the waste composition of this waste
  properties: wet mass 1 kg
- copper scrap, sorted, pressed: 0 kg; pedigree (1,1,1,1,1)
  Copper scrap recovered from this waste.
  Uncertainty: uncertainty calculated from uncertainty in waste composition, uncertainty of share of recyclable metal, uncertainty of transfer coefficient to bottom ash, uncertainty of the efficiency of scrap removal in MSWI plant.
  production volume 0 kg
    calculated in proportion to reference product waste input to incinerator
  properties: price 2.84 EUR2005, wet mass 1 kg, dry mass 1 kg
- slag landfill: 0 unit; pedigree (1,1,1,1,1)
  Landfill infrastructure required for landfilling of bottom ash.
  Uncertainty: uncertainty is calculated from uncertainties in waste composition and transfer coefficients in incinerator
- metalliferous hydroxide sludge: 0 kg; pedigree (1,1,1,1,1)
  Metalliferous hydroxide sludge from filter ash leaching (FLUWA).
  Uncertainty: uncertainty is calculated from uncertainties in waste composition and transfer coefficients to filter ash in incinerator and the uncertainty of the transfer coefficients of the FLUWA process.
  production volume 0 kg
    calculated in proportion to reference product waste input to incinerator
  properties: water content 3, cadmium content 0.0046754, oxygen content 0.207, sulfur content 0.0081719, chlorine content 0.042441, copper content 0.0097898, lead content 0.10093, zinc content 0.58733, potassium content 0.0079566, dry mass 0.25 kg, wet mass 1 kg, calcium content 0.015557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
- municipal waste incineration facility: 0 unit
  Demands per kilogram waste.
- process-specific burdens, slag landfill: 0 kg; pedigree (1,1,1,1,1)
  Mass-specific expenditures required for landfilling of bottom ash.;activityLink introduced to establish a direct link to the corresponding regional supply of this product
  Uncertainty: uncertainty is calculated from uncertainties in waste composition and transfer coefficients in incinerator
- sodium hydroxide, without water, in 50% solution state: 0 kg; pedigree (1,1,1,1,1)
  Auxilliary inputs for the flue gas treatment stage of the incinerator plant, and partially in the filter ash treatment (FLUWA).
  Uncertainty: uncertainty calculated from uncertainty in average NaOH input, of transfer coefficients in the incinerator, and the uncertainty of the waste composition of this waste
  properties: dry mass 1 kg, wet mass 1 kg
- residual material landfill: 0 unit; pedigree (1,1,1,1,1)
  Landfill infrastructure required for landfilling of incineration residues.
  Uncertainty: uncertainty is calculated from uncertainties in waste composition and transfer coefficients in incinerator
- quicklime, milled, packed: 0 kg; pedigree (1,1,1,1,1)
  Auxilliary inputs for the flue gas treatment stage of the incinerator plant.
  Uncertainty: uncertainty calculated from uncertainty in average CaO input, of transfer coefficients in the incinerator, and the uncertainty of the waste composition of this waste
  properties: wet mass 1 kg, dry mass 0.99 kg, water content 0.010101
- process-specific burdens, residual material landfill: 0 kg; pedigree (1,1,1,1,1)
  Mass-specific expenditures required for landfilling of incineration residues.;activityLink introduced to establish a direct link to the corresponding regional supply of this product
  Uncertainty: uncertainty is calculated from uncertainties in waste composition and transfer coefficients in incinerator
- hydrochloric acid, without water, in 30% solution state: 0 kg; pedigree (1,1,1,1,1)
  Auxilliary inputs for the wastewater treatment stage of the incinerator plant.
  Uncertainty: uncertainty calculated from uncertainty in average HCl input, of transfer coefficients in the incinerator, and the uncertainty of the waste composition of this waste
  properties: dry mass 1 kg, wet mass 1 kg
- iron (III) chloride, without water, in 40% solution state: 0 kg; pedigree (1,1,1,1,1)
  Auxilliary inputs for the wastewater treatment stage of the incinerator plant.
  Uncertainty: uncertainty calculated from uncertainty in average FeCl3 input, of transfer coefficients in the incinerator, and the uncertainty of the waste composition of this waste
  properties: wet mass 1 kg, dry mass 1 kg
- chemical, organic: 0 kg; pedigree (1,1,1,1,1)
  Auxilliary inputs for the wastewater treatment stage of the incinerator plant. Proxy for (pure) Trisodium-trimercapto-s-triazine (CAS 17766-26-6), used as 15% diluted solution, aka TMT15.
  Uncertainty: uncertainty calculated from uncertainty in average TMT15 input, of transfer coefficients in the incinerator, and the uncertainty of the waste composition of this waste
  properties: carbon content, fossil 0.628, wet mass 1 kg, dry mass 1 kg
- chemical, inorganic: 0 kg; pedigree (1,1,1,1,1)
  Auxilliary inputs for the wastewater treatment stage of the incinerator plant. Proxy for Polyelectrolyte.
  Uncertainty: uncertainty calculated from uncertainty in average Polyelectrolyte input, of transfer coefficients in the incinerator, and the uncertainty of the waste composition of this waste
  properties: dry mass 1 kg, wet mass 1 kg, carbon content, fossil 0.003
- cement, unspecified: 0 kg; pedigree (1,1,1,1,1)
  Cement required for solidification of landfilled residual material.
  Uncertainty: Uncertainty calculated from uncertainty of the waste composition of this waste, of transfer coefficients in the incinerator and of the solidification recipe.
  properties: dry mass 1 kg, wet mass 1 kg
- transport, freight, lorry, unspecified: 0 metric ton*km; pedigree (1,1,1,1,1)
  Transport services to transport incineration residues to landfills and filter ash to external treatments (FLUWA).
  Uncertainty: uncertainty calculated from uncertainty of the waste composition of this waste, uncertainty of transfer coefficients and the uncertainty in generic transportation distances
- waste cement, hydrated: 0 kg; pedigree (1,1,1,1,1)
  Hydrated cement output for solidification of landfilled residual material.
  Uncertainty: Uncertainty calculated from uncertainty of the waste composition of this waste and transfer coefficients in the incinerator and of the solidification recipe.
  production volume 0 kg
    calculated in proportion to reference product waste input to incinerator
  properties: dry mass 1 kg, wet mass 1 kg
- ammonia, liquid: 0 kg; pedigree (1,1,1,1,1)
  Input to DeNOx stage (100% NH3).
  Uncertainty: uncertainty calculated from uncertainty in average DeNOx input, uncertainty in the share of thermal NOx, uncertainty of nitrogen content in average municipal waste and the uncertainty in nitrogen content in *this* waste.
  properties: wet mass 1 kg, dry mass 1 kg
- heat, district or industrial, natural gas: 0 MJ; pedigree (1,1,1,1,1)
  Input to DeNOx stage, to heat up flue gas in low-dust SCR.
  Uncertainty: uncertainty calculated from uncertainty in average DeNOx input, uncertainty in the share of thermal NOx, uncertainty of nitrogen content in average municipal waste and the uncertainty in nitrogen content in *this* waste.
- spent activated carbon with mercury: 0 kg; pedigree (1,1,1,1,1)
  Spent ion exchanger charged with mercury, from FLUWA filter ash treatment, approximated here with Spent activated carbon with mercury, deposited undergound in a polyethylene Big Bag.
  Uncertainty: uncertainty calculated from uncertainty in of transfer coefficients in the incinerator, and the uncertainty of the waste composition of this waste.
  production volume 0 kg; = ABS(Ref('0423e508-6886-4d3b-88a8-abfa1101abd5', 'ProductionVolume') * (Ref('22b1fc1a-c0a9-425a-aac3-6f6092cabc24') / Ref('0423e508-6886-4d3b-88a8-abfa1101abd5')))
    Calculated from production volume of reference product using the relative outputs.
  properties: carbon content, fossil 0.6, dry mass 1 kg, wet mass 1 kg
- titanium dioxide: 0 kg; pedigree (1,1,1,1,1)
  Input to DeNOx stage (TiO2 catalyst carrier)
  Uncertainty: uncertainty calculated from uncertainty in average DeNOx input, uncertainty in the share of thermal NOx, uncertainty of nitrogen content in average municipal waste and the uncertainty in nitrogen content in *this* waste.
  properties: dry mass 1 kg, wet mass 1 kg
- chromium oxide, flakes: 0 kg; pedigree (1,1,1,1,1)
  Input to DeNOx stage. Active component in SCR catalyst (vanadium pentoxide, V2O5), here approximated with the available chromium trioxide.
  Uncertainty: uncertainty calculated from uncertainty in average DeNOx input, uncertainty in the share of thermal NOx, uncertainty of nitrogen content in average municipal waste and the uncertainty in nitrogen content in *this* waste.
  properties: dry mass 1 kg, wet mass 1 kg
- hydrogen peroxide, without water, in 50% solution state: 0 kg; pedigree (1,1,1,1,1)
  Auxilliary oxidising agent for filter ash treatment (FLUWA).
  Uncertainty: uncertainty calculated from uncertainty in of transfer coefficients in the incinerator, and the uncertainty of the waste composition of this waste
  properties: dry mass 1 kg, wet mass 1 kg
- photovoltaic cell factory: 9.28115e-13 unit; lognormal variance with pedigree 0.3701, pedigree (1,4,5,3,3)
  EcoSpold01Location=DE
  Proxy with calculation, to represent computer production photovoltaic cell factory is used. It is based on a annual production of 7.9 mio pieces and life-span of 25 years.
- power adapter, for laptop: 3.05502e-5 unit; source von Geibler J. 2003; lognormal variance with pedigree 0.0701, pedigree (1,4,5,3,3)
  Literature Value.
  EcoSpold01Location=GLO
- hard disk drive, for laptop computer: 3.05502e-5 unit; source von Geibler J. 2003; lognormal variance with pedigree 0.0701, pedigree (1,4,5,3,3)
  Literature Value.
  EcoSpold01Location=GLO
- copper: 4.12428e-7 kg; source von Geibler J. 2003; lognormal variance with pedigree 0.0701, pedigree (1,4,5,3,3)
  Literature Value.
  EcoSpold01Location=RER
- printed wiring board, surface mounted, unspecified, Pb free: 4.23319e-6 kg; source von Geibler J. 2003; lognormal variance with pedigree 0.0701, pedigree (1,4,5,3,3)
  Literature Value.
  This original value from production mix has been replaced by 2 flows. Pb-containing has a share of 0.3, Pb-free has a share of 0.7.
- magnesium-alloy, AZ91, diecast: 8.65182e-6 kg; source von Geibler J. 2003; lognormal variance with pedigree 0.0701, pedigree (1,4,5,3,3)
  EcoSpold01Location=RER
  Literature Value.
- section bar extrusion, aluminium: 5.15687e-6 kg; source von Geibler J. 2003; lognormal variance with pedigree 0.0707, pedigree (2,4,5,3,3)
  Literature Value.
  EcoSpold01Location=RER
- magnesium-alloy, AZ91: 8.65182e-6 kg; source von Geibler J. 2003; lognormal variance with pedigree 0.0707, pedigree (2,4,5,3,3)
  EcoSpold01Location=RER
  Literature Value.
- printed wiring board, mounted mainboard, laptop computer, Pb containing: 1.30877e-6 kg; source von Geibler J. 2003; lognormal variance with pedigree 0.0701, pedigree (1,4,5,3,3)
  Literature Value.
  EcoSpold01Location=GLO
- polystyrene foam slab: 2.71897e-6 kg; source von Geibler J. 2003; lognormal variance with pedigree 0.0701, pedigree (1,4,5,3,3)
  EcoSpold01Location=RER
  Literature Value.
- printed wiring board, surface mounted, unspecified, Pb containing: 1.81422e-6 kg; source von Geibler J. 2003; lognormal variance with pedigree 0.0701, pedigree (1,4,5,3,3)
  (same comment as for printed wiring board, surface mounted, unspecified, Pb free)
- liquid crystal display, unmounted: 1.00205e-5 kg; source von Geibler J. 2003; lognormal variance with pedigree 0.0701, pedigree (1,4,5,3,3)
  Literature Value.
  EcoSpold01Location=GLO
- packaging film, low density polyethylene: 1.55806e-6 kg; source von Geibler J. 2003; lognormal variance with pedigree 0.0701, pedigree (1,4,5,3,3)
  Literature Value.
  EcoSpold01Location=RER
- aluminium, cast alloy: 1.6502e-6 kg; source von Geibler J. 2003; lognormal variance with pedigree 0.0707, pedigree (2,4,5,3,3)
  EcoSpold01Location=RER
  Literature Value.
- extrusion, plastic pipes: 1.29518e-5 kg; source von Geibler J. 2003; lognormal variance with pedigree 0.0701, pedigree (1,4,5,3,3)
  Literature Value.
  EcoSpold01Location=RER
- aluminium, wrought alloy: 3.50667e-6 kg; source von Geibler J. 2003; lognormal variance with pedigree 0.0707, pedigree (2,4,5,3,3)
  EcoSpold01Location=RER
  Literature Value.
- disk drive, CD/DVD, ROM, for laptop computer: 3.05502e-5 unit; source von Geibler J. 2003; lognormal variance with pedigree 0.0701, pedigree (1,4,5,3,3)
  EcoSpold01Location=GLO
  Literature Value.
- used laptop computer: -9.53166e-5 kg; lognormal variance with pedigree 0.0701, pedigree (1,4,5,3,3)
  EcoSpold01Location=CH
  Measured Value.
  production volume 3.12 kg
- battery, Li-ion, rechargeable, prismatic: 8.3402e-6 kg; source von Geibler J. 2003; lognormal variance with pedigree 0.0701, pedigree (1,4,5,3,3)
  EcoSpold01Location=GLO
  Literature Value.
- polystyrene, high impact: 1.29518e-5 kg; source von Geibler J. 2003; lognormal variance with pedigree 0.0701, pedigree (1,4,5,3,3)
  EcoSpold01Location=RER
  Literature Value.
- electricity, medium voltage: 5.0918e-5 kWh; source von Geibler J. 2003; lognormal variance with pedigree 0.0701, pedigree (1,4,5,3,3)
  EcoSpold01Location=UCTE
  Literature Value.
- battery, NiMH, rechargeable, prismatic: 2.44402e-7 kg; source von Geibler J. 2003; lognormal variance with pedigree 0.0701, pedigree (1,4,5,3,3)
  Literature Value.
  EcoSpold01Location=GLO
- cable, network cable, category 5, without plugs: 4.76583e-6 m; source von Geibler J. 2003; lognormal variance with pedigree 0.0521, pedigree (1,4,5,3,1)
  Literature Value.
  EcoSpold01Location=GLO
- sheet rolling, steel: 1.69431e-5 kg; source von Geibler J. 2003; lognormal variance with pedigree 0.0701, pedigree (1,4,5,3,3)
  EcoSpold01Location=RER
  Literature Value.
- tap water: 0.0494913 kg; source Fujitsu L. 2003; lognormal variance with pedigree 0.0701, pedigree (1,4,5,3,3)
  Measured Value.
  EcoSpold01Location=RER
- plug, inlet and outlet, for network cable: 3.05502e-5 unit; lognormal variance with pedigree 0.0521, pedigree (1,4,5,3,1)
  Measured Value.
  EcoSpold01Location=GLO
- sheet rolling, copper: 4.12428e-7 kg; source von Geibler J. 2003; lognormal variance with pedigree 0.0701, pedigree (1,4,5,3,3)
  Literature Value.
  EcoSpold01Location=RER
- steel, chromium steel 18/8, hot rolled: 1.69431e-5 kg; source von Geibler J. 2003; lognormal variance with pedigree 0.0701, pedigree (1,4,5,3,3)
  Literature Value.
  EcoSpold01Location=RER
- sheet rolling, aluminium: 8.65182e-6 kg; source von Geibler J. 2003; lognormal variance with pedigree 0.0701, pedigree (1,4,5,3,3)
  EcoSpold01Location=RER
  Literature Value.
- wastewater, unpolluted: -3.95931e-7, -4.90954e-5 m3 (2 suppliers, which the file names only by identifier); sum of these -4.94913e-5 m3; source Fujitsu L. 2003; lognormal variance with pedigree 0.0701, pedigree (1,4,5,3,3)
  Literature Value.
  EcoSpold01Location=CH
  production volume 1.62 m3
- waste polystyrene: -2.61713e-7, -2.01766e-8, -8.33364e-9, -7.91357e-9, -3.01971e-7, -3.3667e-9, -1.52592e-9, -2.11397e-6 kg (8 suppliers, which the file names only by identifier); sum of these -2.71897e-6 kg; source von Geibler J. 2003; lognormal variance with pedigree 0.0701, pedigree (1,4,5,3,3)
  Literature Value.
  EcoSpold01Location=CH
  production volume 0.089 kg
- waste polyethylene: -1.49971e-7, -1.15619e-8, -4.77546e-9, -4.53474e-9, -1.7304e-7, -1.92923e-9, -8.74404e-10, -1.21137e-6 kg (8 suppliers, which the file names only by identifier); sum of these -1.55806e-6 kg; source von Geibler J. 2003; lognormal variance with pedigree 0.0701, pedigree (1,4,5,3,3)
  EcoSpold01Location=CH
  Literature Value.
  production volume 0.051 kg
- corrugated board box: 5.27984e-6, 2.36066e-7, 2.00546e-5 kg (3 suppliers, which the file names only by identifier); sum of these 2.55705e-5 kg; source von Geibler J. 2003; lognormal variance with pedigree 0.0701, pedigree (1,4,5,3,3)
  Literature Value.
  EcoSpold01Location=RER
- waste electric and electronic equipment: -0.110372 kg; lognormal variance with pedigree 0.134, pedigree (3,4,5,1,4)
  Rough estimation
  EcoSpold01Location=GLO
  Uncertainty: rough estimation
  production volume 0.347424 kg
- used printed wiring boards: -0.00523484 kg; lognormal variance with pedigree 0.054, pedigree (3,4,5,1,1)
  Calculated - based on composition data
  EcoSpold01Location=GLO
  Uncertainty: calculated - based on composition data
  production volume 0.016478 kg
- electronics scrap: -0.0119203 kg; lognormal variance with pedigree 0.2106, pedigree (5,5,5,5,5)
  replaces the original flow "Cu fraction of used liquid crystal display from mechanical treatment"
  production volume 0.0375221 kg
- used fluorescent lamp: -0.00271527 kg; lognormal variance with pedigree 0.054, pedigree (3,4,5,1,1)
  EcoSpold01Location=GLO
  Calculated - based on composition data
  Uncertainty: calculated - based on composition data
  production volume 0.008547 kg
- waste plastic, consumer electronics: -8.59174e-5, -0.00568709 kg (2 suppliers, which the file names only by identifier); sum of these -0.00577301 kg; lognormal variance with pedigree 0.054, pedigree (3,4,5,1,1)
  EcoSpold01Location=CH
  Calculated - based on composition data
  Uncertainty: calculated - based on composition data
  production volume 0.018172 kg
- used liquid crystal display module: -0.00160731, -0.106392 kg (2 suppliers, which the file names only by identifier); sum of these -0.107999 kg; lognormal variance with pedigree 0.054, pedigree (3,4,5,1,1)
  Calculated - based on composition data
  EcoSpold01Location=CH
  Uncertainty: calculated - based on composition data
  production volume 0.339955 kg
- residue from mechanical treatment, liquid crystal display: -0.0012451, -0.082417 kg (2 suppliers, which the file names only by identifier); sum of these -0.0836621 kg; lognormal variance with pedigree 0.054, pedigree (3,4,5,1,1)
  (same comment as for waste plastic, consumer electronics)
  production volume 0.263348 kg

## Emissions to nature
- DOC, Dissolved Organic Carbon [water, surface water]: 0 kg; pedigree (1,1,1,1,1)
  Emissions to water from waste composition and transfer coefficients in incinerator and landfills.
  Uncertainty: uncertainty is calculated from uncertainties in waste composition and transfer coefficients in incinerator and landfills
- Sulfur dioxide [air, urban air close to ground]: 0 kg; pedigree (1,1,1,1,1)
  Emission to air from waste composition and transfer coefficients.
  Uncertainty: uncertainty is calculated from uncertainties in waste composition and transfer coefficients in incinerator
- Chromium VI [water, ground-, long-term]: 0 kg; pedigree (1,1,1,1,1)
  Long-term emissions from landfilling of incineration residues.
  Uncertainty: uncertainty is calculated from uncertainties in waste composition and transfer coefficients in incinerator and landfills.
- Sulfate [water, surface water]: 0 kg; pedigree (1,1,1,1,1)
  (same comment as for DOC, Dissolved Organic Carbon)
- Methane, fossil [air, urban air close to ground]: 0 kg; pedigree (1,1,1,1,1)
  Incomplete combustion product emitted to air.
  Uncertainty: uncertainty calculated from uncertainty in average operation emissions, and the uncertainty of the flue gas volume from this waste.
- Copper, ion [water, ground-, long-term]: 0 kg; pedigree (1,1,1,1,1)
  (same comment as for Chromium VI)
- Nitrate [water, surface water]: 0 kg; pedigree (1,1,1,1,1)
  (same comment as for DOC, Dissolved Organic Carbon)
- Nitrogen oxides [air, urban air close to ground]: 0 kg; pedigree (1,1,1,1,1)
  Sum of fuel-Nox and thermal-NOx emitted to air after DeNOx stage.
  Uncertainty: uncertainty calculated from uncertainty in average N-emissions and uncertainty in the share of thermal NOx and the uncertainty in nitrogen content in *this* waste.
- Mercury [water, ground-, long-term]: 0 kg; pedigree (1,1,1,1,1)
  (same comment as for Chromium VI)
- Phosphate [water, surface water]: 0 kg; pedigree (1,1,1,1,1)
  (same comment as for DOC, Dissolved Organic Carbon)
- Ammonia [air, urban air close to ground]: 0 kg; pedigree (1,1,1,1,1)
  Nitrogen species emitted to air after DeNOx stage.
  Uncertainty: uncertainty calculated from uncertainty in average N-emissions and uncertainty in the share of thermal NOx and the uncertainty in nitrogen content in *this* waste.
- Manganese [water, ground-, long-term]: 0 kg; pedigree (1,1,1,1,1)
  (same comment as for Chromium VI)
- Boron [water, surface water]: 0 kg; pedigree (1,1,1,1,1)
  (same comment as for DOC, Dissolved Organic Carbon)
- Dinitrogen monoxide [air, urban air close to ground]: 0 kg; pedigree (1,1,1,1,1)
  (same comment as for Ammonia)
- Molybdenum [water, ground-, long-term]: 0 kg; pedigree (1,1,1,1,1)
  (same comment as for Chromium VI)
- Chloride [water, surface water]: 0 kg; pedigree (1,1,1,1,1)
  (same comment as for DOC, Dissolved Organic Carbon)
- Cyanide [air, urban air close to ground]: 0 kg; pedigree (1,1,1,1,1)
  (same comment as for Ammonia)
- Nickel, ion [water, ground-, long-term]: 0 kg; pedigree (1,1,1,1,1)
  (same comment as for Chromium VI)
- Bromine [water, surface water]: 0 kg; pedigree (1,1,1,1,1)
  (same comment as for DOC, Dissolved Organic Carbon)
- Phosphorus [air, urban air close to ground]: 0 kg; pedigree (1,1,1,1,1)
  (same comment as for Sulfur dioxide)
- Lead [water, ground-, long-term]: 0 kg; pedigree (1,1,1,1,1)
  (same comment as for Chromium VI)
- Fluoride [water, surface water]: 0 kg; pedigree (1,1,1,1,1)
  (same comment as for DOC, Dissolved Organic Carbon)
- Hydrogen chloride [air, urban air close to ground]: 0 kg; pedigree (1,1,1,1,1)
  (same comment as for Sulfur dioxide)
- Antimony [water, ground-, long-term]: 0 kg; pedigree (1,1,1,1,1)
  (same comment as for Chromium VI)
- Silver, ion [water, surface water]: 0 kg; pedigree (1,1,1,1,1)
  (same comment as for DOC, Dissolved Organic Carbon)
- Bromine [air, urban air close to ground]: 0 kg; pedigree (1,1,1,1,1)
  (same comment as for Sulfur dioxide)
- Selenium [water, ground-, long-term]: 0 kg; pedigree (1,1,1,1,1)
  (same comment as for Chromium VI)
- Arsenic, ion [water, surface water]: 0 kg; pedigree (1,1,1,1,1)
  (same comment as for DOC, Dissolved Organic Carbon)
- Arsenic [air, urban air close to ground]: 0 kg; pedigree (1,1,1,1,1)
  (same comment as for Sulfur dioxide)
- Tin, ion [water, ground-, long-term]: 0 kg; pedigree (1,1,1,1,1)
  (same comment as for Chromium VI)
- Barium [water, surface water]: 0 kg; pedigree (1,1,1,1,1)
  (same comment as for DOC, Dissolved Organic Carbon)
- Hydrogen fluoride [air, urban air close to ground]: 0 kg; pedigree (1,1,1,1,1)
  (same comment as for Sulfur dioxide)
- Vanadium, ion [water, ground-, long-term]: 0 kg; pedigree (1,1,1,1,1)
  (same comment as for Chromium VI)
- Cadmium, ion [water, surface water]: 0 kg; pedigree (1,1,1,1,1)
  (same comment as for DOC, Dissolved Organic Carbon)
- Barium [air, urban air close to ground]: 0 kg; pedigree (1,1,1,1,1)
  (same comment as for Sulfur dioxide)
- Zinc, ion [water, ground-, long-term]: 0 kg; pedigree (1,1,1,1,1)
  (same comment as for Chromium VI)
- Cobalt [water, surface water]: 0 kg; pedigree (1,1,1,1,1)
  (same comment as for DOC, Dissolved Organic Carbon)
- Cobalt [air, urban air close to ground]: 0 kg; pedigree (1,1,1,1,1)
  (same comment as for Sulfur dioxide)
- Beryllium [water, ground-, long-term]: 0 kg; pedigree (1,1,1,1,1)
  (same comment as for Chromium VI)
- Chromium VI [water, surface water]: 0 kg; pedigree (1,1,1,1,1)
  (same comment as for DOC, Dissolved Organic Carbon)
- Cadmium [air, urban air close to ground]: 0 kg; pedigree (1,1,1,1,1)
  (same comment as for Sulfur dioxide)
- Strontium [water, ground-, long-term]: 0 kg; pedigree (1,1,1,1,1)
  (same comment as for Chromium VI)
- Copper, ion [water, surface water]: 0 kg; pedigree (1,1,1,1,1)
  (same comment as for DOC, Dissolved Organic Carbon)
- Chromium [air, urban air close to ground]: 0 kg; pedigree (1,1,1,1,1)
  (same comment as for Sulfur dioxide)
- Titanium, ion [water, ground-, long-term]: 0 kg; pedigree (1,1,1,1,1)
  (same comment as for Chromium VI)
- Mercury [water, surface water]: 0 kg; pedigree (1,1,1,1,1)
  (same comment as for DOC, Dissolved Organic Carbon)
- Copper [air, urban air close to ground]: 0 kg; pedigree (1,1,1,1,1)
  (same comment as for Sulfur dioxide)
- Thallium [water, ground-, long-term]: 0 kg; pedigree (1,1,1,1,1)
  (same comment as for Chromium VI)
- Manganese [water, surface water]: 0 kg; pedigree (1,1,1,1,1)
  (same comment as for DOC, Dissolved Organic Carbon)
- Mercury [air, urban air close to ground]: 0 kg; pedigree (1,1,1,1,1)
  (same comment as for Sulfur dioxide)
- Silicon [water, ground-, long-term]: 0 kg; pedigree (1,1,1,1,1)
  (same comment as for Chromium VI)
- Molybdenum [water, surface water]: 0 kg; pedigree (1,1,1,1,1)
  (same comment as for DOC, Dissolved Organic Carbon)
- Manganese [air, urban air close to ground]: 0 kg; pedigree (1,1,1,1,1)
  (same comment as for Sulfur dioxide)
- Iron, ion [water, ground-, long-term]: 0 kg; pedigree (1,1,1,1,1)
  (same comment as for Chromium VI)
- Nickel, ion [water, surface water]: 0 kg; pedigree (1,1,1,1,1)
  (same comment as for DOC, Dissolved Organic Carbon)
- Molybdenum [air, urban air close to ground]: 0 kg; pedigree (1,1,1,1,1)
  (same comment as for Sulfur dioxide)
- Calcium, ion [water, ground-, long-term]: 0 kg; pedigree (1,1,1,1,1)
  (same comment as for Chromium VI)
- Lead [water, surface water]: 0 kg; pedigree (1,1,1,1,1)
  (same comment as for DOC, Dissolved Organic Carbon)
- Nickel [air, urban air close to ground]: 0 kg; pedigree (1,1,1,1,1)
  (same comment as for Sulfur dioxide)
- Aluminium [water, ground-, long-term]: 0 kg; pedigree (1,1,1,1,1)
  (same comment as for Chromium VI)
- Antimony [water, surface water]: 0 kg; pedigree (1,1,1,1,1)
  (same comment as for DOC, Dissolved Organic Carbon)
- Lead [air, urban air close to ground]: 0 kg; pedigree (1,1,1,1,1)
  (same comment as for Sulfur dioxide)
- Potassium, ion [water, ground-, long-term]: 0 kg; pedigree (1,1,1,1,1)
  (same comment as for Chromium VI)
- Selenium [water, surface water]: 0 kg; pedigree (1,1,1,1,1)
  (same comment as for DOC, Dissolved Organic Carbon)
- Antimony [air, urban air close to ground]: 0 kg; pedigree (1,1,1,1,1)
  (same comment as for Sulfur dioxide)
- Magnesium [water, ground-, long-term]: 0 kg; pedigree (1,1,1,1,1)
  (same comment as for Chromium VI)
- Tin, ion [water, surface water]: 0 kg; pedigree (1,1,1,1,1)
  (same comment as for DOC, Dissolved Organic Carbon)
- Selenium [air, urban air close to ground]: 0 kg; pedigree (1,1,1,1,1)
  (same comment as for Sulfur dioxide)
- Sodium, ion [water, ground-, long-term]: 0 kg; pedigree (1,1,1,1,1)
  (same comment as for Chromium VI)
- Vanadium, ion [water, surface water]: 0 kg; pedigree (1,1,1,1,1)
  (same comment as for DOC, Dissolved Organic Carbon)
- Tin [air, urban air close to ground]: 0 kg; pedigree (1,1,1,1,1)
  (same comment as for Sulfur dioxide)
- NMVOC, non-methane volatile organic compounds, unspecified origin [air, urban air close to ground]: 0 kg; pedigree (1,1,1,1,1)
  (same comment as for Methane, fossil)
- Zinc, ion [water, surface water]: 0 kg; pedigree (1,1,1,1,1)
  (same comment as for DOC, Dissolved Organic Carbon)
- Vanadium [air, urban air close to ground]: 0 kg; pedigree (1,1,1,1,1)
  (same comment as for Sulfur dioxide)
- Particulates, < 2.5 um [air, urban air close to ground]: 0 kg; pedigree (1,1,1,1,1)
  (same comment as for Methane, fossil)
- Beryllium [water, surface water]: 0 kg; pedigree (1,1,1,1,1)
  (same comment as for DOC, Dissolved Organic Carbon)
- TOC, Total Organic Carbon [water, ground-, long-term]: 0 kg; pedigree (1,1,1,1,1)
  (same comment as for Chromium VI)
- Zinc [air, urban air close to ground]: 0 kg; pedigree (1,1,1,1,1)
  (same comment as for Sulfur dioxide)
- Particulates, > 2.5 um, and < 10um [air, urban air close to ground]: 0 kg; pedigree (1,1,1,1,1)
  (same comment as for Methane, fossil)
- Strontium [water, surface water]: 0 kg; pedigree (1,1,1,1,1)
  (same comment as for DOC, Dissolved Organic Carbon)
- COD, Chemical Oxygen Demand [water, ground-, long-term]: 0 kg; pedigree (1,1,1,1,1)
  (same comment as for Chromium VI)
- Strontium [air, urban air close to ground]: 0 kg; pedigree (1,1,1,1,1)
  (same comment as for Sulfur dioxide)
- Dioxins, measured as 2,3,7,8-tetrachlorodibenzo-p-dioxin [air, urban air close to ground]: 0 kg; pedigree (1,1,1,1,1)
  (same comment as for Methane, fossil)
- Titanium, ion [water, surface water]: 0 kg; pedigree (1,1,1,1,1)
  (same comment as for DOC, Dissolved Organic Carbon)
- DOC, Dissolved Organic Carbon [water, ground-, long-term]: 0 kg; pedigree (1,1,1,1,1)
  (same comment as for Chromium VI)
- Titanium [air, urban air close to ground]: 0 kg; pedigree (1,1,1,1,1)
  (same comment as for Sulfur dioxide)
- Benzene [air, urban air close to ground]: 0 kg; pedigree (1,1,1,1,1)
  (same comment as for Methane, fossil)
- Thallium [water, surface water]: 0 kg; pedigree (1,1,1,1,1)
  (same comment as for DOC, Dissolved Organic Carbon)
- Sulfate [water, ground-, long-term]: 0 kg; pedigree (1,1,1,1,1)
  (same comment as for Chromium VI)
- Thallium [air, urban air close to ground]: 0 kg; pedigree (1,1,1,1,1)
  (same comment as for Sulfur dioxide)
- Toluene [air, urban air close to ground]: 0 kg; pedigree (1,1,1,1,1)
  (same comment as for Methane, fossil)
- Silicon [water, surface water]: 0 kg; pedigree (1,1,1,1,1)
  (same comment as for DOC, Dissolved Organic Carbon)
- Nitrate [water, ground-, long-term]: 0 kg; pedigree (1,1,1,1,1)
  (same comment as for Chromium VI)
- Silicon [air, urban air close to ground]: 0 kg; pedigree (1,1,1,1,1)
  (same comment as for Sulfur dioxide)
- Benzene, pentachloro- [air, urban air close to ground]: 0 kg; pedigree (1,1,1,1,1)
  (same comment as for Methane, fossil)
- Iron, ion [water, surface water]: 0 kg; pedigree (1,1,1,1,1)
  (same comment as for DOC, Dissolved Organic Carbon)
- Phosphate [water, ground-, long-term]: 0 kg; pedigree (1,1,1,1,1)
  (same comment as for Chromium VI)
- Iron [air, urban air close to ground]: 0 kg; pedigree (1,1,1,1,1)
  (same comment as for Sulfur dioxide)
- Benzene, hexachloro- [air, urban air close to ground]: 0 kg; pedigree (1,1,1,1,1)
  (same comment as for Methane, fossil)
- Calcium, ion [water, surface water]: 0 kg; pedigree (1,1,1,1,1)
  (same comment as for DOC, Dissolved Organic Carbon)
- Boron [water, ground-, long-term]: 0 kg; pedigree (1,1,1,1,1)
  (same comment as for Chromium VI)
- Calcium [air, urban air close to ground]: 0 kg; pedigree (1,1,1,1,1)
  (same comment as for Sulfur dioxide)
- Phenol, pentachloro- [air, urban air close to ground]: 0 kg; pedigree (1,1,1,1,1)
  (same comment as for Methane, fossil)
- Aluminium [water, surface water]: 0 kg; pedigree (1,1,1,1,1)
  (same comment as for DOC, Dissolved Organic Carbon)
- Chloride [water, ground-, long-term]: 0 kg; pedigree (1,1,1,1,1)
  (same comment as for Chromium VI)
- Aluminium [air, urban air close to ground]: 0 kg; pedigree (1,1,1,1,1)
  (same comment as for Sulfur dioxide)
- Heat, waste [air, urban air close to ground]: 0 MJ; pedigree (1,1,1,1,1)
  Waste heat generated from heating value of this waste plus any electricity required to process it.
  Uncertainty: uncertainty is calculated from uncertainties in waste composition and uncertainties in energy efficiency and the uncertainty in internal energy demand
- Potassium, ion [water, surface water]: 0 kg; pedigree (1,1,1,1,1)
  (same comment as for DOC, Dissolved Organic Carbon)
- Bromine [water, ground-, long-term]: 0 kg; pedigree (1,1,1,1,1)
  (same comment as for Chromium VI)
- Potassium [air, urban air close to ground]: 0 kg; pedigree (1,1,1,1,1)
  (same comment as for Sulfur dioxide)
- Benzo(a)pyrene [air, urban air close to ground]: 0 kg; pedigree (1,1,1,1,1)
  (same comment as for Methane, fossil)
- Magnesium [water, surface water]: 0 kg; pedigree (1,1,1,1,1)
  (same comment as for DOC, Dissolved Organic Carbon)
- Fluoride [water, ground-, long-term]: 0 kg; pedigree (1,1,1,1,1)
  (same comment as for Chromium VI)
- Magnesium [air, urban air close to ground]: 0 kg; pedigree (1,1,1,1,1)
  (same comment as for Sulfur dioxide)
- Heat, waste [water, surface water]: 0 MJ; pedigree (1,1,1,1,1)
  (same comment as for Heat, waste)
- Sodium, ion [water, surface water]: 0 kg; pedigree (1,1,1,1,1)
  (same comment as for DOC, Dissolved Organic Carbon)
- Silver, ion [water, ground-, long-term]: 0 kg; pedigree (1,1,1,1,1)
  (same comment as for Chromium VI)
- Sodium [air, urban air close to ground]: 0 kg; pedigree (1,1,1,1,1)
  (same comment as for Sulfur dioxide)
- Water [air, urban air close to ground]: 0 m3; pedigree (1,1,1,1,1)
  Water vapour from waste humidity, hydrogen oxidation and part of the process water.
  Uncertainty: Uncertainty calculated from uncertainty in waste composition, process water input and the uncertainty of fraction to air.
- Chromium, ion [water, surface water]: 0 kg; pedigree (1,1,1,1,1)
  (same comment as for DOC, Dissolved Organic Carbon)
- Arsenic, ion [water, ground-, long-term]: 0 kg; pedigree (1,1,1,1,1)
  (same comment as for Chromium VI)
- BOD5, Biological Oxygen Demand [water, surface water]: 0 kg; pedigree (1,1,1,1,1)
  (same comment as for DOC, Dissolved Organic Carbon)
- Carbon monoxide, fossil [air, urban air close to ground]: 0 kg; pedigree (1,1,1,1,1)
  (same comment as for Methane, fossil)
- BOD5, Biological Oxygen Demand [water, ground-, long-term]: 0 kg; pedigree (1,1,1,1,1)
  (same comment as for Chromium VI)
- Barium [water, ground-, long-term]: 0 kg; pedigree (1,1,1,1,1)
  (same comment as for Chromium VI)
- COD, Chemical Oxygen Demand [water, surface water]: 0 kg; pedigree (1,1,1,1,1)
  (same comment as for DOC, Dissolved Organic Carbon)
- Water [water, surface water]: 0 m3; pedigree (1,1,1,1,1)
  Process water released to surface water.
  Uncertainty: uncertainty calculated from uncertainty in process water input and the uncertainty of fraction to surface water.
- Cadmium, ion [water, ground-, long-term]: 0 kg; pedigree (1,1,1,1,1)
  (same comment as for Chromium VI)
- TOC, Total Organic Carbon [water, surface water]: 0 kg; pedigree (1,1,1,1,1)
  (same comment as for DOC, Dissolved Organic Carbon)
- Carbon dioxide, fossil [air, urban air close to ground]: 0 kg; pedigree (1,1,1,1,1)
  (same comment as for Sulfur dioxide)
- Cobalt [water, ground-, long-term]: 0 kg; pedigree (1,1,1,1,1)
  (same comment as for Chromium VI)
- Water [air, unspecified]: 3.01897e-6 m3; lognormal variance with pedigree 0.0807, pedigree (2,2,5,1,1)
  Calculated value based on literature values and expert opinion. See comments in the parametres' comment field.
