# leaching of spodumene with sulfuric acid

Dataset: EcoSpold 2, unit process
Geography: GLO
Time period: 2000-01-01 to 2019-12-31
Technology level: current
Classification: EcoSpold01Categories: chemicals/inorganics
Classification: ISIC rev.4 ecoinvent: 2011:Manufacture of basic chemicals
Tags: ConvertedDataset
Scenario: Business-as-Usual
System model: Allocation at the point of substitution
Share of production covered: 100 %
Generated by: Jürgen Sutter
Published in: Sutter, J. 2007
Database: ecoinvent
isCopyrightProtected: true
accessRestrictedTo: 1

## General comment
This dataset represents the sulfuric acid digestion of spodumene. The system includes the process with consumption of raw materials, energy, infrastructure, and land use, as well as the generation of emissions to air and water. It also includes transportation of the raw materials. Transient or unstable operations like starting-up or shutting-down, are not included, but the production during stable operation conditions. Storage and transportation of the final product are also not included. It is assumed that the manufacturing plants are located in an urban/industrial area and consequently the emissions are categorised as emanating in a high population density area. The emissions into water are assumed to be emitted into rivers. Within the sulfuric acid digestion of spodumene, lithium carbonate and sodium sulfate are derived as co-products
[This dataset was already contained in the ecoinvent database version 2. It was not individually updated during the transfer to ecoinvent version 3. Life Cycle Impact Assessment results may still have changed, as they are affected by changes in the supply chain, i.e. in other datasets. This dataset was generated following the ecoinvent quality guidelines for version 2. It may have been subject to central changes described in the ecoinvent version 3 change report (http://www.ecoinvent.org/database/ecoinvent-version-3/reports-of-changes/), and the results of the central updates were reviewed extensively. The changes added e.g. consistent water flows and other information throughout the database. The documentation of this dataset can be found in the ecoinvent reports of version 2, which are still available via the ecoinvent website. The change report linked above covers all central changes that were made during the conversion process.]

## Included activities start
From the reception of spodumene, sulfuric acid and sodium carbonate at the factory gate.

## Included activities end
This activity ends with the sulfuric acid digestion of spodumene including materials, energy uses, infrastructure and emissions.

## Geography
The inventory is modelled for the world..

## Technology
Sulfuric acid digestion of spodumene is the most important production process of lithium carbonate. The sulfuric acid digestion process can be used for all lithium ores. It is usually carried out at 250 – 400 °C, although 850 – 900 °C is recommended for amblygonite because this leads to the formation of insoluble aluminum phosphate which facilitates removal of the insoluble residue.
Sulfuric acid digestion gives a product that contains an insoluble residue, together with lithium sulfate which is leached from the crushed product with hot water. To remove alkaline-earth metals, aluminum, and iron, the solution is neutralized with lime and soda and then filtered. Lithium carbonate is precipitated by adding concentrated sodium carbonate solution. This is carried out near the boiling point, to take advantage of the decreasing solubility of lithium carbonate at higher temperature.
The sulfuric acid process gives good yields of lithium (ca. 90 %) and has a relatively favorable energy balance compared with other processes for the production of lithium compounds from ores.
Spodumene is first crushed to a particle size of 20 – 80 mm. Alternatively, flotation concentrate, which is already finely divided, is used. The crushed ore is fed into an oil-, coal-, or gas-fired rotary decrepitation kiln, which attains the required temperature (1050 – 1100 °C) over at least 10 m of its length. The spodumene takes ca. 4 h to pass through the rotary kiln, the dwell time in the decrepitation zone being 15 – 30 min, which results in practically complete transformation into β-spodumene.
The heat efficiency is improved by using a countercurrent flow of material and hot gas. The exhaust gases are used to preheat the ore, to heat the roasting furnace, and to concentrate the liquors by evaporation. The spodumene is quite hot as it leaves the rotary kiln, and sometimes a rotary cooler, which can also be used to preheat the combustion air, is necessary.
If the starting material is in lump form, the β-spodumene produced by decrepitation is crushed to a grain size of less than 0.1 mm. Sulfuric acid (93 %, in 35 % excess) is then added either by a mixer conveyor or by spraying onto a band conveyor fitted with a deflector plate. The digestion process, in which lithium in the ore is converted into soluble lithium sulfate, is carried out at ca. 250 °C in a lined rotary furnace or on a conveyor heated by exhaust gases, which carries the spodumene through a tunnel directly to the leaching stage. Digestion is usually complete in less than 1 h.
The lithium sulfate formed is leached out of the reaction product with hot water in Pachuca tanks agitated by compressed air or in stirred vessels. A continuous leaching process, in which the material and the water move countercurrently through several stirred vessels in series, has proved advantageous. After leaching, aluminum silicate residues are removed by a rotary vacuum filter, and the filtrate is treated with lime and soda to precipitate alkaline-earth metals and iron. After repeated filtration, the solution is neutralized with sulfuric acid. During neutralization and in the subsequent evaporation, which concentrates the solution to 200 – 250 g/L of lithium sulfate, aluminum hydroxide precipitates and is removed together with any purifying additives (e.g., activated charcoal).
The precipitation of lithium carbonate by concentrated sodium carbonate solution is carried out near the boiling point. Lithium carbonate is removed by filtration or centrifugation and washed with hot water to remove the adhering mother liquor (mainly sodium sulfate). It is then dried with a vacuum plate dryer, a band dryer, or a vacuum screw conveyor dryer.
2 LiAlSi2O6 + H2SO4 → Li2SO4 + H2O + Silcate residues
Li2SO4 + Na2CO3 → Li2CO3 + Na2SO4
The particle size of lithium carbonate depends strongly on the concentration during precipitation, the temperature, and the rate of addition of sodium carbonate.
Mother liquor from lithium carbonate precipitation always contains ca. 1 g of lithium per liter and is therefore recycled. Before the liquor is returned to the leaching stage, sodium sulfate is removed by crystallization at low temperature. This is a valuable byproduct and improves the economic viability of the process.
Wietelmann, U., Bauer, R.: Lithium and Lithium Compounds. Published online: 2000. In: Ullmann's Encyclopedia of Industrial Chemistry, Seventh Edition, 2004 Electronic Release (ed. Fiedler E., Grossmann G., Kersebohm D., Weiss G. and Witte C.). 7 th Electronic Release Edition. Wiley InterScience, New York, Online-Version under: http://www.mrw.interscience.wiley.com/emrw/9783527306732/home

## Time period
Time of publications.

## Parameters
- fraction, cooling water, cooling pond system, to air: 0.032; name fraction_CW_CP_to_air; lognormal variance with pedigree 0.0413, pedigree (2,3,1,3,1)
  Calculated based on literature value (Scown, C.D., 2011, Water Footprint of U.S. Transportation Fuels and supplying information of the article) (Vionnet, S., Quantis Water Database - Technical Report, 2012).
- fraction, cooling water, once-through system, to air: 0.004; name fraction_CW_OT_to_air; lognormal variance with pedigree 0.0413, pedigree (2,3,1,3,1)
  (same comment as for fraction, cooling water, cooling pond system, to air)
- fraction, cooling water, recirculating system, to air: 0.771; name fraction_CW_R_to_air; lognormal variance with pedigree 0.0413, pedigree (2,3,1,3,1)
  (same comment as for fraction, cooling water, cooling pond system, to air)
- fraction, cooling water, to air: 0.3875; name fraction_CW_to_air; = (0.5*fraction_CW_OT_to_air)+(0.5*fraction_CW_R_to_air); lognormal variance with pedigree 0.092025, pedigree (4,4,3,2,4)
  Calculated value based on literature value (see comments of the other parametres present in this dataset) and expert opinion. In the case when no industry/literature data are available about the type of cooling or directly fraction, cooling water, to air specific for the process a default assumption is applied. It is assumed that the once-through cooling system is used in 50% of all cases and recirculating system is used in another 50% of all cases.

## Reference product
- sodium sulfate, anhydrite: 1 kg; By-product classification allocatable product; CPC 34240: Phosphates of triammonium; salts and peroxysalts of inorganic acids and metals n.e.c.; CAS 7757-82-6
  EcoSpold01Location=GLO
  production volume 4.02869e6 kg
    Na
    Calculated relative to main product (Li2CO3)
  property price 0.191 EUR2005
    Temporary price data. Calculated as 90% of purchasers price based on: 2004 Import/Export data (total trades (USD) divided by total weight (kg) in EU27, USA, China, Japan and India) from UN Commodity Trade Statistics Database (http://data.un.org/Explorer.aspxDatabase [Accessed 2 July 2010]). Commodity: Sodium sulphates other than disodium sulphate
  property carbon content 0
    carbon content on a dry matter basis (reserved; not for manual entry)
  property true value 0.065618
    allocation property applied in "true value" allocation // value calculated from revenue
  properties: EcoSpold01Allocation_undefined_11 65.74, EcoSpold01Allocation_undefined_6 65.74, EcoSpold01Allocation_undefined_14 65.74, EcoSpold01Allocation_undefined_9 65.74, EcoSpold01Allocation_undefined_19 78.6425, EcoSpold01Allocation_undefined_18 78.6425, carbon content, fossil 0, carbon content, non-fossil 0, water content 0, water in wet mass 0 kg, dry mass 1 kg, wet mass 1 kg, EcoSpold01Allocation_undefined_17 100, EcoSpold01Allocation_undefined_3 65.74, EcoSpold01Allocation_undefined_12 65.74, EcoSpold01Allocation_undefined_7 65.74, EcoSpold01Allocation_undefined_10 65.74, EcoSpold01Allocation_undefined_13 65.74, EcoSpold01Allocation_undefined_16 65.74, EcoSpold01Allocation_undefined_15 65.74, EcoSpold01Allocation_undefined_8 65.74, EcoSpold01Allocation_undefined_5 65.74, EcoSpold01Allocation_undefined_4 65.74, EcoSpold01Allocation_undefined_2 65.74, carbon allocation 0 kg
- lithium carbonate: 0 kg; CPC 34240: Phosphates of triammonium; salts and peroxysalts of inorganic acids and metals n.e.c.; By-product classification allocatable product; CAS 554-13-2
  EcoSpold01Location=GLO
  Lithium carbonate crystallizes as colorless monoclinic prisms that melt with slight decomposition. The technical product is a fine white powder with a bulk density of ca. 0.8 kg/L. Lithium carbonate is only slightly soluble in water. Its solubility decreases with increasing temperature.
  Lithium carbonate is the starting material for the industrial production of all other lithium compounds and is itself used in industry in large quantities. It is an additive in glass, enamels, and ceramics (as are many lithium ores, e.g., spodumene and petalite). The lithium oxide generated by lithium carbonate is a very active flux for silica. It is increasingly replacing fluorspar (CaF2) for environmental reasons. Its function is generally based on reduction of melting point (particularly important for enamels), reduction of viscosity of molten glass (leading to higher throughput and smaller wall thickness), increased surface tension (giving improved reflectivity to enamels and glazes), and improved chemical resistance. Lithium aluminum silicates with compositions in the range LiAlSiO4- LiAlSi4O10 are produced that have extremely low or negative thermal expansion coefficients. These compounds and high-lithium glasses are used in heat-resistant ovenware.
  The addition of lithium carbonate to cement or concrete leads to quicker setting. Amounts of 1 - 5 % are used to control setting times. In quick-setting tile adhesives, lithium carbonate leads to faster adhesion of the tiles.
  Lithium carbonate is also used as an additive to molten salt baths for the electrolytic production of aluminum. It reacts with aluminum trifluoride in the melt to form lithium fluoride. The concentration used is 2 - 5 %, preferably 3.5 %, of lithium fluoride. The following effects are produced: reduction of melting point (by 10 - 25 °C), density, and viscosity of the melt and an increase in electrical conductivity of ca. 10 %. This results in a reduced operating temperature, reduction in fluorine emission (up to 50 %), and savings in energy (2 - 3 %) and anode carbon (ca. 2 %). It is possible to operate existing electrolytic cells at higher loading (ca. 10 %), thus increasing capacity without additional capital investment.
  Specially prepared high-purity lithium carbonate (conforming to the national pharmacopoeias, e.g., U.S.P., DAB, E.P., B.P., J.P.) is used increasingly for the treatment of manic-depressive conditions; daily doses of ca. 150 - 500 mg of lithium carbonate are used. The successful treatment of herpes, alcoholism, and cancer by lithium carbonate assisted chemotherapy has also been reported.
  Mixtures of lithium and potassium carbonate are used as electrolytes in molten carbonate fuel cells (MCFCs). The MCFCs operating at high temperatures (600 - 650 °C) are especially suited for modern coal-fired baseload electric utility plants and natural gas units. The high-quality waste heat can be used for industrial cogeneration or internal reforming.
  production volume 2.1e6 kg
    Na
    Mainly production in China. Calculated from the global amount of Li in spodumene (7.59E6 kg Li), subtracting the amount for frits and glass according to USGS (5.5E6 kg)
  property price 6.75 EUR2005
    For lithium, there is no exchange trading, no terminal storage market and only an extremely limited spot market (Reuters, 2016). The lithium price is negotiated bilateral and based on customer specifications with price information rarely publicly documented (European Lithium, 2017). Roskill Information Services estimate the price for technical grade lithium carbonate in 2017 between 6900 and 7800 USD per tonne, with a price premium of 500 USD for battery grade lithium (European Lithium, 2017). USGS estimates the price for lithium carbonate, battery grade, to be 7400USD in 2016 (USGS, 2017). Here an average price of 7500 USD per tonne lithium carbonate is assumed, average exchange rate 1 USD = 0.9 EUR in 2017 (Oanda, 2017). Resulting in a price for lithium carbonate of 6.75EUR/kg.
    Reference(s):
    European Lithium. 2017. Lithium Market. Online source: http://europeanlithium.com/lithium/lithium-market/, accessed 10 October 2017.
    Reuters. 2016. What price lithium, the metal of the future? Andy Home. Online source: https://www.reuters.com/article/us-lithium-batteries-ahome/what-price-lithium-the-metal-of-the-future-andy-home-idUSKCN0YS19D, accessed 10 October 2017.
    Oanda. 2017. https://www.oanda.com/lang/de/currency/average, accessed 10 October 2017.
    USGS. 2017. Lithium. Commodity Overview. Online https://minerals.usgs.gov/minerals/pubs/commodity/lithium/mcs-2017-lithi.pdf, accessed 10 October, 2017.
  property carbon content 0.16255
    carbon content on a dry matter basis (reserved; not for manual entry)
  property true value 1.20845
    allocation property applied in "true value" allocation // value calculated from revenue
  properties: EcoSpold01Allocation_undefined_18 21.3575, EcoSpold01Allocation_undefined_19 21.3575, carbon content, fossil 0.16255, carbon content, non-fossil 0, water content 0, water in wet mass 0 kg, dry mass 1 kg, wet mass 1 kg, EcoSpold01Allocation_undefined_4 34.26, EcoSpold01Allocation_undefined_5 34.26, EcoSpold01Allocation_undefined_15 34.26, EcoSpold01Allocation_undefined_13 34.26, EcoSpold01Allocation_undefined_9 34.26, EcoSpold01Allocation_undefined_6 34.26, EcoSpold01Allocation_undefined_16 34.26, EcoSpold01Allocation_undefined_10 34.26, EcoSpold01Allocation_undefined_7 34.26, EcoSpold01Allocation_undefined_2 34.26, EcoSpold01Allocation_undefined_12 34.26, EcoSpold01Allocation_undefined_3 34.26, EcoSpold01Allocation_undefined_1 100, EcoSpold01Allocation_undefined_14 34.26, EcoSpold01Allocation_undefined_8 34.26, EcoSpold01Allocation_undefined_11 34.26, carbon allocation 0.16255 kg

## Inputs from technosphere
- chemical factory, organics: 3.13364e-11 unit; lognormal variance with pedigree 0.448, pedigree (4,5,5,5,5)
  Estimation. The infrastructure is estimated based on the module "chemical plant, organics". This module assumes a built area of about 4.2 ha, an average output of 50'000 t/a, and plant life of fifty years.
  EcoSpold01Location=RER
  Uncertainty: Estimation
- inert waste, for final disposal: 0 kg; pedigree (1,1,1,1,1)
  EcoSpold01Location=CH
  Estimation. The silicate residues are calculated as "disposal, inert waste, 5% water, to inert material landfill".
  Uncertainty: Estimation
  production volume 0 kg
    Calculated from the production volume of lithium carbonate in proportion to the respective output amounts.
  properties: wet mass 1 kg, dry mass 0.995 kg, water content 0.00502513
- soda ash, light, crystalline, heptahydrate: 0.0404691 kg; source Wietelmann, U. 2004; lognormal variance with pedigree 0.044, pedigree (4,5,4,1,1)
  EcoSpold01Location=RER
  Stoechiometric calculation. The values for the consumption of the raw materials are calculated with an assumed yield of 95 %.
  Uncertainty: Stoechiometric calculation
  properties: carbon content, fossil 0.0517241, wet mass 1 kg, dry mass 1 kg
- sulfuric acid: 0 kg; source Wietelmann, U. 2004; pedigree (1,1,1,1,1)
  (same comment as for soda ash, light, crystalline, heptahydrate)
  properties: wet mass 1 kg, dry mass 1 kg
- electricity, medium voltage: 0.0219788 kWh; source Kim S. 2003; lognormal variance with pedigree 0.0401, pedigree (1,2,5,1,1)
  Literature value
  EcoSpold01Location=UCTE
  Uncertainty: Kim 2003
- heat, district or industrial, natural gas: 0.130047 MJ; source Kim S. 2003; lognormal variance with pedigree 0.0401, pedigree (1,2,5,1,1)
  Literature value
  EcoSpold01Location=RER
  Uncertainty: Kim 2003
- spodumene: 0.149913 kg; source Wietelmann, U. 2004; lognormal variance with pedigree 0.044, pedigree (4,5,4,1,1)
  EcoSpold01Location=RER
  Stoechiometric calculation. The use of spodume is calculated with a yield of 90%.
  Uncertainty: Stoechiometric calculation
  properties: wet mass 1 kg, dry mass 1 kg
- inert waste, for final disposal: -0.000786676, -0.120836 kg (2 entries); lognormal variance with pedigree 0.1786, pedigree (4,5,5,5,5)
  (same comment as for inert waste, for final disposal)
  production volume 9.51633e6 kg
- sulfuric acid: 0.00554865, 0.0318667 kg (2 entries); source Wietelmann, U. 2004; lognormal variance with pedigree 0.044, pedigree (4,5,4,1,1)
  (same comment as for soda ash, light, crystalline, heptahydrate)

## Inputs from nature
- Water, cooling, unspecified natural origin [natural resource, in water]: 0.00188021 m3; name water_cooling_UNO_input; source Gendorf 2000; lognormal variance with pedigree 0.198, pedigree (4,5,5,5,5)
  Estimation. This value was approximated with data from an large chemical plant site in Germany producing 2.05 Mt a-1 (intermediates included) of different chemicals.
  Uncertainty: Estimation

## Emissions to nature
- Sodium, ion [water, surface water]: 0.000878102 kg; lognormal variance with pedigree 0.798, pedigree (4,5,5,5,5)
  Estimation. The remaining amount of unreacted sulfuric acid and sodium carbonate (4.8 % of the input) is assumed to leave the production process with the waste water. The sulfuric acid is calculateds as sulfate emission.
  Uncertainty: Estimation
- Water [water, unspecified]: 0.00115163 m3; name water_to_water_unspecified; = water_cooling_UNO_input*(1-fraction_CW_to_air); lognormal variance with pedigree 0.0487, pedigree (2,2,4,1,1)
  Calculated value based on literature values and expert opinion. See comments in the parametres' comment field.
  property carbon content, non-fossil 0; name C_content_non_fossil
  property carbon content, fossil 0; name C_content_fossil
  property wet mass 1000 kg; name WM
  property fraction, origin: fresh water 0; name fraction_origin_fresh_water_Ww
  property fraction, origin: salt water 0; name fraction_origin_salt_water_Ww
  property fraction, origin: unspecified 1; name fraction_origin_unspecified_Ww
  property water in wet mass 1000 kg; name WWM
  property dry mass 0 kg; name DM
- Sulfate [water, surface water]: 0.00182894 kg; lognormal variance with pedigree 0.218, pedigree (4,5,5,5,5)
  (same comment as for Sodium, ion)
- Water [air, unspecified]: 0.000728582 m3; name water_to_air_unspecified; = (water_cooling_UNO_input*fraction_CW_to_air); lognormal variance with pedigree 0.0487, pedigree (2,2,4,1,1)
  (same comment as for Water)
  property fraction, origin: unspecified 1; name fraction_origin_unspecified
  property fraction, origin: salt water 0; name fraction_origin_salt_water
  property fraction, origin: fresh water 0; name fraction_origin_fresh_water
- Sulfate [air, urban air close to ground]: 3.66508e-6 kg; lognormal variance with pedigree 0.218, pedigree (4,5,5,5,5)
  Estimation. As approximation the air emissions occurring from the purge vent, the distillation vent and fugitive emission sources were estimated to 0.2% of the sulfuric acid input. It is calculated as sulfate emission.
  Uncertainty: Estimation
- Carbonate [water, surface water]: 0.00114535 kg; lognormal variance with pedigree 0.448, pedigree (4,5,5,5,5)
  (same comment as for Sodium, ion)

## Sampling procedure
Literature data

## Extrapolations
Energy consumptions and emissions are estimated. Infrastructure and transports are calculated with standard values.

## Review by Roland Hischier 2010-02-07
passed.
none

## Review by Roland Hischier 2011-09-23
Transfer of documentation done.
