# treatment of waste polyvinylchloride, municipal incineration

Dataset: EcoSpold 2, unit process
Geography: RoW
Time period: 2006-01-01 to 2019-12-31
Technology level: current
Classification: ISIC rev.4 ecoinvent: 3821:Treatment and disposal of non-hazardous waste
Synonyms: municipal waste incineration; Kehrichtverbrennung; Siedlungsabfallverbrennung
Scenario: Business-as-Usual
System model: Allocation at the point of substitution
Share of production covered: 1.8 %
Generated by: Gabor Doka
Published in: Doka G. 2013
Database: ecoinvent
isCopyrightProtected: true
accessRestrictedTo: 1

## General comment
This dataset represents the activity of waste disposal of waste polyvinylchloride in a municipal solid waste incinerator (MSWI) // Recommended use of this dataset: For PVC, which goes to disposal as part of communal waste mixture. Larger amounts of clean, separated PVC could go to recycling. // // Waste composition (wet, in ppm): upper heating value 21.67 MJ/kg; lower heating value 21.51 MJ/kg; H2O 2000; O 16911; H 54921; C 440610; S 1057; N 1057; P n.a.; B n.a.; Cl 475290; Br 73.839; F 15.506; I n.a.; Ag n.a.; As 2.0042; Ba 196.73; Cd 2.7546; Co 33.322; Cr 43.106; Cu 28.223; Hg 0.89569; Mn 84.301; Mo n.a.; Ni 21.729; Pb 16.002; Sb 45.323; Se 2.2152; Sn 391.41; V 303.95; Zn 59.775; Be 0.52742; Sc n.a.; Sr 93.353; Ti 1054.8; Tl 0.42194; W n.a.; Si n.a.; Fe 3930; Ca n.a.; Al 210.97; K n.a.; Mg n.a.; Na 1545.9; // Share of carbon in waste that is biogenic 0%. // Share of metals in waste not oxidised and bulk-recyclable (exclude very small or thin parts) Iron: 0%; Alu: 0%; Copper: 0%. // One kg of this waste produces 0.02801 kg of slag and 0.2282 kg of residues, which are landfilled. Additional solidification with 0.09127 kg of cement. // Net energy production: 2.21MJ/kg electric energy and 5.38MJ/kg thermal energy. // Recovery of metal scrap to recycling: 0g iron scrap, 0g aluminium scrap, 0g copper scrap.

## Included activities start
waste incineration from waste reception gate and delivery into waste bunker at incinerator plant site (without transports to the incinerator)

## Included activities end
Waste-specific short-term emissions to water from leachate. Long-term emissions from landfill to ground water.

## Geography
Specific to the technology mix encountered in Switzerland in 2010. Well applicable to modern incineration practices in Europe, North America or Japan.

## Technology
average Swiss MSWI plants in 2010 (grate incinerators) with electrostatic precipitator for fly ash (ESP), wet flue gas scrubber and 25% SNCR , 42.77% SCR-high dust , 32.68% SCR-low dust -DeNOx facilities and 0% without Denox (weighted according to mass of burnt waste, representing Swiss average). Efficiency of iron scrap separation from slag : 58%. Efficiency of non-ferrous scrap separation from slag : 31%. Gross electric efficiency technology mix 15.84% and Gross thermal efficiency technology mix 28.51%

## Time period
Waste composition as given in literature reference, theoretical data or other source. Transfer coefficients for modern MSWI.

## Reference product
- waste polyvinylchloride: 0 kg; By-product classification Waste; CPC 39270: Waste, parings and scrap of plastics; CAS 9002-86-2
  Main reference product of this activity (supply of disposal service).
  production volume 0 kg
    based on estimate on MSW in WTE globally, share of total plastic in MSW in top WTE countries and share of PVC plastic types from demand figures (APME 2011)
  property price 0 EUR2005
    Waste products are assigned a price of zero as they are assumed to require further treatment.
  property carbon content 0.440882
    carbon content on a dry matter basis (reserved; not for manual entry)
  properties: carbon content, non-fossil 0, water content 0.00200401, carbon content, fossil 0.440882, wet mass 1 kg, dry mass 0.998 kg, water in wet mass 0.002 kg, carbon allocation 0.44 kg
- heat, for reuse in municipal waste incineration only: 1 MJ; CPC 17300: Steam and hot water; By-product classification allocatable product; pedigree (1,1,1,1,1)
  Net electricity generated from this waste and used in internal MSWI plant energy redistribution.
  Uncertainty: uncertainty is calculated from uncertainties in waste composition and uncertainties in energy efficiency and the uncertainty in internal energy demand
  production volume 7.1263e9 MJ

## By-products
- electricity, for reuse in municipal waste incineration only: 0 kWh; name E_el_prod_MSWI; CPC 17100: Electrical energy; By-product classification allocatable product; pedigree (1,1,1,1,1)
  (same comment as for heat, for reuse in municipal waste incineration only)
  production volume 0 kWh
    calculated in proportion to reference product waste input to incinerator
  property true value relation 3.6; name E_el_prod_MSWI_true_value_relation
    property to calculate "true value" from
  property exergy 3.6 MJ; name E_el_prod_MSWI_exergy
    This exergy property is based on the exergy content of the product.
  property price 0.1 EUR2005; name E_el_prod_MSWI_price_EUR2005
    Estimated to be the same price as in case of electricity, medium voltage.
- heat, for reuse in municipal waste incineration only: 0 MJ; name E_th_prod_MSWI; CPC 17300: Steam and hot water; By-product classification allocatable product; pedigree (1,1,1,1,1)
  (same comment as for heat, for reuse in municipal waste incineration only)
  production volume 0 MJ
    calculated in proportion to reference product waste input to incinerator
  property exergy 0.1842 MJ; name E_th_prod_MSWI_exergy
    This exergy property is based on the exergy content of the product.
  property true value relation 0.1842; name E_th_prod_MSWI_true_value_relation
    property to calculate "true value" from
  property price 0.0106 EUR2005; name E_th_prod_MSWI_price_EUR2005
    Average European district heat price from Ecoheatcool and Euroheat 2005-2006, Ecoheat Work package 1: The European heat market. Final report. 10.6 EUR/GJ i s the price of district heat. http://www.solarthermalworld.org/files/Ecoheatcool%20WP1%20Web.pdf?download
## Inputs from technosphere
- chromium oxide, flakes: 0 kg; pedigree (1,1,1,1,1)
  Input to DeNOx stage.
  Uncertainty: uncertainty calculated from uncertainty in average DeNOx input, uncertainty in the share of thermal NOx, uncertainty of nitrogen content in average municipal waste and the uncertainty in nitrogen content in *this* waste.
  properties: dry mass 1 kg, wet mass 1 kg
- municipal waste incineration facility: 0 unit
  Demands per kilogram waste.
- residual material landfill: 0 unit; pedigree (1,1,1,1,1)
  Landfill infrastructure required for landfilling of incineration residues.
  Uncertainty: uncertainty is calculated from uncertainties in waste composition and transfer coefficients in incinerator
- sodium hydroxide, without water, in 50% solution state: 1.34767e-11 kg; lognormal variance with pedigree 0.018874, pedigree (1,1,3,1,1)
  Auxilliary inputs for the flue gas treatment stage of the incinerator plant.
  Uncertainty: uncertainty calculated from uncertainty in average NaOH input, of transfer coefficients in the incinerator, and the uncertainty of the waste composition of this waste
  properties: wet mass 1 kg, dry mass 1 kg
- ammonia, liquid: 0 kg; pedigree (1,1,1,1,1)
  Input to DeNOx stage (100% NH3).
  Uncertainty: uncertainty calculated from uncertainty in average DeNOx input, uncertainty in the share of thermal NOx, uncertainty of nitrogen content in average municipal waste and the uncertainty in nitrogen content in *this* waste.
  properties: dry mass 1 kg, wet mass 1 kg
- transport, freight, lorry, unspecified: 0, 0, 0 metric ton*km (3 entries); pedigree (1,1,1,1,1)
  Transport services to transport incineration residues to landfills.
  Uncertainty: uncertainty calculated from uncertainty of the waste composition of this waste, uncertainty of transfer coefficients and the uncertainty in generic transportation distances
- slag landfill: 0 unit; pedigree (1,1,1,1,1)
  Landfill infrastructure required for landfilling of bottom ash.
  Uncertainty: uncertainty is calculated from uncertainties in waste composition and transfer coefficients in incinerator
- cement, unspecified: 0 kg; pedigree (1,1,1,1,1)
  Cement required for solidification of landfilled residual material.
  Uncertainty: Uncertainty calculated from uncertainty of the waste composition of this waste, of transfer coefficients in the incinerator and of the solidification recipe.
  properties: wet mass 1 kg, dry mass 1 kg
- heat, district or industrial, natural gas: 0 MJ; pedigree (1,1,1,1,1)
  Input to DeNOx stage, to heat up flue gas in low-dust SCR.
  Uncertainty: uncertainty calculated from uncertainty in average DeNOx input, uncertainty in the share of thermal NOx, uncertainty of nitrogen content in average municipal waste and the uncertainty in nitrogen content in *this* waste.
- process-specific burdens, slag landfill: 0, 0, 0 kg (3 entries); pedigree (1,1,1,1,1)
  Mass-specific expenditures required for landfilling of bottom ash.
  Uncertainty: uncertainty is calculated from uncertainties in waste composition and transfer coefficients in incinerator
- iron (III) chloride, without water, in 40% solution state: 0 kg; pedigree (1,1,1,1,1)
  Auxilliary inputs for the wastewater treatment stage of the incinerator plant.
  Uncertainty: uncertainty calculated from uncertainty in average FeCl3 input, of transfer coefficients in the incinerator, and the uncertainty of the waste composition of this waste
  properties: dry mass 1 kg, wet mass 1 kg
- chemical, inorganic: 0 kg; pedigree (1,1,1,1,1)
  Auxilliary inputs for the wastewater treatment stage of the incinerator plant. Proxy for Polyelectrolyte.
  Uncertainty: uncertainty calculated from uncertainty in average Polyelectrolyte input, of transfer coefficients in the incinerator, and the uncertainty of the waste composition of this waste
  properties: carbon content, fossil 0.003, dry mass 1 kg, wet mass 1 kg
- chemical, organic: 0 kg; pedigree (1,1,1,1,1)
  Auxilliary inputs for the wastewater treatment stage of the incinerator plant. Proxy for (pure) Trisodium-trimercapto-s-triazine (CAS 17766-26-6), used as 15% diluted solution, aka TMT15.
  Uncertainty: uncertainty calculated from uncertainty in average TMT15 input, of transfer coefficients in the incinerator, and the uncertainty of the waste composition of this waste
  properties: dry mass 1 kg, carbon content, fossil 0.628, wet mass 1 kg
- water, decarbonised: 0, 0, 0, 0, 0, 0, 0, 0, 0, 0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 kg (13 entries); pedigree (1,1,1,1,1)
  Incinerator process water used in flue gas scrubber stage.
  Uncertainty: uncertainty calculated from uncertainty in average water input, and the uncertainty of the waste composition of this waste
  properties: wet mass 1 kg
- hydrochloric acid, without water, in 30% solution state: 0 kg; pedigree (1,1,1,1,1)
  Auxilliary inputs for the wastewater treatment stage of the incinerator plant.
  Uncertainty: uncertainty calculated from uncertainty in average HCl input, of transfer coefficients in the incinerator, and the uncertainty of the waste composition of this waste
  properties: dry mass 1 kg, wet mass 1 kg
- titanium dioxide: 0 kg; pedigree (1,1,1,1,1)
  Input to DeNOx stage (TiO2 catalyst carrier)
  Uncertainty: uncertainty calculated from uncertainty in average DeNOx input, uncertainty in the share of thermal NOx, uncertainty of nitrogen content in average municipal waste and the uncertainty in nitrogen content in *this* waste.
  properties: dry mass 1 kg, wet mass 1 kg
- quicklime, milled, packed: 0 kg; pedigree (1,1,1,1,1)
  Auxilliary inputs for the flue gas treatment stage of the incinerator plant.
  Uncertainty: uncertainty calculated from uncertainty in average CaO input, of transfer coefficients in the incinerator, and the uncertainty of the waste composition of this waste
  properties: water content 0.010101, dry mass 0.99 kg, wet mass 1 kg
- process-specific burdens, residual material landfill: 0, 0, 0 kg (3 entries); pedigree (1,1,1,1,1)
  Mass-specific expenditures required for landfilling of incineration residues.
  Uncertainty: uncertainty is calculated from uncertainties in waste composition and transfer coefficients in incinerator
- waste cement, hydrated: 0 kg; pedigree (1,1,1,1,1)
  Hydrated cement output for solidification of landfilled residual material.
  Uncertainty: Uncertainty calculated from uncertainty of the waste composition of this waste and transfer coefficients in the incinerator and of the solidification recipe.
  production volume 0 kg
    calculated in proportion to reference product waste input to incinerator
  properties: dry mass 1 kg, wet mass 1 kg
- cement, unspecified: 1.36826e-6, 1.00215e-7, 2.85647e-7, 6.57594e-6, 6.46e-6, 1.90137e-7, 2.08826e-6, 2.52656e-7, 2.822e-5 kg (9 entries); lognormal variance with pedigree 0.043655, pedigree (1,1,3,1,1)
  (same comment as for cement, unspecified)
- heat, district or industrial, natural gas: 1.77353e-5, 0.000209601, 0.00100267 MJ (3 entries); lognormal variance with pedigree 0.29126, pedigree (1,1,3,1,1)
  (same comment as for heat, district or industrial, natural gas)
- waste cement, hydrated: 0, 0 kg (2 entries); pedigree (1,1,1,1,1)
  (same comment as for waste cement, hydrated)
- refrigerator: 1.56931e-12 unit; lognormal variance with pedigree 0.302825, pedigree (1,4,2,2,2)
  Calculated value. Assumed average service life of a refrigerator is 10 years. Source: Xiao et al. 2015. A life-cycle assessment of household refrigerators in China. Journal of Cleaner Production, 95, 301-310
- television: 5.23103e-12 unit; lognormal variance with pedigree 0.302825, pedigree (1,4,2,2,2)
  Calculated value. Average service life of a television is assumed to be equal to 10 years. Source: Feng and Ma 2009. The energy consumption and environmental impacts of a color TV set in China. Journal of Cleaner Production, 17,13-25.
- cookstove: 1.04621e-12 unit; lognormal variance with pedigree 0.302825, pedigree (1,4,2,2,2)
  Calculated value. Assumed average service life of a cookstove is 15 years. Source: Jungbluth 1997. Life-Cycle-Assessment for Stoves and Ovens. UNS Working Paper No. 16, August 1997.
- wastewater, average: -3.79663e-8 m3; lognormal variance with pedigree 0.003425, pedigree (1,4,2,2,2)
  Calculated value. The amount of waste material is assumed to be equal to the amount of respective input material, tap water, with conversion from kg to m3. 1 m3 of water is assumed to be equal to 1000 kg of water.
  production volume 710411 m3
- computer, laptop: 3.2694e-12 unit; lognormal variance with pedigree 0.302825, pedigree (1,4,2,2,2)
  Calculated value. Assumed average service life of a computer is 4 years. Source: Choi et al. 2006. Life Cycle Assessment of a Personal Computer and its Effective Recycling Rate. Int J LCA, 11 (2), 122 - 128.
- water, completely softened: 8.99403e-10 kg; lognormal variance with pedigree 0.0454, pedigree (2,4,2,5,4)
  Calculated value. From the dataset for "cleaning consumables production" GLO 2011-2013, on average cleaning products contain 86% of water. Based on the literature source Golsteijn (2015) the dataset used to represent the water flow is "water, completely softened, at plant", version 2 dataset which corresponds to ecoinvent version 3 dataset "water, completely softened, from decarbonised waterm at user". The amount of water needed is therefore calculated based on the vale of 86% calculated based on Golsteijn (2015) and the amount of cleaning consumable which are expressed as 100% active substance.
  Laura Golsteijn, 2015, A compilation of life cycle studies for six household detergent product categories in Europe: the basis for product-specific A.I.S.E. Charter Advanced Sustainability Profiles
- textile, knit cotton: 1.30043e-9 kg; lognormal variance with pedigree 0.302825, pedigree (1,4,2,2,2)
  Calculated value. Represents here the total number of cotton-made linen units and cotton-made curtains used by the hotel. For linen, it is assumed that, on average, 4 linen units make 1 kg in weight. Source: Filimonau et al. 2011. Reviewing the carbon footprint analysis of hotels: Life Cycle Energy Analysis (LCEA) as a holistic method for carbon impact appraisal of tourist accommodation. Journal of Cleaner Production, 19, 1917-1930. Assumed average service life is 0.25 years. Source: TRSA 2015. Hospitality Textile Life, Loss and Replacement. Available from: http://www.laundrycompliance.com/wp-content/uploads/2016/02/trsa-hospitality-hotel-linen-loss.pdf Accessed 16 March 2018. For curtains, it is assumed that a curtain has a weight of 5 kg. Source: Furniture re-use Network, 2009. Average weights. Available from: http://democracy.york.gov.uk/documents/s2116/Annex%20C%20REcycling%20Report%20frnweights2005.pdf Accessed 13 January 2018. Average service life of a curtain is assumed to be equal to average service life of a carpet which is 10 years. Source: Greenspec 2018. While life costing: carpets. Available from: http://www.greenspec.co.uk/building-design/carpets/ Accessed 16 March 2018. The amount accounts for 10% fabric loss in the cotton textile manufacturing process. Source: Baydar, G., Ciliz, N., and Mammadov, A., 2015. Life cycle assessment of cotton textile products in Turkey. Journal of Cleaner Production, 104(A), 213-223.
- municipal solid waste: -1.95774e-6 kg; lognormal variance with pedigree 0.003425, pedigree (1,4,2,2,2)
  Calculated data. The amount of exchange is calculated as: amount of input product * (lifetime of the hotel) / (lifetime capacity).
  production volume 2.916e7 kg
- compact fluorescent bulb: 4.39882e-10 unit; lognormal variance with pedigree 0.302825, pedigree (1,4,2,2,2)
  Calculated value. Average service life of a bulb is assumed to be equal to 1.1 year. Source: Elijošiutė et al. 2012. Life Cycle Assessment of Compact Fluorescent and Incandescent Lamps: Comparative Analysis. Environmental Research, Engineering and Management, 3(61), 65-72.
- heat, district or industrial, other than natural gas: 0.000636886 MJ; lognormal variance with pedigree 0.302825, pedigree (1,4,2,2,2)
  Calculated value from liters of LPG. Assuming 1 liter of LPG is equal to 25 MJ. Source: LPG Gas Blog, 2018. LPG conversations. Available from: http://www.elgas.com.au/blog/389-lpg-conversions-kg-litres-mj-kwh-and-m3 Accessed 19 March 2018. LPG combines two instances of gas use in the hotel - gas for cooking and gas for heating.
- mattress: 5.75414e-11 unit; lognormal variance with pedigree 0.302825, pedigree (1,4,2,2,2)
  Calculated value. Average service life of a mattress is assumed to be equal to 5 years. Source: Traveller 2017. How often do hotels change their mattresses? Available from: http://www.traveller.com.au/everyone-asks-how-often-do-hotels-change-their-mattresses-guv2kt Accessed 16 March 2018.
- washing machine: 5.23103e-13 unit; lognormal variance with pedigree 0.302825, pedigree (1,4,2,2,2)
  Calculated value. Assumed average service life of a washing machine is 10 years. Source: Yuan et al. 2016. Life cycle assessment of horizontal-axis washing machines in China. Int J Life Cycle Assess, 21, 15-28
- waste textile, soiled: -1.45322e-9 kg; lognormal variance with pedigree 0.003425, pedigree (1,4,2,2,2)
  Calculated value. The amount of waste material is assumed to be equal to the amount of respective input material, textile, knit cotton.
  production volume 362459 kg
- electricity, low voltage: 6.38401e-8 kWh; lognormal variance with pedigree 0.302825, pedigree (1,4,2,2,2)
  Data from the hotel survey. The amount of exchange is calculated as: amount of input product * (lifetime of the hotel) / (number of guests during the lifetime of the hotel * hotel occupancy rate). The amount also includes electricity requirements to produce cotton textile products from raw cotton. It is estimated that 2 MJ of electricity is required to produce 1 kg of cotton textile product. This accounts for 10% fabric loss in the cotton textile manufacturing process. Source: Baydar, G., Ciliz, N., and Mammadov, A., 2015. Life cycle assessment of cotton textile products in Turkey. Journal of Cleaner Production, 104(A), 213-223.
- polyvinylchloride, bulk polymerised: 0.000305763 kg; lognormal variance with pedigree 0.003425, pedigree (1,4,2,2,2)
  Calculated value. Represents here pouffees used by the case study hotel that are made of PVC. Pouffee is assumed to have a weight of 5 kg. Source: Furniture re-use Network, 2009. Average weights. Available from: http://democracy.york.gov.uk/documents/s2116/Annex%20C%20REcycling%20Report%20frnweights2005.pdf Accessed 13 January 2018. Average service life of a pouffee is assumed to be equal to 15 years which is equal to service life for an average piece of furniture. Source: European Commission 2013. BACKGROUND REPORT. Revision of Ecolabel and Green Public Procurement criteria for the product group
  Wooden Furniture. September 2013. Available from: http://susproc.jrc.ec.europa.eu/furniture/docs/Background_report_Furniture_September_2013.pdf Accessed 19 March 2018.
- building, budget hotel: 3.48736e-14 unit; lognormal variance with pedigree 0.302825, pedigree (1,4,2,2,2)
  Calculated value. The amount of infrastructure required is calculated based on the lifetime capacity (see properties) of the budget hotel and the occupancy rate (see parameters).;activityLink introduced to establish a direct link to the corresponding regional supply of this product
- waste polyvinylchloride product: -1.56086e-6 kg; lognormal variance with pedigree 0.003425, pedigree (1,4,2,2,2)
  Calculated value representative of the amount of the input product, PVC.
  production volume 3888 kg
- non-ionic surfactant: 3.2694e-10 kg; lognormal variance with pedigree 0.302825, pedigree (1,4,2,2,2)
  Calculated value. Represents here laundry detergent. In terms of outputs assumed to have gone to wastewater.
- steel, low-alloyed, hot rolled: 0.000243201 kg; lognormal variance with pedigree 0.302825, pedigree (1,4,2,2,2)
  Calculated value. Represents here all chairs used across the hotel that are made of steel. Steel chair (unit) is assumed to have a weight of 12 kg, Furniture re-use Network, 2009. Average weights. Available from: http://democracy.york.gov.uk/documents/s2116/Annex%20C%20REcycling%20Report%20frnweights2005.pdf Accessed 13 January 2018. Acerage service life is assumed to be 15 years. This represents service life of an average piece of furniture. Source: European Commission 2013. BACKGROUND REPORT. Revision of Ecolabel and Green Public Procurement criteria for the product group
  Wooden Furniture. September 2013. Available from: http://susproc.jrc.ec.europa.eu/furniture/docs/Background_report_Furniture_September_2013.pdf Accessed 19 March 2018.
- dryer: 2.09241e-13 unit; source Ardente, F. 2015; lognormal variance with pedigree 0.302825, pedigree (1,4,2,2,2)
  Calculated value. Assumed average service life of a dryer is 12.5 years. The amount of exchange is calculated as: amount of input product * (lifetime of the hotel/lifetime of the product) / (lifetime capacity). Source: Ardente F., and Talens Peiró L. 2015. Environmental Footprint and Material Efficiency Support for Product Policy - Report on Benefits and Impacts/costs of Options for Different Potential Material Efficiency Requirements for Dishwashers. JRC Science and Policy Report EUR27200EN. European Commission, March 2015. Available from: http://publications.jrc.ec.europa.eu/repository/bitstream/JRC95187/lb-na-27200-en-n.pdf Accessed 14 January 2018
- furniture, wooden: 9.22231e-10 kg; lognormal variance with pedigree 0.302825, pedigree (1,4,2,2,2)
  Estimated value. Assumed average service life of all pieces of furniture is 15 years. This represents service life of an average piece of furniture. Source: European Commission 2013. BACKGROUND REPORT. Revision of Ecolabel and Green Public Procurement criteria for the product group Wooden Furniture. September 2013. Available from: http://susproc.jrc.ec.europa.eu/furniture/docs/Background_report_Furniture_September_2013.pdf Accessed 19 March 2018.
  This exchange represents the following: Bed single (unit). Assumed to have a weight of 21 kg, no headboard, Furniture re-use Network, 2009. Average weights. Available from: http://democracy.york.gov.uk/documents/s2116/Annex%20C%20REcycling%20Report%20frnweights2005.pdf Accessed 13 January 2018. Bed king/queen (unit). King bed is assumed to have a weight of 30 kg, no headboard, Furniture re-use Network, 2009. Average weights. Available from: http://democracy.york.gov.uk/documents/s2116/Annex%20C%20REcycling%20Report%20frnweights2005.pdf Accessed 13 January 2018. Sofa (unit). Sofa is assumed to have a weight of 37 kg, two seater, Furniture re-use Network, 2009. Average weights. Available from: http://democracy.york.gov.uk/documents/s2116/Annex%20C%20REcycling%20Report%20frnweights2005.pdf Accessed 13 January 2018. Table / desk (unit). Table unit is assumed to have a weight of 23 kg, Furniture re-use Network, 2009. Average weights. Available from: http://democracy.york.gov.uk/documents/s2116/Annex%20C%20REcycling%20Report%20frnweights2005.pdf Accessed 13 January 2018. Chair (unit). Chair is assumed to have a weight of 7 kg, Furniture re-use Network, 2009. Average weights. Available from: http://democracy.york.gov.uk/documents/s2116/Annex%20C%20REcycling%20Report%20frnweights2005.pdf Accessed 13 January 2018. Wardrobe (unit). Wardrobe is assumed to have a weight of 55 kg, double wardrobe, Furniture re-use Network, 2009. Average weights. Available from: http://democracy.york.gov.uk/documents/s2116/Annex%20C%20REcycling%20Report%20frnweights2005.pdf Accessed 13 January 2018. Furniture is combined across all instances of use within the hotel building.
- vacuum cleaner: 3.2694e-13 unit; lognormal variance with pedigree 0.302825, pedigree (1,4,2,2,2)
  Estimated value. No primary data on the number of vacuum cleaners in use by the case study hotel but assumed that at least one vacuum cleaner is present for housekeeping purposes. Assumed average service life of a vacuum cleaner is 8 years. Source: Gallego-Schmid et al. 2016. Life cycle environmental impacts of vacuum cleaners and the effects of European regulation. Science of the Total Environment, 559, 192-203.
- scrap steel: -0.000167743 kg; lognormal variance with pedigree 0.003425, pedigree (1,4,2,2,2)
  Calculated value. Represents here scrap steel from furniture. The amount is set equivalent to the amount of input material.
  production volume 6998.4 kg
- cleaning consumables, without water, in 13.6% solution state: 1.41573e-10 kg; lognormal variance with pedigree 0.302825, pedigree (1,4,2,2,2)
  Calculated value. Combined of all instances of use across the hotel operations. Represents the following cleaning luquids: window cleaner, bleach, washing up liquid, insect killer, pine disinfector, odour eliminator. In terms of outputs assumed to have gone to wastewater. As the product "cleaning consumables" is expressed as 100% active substance, the amount of cleaning consumables is multiplied by the average concentration of active substance. According to Golsteijn (2015) the average water content of cleaning consumables is 86.4%, the necessary water input is accounted for with the flow "water, compeltely softened, from decarbonised water, at user". For more information on how the cleaning consumables dataset was created please refer to the relevant dataset in ecoinvent.
  2015, Laura Golsteijn, A compilation of life cycle studies for six household detergent product categories in Europe: the basis for product-specific A.I.S.E. Charter Advanced Sustainability Profiles
- tap water: 7.09242e-6 kg; lognormal variance with pedigree 0.302825, pedigree (1,4,2,2,2)
  No data on the amount of water used was provided by the case study hotel. Hence, the data from the hotel of the same type (budget) but based in Rio de Janeiro (Brazil) were used as proxy with appropriate adjustments made to reflect the difference in occupancy (56% in the case of a budget hotel in Brazil compared to 30% in the case of a budget hotel in Peru).
- tissue paper: 3.00719e-9 kg; lognormal variance with pedigree 0.302825, pedigree (1,4,2,2,2)
  Calculated value from meters to kg. Assuming a roll of 25 meters weights 250 g, so 1 kg of tissue paper is equal to 100 meters. Source: Sainsburys 2018. Andrex Toilet Paper. Available from: https://www.sainsburys.co.uk/webapp/wcs/stores/servlet/gb/groceries/andrex-toilet-tissue--classic-white-16x241-sheets?langId=44&storeId=10151&krypto=6KE3AoChB8jlwzzYGlgparsN%2BBruZBOjUaSVm%2BCnwAT0LLJPLAalDm9DhCtUDzK5uFGmUkJJ%2FMIaDVx%2BGRGKIHdBUxaNbCTzmIQiBcpr497qZYrRt4Kvvy%2BLLO40d8j3%2BY4eQ%2Fk%2BK4BXsq0FOjWLrDLelOp5CVxrDysmNwGM26k%3D&ddkey=https%3Agb%2Fgroceries%2Fandrex-toilet-tissue--classic-white-16x241-sheets Accessed 16 January 2018. In terms of outputs, assumed to have gone to wastewater.
- microwave oven: 6.53879e-13 unit; lognormal variance with pedigree 0.302825, pedigree (1,4,2,2,2)
  Calculated value. Assumed average service life of a microwave oven is 8 years. Source: Gallego-Schmid et al. 2018. Environmental assessment of microwaves and the effect of European energy efficiency and waste management legislation. Science of the Total Environment, 618, 487-499.
- coffee maker: 5.23103e-13 unit; lognormal variance with pedigree 0.302825, pedigree (1,4,2,2,2)
  Calculated value. Assumed average service life of a coffee maker is 5 years. Source: Ashby 2009. Materials and the Environment: Eco-Informed Material Choice. Elsevier, Burlington, USA.
- soap: 1.54655e-9 kg; lognormal variance with pedigree 0.302825, pedigree (1,4,2,2,2)
  Calculated value. Represents all toiletries provided in guest rooms (soap, shampoo, shower gel and body lotion). The amount of luquid toiletries (shampoo and shower gel) is converted from the consumption volume expressed in ml, assuming 1 liter of shampoo and shower gel is equal to 1 kg of shampoo and shower gel. In terms of outputs assumed to have gone to wastewater.
- aluminium, wrought alloy: 8.65445e-6 kg; lognormal variance with pedigree 0.0192, pedigree (2,5,4,5,1)
  Extrapolated value based on the dataset "pump production, 40W, CH" (accessed on the 2017-11-14).
- polyvinylchloride, suspension polymerised: 7.36726e-5 kg; lognormal variance with pedigree 0.0192, pedigree (2,5,4,5,1)
  (same comment as for aluminium, wrought alloy)
- steel, chromium steel 18/8, hot rolled: 6.07274e-5 kg; lognormal variance with pedigree 0.0192, pedigree (2,5,4,5,1)
  (same comment as for aluminium, wrought alloy)
- copper: 3.96166e-5 kg; lognormal variance with pedigree 0.0192, pedigree (2,5,4,5,1)
  (same comment as for aluminium, wrought alloy)
- cast iron: 5.64502e-5 kg; lognormal variance with pedigree 0.0192, pedigree (2,5,4,5,1)
  (same comment as for aluminium, wrought alloy)
- heat, district or industrial, natural gas: 0.000138482 MJ; lognormal variance with pedigree 0.2106, pedigree (5,5,5,5,5)
  Proxy value, taken from the dataset "heat pump production, brine-water, 10kW, CH" (accessed on the 2017-11-14).
- synthetic rubber: 7.13222e-7 kg; lognormal variance with pedigree 0.0192, pedigree (2,5,4,5,1)
  (same comment as for aluminium, wrought alloy)
- hot water tank factory: 1.0602e-11 unit; lognormal variance with pedigree 0.478, pedigree (5,5,4,5,5)
  Value copied from the dataset "pump production, 40W, CH" (accessed on the 2017-11-14).
- polyvinylchloride, emulsion polymerised: 1.07205e-5 kg; lognormal variance with pedigree 0.0192, pedigree (2,5,4,5,1)
  (same comment as for aluminium, wrought alloy)
- electricity, medium voltage: 7.15247e-5 kWh; lognormal variance with pedigree 0.2106, pedigree (5,5,5,5,5)
  (same comment as for heat, district or industrial, natural gas)
- aluminium scrap, post-consumer: -1.04771e-5 kg; lognormal variance with pedigree 0.0192, pedigree (2,5,4,5,1)
  Calculated based on the input of aluminium.
  production volume 2.07957e7 kg
- waste rubber, unspecified: -2.99985e-7, -1.09445e-8, -3.24346e-7 kg (3 entries); lognormal variance with pedigree 0.0192, pedigree (2,5,4,5,1)
  Calculated based on the input of rubber.
  production volume 7.28269e6 kg
- scrap steel: -1.13933e-5, -5.60406e-6 kg (2 entries); lognormal variance with pedigree 0.0192, pedigree (2,5,4,5,1)
  Calculated based on the input of steel.
  production volume 9.57443e8 kg
- scrap copper: -1.92764e-6, -8.87214e-8, -4.29652e-6 kg (3 entries); lognormal variance with pedigree 0.0192, pedigree (2,5,4,5,1)
  Calculated based on the input of copper.
  production volume 2.60156e8 kg
- waste polyvinylchloride product: -5.86062e-7, -3.09789e-9 kg (2 entries); lognormal variance with pedigree 0.0192, pedigree (2,5,4,5,1)
  Calculated based on the input of PVC.
  production volume 3.12211e7 kg
- sawnwood, softwood, dried (u=10%), planed: 3.51839e-9 m3; lognormal variance with pedigree 0.1406, pedigree (2,5,5,5,4)
  EcoSpold01Location=RER
  Uncertainty: ;
- flat glass, coated: 1.06162e-6 kg; lognormal variance with pedigree 0.1406, pedigree (2,5,5,5,4)
  EcoSpold01Location=RER
  Uncertainty: ;
- stone wool, packed: 2.93613e-7 kg; lognormal variance with pedigree 0.1406, pedigree (2,5,5,5,4)
  EcoSpold01Location=CH
  Uncertainty: ;
- waste brick: -1.52779e-5 kg; lognormal variance with pedigree 0.1406, pedigree (2,5,5,5,4)
  EcoSpold01Location=CH
  Uncertainty: ;
  production volume 534 kg
- reinforcing steel: 0.000315543 kg; lognormal variance with pedigree 0.1406, pedigree (2,5,5,5,4)
  EcoSpold01Location=RER
  Uncertainty: ;
- waste glass sheet: -4.28315e-7 kg; lognormal variance with pedigree 0.1406, pedigree (2,5,5,5,4)
  EcoSpold01Location=CH
  Uncertainty: ;
  production volume 9.24 kg
- waste mineral wool: -5.61792e-6 kg; lognormal variance with pedigree 0.1406, pedigree (2,5,5,5,4)
  EcoSpold01Location=CH
  Uncertainty: ;
  production volume 3.9 kg
- packaging film, low density polyethylene: 5.40906e-8 kg; lognormal variance with pedigree 0.1406, pedigree (2,5,5,5,4)
  EcoSpold01Location=RER
  Uncertainty: ;
- waste reinforced concrete: -0.000257861 kg; lognormal variance with pedigree 0.1406, pedigree (2,5,5,5,4)
  EcoSpold01Location=CH
  Uncertainty: ;
  production volume 717 kg
- extrusion, plastic film: 9.75865e-5 kg; lognormal variance with pedigree 0.1406, pedigree (2,5,5,5,4)
  EcoSpold01Location=RER
  Uncertainty: ;
- clay brick: 1.46018e-5 kg; lognormal variance with pedigree 0.1406, pedigree (2,5,5,5,4)
  EcoSpold01Location=RER
  Uncertainty: ;
- waste sealing sheet, polyethylene: -5.27474e-8 kg; lognormal variance with pedigree 0.1406, pedigree (2,5,5,5,4)
  EcoSpold01Location=CH
  Uncertainty: ;
  production volume 2.775 kg
- waste cement in concrete and mortar: -1.65877e-5 kg; lognormal variance with pedigree 0.1406, pedigree (2,5,5,5,4)
  EcoSpold01Location=CH
  Uncertainty: ;
  production volume 185.1 kg
- waste bulk iron, excluding reinforcement: -2.85363e-6 kg; lognormal variance with pedigree 0.1406, pedigree (2,5,5,5,4)
  EcoSpold01Location=CH
  Uncertainty: ;
  production volume 51 kg
- diesel, burned in building machine: 0.000237337 MJ; lognormal variance with pedigree 0.1406, pedigree (2,5,5,5,4)
  EcoSpold01Location=GLO
  Uncertainty: ;
- electricity, medium voltage: 1.7536e-5, 3.19081e-6, 5.41113e-5, 0.000784557, 0.000112285, 0.000367891 kWh (6 entries); lognormal variance with pedigree 0.1406, pedigree (2,5,5,5,4)
  EcoSpold01Location=UCTE
  Uncertainty: ;
- waste wood, untreated: -3.02511e-7, -3.30004e-8, -2.4127e-9, -9.26881e-8, -1.40029e-8, -2.21375e-8, -3.69973e-6 kg (7 entries); lognormal variance with pedigree 0.1406, pedigree (2,5,5,5,4)
  EcoSpold01Location=CH
  Uncertainty: ;
  production volume 92.4 kg
- concrete, normal: 1.38048e-7, 1.00151e-8, 8.10792e-8, 4.56071e-8, 3.01278e-6, 6.51426e-9, 3.90047e-7 m3 (7 entries); lognormal variance with pedigree 0.1406, pedigree (2,5,5,5,4)
  EcoSpold01Location=CH
  Uncertainty: ;
- cement mortar: 2.31481e-8, 4.60069e-6 kg (2 entries); lognormal variance with pedigree 0.1406, pedigree (2,5,5,5,4)
  EcoSpold01Location=CH
  Uncertainty: ;
- glass wool mat: 7.5625e-6 kg; lognormal variance with pedigree 0.0546, pedigree (2,4,5,5,1)
  EcoSpold01Location=CH
  Questionnaire
  Uncertainty: Questionnaire
- wastewater, from residence: -3.05273e-7 m3; lognormal variance with pedigree 0.0546, pedigree (2,4,5,5,1)
  Questionnaire
  EcoSpold01Location=CH
  Uncertainty: Questionnaire
  production volume 1.851 m3
- sawnwood, softwood, dried (u=20%), planed: 1.02981e-8 m3; lognormal variance with pedigree 0.0546, pedigree (2,4,5,5,1)
  Packaging, information by Wagner
  EcoSpold01Location=RER
  Uncertainty: Packaging, information by Wagner
- welding, gas, steel: 2.91227e-6 m; lognormal variance with pedigree 0.0546, pedigree (2,4,5,5,1)
  Questionnaire
  EcoSpold01Location=RER
  Uncertainty: Questionnaire
- alkyd paint, white, without solvent, in 60% solution state: 4.65683e-7 kg; lognormal variance with pedigree 0.0546, pedigree (2,4,5,5,1)
  Questionnaire
  EcoSpold01Location=RER
  Uncertainty: Questionnaire
- waste plastic, mixture: -5.94564e-6, -3.97265e-7, -3.00445e-8, -1.64085e-7, -6.62883e-8, -1.55814e-7, -1.51649e-7, -4.93462e-5 kg (8 entries); lognormal variance with pedigree 0.0546, pedigree (2,4,5,5,1)
  Questionnaire, packaging wastes
  EcoSpold01Location=CH
  Uncertainty: Questionnaire, packaging wastes
  production volume 11.58 kg
- heat, district or industrial, other than natural gas: 2.85365e-7, 1.31759e-5 MJ (2 entries); lognormal variance with pedigree 0.0546, pedigree (2,4,5,5,1)
  Questionnaire for 2000l storage
  EcoSpold01Location=CH
  Uncertainty: Questionnaire for 2000l storage
- tap water: 4.19101e-6, 6.39547e-5, 6.92634e-6, 0.00148934, 0.000174655, 1.29242e-5, 0.0154832 kg (7 entries); lognormal variance with pedigree 0.0546, pedigree (2,4,5,5,1)
  Questionnaire
  EcoSpold01Location=RER
  Uncertainty: Questionnaire
- electricity, low voltage: 6.63428e-7, 1.16357e-7, 2.63898e-6, 3.73528e-6, 1.91337e-6, 2.89358e-5, 4.76954e-6, 1.35859e-5 kWh (8 entries); lognormal variance with pedigree 0.0546, pedigree (2,4,5,5,1)
  EcoSpold01Location=CH
  Questionnaire for 2000l storage
  Uncertainty: Questionnaire for 2000l storage
- electricity, medium voltage: 7.11503e-6, 2.42156e-5 kWh (2 entries); lognormal variance with pedigree 0.0546, pedigree (2,4,5,5,1)
  (same comment as for heat, district or industrial, other than natural gas)
- waste mineral wool: -2.27336e-6 kg; lognormal variance with pedigree 0.0546, pedigree (2,4,5,5,1)
  Questionnaire
  EcoSpold01Location=CH
  Uncertainty: Questionnaire
  production volume 60 kg
- stone wool: 4.21111e-8 kg; lognormal variance with pedigree 0.0421, pedigree (1,2,5,5,1)
  EcoSpold01Location=CH
- polypropylene, granulate: 9.17659e-6 kg; lognormal variance with pedigree 0.0421, pedigree (1,2,5,5,1)
  EcoSpold01Location=RER
- glass fibre: 9.44095e-6 kg; lognormal variance with pedigree 0.0421, pedigree (1,2,5,5,1)
  EcoSpold01Location=RER
- lean concrete: 6.84799e-9 m3; lognormal variance with pedigree 0.0421, pedigree (1,2,5,5,1)
  EcoSpold01Location=CH
- polystyrene foam slab: 1.27151e-8 kg; lognormal variance with pedigree 0.0421, pedigree (1,2,5,5,1)
  EcoSpold01Location=RER
- zinc coat, coils: 5.1351e-5 m2; lognormal variance with pedigree 0.0421, pedigree (1,2,5,5,1)
  EcoSpold01Location=RER
- flat glass, uncoated: 8.48212e-6 kg; lognormal variance with pedigree 0.0421, pedigree (1,2,5,5,1)
  EcoSpold01Location=RER
- excavation, skid-steer loader: 4.80802e-8 m3; lognormal variance with pedigree 0.0421, pedigree (1,2,5,5,1)
  EcoSpold01Location=RER
- aluminium, cast alloy: 5.04533e-6 kg; lognormal variance with pedigree 0.0421, pedigree (1,2,5,5,1)
  EcoSpold01Location=RER
- zinc coat, pieces: 3.15972e-8 m2; lognormal variance with pedigree 0.0421, pedigree (1,2,5,5,1)
  EcoSpold01Location=RER
- excavation, hydraulic digger: 4.79544e-5 m3; lognormal variance with pedigree 0.0421, pedigree (1,2,5,5,1)
  EcoSpold01Location=RER
- sheet rolling, steel: 0.000270497 kg; lognormal variance with pedigree 0.0421, pedigree (1,2,5,5,1)
  EcoSpold01Location=RER
- sanitary ceramics: 3.03135e-7 kg; lognormal variance with pedigree 0.0421, pedigree (1,2,5,5,1)
  EcoSpold01Location=CH
- waste bitumen sheet: -3.8699e-9 kg; lognormal variance with pedigree 0.0421, pedigree (1,2,5,5,1)
  EcoSpold01Location=CH
  production volume 0.792 kg
- fibre cement facing tile: 6.30745e-7 kg; lognormal variance with pedigree 0.0421, pedigree (1,2,5,5,1)
  EcoSpold01Location=CH
- gravel, round: 0.000206267 kg; lognormal variance with pedigree 0.0421, pedigree (1,2,5,5,1)
  EcoSpold01Location=CH
- glass fibre reinforced plastic, polyester resin, hand lay-up: 2.75424e-5 kg; lognormal variance with pedigree 0.0421, pedigree (1,2,5,5,1)
  EcoSpold01Location=RER
- fibre cement corrugated slab: 1.10821e-7 kg; lognormal variance with pedigree 0.0421, pedigree (1,2,5,5,1)
  EcoSpold01Location=CH
- polyurethane, rigid foam: 2.26394e-6 kg; lognormal variance with pedigree 0.0421, pedigree (1,2,5,5,1)
  EcoSpold01Location=RER
- polyethylene, high density, granulate: 5.47023e-5 kg; lognormal variance with pedigree 0.0421, pedigree (1,2,5,5,1)
  EcoSpold01Location=RER
- waste polyurethane foam: -5.78092e-8 kg; lognormal variance with pedigree 0.0421, pedigree (1,2,5,5,1)
  EcoSpold01Location=CH
  production volume 13.44 kg
- waste glass sheet: -6.55739e-8 kg; lognormal variance with pedigree 0.0421, pedigree (1,2,5,5,1)
  EcoSpold01Location=CH
  production volume 73.8 kg
- pitch: 4.10324e-9, 2.33851e-10, 1.35972e-8, 1.05841e-8, 4.74421e-10, 6.77281e-10, 5.98328e-8 kg (7 entries); lognormal variance with pedigree 0.0421, pedigree (1,2,5,5,1)
  EcoSpold01Location=CH
- waste bulk iron, excluding reinforcement: -8.20736e-7 kg; lognormal variance with pedigree 0.0421, pedigree (1,2,5,5,1)
  EcoSpold01Location=CH
  production volume 215.7 kg
- waste concrete, not reinforced: -4.09998e-5, -0.000585139 kg (2 entries); lognormal variance with pedigree 0.0421, pedigree (1,2,5,5,1)
  EcoSpold01Location=CH
  production volume 1143 kg
- waste reinforced concrete: -1.68981e-5 kg; lognormal variance with pedigree 0.0421, pedigree (1,2,5,5,1)
  EcoSpold01Location=CH
  production volume 11100 kg
- waste polyethylene/polypropylene product: -2.60867e-7, -6.61332e-7 kg (2 entries); lognormal variance with pedigree 0.0421, pedigree (1,2,5,5,1)
  EcoSpold01Location=CH
  production volume 6.06 kg
- waste glass: -1.48826e-6, -8.69152e-8, -1.97181e-9, -8.10906e-9, -1.23141e-8, -3.62851e-8, -4.68709e-10, -8.88706e-6 kg (8 entries); lognormal variance with pedigree 0.0421, pedigree (1,2,5,5,1)
  EcoSpold01Location=CH
  production volume 0.723 kg
- waste cement in concrete and mortar: -5.15527e-6 kg; lognormal variance with pedigree 0.0421, pedigree (1,2,5,5,1)
  EcoSpold01Location=CH
  production volume 798 kg
- waste wood, untreated: -1.09422e-7 kg; lognormal variance with pedigree 0.0421, pedigree (1,2,5,5,1)
  EcoSpold01Location=CH
  production volume 192 kg
- cement, Portland: 2.51411e-7, 8.10692e-9, 1.40502e-8, 1.15253e-8, 2.42909e-7, 2.81287e-7, 1.18399e-8, 1.65433e-6 kg (8 entries); lognormal variance with pedigree 0.0421, pedigree (1,2,5,5,1)
  EcoSpold01Location=CH
- waste polystyrene isolation, flame-retardant: -2.73528e-8, -6.93431e-8 kg (2 entries); lognormal variance with pedigree 0.0421, pedigree (1,2,5,5,1)
  EcoSpold01Location=CH
  production volume 21.75 kg
- waste brick: -6.75182e-8 kg; lognormal variance with pedigree 0.0421, pedigree (1,2,5,5,1)
  EcoSpold01Location=CH
  production volume 1143 kg
- kraft paper, unbleached: 2.52802e-8 kg; lognormal variance with pedigree 0.0421, pedigree (1,2,5,5,1)
  EcoSpold01Location=RER
- glued laminated timber, for indoor use: 8.81866e-12 m3; lognormal variance with pedigree 0.0421, pedigree (1,2,5,5,1)
  EcoSpold01Location=RER
- epoxy resin, liquid: 5.29693e-8 kg; lognormal variance with pedigree 0.0421, pedigree (1,2,5,5,1)
  EcoSpold01Location=RER
- welding, arc, steel: 5.31118e-8 m; lognormal variance with pedigree 0.0726, pedigree (2,4,5,5,3)
  EcoSpold01Location=RER
  Data from 250kWel plant adapted, assumption for material type
  Uncertainty: data from 250kWel plant adapted, assumption for material type
- sheet rolling, chromium steel: 7.24486e-6 kg; lognormal variance with pedigree 0.0726, pedigree (2,4,5,5,3)
  Data from 250kWel plant adapted, assumption for process used
  EcoSpold01Location=RER
  Uncertainty: data from 250kWel plant adapted, assumption for process used
- transport, passenger car: 3.37895e-5 km; lognormal variance with pedigree 0.2, pedigree (4,4,5,5,3)
  EcoSpold01Location=CH
  Estimation
  Uncertainty: estimation
- building, multi-storey: 2.27965e-9 m3; lognormal variance with pedigree 0.372, pedigree (4,4,5,5,1)
  EcoSpold01Location=RER
  Rough estimation based on company data
  Uncertainty: rough estimation based on company data
- sheet rolling, aluminium: 9.58963e-7 kg; lognormal variance with pedigree 0.0726, pedigree (2,4,5,5,3)
  EcoSpold01Location=RER
  Data from 250kWel plant adapted, assumption for process used
  Uncertainty: data from 250kWel plant adapted, assumption for process used
- iron-nickel-chromium alloy: 5.01703e-7 kg; lognormal variance with pedigree 0.0726, pedigree (2,4,5,5,3)
  EcoSpold01Location=RER
  Data from 250kWel plant adapted
  Uncertainty: data from 250kWel plant adapted
- building, hall, steel construction: 4.97383e-10 m2; lognormal variance with pedigree 0.372, pedigree (4,4,5,5,1)
  Rough estimation based on company data
  EcoSpold01Location=CH
  Uncertainty: rough estimation based on company data
- construction work, heat and power co-generation unit, 160kW electrical: 5.31118e-9 unit; lognormal variance with pedigree 0.3726, pedigree (2,4,5,5,3)
  EcoSpold01Location=RER
  Data from 160 kWel engine cogen plant adapted
  Uncertainty: data from 160 kWel engine cogen plant adapted
- heat, central or small-scale, other than natural gas: 1.12723e-6, 7.88601e-5 MJ (2 entries); lognormal variance with pedigree 0.064, pedigree (3,4,5,5,3)
  EcoSpold01Location=CH
  Estimation based on specific energy demand of engineering hours
  Uncertainty: estimation based on specific energy demand of engineering hours
- tin: 6.16134e-7 kg; lognormal variance with pedigree 0.0546, pedigree (2,4,5,5,1)
  EcoSpold01Location=RER
  Data from pilot plant design
  Uncertainty: data from pilot plant design
- inert waste, for final disposal: -1.50653e-6 kg; lognormal variance with pedigree 0.072, pedigree (4,4,5,5,1)
  Based on material input of ceramic parts
  EcoSpold01Location=CH
  Uncertainty: based on material input of ceramic parts
  production volume 1.575 kg
- zinc: 4.63172e-9 kg; lognormal variance with pedigree 0.0546, pedigree (2,4,5,5,1)
  (same comment as for tin)
- lead: 3.23351e-8 kg; lognormal variance with pedigree 0.0546, pedigree (2,4,5,5,1)
  (same comment as for tin)
- wire drawing, copper: 2.20349e-5 kg; lognormal variance with pedigree 0.0546, pedigree (2,4,5,5,1)
  Based on material input
  EcoSpold01Location=RER
  Uncertainty: based on material input
- heating and sanitary equipment, mini CHP plant: 1.35631e-8 unit; lognormal variance with pedigree 0.39, pedigree (4,4,5,5,3)
  Approximation based on similar process
  EcoSpold01Location=CH
  Uncertainty: approximation based on similar process
- nickel, 99.5%: 2.59784e-8 kg; lognormal variance with pedigree 0.0546, pedigree (2,4,5,5,1)
  Data from pilot plant design
  EcoSpold01Location=GLO
  Uncertainty: data from pilot plant design
- ceramic tile: 9.53467e-8 kg; lognormal variance with pedigree 0.072, pedigree (4,4,5,5,1)
  Estimation
  EcoSpold01Location=CH
  Uncertainty: estimation
- spiral-seam duct, steel, DN 400: 1.45493e-8 m; lognormal variance with pedigree 0.0446, pedigree (2,4,5,5,1)
  EcoSpold01Location=RER
  Questionnaire, Data related to building considered
  Uncertainty: Questionnaire, Data related to building considered
- used air filter in exhaust air valve: -1.56289e-8 unit; lognormal variance with pedigree 0.0446, pedigree (2,4,5,5,1)
  Questionnaire, Data related to building considered
  EcoSpold01Location=CH
  Uncertainty: Questionnaire, Data related to building considered
  production volume 71.394 unit
- outside air intake, stainless steel, DN 370: 3.37261e-10 unit; lognormal variance with pedigree 0.0446, pedigree (2,4,5,5,1)
  Questionnaire, Data related to building considered
  EcoSpold01Location=RER
  Uncertainty: Questionnaire, Data related to building considered
- silencer, steel, DN 315, 50 mm: 4.2356e-10 unit; lognormal variance with pedigree 0.0446, pedigree (2,4,5,5,1)
  (same comment as for used air filter in exhaust air valve)
- used blower and heat exchange unit central, 600-1200 m3/h: -2.1178e-10 unit; lognormal variance with pedigree 0.0446, pedigree (2,4,5,5,1)
  (same comment as for used air filter in exhaust air valve)
  production volume 3.96633 unit
- air filter, central unit, 600 m3/h: 4.2356e-10 unit; lognormal variance with pedigree 0.0446, pedigree (2,4,5,5,1)
  (same comment as for spiral-seam duct, steel, DN 400)
- used exhaust air valve in-wall housing, plastic/steel: -1.56289e-8 unit; lognormal variance with pedigree 0.0446, pedigree (2,4,5,5,1)
  (same comment as for used air filter in exhaust air valve)
  production volume 71.394 unit
- polyethylene pipe, DN 200, SDR 41: 4.04713e-8 m; lognormal variance with pedigree 0.0446, pedigree (2,4,5,5,1)
  (same comment as for outside air intake, stainless steel, DN 370)
- flexible duct, aluminium/PET, DN of 125: 1.26537e-8 m; lognormal variance with pedigree 0.0446, pedigree (2,4,5,5,1)
  (same comment as for outside air intake, stainless steel, DN 370)
- used silencer steel, DN 315: -4.2356e-10 unit; lognormal variance with pedigree 0.0446, pedigree (2,4,5,5,1)
  EcoSpold01Location=CH
  Questionnaire, Data related to building considered
  Uncertainty: Questionnaire, Data related to building considered
  production volume 7.93266 unit
- polyethylene pipe, corrugated, DN 75: 1.88468e-7 m; lognormal variance with pedigree 0.0446, pedigree (2,4,5,5,1)
  (same comment as for spiral-seam duct, steel, DN 400)
- exhaust air roof hood, steel, DN 400: 3.37261e-10 unit; lognormal variance with pedigree 0.042, pedigree (1,1,5,5,1)
  2,4,1,1,1,nA; Questionnaire, Data related to building considered
  EcoSpold01Location=CH
- exhaust air valve, in-wall housing, plastic/steel, DN 125: 1.56289e-8 unit; lognormal variance with pedigree 0.0446, pedigree (2,4,5,5,1)
  (same comment as for used silencer steel, DN 315)
- ventilation control and wiring, central unit: 2.1178e-10 unit; lognormal variance with pedigree 0.0446, pedigree (2,4,5,5,1)
  (same comment as for spiral-seam duct, steel, DN 400)
- used air filter central unit, 600 m3/h: -4.2356e-10 unit; lognormal variance with pedigree 0.0446, pedigree (2,4,5,5,1)
  (same comment as for used air filter in exhaust air valve)
  production volume 7.93266 unit
- air distribution terminal panel, steel, 120 m3/h: 1.04192e-8 unit; lognormal variance with pedigree 0.0446, pedigree (2,4,5,5,1)
  (same comment as for used air filter in exhaust air valve)
- used ventilation control and wiring central unit: -2.1178e-10 unit; lognormal variance with pedigree 0.0446, pedigree (2,4,5,5,1)
  (same comment as for used air filter in exhaust air valve)
  production volume 3.96633 unit
- used outside air intake stainless steel, DN 370: -3.37261e-10 unit; lognormal variance with pedigree 0.0446, pedigree (2,4,5,5,1)
  (same comment as for used air filter in exhaust air valve)
  production volume 3.96633 unit
- blower and heat exchange unit, central, 600-1200 m3/h: 2.12938e-10 unit; lognormal variance with pedigree 0.0446, pedigree (2,4,5,5,1)
  (same comment as for spiral-seam duct, steel, DN 400)
- sealing tape, aluminium/PE, 50 mm wide: 3.72204e-7 m; lognormal variance with pedigree 0.0446, pedigree (2,4,5,5,1)
  (same comment as for outside air intake, stainless steel, DN 370)
- used exhaust air roof hood steel, DN 400: -3.37261e-10 unit; lognormal variance with pedigree 0.0446, pedigree (2,4,5,5,1)
  (same comment as for used silencer steel, DN 315)
  production volume 3.96633 unit
- used silencer steel, DN 125: -1.82971e-8 unit; lognormal variance with pedigree 0.0446, pedigree (2,4,5,5,1)
  (same comment as for used air filter in exhaust air valve)
  production volume 47.596 unit
- silencer, steel, DN 125: 1.82971e-8 unit; lognormal variance with pedigree 0.0446, pedigree (2,4,5,5,1)
  (same comment as for used air filter in exhaust air valve)
- supply air inlet, steel/SS, DN 75: 2.60481e-8 unit; lognormal variance with pedigree 0.0446, pedigree (2,4,5,5,1)
  (same comment as for spiral-seam duct, steel, DN 400)
- used room-connecting overflow element steel, approx. 40 m3/h: -1.56289e-8 unit; lognormal variance with pedigree 0.0446, pedigree (2,4,5,5,1)
  (same comment as for used air filter in exhaust air valve)
  production volume 71.394 unit
- used air distribution terminal panel steel, 120 m3/h: -1.04192e-8 unit; lognormal variance with pedigree 0.0446, pedigree (2,4,5,5,1)
  (same comment as for used air filter in exhaust air valve)
  production volume 47.596 unit
- used flexible duct aluminium/PET, DN of 125: -1.26537e-8 m; lognormal variance with pedigree 0.0446, pedigree (2,4,5,5,1)
  (same comment as for used silencer steel, DN 315)
  production volume 39.6633 m
- air filter, in exhaust air valve: 1.56289e-8 unit; lognormal variance with pedigree 0.0446, pedigree (2,4,5,5,1)
  (same comment as for outside air intake, stainless steel, DN 370)
- used sealing tape aluminium/PE, 50 mm wide: -3.72204e-7 m; lognormal variance with pedigree 0.0446, pedigree (2,4,5,5,1)
  (same comment as for used air filter in exhaust air valve)
  production volume 793.266 m
- used insulation spiral-seam duct rockwool, DN 400: -9.25485e-9 m; lognormal variance with pedigree 0.0446, pedigree (2,4,5,5,1)
  (same comment as for used air filter in exhaust air valve)
  production volume 79.3266 m
- insulation spiral-seam duct, rockwool, DN 400, 30 mm: 9.25485e-9 m; lognormal variance with pedigree 0.0446, pedigree (2,4,5,5,1)
  (same comment as for outside air intake, stainless steel, DN 370)
- room-connecting overflow element, steel, approx. 40 m3/h: 1.56289e-8 unit; lognormal variance with pedigree 0.0446, pedigree (2,4,5,5,1)
  (same comment as for spiral-seam duct, steel, DN 400)
- spiral-seam duct, steel, DN 125: 1.04192e-8 m; lognormal variance with pedigree 0.0446, pedigree (2,4,5,5,1)
  (same comment as for outside air intake, stainless steel, DN 370)
- ventilation duct, steel, 100x50 mm: 2.38259e-7 m; lognormal variance with pedigree 0.0446, pedigree (2,4,5,5,1)
  (same comment as for outside air intake, stainless steel, DN 370)
- ventilation duct, elbow 90°, steel, 100x50 mm: 9.05386e-8 unit; lognormal variance with pedigree 0.0446, pedigree (2,4,5,5,1)
  (same comment as for spiral-seam duct, steel, DN 400)
- ventilation duct, connection piece, steel, 100x50 mm: 5.95649e-8 unit; lognormal variance with pedigree 0.0446, pedigree (2,4,5,5,1)
  (same comment as for spiral-seam duct, steel, DN 400)
- used ventilation control and wiring decentralized unit: -3.93894e-9 unit; lognormal variance with pedigree 0.0446, pedigree (2,4,5,5,1)
  (same comment as for used silencer steel, DN 315)
  production volume 23.798 unit
- ventilation control and wiring, decentralized unit: 3.93894e-9 unit; lognormal variance with pedigree 0.0446, pedigree (2,4,5,5,1)
  (same comment as for spiral-seam duct, steel, DN 400)
- used air filter decentralized unit, 180-250 m3/h: -7.87788e-9 unit; lognormal variance with pedigree 0.0446, pedigree (2,4,5,5,1)
  (same comment as for used silencer steel, DN 315)
  production volume 47.596 unit
- air filter, decentralized unit, 180-250 m3/h: 7.87788e-9 unit; lognormal variance with pedigree 0.0446, pedigree (2,4,5,5,1)
  (same comment as for outside air intake, stainless steel, DN 370)
- used blower and heat exchange unit decentralized, 180-250 m3/h: -3.93894e-9 unit; lognormal variance with pedigree 0.0446, pedigree (2,4,5,5,1)
  (same comment as for used air filter in exhaust air valve)
  production volume 23.798 unit
- blower and heat exchange unit, decentralized, 180-250 m3/h: 3.93894e-9 unit; lognormal variance with pedigree 0.0446, pedigree (2,4,5,5,1)
  (same comment as for spiral-seam duct, steel, DN 400)
- exhaust air outlet, steel/aluminium, 85x365 mm: 6.3721e-9 unit; lognormal variance with pedigree 0.0446, pedigree (2,4,5,5,1)
  (same comment as for used silencer steel, DN 315)
- plastic processing factory: 4.6991e-14 unit; lognormal variance with pedigree 0.3112, pedigree (1,4,4,4,2)
  Used here in place of infrastructure based on the amount of the largest contributor to the final product mass (polypropylene). This is an estimated value. According to the technology comment of the dataset 'Plastic processing factory construction, GLO' [accessed 19.01.2018], the life time of the tanks is assumed to be 50 years and the annual production is 27000 t/a. Thus, the estimated lifetime output of the factory is 27000 x 50 = 1350000. As the coffee machine mass is 1.9 kg, then the number of coffee machines produced during the lifetime of the factory is 1350000 / 0.0019 = 710526316 units. The calculation of the infrastructure is therefore 1/life time capacity = 1/710526316 unit.
- steel, low-alloyed: 0.000459255 kg; lognormal variance with pedigree 0.0118, pedigree (1,4,4,4,2)
  Data are from Ashby 2009.
- electronic component, passive, unspecified: 1.79272e-6 kg; lognormal variance with pedigree 0.0118, pedigree (1,4,4,4,2)
  Data are from Ashby 2009. In terms of outputs, assumed to have gone to scrap copper.
- waste polypropylene: -2.04524e-7, -1.57676e-8, -6.51258e-9, -6.18431e-9, -2.73426e-7, -2.63101e-9, -1.55426e-9, -1.87662e-6 kg (8 entries); lognormal variance with pedigree 0.0118, pedigree (1,4,4,4,2)
  Data are from Ashby 2009. The amount is set equal to the input amount for the respective material. In addition, contains waste phenol.
  production volume 3.0304e6 kg
- scrap aluminium: -6.28671e-7, -2.94936e-8, -1.3296e-6 kg (3 entries); lognormal variance with pedigree 0.0118, pedigree (1,4,4,4,2)
  Data are from Ashby 2009. The amount is set equal to the input amount for the respective material.
  production volume 256000 kg
- brass: 3.54723e-10, 2.52545e-7 kg (2 entries); lognormal variance with pedigree 0.0118, pedigree (1,4,4,4,2)
  In terms of outputs, assumed to have gone to scrap copper. Data are from Ashby 2009.
- waste polyvinylchloride: -5.68151e-7, -1.01612e-6, -4.19694e-7, -3.98539e-7, -1.57627e-5, -1.69552e-7, -8.11399e-8, -0.000390989 kg (8 entries); lognormal variance with pedigree 0.0118, pedigree (1,4,4,4,2)
  (same comment as for scrap aluminium)
  production volume 384000 kg
- waste glass: -1.78878e-6 kg; lognormal variance with pedigree 0.0118, pedigree (1,4,4,4,2)
  (same comment as for scrap aluminium)
  production volume 1.056e6 kg
- phenol: 6.33632e-9, 3.016e-8 kg (2 entries); lognormal variance with pedigree 0.0118, pedigree (1,4,4,4,2)
  Used here in place of phenolic polymers. In terms of outputs, assumed to have gone to waste polypropylene. Data are from Ashby 2009.
- integrated circuit, logic type: 1.80697e-7 kg
  Value from literature: Ramroth, L. 2008. Comparison of Life-Cycle Analyses of Compact Fluorescent and Incandescent Lamps Based on Rated Life of Compact Fluorescent Lamp. Retrieved from: http://infohouse.p2ric.org/ref/47/46011.pdf, accessed 20180614
- waste electric and electronic equipment: -2.99029e-6 kg
  The amount is set equal to the input amount for the inputs of electronics, i.e. integrated circuit, printed wiring board and electrode.
  production volume 20358 kg
- mercury: 6.36255e-10 kg; lognormal variance with pedigree 0.0118, pedigree (1,4,4,4,2)
  (same comment as for integrated circuit, logic type)
- acrylonitrile-butadiene-styrene copolymer: 5.73456e-7 kg
  (same comment as for integrated circuit, logic type)
- electricity, high voltage: 1.99882e-5 kWh; lognormal variance with pedigree 0.0118, pedigree (1,4,4,4,2)
  (same comment as for integrated circuit, logic type)
- foam glass: 3.81753e-7 kg
  (same comment as for integrated circuit, logic type)
- flat glass factory: 1.18476e-14 unit; lognormal variance with pedigree 0.3112, pedigree (1,4,4,4,2)
  (same comment as for integrated circuit, logic type)
- electrode, negative, Ni: 2.03602e-7 kg
  (same comment as for integrated circuit, logic type)
- printed wiring board, surface mounted, unspecified, Pb containing: 5.0908e-7 kg
  (same comment as for integrated circuit, logic type)
- flat glass, uncoated: 1.74606e-6 kg; lognormal variance with pedigree 0.0118, pedigree (1,4,4,4,2)
  (same comment as for integrated circuit, logic type)
- scrap tin sheet: -9.09037e-9, -6.01715e-7 kg (2 entries); lognormal variance with pedigree 0.0118, pedigree (1,4,4,4,2)
  The amount is set equal to the input amount for the respective material.
  production volume 13920 kg
- metal working factory: 1.97029e-14 unit; lognormal variance with pedigree 0.3438, pedigree (2,4,5,4,2)
  Estimated value.The input of infrastructure is approximated with the exchange 'metal working factory', this was chosen as metal is the main material constituting the final product. The general comment for the activity 'metal working faculty, GLO' [accessed 19.01.2018] specifies: '4.58E-10 units of this process are needed to produce 1 kg of final product. Additionally, the dataset for 'metal working factory' needs to be used together with the 'energy and auxilliary inputs, metal working factory', 1 kg of this exchange is required per 1 kg of final product.
- waste paint: -7.4935e-9, -1.74217e-11, -7.97907e-8 kg (3 entries); lognormal variance with pedigree 0.0444, pedigree (2,4,5,4,2)
  The amount is set equal to the input amount for the respective material. Data from Jungbluth 1997.
  production volume 2.718e8 kg
- energy and auxilliary inputs, metal working factory: 3.59256e-15, 1.61103e-14 kg (2 entries); lognormal variance with pedigree 0.0444, pedigree (2,4,5,4,2)
  (same comment as for metal working factory)
- alkyd paint, white, without solvent, in 60% solution state: 3.00653e-8 kg; lognormal variance with pedigree 0.0444, pedigree (2,4,5,4,2)
  Data from Jungbluth 1997.
- waste mineral wool: -4.41142e-11 kg; lognormal variance with pedigree 0.0444, pedigree (2,4,5,4,2)
  The amount is set equal to the input amount for the respective material. Data from Jungbluth 1997. Contains waste glass wool mat.
  production volume 4.1525e7 kg
- used printed wiring boards: -6.2561e-8 kg; lognormal variance with pedigree 0.0438, pedigree (1,4,5,4,2)
  The amount is set equal to the input amount for the respective material. Data are from Fulvio and Peiro 2015.
  production volume 1.2e6 kg
- printed wiring board, surface mounted, unspecified, Pb free: 6.26368e-8 kg; lognormal variance with pedigree 0.0438, pedigree (1,4,5,4,2)
  Data are from Fulvio and Peiro 2015.
- cable, unspecified: 3.56414e-7 kg; lognormal variance with pedigree 0.0438, pedigree (1,4,5,4,2)
  This product represents average, unspecified cable. Data are from Fulvio and Peiro 2015.
- concrete, normal: 7.25856e-9 m3; lognormal variance with pedigree 0.0438, pedigree (1,4,5,4,2)
  Contains 'concrete' and 'other inert material' as decribed in the original literature source. Converted from kg (1.4 kg). Assumed density is 2371 kg/m3. Data are from Fulvio and Peiro 2015.
- used cable: -3.56414e-7 kg; lognormal variance with pedigree 0.0438, pedigree (1,4,5,4,2)
  (same comment as for used printed wiring boards)
  production volume 1.8e7 kg
- waste concrete: -0.000428372, -1.1141e-7, -0.000530299 kg (3 entries); lognormal variance with pedigree 0.0438, pedigree (1,4,5,4,2)
  Contains 'concrete' and 'other inert material' as decribed in the original literature source. The amount is set equal to the input amount for the respective material. Data are from Fulvio and Peiro 2015.
  production volume 3.36e7 kg
- plywood, for indoor use: 1.89413e-10, 1.75644e-9 m3 (2 entries); lognormal variance with pedigree 0.0438, pedigree (1,4,5,4,2)
  Data are from Fulvio and Peiro 2015. Used here to describe all 'wood' and 'other organic materials' as presented in the original literature source as presented in the original literature source. Convertion to volume from mass (3.7 kg) assuming wood density 600 kg/m3.
- waste wood, untreated: -1.0884e-7 kg; lognormal variance with pedigree 0.0438, pedigree (1,4,5,4,2)
  Used here to describe all waste from 'wood' and 'other organic materials' as presented in the original literature source. The amount is set equal to the input amount for the respective material. Data are from Fulvio and Peiro 2015.
  production volume 8.88e7 kg
- electricity, low voltage: 4.28191e-9 kWh; lognormal variance with pedigree 0.0035, pedigree (1,4,2,3,2)
  Data from Marcinkowski and Zych 2017
- waste, from silicon wafer production: -8.20959e-9 kg; lognormal variance with pedigree 0.0035, pedigree (1,4,2,3,2)
  Data from Marcinkowski and Zych 2017. The amount is set equal to the input amount for the respective material.
  production volume 4.63345e6 kg
- nickel smelter slag: -2.46926e-8 kg; lognormal variance with pedigree 0.0035, pedigree (1,4,2,3,2)
  (same comment as for waste, from silicon wafer production)
  production volume 1.23432e7 kg
- polyethylene, low density, granulate: 1.33058e-5 kg; lognormal variance with pedigree 0.0035, pedigree (1,4,2,3,2)
  Data from Marcinkowski and Zych 2017
- textile, jute: 1.55072e-10 kg; lognormal variance with pedigree 0.0035, pedigree (1,4,2,3,2)
  Data from Marcinkowski and Zych 2017
- chromium: 5.46731e-9 kg; lognormal variance with pedigree 0.0035, pedigree (1,4,2,3,2)
  Data from Marcinkowski and Zych 2017. In terms of outputs assumed to have gone to scrap steel.
- silicone product: 2.94658e-8, 4.47621e-8 kg (2 entries); lognormal variance with pedigree 0.0035, pedigree (1,4,2,3,2)
  Data from Marcinkowski and Zych 2017
- compressed air, 800 kPa gauge: 6.68362e-8, 1.64249e-7 m3 (2 entries); lognormal variance with pedigree 0.0035, pedigree (1,4,2,3,2)
  Data from Marcinkowski and Zych 2017
- polyvinylidenchloride, granulate: 8.15839e-9, 1.40476e-5 kg (2 entries); lognormal variance with pedigree 0.0035, pedigree (1,4,2,3,2)
  Data from Marcinkowski and Zych 2017
- waste polyethylene: -3.11636e-8, -9.42805e-8, -3.89412e-8, -3.69783e-8, -1.9568e-6, -1.57318e-8, -1.24037e-8, -1.31518e-5 kg (8 entries); lognormal variance with pedigree 0.0035, pedigree (1,4,2,3,2)
  (same comment as for waste, from silicon wafer production)
  production volume 236640 kg
- waste textile, soiled: -2.28681e-12 kg; lognormal variance with pedigree 0.0035, pedigree (1,4,2,3,2)
  (same comment as for waste, from silicon wafer production)
  production volume 87522 kg
- medium density fibreboard: 9.07545e-10 m3; lognormal variance with pedigree 0.0064, pedigree (2,4,3,4,2)
  In terms of outputs, assumed to have gone to waste wood, unsorted. Data are from Miljogiraff 2015.
- seal, natural rubber based: 6.44237e-8 kg; lognormal variance with pedigree 0.0064, pedigree (2,4,3,4,2)
  Data are from Miljogiraff 2015.
- lubricating oil: 3.09149e-7, 2.42069e-6 kg (2 entries); lognormal variance with pedigree 0.0064, pedigree (2,4,3,4,2)
  Used here in place of hydraulic oil. Data are from Miljogiraff 2015.
- waste mineral oil: -2.51535e-7, -5.70754e-9, -7.36331e-7 kg (3 entries); lognormal variance with pedigree 0.0064, pedigree (2,4,3,4,2)
  Used here in place of wasted hydraulic oil. The amount is set equal to the input amount for the respective material. Data are from Miljogiraff 2015.
  production volume 1.05996e8 kg
- polycarbonate: 2.5106e-6 kg; lognormal variance with pedigree 0.0118, pedigree (1,4,4,4,2)
  Data are from Ashby 2009.
- glass fibre reinforced plastic, polyamide, injection moulded: 6.37772e-7 kg; lognormal variance with pedigree 0.0118, pedigree (1,4,4,4,2)
  Used here to describe nylons (PA). Data are from Ashby 2009.
- aluminium, primary, ingot: 2.54782e-8, 3.66883e-9 kg (2 entries); lognormal variance with pedigree 0.0118, pedigree (1,4,4,4,2)
  Data are from Ashby 2009.
- waste plastic, industrial electronics: -5.91964e-10, -6.7222e-8 kg (2 entries); lognormal variance with pedigree 0.0118, pedigree (1,4,4,4,2)
  Used here to describe waste from ABS, waste nylons (PA) and waste polycarbonate. Data are from Ashby 2009. The amount is set equal to the input amount for the respective material
  production volume 2.635e7 kg
- tap water: 8.93797e-6 kg; lognormal variance with pedigree 0.0035, pedigree (1,4,2,3,2)
  Data are from Gallego-Schmid et al. 2018.
- heat, central or small-scale, other than natural gas: 2.11431e-5 MJ; lognormal variance with pedigree 0.0035, pedigree (1,4,2,3,2)
  Data are from Gallego-Schmid et al. 2018.
- palladium: 2.00726e-12 kg; lognormal variance with pedigree 0.0035, pedigree (1,4,2,3,2)
  Data are from Gallego-Schmid et al. 2018.
- silver: 2.00726e-11 kg; lognormal variance with pedigree 0.0035, pedigree (1,4,2,3,2)
  Data are from Gallego-Schmid et al. 2018.
- gold: 5.01814e-12 kg; lognormal variance with pedigree 0.0035, pedigree (1,4,2,3,2)
  Data are from Gallego-Schmid et al. 2018.
- ferrite: 9.3672e-8 kg; lognormal variance with pedigree 0.0035, pedigree (1,4,2,3,2)
  Data are from Gallego-Schmid et al. 2018.
- polystyrene, general purpose: 7.95322e-7 kg; lognormal variance with pedigree 0.0035, pedigree (1,4,2,3,2)
  Data are from Gallego-Schmid et al. 2018.
- flat glass, coated: 1.2597e-7 kg; lognormal variance with pedigree 0.0035, pedigree (1,4,2,3,2)
  Data are from Gallego-Schmid et al. 2018.
- polyol: 2.04827e-8, 4.14748e-8 kg (2 entries); lognormal variance with pedigree 0.0035, pedigree (1,4,2,3,2)
  Used here to describe polyoxymethylene. Data are from Gallego-Schmid et al. 2018. In terms of outputs assumed to have gone to waste water.
- nylon 6: 5.77362e-9, 5.265e-7 kg (2 entries); lognormal variance with pedigree 0.0035, pedigree (1,4,2,3,2)
  Data are from Gallego-Schmid et al. 2018. In terms of outputs assumed to have gone to waste PE.
- wastewater, average: -3.00142e-9, -3.24697e-10 m3 (2 entries); lognormal variance with pedigree 0.0035, pedigree (1,4,2,3,2)
  Converted from liters. Data are from Gallego-Schmid et al. 2018.The amount is set equal to the input amount for the respective material.
  production volume 808000 m3
- inert waste: -5.54504e-9, -4.77577e-11, -9.68937e-8 kg (3 entries); lognormal variance with pedigree 0.0035, pedigree (1,4,2,3,2)
  Represents here waste ceramic tile. Data are from Gallego-Schmid et al. 2018.
  production volume 2.68e6 kg
- waste polystyrene: -9.62601e-8, -7.76576e-9, -3.20754e-9, -3.04586e-9, -1.16226e-7, -1.29581e-9, -5.87312e-10, -8.13645e-7 kg (8 entries); lognormal variance with pedigree 0.0035, pedigree (1,4,2,3,2)
  Includes scrap ABS and scrap polystyrene (general purpose) Data are from Gallego-Schmid et al. 2018.The amount is set equal to the input amount for the respective material.
  production volume 1.06e7 kg
- lithium fluoride: 4.04543e-11 kg; lognormal variance with pedigree 0.0035, pedigree (1,4,2,3,2)
  Used here in place of fluorozirconate. In terms of output, assumed to have gone to wastewater. Data from Xiao et al. 2015.
- dimethyldichlorosilane: 4.04543e-11 kg; lognormal variance with pedigree 0.0035, pedigree (1,4,2,3,2)
  Data from Xiao et al. 2015. In terms of outputs, assumed to have gone to waste water.
- phenyl isocyanate: 7.86746e-8 kg; lognormal variance with pedigree 0.0035, pedigree (1,4,2,3,2)
  Data from Xiao et al. 2015. In terms of outputs, assumed to have gone to waste water.
- 1,1-difluoroethane, HFC-152a: 2.91386e-9 kg; lognormal variance with pedigree 0.0035, pedigree (1,4,2,3,2)
  Used here in place of pentafluoropropane. Data from Xiao et al. 2015.
- polystyrene, high impact: 1.70482e-7 kg; lognormal variance with pedigree 0.0035, pedigree (1,4,2,3,2)
  Data from Xiao et al. 2015.
- methylcyclopentane: 5.82774e-9 kg; lognormal variance with pedigree 0.0035, pedigree (1,4,2,3,2)
  Data from Xiao et al. 2015. In terms of outputs, assumed to have gone to waste water.
- sodium silicate, solid: 1.78372e-11, 3.61181e-11 kg (2 entries); lognormal variance with pedigree 0.0035, pedigree (1,4,2,3,2)
  Data from Xiao et al. 2015. In terms of outputs, assumed to have gone to waste water.
- steam, in chemical industry: 1.69492e-8, 0.000554307 kg (2 entries); lognormal variance with pedigree 0.0035, pedigree (1,4,2,3,2)
  Data from Xiao et al. 2015.
- sodium percarbonate, powder: 1.33739e-11, 2.70804e-11 kg (2 entries); lognormal variance with pedigree 0.0035, pedigree (1,4,2,3,2)
  Data from Xiao et al. 2015. In terms of outputs, assumed to have gone to waste water.
- epoxy resin, liquid: 7.2898e-9 kg; lognormal variance with pedigree 0.0035, pedigree (1,4,2,3,2)
  Data from Xiao et al. 2015. In terms of outputs, assumed to have gone to waste PVC.
- heat, central or small-scale, natural gas: 2.67735e-6 MJ; lognormal variance with pedigree 0.004, pedigree (1,4,2,4,2)
  Data from Gallego-Schmid et al. 2016.
- vinyl acetate: 6.45989e-8 kg; lognormal variance with pedigree 0.004, pedigree (1,4,2,4,2)
  Data from Gallego-Schmid et al. 2016.
- formaldehyde: 6.91009e-10, 2.88917e-9 kg (2 entries); lognormal variance with pedigree 0.004, pedigree (1,4,2,4,2)
  Used here in place of polyoxymethylene. In terms of outputs, assumed to have gone to wastewater. Data from Gallego-Schmid et al. 2016.
- corrugated board box: 2.86054e-8, 1.27897e-9, 1.08653e-7 kg (3 entries); lognormal variance with pedigree 0.004, pedigree (1,4,2,4,2)
  Includes all materials from packaging i.e. folding box, cardboard trays and protective cardboard. Data from Gallego-Schmid et al. 2016.
- waste paperboard: -1.48547e-8, -9.23661e-10, -3.33758e-9, -6.02426e-10, -6.04868e-9, -3.25441e-10, -8.07658e-11, -1.12364e-7 kg (8 entries); lognormal variance with pedigree 0.004, pedigree (1,4,2,4,2)
  The amount is set equal to the input amount for the respective material. Data from Gallego-Schmid et al. 2016.
  production volume 9.345e7 kg
- printed paper: 2.04299e-9 kg; lognormal variance with pedigree 0.003425, pedigree (1,4,2,2,2)
  Data from Yuan et al. 2016.
- kraft paper, bleached: 1.7706e-8 kg; lognormal variance with pedigree 0.003425, pedigree (1,4,2,2,2)
  Data from Yuan et al. 2016.
- heat, district or industrial, other than natural gas: 2.62321e-7 MJ; lognormal variance with pedigree 0.003425, pedigree (1,4,2,2,2)
  Data from Yuan et al. 2016. Converted from kg of oil used for heating (0.46) to MJ of heat (19.26) using 'heat production, heavy fuel oil, at industrial furnace 1MW, GLO' [accessed 20 January 2018].
- trisodium phosphate: 7.08783e-9 kg; lognormal variance with pedigree 0.003425, pedigree (1,4,2,2,2)
  Used herein place of phosphating agent, degreaser and surface conditioning agent. In terms of outputs assumed to have gone to wastewater. Data from Yuan et al. 2016.
- waste packaging paper: -2.11759e-9, -1.31671e-10, -4.75782e-10, -8.58778e-11, -8.62259e-10, -4.63927e-11, -1.15134e-11, -1.60179e-8 kg (8 entries); lognormal variance with pedigree 0.003425, pedigree (1,4,2,2,2)
  Used here in place of kraft liner and paper. Data from Yuan et al. 2016. The amount is set equal to the input amount for the respective material.
  production volume 9.26115e7 kg
- concrete block: 3.32598e-5, 7.34307e-5, 0.000105965 kg (3 entries); lognormal variance with pedigree 0.003425, pedigree (1,4,2,2,2)
  Data from Yuan et al. 2016. In terms of outputs assumed to have gone to inert waste.
- waste plastic, mixture: -4.9776e-8 kg; lognormal variance with pedigree 0.003425, pedigree (1,4,2,2,2)
  Data from Yuan et al. 2016. Represents here waste ABS.
  production volume 1.35724e9 kg
- compressed air, 1000 kPa gauge: 1.45753e-8, 3.58186e-8 m3 (2 entries); lognormal variance with pedigree 0.003425, pedigree (1,4,2,2,2)
  Data from Yuan et al. 2016.
- heat, district or industrial, other than natural gas: 5.28538e-5 MJ; lognormal variance with pedigree 0.0586, pedigree (4,3,5,1,1)
  EcoSpold01Location=RER
  Uncertainty: oral communication
- used locomotive: -7.72716e-11 unit; lognormal variance with pedigree 0.34, pedigree (1,1,5,1,1)
  production volume 1.32237 unit
- glued laminated timber, for outdoor use: 2.13975e-9 m3; source Elsener J. 1993; lognormal variance with pedigree 0.0586, pedigree (4,3,5,1,1)
  EcoSpold01Location=RER
  Calculated value. The data is based on Elsener & Strub (1993).
  Uncertainty: oral communication
- electricity, medium voltage: 5.87264e-6 kWh; source Elsener J. 1993; lognormal variance with pedigree 0.0586, pedigree (4,3,5,1,1)
  Calculated value. The data is based on Elsener & Strub (1993).
  EcoSpold01Location=UCTE
  Uncertainty: oral communication
- waste electric wiring: -2.13854e-9, -8.45639e-7 kg (2 entries); lognormal variance with pedigree 0.1606, pedigree (2,1,5,1,1)
  EcoSpold01Location=CH
  Calculated value. Proxy for the treatment of brass.
  production volume 4.96602e6 kg
- waste polyethylene/polypropylene product: -3.22329e-10 kg
  Calculated value. Proxy for the treatment of brass.
  production volume 924.865 kg
- sulfur hexafluoride, liquid: 1.72933e-11 kg; lognormal variance with pedigree 0.002, pedigree (1,1,3,1,1)
  Calculated value. Total amount divided by the total number of kilometres in the network.
  Uncertainty: Calculated variable. Uncertainty will be determined from propagation of uncertainty factors of underlying variables. Uncertainty of actual relation between variables not accounted at this time, although this could be included in a future update.
- waste wood pole, chrome preserved: -2.85264e-8 kg; lognormal variance with pedigree 0.002, pedigree (1,1,3,1,1)
  Estimated value. It is assumed that the same quantity that enter is produced as a waste
  Uncertainty: Calculated variable. Uncertainty will be determined from propagation of uncertainty factors of underlying variables. Uncertainty of actual relation between variables not accounted at this time, although this could be included in a future update.
  production volume 10088.9 kg
- sawlog and veneer log, softwood, debarked, measured as solid wood: 4.01071e-11 m3; lognormal variance with pedigree 0.002, pedigree (1,1,3,1,1)
  Calculated value. Total amount divided by the total number of kilometres in the network. Lifetime of wood has been taken into account in the calculation
  Uncertainty: Calculated variable. Uncertainty will be determined from propagation of uncertainty factors of underlying variables. Uncertainty of actual relation between variables not accounted at this time, although this could be included in a future update.
- steel, unalloyed: 0.000130808 kg; lognormal variance with pedigree 0.002, pedigree (1,1,3,1,1)
  Calculated value. Total amount divided by the total number of kilometres in the network
  EcoSpold01Location=RER
  Uncertainty: Calculated variable. Uncertainty will be determined from propagation of uncertainty factors of underlying variables. Uncertainty of actual relation between variables not accounted at this time, although this could be included in a future update.
- gravel, crushed: 0.0104626 kg; lognormal variance with pedigree 0.002, pedigree (1,1,3,1,1)
  Calculated value. Total amount divided by the total number of kilometres in the network
  Uncertainty: Calculated variable. Uncertainty will be determined from propagation of uncertainty factors of underlying variables. Uncertainty of actual relation between variables not accounted at this time, although this could be included in a future update.
- wood preservation, vacuum pressure method, organic salts, Cr-free, outdoor use, ground contact: 1.67342e-12 kg; lognormal variance with pedigree 0.002, pedigree (1,1,3,1,1)
  (same comment as for sawlog and veneer log, softwood, debarked, measured as solid wood)
- mastic asphalt: 6.01304e-10 kg; lognormal variance with pedigree 0.002, pedigree (1,1,3,1,1)
  (same comment as for gravel, crushed)
- clay: 0.0116579 kg; lognormal variance with pedigree 0.002, pedigree (1,1,3,1,1)
  Calculated Value. Assumed material stays in place after useful life of facility.
  Uncertainty: Calculated variable. Uncertainty will be determined from propagation of uncertainty factors of underlying variables.
- waste reinforcement steel: -0.000273357 kg; lognormal variance with pedigree 0.002, pedigree (1,1,3,1,1)
  Estimation. Based on material input.
  EcoSpold01Location=CH
  Uncertainty: Calculated variable. Uncertainty will be determined from propagation of uncertainty factors of underlying variables.
  production volume 40064.2 kg
- process-specific burdens, sanitary landfill: 4.45481e-5 kg; lognormal variance with pedigree 0.0126, pedigree (4,4,3,1,1)
  Approximated process. Represents disposal of earth dug during excavation.
- municipal solid waste: -3.85186e-5 kg; lognormal variance with pedigree 0.008, pedigree (1,1,4,1,1)
  Estimation. Based on material input.
  Uncertainty: Calculated variable. Uncertainty will be determined from propagation of uncertainty factors of underlying variables.
  production volume 163391 kg
- polyethylene, linear low density, granulate: 3.04011e-5 kg; lognormal variance with pedigree 0.008, pedigree (1,1,4,1,1)
  Calculated Value.
  Uncertainty: Calculated variable. Uncertainty will be determined from propagation of uncertainty factors of underlying variables.
- charcoal: 3.0079e-7 kg; lognormal variance with pedigree 0.008, pedigree (1,1,4,1,1)
  (same comment as for polyethylene, linear low density, granulate)
- waste glass pane in burnable frame: -3.34489e-5 kg; lognormal variance with pedigree 0.008, pedigree (1,1,4,1,1)
  EcoSpold01Location=CH
  Estimation. Based on material input.
  Uncertainty: Calculated variable. Uncertainty will be determined from propagation of uncertainty factors of underlying variables.
  production volume 75101.3 kg
- copper scrap, sorted, pressed: -1.08091e-5 kg; lognormal variance with pedigree 0.008, pedigree (1,1,4,1,1)
  (same comment as for municipal solid waste)
  production volume 8187.88 kg
- silica sand: 4.03733e-5 kg; lognormal variance with pedigree 0.008, pedigree (1,1,4,1,1)
  Calculated Value.
  EcoSpold01Location=DE
  Uncertainty: Calculated variable. Uncertainty will be determined from propagation of uncertainty factors of underlying variables.
- bronze: 6.13804e-6 kg; lognormal variance with pedigree 0.008, pedigree (1,1,4,1,1)
  (same comment as for polyethylene, linear low density, granulate)
- steel, chromium steel 18/8: 2.4062e-5 kg; lognormal variance with pedigree 0.008, pedigree (1,1,4,1,1)
  (same comment as for polyethylene, linear low density, granulate)
- section bar rolling, steel: 0.00013121 kg; source Stiesdal H. 2001; lognormal variance with pedigree 0.06, pedigree (1,1,5,1,1)
  EcoSpold01Location=RER
  Estimation. Construction efforts for low-allowed steel.
- aluminium scrap, new: -1.233e-9, -9.22454e-9 kg (2 entries)
  Estimation. It is assumed that 100% of that material is recycled.
  production volume 147875 kg
- electronics scrap from control units: -1.06616e-7 kg
  Calculated value
  production volume 362698 kg
- electronics, for control units: 1.10848e-5 kg; source Chataignere A. 2003, p. 46f; lognormal variance with pedigree 0.0567, pedigree (4,4,5,3,2)
  Literature value. Used in the nacelle.
  Use of electronics in the nacelle (120 kg) extrapolated with a weight factor from a 1.5MW wind turbine.
  Uncertainty: estimated variance. higher basic uncertainty because of the extrapolation and the age of the data.
- road: 1.81116e-8 m*year; source Vestas 2011, p. 81; lognormal variance with pedigree 0.0966, pedigree (4,4,5,4,4)
  Literature value/estimation. Generally a combination of tarred roads and dirt roads need to be built to provide access to the power plant turbines, which are often located in remote locations. It has been estimated that 10 km of tarred road is needed for a power plant with 25 wind turbines.
  Uncertainty: estimated variance.
- waste paint on wall: -5.45837e-9 kg
  Estimation. Alkyd paint at the concrete tower.
  production volume 1.52834e6 kg
- alkyd paint, white, without water, in 60% solution state: 2.98589e-9, 1.41744e-8 kg (2 entries); source Chataignere A. 2003, p. 46f; lognormal variance with pedigree 0.0567, pedigree (4,4,5,3,2)
  Literature value/calculated value. Used for the tower, the nacelle and the three blades.
  Sum of paint used for the tower (2411kg, directly final value) as well as for the nacelle (654 kg) and in the three blades (3*184 kg) extrapolated with accordant weight factors from a 1.5MW wind turbine.
  Uncertainty: estimated variance. higher basic uncertainty because of the extrapolation and the age of the data.
- waste reinforced concrete: -2.48495e-8 kg
  Calculated value. Contains the foundation and tower concrete with the reinforcing steel. Calculated value. A density of 2400kg/m3 is assumed for the reinforced concrete.
  production volume 5.02474e9 kg
- waste paint on metal: -9.84938e-11, -1.16034e-8 kg (2 entries)
  Calculated value/estimation. Paint on the nacelle and the blades.
  production volume 3.27653e6 kg
- wire drawing, steel: 5.27433e-8 kg
  Estimation.
- waste concrete, not reinforced: -2.63084e-10 kg
  Calculated value. A density of 2400kg/m3 is assumed for the concrete.
  production volume 2.28205e7 kg
- extrusion, plastic pipes: 5.22659e-5 kg; lognormal variance with pedigree 0.0133, pedigree (3,4,4,3,2)
  Calculated value.
- water pump operation, diesel: 0.000217755, 0.000207277, 0.000228912, 0.000278346, 0.000236365, 0.000243757, 0.000245065, 0.000212324, 0.000258694, 0.000190685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 MJ (11 entries); lognormal variance with pedigree 0.0133, pedigree (3,4,4,3,2)
  calculated value. The energy required to lift water for irrigation is a function of the lift or total head (Ht), the efficiencies of pumps used for extraction (e1), the driving efficiency (e2) and flow rates (FAO, 2007).
- metal working, average for steel product manufacturing: 2.6045e-6 kg; lognormal variance with pedigree 0.0133, pedigree (3,4,4,3,2)
  Calculated value based on literature values. The material input are based on the FAO example of hose-move sprinkler irrigation design for cotton (FAO, 2007). The weight per m3 of water is calculated based on the lifespan of the equipment and the amount of water irrigated per ha and year. The lifespan for the distribution network is assumed to be ten years and the head control unit 20 years. The irrigation system is assumed to be functional during 7h per shift with 6 shifts (sprinkler positions) and an irrigation interval of 2 weeks. The total irrigation time per year is 1095 hours and the system discharge is 36 m3 of water per hour (FAO, 2007). FAO. (2007). Handbook of pressurized irrigation techniques. Rome, Italy
- diesel, burned in agricultural machinery: 6.68929e-8 MJ; lognormal variance with pedigree 0.0267, pedigree (3,5,4,3,3)
  Calculated value. A tractor is assumed to install the sprinkler irrigation system, with an average diesel consumption of 3.78kg/ha (4 times*0.25ha*4.5l/ha*0.83 kg/l), based on ecoinvent (Nemecek & Kägi, 2007). The energy consumption of levelling the field is assumed to be included in the energy use for field preparation, included in the crop production dataset.
- bronze scrap, post-consumer: 0 kg; pedigree (1,1,1,1,1)
  Calculated value.
  production volume 313900 kg
- injection moulding: 5.7865e-5 kg; lognormal variance with pedigree 0.0133, pedigree (3,4,4,3,2)
  Calculated value.
- water pump operation, electric: 0.000381071, 0.000362734, 0.000400597, 0.000487105, 0.000413639, 0.000426574, 0.000428863, 0.000371567, 0.000452715, 0.000507049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 MJ (11 entries); lognormal variance with pedigree 0.0133, pedigree (3,4,4,3,2)
  (same comment as for water pump operation, diesel)
- nylon 6-6: 1.92853e-9, 7.22343e-10 kg (2 entries); lognormal variance with pedigree 0.0133, pedigree (3,4,4,3,2)
  (same comment as for metal working, average for steel product manufacturing)
- extrusion, plastic pipes: 5.45615e-7, 1.78695e-5 kg (2 entries); lognormal variance with pedigree 0.0133, pedigree (3,4,4,3,2)
  Calculated value.;activityLink introduced to establish a direct link to the corresponding regional supply of this product
- injection moulding: 4.81537e-7, 9.03259e-6 kg (2 entries); lognormal variance with pedigree 0.0133, pedigree (3,4,4,3,2)
  Calculated value. ;activityLink introduced to establish a direct link to the corresponding regional supply of this product
- waste polyethylene: -5.44381e-7 kg; lognormal variance with pedigree 0.0258, pedigree (4,5,4,4,2)
  Calculated value.
  production volume 206547 kg
- waste polypropylene: -3.73471e-8 kg; lognormal variance with pedigree 0.0258, pedigree (4,5,4,4,2)
  Calculated value.
  production volume 14170.1 kg
- waste polyvinylchloride: -1.78001e-6 kg; lognormal variance with pedigree 0.0258, pedigree (4,5,4,4,2)
  Calculated value.
  production volume 168120 kg
- metal working, average for steel product manufacturing: 3.00723e-7 kg; lognormal variance with pedigree 0.0133, pedigree (3,4,4,3,2)
  Calculated value based on literature values. The material input are based on the FAO example of hose-move sprinkler irrigation design for cotton (FAO, 2007). The weight per m3 of water is calculated based on the lifespan of the equipment and the amount of water irrigated per ha and year. The lifespan for the distribution network is assumed to be ten years and the head control unit 20 years. The irrigation system is assumed to be functional during 7h per shift with 6 shifts (sprinkler positions) and an irrigation interval of 2 weeks. The total irrigation time per year is 1095 hours and the system discharge is 36 m3 of water per hour (FAO, 2007). FAO. (2007). Handbook of pressurized irrigation techniques. Rome, Italy;activityLink introduced to establish a direct link to the corresponding regional supply of this product
- waste polyvinylchloride: -1.49426e-6 kg; lognormal variance with pedigree 0.0258, pedigree (4,5,4,4,2)
  Calculated value.
  production volume 1.39137e6 kg
- waste polyethylene: -5.45489e-7 kg; lognormal variance with pedigree 0.0258, pedigree (4,5,4,4,2)
  Calculated value.
  production volume 1.70939e6 kg
- waste polypropylene: -3.74231e-8 kg; lognormal variance with pedigree 0.0258, pedigree (4,5,4,4,2)
  Calculated value.
  production volume 117272 kg
- waste polypropylene: -3.73831e-8 kg; lognormal variance with pedigree 0.0258, pedigree (4,5,4,4,2)
  Calculated value.
  production volume 110148 kg
- waste polyethylene: -5.44906e-7 kg; lognormal variance with pedigree 0.0258, pedigree (4,5,4,4,2)
  Calculated value.
  production volume 1.60555e6 kg
- waste polyvinylchloride: -8.23111e-5 kg; lognormal variance with pedigree 0.0258, pedigree (4,5,4,4,2)
  Calculated value.
  production volume 1.30684e6 kg
- electricity, low voltage: 3.6677e-5, 1.52013e-8, 1.22653e-7, 2.15879e-8, 1.45357e-7, 6.10133e-8, 5.39022e-8, 9.39425e-8, 1.00333e-7, 9.13309e-7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 kWh (40 entries); lognormal variance with pedigree 0.374402, pedigree (5,5,5,5,5)
  Literature data and primary data from French manufacturers (Boulard et al, 2011). Electricity for manufacturing of the greenhouse structure.
- oil boiler, 100kW: 8.27475e-10 unit; lognormal variance with pedigree 0.374402, pedigree (5,5,5,5,5)
  Literature data and primary data from French manufacturers (Boulard et al, 2011). Boiler for the heating system.
- sheet rolling, steel: 1.11862e-5 kg; lognormal variance with pedigree 0.374402, pedigree (5,5,5,5,5)
  Literature data and primary data from French manufacturers (Boulard et al, 2011). Roofing.
- ethylene vinyl acetate copolymer: 8.19925e-5, 8.24131e-5 kg (2 entries); lognormal variance with pedigree 0.374402, pedigree (5,5,5,5,5)
  Literature data and primary data from French manufacturers (Boulard et al, 2011). Plastic covers for the greenhouse structure.
- polyester resin, unsaturated: 2.58505e-6, 2.60732e-6 kg (2 entries); lognormal variance with pedigree 0.374402, pedigree (5,5,5,5,5)
  Literature data and primary data from French manufacturers (Boulard et al, 2011). Roofing membrane.
- tractor, 4-wheel, agricultural: 6.7578e-6 kg; lognormal variance with pedigree 0.374402, pedigree (5,5,5,5,5)
  Literature data and primary data from French manufacturers (Boulard et al, 2011). Tractor.
- agricultural machinery, unspecified: 3.3789e-6 kg; lognormal variance with pedigree 0.374402, pedigree (5,5,5,5,5)
  Literature data and primary data from French manufacturers (Boulard et al, 2011). Ramp for the soil preparation system.
- section bar extrusion, aluminium: 1.42676e-6, 1.41863e-6 kg (2 entries); lognormal variance with pedigree 0.374402, pedigree (5,5,5,5,5)
  Literature data and primary data from French manufacturers (Boulard et al, 2011). Roof structure.
- polymer foaming: 1.09236e-6 kg; lognormal variance with pedigree 0.374402, pedigree (5,5,5,5,5)
  Literature data and primary data from French manufacturers (Boulard et al, 2011). Plastic bags part of for the support system.
- calendering, rigid sheets: 2.77511e-6, 2.78154e-6 kg (2 entries); lognormal variance with pedigree 0.374402, pedigree (5,5,5,5,5)
  Literature data and primary data from French manufacturers (Boulard et al, 2011). Cladding materials.
- polystyrene, expandable: 2.1785e-6 kg; lognormal variance with pedigree 0.374402, pedigree (5,5,5,5,5)
  (same comment as for polymer foaming)
- bitumen seal: 4.44592e-8 kg; lognormal variance with pedigree 0.374402, pedigree (5,5,5,5,5)
  Literature data and primary data from French manufacturers (Boulard et al, 2011). Cement sealing in the greenhouse structure.
- blow moulding: 3.21951e-6, 3.24193e-6 kg (2 entries); lognormal variance with pedigree 0.374402, pedigree (5,5,5,5,5)
  Literature data and primary data from French manufacturers (Boulard et al, 2011). Tanks for the fertigation system.
- polyvinylfluoride: 1.37111e-5 kg; lognormal variance with pedigree 0.374402, pedigree (5,5,5,5,5)
  Literature data and primary data from French manufacturers (Boulard et al, 2011). Cables, wires, joints and clips for the greenhouse structure.
- wire drawing, copper: 4.21574e-7 kg; lognormal variance with pedigree 0.374402, pedigree (5,5,5,5,5)
  Literature data and primary data from French manufacturers (Boulard et al, 2011). Cables and wires for the greenhouse structure.
- waste plastic, mixture: -4.87661e-5 kg
  Plastic components sent to treatment
  production volume 0.024884 kg
- acrylic varnish, without water, in 87.5% solution state: 2.52876e-6, 2.55134e-6 kg (2 entries); lognormal variance with pedigree 0.374402, pedigree (5,5,5,5,5)
  Literature data and primary data from French manufacturers (Boulard et al, 2011). Paint protection.
- extrusion, plastic film: 9.70027e-5 kg; lognormal variance with pedigree 0.374402, pedigree (5,5,5,5,5)
  Literature data and primary data from French manufacturers (Boulard et al, 2011). Mulch film.
- drawing of pipe, steel: 3.66745e-5, 3.63796e-5 kg (2 entries); lognormal variance with pedigree 0.374402, pedigree (5,5,5,5,5)
  Literature data and primary data from French manufacturers (Boulard et al, 2011). Tubes and siphons for the heating system.
- section bar rolling, steel: 0.000130141 kg; lognormal variance with pedigree 0.374402, pedigree (5,5,5,5,5)
  Literature data and primary data from French manufacturers (Boulard et al, 2011). Poles and trellis for the greenhouse structure.
- gas motor, 206kW: 2.75647e-13 unit; lognormal variance with pedigree 0.374402, pedigree (5,5,5,5,5)
  Literature data and primary data from French manufacturers (Boulard et al, 2011). Generating set for the heating system.
- heat and power co-generation unit, 200kW electrical, diesel SCR, components for electricity only: 1.38218e-13, 1.3743e-13 unit (2 entries); lognormal variance with pedigree 0.374402, pedigree (5,5,5,5,5)
  (same comment as for gas motor, 206kW)
- zinc coat, coils: 1.35038e-5 m2; lognormal variance with pedigree 0.374402, pedigree (5,5,5,5,5)
  (same comment as for section bar rolling, steel)
- electricity, low voltage: 5.24481e-8 kWh; lognormal variance with pedigree 0.422225, pedigree (1,4,2,2,5)
  Calculated value. Assuming that 0.30 kWh/m3 of electricity is necessary to construct a building. Source: Zabalza et al. 2013. Use of LCA as a Tool for Building Ecodesign. A Case Study of a Low Energy Building in Spain. Energies, 6 (8), 3901-3921.
- waste gypsum plasterboard: -9.54814e-7 kg; lognormal variance with pedigree 0.123425, pedigree (2,4,2,2,5)
  Calculated value. Amount of output material is set equal to the amount of respective input material, gypsum plasterboard.
  production volume 9.89363e7 kg
- gypsum plasterboard: 9.54814e-7 kg; lognormal variance with pedigree 0.123425, pedigree (2,4,2,2,5)
  Calculated value. Combined of all instances of all across the building walls, ceiling and roof. Assumed thickness of roof plasterboard 12.5 mm. Source: Practical DYI 2018. Types of plasterboard. Available from: https://www.practicaldiy.com/general-building/plasterboard/plasterboard.php Accessed 23 March 2018. Assumed density of plasterboard 640 kg/m3. Source: British Gypsum 2018. What is the density of Gyproc plasterboards? Available from: http://www.british-gypsum.com/technical-advice/faqs/114-what-is-the-density-of-gyproc-plasterboards Accessed 23 March 2018. Assumed service life of 75 years with minor refurbishments throughout. In terms of outputs assumed to have gone to waste gypsum plasterboard.
- window frame, aluminium, U=1.6 W/m2K: 2.0022e-8 m2; lognormal variance with pedigree 0.2106, pedigree (5,5,5,5,5)
  Calculated value. The amount of exchange is calculated as: amount of input product * (lifetime of the hotel / lifetime of the product). Assumed service life of 35 years. Source: Asif et al. 2002. LIFE CYCLE OF WINDOW MATERIALS - A COMPARATIVE ASSESSMENT. Available from: http://ohp.parks.ca.gov/pages/1054/files/uk%20window%20frame%20lca.pdf Accessed 16 March 2018.
- used door, inner, wood: -9.62125e-11 m2; lognormal variance with pedigree 0.122825, pedigree (1,4,2,2,5)
  Calculated value. Amount of output material is set equal to the amount of respective input material, door, inner, wood.
  production volume 9969.38 m2
- used window frame, wood-metal: -5.80929e-10 m2; lognormal variance with pedigree 0.123425, pedigree (2,4,2,2,5)
  Calculated value. Amount of output material is set equal to the amount of respective input material, window frame, wood-metal.
  production volume 60194.9 m2
- natural stone plate, cut: 1.73056e-9 kg; lognormal variance with pedigree 0.123425, pedigree (2,4,2,2,5)
  Calculated value. Used here in place of marble. Combined of all instances of use across the building. Assumed thickness of marble is 22 mm. Source: Erdly and Schwartz 2004. Building facade maintenance, repair, and inspection. ASTM International, West Conshohocken, USA. Assumed density of marble is 2.7 kg/m3. Source: The Engineering Toolbox 2018. Densities of common solids. Available from: https://www.engineeringtoolbox.com/density-solids-d_1265.html Accessed 25 March 2018. Assumed service life of 75 years which is equal to the service life of the hotel building with minor refurbishments throughout. In terms of outputs assumed to have gone to inert waste.
- door, inner, wood: 9.62125e-11 m2; lognormal variance with pedigree 0.122825, pedigree (1,4,2,2,5)
  Estimated value. No data but based on 500 apartments and a number of administrative rooms, an approximation of 550 doors is used. Dimensions of a standar assumed to be 1,981 x 0,610 m and include wooden door frame. Souce: https://www.jbkind.com/info-centre/standard-door-sizes. Assumed service life of 40 years. Source: Cobut et al. 2015. The environmental footprint of interior wood doors in non-residential buildings – part 1: life cycle assessment. Journal of Cleaner Production, 109, 232-246. In terms of outputs, assumed to have gone to used door, inner, wood.
- sawnwood, beam, softwood, dried (u=10%), planed: 5.45749e-12 m3; lognormal variance with pedigree 0.123425, pedigree (2,4,2,2,5)
  Calculated value. Represents here all wood used in flooring and for wall decoration. Combined of all instances of use across the building. Assumed thickness of wood to be 9.5 mm. Source: APA 2016. Wall construction. An excerpt of the engineering wood construction guide. Available from: https://www.buildgp.com/DocumentViewer.aspx?elementid=10198 Accessed 25 March 2018. Assumed service life of 75 years with minor refurbishments throughout. In terms of outputs assumed to have gone to waste wood, untreated.
- elevator, hydraulic: 6.65905e-12 unit; lognormal variance with pedigree 0.422225, pedigree (1,4,2,2,5)
  Calculated value. The amount of exchange is calculated as: amount of input product * (lifetime of the hotel / lifetime of the product). Assumed service life of elevator unit is 20 years. Source: Miljögiraff 2015. LCA of elevator lifting service in property. Miljögiraff Report 56. Available from: https://www.researchgate.net/profile/Marcus_Wendin/publication/301295772_Elevators_towards_a_circular_economy/links/5717790f08ae2679a8c772db/Elevators-towards-a-circular-economy.pdf Accessed 23 March 2018.
- window frame, wood-metal, U=1.6 W/m2K: 5.80929e-10 m2; lognormal variance with pedigree 0.123425, pedigree (2,4,2,2,5)
  Calculated value. The amount of exchange is calculated as: amount of input product * (lifetime of the hotel / lifetime of the product). Assumed service life of 35 years. Source: Asif et al. 2002. LIFE CYCLE OF WINDOW MATERIALS - A COMPARATIVE ASSESSMENT. Available from: http://ohp.parks.ca.gov/pages/1054/files/uk%20window%20frame%20lca.pdf Accessed 16 March 2018. In terms of outputs assumed to have gone to used window frame, wood-metal.
- phenolic resin: 2.16166e-8, 2.1844e-8 kg (2 entries); lognormal variance with pedigree 0.374402, pedigree (5,5,5,5,5)
  Literature data and primary data from French manufacturers (Boulard et al, 2011). Protective layer.
- waste polystyrene: -4.39532e-9 kg; lognormal variance with pedigree 0.056, pedigree (3,4,5,5,1)
  EcoSpold01Location=CH
  Literature studies
  Uncertainty: literature studies
  production volume 1026 kg
- waste polyvinylchloride: -7.10965e-7 kg; lognormal variance with pedigree 0.056, pedigree (3,4,5,5,1)
  EcoSpold01Location=CH
  Literature studies
  Uncertainty: literature studies
  production volume 148.5 kg
- waste asphalt: -9.02793e-7 kg; lognormal variance with pedigree 0.056, pedigree (3,4,5,5,1)
  Literature studies
  EcoSpold01Location=CH
  Uncertainty: literature studies
  production volume 352650 kg
- sand: 1.09843e-8, 2.11581e-6, 0.000137688 kg (3 entries); lognormal variance with pedigree 0.056, pedigree (3,4,5,5,1)
  EcoSpold01Location=CH
  Literature studies
  Uncertainty: literature studies
- packaging box factory: 3.38684e-12 unit; lognormal variance with pedigree 0.448, pedigree (4,5,5,5,5)
  Estimation
  EcoSpold01Location=RER
  Uncertainty: estimation
- solid bleached board: 7.08158e-6 kg; lognormal variance with pedigree 0.0612, pedigree (2,3,5,5,3)
  Typical values, based on a European and a Swiss study
  EcoSpold01Location=RER
  Uncertainty: typical values, based on a European and a Swiss study
- core board: 1.88763e-5 kg; lognormal variance with pedigree 0.0612, pedigree (2,3,5,5,3)
  (same comment as for solid bleached board)
- EUR-flat pallet: 1.07289e-6 unit; lognormal variance with pedigree 0.0612, pedigree (2,3,5,5,3)
  (same comment as for solid bleached board)
- wood preservation, vaccum pressure method, inorganic salt, containing Cr, outdoor use, ground contact: 7.14033e-10 kg; lognormal variance with pedigree 0.0621, pedigree (3,2,5,5,3)
  Literature and estimations
  Uncertainty: literature and estimations
- light fuel oil: 6.41463e-10, 9.25092e-11, 1.29462e-9, 8.59097e-11, 1.2448e-10, 2.62707e-9 kg (6 entries); lognormal variance with pedigree 0.0621, pedigree (3,2,5,5,3)
  EcoSpold01Location=RER
  Literature and estimations
  Uncertainty: literature and estimations
- waste polyethylene: -1.15515e-6 kg; lognormal variance with pedigree 0.44, pedigree (5,5,5,5,1)
  EcoSpold01Location=CH
  Estimates
  Uncertainty: estimates
  production volume 6.57485e6 kg
- gravel, crushed: 9.64205e-6, 2.10618e-6, 3.70097e-5 kg (3 entries); lognormal variance with pedigree 0.1712, pedigree (3,5,5,4,2)
  This flow is considered as a regional specificity of Quebec. The flow is scaled using the production volumes (Quebec and GLO) to avoid its accounting of this specificity in the other regions."
- ventilation components factory: 9.44145e-13 unit; lognormal variance with pedigree 0.396, pedigree (4,5,5,5,3)
  Calculated with data of a similar company
  EcoSpold01Location=RER
  Uncertainty: Calculated with data of a similar company
- metal working, average for aluminium product manufacturing: 6.81855e-8 kg; lognormal variance with pedigree 0.2, pedigree (5,5,5,5,4)
  Assumed type of processing
  EcoSpold01Location=RER
  Uncertainty: assumed type of processing
- polyurethane, flexible foam: 2.48936e-8 kg; lognormal variance with pedigree 0.13, pedigree (1,5,5,5,4)
  EcoSpold01Location=RER
  Average of 4 machines
  Uncertainty: average of 4 machines
- polymer foaming: 1.11103e-6 kg; lognormal variance with pedigree 0.2, pedigree (5,5,5,5,4)
  Assumed type of processing
  EcoSpold01Location=RER
  Uncertainty: assumed type of processing
- sheet rolling, copper: 2.77151e-7 kg; lognormal variance with pedigree 0.2, pedigree (5,5,5,5,4)
  EcoSpold01Location=RER
  Assumed type of processing
  Uncertainty: assumed type of processing
- metal working, average for chromium steel product manufacturing: 5.43721e-7 kg; lognormal variance with pedigree 0.2, pedigree (5,5,5,5,4)
  Assumed type of processing
  EcoSpold01Location=RER
  Uncertainty: assumed type of processing

- waste polyurethane: -3.05917e-9, -2.04402e-10, -1.54586e-11, -8.44252e-11, -3.41068e-11, -8.01697e-11, -2.14159e-8 kg (7 entries); lognormal variance with pedigree 0.2, pedigree (5,5,5,5,4)
  EcoSpold01Location=CH
  Assumed route of disposal
  Uncertainty: assumed route of disposal
  production volume 0.02541 kg
- light fuel oil: 3.53632e-12 kg; lognormal variance with pedigree 0.0621, pedigree (3,2,5,5,3)
  Literature and estimations
  EcoSpold01Location=RER
  Uncertainty: literature and estimations
- municipal solid waste: -6.60227e-10, -9.43504e-10 kg (2 entries); lognormal variance with pedigree 0.008, pedigree (1,1,4,1,1)
  (same comment as for municipal solid waste)
  production volume 1.95497e7 kg
- waste reinforcement steel: -4.46167e-6 kg; lognormal variance with pedigree 0.008, pedigree (1,1,4,1,1)
  (same comment as for waste glass pane in burnable frame)
  production volume 616105 kg
- waste glass pane in burnable frame: -3.17165e-6 kg; lognormal variance with pedigree 0.008, pedigree (1,1,4,1,1)
  (same comment as for waste reinforcement steel)
  production volume 437968 kg
- concrete, normal: 1.1218e-9 m3; lognormal variance with pedigree 0.008, pedigree (1,1,4,1,1)
  EcoSpold01Location=CH
  Calculated Value.
  Uncertainty: Calculated variable. Uncertainty will be determined from propagation of uncertainty factors of underlying variables.
- waste polyvinylchloride: -4.62429e-8, -1.15465e-7, -6.31337e-8, -4.89788e-8, -1.28924e-7, -1.72788e-8, -1.91693e-7, -1.99529e-8, -1.32102e-7, -6.44018e-7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 kg (32 entries); lognormal variance with pedigree 0.0258, pedigree (4,5,4,4,2)
  Calculated value.
  production volume 2.16171e8 kg
- waste polyethylene: -4.79425e-9, -1.19709e-8, -6.54541e-9, -5.07789e-9, -1.33662e-8, -1.79138e-9, -1.98738e-8, -2.06862e-9, -1.36958e-8, -6.67688e-8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 kg (32 entries); lognormal variance with pedigree 0.0258, pedigree (4,5,4,4,2)
  Calculated value.
  production volume 2.65581e8 kg
- waste polypropylene: -3.28908e-10, -8.21258e-10, -4.49045e-10, -3.48367e-10, -9.16986e-10, -1.22897e-10, -1.36344e-9, -1.41917e-10, -9.39593e-10, -4.58065e-9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 kg (32 entries); lognormal variance with pedigree 0.0258, pedigree (4,5,4,4,2)
  Calculated value.
  production volume 1.82201e7 kg
- waste polyvinylchloride: -1.34895e-7 kg
  Etylene vinyl acetate copolymer (plastic covers) sent to treatment
  production volume 0.465191 kg
- waste plastic, mixture: -7.99369e-8, -2.50905e-8, -6.2649e-8, -3.42551e-8, -2.65749e-8, -6.99516e-8, -9.37511e-9, -7.92232e-7, -1.04009e-7, -1.0826e-8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 kg (35 entries)
  Plastic components sent to treatment
  production volume 0.507516 kg

## Inputs from nature
- Oxygen [natural resource, in air]: 0 kg; pedigree (1,1,1,1,1)
  Oxygen from ambient air needed to combust and oxidise this waste. Net demand, i.e. without O2 leaving the plant in flue gas uncombusted.
  Uncertainty: uncertainty is calculated from uncertainties in waste composition and transfer coefficients to flue gas and soild residues in incinerator
- Occupation, urban, discontinuously built [natural resource, land]: 2.2725e-6 m2*year; lognormal variance with pedigree 0.0821, pedigree (1,2,5,5,1)
- Occupation, construction site [natural resource, land]: 1.14069e-7 m2*year; lognormal variance with pedigree 0.0821, pedigree (1,2,5,5,1)
- Transformation, from pasture, man made [natural resource, land]: 5.68299e-8 m2; lognormal variance with pedigree 0.1621, pedigree (1,2,5,5,1)
- Transformation, to urban, discontinuously built [natural resource, land]: 4.55788e-8 m2; lognormal variance with pedigree 0.1621, pedigree (1,2,5,5,1)
- Occupation, industrial area [natural resource, land]: 0.00176962 m2*year; lognormal variance with pedigree 0.112, pedigree (4,4,5,5,1)
  Rough estimation based on company data
  Uncertainty: rough estimation based on company data
- Transformation, from unspecified [natural resource, land]: 3.66386e-5 m2; lognormal variance with pedigree 0.192, pedigree (4,4,5,5,1)
  Rough estimation based on company data
  Uncertainty: rough estimation based on company data
- Water, unspecified natural origin [natural resource, in water]: 7.31861e-8 m3; lognormal variance with pedigree 0.1246, pedigree (2,4,5,5,4)
  Approximation with company data of similar branch
  Uncertainty: approximation with company data of similar branch
- Transformation, to industrial area [natural resource, land]: 3.66553e-5 m2; lognormal variance with pedigree 0.192, pedigree (4,4,5,5,1)
  Rough estimation based on company data
  Uncertainty: rough estimation based on company data
- Occupation, grassland, natural (non-use) [natural resource, land]: 3.85257e-6 m2*year; lognormal variance with pedigree 0.002, pedigree (1,1,3,1,1)
  Calculated value. Total occupation for high voltage lines divided by the total number of kilometres in the network
  Uncertainty: Calculated variable. Uncertainty will be determined from propagation of uncertainty factors of underlying variables. Uncertainty of actual relation between variables not accounted at this time, although this could be included in a future update.
- Transformation, from forest, primary (non-use) [natural resource, land]: 5.1572e-8 m2; lognormal variance with pedigree 0.002, pedigree (1,1,3,1,1)
  Calculated value. Total transformation for transforming substations and high voltage lines divided by the total number of kilometres in the network. It is assumed a width of 75m for high voltage lines.
  Uncertainty: Calculated variable. Uncertainty will be determined from propagation of uncertainty factors of underlying variables. Uncertainty of actual relation between variables not accounted at this time, although this could be included in a future update.
- Transformation, to grassland, natural (non-use) [natural resource, land]: 5.13676e-8 m2; lognormal variance with pedigree 0.002, pedigree (1,1,3,1,1)
  Calculated value. Total transformation for high voltage lines divided by the total number of kilometres in the network
  Uncertainty: Calculated variable. Uncertainty will be determined from propagation of uncertainty factors of underlying variables. Uncertainty of actual relation between variables not accounted at this time, although this could be included in a future update.
- Water, well, in ground [natural resource, in water]: 0.00275918 m3; lognormal variance with pedigree 0.0046, pedigree (3,1,3,1,1)
  Literatue value.
- Water, river [natural resource, in water]: 0.0042033 m3; lognormal variance with pedigree 0.0046, pedigree (3,1,3,1,1)
  Literature value.
- Transformation, from urban, green area [natural resource, land]: 4.53056e-9 m2; lognormal variance with pedigree 0.242225, pedigree (1,4,2,2,5)
  Calculated value. Based on survey data.
- Transformation, to urban, continuously built [natural resource, land]: 4.53056e-9 m2; lognormal variance with pedigree 0.242225, pedigree (1,4,2,2,5)
  Calculated value. Based on survey data.
- Occupation, urban, continuously built [natural resource, land]: 3.39792e-7 m2*year; lognormal variance with pedigree 0.162225, pedigree (1,4,2,2,5)
  Calculated value. Based on survey data, the gross floor area multiplied by the lifetime of the building.
- Transformation, from heterogeneous, agricultural [natural resource, land]: 5.15013e-9 m2; lognormal variance with pedigree 0.1746, pedigree (2,4,5,5,1)
  Literature studies
  Uncertainty: literature studies
- Water, cooling, unspecified natural origin [natural resource, in water]: 4.5e-5 m3; lognormal variance with pedigree 0.0612, pedigree (2,3,5,5,3)
  Typical values, based on a European and a Swiss study
  Uncertainty: typical values, based on a European and a Swiss study
- Transformation, from forest, unspecified [natural resource, land]: 1.87388e-11 m2; lognormal variance with pedigree 0.14, pedigree (5,5,5,5,1)
  Estimates
  Uncertainty: estimates
- Transformation, from annual crop [natural resource, land]: 2.34984e-11 m2; lognormal variance with pedigree 0.18, pedigree (5,5,5,5,1)
  Estimates
  Uncertainty: estimates

## Emissions to nature
- Cobalt [water, surface water]: 0 kg; pedigree (1,1,1,1,1)
  Emissions to water from waste composition and transfer coefficients in incinerator and landfills.
  Uncertainty: uncertainty is calculated from uncertainties in waste composition and transfer coefficients in incinerator and landfills
- Arsenic, ion [water, ground-, long-term]: 0 kg; pedigree (1,1,1,1,1)
  Long-term emissions from landfilling of incineration residues.
  Uncertainty: uncertainty is calculated from uncertainties in waste composition and transfer coefficients in incinerator and landfills.
- Ammonia [air, urban air close to ground]: 0 kg; pedigree (1,1,1,1,1)
  Nitrogen species emitted to air after DeNOx stage.
  Uncertainty: uncertainty calculated from uncertainty in average N-emissions and uncertainty in the share of thermal NOx and the uncertainty in nitrogen content in *this* waste.
- BOD5, Biological Oxygen Demand [water, surface water]: 0 kg; pedigree (1,1,1,1,1)
  (same comment as for Cobalt)
- Vanadium [air, urban air close to ground]: 0 kg; pedigree (1,1,1,1,1)
  Emission to air from waste composition and transfer coefficients.
  Uncertainty: uncertainty is calculated from uncertainties in waste composition and transfer coefficients in incinerator
- Hydrogen chloride [air, urban air close to ground]: 0 kg; pedigree (1,1,1,1,1)
  (same comment as for Vanadium)
- Iron [air, urban air close to ground]: 0 kg; pedigree (1,1,1,1,1)
  (same comment as for Vanadium)
- Nitrogen oxides [air, urban air close to ground]: 0 kg; pedigree (1,1,1,1,1)
  Sum of fuel-Nox and thermal-NOx emitted to air after DeNOx stage.
  Uncertainty: uncertainty calculated from uncertainty in average N-emissions and uncertainty in the share of thermal NOx and the uncertainty in nitrogen content in *this* waste.
- Antimony [water, ground-, long-term]: 0 kg; pedigree (1,1,1,1,1)
  (same comment as for Arsenic, ion)
- Mercury [water, surface water]: 0 kg; pedigree (1,1,1,1,1)
  (same comment as for Cobalt)
- DOC, Dissolved Organic Carbon [water, surface water]: 0 kg; pedigree (1,1,1,1,1)
  (same comment as for Cobalt)
- Lead [water, ground-, long-term]: 0 kg; pedigree (1,1,1,1,1)
  (same comment as for Arsenic, ion)
- Fluoride [water, ground-, long-term]: 0 kg; pedigree (1,1,1,1,1)
  (same comment as for Arsenic, ion)
- Sulfur dioxide [air, urban air close to ground]: 0 kg; pedigree (1,1,1,1,1)
  (same comment as for Vanadium)
- Sodium, ion [water, ground-, long-term]: 0 kg; pedigree (1,1,1,1,1)
  (same comment as for Arsenic, ion)
- Heat, waste [water, surface water]: 0 MJ; pedigree (1,1,1,1,1)
  Waste heat generated from heating value of this waste plus any electricity required to process it.
  Uncertainty: uncertainty is calculated from uncertainties in waste composition and uncertainties in energy efficiency and the uncertainty in internal energy demand
- Hydrogen fluoride [air, urban air close to ground]: 0 kg; pedigree (1,1,1,1,1)
  (same comment as for Vanadium)
- Arsenic, ion [water, surface water]: 0 kg; pedigree (1,1,1,1,1)
  (same comment as for Cobalt)
- Tin, ion [water, surface water]: 0 kg; pedigree (1,1,1,1,1)
  (same comment as for Cobalt)
- Manganese [water, surface water]: 0 kg; pedigree (1,1,1,1,1)
  (same comment as for Cobalt)
- Copper, ion [water, surface water]: 0 kg; pedigree (1,1,1,1,1)
  (same comment as for Cobalt)
- Beryllium [water, surface water]: 0 kg; pedigree (1,1,1,1,1)
  (same comment as for Cobalt)
- Titanium [air, urban air close to ground]: 0 kg; pedigree (1,1,1,1,1)
  (same comment as for Vanadium)
- Toluene [air, urban air close to ground]: 0 kg; pedigree (1,1,1,1,1)
  Incomplete combustion product emitted to air.
  Uncertainty: uncertainty calculated from uncertainty in average operation emissions, and the uncertainty of the flue gas volume from this waste.
- Water [water, surface water]: 0 m3; pedigree (1,1,1,1,1)
  Process water released to surface water.
  Uncertainty: uncertainty calculated from uncertainty in process water input and the uncertainty of fraction to surface water.
- Zinc [air, urban air close to ground]: 0 kg; pedigree (1,1,1,1,1)
  (same comment as for Vanadium)
- Vanadium, ion [water, surface water]: 0 kg; pedigree (1,1,1,1,1)
  (same comment as for Cobalt)
- Nickel, ion [water, surface water]: 0 kg; pedigree (1,1,1,1,1)
  (same comment as for Cobalt)
- Strontium [air, urban air close to ground]: 0 kg; pedigree (1,1,1,1,1)
  (same comment as for Vanadium)
- Benzo(a)pyrene [air, urban air close to ground]: 0 kg; pedigree (1,1,1,1,1)
  (same comment as for Toluene)
- Sodium, ion [water, surface water]: 0 kg; pedigree (1,1,1,1,1)
  (same comment as for Cobalt)
- Titanium, ion [water, surface water]: 0 kg; pedigree (1,1,1,1,1)
  (same comment as for Cobalt)
- Bromine [air, urban air close to ground]: 0 kg; pedigree (1,1,1,1,1)
  (same comment as for Vanadium)
- Aluminium [air, urban air close to ground]: 0 kg; pedigree (1,1,1,1,1)
  (same comment as for Vanadium)
- Carbon dioxide, fossil [air, urban air close to ground]: 0 kg; pedigree (1,1,1,1,1)
  (same comment as for Vanadium)
- Sulfate [water, surface water]: 0 kg; pedigree (1,1,1,1,1)
  (same comment as for Cobalt)
- TOC, Total Organic Carbon [water, surface water]: 0 kg; pedigree (1,1,1,1,1)
  (same comment as for Cobalt)
- Selenium [water, surface water]: 0 kg; pedigree (1,1,1,1,1)
  (same comment as for Cobalt)
- Iron, ion [water, surface water]: 0 kg; pedigree (1,1,1,1,1)
  (same comment as for Cobalt)
- Benzene [air, urban air close to ground]: 0 kg; pedigree (1,1,1,1,1)
  (same comment as for Toluene)
- BOD5, Biological Oxygen Demand [water, ground-, long-term]: 0 kg; pedigree (1,1,1,1,1)
  (same comment as for Arsenic, ion)
- Manganese [air, urban air close to ground]: 0 kg; pedigree (1,1,1,1,1)
  (same comment as for Vanadium)
- Lead [water, surface water]: 0 kg; pedigree (1,1,1,1,1)
  (same comment as for Cobalt)
- Beryllium [water, ground-, long-term]: 0 kg; pedigree (1,1,1,1,1)
  (same comment as for Arsenic, ion)
- Dinitrogen monoxide [air, urban air close to ground]: 0 kg; pedigree (1,1,1,1,1)
  (same comment as for Ammonia)
- Manganese [water, ground-, long-term]: 0 kg; pedigree (1,1,1,1,1)
  (same comment as for Arsenic, ion)
- Nickel [air, urban air close to ground]: 0 kg; pedigree (1,1,1,1,1)
  (same comment as for Vanadium)
- Zinc, ion [water, surface water]: 0 kg; pedigree (1,1,1,1,1)
  (same comment as for Cobalt)
- Thallium [water, ground-, long-term]: 0 kg; pedigree (1,1,1,1,1)
  (same comment as for Arsenic, ion)
- Sulfate [water, ground-, long-term]: 0 kg; pedigree (1,1,1,1,1)
  (same comment as for Arsenic, ion)
- COD, Chemical Oxygen Demand [water, surface water]: 0 kg; pedigree (1,1,1,1,1)
  (same comment as for Cobalt)
- Iron, ion [water, ground-, long-term]: 0 kg; pedigree (1,1,1,1,1)
  (same comment as for Arsenic, ion)
- Vanadium, ion [water, ground-, long-term]: 0 kg; pedigree (1,1,1,1,1)
  (same comment as for Arsenic, ion)
- NMVOC, non-methane volatile organic compounds, unspecified origin [air, urban air close to ground]: 4.07368e-9 kg; lognormal variance with pedigree 0.089657, pedigree (1,1,3,1,1)
  (same comment as for Toluene)
- Barium [water, surface water]: 0 kg; pedigree (1,1,1,1,1)
  (same comment as for Cobalt)
- Copper [air, urban air close to ground]: 0 kg; pedigree (1,1,1,1,1)
  (same comment as for Vanadium)
- Chromium VI [water, surface water]: 0 kg; pedigree (1,1,1,1,1)
  (same comment as for Cobalt)
- Cadmium, ion [water, ground-, long-term]: 0 kg; pedigree (1,1,1,1,1)
  (same comment as for Arsenic, ion)
- Benzene, hexachloro- [air, urban air close to ground]: 0 kg; pedigree (1,1,1,1,1)
  (same comment as for Toluene)
- Phenol, pentachloro- [air, urban air close to ground]: 0 kg; pedigree (1,1,1,1,1)
  (same comment as for Toluene)
- DOC, Dissolved Organic Carbon [water, ground-, long-term]: 0 kg; pedigree (1,1,1,1,1)
  (same comment as for Arsenic, ion)
- Selenium [air, urban air close to ground]: 0 kg; pedigree (1,1,1,1,1)
  (same comment as for Vanadium)
- Antimony [air, urban air close to ground]: 0 kg; pedigree (1,1,1,1,1)
  (same comment as for Vanadium)
- Cyanide [air, urban air close to ground]: 0 kg; pedigree (1,1,1,1,1)
  (same comment as for Ammonia)
- Cadmium, ion [water, surface water]: 0 kg; pedigree (1,1,1,1,1)
  (same comment as for Cobalt)
- TOC, Total Organic Carbon [water, ground-, long-term]: 0 kg; pedigree (1,1,1,1,1)
  (same comment as for Arsenic, ion)
- Water [air, urban air close to ground]: 0 m3; pedigree (1,1,1,1,1)
  Water vapour from waste humidity, hydrogen oxidation and part of the process water.
  Uncertainty: Uncertainty calculated from uncertainty in waste composition, process water input and the uncertainty of fraction to air.
- Aluminium [water, surface water]: 0 kg; pedigree (1,1,1,1,1)
  (same comment as for Cobalt)
- Mercury [water, ground-, long-term]: 0 kg; pedigree (1,1,1,1,1)
  (same comment as for Arsenic, ion)
- Tin, ion [water, ground-, long-term]: 0 kg; pedigree (1,1,1,1,1)
  (same comment as for Arsenic, ion)
- Chromium VI [water, ground-, long-term]: 0 kg; pedigree (1,1,1,1,1)
  (same comment as for Arsenic, ion)
- Arsenic [air, urban air close to ground]: 0 kg; pedigree (1,1,1,1,1)
  (same comment as for Vanadium)
- Heat, waste [air, urban air close to ground]: 0 MJ; pedigree (1,1,1,1,1)
  (same comment as for Heat, waste)
- Strontium [water, ground-, long-term]: 0 kg; pedigree (1,1,1,1,1)
  (same comment as for Arsenic, ion)
- Dioxins, measured as 2,3,7,8-tetrachlorodibenzo-p-dioxin [air, urban air close to ground]: 0 kg; pedigree (1,1,1,1,1)
  (same comment as for Toluene)
- Particulates, > 2.5 um, and < 10um [air, urban air close to ground]: 9.11842e-9 kg; lognormal variance with pedigree 0.19552, pedigree (1,1,3,1,1)
  (same comment as for Toluene)
- Methane, fossil [air, urban air close to ground]: 0 kg; pedigree (1,1,1,1,1)
  (same comment as for Toluene)
- Tin [air, urban air close to ground]: 0 kg; pedigree (1,1,1,1,1)
  (same comment as for Vanadium)
- Barium [air, urban air close to ground]: 0 kg; pedigree (1,1,1,1,1)
  (same comment as for Vanadium)
- Zinc, ion [water, ground-, long-term]: 0 kg; pedigree (1,1,1,1,1)
  (same comment as for Arsenic, ion)
- Strontium [water, surface water]: 0 kg; pedigree (1,1,1,1,1)
  (same comment as for Cobalt)
- Particulates, < 2.5 um [air, urban air close to ground]: 0 kg; pedigree (1,1,1,1,1)
  (same comment as for Toluene)
- Thallium [air, urban air close to ground]: 0 kg; pedigree (1,1,1,1,1)
  (same comment as for Vanadium)
- Nitrate [water, surface water]: 0 kg; pedigree (1,1,1,1,1)
  (same comment as for Cobalt)
- Cobalt [air, urban air close to ground]: 0 kg; pedigree (1,1,1,1,1)
  (same comment as for Vanadium)
- Benzene, pentachloro- [air, urban air close to ground]: 0 kg; pedigree (1,1,1,1,1)
  (same comment as for Toluene)
- Chloride [water, ground-, long-term]: 0 kg; pedigree (1,1,1,1,1)
  (same comment as for Arsenic, ion)
- Nickel, ion [water, ground-, long-term]: 0 kg; pedigree (1,1,1,1,1)
  (same comment as for Arsenic, ion)
- Lead [air, urban air close to ground]: 0 kg; pedigree (1,1,1,1,1)
  (same comment as for Vanadium)
- Fluoride [water, surface water]: 0 kg; pedigree (1,1,1,1,1)
  (same comment as for Cobalt)
- Cadmium [air, urban air close to ground]: 0 kg; pedigree (1,1,1,1,1)
  (same comment as for Vanadium)
- Cobalt [water, ground-, long-term]: 0 kg; pedigree (1,1,1,1,1)
  (same comment as for Arsenic, ion)
- COD, Chemical Oxygen Demand [water, ground-, long-term]: 0 kg; pedigree (1,1,1,1,1)
  (same comment as for Arsenic, ion)
- Carbon monoxide, fossil [air, urban air close to ground]: 0 kg; pedigree (1,1,1,1,1)
  (same comment as for Toluene)
- Aluminium [water, ground-, long-term]: 0 kg; pedigree (1,1,1,1,1)
  (same comment as for Arsenic, ion)
- Thallium [water, surface water]: 0 kg; pedigree (1,1,1,1,1)
  (same comment as for Cobalt)
- Chromium, ion [water, surface water]: 0 kg; pedigree (1,1,1,1,1)
  (same comment as for Cobalt)
- Selenium [water, ground-, long-term]: 0 kg; pedigree (1,1,1,1,1)
  (same comment as for Arsenic, ion)
- Chromium [air, urban air close to ground]: 0 kg; pedigree (1,1,1,1,1)
  (same comment as for Vanadium)
- Antimony [water, surface water]: 0 kg; pedigree (1,1,1,1,1)
  (same comment as for Cobalt)
- Chloride [water, surface water]: 0 kg; pedigree (1,1,1,1,1)
  (same comment as for Cobalt)
- Barium [water, ground-, long-term]: 0 kg; pedigree (1,1,1,1,1)
  (same comment as for Arsenic, ion)
- Nitrate [water, ground-, long-term]: 0 kg; pedigree (1,1,1,1,1)
  (same comment as for Arsenic, ion)
- Titanium, ion [water, ground-, long-term]: 0 kg; pedigree (1,1,1,1,1)
  (same comment as for Arsenic, ion)
- Sodium [air, urban air close to ground]: 0 kg; pedigree (1,1,1,1,1)
  (same comment as for Vanadium)
- Mercury [air, urban air close to ground]: 6.36255e-10 kg; lognormal variance with pedigree 1.5929, pedigree (1,1,3,1,1)
  (same comment as for Vanadium)
- Copper, ion [water, ground-, long-term]: 0 kg; pedigree (1,1,1,1,1)
  (same comment as for Arsenic, ion)
- Bromine [water, ground-, long-term]: 0 kg; pedigree (1,1,1,1,1)
  (same comment as for Arsenic, ion)
- Bromine [water, surface water]: 0 kg; pedigree (1,1,1,1,1)
  (same comment as for Cobalt)
- Water [air, unspecified]: 1.80073e-5 m3; lognormal variance with pedigree 0.0827, pedigree (2,2,5,5,1)
  Calculated value based on literature values and expert opinion. See comments in the parametres' comment field.
- Arsenic, ion [water, unspecified]: 9.14935e-10 kg
  (same comment as for integrated circuit, logic type)
- Arsenic [air, unspecified]: 6.45163e-11 kg
  (same comment as for integrated circuit, logic type)
- Lead [air, unspecified]: 1.81969e-10 kg
  (same comment as for integrated circuit, logic type)
- Lead [soil, unspecified]: 1.52701e-12 kg
  (same comment as for integrated circuit, logic type)
- Arsenic [soil, unspecified]: 2.56277e-13 kg
  (same comment as for integrated circuit, logic type)
- Lead [water, unspecified]: 4.40289e-9 kg
  (same comment as for integrated circuit, logic type)
- Ethane, 1,1-difluoro-, HFC-152a [air, urban air close to ground]: 2.91386e-9 kg; lognormal variance with pedigree 0.122825, pedigree (1,4,2,2,2)
  Used here in place of pentafluoropropane released to the atmosphere. The output amount is set equal to the amount of input material, 1,1-difluoroethane. Data from Xiao et al. 2015.
- Water [water, unspecified]: 3.05318e-5 m3; lognormal variance with pedigree 0.0827, pedigree (2,2,5,5,1)
  (same comment as for Water)
- NMVOC, non-methane volatile organic compounds, unspecified origin [air, unspecified]: 4.47475e-12 kg; lognormal variance with pedigree 0.1712, pedigree (3,5,5,4,2)
  (same comment as for gravel, crushed)
- Fluoride [soil, unspecified]: 5.67891e-11 kg; lognormal variance with pedigree 0.0946, pedigree (3,3,5,5,1)
  Information from LCA on wooden poles
  Uncertainty: information from LCA on wooden poles
- Phenol, pentachloro- [air, unspecified]: 2.26253e-14 kg; lognormal variance with pedigree 0.1712, pedigree (3,5,5,4,2)
  (same comment as for gravel, crushed)
- Copper [soil, unspecified]: 5.21775e-11 kg; lognormal variance with pedigree 0.0946, pedigree (3,3,5,5,1)
  Information from LCA on wooden poles
  Uncertainty: information from LCA on wooden poles
- Sulfur hexafluoride [air, unspecified]: 3.37091e-13 kg; lognormal variance with pedigree 0.082, pedigree (1,1,5,5,1)
  Statistics
  Uncertainty: statistics
- Hydrocarbons, unspecified [soil, unspecified]: 7.03902e-13 kg; lognormal variance with pedigree 0.1712, pedigree (3,5,5,4,2)
  (same comment as for gravel, crushed)
- Phenol, pentachloro- [soil, unspecified]: 0 kg; pedigree (1,1,1,1,1)
  (same comment as for gravel, crushed)
- Boron [soil, unspecified]: 1.48542e-11 kg; lognormal variance with pedigree 0.0946, pedigree (3,3,5,5,1)
  Information from LCA on wooden poles
  Uncertainty: information from LCA on wooden poles
- Chromium VI [soil, unspecified]: 8.3623e-11 kg; lognormal variance with pedigree 0.0946, pedigree (3,3,5,5,1)
  Information from LCA on wooden poles
  Uncertainty: information from LCA on wooden poles
