# uranium production, enriched 4.2%, centrifugal enrichment

Dataset: EcoSpold 2, unit process
Geography: RoW
Time period: 1980-01-01 to 2019-12-31
Technology level: current
Classification: ISIC rev.4 ecoinvent: 2011a: Manufacture of nuclear fuels
Classification: EcoSpold01Categories: nuclear power/production
Tags: ConvertedDataset
Scenario: Business-as-Usual
System model: Allocation at the point of substitution
Generated by: Roberto Dones
Published in: Dones, R. 2007
Database: ecoinvent
isCopyrightProtected: true
accessRestrictedTo: 1

## General comment
Modeled is the operation of a plant fabricating UO2 fuel for light water nuclear reactors (PWR and BWR), with no MOX (mixed oxides), no RepU (reprocessed fuel), and no HEU (highly enriched uranium from warheads) fuel elements. Hence the radioactive emissions (and spectrum) as well as the radioactive solid waste may have been somewhat underestimated. Data for the operation of a nuclear fuel fabrication facility are relatively old but emissions to water are complete for a US plant. Radioactive emissions to air and water have been taken or derived from two commercial German facilities: both (one operational, the other closed) exhibit emissions per unit of product fuel much lower than data published in the 1980s. An average value of the two plants is used. Zirconium for cladding is modelled as chromium, for lack of complete information on its metallurgical process; the uncertainty value reflects only the amount. This module is linked with one enrichment module with specific characteristics for the mix or enrichment processes and electricity supply mix; hence, before using the cumulated results of this module the conditions for enrichment should be verified.
[This dataset was already contained in the ecoinvent database version 2. It was not individually updated during the transfer to ecoinvent version 3. Life Cycle Impact Assessment results may still have changed, as they are affected by changes in the supply chain, i.e. in other datasets. This dataset was generated following the ecoinvent quality guidelines for version 2. It may have been subject to central changes described in the ecoinvent version 3 change report (http://www.ecoinvent.org/database/ecoinvent-version-3/reports-of-changes/), and the results of the central updates were reviewed extensively. The changes added e.g. consistent water flows and other information throughout the database. The documentation of this dataset can be found in the ecoinvent reports of version 2, which are still available via the ecoinvent website. The change report linked above covers all central changes that were made during the conversion process.]

## Included activities end
The module includes: input of enriched uranium given in terms of separative work units per kg enriched uranium; electricity and light fuel oil used for operation; zirconium requirements for the cladding; water use and wastewater treatment; cement assumed to be used for conditioning of contaminated scrap from decommissioning; transport requirements of operation materials, industrial wastes, and contaminated waste from decommissioning. Radioactive and non-radioactive emissions to air and to water from the operation are also included. The infrastructure requirements are accounted for, though construction and operation data partially refer to different plants rather than to one single unit.

## Geography
North American and European conditions

## Technology
Information regards facilities operating in the 1980s, with few more recent data.

## Parameters
- fraction, water, decarbonised, to air: 0.3875; name fraction_WDC_to_air; lognormal variance with pedigree 0.092025, pedigree (4,4,3,2,4)
- fraction, cooling water, to air: 0.3875; name fraction_CW_to_air; = (0.5*fraction_CW_OT_to_air)+(0.5*fraction_CW_R_to_air); lognormal variance with pedigree 0.092025, pedigree (4,4,3,2,4)
  Calculated value based on literature value (see comments of the other parametres present in this dataset) and expert opinion. In the case when no industry/literature data are available about the type of cooling or directly fraction, cooling water, to air specific for the process a default assumption is applied. It is assumed that the once-through cooling system is used in 50% of all cases and recirculating system is used in another 50% of all cases.
- fraction, cooling water, recirculating system, to air: 0.771; name fraction_CW_R_to_air; lognormal variance with pedigree 0.0413, pedigree (2,3,1,3,1)
  Calculated based on literature value (Scown, C.D., 2011, Water Footprint of U.S. Transportation Fuels and supplying information of the article) (Vionnet, S., Quantis Water Database - Technical Report, 2012).
- fraction, cooling water, once-through system, to air: 0.004; name fraction_CW_OT_to_air; lognormal variance with pedigree 0.0413, pedigree (2,3,1,3,1)
  (same comment as for fraction, cooling water, recirculating system, to air)
- fraction, cooling water, cooling pond system, to air: 0.032; name fraction_CW_CP_to_air; lognormal variance with pedigree 0.0413, pedigree (2,3,1,3,1)
  (same comment as for fraction, cooling water, recirculating system, to air)

## Reference product
- enriched uranium, 4.2%: 1 kg; CPC 33620: Uranium enriched in U235 and its compounds; plutonium and its compounds; alloys, dispersions, ceramic products[…]; By-product classification allocatable product
  EcoSpold01Location=CH
  production volume 3.96633 kg
    This is a placeholder value that does not reflect real-world production volumes. This dataset does not currently require a real-world production volume to work in the database framework, and no actual data were collected yet. This has no negative effect on the results of the ecoinvent database.
  property price 586 EUR2005
    UN Data. Commodity: Uranium (enriched 235), plutonium compounds, alloys. Average import price (trade/quantity) Germany-France.
  property carbon content 0
    carbon content on a dry matter basis (reserved; not for manual entry)
  property true value 586
    allocation property applied in "true value" allocation // value calculated from revenue
  properties: carbon content, non-fossil 0, wet mass 1 kg, water in wet mass 0 kg, dry mass 1 kg, water content 0, carbon content, fossil 0, carbon allocation 0 kg

## By-products
- electricity, for reuse in municipal waste incineration only: 0 kWh; CPC 17100: Electrical energy; By-product classification allocatable product; pedigree (1,1,1,1,1)
  Net electricity generated from this waste and used in internal MSWI plant energy redistribution.
  Uncertainty: uncertainty is calculated from uncertainties in waste composition and uncertainties in energy efficiency and the uncertainty in internal energy demand
  production volume 0.00360983 kWh
  property exergy 3.6 MJ; name E_el_prod_MSWI_exergy
    This exergy property is based on the exergy content of the product.
  property true value relation 3.6; name E_el_prod_MSWI_true_value_relation
    property to calculate "true value" from
  property price 0.1 EUR2005; name E_el_prod_MSWI_price_EUR2005
    Estimated to be the same price as in case of electricity, medium voltage.
  property true value 0.000155044
    allocation property applied in "true value" allocation // value calculated from true value relation
- heat, for reuse in municipal waste incineration only: 0 MJ; CPC 17300: Steam and hot water; By-product classification allocatable product; pedigree (1,1,1,1,1)
  Net useful heat generated from this waste and used in internal MSWI plant energy redistribution.
  Uncertainty: uncertainty is calculated from uncertainties in waste composition and uncertainties in energy efficiency and the uncertainty in internal energy demand
  production volume 0.0259909 MJ
  property true value relation 0.1842; name E_th_prod_MSWI_true_value_relation
    property to calculate "true value" from
  property exergy 0.1842 MJ; name E_th_prod_MSWI_exergy
    This exergy property is based on the exergy content of the product.
  property price 0.0106 EUR2005; name E_th_prod_MSWI_price_EUR2005
    Average European district heat price from Ecoheatcool and Euroheat 2005-2006, Ecoheat Work package 1: The European heat market. Final report. 10.6 EUR/GJ i s the price of district heat. http://www.solarthermalworld.org/files/Ecoheatcool%20WP1%20Web.pdf?download
  property true value 5.71183e-5
    (same comment as for electricity, for reuse in municipal waste incineration only)
- zinc concentrate: 0 kg; CPC 14290: Other non-ferrous metal ores and concentrates (other than uranium or thorium ores and concentrates); By-product classification allocatable product
  Calculated value from the knowledge of the properties of both products.
  production volume 8.2291e-14 kg
  property price 0.38 EUR2005; name ByP_price_EUR2005
    Temporary price data. Calculated as 90% of purchasers price based on: Zinc content in concentrate 53%. Concentrate price per kg Zn 86.5% of refined Zn price (13.5% treatment charges according to CHR Metals Limited 2005: Dynamic cost curves. http://www.minecost.com/dynamic.pdf). 2004 zinc price from USGS (2007) Mineral commodity summaries 2007. <http://minerals.usgs.gov/minerals/pubs/mcs/2007/mcs2007.pdf> [Accessed 25 May 2010]
  property zinc content 0.53; name zinc_C_zinc_concentrate
    Zinc content on a dry matter basis. Value taken from teh "zinc mine operation" /GLO dataset.
  property dry mass 1 kg; name DM_zinc_concentrate
  property carbon content 0
    carbon content on a dry matter basis (reserved; not for manual entry)
  property true value 1.04235e-14
    allocation property applied in "true value" allocation // value calculated from revenue
  properties: wet mass 1 kg, water content 0, carbon content, non-fossil 0, carbon content, fossil 0, water in wet mass 0 kg, carbon allocation 0 kg

## Inputs from technosphere
- nuclear fuel factory: 3.7e-8 unit; lognormal variance with pedigree 0.082, pedigree (1,1,5,5,1)
  own estimation
  EcoSpold01Location=GLO
- uranium, enriched 4.2%, per separative work unit: 6.12 unit; lognormal variance with pedigree 0.042, pedigree (1,1,5,5,1)
  calculated
  EcoSpold01Location=CH
  properties: wet mass 1 kg, dry mass 1 kg
- low level radioactive waste: -0.000333 m3; lognormal variance with pedigree 0.342, pedigree (1,1,5,5,1)
  own assumption
  EcoSpold01Location=CH
  production volume 0.000999 m3
    Calculated from the production volume of enriched uranium, 4.2% in proportion to the respective output amounts.
  properties: dry mass 2500 kg, wet mass 2500 kg
- wastewater, unpolluted: -0.135 m3; lognormal variance with pedigree 0.162, pedigree (1,1,5,5,1)
  EcoSpold01Location=CH
  old reference
  production volume 0.405 m3
    (same comment as for low level radioactive waste)
  properties: carbon content, non-fossil 0.00178991, water content 2962.17, carbon content, fossil 0.00178991, dry mass 0.337476 kg, wet mass 1000 kg
  note on carbon content, fossil: Assumed to be like in tap water. Bicarbonate content is 2.93 mol/m3. CO2 content is 0.1 mol/m3 (ecoinvent v2.2 report 8, Tab 93.1).
- cement, unspecified: 0 kg; pedigree (1,1,1,1,1)
  EcoSpold01Location=CH
  own assumption
  properties: dry mass 1 kg, wet mass 1 kg
- water, decarbonised: 0 kg; name water_decarbonised_input; pedigree (1,1,1,1,1)
  EcoSpold01Location=RER
  old reference
  properties: wet mass 1 kg
- inert waste, for final disposal: -0.8 kg; lognormal variance with pedigree 0.042, pedigree (1,1,5,5,1)
  own assumption
  EcoSpold01Location=CH
  production volume 2.4 kg
    (same comment as for low level radioactive waste)
  properties: water content 0.00502513, dry mass 0.995 kg, wet mass 1 kg
- heat, district or industrial, other than natural gas: 0 MJ; pedigree (1,1,1,1,1)
  old reference & own assumption
  EcoSpold01Location=CH
- chromium: 0.6 kg; lognormal variance with pedigree 0.042, pedigree (1,1,5,5,1)
  EcoSpold01Location=RER
  estimation on number, not on module substituting Zr
  properties: dry mass 1 kg, wet mass 1 kg
- electricity, medium voltage: 0 kWh; pedigree (1,1,1,1,1)
  EcoSpold01Location=UCTE
  old reference & own assumption
- cement, unspecified: 0.000195289, 1.43036e-5, 4.07699e-5, 0.000938572, 0.000922024, 2.71379e-5, 0.000298054, 3.60612e-5, 0.00402779 kg (9 entries); lognormal variance with pedigree 0.162, pedigree (1,1,5,5,1)
  EcoSpold01Location=CH
  own assumption
- water, decarbonised: 5.02952, 13.0868, 52.7821, 12.8891, 2.59838, 8.54398, 0.471678, 6.72132, 15.6567, 98.2103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 kg (12 entries); lognormal variance with pedigree 0.162, pedigree (1,1,5,5,1)
  EcoSpold01Location=RER
  old reference
- heat, district or industrial, other than natural gas: 0.0132675, 0.791836, 29.5949 MJ (3 entries); lognormal variance with pedigree 0.162, pedigree (1,1,5,5,1)
  old reference & own assumption
  EcoSpold01Location=CH
- electricity, medium voltage: 0.379407, 0.0690361, 1.59355, 5.42358, 1.17075, 16.9746, 2.42939, 7.95966 kWh (8 entries); lognormal variance with pedigree 0.162, pedigree (1,1,5,5,1)
  EcoSpold01Location=UCTE
  old reference & own assumption

## Emissions to nature
- Phosphorus [water, surface water]: 0.000217 kg; lognormal variance with pedigree 0.162, pedigree (1,1,5,5,1)
  old reference
- Calcium, ion [water, surface water]: 0.083 kg; lognormal variance with pedigree 0.162, pedigree (1,1,5,5,1)
  old reference
- Manganese [water, surface water]: 1.02e-5 kg; lognormal variance with pedigree 0.162, pedigree (1,1,5,5,1)
  old reference
- VOC, volatile organic compounds, unspecified origin [water, surface water]: 0.0894 kg; lognormal variance with pedigree 0.162, pedigree (1,1,5,5,1)
  old reference
- Silver, ion [water, surface water]: 2.17e-5 kg; lognormal variance with pedigree 0.162, pedigree (1,1,5,5,1)
  old reference
- Uranium alpha [water, surface water]: 0.8 kBq; lognormal variance with pedigree 0.342, pedigree (1,1,5,5,1)
  few recent data, or too old data
- Water [air, unspecified]: 0.11625 m3; name water_to_air_unspecified; lognormal variance with pedigree 0.0827, pedigree (2,2,5,5,1)
  Calculated value based on literature values and expert opinion. See comments in the parametres' comment field.
  property fraction, origin: fresh water 1; name fraction_origin_fresh_water
  property fraction, origin: unspecified 0; name fraction_origin_unspecified
  property fraction, origin: salt water 0; name fraction_origin_salt_water
- Oils, unspecified [water, surface water]: 0.00128 kg; lognormal variance with pedigree 0.162, pedigree (1,1,5,5,1)
  old reference
- Water [water, unspecified]: 0.04875 m3; name water_to_water_unspecified; = (water_decarbonised_input/1000)*(1-fraction_WDC_to_air)-0.135; lognormal variance with pedigree 0.0827, pedigree (2,2,5,5,1)
  (same comment as for Water)
  property dry mass 0 kg; name DM
  property wet mass 1000 kg; name WM
  property water in wet mass 1000 kg; name WWM
  property fraction, origin: salt water 0; name fraction_origin_salt_water_Ww
  property fraction, origin: fresh water 1; name fraction_origin_fresh_water_Ww
  property fraction, origin: unspecified 0; name fraction_origin_unspecified_Ww
  property carbon content, fossil 0; name C_content_fossil
  property carbon content, non-fossil 0; name C_content_non_fossil
- Nickel, ion [water, surface water]: 0.000147 kg; lognormal variance with pedigree 0.162, pedigree (1,1,5,5,1)
  old reference
- Sulfite [water, surface water]: 0.000185 kg; lognormal variance with pedigree 0.162, pedigree (1,1,5,5,1)
  old reference
- Fluoride [water, surface water]: 0.0358 kg; lognormal variance with pedigree 0.162, pedigree (1,1,5,5,1)
  old reference
- Molybdenum [water, surface water]: 2.75e-5 kg; lognormal variance with pedigree 0.162, pedigree (1,1,5,5,1)
  old reference
- Ammonium, ion [water, surface water]: 0.0581 kg; lognormal variance with pedigree 0.162, pedigree (1,1,5,5,1)
  old reference
- Iron, ion [water, surface water]: 0.000153 kg; lognormal variance with pedigree 0.162, pedigree (1,1,5,5,1)
  old reference
- Suspended solids, unspecified [water, surface water]: 0.0023 kg; lognormal variance with pedigree 0.162, pedigree (1,1,5,5,1)
  old reference
- Nitrogen oxides [air, non-urban air or from high stacks]: 0.03 kg; lognormal variance with pedigree 0.162, pedigree (1,1,5,5,1)
  old reference
- DOC, Dissolved Organic Carbon [water, surface water]: 0.00614815 kg; lognormal variance with pedigree 0.162, pedigree (1,1,5,5,1)
  Calculated as equal to TOC.
- TOC, Total Organic Carbon [water, surface water]: 0.00614815 kg; lognormal variance with pedigree 0.162, pedigree (1,1,5,5,1)
  Calculated by default as TOC (gC) = COD/2.7 (COD measured in g O2). Should more correctly be calculated from the carbon content of the specified emissions to water.
- Uranium alpha [air, non-urban air or from high stacks]: 0.0001 kBq; lognormal variance with pedigree 0.342, pedigree (1,1,5,5,1)
  few recent data, or too old data
- NMVOC, non-methane volatile organic compounds, unspecified origin [air, non-urban air or from high stacks]: 0.0033 kg; lognormal variance with pedigree 0.162, pedigree (1,1,5,5,1)
  old reference
- BOD5, Biological Oxygen Demand [water, surface water]: 0.00313 kg; lognormal variance with pedigree 0.162, pedigree (1,1,5,5,1)
  old reference
- Nitrogen [water, surface water]: 0.0703 kg; lognormal variance with pedigree 0.162, pedigree (1,1,5,5,1)
  old reference
- COD, Chemical Oxygen Demand [water, surface water]: 0.0166 kg; lognormal variance with pedigree 0.162, pedigree (1,1,5,5,1)
  old reference
- Magnesium [water, surface water]: 0.000402 kg; lognormal variance with pedigree 0.162, pedigree (1,1,5,5,1)
  old reference
- Chloride [water, surface water]: 0.00703 kg; lognormal variance with pedigree 0.162, pedigree (1,1,5,5,1)
  old reference
- Sodium, ion [water, surface water]: 0.00894 kg; lognormal variance with pedigree 0.162, pedigree (1,1,5,5,1)
  old reference
- Boron [water, surface water]: 6.39e-5 kg; lognormal variance with pedigree 0.162, pedigree (1,1,5,5,1)
  old reference
- Sulfate [water, surface water]: 0.0121 kg; lognormal variance with pedigree 0.162, pedigree (1,1,5,5,1)
  old reference

## Sampling procedure
Literature

## Extrapolations
none This dataset has been copied from an original dataset covering the geography CH. The uncertainty has been adjusted accordingly.

## Review by Hans-Jörg Althaus 2007-10-26
Passed
