# treatment of waste bitumen sheet, municipal incineration

Dataset: EcoSpold 2, unit process
Geography: RoW
Time period: 2006-01-01 to 2019-12-31
Technology level: current
Classification: ISIC rev.4 ecoinvent: 3821:Treatment and disposal of non-hazardous waste
Synonyms: municipal waste incineration; Siedlungsabfallverbrennung; Kehrichtverbrennung
Scenario: Business-as-Usual
System model: Allocation at the point of substitution
Share of production covered: 1.8 %
Generated by: Gabor Doka
Published in: Doka G. 2013
Database: ecoinvent
isCopyrightProtected: true
accessRestrictedTo: 1

## General comment
This dataset represents the activity of waste disposal of waste bitumen sheet in a municipal solid waste incinerator (MSWI) // Recommended use of this dataset: For disposal of bulk or small parts of bitumen sheet (waste building product). Contains 24% inorganic filler. // Inventoried waste contains 6% PE; 7% PS; 24% inert material; 63% bitumen; . // Waste composition (wet, in ppm): upper heating value 31.37 MJ/kg; lower heating value 30.06 MJ/kg; H2O 8922.8; O 139330; H 75813; C 633560; S 25273; N 3363.8; P 2.52; B n.a.; Cl 166.94; Br 62.324; F 1.8605; I n.a.; Ag n.a.; As 0.67925; Ba 27.039; Cd 3.6703; Co 2.5151; Cr 3.7414; Cu 13.161; Hg 0.073095; Mn 7.2257; Mo 0.3528; Ni 64.455; Pb 3.0312; Sb 3.5197; Se 0.38932; Sn 58.077; V 309.39; Zn 78.943; Be 0.062696; Sc n.a.; Sr 11.097; Ti 125.39; Tl 0.050157; W n.a.; Si 112000; Fe 392.12; Ca 159.13; Al 29.489; K n.a.; Mg 5.7538; Na 205.81; // Share of carbon in waste that is biogenic 0%. // Share of metals in waste not oxidised and bulk-recyclable (exclude very small or thin parts) Iron: 0%; Alu: 0%; Copper: 0%. // One kg of this waste produces 0.3409 kg of slag and 0.02691 kg of residues, which are landfilled. Additional solidification with 0.01076 kg of cement. // Net energy production: 3.87MJ/kg electric energy and 7.52MJ/kg thermal energy. // Recovery of metal scrap to recycling: 0g iron scrap, 0g aluminium scrap, 0g copper scrap.

## Included activities start
waste incineration from waste reception gate and delivery into waste bunker at incinerator plant site (without transports to the incinerator)

## Included activities end
Waste-specific short-term emissions to water from leachate. Long-term emissions from landfill to ground water.

## Geography
Specific to the technology mix encountered in Switzerland in 2010. Well applicable to modern incineration practices in Europe, North America or Japan.

## Technology
average Swiss MSWI plants in 2010 (grate incinerators) with electrostatic precipitator for fly ash (ESP), wet flue gas scrubber and 25% SNCR , 42.77% SCR-high dust , 32.68% SCR-low dust -DeNOx facilities and 0% without Denox (weighted according to mass of burnt waste, representing Swiss average). Efficiency of iron scrap separation from slag : 58%. Efficiency of non-ferrous scrap separation from slag : 31%. Gross electric efficiency technology mix 15.84% and Gross thermal efficiency technology mix 28.51%

## Time period
Waste composition as given in literature reference, theoretical data or other source. Transfer coefficients for modern MSWI.

## Reference product
- waste bitumen sheet: 0 kg; CPC 39: Wastes or scraps; By-product classification Waste
  Main reference product of this activity (supply of disposal service).
  production volume 0 kg
    based on estimate on MSW in WTE globally and share of building products in Swiss MSW based on an unqualified estimate of building demand of Swiss population.
  property price 0 EUR2005
    Waste products are assigned a price of zero as they are assumed to require further treatment.
  property carbon content 0.643207
    carbon content on a dry matter basis (reserved; not for manual entry)
  properties: dry mass 0.985 kg, carbon content, fossil 0.643207, water in wet mass 0.015 kg, carbon content, non-fossil 0, water content 0.0152284, wet mass 1 kg, carbon allocation 0.633559 kg
- heat, for reuse in municipal waste incineration only: 1 MJ; CPC 17300: Steam and hot water; By-product classification allocatable product; pedigree (1,1,1,1,1)
  Net electricity generated from this waste and used in internal MSWI plant energy redistribution.
  Uncertainty: uncertainty is calculated from uncertainties in waste composition and uncertainties in energy efficiency and the uncertainty in internal energy demand
  production volume 6.1064e9 MJ

## By-products
- heat, for reuse in municipal waste incineration only: 0 MJ; name E_th_prod_MSWI; CPC 17300: Steam and hot water; By-product classification allocatable product; pedigree (1,1,1,1,1)
  (same comment as for heat, for reuse in municipal waste incineration only)
  production volume 0 MJ
    calculated in proportion to reference product waste input to incinerator
  property exergy 0.1842 MJ; name E_th_prod_MSWI_exergy
    This exergy property is based on the exergy content of the product.
  property price 0.0106 EUR2005; name E_th_prod_MSWI_price_EUR2005
    Average European district heat price from Ecoheatcool and Euroheat 2005-2006, Ecoheat Work package 1: The European heat market. Final report. 10.6 EUR/GJ i s the price of district heat. http://www.solarthermalworld.org/files/Ecoheatcool%20WP1%20Web.pdf?download
  property true value relation 0.1842; name E_th_prod_MSWI_true_value_relation
    property to calculate "true value" from
- electricity, for reuse in municipal waste incineration only: 0 kWh; name E_el_prod_MSWI; CPC 17100: Electrical energy; By-product classification allocatable product; pedigree (1,1,1,1,1)
  (same comment as for heat, for reuse in municipal waste incineration only)
  production volume 0 kWh
    calculated in proportion to reference product waste input to incinerator
  property exergy 3.6 MJ; name E_el_prod_MSWI_exergy
    This exergy property is based on the exergy content of the product.
  property true value relation 3.6; name E_el_prod_MSWI_true_value_relation
    property to calculate "true value" from
  property price 0.1 EUR2005; name E_el_prod_MSWI_price_EUR2005
    Estimated to be the same price as in case of electricity, medium voltage.

## Inputs from technosphere
- process-specific burdens, slag landfill: 0, 0, 0 kg (3 entries); pedigree (1,1,1,1,1)
  Mass-specific expenditures required for landfilling of bottom ash.
  Uncertainty: uncertainty is calculated from uncertainties in waste composition and transfer coefficients in incinerator
- water, decarbonised: 0, 0, 0, 0, 0, 0 kg (6 entries); pedigree (1,1,1,1,1)
  Incinerator process water used in flue gas scrubber stage.
  Uncertainty: uncertainty calculated from uncertainty in average water input, and the uncertainty of the waste composition of this waste
  properties: wet mass 1 kg
- waste cement, hydrated: 0 kg; pedigree (1,1,1,1,1)
  Hydrated cement output for solidification of landfilled residual material.
  Uncertainty: Uncertainty calculated from uncertainty of the waste composition of this waste and transfer coefficients in the incinerator and of the solidification recipe.
  production volume 0 kg
    calculated in proportion to reference product waste input to incinerator
  properties: wet mass 1 kg, dry mass 1 kg
- sodium hydroxide, without water, in 50% solution state: 6.51663e-5 kg; lognormal variance with pedigree 0.14575, pedigree (1,1,3,1,1)
  Auxilliary inputs for the flue gas treatment stage of the incinerator plant.
  Uncertainty: uncertainty calculated from uncertainty in average NaOH input, of transfer coefficients in the incinerator, and the uncertainty of the waste composition of this waste
  properties: wet mass 1 kg, dry mass 1 kg
- heat, district or industrial, natural gas: 0, 0 MJ (2 entries); pedigree (1,1,1,1,1)
  Input to DeNOx stage, to heat up flue gas in low-dust SCR.
  Uncertainty: uncertainty calculated from uncertainty in average DeNOx input, uncertainty in the share of thermal NOx, uncertainty of nitrogen content in average municipal waste and the uncertainty in nitrogen content in *this* waste.
- process-specific burdens, residual material landfill: 0, 0, 0 kg (3 entries); pedigree (1,1,1,1,1)
  Mass-specific expenditures required for landfilling of incineration residues.
  Uncertainty: uncertainty is calculated from uncertainties in waste composition and transfer coefficients in incinerator
- residual material landfill: 0 unit; pedigree (1,1,1,1,1)
  Landfill infrastructure required for landfilling of incineration residues.
  Uncertainty: uncertainty is calculated from uncertainties in waste composition and transfer coefficients in incinerator
- chemical, organic: 2.96011e-5 kg; lognormal variance with pedigree 1.3045, pedigree (1,1,3,1,1)
  Auxilliary inputs for the wastewater treatment stage of the incinerator plant. Proxy for (pure) Trisodium-trimercapto-s-triazine (CAS 17766-26-6), used as 15% diluted solution, aka TMT15.
  Uncertainty: uncertainty calculated from uncertainty in average TMT15 input, of transfer coefficients in the incinerator, and the uncertainty of the waste composition of this waste
  properties: wet mass 1 kg, carbon content, fossil 0.628, dry mass 1 kg
- hydrochloric acid, without water, in 30% solution state: 0 kg; pedigree (1,1,1,1,1)
  Auxilliary inputs for the wastewater treatment stage of the incinerator plant.
  Uncertainty: uncertainty calculated from uncertainty in average HCl input, of transfer coefficients in the incinerator, and the uncertainty of the waste composition of this waste
  properties: wet mass 1 kg, dry mass 1 kg
- chromium oxide, flakes: 0 kg; pedigree (1,1,1,1,1)
  Input to DeNOx stage.
  Uncertainty: uncertainty calculated from uncertainty in average DeNOx input, uncertainty in the share of thermal NOx, uncertainty of nitrogen content in average municipal waste and the uncertainty in nitrogen content in *this* waste.
  properties: dry mass 1 kg, wet mass 1 kg
- cement, unspecified: 0 kg; pedigree (1,1,1,1,1)
  Cement required for solidification of landfilled residual material.
  Uncertainty: Uncertainty calculated from uncertainty of the waste composition of this waste, of transfer coefficients in the incinerator and of the solidification recipe.
  properties: wet mass 1 kg, dry mass 1 kg
- ammonia, liquid: 0 kg; pedigree (1,1,1,1,1)
  Input to DeNOx stage (100% NH3).
  Uncertainty: uncertainty calculated from uncertainty in average DeNOx input, uncertainty in the share of thermal NOx, uncertainty of nitrogen content in average municipal waste and the uncertainty in nitrogen content in *this* waste.
  properties: wet mass 1 kg, dry mass 1 kg
- municipal waste incineration facility: 0 unit
  Demands per kilogram waste.
- iron (III) chloride, without water, in 40% solution state: 0 kg; pedigree (1,1,1,1,1)
  Auxilliary inputs for the wastewater treatment stage of the incinerator plant.
  Uncertainty: uncertainty calculated from uncertainty in average FeCl3 input, of transfer coefficients in the incinerator, and the uncertainty of the waste composition of this waste
  properties: wet mass 1 kg, dry mass 1 kg
- transport, freight, lorry, unspecified: 0, 0, 0 metric ton*km (3 entries); pedigree (1,1,1,1,1)
  Transport services to transport incineration residues to landfills.
  Uncertainty: uncertainty calculated from uncertainty of the waste composition of this waste, uncertainty of transfer coefficients and the uncertainty in generic transportation distances
- chemical, inorganic: 1.92194e-6 kg; lognormal variance with pedigree 0.10242, pedigree (1,1,3,1,1)
  Auxilliary inputs for the wastewater treatment stage of the incinerator plant. Proxy for Polyelectrolyte.
  Uncertainty: uncertainty calculated from uncertainty in average Polyelectrolyte input, of transfer coefficients in the incinerator, and the uncertainty of the waste composition of this waste
  properties: dry mass 1 kg, carbon content, fossil 0.003, wet mass 1 kg
- titanium dioxide: 0 kg; pedigree (1,1,1,1,1)
  Input to DeNOx stage (TiO2 catalyst carrier)
  Uncertainty: uncertainty calculated from uncertainty in average DeNOx input, uncertainty in the share of thermal NOx, uncertainty of nitrogen content in average municipal waste and the uncertainty in nitrogen content in *this* waste.
  properties: dry mass 1 kg, wet mass 1 kg
- quicklime, milled, packed: 0 kg; pedigree (1,1,1,1,1)
  Auxilliary inputs for the flue gas treatment stage of the incinerator plant.
  Uncertainty: uncertainty calculated from uncertainty in average CaO input, of transfer coefficients in the incinerator, and the uncertainty of the waste composition of this waste
  properties: wet mass 1 kg, dry mass 0.99 kg, water content 0.010101
- slag landfill: 0 unit; pedigree (1,1,1,1,1)
  Landfill infrastructure required for landfilling of bottom ash.
  Uncertainty: uncertainty is calculated from uncertainties in waste composition and transfer coefficients in incinerator
- water, decarbonised: 0.0042065, 0.195225, 0.044145, 0.00562145, 0.0821394, 0.000537345, 0.0697253 kg (7 entries); lognormal variance with pedigree 0.63655, pedigree (1,1,3,1,1)
  (same comment as for water, decarbonised)
- waste cement, hydrated: 0, 0 kg (2 entries); pedigree (1,1,1,1,1)
  (same comment as for waste cement, hydrated)
- heat, district or industrial, natural gas: 3.21023e-5, 0.00181491 MJ (2 entries); lognormal variance with pedigree 0.42858, pedigree (1,1,3,1,1)
  (same comment as for heat, district or industrial, natural gas)
- cement, unspecified: 4.23402e-5, 3.10113e-6, 8.83923e-6, 0.00020349, 0.000199902, 5.8837e-6, 6.46205e-5, 7.81836e-6, 0.000873256 kg (9 entries); lognormal variance with pedigree 0.063052, pedigree (1,1,3,1,1)
  (same comment as for cement, unspecified)
- heat, district or industrial, other than natural gas: 0.00204075, 0.00215731 MJ (2 entries); lognormal variance with pedigree 0.0426, pedigree (1,3,5,5,1)
  EcoSpold01Location=RER
- white spirit: 6.69333e-8 kg; lognormal variance with pedigree 0.0426, pedigree (1,3,5,5,1)
  EcoSpold01Location=RER
- polyethylene, low density, granulate: 6.31025e-7 kg; lognormal variance with pedigree 0.0426, pedigree (1,3,5,5,1)
  EcoSpold01Location=RER
- sodium chlorate, powder: 5.89013e-6 kg; lognormal variance with pedigree 0.0426, pedigree (1,3,5,5,1)
  EcoSpold01Location=RER
- lubricating oil: 1.47752e-5 kg; lognormal variance with pedigree 0.0426, pedigree (1,3,5,5,1)
  EcoSpold01Location=RER
- electricity, medium voltage: 0.00177642, 3.31102e-5, 6.02465e-6, 3.60249e-5, 0.000102169, 0.00148134, 0.000212008, 0.000456331 kWh (8 entries); lognormal variance with pedigree 0.0426, pedigree (1,3,5,5,1)
  EcoSpold01Location=UCTE
- sulfuric acid: 7.81781e-5 kg; lognormal variance with pedigree 0.0426, pedigree (1,3,5,5,1)
  EcoSpold01Location=RER
- wood chips, dry, measured as dry mass: 1.60174e-5 kg; lognormal variance with pedigree 0.0426, pedigree (1,3,5,5,1)
  EcoSpold01Location=RER
- wastewater, unpolluted: -0.00024598 m3; lognormal variance with pedigree 0.0426, pedigree (1,3,5,5,1)
  Calculated value based on literature values and expert opinion. See comments in the parametres' comment field.
  EcoSpold01Location=CH
  production volume 2.373e8 m3
- nitric acid, without water, in 50% solution state: 1.6064e-5 kg; lognormal variance with pedigree 0.0426, pedigree (1,3,5,5,1)
  EcoSpold01Location=RER
- scrap aluminium: -8.64043e-6 kg; lognormal variance with pedigree 0.0426, pedigree (1,3,5,5,1)
  EcoSpold01Location=CH
  production volume 7.74856e6 kg
- waste wood, untreated: -1.66194e-5 kg; lognormal variance with pedigree 0.0426, pedigree (1,3,5,5,1)
  EcoSpold01Location=CH
  production volume 2.06628e7 kg
- waste bitumen sheet: -0.000395851 kg; lognormal variance with pedigree 0.0426, pedigree (1,3,5,5,1)
  EcoSpold01Location=CH
  production volume 1.42057e7 kg
- chemical factory, organics: 1.67581e-12 unit; lognormal variance with pedigree 0.68, pedigree (5,5,5,5,5)
  EcoSpold01Location=RER
- aluminium, wrought alloy: 6.19262e-5 kg; lognormal variance with pedigree 0.0426, pedigree (1,3,5,5,1)
  EcoSpold01Location=RER
- aluminium sulfate, powder: 7.55008e-6 kg; lognormal variance with pedigree 0.0426, pedigree (1,3,5,5,1)
  EcoSpold01Location=RER
- hazardous waste, for incineration: -6.69333e-7 kg; lognormal variance with pedigree 0.0426, pedigree (1,3,5,5,1)
  EcoSpold01Location=CH
  production volume 645714 kg
- ethoxylated alcohol (AE3): 1.6064e-6 kg; lognormal variance with pedigree 0.0426, pedigree (1,3,5,5,1)
  Calculated value. The value of 0.006 kg of ethoxylated alcohol, production mix has been allocated to the concrete ethoxylated alcohols. The ratio between (AE3) and (AE7) is used the same as in case of the original eiv2 "ethoxylated alcohol, production mix" dataset.
- ethoxylated alcohol (AE7): 1.6064e-6 kg; lognormal variance with pedigree 0.0426, pedigree (1,3,5,5,1)
  (same comment as for ethoxylated alcohol (AE3))
- municipal solid waste: -1.43799e-6 kg; lognormal variance with pedigree 0.0726, pedigree (2,4,5,5,3)
  EcoSpold01Location=CH
  production volume 7.81943e-5 kg
- lime: 0.000881041 kg; lognormal variance with pedigree 0.052, pedigree (1,1,5,5,1)
  composite
  EcoSpold01Location=CH
- pitch: 0.00285361, 0.000350207, 1.99589e-5, 0.000903337, 4.04913e-5, 5.78052e-5 kg (6 entries); lognormal variance with pedigree 0.0546, pedigree (2,4,5,5,1)
  EcoSpold01Location=RER
- fleece, polyethylene: 2.05317e-5 kg; lognormal variance with pedigree 0.0546, pedigree (2,4,5,5,1)
  EcoSpold01Location=RER
- sand: 0.00286316, 3.91504e-7, 7.54119e-5 kg (3 entries); lognormal variance with pedigree 0.0546, pedigree (2,4,5,5,1)
  EcoSpold01Location=CH
- synthetic rubber: 5.07364e-5 kg; lognormal variance with pedigree 0.0546, pedigree (2,4,5,5,1)
  EcoSpold01Location=RER
- extrusion, plastic film: 9.12509e-7 kg; lognormal variance with pedigree 0.0546, pedigree (2,4,5,5,1)
  activityLink introduced to establish a direct link to the corresponding regional supply of this product
  EcoSpold01Location=RER
- waste glass: -4.33274e-6 kg; lognormal variance with pedigree 0.0726, pedigree (2,4,5,5,3)
  EcoSpold01Location=CH
  production volume 5.20703e-5 kg
- glass fibre: 3.5464e-5 kg; lognormal variance with pedigree 0.0546, pedigree (2,4,5,5,1)
  EcoSpold01Location=RER
- polypropylene, granulate: 1.82654e-6 kg; lognormal variance with pedigree 0.0546, pedigree (2,4,5,5,1)
  EcoSpold01Location=RER
- waste wood, untreated: -7.27067e-6, -9.02763e-7, -6.60022e-8, -2.53559e-6, -3.83067e-7, -6.05596e-7 kg (6 entries); lognormal variance with pedigree 0.0426, pedigree (1,3,5,5,1)
  EcoSpold01Location=CH
  production volume 3.98334e9 kg
- sheet rolling, aluminium: 0.000121481 kg; lognormal variance with pedigree 0.056, pedigree (3,4,5,5,1)
  EcoSpold01Location=RER
- waste glass: -2.47216e-6, -2.27853e-7, -5.16922e-9, -2.12584e-8, -3.2282e-8, -9.51234e-8 kg (6 entries); lognormal variance with pedigree 0.0726, pedigree (2,4,5,5,3)
  EcoSpold01Location=CH
  production volume 0.00783 kg
- electricity, medium voltage: 0.000182144 kWh; lognormal variance with pedigree 0.0532, pedigree (2,3,5,5,1)
  EcoSpold01Location=UCTE
- municipal solid waste: -9.06004e-10, -1.29473e-9, -2.54296e-6 kg (3 entries); lognormal variance with pedigree 0.0726, pedigree (2,4,5,5,3)
  EcoSpold01Location=CH
  production volume 0.0131218 kg
- extrusion, plastic film: 1.06399e-5 kg; lognormal variance with pedigree 0.0546, pedigree (2,4,5,5,1)
  EcoSpold01Location=RER
- metal coating facility: 2.14868e-11 unit; lognormal variance with pedigree 0.3421, pedigree (1,2,5,5,1)
  This flow is issued during the process "selective coating, copper sheet, sputtering" which is used as an input in bitumen seal production. The ecoinvent dataset with the same name has been merged into this activity. This flow refers to 1 m2 of selective coat, copper sheet, sputter deposition. 0.2 m2 are used as an input for bitumen seal production.
  Uncertainty: Questionnaire
- oxygen, liquid: 5.86531e-8 kg; lognormal variance with pedigree 0.0421, pedigree (1,2,5,5,1)
  (same comment as for metal coating facility)
- diesel, burned in building machine: 2.7174e-5 MJ; lognormal variance with pedigree 0.0421, pedigree (1,2,5,5,1)
  This flow is issued during the process "selective coating, copper sheet, sputtering" which is used as an input in bitumen seal production. The ecoinvent dataset with the same name has been merged into this activity. This flow refers to 1 m2 of selective coat, copper sheet, sputter deposition. 0.2 m2 are used as an input for bitumen seal production.
  Uncertainty: Questionnaire, use for vehicles in plant operation
- kraft paper, bleached: 3.58113e-8 kg; lognormal variance with pedigree 0.0421, pedigree (1,2,5,5,1)
  (same comment as for metal coating facility)
- argon, liquid: 2.11642e-7 kg; lognormal variance with pedigree 0.0421, pedigree (1,2,5,5,1)
  This flow is issued during the process "selective coating, copper sheet, sputtering" which is used as an input in bitumen seal production. The ecoinvent dataset with the same name has been merged into this activity. This flow refers to 1 m2 of selective coat, copper sheet, sputter deposition. 0.2 m2 are used as an input for bitumen seal production.
  Uncertainty: Questionnaire (plus helium)
- nitrogen, liquid: 1.17435e-7 kg; lognormal variance with pedigree 0.0421, pedigree (1,2,5,5,1)
  (same comment as for metal coating facility)
- wastewater, from residence: -1.46472e-8 m3
  This flow is issued during the process "selective coating, copper sheet, sputtering" which is used as an input in bitumen seal production. The ecoinvent dataset with the same name has been merged into this activity. This flow refers to 1 m2 of selective coat, copper sheet, sputter deposition. 0.2 m2 are used as an input for bitumen seal production.
  production volume 0.000121564 m3
- waste mineral oil: -4.98778e-8 kg
  (same comment as for wastewater, from residence)
  production volume 0.000413962 kg
- corrugated board box: 1.32873e-8, 1.1288e-6 kg (2 entries); lognormal variance with pedigree 0.0421, pedigree (1,2,5,5,1)
  (same comment as for metal coating facility)
- tap water: 1.40529e-6, 1.16745e-5, 2.32248e-6, 5.85637e-5, 1.52352e-6, 4.33363e-6, 0.000670175 kg (7 entries); lognormal variance with pedigree 0.0546, pedigree (3,3,5,5,1)
  (same comment as for metal coating facility)
- light fuel oil: 1.67923e-8, 2.42172e-9, 3.38908e-8, 2.24895e-9, 3.25865e-9, 3.41442e-7 kg (6 entries); lognormal variance with pedigree 0.0421, pedigree (1,2,5,5,1)
  This flow is issued during the process "selective coating, copper sheet, sputtering" which is used as an input in bitumen seal production. The ecoinvent dataset with the same name has been merged into this activity. This flow refers to 1 m2 of selective coat, copper sheet, sputter deposition. 0.2 m2 are used as an input for bitumen seal production.
  Uncertainty: Questionnaire, including heating
- steel, chromium steel 18/8, hot rolled: 4.82665e-5 kg; lognormal variance with pedigree 0.4332, pedigree (2,3,5,5,4)
  Adapted from figures for MSWI
  EcoSpold01Location=RER
  Uncertainty: & basic uncertainty of 3; adapted from figures for MSWI
- gravel, round: 0.00990341 kg; lognormal variance with pedigree 0.4332, pedigree (2,3,5,5,4)
  EcoSpold01Location=CH
  Adapted from figures for MSWI
  Uncertainty: & basic uncertainty of 3; adapted from figures for MSWI
- reinforcing steel: 0.00143626 kg; lognormal variance with pedigree 0.4332, pedigree (2,3,5,5,4)
  EcoSpold01Location=RER
  Adapted from figures for MSWI
  Uncertainty: & basic uncertainty of 3; adapted from figures for MSWI
- waste reinforced concrete: -0.00138289, -0.0197363 kg (2 entries); lognormal variance with pedigree 0.4332, pedigree (2,3,5,5,4)
  Adapted from figures for MSWI
  EcoSpold01Location=CH
  Uncertainty: & basic uncertainty of 3; adapted from figures for MSWI
  production volume 4.44e7 kg
- pitch: 5.23095e-5 kg; lognormal variance with pedigree 0.4332, pedigree (2,3,5,5,4)
  (same comment as for gravel, round)
- waste concrete, not reinforced: -0.000284274, -0.00405709 kg (2 entries); lognormal variance with pedigree 0.4332, pedigree (2,3,5,5,4)
  (same comment as for waste reinforced concrete)
  production volume 1.08e7 kg
- copper: 3.71243e-6 kg; lognormal variance with pedigree 0.0421, pedigree (1,2,5,5,1)
  EcoSpold01Location=RER
- polystyrene foam slab: 3.18869e-8 kg; lognormal variance with pedigree 0.0421, pedigree (1,2,5,5,1)
  EcoSpold01Location=RER
- excavation, skid-steer loader: 1.36562e-7 m3; lognormal variance with pedigree 0.0421, pedigree (1,2,5,5,1)
  EcoSpold01Location=RER
- waste polyurethane foam: -8.00433e-8 kg; lognormal variance with pedigree 0.0421, pedigree (1,2,5,5,1)
  EcoSpold01Location=CH
  production volume 16.29 kg
- particle board, for indoor use: 4.23416e-10 m3; lognormal variance with pedigree 0.0421, pedigree (1,2,5,5,1)
  EcoSpold01Location=RER
- stone wool: 3.01582e-7 kg; lognormal variance with pedigree 0.0421, pedigree (1,2,5,5,1)
  EcoSpold01Location=CH
- sawnwood, softwood, dried (u=20%), planed: 1.48518e-8 m3; lognormal variance with pedigree 0.0421, pedigree (1,2,5,5,1)
  EcoSpold01Location=RER
- glass fibre reinforced plastic, polyester resin, hand lay-up: 1.96977e-8 kg; lognormal variance with pedigree 0.0421, pedigree (1,2,5,5,1)
  EcoSpold01Location=RER
- glued laminated timber, for indoor use: 1.52689e-9 m3; lognormal variance with pedigree 0.0421, pedigree (1,2,5,5,1)
  EcoSpold01Location=RER
- cast iron: 3.83559e-5 kg; lognormal variance with pedigree 0.0421, pedigree (1,2,5,5,1)
  EcoSpold01Location=RER
- waste building wood, chrome preserved: -5.06122e-7 kg; lognormal variance with pedigree 0.0421, pedigree (1,2,5,5,1)
  EcoSpold01Location=CH
  production volume 1494 kg
- polyurethane, rigid foam: 3.10777e-7 kg; lognormal variance with pedigree 0.0421, pedigree (1,2,5,5,1)
  EcoSpold01Location=RER
- epoxy resin, liquid: 4.13727e-7 kg; lognormal variance with pedigree 0.0421, pedigree (1,2,5,5,1)
  EcoSpold01Location=RER
- zinc coat, coils: 7.44491e-8 m2; lognormal variance with pedigree 0.0421, pedigree (1,2,5,5,1)
  EcoSpold01Location=RER
- lean concrete: 8.48372e-9 m3; lognormal variance with pedigree 0.0421, pedigree (1,2,5,5,1)
  EcoSpold01Location=CH
- steel, low-alloyed, hot rolled: 0.00043101 kg; lognormal variance with pedigree 0.0421, pedigree (1,2,5,5,1)
  EcoSpold01Location=RER
- aluminium, cast alloy: 3.39069e-6 kg; lognormal variance with pedigree 0.0421, pedigree (1,2,5,5,1)
  EcoSpold01Location=RER
- sheet rolling, steel: 3.50459e-7 kg; lognormal variance with pedigree 0.0421, pedigree (1,2,5,5,1)
  EcoSpold01Location=RER
- flat glass, uncoated: 9.88028e-8 kg; lognormal variance with pedigree 0.0421, pedigree (1,2,5,5,1)
  EcoSpold01Location=RER
- sanitary ceramics: 1.73496e-6 kg; lognormal variance with pedigree 0.0421, pedigree (1,2,5,5,1)
  EcoSpold01Location=CH
- waste fibreboard: -2.75823e-7 kg; lognormal variance with pedigree 0.0421, pedigree (1,2,5,5,1)
  EcoSpold01Location=CH
  production volume 2154 kg
- polyethylene, high density, granulate: 9.54745e-6 kg; lognormal variance with pedigree 0.0421, pedigree (1,2,5,5,1)
  EcoSpold01Location=RER
- fibre cement facing tile: 2.51484e-6 kg; lognormal variance with pedigree 0.0421, pedigree (1,2,5,5,1)
  EcoSpold01Location=CH
- fibre cement corrugated slab: 4.41083e-7 kg; lognormal variance with pedigree 0.0421, pedigree (1,2,5,5,1)
  EcoSpold01Location=CH
- clay brick: 1.7581e-5 kg; lognormal variance with pedigree 0.0421, pedigree (1,2,5,5,1)
  EcoSpold01Location=RER
- kraft paper, unbleached: 5.70812e-7 kg; lognormal variance with pedigree 0.0421, pedigree (1,2,5,5,1)
  EcoSpold01Location=RER
- excavation, hydraulic digger: 1.60698e-5 m3; lognormal variance with pedigree 0.0421, pedigree (1,2,5,5,1)
  EcoSpold01Location=RER
- zinc coat, pieces: 1.09749e-7 m2; lognormal variance with pedigree 0.0421, pedigree (1,2,5,5,1)
  EcoSpold01Location=RER
- cement, Portland: 4.27272e-7, 1.37777e-8, 2.38782e-8, 1.95871e-8, 4.12823e-7, 4.78045e-7, 2.01218e-8, 2.81153e-6 kg (8 entries); lognormal variance with pedigree 0.0421, pedigree (1,2,5,5,1)
  EcoSpold01Location=CH
- waste polyethylene/polypropylene product: -4.04403e-6, -1.02522e-5 kg (2 entries); lognormal variance with pedigree 0.0421, pedigree (1,2,5,5,1)
  EcoSpold01Location=CH
  production volume 275.7 kg
- waste glass sheet: -3.77821e-7, -1.45588e-6 kg (2 entries); lognormal variance with pedigree 0.0421, pedigree (1,2,5,5,1)
  EcoSpold01Location=CH
  production volume 714 kg
- waste glass: -8.41556e-10 kg; lognormal variance with pedigree 0.0421, pedigree (1,2,5,5,1)
  EcoSpold01Location=CH
  production volume 26.37 kg
- waste bulk iron, excluding reinforcement: -0.000141266, -0.000293756 kg (2 entries); lognormal variance with pedigree 0.0421, pedigree (1,2,5,5,1)
  EcoSpold01Location=CH
  production volume 3210 kg
- cement mortar: 2.18576e-8, 4.34421e-6 kg (2 entries); lognormal variance with pedigree 0.0421, pedigree (1,2,5,5,1)
  EcoSpold01Location=CH
- electricity, low voltage: 3.50861e-9, 6.15366e-10, 1.39565e-8, 5.00377e-8, 1.01191e-8, 1.5303e-7, 2.52243e-8, 7.18505e-8 kWh (8 entries); lognormal variance with pedigree 0.0421, pedigree (1,2,5,5,1)
  EcoSpold01Location=CH
- concrete, normal: 2.19549e-8, 2.28767e-9, 1.85203e-8, 1.04177e-8, 4.4116e-8, 1.48801e-9, 8.5744e-7 m3 (7 entries); lognormal variance with pedigree 0.0421, pedigree (1,2,5,5,1)
  EcoSpold01Location=CH
- waste polystyrene isolation, flame-retardant: -6.65036e-8, -1.68596e-7 kg (2 entries); lognormal variance with pedigree 0.0421, pedigree (1,2,5,5,1)
  EcoSpold01Location=CH
  production volume 138.3 kg
- waste brick: -2.68378e-7, -2.03818e-5 kg (2 entries); lognormal variance with pedigree 0.0421, pedigree (1,2,5,5,1)
  EcoSpold01Location=CH
  production volume 6600 kg
- waste mineral wool: -3.26941e-6, -7.97276e-6 kg (2 entries); lognormal variance with pedigree 0.0421, pedigree (1,2,5,5,1)
  EcoSpold01Location=CH
  production volume 42.9 kg
- waste wood, untreated: -7.28506e-7 kg; lognormal variance with pedigree 0.0421, pedigree (1,2,5,5,1)
  EcoSpold01Location=CH
  production volume 9180 kg
- waste plastic, mixture: -4.16824e-10, -2.78505e-11, -2.10629e-12, -1.15033e-11, -4.64719e-12, -1.09234e-11, -3.55153e-10, -2.918e-9 kg (8 entries); lognormal variance with pedigree 0.0421, pedigree (1,2,5,5,1)
  EcoSpold01Location=CH
  production volume 17.58 kg
- waste cement in concrete and mortar: -2.33674e-6, -5.92395e-6 kg (2 entries); lognormal variance with pedigree 0.0421, pedigree (1,2,5,5,1)
  EcoSpold01Location=CH
  production volume 1617 kg
- waste bitumen: -9.04002e-7, -1.87983e-6 kg (2 entries); lognormal variance with pedigree 0.0421, pedigree (1,2,5,5,1)
  EcoSpold01Location=CH
  production volume 3240 kg
- roof tile: 1.25673e-7 kg; lognormal variance with pedigree 0.0421, pedigree (1,2,5,5,1)
  EcoSpold01Location=RER
- calendering, rigid sheets: 6.8325e-9 kg; lognormal variance with pedigree 0.0421, pedigree (1,2,5,5,1)
  EcoSpold01Location=RER
- waste sealing sheet, polyvinylchloride: -6.8325e-9 kg; lognormal variance with pedigree 0.0421, pedigree (1,2,5,5,1)
  EcoSpold01Location=CH
  production volume 4.47 kg
- polyvinylchloride, bulk polymerised: 1.24927e-7 kg; lognormal variance with pedigree 0.0421, pedigree (1,2,5,5,1)
  EcoSpold01Location=RER
- waste polyvinylchloride product: -3.30494e-8, -8.50451e-8 kg (2 entries); lognormal variance with pedigree 0.0421, pedigree (1,2,5,5,1)
  EcoSpold01Location=CH
  production volume 22.92 kg
- waste paint on metal: -4.14096e-6 kg; lognormal variance with pedigree 0.148, pedigree (4,5,5,5,4)
  Same amount as for material imput
  Uncertainty: S
  production volume 12000 kg
- alkyd paint, white, without solvent, in 60% solution state: 4.14096e-6 kg; lognormal variance with pedigree 0.148, pedigree (4,5,5,5,4)
  Estimation based on data for fuel storage
  Uncertainty: E
- stone wool, packed: 3.37301e-6 kg; lognormal variance with pedigree 0.3421, pedigree (1,2,5,5,1)
  Data from 3 plants
- limestone, crushed, washed: 8.30003e-5 kg; lognormal variance with pedigree 0.3421, pedigree (1,2,5,5,1)
  Data from 3 plants
- tap water: 0.000188501 kg; lognormal variance with pedigree 0.3421, pedigree (1,2,5,5,1)
  Data from 3 plants
- concrete, medium strength: 1.34386e-7, 4.91765e-8, 1.90617e-7, 1.40094e-7, 3.8423e-8, 3.31088e-6 m3 (6 entries); lognormal variance with pedigree 0.3421, pedigree (1,2,5,5,1)
  Data from 3 plants
- electricity, medium voltage: 6.4974e-9, 2.21136e-8 kWh (2 entries); lognormal variance with pedigree 0.3421, pedigree (1,2,5,5,1)
  Data from 3 plants
- brass: 9.38216e-10 kg; lognormal variance with pedigree 0.0152, pedigree (2,3,3,5,1)
  Literature
  EcoSpold01Location=CH
  Uncertainty: Literature
- tetrafluoroethylene: 2.5611e-11 kg; lognormal variance with pedigree 0.0152, pedigree (2,3,3,5,1)
  EcoSpold01Location=RER
  Literature
  Uncertainty: Literature
- bitumen seal: 2.30733e-7 kg; lognormal variance with pedigree 0.0152, pedigree (2,3,3,5,1)
  Literature
  EcoSpold01Location=RER
  Uncertainty: Literature
- waste reinforcement steel: -3.62268e-5 kg; lognormal variance with pedigree 0.002, pedigree (1,1,3,1,1)
  Materials at end of life. Amount based on inputs.
  EcoSpold01Location=CH
  Uncertainty: Calculated value. Uncertainty calculated from that of underlying parameters,
  production volume 3.31526e10 kg
- zinc: 6.32448e-8 kg; lognormal variance with pedigree 0.0152, pedigree (2,3,3,5,1)
  Literature
  EcoSpold01Location=RER
  Uncertainty: Literature
- waste rubber, unspecified: -7.13364e-9, -7.13364e-9 kg (2 entries); lognormal variance with pedigree 0.002, pedigree (1,1,3,1,1)
  EcoSpold01Location=CH
  Materials at end of life. Amount based on inputs.
  Uncertainty: Calculated value. Uncertainty calculated from that of underlying parameters,
  production volume 1.30565e7 kg
- waste polyurethane: -2.56672e-8, -1.71498e-9, -1.29702e-10, -7.0835e-10, -2.86165e-10, -6.72645e-10, -2.18697e-8, -1.79685e-7 kg (8 entries); lognormal variance with pedigree 0.002, pedigree (1,1,3,1,1)
  (same comment as for waste reinforcement steel)
  production volume 2.11153e8 kg

## Inputs from nature
- Oxygen [natural resource, in air]: 0 kg; pedigree (1,1,1,1,1)
  Oxygen from ambient air needed to combust and oxidise this waste. Net demand, i.e. without O2 leaving the plant in flue gas uncombusted.
  Uncertainty: uncertainty is calculated from uncertainties in waste composition and transfer coefficients to flue gas and soild residues in incinerator
- Transformation, from unspecified [natural resource, land]: 3.12393e-6 m2; lognormal variance with pedigree 0.278, pedigree (4,5,5,5,4)
  Adapted from figures for MSWI. estimate on land area and production volume
  Uncertainty: & basic uncertainty of 2; adapted from figures for MSWI. estimate on land area and production volume
- Occupation, industrial area [natural resource, land]: 0.000206181 m2*year; lognormal variance with pedigree 0.188, pedigree (4,5,5,5,4)
  Adapted from figures for MSWI. estimate on land area, production volume and building, operation and demolition time
  Uncertainty: & basic uncertainty of 1.5; adapted from figures for MSWI. estimate on land area, production volume and building, operation and demolition time
- Transformation, to industrial area [natural resource, land]: 5.07388e-6 m2; lognormal variance with pedigree 0.278, pedigree (4,5,5,5,4)
  (same comment as for Transformation, from unspecified)
- Occupation, construction site [natural resource, land]: 1.10541e-5 m2*year; lognormal variance with pedigree 0.188, pedigree (4,5,5,5,4)
  (same comment as for Occupation, industrial area)
- Occupation, urban, discontinuously built [natural resource, land]: 8.30343e-6 m2*year; lognormal variance with pedigree 0.0821, pedigree (1,2,5,5,1)
- Transformation, from pasture, man made [natural resource, land]: 2.11613e-6 m2; lognormal variance with pedigree 0.1621, pedigree (1,2,5,5,1)
- Transformation, to urban, discontinuously built [natural resource, land]: 1.66177e-7 m2; lognormal variance with pedigree 0.1621, pedigree (1,2,5,5,1)

## Emissions to nature
- Titanium [air, urban air close to ground]: 0 kg; pedigree (1,1,1,1,1)
  Emission to air from waste composition and transfer coefficients.
  Uncertainty: uncertainty is calculated from uncertainties in waste composition and transfer coefficients in incinerator
- Thallium [water, surface water]: 0 kg; pedigree (1,1,1,1,1)
  Emissions to water from waste composition and transfer coefficients in incinerator and landfills.
  Uncertainty: uncertainty is calculated from uncertainties in waste composition and transfer coefficients in incinerator and landfills
- Molybdenum [water, surface water]: 0 kg; pedigree (1,1,1,1,1)
  (same comment as for Thallium)
- Particulates, < 2.5 um [air, urban air close to ground]: 0 kg; pedigree (1,1,1,1,1)
  Incomplete combustion product emitted to air.
  Uncertainty: uncertainty calculated from uncertainty in average operation emissions, and the uncertainty of the flue gas volume from this waste.
- TOC, Total Organic Carbon [water, surface water]: 0 kg; pedigree (1,1,1,1,1)
  (same comment as for Thallium)
- Magnesium [water, ground-, long-term]: 0 kg; pedigree (1,1,1,1,1)
  Long-term emissions from landfilling of incineration residues.
  Uncertainty: uncertainty is calculated from uncertainties in waste composition and transfer coefficients in incinerator and landfills.
- Vanadium, ion [water, ground-, long-term]: 0 kg; pedigree (1,1,1,1,1)
  (same comment as for Magnesium)
- Magnesium [air, urban air close to ground]: 0 kg; pedigree (1,1,1,1,1)
  (same comment as for Titanium)
- Mercury [water, surface water]: 0 kg; pedigree (1,1,1,1,1)
  (same comment as for Thallium)
- Copper, ion [water, ground-, long-term]: 0 kg; pedigree (1,1,1,1,1)
  (same comment as for Magnesium)
- DOC, Dissolved Organic Carbon [water, surface water]: 0 kg; pedigree (1,1,1,1,1)
  (same comment as for Thallium)
- Zinc, ion [water, ground-, long-term]: 0 kg; pedigree (1,1,1,1,1)
  (same comment as for Magnesium)
- Copper [air, urban air close to ground]: 0 kg; pedigree (1,1,1,1,1)
  (same comment as for Titanium)
- Selenium [water, ground-, long-term]: 0 kg; pedigree (1,1,1,1,1)
  (same comment as for Magnesium)
- Phosphate [water, ground-, long-term]: 0 kg; pedigree (1,1,1,1,1)
  (same comment as for Magnesium)
- Tin [air, urban air close to ground]: 0 kg; pedigree (1,1,1,1,1)
  (same comment as for Titanium)
- Copper, ion [water, surface water]: 0 kg; pedigree (1,1,1,1,1)
  (same comment as for Thallium)
- Hydrogen fluoride [air, urban air close to ground]: 0 kg; pedigree (1,1,1,1,1)
  (same comment as for Titanium)
- COD, Chemical Oxygen Demand [water, ground-, long-term]: 0 kg; pedigree (1,1,1,1,1)
  (same comment as for Magnesium)
- Nitrogen oxides [air, urban air close to ground]: 0 kg; pedigree (1,1,1,1,1)
  Sum of fuel-Nox and thermal-NOx emitted to air after DeNOx stage.
  Uncertainty: uncertainty calculated from uncertainty in average N-emissions and uncertainty in the share of thermal NOx and the uncertainty in nitrogen content in *this* waste.
- Phenol, pentachloro- [air, urban air close to ground]: 0 kg; pedigree (1,1,1,1,1)
  (same comment as for Particulates, < 2.5 um)
- Strontium [air, urban air close to ground]: 0 kg; pedigree (1,1,1,1,1)
  (same comment as for Titanium)
- TOC, Total Organic Carbon [water, ground-, long-term]: 0 kg; pedigree (1,1,1,1,1)
  (same comment as for Magnesium)
- Vanadium, ion [water, surface water]: 0 kg; pedigree (1,1,1,1,1)
  (same comment as for Thallium)
- Titanium, ion [water, surface water]: 0 kg; pedigree (1,1,1,1,1)
  (same comment as for Thallium)
- Nickel [air, urban air close to ground]: 0 kg; pedigree (1,1,1,1,1)
  (same comment as for Titanium)
- Nitrate [water, surface water]: 0 kg; pedigree (1,1,1,1,1)
  (same comment as for Thallium)
- Cadmium [air, urban air close to ground]: 0 kg; pedigree (1,1,1,1,1)
  (same comment as for Titanium)
- Bromine [air, urban air close to ground]: 0 kg; pedigree (1,1,1,1,1)
  (same comment as for Titanium)
- Bromine [water, ground-, long-term]: 0 kg; pedigree (1,1,1,1,1)
  (same comment as for Magnesium)
- Particulates, > 2.5 um, and < 10um [air, urban air close to ground]: 0 kg; pedigree (1,1,1,1,1)
  (same comment as for Particulates, < 2.5 um)
- Antimony [air, urban air close to ground]: 0 kg; pedigree (1,1,1,1,1)
  (same comment as for Titanium)
- Chloride [water, ground-, long-term]: 0 kg; pedigree (1,1,1,1,1)
  (same comment as for Magnesium)
- Chromium VI [water, ground-, long-term]: 0 kg; pedigree (1,1,1,1,1)
  (same comment as for Magnesium)
- BOD5, Biological Oxygen Demand [water, surface water]: 0 kg; pedigree (1,1,1,1,1)
  (same comment as for Thallium)
- Phosphate [water, surface water]: 0 kg; pedigree (1,1,1,1,1)
  (same comment as for Thallium)
- Strontium [water, surface water]: 0 kg; pedigree (1,1,1,1,1)
  (same comment as for Thallium)
- Arsenic [air, urban air close to ground]: 0 kg; pedigree (1,1,1,1,1)
  (same comment as for Titanium)
- Lead [water, surface water]: 0 kg; pedigree (1,1,1,1,1)
  (same comment as for Thallium)
- Magnesium [water, surface water]: 0 kg; pedigree (1,1,1,1,1)
  (same comment as for Thallium)
- Toluene [air, urban air close to ground]: 0 kg; pedigree (1,1,1,1,1)
  (same comment as for Particulates, < 2.5 um)
- Silicon [water, surface water]: 0 kg; pedigree (1,1,1,1,1)
  (same comment as for Thallium)
- Benzene, pentachloro- [air, urban air close to ground]: 0 kg; pedigree (1,1,1,1,1)
  (same comment as for Particulates, < 2.5 um)
- Barium [water, ground-, long-term]: 0 kg; pedigree (1,1,1,1,1)
  (same comment as for Magnesium)
- Iron, ion [water, surface water]: 0 kg; pedigree (1,1,1,1,1)
  (same comment as for Thallium)
- Titanium, ion [water, ground-, long-term]: 0 kg; pedigree (1,1,1,1,1)
  (same comment as for Magnesium)
- Silicon [water, ground-, long-term]: 0 kg; pedigree (1,1,1,1,1)
  (same comment as for Magnesium)
- NMVOC, non-methane volatile organic compounds, unspecified origin [air, urban air close to ground]: 0 kg; pedigree (1,1,1,1,1)
  (same comment as for Particulates, < 2.5 um)
- Selenium [air, urban air close to ground]: 0 kg; pedigree (1,1,1,1,1)
  (same comment as for Titanium)
- Tin, ion [water, ground-, long-term]: 0 kg; pedigree (1,1,1,1,1)
  (same comment as for Magnesium)
- Sulfur dioxide [air, urban air close to ground]: 0 kg; pedigree (1,1,1,1,1)
  (same comment as for Titanium)
- Molybdenum [air, urban air close to ground]: 0 kg; pedigree (1,1,1,1,1)
  (same comment as for Titanium)
- Antimony [water, ground-, long-term]: 0 kg; pedigree (1,1,1,1,1)
  (same comment as for Magnesium)
- Carbon monoxide, fossil [air, urban air close to ground]: 0 kg; pedigree (1,1,1,1,1)
  (same comment as for Particulates, < 2.5 um)
- Dioxins, measured as 2,3,7,8-tetrachlorodibenzo-p-dioxin [air, urban air close to ground]: 0 kg; pedigree (1,1,1,1,1)
  (same comment as for Particulates, < 2.5 um)
- Cadmium, ion [water, ground-, long-term]: 0 kg; pedigree (1,1,1,1,1)
  (same comment as for Magnesium)
- Nitrate [water, ground-, long-term]: 0 kg; pedigree (1,1,1,1,1)
  (same comment as for Magnesium)
- Chromium VI [water, surface water]: 0 kg; pedigree (1,1,1,1,1)
  (same comment as for Thallium)
- Chromium [air, urban air close to ground]: 0 kg; pedigree (1,1,1,1,1)
  (same comment as for Titanium)
- Hydrogen chloride [air, urban air close to ground]: 0 kg; pedigree (1,1,1,1,1)
  (same comment as for Titanium)
- Chromium, ion [water, surface water]: 0 kg; pedigree (1,1,1,1,1)
  (same comment as for Thallium)
- Manganese [water, surface water]: 0 kg; pedigree (1,1,1,1,1)
  (same comment as for Thallium)
- Calcium, ion [water, ground-, long-term]: 0 kg; pedigree (1,1,1,1,1)
  (same comment as for Magnesium)
- Barium [air, urban air close to ground]: 0 kg; pedigree (1,1,1,1,1)
  (same comment as for Titanium)
- Ammonia [air, urban air close to ground]: 0 kg; pedigree (1,1,1,1,1)
  Nitrogen species emitted to air after DeNOx stage.
  Uncertainty: uncertainty calculated from uncertainty in average N-emissions and uncertainty in the share of thermal NOx and the uncertainty in nitrogen content in *this* waste.
- Barium [water, surface water]: 0 kg; pedigree (1,1,1,1,1)
  (same comment as for Thallium)
- BOD5, Biological Oxygen Demand [water, ground-, long-term]: 0 kg; pedigree (1,1,1,1,1)
  (same comment as for Magnesium)
- Sodium [air, urban air close to ground]: 0 kg; pedigree (1,1,1,1,1)
  (same comment as for Titanium)
- Selenium [water, surface water]: 0 kg; pedigree (1,1,1,1,1)
  (same comment as for Thallium)
- Benzo(a)pyrene [air, urban air close to ground]: 0 kg; pedigree (1,1,1,1,1)
  (same comment as for Particulates, < 2.5 um)
- Strontium [water, ground-, long-term]: 0 kg; pedigree (1,1,1,1,1)
  (same comment as for Magnesium)
- Lead [water, ground-, long-term]: 0 kg; pedigree (1,1,1,1,1)
  (same comment as for Magnesium)
- Lead [air, urban air close to ground]: 0 kg; pedigree (1,1,1,1,1)
  (same comment as for Titanium)
- Tin, ion [water, surface water]: 0 kg; pedigree (1,1,1,1,1)
  (same comment as for Thallium)
- Cobalt [water, ground-, long-term]: 0 kg; pedigree (1,1,1,1,1)
  (same comment as for Magnesium)
- Benzene, hexachloro- [air, urban air close to ground]: 0 kg; pedigree (1,1,1,1,1)
  (same comment as for Particulates, < 2.5 um)
- Calcium [air, urban air close to ground]: 0 kg; pedigree (1,1,1,1,1)
  (same comment as for Titanium)
- Cobalt [water, surface water]: 0 kg; pedigree (1,1,1,1,1)
  (same comment as for Thallium)
- Nickel, ion [water, ground-, long-term]: 0 kg; pedigree (1,1,1,1,1)
  (same comment as for Magnesium)
- Fluoride [water, ground-, long-term]: 0 kg; pedigree (1,1,1,1,1)
  (same comment as for Magnesium)
- Cadmium, ion [water, surface water]: 0 kg; pedigree (1,1,1,1,1)
  (same comment as for Thallium)
- Beryllium [water, surface water]: 0 kg; pedigree (1,1,1,1,1)
  (same comment as for Thallium)
- Water [water, surface water]: 0 m3; pedigree (1,1,1,1,1)
  Process water released to surface water.
  Uncertainty: uncertainty calculated from uncertainty in process water input and the uncertainty of fraction to surface water.
- Sulfate [water, surface water]: 0 kg; pedigree (1,1,1,1,1)
  (same comment as for Thallium)
- Arsenic, ion [water, ground-, long-term]: 0 kg; pedigree (1,1,1,1,1)
  (same comment as for Magnesium)
- Aluminium [air, urban air close to ground]: 0 kg; pedigree (1,1,1,1,1)
  (same comment as for Titanium)
- Manganese [water, ground-, long-term]: 0 kg; pedigree (1,1,1,1,1)
  (same comment as for Magnesium)
- Iron, ion [water, ground-, long-term]: 0 kg; pedigree (1,1,1,1,1)
  (same comment as for Magnesium)
- Aluminium [water, ground-, long-term]: 0 kg; pedigree (1,1,1,1,1)
  (same comment as for Magnesium)
- Mercury [air, urban air close to ground]: 0 kg; pedigree (1,1,1,1,1)
  (same comment as for Titanium)
- Iron [air, urban air close to ground]: 0 kg; pedigree (1,1,1,1,1)
  (same comment as for Titanium)
- Vanadium [air, urban air close to ground]: 0 kg; pedigree (1,1,1,1,1)
  (same comment as for Titanium)
- Molybdenum [water, ground-, long-term]: 0 kg; pedigree (1,1,1,1,1)
  (same comment as for Magnesium)
- Antimony [water, surface water]: 0 kg; pedigree (1,1,1,1,1)
  (same comment as for Thallium)
- Heat, waste [air, urban air close to ground]: 0 MJ; pedigree (1,1,1,1,1)
  Waste heat generated from heating value of this waste plus any electricity required to process it.
  Uncertainty: uncertainty is calculated from uncertainties in waste composition and uncertainties in energy efficiency and the uncertainty in internal energy demand
- Dinitrogen monoxide [air, urban air close to ground]: 0 kg; pedigree (1,1,1,1,1)
  (same comment as for Ammonia)
- Aluminium [water, surface water]: 0 kg; pedigree (1,1,1,1,1)
  (same comment as for Thallium)
- COD, Chemical Oxygen Demand [water, surface water]: 0 kg; pedigree (1,1,1,1,1)
  (same comment as for Thallium)
- Mercury [water, ground-, long-term]: 0 kg; pedigree (1,1,1,1,1)
  (same comment as for Magnesium)
- Nickel, ion [water, surface water]: 0 kg; pedigree (1,1,1,1,1)
  (same comment as for Thallium)
- Arsenic, ion [water, surface water]: 0 kg; pedigree (1,1,1,1,1)
  (same comment as for Thallium)
- Cobalt [air, urban air close to ground]: 0 kg; pedigree (1,1,1,1,1)
  (same comment as for Titanium)
- Beryllium [water, ground-, long-term]: 0 kg; pedigree (1,1,1,1,1)
  (same comment as for Magnesium)
- Sodium, ion [water, surface water]: 0 kg; pedigree (1,1,1,1,1)
  (same comment as for Thallium)
- Methane, fossil [air, urban air close to ground]: 0 kg; pedigree (1,1,1,1,1)
  (same comment as for Particulates, < 2.5 um)
- Zinc, ion [water, surface water]: 0 kg; pedigree (1,1,1,1,1)
  (same comment as for Thallium)
- Benzene [air, urban air close to ground]: 0 kg; pedigree (1,1,1,1,1)
  (same comment as for Particulates, < 2.5 um)
- Cyanide [air, urban air close to ground]: 0 kg; pedigree (1,1,1,1,1)
  (same comment as for Ammonia)
- Chloride [water, surface water]: 0 kg; pedigree (1,1,1,1,1)
  (same comment as for Thallium)
- Heat, waste [water, surface water]: 0 MJ; pedigree (1,1,1,1,1)
  (same comment as for Heat, waste)
- Sulfate [water, ground-, long-term]: 0 kg; pedigree (1,1,1,1,1)
  (same comment as for Magnesium)
- Silicon [air, urban air close to ground]: 0 kg; pedigree (1,1,1,1,1)
  (same comment as for Titanium)
- Calcium, ion [water, surface water]: 0 kg; pedigree (1,1,1,1,1)
  (same comment as for Thallium)
- Zinc [air, urban air close to ground]: 0 kg; pedigree (1,1,1,1,1)
  (same comment as for Titanium)
- Fluoride [water, surface water]: 0 kg; pedigree (1,1,1,1,1)
  (same comment as for Thallium)
- Phosphorus [air, urban air close to ground]: 0 kg; pedigree (1,1,1,1,1)
  (same comment as for Titanium)
- Sodium, ion [water, ground-, long-term]: 0 kg; pedigree (1,1,1,1,1)
  (same comment as for Magnesium)
- Thallium [water, ground-, long-term]: 0 kg; pedigree (1,1,1,1,1)
  (same comment as for Magnesium)
- Water [air, urban air close to ground]: 0 m3; pedigree (1,1,1,1,1)
  Water vapour from waste humidity, hydrogen oxidation and part of the process water.
  Uncertainty: Uncertainty calculated from uncertainty in waste composition, process water input and the uncertainty of fraction to air.
- Carbon dioxide, fossil [air, urban air close to ground]: 0 kg; pedigree (1,1,1,1,1)
  (same comment as for Titanium)
- Bromine [water, surface water]: 0 kg; pedigree (1,1,1,1,1)
  (same comment as for Thallium)
- Thallium [air, urban air close to ground]: 0 kg; pedigree (1,1,1,1,1)
  (same comment as for Titanium)
- Manganese [air, urban air close to ground]: 0 kg; pedigree (1,1,1,1,1)
  (same comment as for Titanium)
- DOC, Dissolved Organic Carbon [water, ground-, long-term]: 0 kg; pedigree (1,1,1,1,1)
  (same comment as for Magnesium)
- Lead [water, unspecified]: 1.07093e-8 kg; lognormal variance with pedigree 0.6926, pedigree (1,3,5,5,1)
- Chloride [water, unspecified]: 3.56621e-6 kg; lognormal variance with pedigree 0.0826, pedigree (1,3,5,5,1)
- Aluminium [water, unspecified]: 8.032e-7 kg; lognormal variance with pedigree 0.6926, pedigree (1,3,5,5,1)
- Manganese [water, unspecified]: 6.85397e-8 kg; lognormal variance with pedigree 0.6926, pedigree (1,3,5,5,1)
- Water [air, unspecified]: 0.000155761 m3; lognormal variance with pedigree 0.0827, pedigree (2,2,5,5,1)
  Calculated value based on literature values and expert opinion. See comments in the parametres' comment field.
- Iron, ion [water, unspecified]: 1.2048e-8 kg; lognormal variance with pedigree 0.6926, pedigree (1,3,5,5,1)
- Particulates, > 2.5 um, and < 10um [air, unspecified]: 7.2288e-9 kg; lognormal variance with pedigree 0.1626, pedigree (1,3,5,5,1)
- Zinc, ion [water, unspecified]: 2.4096e-8 kg; lognormal variance with pedigree 0.6926, pedigree (1,3,5,5,1)
- Sulfate [water, unspecified]: 6.05077e-5 kg; lognormal variance with pedigree 0.0826, pedigree (1,3,5,5,1)
- Sodium, ion [water, unspecified]: 2.31857e-5 kg; lognormal variance with pedigree 0.6926, pedigree (1,3,5,5,1)
- Cadmium, ion [water, unspecified]: 4.016e-10 kg; lognormal variance with pedigree 0.6926, pedigree (1,3,5,5,1)
- Nickel, ion [water, unspecified]: 1.16732e-7 kg; lognormal variance with pedigree 0.6926, pedigree (1,3,5,5,1)
- Tin, ion [water, unspecified]: 6.69333e-8 kg; lognormal variance with pedigree 0.6926, pedigree (1,3,5,5,1)
- Copper, ion [water, unspecified]: 8.032e-9 kg; lognormal variance with pedigree 0.6926, pedigree (1,3,5,5,1)
- NMVOC, non-methane volatile organic compounds, unspecified origin [air, unspecified]: 5.86997e-6 kg; lognormal variance with pedigree 0.1746, pedigree (2,4,5,5,1)
- Benzo(a)pyrene [air, unspecified]: 1.83312e-11 kg; lognormal variance with pedigree 0.692, pedigree (1,1,5,5,1)
  estimation
- Water [water, unspecified]: 7.97724e-7 m3; lognormal variance with pedigree 1.21, pedigree (5,5,5,5,5)
  (same comment as for wastewater, from residence)
- NMVOC, non-methane volatile organic compounds, unspecified origin [air, non-urban air or from high stacks]: 2.79515e-6 kg; lognormal variance with pedigree 0.408, pedigree (4,5,5,5,5)
  Estimated from data for fuel storage tanks
  Uncertainty: E
