# electronic component factory construction

Dataset: EcoSpold 2, unit process
Geography: GLO
Time period: 2005-01-01 to 2019-12-31
Technology level: current
Classification: EcoSpold01Categories: electronics/component
Classification: ISIC rev.4 ecoinvent: 4290:Construction of other civil engineering projects
Tags: ConvertedDataset
Scenario: Business-as-Usual
System model: Allocation at the point of substitution
Generated by: Roland Hischier
Published in: Hischier R. 2007
Database: ecoinvent
isCopyrightProtected: true
accessRestrictedTo: 1

## General comment
This dataset represents the production site for the production of electronic components. It is based on information from AMD’s Fab36 in Dresden, Saxony (Germany), supported/extended by literature and/or assumptions. The production site is taken as representative for all production plants due to the fact, that components are produced in clean rooms. A total life-span of 25 years is assumed.
[This dataset was already contained in the ecoinvent database version 2. It was not individually updated during the transfer to ecoinvent version 3. Life Cycle Impact Assessment results may still have changed, as they are affected by changes in the supply chain, i.e. in other datasets. This dataset was generated following the ecoinvent quality guidelines for version 2. It may have been subject to central changes described in the ecoinvent version 3 change report (http://www.ecoinvent.org/database/ecoinvent-version-3/reports-of-changes/), and the results of the central updates were reviewed extensively. The changes added e.g. consistent water flows and other information throughout the database. The documentation of this dataset can be found in the ecoinvent reports of version 2, which are still available via the ecoinvent website. The change report linked above covers all central changes that were made during the conversion process.]

## Included activities start
From unknown land use forseen for production site for production of electronics components.

## Included activities end
This module includes land use, buildings and facilities (machinery, cables, etc.) as well as the respective disposal activities of a microprocessor production site, used as example for a electronic component plant.

## Geography
This module relates to the global situation.

## Technology
The AMD site in Saxony is taken as representative of a typical electronic components plant.

## Reference product
- electronic component factory: 1 unit; CPC 53269: Other constructions for manufacturing; By-product classification allocatable product
  Within the electronics industry, a huge variety of different types of plants - responsible for different production steps; and thus supposed to contain different equipment - can be distinguished.
  This plant is mainly based on information from AMD’s Fab36 in Dresden, Saxony (Germany) producing microprocessors. It is taken as representative for all production plants due to the fact, that also “simpler” active and passive components (e.g. resistors, transistors, diodes, etc.) have to be produced in clean rooms.
  production volume 1 unit
    About 1 Mio. pieces per year
    Dummy value to be replaced by measured, estimated or calculated value
  property true value 2.58058e8
    allocation property applied in "true value" allocation // value calculated from revenue
  properties: price 2.58058e8 EUR2005

## By-products
- electricity, for reuse in municipal waste incineration only: 0 kWh; CPC 17100: Electrical energy; By-product classification allocatable product; pedigree (1,1,1,1,1)
  Net electricity generated from this waste and used in internal MSWI plant energy redistribution.
  Uncertainty: uncertainty is calculated from uncertainties in waste composition and uncertainties in energy efficiency and the uncertainty in internal energy demand
  production volume 257558 kWh
  property true value relation 3.6; name E_el_prod_MSWI_true_value_relation
    property to calculate "true value" from
  property price 0.1 EUR2005; name E_el_prod_MSWI_price_EUR2005
    Estimated to be the same price as in case of electricity, medium voltage.
  property exergy 3.6 MJ; name E_el_prod_MSWI_exergy
    This exergy property is based on the exergy content of the product.
  property true value 16663.2
    allocation property applied in "true value" allocation // value calculated from true value relation
- heat, for reuse in municipal waste incineration only: 0 MJ; CPC 17300: Steam and hot water; By-product classification allocatable product; pedigree (1,1,1,1,1)
  Net useful heat generated from this waste and used in internal MSWI plant energy redistribution.
  Uncertainty: uncertainty is calculated from uncertainties in waste composition and uncertainties in energy efficiency and the uncertainty in internal energy demand
  production volume 1.81778e6 MJ
  property exergy 0.1842 MJ; name E_th_prod_MSWI_exergy
    This exergy property is based on the exergy content of the product.
  property price 0.0106 EUR2005; name E_th_prod_MSWI_price_EUR2005
    Average European district heat price from Ecoheatcool and Euroheat 2005-2006, Ecoheat Work package 1: The European heat market. Final report. 10.6 EUR/GJ i s the price of district heat. http://www.solarthermalworld.org/files/Ecoheatcool%20WP1%20Web.pdf?download
  property true value relation 0.1842; name E_th_prod_MSWI_true_value_relation
    property to calculate "true value" from
  property true value 6053.76
    (same comment as for electricity, for reuse in municipal waste incineration only)
- zinc concentrate: 0 kg; CPC 14290: Other non-ferrous metal ores and concentrates (other than uranium or thorium ores and concentrates); By-product classification allocatable product
  Calculated value from the knowledge of the properties of both products.
  production volume 21.1497 kg
  property price 0.38 EUR2005; name ByP_price_EUR2005
    Temporary price data. Calculated as 90% of purchasers price based on: Zinc content in concentrate 53%. Concentrate price per kg Zn 86.5% of refined Zn price (13.5% treatment charges according to CHR Metals Limited 2005: Dynamic cost curves. http://www.minecost.com/dynamic.pdf). 2004 zinc price from USGS (2007) Mineral commodity summaries 2007. <http://minerals.usgs.gov/minerals/pubs/mcs/2007/mcs2007.pdf> [Accessed 25 May 2010]
  property zinc content 0.53; name zinc_C_zinc_concentrate
    Zinc content on a dry matter basis. Value taken from teh "zinc mine operation" /GLO dataset.
  property dry mass 1 kg; name DM_zinc_concentrate
  property carbon content 0
    carbon content on a dry matter basis (reserved; not for manual entry)
  property true value 1.92342
    allocation property applied in "true value" allocation // value calculated from revenue
  properties: wet mass 1 kg, water content 0, carbon content, non-fossil 0, carbon content, fossil 0, water in wet mass 0 kg, carbon allocation 0 kg
- copper: 0 kg; By-product classification allocatable product; CPC 41413: Refined copper and copper alloys, unwrought; master alloys of copper
  production volume 27756.7 kg
  property price 5.52 EUR2005
    Literature value (http://www.economist.com/news/business/21576714-mining-industry-has-enriched-chile-its-future-precarious-copper-solution). Average price between 20015 and 2013.
  property carbon content 0
    carbon content on a dry matter basis (reserved; not for manual entry)
  property true value 70039
    allocation property applied in "true value" allocation // value calculated from revenue
  properties: water in wet mass 0 kg, water content 0, carbon content, non-fossil 0, dry mass 1 kg, carbon content, fossil 0, wet mass 1 kg, carbon allocation 0 kg
- lead: 0 kg; CPC 41441: Lead, unwrought; By-product classification allocatable product
  EcoSpold01Location=SE
  production volume 1415.17 kg
  property price 0.744 EUR2005
    Temporary price data. Calculated as 90% of purchasers price based on: Source: ecoinvent v2 report 10-part IX, Tab 5.10 & 2.5
  property carbon content 0
    carbon content on a dry matter basis (reserved; not for manual entry)
  property true value 553.56
    allocation property applied in "true value" allocation // value calculated from revenue
  properties: wet mass 1 kg, water content 0, carbon content, non-fossil 0, carbon content, fossil 0, dry mass 1 kg, water in wet mass 0 kg, carbon allocation 0 kg
- nickel, 99.5%: 0 kg; CPC 41422: Unwrought nickel; By-product classification allocatable product
  EcoSpold01Location=SE
  production volume 2954.14 kg
  property price 10.4 EUR2005
    Temporary price data. Calculated as 90% of purchasers price based on: 2004 nickel price from USGS (2007) Mineral commodity summaries 2007. <http://minerals.usgs.gov/minerals/pubs/mcs/2007/mcs2007.pdf> [Accessed 25 May 2010]
  property carbon content 0
    carbon content on a dry matter basis (reserved; not for manual entry)
  property true value 16152.7
    allocation property applied in "true value" allocation // value calculated from revenue
  properties: water in wet mass 0 kg, wet mass 1 kg, carbon content, non-fossil 0, dry mass 1 kg, water content 0, carbon content, fossil 0, carbon allocation 0 kg
- silver: 0 kg; CPC 41310: Silver (including silver plated with gold or platinum), unwrought or in semi-manufactured forms, or in powder […]; By-product classification allocatable product; CAS 7440-22-4
  EcoSpold01Location=SE
  production volume 487.846 kg
  property price 178 EUR2005
    (same comment as for lead)
  property carbon content 0
    carbon content on a dry matter basis (reserved; not for manual entry)
  property true value 45654.6
    allocation property applied in "true value" allocation // value calculated from revenue
  properties: wet mass 1 kg, carbon content, non-fossil 0, dry mass 1 kg, water content 0, carbon content, fossil 0, water in wet mass 0 kg, carbon allocation 0 kg
- palladium: 0 kg; CPC 4160: Other non-ferrous metals and articles thereof (including waste and scrap of some metals); cermets and articles […]; By-product classification allocatable product
  EcoSpold01Location=SE
  production volume 27.0055 kg
  property price 5640 EUR2005
    Temporary price data. Calculated as 90% of purchasers price based on: 2004 price from USGS (2007) Mineral commodity summaries 2007. <http://minerals.usgs.gov/minerals/pubs/mcs/2007/mcs2007.pdf> [Accessed 25 May 2010]
  property carbon content 0
    carbon content on a dry matter basis (reserved; not for manual entry)
  property true value 80077.9
    allocation property applied in "true value" allocation // value calculated from revenue
  properties: wet mass 1 kg, carbon content, fossil 0, water in wet mass 0 kg, water content 0, carbon content, non-fossil 0, dry mass 1 kg, carbon allocation 0 kg
- gold: 0 kg; CPC 41320: Gold (including gold plated with platinum), unwrought or in semi-manufactured forms, or in powder form; By-product classification allocatable product; CAS 7440-57-5
  EcoSpold01Location=SE
  production volume 14.8097 kg
  property price 10600 EUR2005
    Temporary price data. Calculated as 90% of purchasers price based on: Source: ecoinvent v2 report 10-part IX, Tab 2.5
  property carbon content 0
    carbon content on a dry matter basis (reserved; not for manual entry)
  property true value 82534.2
    allocation property applied in "true value" allocation // value calculated from revenue
  properties: wet mass 1 kg, carbon content, fossil 0, dry mass 1 kg, carbon content, non-fossil 0, water content 0, water in wet mass 0 kg, carbon allocation 0 kg
- iron scrap, sorted, pressed: 0 kg; By-product classification Recyclable; CPC 39310: Slag, dross, scalings and other waste from the manufacture of iron or steel; pedigree (1,1,1,1,1)
  replaces the original flow "Fe fraction of used industrial electronic device, from mechanical treatment"
  production volume 1.00884e6 kg
  property price 0.175 EUR2005
    Temporary price data. Calculated as 90% of purchasers price based on: 2005 import and export prices (total trades (USD) divided by total weight (kg) in biggest economies of the world: EU27, USA, Brasil, China, India, Japan and Russia) from UN Commodity Trade Statistics Database (http://data.un.org/Explorer.aspxDatabase [Accessed 2011.06.20]). Commodity: Waste or scrap, of cast iron
  property carbon content 0
    carbon content on a dry matter basis (reserved; not for manual entry)
  property true value 135942
    allocation property applied in "true value" allocation // value calculated from revenue
  properties: carbon content, non-fossil 0, dry mass 1 kg, water content 0, wet mass 1 kg, carbon content, fossil 0, water in wet mass 0 kg, carbon allocation 0 kg
- iron scrap, unsorted: 0 kg; source European Aluminium Association 2008; CPC 39310: Slag, dross, scalings and other waste from the manufacture of iron or steel; By-product classification Recyclable; pedigree (1,1,1,1,1)
  production volume 13.7901 kg
  property price 0.149 EUR2005; name ironScrapAmount_price_EUR2005
    Temporary price data. Calculated as 90% of purchasers price based on: estimated at 85% of sorted scrap
  property carbon content 0
    carbon content on a dry matter basis (reserved; not for manual entry)
  property true value 1.58214
    allocation property applied in "true value" allocation // value calculated from revenue
  properties: water in wet mass 0 kg, water content 0, carbon content, fossil 0, carbon content, non-fossil 0, dry mass 1 kg, wet mass 1 kg, carbon allocation 0 kg
- aluminium oxide, non-metallurgical: 0 kg; source European Aluminium Association 2008; CPC 41432: Alumina (aluminium oxide), except artificial corundum; By-product classification allocatable product; CAS 1344-28-1; pedigree (1,1,1,1,1)
  production volume 867.76 kg
  property carbon content, non-fossil 0; name C_content_non_fossil
  property price 0.28 EUR2005; name Al2O3Amount_price_EUR2005
    From UN trade database. http://data.un.org/ Import data from the largest economies of the world are used (Brazil, India, USA, China, Japan and EU-27).
  property dry mass 1 kg; name DM
  property water content 0; name water_content
  property wet mass 1 kg; name WM
  property water in wet mass 0 kg; name WWM
  property carbon content, fossil 0; name C_content_fossil
  property carbon content 0
    carbon content on a dry matter basis (reserved; not for manual entry)
  property true value 187.089
    allocation property applied in "true value" allocation // value calculated from revenue
  properties: carbon allocation 0 kg
- aluminium, cast alloy: 0 kg; source European Aluminium Association 2008; By-product classification allocatable product; CPC 41431: Unwrought aluminium; pedigree (1,1,1,1,1)
  EcoSpold01Location=RER
  production volume 8111.63 kg
  property price 1.3 EUR2005; name castAlloyAmount_price_EUR2005
    Temporary price data. Calculated as 90% of purchasers price based on: Source: London Metal Exchange, Aluminium alloy price for 2005
  property carbon content 0
    carbon content on a dry matter basis (reserved; not for manual entry)
  property true value 8119.74
    allocation property applied in "true value" allocation // value calculated from revenue
  properties: water in wet mass 0 kg, carbon content, non-fossil 0, water content 0, dry mass 1 kg, carbon content, fossil 0, wet mass 1 kg, carbon allocation 0 kg
- aluminium, wrought alloy: 0 kg; source European Aluminium Association 2008; By-product classification allocatable product; CPC 4153: Semi-finished products of aluminium or aluminium alloys; pedigree (1,1,1,1,1)
  production volume 3551.12 kg
  property price 1.44 EUR2005; name secondaryAluminiumOutput_price_EUR2005
    Estimated based on literature values and expert judgement. Aluminium ccast alloys are about 90% of the price of aluminium wrought alloys.
  property carbon content 0
    carbon content on a dry matter basis (reserved; not for manual entry)
  property true value 3937.48
    allocation property applied in "true value" allocation // value calculated from revenue
  properties: wet mass 1 kg, water content 0, carbon content, fossil 0, water in wet mass 0 kg, carbon content, non-fossil 0, dry mass 1 kg, carbon allocation 0 kg

## Inputs from technosphere
- clay brick: 678774 kg; source AMD 2007; lognormal variance with pedigree 0.3507, pedigree (1,3,5,3,1)
  Estimation, based on literature.
  Uncertainty: d
  properties: wet mass 1 kg, dry mass 1 kg
- cable, data cable in infrastructure: 8.73423e6 m; source AMD 2007; lognormal variance with pedigree 0.8607, pedigree (1,3,5,3,1)
  Estimation, based on literature. Life-span of 10 years is considered - i.e. 2.5 times the amounts is needed.
  Uncertainty: d
  properties: wet mass 0.079 kg, carbon content, fossil 0.371067, dry mass 0.079 kg
  note on carbon content, fossil: Calculated as the addition of C contents in the product composition. Then referred to 1 kg DM
- drawing of pipe, steel: 8.34893e6 kg; source AMD 2007; lognormal variance with pedigree 0.3507, pedigree (1,3,5,3,1)
  (same comment as for cable, data cable in infrastructure)
- cable, three-conductor cable: 1.4973e6 m; source AMD 2007; lognormal variance with pedigree 0.3507, pedigree (1,3,5,3,1)
  (same comment as for cable, data cable in infrastructure)
  properties: wet mass 1.04 kg, dry mass 1.04 kg, carbon content, fossil 0.451335
- wastewater treatment facility, capacity 1.6E8l/year: 0.998198 unit; source Doka G. 2007; lognormal variance with pedigree 0.448, pedigree (4,5,5,5,5)
  Literature Value.
  Uncertainty: r
- reinforcing steel: 2.59531e7 kg; source AMD 2007; lognormal variance with pedigree 0.3507, pedigree (1,3,5,3,1)
  Estimation, based on literature.
  Uncertainty: d
  properties: carbon content, fossil 0.004, dry mass 1 kg, wet mass 1 kg
- building, multi-storey: 327189 m3; source Kellenberger D. 2007; lognormal variance with pedigree 0.3507, pedigree (1,3,5,3,1)
  Estimation, based on literature.
  Uncertainty: d
- steel, chromium steel 18/8, hot rolled: 4.42002e6 kg; source AMD 2007; lognormal variance with pedigree 0.3507, pedigree (1,3,5,3,1)
  Estimation, based on literature. An average weight of 24.6 kg/m was used to split the weight of pipes. Life-span of 10 years is considered - i.e. 2.5 times the amounts is needed.
  Uncertainty: d
  properties: wet mass 1 kg, carbon content, fossil 0.0008, dry mass 1 kg
  note on carbon content, fossil: Stainless steel model is the grade 304 steel (18/8 stainless, 18% chromium 8% nickel; max. 0.08% C)
- concrete, normal: 162706 m3; source AMD 2007; lognormal variance with pedigree 0.3507, pedigree (1,3,5,3,1)
  Estimation, based on literature.
  Uncertainty: d
  properties: water content 0.086758, dry mass 2190 kg, wet mass 2380 kg
- electronic component machinery, unspecified: 499.099 unit; source Csatary P. 2002; lognormal variance with pedigree 0.3701, pedigree (4,4,5,3,1)
  Estimation, conservative estimation based on literature. For the process steps in the production chain of semiconductors and other electronic components100 units are requested with a life-span of 10 years - i.e. 2.5 times the amount estimated is needed. Hence, an input of 250 times is taken into account per Fab.
  Uncertainty: e
- used industrial electronic device: 0 kg; source AMD 2007
  Estimation, conservative estimation based on literature. For the process steps in the production chain of semiconductors and other electronic components100 units are requested with a life-span of 10 years - i.e. 2.5 times the amount estimated is needed. Hence, an input of 250 times is taken into account per Fab.
  production volume 0 kg
    Calculated from the production volume of electronic component factory in proportion to the respective output amounts.
  properties: wet mass 1 kg, carbon content, non-fossil 3.07246e-5, dry mass 1 kg, carbon content, fossil 0.0818694
  note on carbon content, non-fossil: The composition of an average industrial device was extracted from Tab 4.38 (ecoinvent v2.2 report 18_V). 88% steel, that was considered to have a C content of 0.012 (C content was calculated out of emission factors published in Commission Decision of 18 July 2007 establishing guidelines for the monitoring and reporting of greenhouse gas emissions pursuant to Directive 2003/87/EC of the European Parliament and of the Council (notified under document number C(2007) 3416)); 8% plastics (plastics C content was calculated using data in Tab A.2, ecoinvent v2.2 report 13_I); 3.2% PWB & plugs (C content calculated using PWB composition)
- road, company, internal: 2.04491e6 m2*year; source Spielmann M. 2007; lognormal variance with pedigree 0.3507, pedigree (1,3,5,3,1)
  Estimation, based on AMD site pictures and own assumption.
  Uncertainty: d
- concrete, medium strength: 202435 m3; source AMD 2007; lognormal variance with pedigree 0.8607, pedigree (1,3,5,3,1)
  Estimation, based on literature.
  Uncertainty: d
  properties: wet mass 2380 kg, water content 0.086758, dry mass 2190 kg
- building, hall: 85432.8 m2; source Kellenberger D. 2007; lognormal variance with pedigree 0.8607, pedigree (1,3,5,3,1)
  Estimation, based on AMD site pictures and own assumption.
  Uncertainty: d
- steel, low-alloyed, hot rolled: 3.92891e6 kg; source AMD 2007; lognormal variance with pedigree 0.3507, pedigree (1,3,5,3,1)
  (same comment as for steel, chromium steel 18/8, hot rolled)
  properties: dry mass 1 kg, carbon content, fossil 0.005, wet mass 1 kg
  note on carbon content, fossil: Low alloyed steel composition given in Tab. 3.2 ecoinvent v2.2 report 10_partII. Steel assumed to have a C content of 0.5%
- cable, unspecified: 1.96525e6 kg; lognormal variance with pedigree 0.2106, pedigree (5,5,5,5,5)
  This product represents average, unspecified cable.
  properties: carbon content, fossil 0.28196, dry mass 1 kg, wet mass 1 kg
- used industrial electronic device: -286982, -960765 kg (2 entries); source AMD 2007
  (same comment as for used industrial electronic device)
  production volume 1.25e6 kg

## Inputs from nature
- Occupation, industrial area [natural resource, land]: 9.08859e6 m2*year; source AMD 2007; lognormal variance with pedigree 0.1707, pedigree (1,3,5,3,1)
  Estimation. Based on literature value, considering 10% of the total area unoccupied and 18 month construction time.
  Uncertainty: d
- Occupation, construction site [natural resource, land]: 1.09063e6 m2*year; source AMD 2007; lognormal variance with pedigree 0.1707, pedigree (1,3,5,3,1)
  (same comment as for Occupation, industrial area)
- Transformation, to industrial area [natural resource, land]: 363544 m2; source AMD 2007; lognormal variance with pedigree 0.0907, pedigree (1,3,5,3,1)
  Litrature Value.
  Uncertainty: d
- Transformation, from unspecified [natural resource, land]: 363544 m2; source AMD 2007; lognormal variance with pedigree 0.0907, pedigree (1,3,5,3,1)
  Litrature Value.
  Uncertainty: d

## Sampling procedure
Literature & own estimations

## Review by Emilia Moreno Ruiz 2012-12-19
correction of exchange 'used cable'

## Review by Roland Hischier 2011-09-20
Transfer of documentation done.

## Review by Rolf Frischknecht 2007-09-14
passed.
