# paper production, woodcontaining, lightweight coated

Dataset: EcoSpold 2, unit process
Geography: CA-QC
Time period: 2000-01-01 to 2019-12-31
Technology level: current
Classification: EcoSpold01Categories: paper & cardboard/graphic paper
Classification: ISIC rev.4 ecoinvent: 1701:Manufacture of pulp, paper and paperboard
Tags: recontextualization
Scenario: Business-as-Usual
System model: Allocation at the point of substitution
Generated by: Pascal Lesage
Published in: Hischier R. 2007
Database: ecoinvent
isCopyrightProtected: true
accessRestrictedTo: 1

## General comment
This dataset represents the production of lightweight coated paper in Quebec.
Child dataset exchanges identical to GLO dataset. Created to enable linking to regional markets (e.g. for electricity). Data quality indicators adjusted accordingly.

## Included activities end
This dataset is a copy of the European production of LWC paper - including transports to paper mill, wood handling, mechanical pulping and bleaching, deinking of waste paper, paper production, energy production on-site and internal waste water treatment. Not included is the transport of waste paper to the mill, as this is already included in the used waste paper datasets. A small amount of waste paper input (4.3% of output paper weight) has been included in the amount of pulp. The sorting of this paper and the related by-products have been excluded, since the sorting of unsorted paper takes place in a separate activity.

## Technology
Average of present used technology

## Parameters
- world gross domestic product 2011: 7e13 USD(2011); name worldGDP2011; lognormal variance with pedigree 0.0006, pedigree (1,1,1,1,1)
  World Gross domestic product for 2011, expressed in 2011 USD. Source: World Bank.
- fraction, process water, to air: 0.15 dimensionless; lognormal variance with pedigree 0.092025, pedigree (4,4,3,2,4)
- fraction, cooling water, to air: 0.3875; lognormal variance with pedigree 0.092025, pedigree (4,4,3,2,4)
- fraction, cooling water, once-through system, to air: 0.004; lognormal variance with pedigree 0.0413, pedigree (2,3,1,3,1)
- fraction, cooling water, cooling pond system, to air: 0.032; lognormal variance with pedigree 0.0413, pedigree (2,3,1,3,1)
- fraction, cooling water, recirculating system, to air: 0.771; lognormal variance with pedigree 0.0413, pedigree (2,3,1,3,1)
- Quebec gross domestic product 2011: 3.11e11 USD(2011); name quebecGDP2011; lognormal variance with pedigree 0.0006, pedigree (1,1,1,1,1)
  Quebec Gross domestic product for 2011, expressed in 2011 USD. Source: Institut de la statistique du Québec. Converted from CAD to USD using a yearly average exchange rate of 0.989 CAD/USD (Source: bank of Canada).

## Reference product
- paper, woodcontaining, lightweight coated: 1 kg; By-product classification allocatable product; CPC 321: Pulp, paper and paperboard
  EcoSpold01Location=RER
  production volume 8.92035e7 kg; = PARENTVALUE*quebecGDP2011/worldGDP2011
    Gross approximation of Quebec production volume using relative value of Quebec GDP to world GDP
  property price 0.572 EUR2005
    Export prices for the World+ according to: http://faostat.fao.org/site/626/DesktopDefault.aspx?PageID=626#ancor downloaded 6 May 2009; calculated as export value divided by export volume.
  property carbon content, non-fossil 0.247213
    Biogenic C content was calculated after biogenic C contents of chemicals used in the production of the paper (in Tab 8.39 ecoinvent v2.2 report 11_III, part 8). The cellulose content in 1 kg of paper (on a wet mas basis) was estimated as (1-chemical content), C content of cellulose was considered 0.44 kgC/kg dry mass (ecoinvent v2.2 report, n 15a, pg 40)
  property carbon content, fossil 0.032531
    Fossil C content was calculated after fossil C contents of chemicals used in the production of the paper (in Tab 8.39 ecoinvent v2.2 report 11_III, part 8).
  property carbon content 0.279744
    carbon content on a dry matter basis (reserved; not for manual entry)
  property true value 0.572
    allocation property applied in "true value" allocation // value calculated from revenue
  properties: dry mass 0.945 kg, water in wet mass 0.055 kg, wet mass 1 kg, water content 0.0582011, carbon allocation 0.264359 kg

## By-products
All rows: By-product classification allocatable product; pedigree (1,1,1,1,1)
- heat, for reuse in municipal waste incineration only: 0 MJ; CPC 17300: Steam and hot water
  Net electricity generated from this waste and used in internal MSWI plant energy redistribution.
  Uncertainty: uncertainty is calculated from uncertainties in waste composition and uncertainties in energy efficiency and the uncertainty in internal energy demand
  production volume 17.3878 MJ
  property exergy 0.1842 MJ; name E_th_prod_MSWI_exergy
    This exergy property is based on the exergy content of the product.
  property price 0.0106 EUR2005; name E_th_prod_MSWI_price_EUR2005
    Average European district heat price from Ecoheatcool and Euroheat 2005-2006, Ecoheat Work package 1: The European heat market. Final report. 10.6 EUR/GJ i s the price of district heat. http://www.solarthermalworld.org/files/Ecoheatcool%20WP1%20Web.pdf?download
  property true value relation 0.1842; name E_th_prod_MSWI_true_value_relation
    property to calculate "true value" from
  property true value 1.28217e-9
    allocation property applied in "true value" allocation // value calculated from true value relation
- electricity, for reuse in municipal waste incineration only: 0 kWh; CPC 17100: Electrical energy
  (same comment as for heat, for reuse in municipal waste incineration only)
  production volume 2.44894 kWh
  property price 0.1 EUR2005; name E_el_prod_MSWI_price_EUR2005
    Estimated to be the same price as in case of electricity, medium voltage.
  property exergy 3.6 MJ; name E_el_prod_MSWI_exergy
    This exergy property is based on the exergy content of the product.
  property true value relation 3.6; name E_el_prod_MSWI_true_value_relation
    property to calculate "true value" from
  property true value 3.52935e-9
    (same comment as for heat, for reuse in municipal waste incineration only)
- potassium fertiliser, as K2O: 0 kg; source CRAAQ 2010; CPC 3463: Mineral or chemical fertilizers, potassic
  This is the potassium (as K2O) output (organic and mineral forms of potassium contained) from organic origin. In practice, only a part of this total amount is available to the plants and the available amount has to be calculated considering efficiency of organic potassium (to replace mineral potassium ), which also depends on many factors, such as climate, soil, crop, timing and technique of application, etc. Since this dataset includes field emissions from the application of sludge, potassium availability has been accounted for in the calculation of direct field emissions.
  Uncertainty: The uncertainty of calculated values is determined from propagation of uncertainty factors of underlying variables.
  production volume 62.4483 kg
  property price 0.188 EUR2005; name K2O_fertiliser_price_EUR2005
    Temporary price data. Calculated as 90% of purchasers price based on: 2004 import price calulated from FAOSTAT (http://faostat.fao.org/site/575/DesktopDefault.aspx?PageID=575#ancor [accessed 2011.01.27] Potash Fertilizers (K20 total nutrients) in kUSD/Mg
  property carbon content 0
    carbon content on a dry matter basis (reserved; not for manual entry)
  property true value 1.31612e-7
    allocation property applied in "true value" allocation // value calculated from revenue
  properties: carbon content, fossil 0, dry mass 1 kg, water in wet mass 0 kg, water content 0, wet mass 1 kg, carbon content, non-fossil 0, carbon allocation 0 kg
- nitrogen fertiliser, as N: 0 kg; source CRAAQ 2010; CPC 3461: Mineral or chemical fertilizers, nitrogenous
  This is the total nitrogen (as N) output (organic and mineral forms of nitrogen contained) from organic origin. In practice, only a part of this total amount is available to the plants and the available amount has to be calculated considering nitrogen efficiency (to replace mineral nitrogen), which also depends on many factors, such as climate, soil, crop, timing and technique of application, etc. Since this dataset includes field emissions from the application of sludge, nitrogen availability has been accounted for in the calculation of direct field emissions.
  Uncertainty: The uncertainty of calculated values is determined from propagation of uncertainty factors of underlying variables.
  production volume 386.212 kg
  property price 0.473 EUR2005; name N_fertiliser_price_EUR2005
    Temporary price data. Calculated as 90% of purchasers price based on: 2004 prices are calculated on basis of Import/Export data (tonnes and US$) from UN Trade Statistics Database (http://data.un.org/Browse.aspx?d=ComTrade, accessed 7/7-2010). N, P2O5, or K2O content (http://www.fertilizer.org/ifa/Home-Page/STATISTICS/Conversions-factors)
  property carbon content 0
    carbon content on a dry matter basis (reserved; not for manual entry)
  property true value 2.04788e-6
    allocation property applied in "true value" allocation // value calculated from revenue
  properties: water content 0, wet mass 1 kg, dry mass 1 kg, carbon content, non-fossil 0, water in wet mass 0 kg, carbon content, fossil 0, carbon allocation 0 kg
- phosphate fertiliser, as P2O5: 0 kg; source CRAAQ 2010; CPC 3462: Mineral or chemical fertilizers, phosphatic
  This is the total phosphate (as P2O5) output (organic and mineral forms of phosphate contained) from organic origin. In practice, only a part of this total amount is available to the plants and the available amount has to be calculated considering efficiency of organic phosphate (to replace mineral phosphate), which also depends on many factors, such as climate, soil, crop, timing and technique of application, etc. Since this dataset includes field emissions from the application of sludge, phosphate availability has been accounted for in the calculation of direct field emissions.
  Uncertainty: The uncertainty of calculated values is determined from propagation of uncertainty factors of underlying variables.
  production volume 258.504 kg
  property price 0.241 EUR2005; name P2O5_fertiliser_price_EUR2005
    (same comment as for nitrogen fertiliser, as N)
  property carbon content 0
    carbon content on a dry matter basis (reserved; not for manual entry)
  property true value 6.98396e-7
    allocation property applied in "true value" allocation // value calculated from revenue
  properties: dry mass 1 kg, water content 0, carbon content, fossil 0, wet mass 1 kg, carbon content, non-fossil 0, water in wet mass 0 kg, carbon allocation 0 kg
- soil pH raising agent, as CaCO3: 0 kg; source Marianne Lemieux 2013; CPC 34659: Fertilizers n.e.c.
  Calculated value of the amount of CaCO3 that can be substituted considered the liming efficiency of the sludge.
  Uncertainty: The uncertainty of calculated values is determined from propagation of uncertainty factors of underlying variables.
  production volume 7199.82 kg
  property carbon content, fossil 0.12; name soil_pH_raising_agent_C_content_fossil_0; = 12/(40+12+3*16)
    Stoichiometric calculation. Fossil carbon content on a dry matter basis.
  property carbon content, non-fossil 0; name soil_pH_raising_a_C_content_non_fossil_0
    biogene carbon content on a dry matter basis
  property price 0.117 EUR2005; name soil_pH_raising_agent_as_CaCO3_price_EUR
    The price is estimated to be the same as for lime.
  property carbon content 0.12
    carbon content on a dry matter basis (reserved; not for manual entry)
  property true value 9.44334e-6
    allocation property applied in "true value" allocation // value calculated from revenue
  properties: wet mass 1 kg, water in wet mass 0 kg, water content 0, dry mass 1 kg, carbon allocation 0.12 kg

## Inputs from technosphere
- aluminium sulfate, powder: 0.00169996 kg; lognormal variance with pedigree 0.0426, pedigree (1,3,5,5,1)
  EcoSpold01Location=RER
  Average from several LWC paper producers
  Uncertainty: average from several LWC paper producers
  properties: dry mass 1 kg, wet mass 1 kg
- activated bentonite: 0.000639986 kg; lognormal variance with pedigree 0.0426, pedigree (1,3,5,5,1)
  EcoSpold01Location=DE
  Average from several LWC paper producers
  Uncertainty: average from several LWC paper producers
  properties: dry mass 1 kg, wet mass 1 kg
- lime: 0.00143997 kg; lognormal variance with pedigree 0.0426, pedigree (1,3,5,5,1)
  EcoSpold01Location=CH
  Average from several LWC paper producers
  Uncertainty: average from several LWC paper producers
  properties: carbon content, fossil 0.120005, wet mass 1 kg, dry mass 1 kg
- sulfate pulp, unbleached: 0.0130497 kg; = (0.218+0.043)*0.05; lognormal variance with pedigree 0.0407, pedigree (1,3,5,3,1)
  average from several LWC paper producers; includes a small amount of waste paper. Pulp input is 5% unbleached pulp and 95% bleached pulp
  Uncertainty: average from several LWC paper producers
  properties: water content 0.111111, price 0.355 EUR2005, wet mass 1 kg, carbon content, non-fossil 0.494, dry mass 0.9 kg
  note on carbon content, non-fossil: C content of dry mass of sulfate pulp is 0.494 kgC/kg dry wood (ecoinvent v2.2 report 6_IX & ecoinvent v2.2 report 9). No other C containing products in the formulation of the pulp.
- chlorine, liquid: 6.99985e-6 kg; lognormal variance with pedigree 0.0426, pedigree (1,3,5,5,1)
  Average from several LWC paper producers
  EcoSpold01Location=RER
  Uncertainty: average from several LWC paper producers
  properties: dry mass 1 kg, wet mass 1 kg
- heat, district or industrial, other than natural gas: 3.05483 MJ; lognormal variance with pedigree 0.0601, pedigree (1,2,5,5,3)
  Value according to CEPI energy report
  EcoSpold01Location=RER
  Uncertainty: value according to CEPI energy report
- municipal solid waste: -0.00139997 kg; lognormal variance with pedigree 0.0426, pedigree (1,3,5,5,1)
  (same comment as for lime)
  production volume 124885 kg; = PARENTVALUE*quebecGDP2011/worldGDP2011
    Calculated from the production volume of paper, woodcontaining, lightweight coated in proportion to the respective output amounts.
    Gross approximation of Quebec production volume using relative value of Quebec GDP to world GDP
  properties: wet mass 1 kg, water content 0.297017, carbon content, non-fossil 0.261655, dry mass 0.771 kg, carbon content, fossil 0.171549
  note on carbon content, non-fossil: MSW composition in tab 4.1, ecoinvent v2.2 report 13_I. C content referred to 1 kg DM
- sludge from pulp and paper production: -0.000755984 kg; lognormal variance with pedigree 0.0426, pedigree (1,3,5,5,1)
  Average from several LWC paper producers
  EcoSpold01Location=CH
  Uncertainty: average from several LWC paper producers
  production volume 67437.8 kg; = PARENTVALUE*quebecGDP2011/worldGDP2011
    (same comment as for municipal solid waste)
  properties: water content 0.333333, wet mass 1 kg, carbon content, non-fossil 0.21, dry mass 0.75 kg
  note on carbon content, non-fossil: Tab 6.21, ecoinvent v2.2 report 11_III & Tab A.9, ecoinvent v2.2 report 13_I. Sludge from pulp and paper contains 15.75% carbon
- wood ash mixture, pure: -0.00734984 kg; lognormal variance with pedigree 0.0426, pedigree (1,3,5,5,1)
  (same comment as for lime)
  production volume 655645 kg; = PARENTVALUE*quebecGDP2011/worldGDP2011
    (same comment as for municipal solid waste)
  properties: carbon content, non-fossil 0.012, wet mass 1 kg, dry mass 1 kg
- ash from paper production sludge: -0.000212995 kg; lognormal variance with pedigree 0.0426, pedigree (1,3,5,5,1)
  (same comment as for sludge from pulp and paper production)
  production volume 19000.3 kg; = PARENTVALUE*quebecGDP2011/worldGDP2011
    (same comment as for municipal solid waste)
  properties: wet mass 1 kg, carbon content, non-fossil 0.0092, dry mass 1 kg
- hazardous waste, for underground deposit: -0.000199996 kg; lognormal variance with pedigree 0.0426, pedigree (1,3,5,5,1)
  Average from several LWC paper producers
  EcoSpold01Location=DE
  Uncertainty: average from several LWC paper producers
  production volume 17840.7 kg; = PARENTVALUE*quebecGDP2011/worldGDP2011
    (same comment as for municipal solid waste)
  properties: wet mass 1 kg, dry mass 1 kg, carbon content, fossil 0.554667
  note on carbon content, fossil: Tab A.6, ecoinvent v2.2 report 13_I, average hazardous waste composition was used, and referred to 0% water mass. No waste-specific emission are currently inventoried for underground deposits. Accordingly, no waste composition must be specified. For generic, average waste to underground deposit deposition in a 200 liter steel drum without cement solidification is assumed (ecoinvent v2.2 report 13_I).
- sulfate pulp, bleached: 0.247945 kg; = (0.218+0.043)*0.95; lognormal variance with pedigree 0.0407, pedigree (1,3,5,3,1)
  (same comment as for sulfate pulp, unbleached)
  properties: wet mass 1 kg, dry mass 0.9 kg, water content 0.111111
- latex: 0.0291994 kg; lognormal variance with pedigree 0.0426, pedigree (1,3,5,5,1)
  (same comment as for chlorine, liquid)
  properties: wet mass 1 kg, dry mass 1 kg, carbon content, fossil 0.872983
  note on carbon content, fossil: The Styrene-butadiene dispersion is based on styrene and 1,3-butadiene plus co-monomers like i.e. ac-rylonitrile or (meth-)acrylic acid (ecoinvent v2.2 report 11_III). Following specifications in US Patent 3,875,101 (1971), the dispersion was considered as: 52.5% 1.3-butadiene (0.8571 kg C/kg dry mass); 43% styrene (0.9231 kg C/kg dry mass); 2% acrylic acid (0.5 kg C/kg dry mass); 2.5% acrolein (C3H4O, MW=56; 0.6429 kg C/kg dry mass)
- sodium hydroxide, without water, in 50% solution state: 0.0173996 kg; lognormal variance with pedigree 0.0426, pedigree (1,3,5,5,1)
  (same comment as for aluminium sulfate, powder)
  properties: dry mass 1 kg, wet mass 1 kg
- chemical, organic: 0.0103998 kg; lognormal variance with pedigree 0.0426, pedigree (1,3,5,5,1)
  Average from several LWC paper producers
  EcoSpold01Location=GLO
  Uncertainty: average from several LWC paper producers
  properties: wet mass 1 kg, carbon content, fossil 0.628, dry mass 1 kg
  note on carbon content, fossil: This dataset is an unweighted average of 20 organic substances (listed in Tab 88.1, ecoinvent v2.2 report 8, part II), being part of the top100 chemicals included in this database. The C-content has also been calculated as an unweighted average of the C content of the substances composing this dataset.
- chemical, inorganic: 0.0103998 kg; lognormal variance with pedigree 0.0426, pedigree (1,3,5,5,1)
  EcoSpold01Location=GLO
  Average from several LWC paper producers
  Uncertainty: average from several LWC paper producers
  properties: wet mass 1 kg, carbon content, fossil 0.003, dry mass 1 kg
  note on carbon content, fossil: This dataset is an unweighted average of 20 inorganic substances (listed in Tab 88.1, ecoinvent v2.2 report 8, part II), being part of the top100 chemicals included in this database. The C-content has also been calculated as an unweighted average of the C content of the substances composing this dataset.
- urea, as N: 0.000303993 kg; lognormal variance with pedigree 0.0426, pedigree (1,3,5,5,1)
  (same comment as for chlorine, liquid)
  properties: dry mass 1 kg, wet mass 1 kg, carbon content, fossil 0.2
- sulfur dioxide, liquid: 0.00549988 kg; lognormal variance with pedigree 0.0426, pedigree (1,3,5,5,1)
  (same comment as for aluminium sulfate, powder)
  properties: wet mass 1 kg, dry mass 1 kg
- sulfuric acid: 0.000519989 kg; lognormal variance with pedigree 0.0426, pedigree (1,3,5,5,1)
  (same comment as for aluminium sulfate, powder)
  properties: wet mass 1 kg, dry mass 1 kg
- hydrogen peroxide, without water, in 50% solution state: 0.00877981 kg; lognormal variance with pedigree 0.0426, pedigree (1,3,5,5,1)
  (same comment as for aluminium sulfate, powder)
  properties: dry mass 1 kg, wet mass 1 kg
- sodium dithionite, anhydrous: 0.00163996 kg; lognormal variance with pedigree 0.0426, pedigree (1,3,5,5,1)
  (same comment as for aluminium sulfate, powder)
  properties: dry mass 1 kg, wet mass 1 kg
- kaolin: 0.313993 kg; lognormal variance with pedigree 0.0426, pedigree (1,3,5,5,1)
  (same comment as for chlorine, liquid)
  properties: dry mass 1 kg, wet mass 1 kg
- heat, central or small-scale, other than natural gas: 0.0713985 MJ; lognormal variance with pedigree 0.0601, pedigree (1,2,5,5,3)
  (same comment as for heat, district or industrial, other than natural gas)
- electricity, medium voltage: 1.59937 kWh; lognormal variance with pedigree 0.0426, pedigree (1,3,5,5,1)
  EcoSpold01Location=NORDEL
  Average from several LWC paper producers
  Uncertainty: average from several LWC paper producers
- potato starch: 0.0118997 kg; lognormal variance with pedigree 0.0426, pedigree (1,3,5,5,1)
  (same comment as for hazardous waste, for underground deposit)
  properties: dry mass 0.8 kg, carbon content, non-fossil 0.46, water content 0.25, wet mass 1 kg
  note on carbon content, non-fossil: C-content of starch is considered 46% on dry mass basis (from "Evolutionary and Biochemical Aspects", A.D. Kay and T. Vrede (in Global Ecology, 2010, Elsevier B.V., S.E. Jørgensen Ed.)).
- malusil: 0.0327993 kg; lognormal variance with pedigree 0.0426, pedigree (1,3,5,5,1)
  (same comment as for chlorine, liquid)
  properties: dry mass 1 kg, wet mass 1 kg
- heat, district or industrial, natural gas: 3.01144 MJ; lognormal variance with pedigree 0.0601, pedigree (1,2,5,5,3)
  (same comment as for heat, district or industrial, other than natural gas)
- paper mill, integrated: 5.43988e-11 unit; lognormal variance with pedigree 0.448, pedigree (4,5,5,5,5)
  Own assumption
  EcoSpold01Location=RER
  Uncertainty: own assumption
- pulpwood, softwood, measured as solid wood under bark: 0.00115828 m3; = 0.001121+3.73E-05; lognormal variance with pedigree 0.0426, pedigree (1,3,5,5,1)
  EcoSpold01Location=RER
  average from several LWC paper producers; includes a small amount of residual wood from ordinary softwood forestry
  Uncertainty: average from several LWC paper producers
  properties: carbon content, non-fossil 0.494, wet mass 1080 kg, water content 1.4, dry mass 450 kg
  note on carbon content, non-fossil: C content of dry mass is 0.494 kgC/kg dry wood (ecoinvent v2.2 report 9)
- carboxymethyl cellulose, powder: 0.00252995 kg; lognormal variance with pedigree 0.0426, pedigree (1,3,5,5,1)
  (same comment as for aluminium sulfate, powder)
  properties: dry mass 1 kg, carbon content, non-fossil 0.293878, carbon content, fossil 0.0979592, wet mass 1 kg
  note on carbon content, non-fossil: Chemical structure: Cellulose-O-CH2-COO-Na+. CMC is produced by the processing of alkaline cellulose with mono acetic acid (ecoinvent v2.2 report 12, pg 76 & 81). MW Acetic acid is 60 g/mol. The degree of carboxymethyl substitution in CMC is variable. It was considered that every molecule of glucose (monomers of cellulose) had a carboxymethyl substitution. MW of glucose (C6H10O5) is 162 g/mol; cellulose is (C6H10O5)n.
  note on carbon content, fossil: Chemical structure: Cellulose-O-CH2-COO-Na+. CMC is produced by the processing of alkaline cellulose with mono acetic acid (ecoinvent v2.2 report 12, pg 76 & 81). MW Acetic acid (CH3-COOH) is 60 g/mol. The degree of carboxymethyl substitution in CMC is variable. It was considered that every molecule of glucose (monomers of cellulose) had a carboxymethyl substitution. MW of glucose (C6H10O5) is 162 g/mol; cellulose is (C6H10O5)n. MW of Na is 23

## Inputs from nature
- Water, cooling, unspecified natural origin [natural resource, in water]: 0.0239995 m3; lognormal variance with pedigree 0.0426, pedigree (1,3,5,5,1)
  Average from several LWC paper producers
  Uncertainty: average from several LWC paper producers
- Water, unspecified natural origin [natural resource, in water]: 0.0206996 m3; lognormal variance with pedigree 0.0426, pedigree (1,3,5,5,1)
  (same comment as for Water, cooling, unspecified natural origin)

## Emissions to nature
- Water [air, unspecified]: 0.0124047 m3; lognormal variance with pedigree 0.0827, pedigree (2,2,5,5,1)
  Calculated value based on literature values and expert opinion. See comments in the parametres' comment field.
- DOC, Dissolved Organic Carbon [water, surface water]: 0.000814797 kg; lognormal variance with pedigree 0.0826, pedigree (1,3,5,5,1)
  Calculated as equal to TOC.
  Uncertainty: average from several LWC paper producers
- Suspended solids, unspecified [water, surface water]: 0.000339993 kg; lognormal variance with pedigree 0.0826, pedigree (1,3,5,5,1)
  (same comment as for Water, cooling, unspecified natural origin)
- Water [water, unspecified]: 0.0322943 m3; lognormal variance with pedigree 0.0827, pedigree (2,2,5,5,1)
  (same comment as for Water)
  property wet mass 1000 kg; name WM
  property carbon content, fossil 0; name C_content_fossil
  property water in wet mass 1000 kg; name WWM
  property dry mass 0 kg; name DM
  property carbon content, non-fossil 0; name C_content_non_fossil
- AOX, Adsorbable Organic Halogen as Cl [water, surface water]: 1.59997e-6 kg; lognormal variance with pedigree 0.0826, pedigree (1,3,5,5,1)
  (same comment as for Water, cooling, unspecified natural origin)
- TOC, Total Organic Carbon [water, surface water]: 0.000814797 kg; lognormal variance with pedigree 0.0826, pedigree (1,3,5,5,1)
  Calculated by default as TOC (gC) = COD/2.7 (COD measured in g O2). Should more correctly be calculated from the carbon content of the specified emissions to water.
  Uncertainty: average from several LWC paper producers
- COD, Chemical Oxygen Demand [water, surface water]: 0.00219995 kg; lognormal variance with pedigree 0.0826, pedigree (1,3,5,5,1)
  (same comment as for Water, cooling, unspecified natural origin)
- Nitrogen [water, surface water]: 4.29991e-5 kg; lognormal variance with pedigree 0.0826, pedigree (1,3,5,5,1)
  (same comment as for Water, cooling, unspecified natural origin)
- Phosphorus [water, surface water]: 7.59984e-6 kg; lognormal variance with pedigree 0.0826, pedigree (1,3,5,5,1)
  (same comment as for Water, cooling, unspecified natural origin)
- BOD5, Biological Oxygen Demand [water, surface water]: 0.000109998 kg; lognormal variance with pedigree 0.0826, pedigree (1,3,5,5,1)
  (same comment as for Water, cooling, unspecified natural origin)

## Review by Hans-Jörg Althaus 2003-08-06
Passed
