# urea production, as N

Dataset: EcoSpold 2, unit process
Geography: RoW
Time period: 1999-01-01 to 2019-12-31
Technology level: current
Classification: ISIC rev.4 ecoinvent: 2012:Manufacture of fertilizers and nitrogen compounds
Classification: EcoSpold01Categories: chemicals/organics
Tags: ConvertedDataset
Scenario: Business-as-Usual
System model: Allocation at the point of substitution
Share of production covered: 70 %
Generated by: Angelika Heil
Published in: Nemecek, T. 2007
Database: ecoinvent
isCopyrightProtected: true
accessRestrictedTo: 1

## General comment
Refers to 1 kg N, resp. 2.17 kg urea with a N-content of 46.0%
[This dataset was already contained in the ecoinvent database version 2. It was not individually updated during the transfer to ecoinvent version 3. Life Cycle Impact Assessment results may still have changed, as they are affected by changes in the supply chain, i.e. in other datasets. This dataset was generated following the ecoinvent quality guidelines for version 2. It may have been subject to central changes described in the ecoinvent version 3 change report (http://www.ecoinvent.org/database/ecoinvent-version-3/reports-of-changes/), and the results of the central updates were reviewed extensively. The changes added e.g. consistent water flows and other information throughout the database. The documentation of this dataset can be found in the ecoinvent reports of version 2, which are still available via the ecoinvent website. The change report linked above covers all central changes that were made during the conversion process.]

## Included activities end
The unit process inventory takes into account the production of urea from ammonia and carbon dioxide. Transports of the intermediate products were included as well as the transport of the fertiliser product from the factory to the regional storehouse. Production and waste treatment of catalysts, coating and packaging of the final fertiliser products were not included. CO2-consumption (733 kg CO2/ton of urea) during production of urea was not included, since CO2 arises as a by-product during the production of ammonia. Infrastructure was included by means of a proxy module.

## Geography
According to the reference used for this inventory, the European average is derived from mean values of several fertiliser plants within Europe. The production of raw materials and/or intermediates outside Europe was taken into account by considering the production technology in the respective country and the relative import shares.

## Technology
Production inventory was derived from detailed literature studies and specifications from the manufacturer, relevant for the European production. Transport specifications of the fertiliser product to the regional department store, which were not included in the reference used for this inventory, were complemented by data given in Patyk & Reinhardt (1997).

## Time period
Year when the principal reference used for this inventory was published.

## Parameters
- fraction, cooling water, to air: 0.3875; name fraction_CW_to_air; = (0.5*fraction_CW_OT_to_air)+(0.5*fraction_CW_R_to_air); lognormal variance with pedigree 0.092025, pedigree (4,4,3,2,4)
  Calculated value based on literature value (see comments of the other parametres present in this dataset) and expert opinion. In the case when no industry/literature data are available about the type of cooling or directly fraction, cooling water, to air specific for the process a default assumption is applied. It is assumed that the once-through cooling system is used in 50% of all cases and recirculating system is used in another 50% of all cases.
- fraction, process water, to air: 0.205 dimensionless; name fraction_PW_to_air; lognormal variance with pedigree 0.092025, pedigree (4,4,3,2,4)
- fraction, cooling water, recirculating system, to air: 0.771; name fraction_CW_R_to_air; lognormal variance with pedigree 0.0413, pedigree (2,3,1,3,1)
  Calculated based on literature value (Scown, C.D., 2011, Water Footprint of U.S. Transportation Fuels and supplying information of the article) (Vionnet, S., Quantis Water Database - Technical Report, 2012).
- fraction, cooling water, once-through system, to air: 0.004; name fraction_CW_OT_to_air; lognormal variance with pedigree 0.0413, pedigree (2,3,1,3,1)
  (same comment as for fraction, cooling water, recirculating system, to air)
- fraction, cooling water, cooling pond system, to air: 0.032; name fraction_CW_CP_to_air; lognormal variance with pedigree 0.0413, pedigree (2,3,1,3,1)
  (same comment as for fraction, cooling water, recirculating system, to air)

## Reference product
- urea, as N: 1 kg; CPC 34611: Urea; By-product classification allocatable product
  EcoSpold01Location=RER
  production volume 5.3e10 kg
    Source: IFA production and trade statistics http://www.fertilizer.org/ifa/Home-Page/STATISTICS/Production-and-trade
  property price 0.457 EUR2005
    Calculated value based on data from United Nations Commodity Trade Statistics Database (comtrade.un.org). UN comtrade category: 310210 Urea, including aqueous solution in packs > 10kg. Year 2005. Using exchange rate of 1EURO = 1.209 USD. Average of price of import into 5 main markets (EU, US, JP, IN and CN).
  property carbon content 0.2
    carbon content on a dry matter basis (reserved; not for manual entry)
  properties: carbon content, non-fossil 0, wet mass 1 kg, water in wet mass 0 kg, water content 0, carbon content, fossil 0.2, dry mass 1 kg, carbon allocation 0.2 kg

## Inputs from technosphere
- heat, district or industrial, natural gas: 0 MJ; pedigree (1,1,1,1,1)
  EcoSpold01Location=RER
- ammonia, liquid: 1.23 kg; lognormal variance with pedigree 0.0426, pedigree (2,1,5,5,1)
  EcoSpold01Location=RER
  properties: dry mass 1 kg, wet mass 1 kg
- chemical factory, organics: 8.7e-10 unit; lognormal variance with pedigree 0.3426, pedigree (2,1,5,5,1)
  EcoSpold01Location=RER
- electricity, medium voltage: 0 kWh; pedigree (1,1,1,1,1)
  EcoSpold01Location=UCTE
- heat, district or industrial, natural gas: 0.139915, 7.91009 MJ (2 entries); lognormal variance with pedigree 0.0426, pedigree (2,1,5,5,1)
  EcoSpold01Location=RER
- electricity, medium voltage: 0.00418904, 0.000762228, 0.0129262, 0.187417, 0.0268229, 0.0878827 kWh (6 entries); lognormal variance with pedigree 0.0426, pedigree (2,1,5,5,1)
  EcoSpold01Location=UCTE

## Inputs from nature
- Water, unspecified natural origin [natural resource, in water]: 0.0005 m3; name water_UNO_input; source EFMA - European Fertilizers Manufacturin 2000; lognormal variance with pedigree 0.0546, pedigree (3,3,5,5,1)
  Calculated based on literature (EFMA, 2000, Production of Ammonium Nitrate and Calcium Ammonium Nitrate; EFMA, 2000, Production of Urea and Urea Ammonium Nitrate), (Vionnet, S., Quantis Water Database - Technical Report, 2012). During production of urea water is actually produced (via chemical reaction), additional process water is needed though. It includes the main processes: carbamate condensation, urea reaction, stripping, separation, rectification, evaporation, prilling and granulling.
- Water, cooling, unspecified natural origin [natural resource, in water]: 0.285 m3; name water_cooling_UNO_input; source EFMA - European Fertilizers Manufacturin 2000; lognormal variance with pedigree 0.0527, pedigree (2,2,5,5,1)
  Calculated based on literature (EFMA, 2000, Production of Ammonium Nitrate and Calcium Ammonium Nitrate; EFMA, 2000, Production of Urea and Urea Ammonium Nitrate), (Vionnet, S., Quantis Water Database - Technical Report, 2012). During production of urea water is actually produced (via chemical reaction), additional process water is needed though. It includes the main processes: carbamate condensation, urea reaction, stripping, separation, rectification, evaporation, prilling and granulling. The process ends when finished urea leaves the plant.
  property water content 9081.65; name water_content
  property wet mass 1000 kg; name WM
  property carbon content, non-fossil 0; name C_content_non_fossil
  property water in wet mass 999.89 kg; name WWM
  property dry mass 0.1101 kg; name DM
  property carbon content, fossil 0.0104329; name C_content_fossil

## Emissions to nature
- Water [water, unspecified]: 0.17496 m3; name water_to_water_unspecified; lognormal variance with pedigree 0.0827, pedigree (2,2,5,5,1)
  Calculated value based on literature values and expert opinion. See comments in the parametres' comment field.
  property fraction, origin: salt water 0; name fraction_origin_salt_water_Ww
  property fraction, origin: fresh water 0; name fraction_origin_fresh_water_Ww
  property fraction, origin: unspecified 1; name fraction_origin_unspecified_Ww
- Ammonia [air, urban air close to ground]: 0.00348 kg; lognormal variance with pedigree 0.1112, pedigree (2,3,5,5,3)
- Methane, fossil [air, urban air close to ground]: 0.000783 kg; lognormal variance with pedigree 0.1112, pedigree (2,3,5,5,3)
- Particulates, > 10 um [air, urban air close to ground]: 0.000809 kg; lognormal variance with pedigree 0.1112, pedigree (2,3,5,5,3)
- Water [air, unspecified]: 0.11054 m3; name water_to_air_unspecified; lognormal variance with pedigree 0.0827, pedigree (2,2,5,5,1)
  (same comment as for Water)
  property fraction, origin: salt water 0; name fraction_origin_salt_water
  property fraction, origin: unspecified 1; name fraction_origin_unspecified
  property fraction, origin: fresh water 0; name fraction_origin_fresh_water
- Ammonium, ion [water, surface water]: 0.000364 kg; lognormal variance with pedigree 0.1112, pedigree (2,3,5,5,3)
- Particulates, < 2.5 um [air, urban air close to ground]: 0.000809 kg; lognormal variance with pedigree 0.3712, pedigree (2,3,5,5,3)
- Particulates, > 2.5 um, and < 10um [air, urban air close to ground]: 0.000404 kg; lognormal variance with pedigree 0.1812, pedigree (2,3,5,5,3)
- Carbon monoxide, fossil [air, urban air close to ground]: 0.00287 kg; lognormal variance with pedigree 0.7112, pedigree (2,3,5,5,3)

## Sampling procedure
Values given in the reference originate from manufacturers and/or other data sources which in turn refer to the real situation and hence are largely secured. However, the emissions factors may be somewhat uncertain. When no information on the speciation of N - emissions was given in the reference, the most likely speciation was assessed by an expert. For particulate emissions factors into the air specified only as the total particle mass in the reference, particle size distribution was assessed based on an expert's guess.

## Extrapolations
No extrapolations done for inputs, emissions partly extrapolated from emission factors originating from plants in selected European countries. This dataset has been copied from an original dataset covering the geography RER. The uncertainty has been adjusted accordingly.

## Review by Maggie Osses 2003-09-22
Passed.
