# orange production, fresh grade

Dataset: EcoSpold 2, unit process
Geography: US
Time period: 2010-01-01 to 2019-12-31
Technology level: current
Classification: ISIC rev.4 ecoinvent: 0123:Growing of citrus fruits
Tags: WFLDB
Scenario: Business-as-Usual
System model: Allocation at the point of substitution
Generated by: Xavier Bengoa
Published in: Nemecek T. 2015
Database: ecoinvent
isCopyrightProtected: true
accessRestrictedTo: 1

## General comment
This dataset represents the production of 1 kg of orange, fresh grade (Navelina). Fresh grade oranges are meant for direct human consumption. The reference flow is the average yield per ha and year, from 2010 - 2014: yield (32 t/ha) obtained under irrigated conditions (total amount of water 4457 m3/ha). The data are representative for orange production, fresh grade (Navel), in the United States (California) used for the export market. Mineral NPK fertiliser input is 95-38-45 kg/ha. No organic fertilisers are applied. Total active ingredients (a.i.) applied as pesticides amount to 11 kg a.i./ha and 8.8 kg/ha of horticultural oil.
The dataset was modelled within the project 'World Food LCA database (WFLDB)'. The aim of this project was to provide inventories of a broad variety of agricultural products and processes and to cover for each product at least 50% of the global export market. The export share of fresh grade oranges produced in the United States amounts to 10.3% of the global export (tonnage exported in 2010). The production system regarded in this dataset aimed at representing fresh grade oranges produced in the United Staes or the export market.
PEF-Quality: data quality rating (DQR) = 1.2 (i.e. excellent quality). This dataset refers to an average situation; for specific situations exchanges might differ substantially due to site specific parameters

## Included activities start
This activity starts with the nursery producing fruit tree seedlings, i.e.grafted young trees to be planted.

## Included activities end
This activity ends with the waste treatment after the clearing of the orchard (rooting up the trees). The dataset includes all activities during a year in the productive phase of the orchard including the establishment phase per year of lifetime (20 years), the clearing of the orchard including waste treatment.
The establishment phase of the orchard includes tree nursery, soil cultivation, planting trees, sowing grass, installation of trellis system (posts and wires) and irrigation. Fertiliser and pesticide use in a year of the establishment phase is assumed to be half of the amount of a year in the productive phase.
The productive phase of the orchard includes machine operations, corresponding infrastructure, fuel use and sheds. Machine operations in the productive phase are: soil cultivation (mulching, mowing), fertiliser and pesticide application, harvesting and irrigation. Further, direct field emissions and land use change are included. At the end of the productive phase the orchard is cleared by rooting up the trees.
The inputs of seedlings, fertilisers and pesticides as well as packaging of fertilisers and pesticides are considered. The dataset doesn't include emissions from manure storage because these are within the system boundary of animal production. Heavy metal uptake by the crop is considered.

## Technology
Conventional production

## Parameters
- heavyMetalUptakeSwitch: 1
- LUC_crop_specific: 1
  This parameter allows to switch between a 'crop specific' and a 'country specific' approach when calculating the LUC of a crop. By default, the chosen approach is 'crop specific', so the value of the parameter is 1. If you want to apply a 'country specific' approach, turn the parameter to 0.

## Reference product
- orange, fresh grade: 1 kg; By-product classification allocatable product; CPC 01323: Oranges
  Orange, fresh grade, US production
  Yield = 32018.0 kg/haOutput of orange, fresh grade, produced for direct human consumption.
  production volume 2.13475e9 kg
    Source: FAOSTAT. Average, 2009-2012. USDA NASS
  property price 0.16 EUR2005
    Personal communication with the Technical Head of Citrus at Core Fruit, South Africa on 26.04.2018
  property carbon content, non-fossil 0.350629
    calculation: C-content of components according to ecoinvent report No. 15a. Source of composition: Souci, S.W., Fachmann, W., Kraut, H. (Hg.: Bundesminsiterium fur Ernahrung, Landwirtschaft und Forsten, Bonn) 'Die Zusammensetzung der Lebensmittel - Nahrwerttabellen', medpharm Scientific Publishers Stuttgart, CRC Press; 2000.
  property carbon content 0.350629
    carbon content on a dry matter basis (reserved; not for manual entry)
  property true value 0.16
    allocation property applied in "true value" allocation // value calculated from revenue
  properties: water in wet mass 0.457112 kg, carbon content, fossil 0, wet mass 1 kg, water content 0.842, dry mass 0.542888 kg, carbon allocation 0.190353 kg

## By-products
- electricity, for reuse in municipal waste incineration only: 0 kWh; CPC 17100: Electrical energy; By-product classification allocatable product; pedigree (1,1,1,1,1)
  Net electricity generated from this waste and used in internal MSWI plant energy redistribution.
  Uncertainty: uncertainty is calculated from uncertainties in waste composition and uncertainties in energy efficiency and the uncertainty in internal energy demand
  production volume 4.31792e6 kWh
  property true value relation 3.6; name E_el_prod_MSWI_true_value_relation
    property to calculate "true value" from
  property price 0.1 EUR2005; name E_el_prod_MSWI_price_EUR2005
    Estimated to be the same price as in case of electricity, medium voltage.
  property exergy 3.6 MJ; name E_el_prod_MSWI_exergy
    This exergy property is based on the exergy content of the product.
  property true value 0.000260833
    allocation property applied in "true value" allocation // value calculated from true value relation
- heat, for reuse in municipal waste incineration only: 0 MJ; CPC 17300: Steam and hot water; By-product classification allocatable product; pedigree (1,1,1,1,1)
  (same comment as for electricity, for reuse in municipal waste incineration only)
  production volume 3.12407e7 MJ
  property exergy 0.1842 MJ; name E_th_prod_MSWI_exergy
    This exergy property is based on the exergy content of the product.
  property price 0.0106 EUR2005; name E_th_prod_MSWI_price_EUR2005
    Average European district heat price from Ecoheatcool and Euroheat 2005-2006, Ecoheat Work package 1: The European heat market. Final report. 10.6 EUR/GJ i s the price of district heat. http://www.solarthermalworld.org/files/Ecoheatcool%20WP1%20Web.pdf?download
  property true value relation 0.1842; name E_th_prod_MSWI_true_value_relation
    property to calculate "true value" from
  property true value 9.65595e-5
    (same comment as for electricity, for reuse in municipal waste incineration only)

## Inputs from technosphere
- ammonium sulfate, as N: 6.79942e-5 kg; source USDA 2015; lognormal variance with pedigree 0.118177, pedigree (2,1,3,1,1)
  Calculated based on literature values or expert estimation: The total amount of nutrient (USDA 2015) multiplied by the country-share of fertiliser type (IFA 2014). See supporting documentation 'WFLDB-Documentation.pdf' chapter 'Fertiliser application' for L3 and L4 data (https://ecoquery.ecoinvent.org/File/Reports).
  Corresponds to 2.18 kg/ha
  properties: wet mass 1 kg, dry mass 1 kg
- triazine-compound, unspecified: 2.62279e-5 kg; source USDA 2015; lognormal variance with pedigree 0.00784984, pedigree (2,2,3,1,1)
  Literature value or expert estimation (USDA 2015).
  properties: wet mass 1 kg, carbon content, fossil 0.475616, dry mass 1 kg
- urea, as N: 0.000342853 kg; source USDA 2015; lognormal variance with pedigree 0.118177, pedigree (2,1,3,1,1)
  Calculated based on literature values or expert estimation: The total amount of nutrient (USDA 2015) multiplied by the country-share of fertiliser type (IFA 2014). See supporting documentation 'WFLDB-Documentation.pdf' chapter 'Fertiliser application' for L3 and L4 data (https://ecoquery.ecoinvent.org/File/Reports).
  Corresponds to 11.0 kg/ha
  properties: wet mass 1 kg, dry mass 1 kg, carbon content, fossil 0.2
- naphtha: 0.000280463 kg; source USDA 2015; lognormal variance with pedigree 0.00784984, pedigree (2,2,3,1,1)
  Literature value or expert estimation (USDA 2015).
  properties: wet mass 1 kg, dry mass 1 kg, carbon content, fossil 0.919743
- phosphate rock, as P2O5, beneficiated, dry: 5.27493e-6 kg; source USDA 2015; lognormal variance with pedigree 0.118177, pedigree (2,1,3,1,1)
  Calculated based on literature values or expert estimation: The total amount of nutrient (USDA 2015) multiplied by the country-share of fertiliser type (IFA 2014). See supporting documentation 'WFLDB-Documentation.pdf' chapter 'Fertiliser application' for L3 and L4 data (https://ecoquery.ecoinvent.org/File/Reports).
  Corresponds to 0.169 kg/ha
  properties: dry mass 1 kg, wet mass 1 kg
- phenoxy-compound: 1.71673e-6 kg; source USDA 2015; lognormal variance with pedigree 0.00784984, pedigree (2,2,3,1,1)
  Literature value or expert estimation (USDA 2015).
  properties: carbon content, fossil 0.532559, dry mass 1 kg, wet mass 1 kg
- potassium chloride, as K2O: 0.00101962 kg; source USDA 2015; lognormal variance with pedigree 0.118177, pedigree (2,1,3,1,1)
  Calculated based on literature values or expert estimation: The total amount of nutrient (USDA 2015) multiplied by the country-share of fertiliser type (IFA 2014). See supporting documentation 'WFLDB-Documentation.pdf' chapter 'Fertiliser application' for L3 and L4 data (https://ecoquery.ecoinvent.org/File/Reports).
  Corresponds to 32.7 kg/ha
  properties: wet mass 1 kg, dry mass 1 kg
- glyphosate: 6.06579e-5 kg; source USDA 2015; lognormal variance with pedigree 0.00784984, pedigree (2,2,3,1,1)
  Literature value or expert estimation (USDA 2015).
  properties: wet mass 1 kg, carbon content, fossil 0.214286, dry mass 1 kg
- potassium fertiliser, as K2O: 0.000329485 kg; source USDA 2015; lognormal variance with pedigree 0.118177, pedigree (2,1,3,1,1)
  Calculated based on literature values or expert estimation: The total amount of nutrient (USDA 2015) multiplied by the country-share of fertiliser type (IFA 2014). See supporting documentation 'WFLDB-Documentation.pdf' chapter 'Fertiliser application' for L3 and L4 data (https://ecoquery.ecoinvent.org/File/Reports).
  Corresponds to 10.6 kg/ha
  properties: wet mass 1 kg, dry mass 1 kg
- kaolin: 2.23175e-5 kg; source USDA 2015; lognormal variance with pedigree 0.00784984, pedigree (2,2,3,1,1)
  Literature value or expert estimation (USDA 2015).
  properties: dry mass 1 kg, wet mass 1 kg
- mowing, by motor mower: 0.000103875 ha; lognormal variance with pedigree 0.118177, pedigree (2,1,3,1,1)
  Proxy: Extrapolated using a modified MEXALCA-approach (Roches et al. 2010; Nemecek et al. 2012). See supporting documentation 'WFLDB-Documentation.pdf' chapter 'Machinery processes' for L1 data (https://ecoquery.ecoinvent.org/File/Reports).
- fruit tree seedling, for planting: 0.000341763 unit; source California Dep. of Food and Agriculture 2014; lognormal variance with pedigree 0.118177, pedigree (2,1,3,1,1)
  Literature value or expert estimation (California Department of Food and Agriculture CDFA 2014). This is the number of trees per ha divided by the lifetime years of the orchard.
  properties: wet mass 1 kg, water content 0.73, carbon content, non-fossil 0.439481, dry mass 0.578035 kg
  note on carbon content, non-fossil: calculation: C-content of components according to ecoinvent report No. 15a. Source of composition: https://ndb.nal.usda.gov/ndb/search/. Unspecific seedling used as proxy.
- potassium sulfate, as K2O: 4.69935e-5 kg; source USDA 2015; lognormal variance with pedigree 0.118177, pedigree (2,1,3,1,1)
  Calculated based on literature values or expert estimation: The total amount of nutrient (USDA 2015) multiplied by the country-share of fertiliser type (IFA 2014). See supporting documentation 'WFLDB-Documentation.pdf' chapter 'Fertiliser application' for L3 and L4 data (https://ecoquery.ecoinvent.org/File/Reports).
  Corresponds to 1.51 kg/ha
  properties: wet mass 1 kg, dry mass 1 kg
- establishing orchard: 0.000341763 unit; source California Dep. of Food and Agriculture 2014; lognormal variance with pedigree 0.118177, pedigree (2,1,3,1,1)
  (same comment as for fruit tree seedling, for planting)
- application of plant protection product, by field sprayer: 0.000186977 ha; lognormal variance with pedigree 0.118664, pedigree (2,2,3,1,1)
  Proxy: Extrapolated using a modified MEXALCA-approach (Roches et al. 2010; Nemecek et al. 2012). See supporting documentation 'WFLDB-Documentation.pdf' chapter 'Machinery processes' for L1 data (https://ecoquery.ecoinvent.org/File/Reports). Field sprayer used as a proxy for pesticide application in orchards.
- planting tree: 0.000341763 unit; source California Dep. of Food and Agriculture 2014; lognormal variance with pedigree 0.118177, pedigree (2,1,3,1,1)
  (same comment as for fruit tree seedling, for planting)
- fertilising, by broadcaster: 0.000124651 ha; lognormal variance with pedigree 0.118177, pedigree (2,1,3,1,1)
  (same comment as for mowing, by motor mower)
- irrigation: 0.138899 m3; lognormal variance with pedigree 0.118177, pedigree (2,1,3,1,1)
  Calculated value: The total amount of water used for irrigation (calculated from evapotranspiration, Pfister et al. 2011) multiplied by the share of irrigation technique (Expert estimate based on US data). See supporting documentation 'WFLDB-Documentation.pdf' chapter 'Water use for irrigation' for L1 data (https://ecoquery.ecoinvent.org/File/Reports).
  properties: water content 9089.91, dry mass 0.11 kg, wet mass 1000 kg
- transport, tractor and trailer, agricultural: 0.0003776 metric ton*km; lognormal variance with pedigree 0.156439, pedigree (4,1,3,1,1)
  On-farm transport: Yield (in tonnes) multiplied by the average distance from field to farm. The distance was obtained by extrapolation (modified MEXALCA approach). See supporting documentation 'WFLDB-Documentation.pdf' chapter 'Machinery processes' (https://ecoquery.ecoinvent.org/File/Reports).
- nitrogen fertiliser, as N: 0.000802153 kg; source USDA 2015; lognormal variance with pedigree 0.118177, pedigree (2,1,3,1,1)
  Calculated based on literature values or expert estimation: The total amount of nutrient (USDA 2015) multiplied by the country-share of fertiliser type (IFA 2014). See supporting documentation 'WFLDB-Documentation.pdf' chapter 'Fertiliser application' for L3 and L4 data (https://ecoquery.ecoinvent.org/File/Reports).
  properties: dry mass 1 kg, wet mass 1 kg
- mulching: 3.19918e-5 ha; lognormal variance with pedigree 0.118177, pedigree (2,1,3,1,1)
  (same comment as for mowing, by motor mower)
- phosphate fertiliser, as P2O5: 0.001182 kg; source USDA 2015; lognormal variance with pedigree 0.118177, pedigree (2,1,3,1,1)
  Calculated based on literature values or expert estimation: The total amount of nutrient (USDA 2015) multiplied by the country-share of fertiliser type (IFA 2014). See supporting documentation 'WFLDB-Documentation.pdf' chapter 'Fertiliser application' for L3 and L4 data (https://ecoquery.ecoinvent.org/File/Reports).
  Corresponds to 9.44 kg/ha
  properties: dry mass 1 kg, wet mass 1 kg
- [sulfonyl]urea-compound: 2.82943e-5 kg; source USDA 2015; lognormal variance with pedigree 0.00784984, pedigree (2,2,3,1,1)
  Literature value or expert estimation (USDA 2015).
  properties: carbon content, fossil 0.540853, wet mass 1 kg, dry mass 1 kg
- waste wood, untreated: -0.04154 kg; lognormal variance with pedigree 0.118177, pedigree (2,1,3,1,1)
  Wood from trees after 1-2 years of sorrage at the field (20% water) per lifetime year (20 years) of the orchard
  production volume 8.88757e7 kg
    Calculated from the reference product amount and production volume
  properties: wet mass 1 kg, carbon content, non-fossil 0.48632, water content 0.25, dry mass 0.8 kg
- [thio]carbamate-compound: 2.47973e-6 kg; source USDA 2015; lognormal variance with pedigree 0.00784984, pedigree (2,2,3,1,1)
  Literature value or expert estimation (USDA 2015).
  properties: dry mass 1 kg, wet mass 1 kg, carbon content, fossil 0.626349
- packaging, for pesticides: 0.000657477 kg; lognormal variance with pedigree 0.0532, pedigree (4,3,3,5,4)
  Total amount of active substance/s of pesticides needed for the production of orange, fresh grade is calculated to be circa 3.29E-04 kg. Pesticide/s used in this dataset is/are: '[sulfonyl]urea-compound', '[thio]carbamate-compound', 'acetamide-anillide-compound, unspecified', 'copper oxide', 'cyclic N-compound', 'dinitroaniline-compound', 'glyphosate', 'kaolin' (This substance can be used also as fertiliser but here it is accounted as pesticide only), 'organophosphorus-compound, unspecified', 'phenoxy-compound', 'triazine-compound, unspecified'. The total amount of active substance/s is doubled in order to account for the packaging of the dilluted product of pesticide/s that is/are applied. Therefore, 6.59E-04 kg of packaging for pesticides is justified with this exchange.
  properties: dry mass 1 kg, price 0.0642 EUR2005, carbon content, fossil 0.85714, wet mass 1 kg
- acetamide-anillide-compound, unspecified: 2.38435e-7 kg; source USDA 2015; lognormal variance with pedigree 0.00784984, pedigree (2,2,3,1,1)
  Literature value or expert estimation (USDA 2015).
  properties: carbon content, fossil 0.659175, dry mass 1 kg, wet mass 1 kg
- copper oxide: 0.000140518 kg; source USDA 2015; lognormal variance with pedigree 0.00784984, pedigree (2,2,3,1,1)
  Literature value or expert estimation (USDA 2015).
  properties: wet mass 1 kg, dry mass 1 kg
- packaging, for fertilisers: 0.0118216 kg; lognormal variance with pedigree 0.0532, pedigree (4,3,3,5,4)
  Total amount of active substance/s of fertilisers needed for the production of 'orange, fresh grade' is calculated to be circa 5.92E-03 kg. Fertiliser/s used in this dataset is/are: 'ammonia, liquid', 'ammonium nitrate, as N', 'ammonium sulfate, as N', 'nitrogen fertiliser, as N', 'phosphate fertiliser, as P2O5', 'phosphate rock, as P2O5, beneficiated, dry', 'potassium chloride, as K2O', 'potassium fertiliser, as K2O', 'potassium sulfate, as K2O', 'urea, as N'. The total amount of active substance/s is doubled in order to account for the packaging of the dilluted product of fertiliser/s that is/are applied. Therefore, 1.18E-02 kg of packaging for fertilisers is justified with this exchange.
  properties: dry mass 1 kg, carbon content, fossil 0.825301, wet mass 1 kg, price 0.0642 EUR2005
  note on carbon content, fossil: Considering a chemical formula (C2H4)n for polyethylene, carbon content-fossil is calculated to be 0.856286 kg of Carbon per kg of dry mass.
- cyclic N-compound: 5.97678e-6 kg; source USDA 2015; lognormal variance with pedigree 0.00784984, pedigree (2,2,3,1,1)
  Literature value or expert estimation (USDA 2015).
  properties: wet mass 1 kg, dry mass 1 kg, carbon content, fossil 0.641962
- land use change, perennial crop: 1.25275e-6 ha; = 1.25554375664e-06*LUC_crop_specific+0.0*(1-LUC_crop_specific)
  Calculated value. Land use change (LUC) combines land transformation areas calculated with the adapted 'Direct Land Use Change Assessment Tool' version 2014 developed by Blonk Consultants and the carbon losses from soil organic carbon (SOC) and vegetation (VEG) as calculated in ecoinvent v3. See 'WFLDB-Guidelines.pdf', available at https://ecoquery.ecoinvent.org/File/Reports.
- ammonia, liquid: 0.00202642 kg; source USDA 2015; lognormal variance with pedigree 0.118177, pedigree (2,1,3,1,1)
  Calculated based on literature values or expert estimation: The total amount of nutrient (USDA 2015) multiplied by the country-share of fertiliser type (IFA 2014). See supporting documentation 'WFLDB-Documentation.pdf' chapter 'Fertiliser application' for L3 and L4 data (https://ecoquery.ecoinvent.org/File/Reports).
  Corresponds to 65.0 kg/ha
  properties: wet mass 1 kg, dry mass 1 kg
- dinitroaniline-compound: 1.59911e-5 kg; source USDA 2015; lognormal variance with pedigree 0.00784984, pedigree (2,2,3,1,1)
  Literature value or expert estimation (USDA 2015).
  properties: wet mass 1 kg, dry mass 1 kg, carbon content, fossil 0.55516
- ammonium nitrate, as N: 8.79945e-5 kg; source USDA 2015; lognormal variance with pedigree 0.118177, pedigree (2,1,3,1,1)
  Calculated based on literature values or expert estimation: The total amount of nutrient (USDA 2015) multiplied by the country-share of fertiliser type (IFA 2014). See supporting documentation 'WFLDB-Documentation.pdf' chapter 'Fertiliser application' for L3 and L4 data (https://ecoquery.ecoinvent.org/File/Reports).
  Corresponds to 2.82 kg/ha
  properties: wet mass 1 kg, dry mass 1 kg
- organophosphorus-compound, unspecified: 2.43204e-5 kg; source USDA 2015; lognormal variance with pedigree 0.00784984, pedigree (2,2,3,1,1)
  Literature value or expert estimation (USDA 2015).
  properties: carbon content, fossil 0.260898, wet mass 1 kg, dry mass 1 kg

## Inputs from nature
- Carbon dioxide, in air [natural resource, in air]: 0.222001 kg; lognormal variance with pedigree 0.00784984, pedigree (2,2,3,1,1)
  Calculated value: CO2 uptake by biomass. Dry matter content = 16%
- Energy, gross calorific value, in biomass [natural resource, biotic]: 2.54488 MJ; lognormal variance with pedigree 0.00784984, pedigree (2,2,3,1,1)
  Calculated value: dry matter content = 16%
- Occupation, permanent crop, irrigated [natural resource, land]: 0.31247 m2*year; lognormal variance with pedigree 0.0140616, pedigree (2,1,3,1,1)
  Related to the duration from harvest date of previous crop to harvest date of main crop.
- Transformation, from permanent crop, irrigated [natural resource, land]: 0.0155814 m2; lognormal variance with pedigree 0.0382144, pedigree (2,1,3,1,1)
  10000 m2 divided by the life time of the perennial crop (20 years).
- Transformation, to permanent crop, irrigated [natural resource, land]: 0.0155814 m2; lognormal variance with pedigree 0.0382144, pedigree (2,1,3,1,1)
  10000 m2 divided by the life time of the perennial crop (20 years).

## Emissions to nature
- Nitrogen oxides [air, non-urban air or from high stacks]: 0.000117094 kg; source EEA 2013; lognormal variance with pedigree 0.118664, pedigree (2,2,3,1,1)
  Calculated value - EEA/EMEP (2013). See 'WFLDB-Guidelines.pdf', available at https://ecoquery.ecoinvent.org/File/Reports.
- Mercury [water, ground-]: 2.74613e-11 kg; source Freiermuth R.  2006; lognormal variance with pedigree 0.350938, pedigree (2,2,3,1,1)
  Calculated value - Freiermuth (2006). See 'WFLDB-Guidelines.pdf', available at https://ecoquery.ecoinvent.org/File/Reports.
- Dinitrogen monoxide [air, non-urban air or from high stacks]: 6.7736e-5 kg; source IPCC 2006; lognormal variance with pedigree 0.118664, pedigree (2,2,3,1,1)
  Calculated value - IPCC (2006). See 'WFLDB-Guidelines.pdf', available at https://ecoquery.ecoinvent.org/File/Reports.
- Nickel, ion [water, ground-]: 1.47029e-12 kg; source Freiermuth R.  2006; lognormal variance with pedigree 0.350938, pedigree (2,2,3,1,1)
  (same comment as for Mercury)
- 2,4-D [soil, agricultural]: 1.71677e-6 kg; lognormal variance with pedigree 0.0387216, pedigree (2,2,3,1,1)
  Calculated value - 100% emission in soil. See 'WFLDB-Guidelines.pdf', available at https://ecoquery.ecoinvent.org/File/Reports.
- Water [air, non-urban air or from high stacks]: 0.112507 m3; lognormal variance with pedigree 0.118177, pedigree (2,1,3,1,1)
  Calculated value - Emission calculated from water balance. See 'WFLDB-Guidelines.pdf', available at https://ecoquery.ecoinvent.org/File/Reports.
- Zinc, ion [water, ground-]: 3.67472e-7 kg; source Freiermuth R.  2006; lognormal variance with pedigree 0.350938, pedigree (2,2,3,1,1)
  (same comment as for Mercury)
- Diuron [soil, agricultural]: 2.54911e-5 kg; lognormal variance with pedigree 0.0387216, pedigree (2,2,3,1,1)
  (same comment as for 2,4-D)
- Phosphate [water, surface water]: 2.62204e-5 kg; source Prasuhn V.  2006; lognormal variance with pedigree 0.169866, pedigree (2,2,3,1,1)
  Calculated value - Prasuhn (2006). See 'WFLDB-Guidelines.pdf', available at https://ecoquery.ecoinvent.org/File/Reports.
- Water [water, surface water]: 0.0211125 m3; lognormal variance with pedigree 0.118177, pedigree (2,1,3,1,1)
  (same comment as for Water)
- Glyphosate [soil, agricultural]: 6.06575e-5 kg; lognormal variance with pedigree 0.0387216, pedigree (2,2,3,1,1)
  (same comment as for 2,4-D)
- Phosphorus [water, surface water]: 6.64578e-7 kg; source Prasuhn V.  2006; lognormal variance with pedigree 0.169866, pedigree (2,2,3,1,1)
  Calculated value - Prasuhn (2006) and SQCB-Erosion. See 'WFLDB-Guidelines.pdf', available at https://ecoquery.ecoinvent.org/File/Reports.
- Water [water, ground-]: 0.00527805 m3; lognormal variance with pedigree 0.118177, pedigree (2,1,3,1,1)
  (same comment as for Water)
- Oryzalin [soil, agricultural]: 2.02558e-6 kg; lognormal variance with pedigree 0.0387216, pedigree (2,2,3,1,1)
  (same comment as for 2,4-D)
- Nitrate [water, ground-]: 0.00323969 kg; source Faist Emmenegger M. 2009; lognormal variance with pedigree 0.169866, pedigree (2,2,3,1,1)
- Cadmium [soil, agricultural]: 6.21614e-8 kg; = 7.83434318196e-08 + ( - 1.6043180461e-08)*heavyMetalUptakeSwitch; source Freiermuth R.  2006
  Comment on mathematicalRelation:
  7.83434318196e-08 from Calculated value - Freiermuth (2006). See 'WFLDB-Guidelines.pdf', available at https://ecoquery.ecoinvent.org/File/Reports.
  -1.6043180461e-08 from Crop, default, heavy metals uptake model
  Heavy metal uptake can be excluded by setting the parameter heavyMetalUptakeSwitch to zero.
- Chromium [soil, agricultural]: 2.82708e-7 kg; = 3.69448435255e-07 + ( - 8.61092510463e-08)*heavyMetalUptakeSwitch; source Freiermuth R.  2006
  Comment on mathematicalRelation:
  -8.61092510463e-08 from Crop, default, heavy metals uptake model
  Heavy metal uptake can be excluded by setting the parameter heavyMetalUptakeSwitch to zero.
- Oxyfluorfen [soil, agricultural]: 6.85579e-7 kg; lognormal variance with pedigree 0.0387216, pedigree (2,2,3,1,1)
  (same comment as for 2,4-D)
- Copper [soil, agricultural]: 0.000144043 kg; = 0.000145411955775 + ( - 1.04704109314e-06)*heavyMetalUptakeSwitch; source Freiermuth R.  2006
  Comment on mathematicalRelation:
  0.000145411955775 from Calculated value - Freiermuth (2006). See 'WFLDB-Guidelines.pdf', available at https://ecoquery.ecoinvent.org/File/Reports.
  -1.04704109314e-06 from Crop, default, heavy metals uptake model
  Heavy metal uptake can be excluded by setting the parameter heavyMetalUptakeSwitch to zero.
- Lead [soil, agricultural]: 1.07061e-8 kg; = 9.61709038666e-08 + ( - 8.54409168593e-08)*heavyMetalUptakeSwitch; source Freiermuth R.  2006
  Comment on mathematicalRelation:
  9.61709038666e-08 from Calculated value - Freiermuth (2006). See 'WFLDB-Guidelines.pdf', available at https://ecoquery.ecoinvent.org/File/Reports.
  -8.54409168593e-08 from Crop, default, heavy metals uptake model
  Heavy metal uptake can be excluded by setting the parameter heavyMetalUptakeSwitch to zero.
- Mercury [soil, agricultural]: -4.57628e-9 kg; = 1.82128802549e-09 + ( - 6.40779226685e-09)*heavyMetalUptakeSwitch; source Freiermuth R.  2006
  Comment on mathematicalRelation:
  1.82128802549e-09 from Calculated value - Freiermuth (2006). See 'WFLDB-Guidelines.pdf', available at https://ecoquery.ecoinvent.org/File/Reports.
  -6.40779226685e-09 from Crop, default, heavy metals uptake model
  Heavy metal uptake can be excluded by setting the parameter heavyMetalUptakeSwitch to zero.
- Cadmium, ion [water, surface water]: 2.39907e-10 kg; source Freiermuth R.  2006; lognormal variance with pedigree 0.350938, pedigree (2,2,3,1,1)
  (same comment as for Mercury)
- Nickel [soil, agricultural]: 1.87811e-8 kg; = 1.83868448997e-07 + ( - 1.65045364482e-07)*heavyMetalUptakeSwitch; source Freiermuth R.  2006
  Comment on mathematicalRelation:
  1.83868448997e-07 from Calculated value - Freiermuth (2006). See 'WFLDB-Guidelines.pdf', available at https://ecoquery.ecoinvent.org/File/Reports.
  -1.65045364482e-07 from Crop, default, heavy metals uptake model
  Heavy metal uptake can be excluded by setting the parameter heavyMetalUptakeSwitch to zero.
- Zinc [soil, agricultural]: -3.87802e-6 kg; = 1.17290274221e-06 + ( - 5.05958999313e-06)*heavyMetalUptakeSwitch; source Freiermuth R.  2006
  Comment on mathematicalRelation:
  1.17290274221e-06 from Calculated value - Freiermuth (2006). See 'WFLDB-Guidelines.pdf', available at https://ecoquery.ecoinvent.org/File/Reports.
  -5.05958999313e-06 from Crop, default, heavy metals uptake model
  Heavy metal uptake can be excluded by setting the parameter heavyMetalUptakeSwitch to zero.
- Simazine [soil, agricultural]: 2.57096e-5 kg; lognormal variance with pedigree 0.0387216, pedigree (2,2,3,1,1)
  (same comment as for 2,4-D)
- Metalaxyl-M [soil, agricultural]: 2.33718e-7 kg; lognormal variance with pedigree 0.0387216, pedigree (2,2,3,1,1)
  (same comment as for 2,4-D)
- Buprofezin [soil, agricultural]: 2.05671e-6 kg; lognormal variance with pedigree 0.0387216, pedigree (2,2,3,1,1)
  (same comment as for 2,4-D)
- Mineral oil [soil, agricultural]: 0.000280464 kg; lognormal variance with pedigree 0.0387216, pedigree (2,2,3,1,1)
  (same comment as for 2,4-D)
- Phosphate [water, ground-]: 5.74549e-6 kg; source Prasuhn V.  2006; lognormal variance with pedigree 0.169866, pedigree (2,2,3,1,1)
  (same comment as for Phosphate)
- Chlorpyrifos methyl [soil, agricultural]: 2.08794e-5 kg; lognormal variance with pedigree 0.0387216, pedigree (2,2,3,1,1)
  (same comment as for 2,4-D)
- Lead [water, surface water]: 3.70401e-9 kg; source Freiermuth R.  2006; lognormal variance with pedigree 0.350938, pedigree (2,2,3,1,1)
  (same comment as for Mercury)
- Chromium, ion [water, surface water]: 2.41147e-8 kg; source Freiermuth R.  2006; lognormal variance with pedigree 0.350938, pedigree (2,2,3,1,1)
  (same comment as for Mercury)
- Dimethoate [soil, agricultural]: 1.71397e-6 kg; lognormal variance with pedigree 0.0387216, pedigree (2,2,3,1,1)
  (same comment as for 2,4-D)
- Mercury [water, surface water]: 4.18454e-11 kg; source Freiermuth R.  2006; lognormal variance with pedigree 0.350938, pedigree (2,2,3,1,1)
  (same comment as for Mercury)
- Imidacloprid [soil, agricultural]: 3.80191e-6 kg; lognormal variance with pedigree 0.0387216, pedigree (2,2,3,1,1)
  (same comment as for 2,4-D)
- Nickel, ion [water, surface water]: 1.32109e-8 kg; source Freiermuth R.  2006; lognormal variance with pedigree 0.350938, pedigree (2,2,3,1,1)
  (same comment as for Mercury)
- Methiocarb [soil, agricultural]: 2.43067e-6 kg; lognormal variance with pedigree 0.0387216, pedigree (2,2,3,1,1)
  (same comment as for 2,4-D)
- Zinc, ion [water, surface water]: 2.54226e-8 kg; source Freiermuth R.  2006; lognormal variance with pedigree 0.350938, pedigree (2,2,3,1,1)
  (same comment as for Mercury)
- Spinosad [soil, agricultural]: 1.41793e-6 kg; lognormal variance with pedigree 0.0387216, pedigree (2,2,3,1,1)
  (same comment as for 2,4-D)
- Cadmium, ion [water, ground-]: 1.22635e-9 kg; source Freiermuth R.  2006; lognormal variance with pedigree 0.350938, pedigree (2,2,3,1,1)
  (same comment as for Mercury)
- Copper, ion [water, surface water]: 3.89878e-8 kg; source Freiermuth R.  2006; lognormal variance with pedigree 0.350938, pedigree (2,2,3,1,1)
  (same comment as for Mercury)
- Kaolin [soil, agricultural]: 2.23172e-5 kg; lognormal variance with pedigree 0.0387216, pedigree (2,2,3,1,1)
  (same comment as for 2,4-D)
- Chromium, ion [water, ground-]: 5.93963e-7 kg; source Freiermuth R.  2006; lognormal variance with pedigree 0.350938, pedigree (2,2,3,1,1)
  (same comment as for Mercury)
- Carbon dioxide, fossil [air, non-urban air or from high stacks]: 0.000807429 kg; lognormal variance with pedigree 0.00784984, pedigree (2,2,3,1,1)
  Calculated value - CO2 emissions from urea and lime. See 'WFLDB-Guidelines.pdf', available at https://ecoquery.ecoinvent.org/File/Reports.
- Copper, ion [water, ground-]: 1.12432e-7 kg; source Freiermuth R.  2006; lognormal variance with pedigree 0.350938, pedigree (2,2,3,1,1)
  (same comment as for Mercury)
- Pendimethalin [soil, agricultural]: 1.36495e-5 kg; lognormal variance with pedigree 0.0387216, pedigree (2,2,3,1,1)
  (same comment as for 2,4-D)
- Ammonia [air, non-urban air or from high stacks]: 0.000214603 kg; source EEA 2013; lognormal variance with pedigree 0.0387216, pedigree (2,2,3,1,1)
  Calculated value - EMEP/EEA (2013). See 'WFLDB-Guidelines.pdf', available at https://ecoquery.ecoinvent.org/File/Reports.
- Lead [water, ground-]: 2.80263e-9 kg; source Freiermuth R.  2006; lognormal variance with pedigree 0.350938, pedigree (2,2,3,1,1)
  (same comment as for Mercury)

## Sampling procedure
WFLDB Methodological Guidelines for the Life Cycle Inventory of Agricultural Products in the latest version, available at: https://ecoquery.ecoinvent.org/File/Reports. Data sources: Data were categorised from level 0 (L0) to level (L4) as follows: L0 = estimate, proxy; L1 = statistical data (e.g. FAOSTAT); L2 = L1 adapted to crop and country; L3 = literature data or L1 resp. L2 data approved by experts; medium detailing (i.e. kg of total N-fertiliser); L4 = L3 data of high detailing (i.e. portion N-fertiliser types).In this dataset data were obtained for yield: L3; Fertilisers: L4; Pesticides: L1; Machinery: L0; Irrigation: L2. For information regarding the calculation of individual exchanges see supporting documentation WFLDB-Documentation.pdf

## Review by Assumpció ANTON 2016-05-30
Be aware that the use of statistics in input calculations could provide some specific inputs not common for specific crops, this should be corrected if better information is available and better reflexed in DQR . Currently, I would dissent for some of good marks provided, being a revision of criteria applied advisable.

Pesticides will need to be amended periodically checking for update of pesticides' ban.
