# electric parts production, mini CHP plant

Dataset: EcoSpold 2, unit process
Geography: RoW
Time period: 1997-01-01 to 2019-12-31
Technology level: current
Classification: ISIC rev.4 ecoinvent: 2710:Manufacture of electric motors, generators, transformers and electricity di
Classification: EcoSpold01Categories: natural gas/cogeneration
Tags: ConvertedDataset
Scenario: Business-as-Usual
System model: Allocation at the point of substitution
Generated by: Thomas Heck
Published in: Heck, T. 2007
Database: ecoinvent
isCopyrightProtected: true
accessRestrictedTo: 1

## General comment
Inventory based on information from manufacturer (Ecopower 1997; Ecopower 2001). (Life time for operation assumed 100'000 h.)
[This dataset was already contained in the ecoinvent database version 2. It was not individually updated during the transfer to ecoinvent version 3. Life Cycle Impact Assessment results may still have changed, as they are affected by changes in the supply chain, i.e. in other datasets. This dataset was generated following the ecoinvent quality guidelines for version 2. It may have been subject to central changes described in the ecoinvent version 3 change report (http://www.ecoinvent.org/database/ecoinvent-version-3/reports-of-changes/), and the results of the central updates were reviewed extensively. The changes added e.g. consistent water flows and other information throughout the database. The documentation of this dataset can be found in the ecoinvent reports of version 2, which are still available via the ecoinvent website. The change report linked above covers all central changes that were made during the conversion process.]

## Included activities end
The module includes the most important materials used for production. It includes also the transport of these materials and the energy and water needed for production.

## Geography
Could be used for central European conditions.

## Technology
Specific manufacturer (Ecopower in Switzerland)

## Parameters
- fraction, process water, to air: 0.15 dimensionless; name fraction_PW_to_air; lognormal variance with pedigree 0.092025, pedigree (4,4,3,2,4)

## Reference product
- electric parts, mini CHP plant: 1 unit; CPC 461: Electric motors, generators and transformers, and parts thereof; By-product classification allocatable product
  EcoSpold01Location=CH
  production volume 3.96633 unit
    This is a placeholder value that does not reflect real-world production volumes. This dataset does not currently require a real-world production volume to work in the database framework, and no actual data were collected yet. This has no negative effect on the results of the ecoinvent database.
  property price 146 EUR2005
    Partly calculated by 2.0 - 2003 data from EU27 I/O database-68 Electronic machinery (4.02 EURO2003/kg DS); 36.1 kg (calculated from sum of metal inputs in dataset of electric parts production for mini CHP plant production in ecoinvent)
  property true value 146
    allocation property applied in "true value" allocation // value calculated from revenue

## By-products
- heat, for reuse in municipal waste incineration only: 0 MJ; CPC 17300: Steam and hot water; By-product classification allocatable product; pedigree (1,1,1,1,1)
  Net electricity generated from this waste and used in internal MSWI plant energy redistribution.
  Uncertainty: uncertainty is calculated from uncertainties in waste composition and uncertainties in energy efficiency and the uncertainty in internal energy demand
  production volume 0.0155066 MJ
  property exergy 0.1842 MJ; name E_th_prod_MSWI_exergy
    This exergy property is based on the exergy content of the product.
  property price 0.0106 EUR2005; name E_th_prod_MSWI_price_EUR2005
    Average European district heat price from Ecoheatcool and Euroheat 2005-2006, Ecoheat Work package 1: The European heat market. Final report. 10.6 EUR/GJ i s the price of district heat. http://www.solarthermalworld.org/files/Ecoheatcool%20WP1%20Web.pdf?download
  property true value relation 0.1842; name E_th_prod_MSWI_true_value_relation
    property to calculate "true value" from
  property true value 1.82518e-5
    allocation property applied in "true value" allocation // value calculated from true value relation
- electricity, for reuse in municipal waste incineration only: 0 kWh; CPC 17100: Electrical energy; By-product classification allocatable product; pedigree (1,1,1,1,1)
  (same comment as for heat, for reuse in municipal waste incineration only)
  production volume 0.00214977 kWh
  property true value relation 3.6; name E_el_prod_MSWI_true_value_relation
    property to calculate "true value" from
  property price 0.1 EUR2005; name E_el_prod_MSWI_price_EUR2005
    Estimated to be the same price as in case of electricity, medium voltage.
  property exergy 3.6 MJ; name E_el_prod_MSWI_exergy
    This exergy property is based on the exergy content of the product.
  property true value 4.95388e-5
    (same comment as for heat, for reuse in municipal waste incineration only)

## Inputs from technosphere
- aluminium, wrought alloy: 0.03 kg; lognormal variance with pedigree 0.188, pedigree (4,5,5,5,1)
  EcoSpold01Location=RER
  Basic uncertainty:2
  properties: dry mass 1 kg, wet mass 1 kg
- electricity, medium voltage: 0 kWh; pedigree (1,1,1,1,1)
  EcoSpold01Location=UCTE
- copper: 1.74 kg; lognormal variance with pedigree 0.188, pedigree (4,5,5,5,1)
  Basic uncertainty:2
  EcoSpold01Location=RER
  properties: dry mass 1 kg, wet mass 1 kg
- polyethylene, low density, granulate: 12.7 kg; lognormal variance with pedigree 0.188, pedigree (4,5,5,5,1)
  EcoSpold01Location=RER
  Basic uncertainty:2
  properties: carbon content, fossil 0.857143, wet mass 1 kg, dry mass 1 kg
  note on carbon content, fossil: Polyethylene is formed out of a huge amount of ethylene monomers (C2H4) (ecoinvent v2.2 report 11_II). MW=28 g/mol
- polyvinylchloride, suspension polymerised: 8.19996 kg; lognormal variance with pedigree 0.188, pedigree (4,5,5,5,1)
  Basic uncertainty:2
  EcoSpold01Location=RER
  properties: carbon content, fossil 0.387097, dry mass 1 kg, wet mass 1 kg
  note on carbon content, fossil: Monomer is vynyl chloride, C2H3Cl (ecoinvent v2.2 report 11_II). MW=62 g/mol
- wastewater from pig iron production: 0 m3; pedigree (1,1,1,1,1)
  rough estimate, uncertainty refers to amount of water only; not quantified here: composition of waste water unkown, therefore high uncertainty of applicability of modul.
  EcoSpold01Location=CH
  production volume 0 m3
    Calculated from the production volume of electric parts, mini CHP plant in proportion to the respective output amounts.
  properties: water content 2962.17, carbon content, fossil 1.2149e-5, dry mass 0.337476 kg, wet mass 1000 kg
  note on carbon content, fossil: TOC = 0.0000041 kg/m3 (Tab A.19, ecoinvent v2.2 report 13_I). TOC was considered as Total Carbon.
- platinum: 0.0005 kg; lognormal variance with pedigree 0.188, pedigree (4,5,5,5,1)
  Basic uncertainty:2
  EcoSpold01Location=RER
  properties: wet mass 1 kg, dry mass 1 kg
- heat, district or industrial, other than natural gas: 0 MJ; pedigree (1,1,1,1,1)
  EcoSpold01Location=CH
- nickel, 99.5%: 0.06 kg; lognormal variance with pedigree 0.188, pedigree (4,5,5,5,1)
  Basic uncertainty:2
  EcoSpold01Location=GLO
  properties: wet mass 1 kg, dry mass 1 kg
- lead: 0.13 kg; lognormal variance with pedigree 0.188, pedigree (4,5,5,5,1)
  Basic uncertainty:2
  EcoSpold01Location=RER
  properties: dry mass 1 kg, wet mass 1 kg
- zinc: 0.04 kg; lognormal variance with pedigree 0.188, pedigree (4,5,5,5,1)
  Basic uncertainty:2
  EcoSpold01Location=RER
  properties: dry mass 1 kg, wet mass 1 kg
- heat, district or industrial, natural gas: 0 MJ; pedigree (1,1,1,1,1)
  EcoSpold01Location=RER
- reinforcing steel: 34.1 kg; lognormal variance with pedigree 0.188, pedigree (4,5,5,5,1)
  Basic uncertainty:2
  EcoSpold01Location=RER
  properties: dry mass 1 kg, carbon content, fossil 0.004, wet mass 1 kg
- polyvinylchloride, emulsion polymerised: 1.2 kg; lognormal variance with pedigree 0.188, pedigree (4,5,5,5,1)
  EcoSpold01Location=RER
  Basic uncertainty:2
  properties: carbon content, fossil 0.387097, wet mass 1 kg, dry mass 1 kg
- electricity, medium voltage: 2.33968, 0.425723, 9.82691, 33.4454, 7.21961, 104.677, 14.9812, 49.0846 kWh (8 entries); lognormal variance with pedigree 0.1246, pedigree (3,3,5,5,4)
  EcoSpold01Location=UCTE
- wastewater from pig iron production: -0.00504288, -0.0382571 m3 (2 entries); lognormal variance with pedigree 0.342, pedigree (1,1,5,5,1)
  (same comment as for wastewater from pig iron production)
  production volume 0.1299 m3
- heat, district or industrial, other than natural gas: 0.509969, 30.4362, 1137.55 MJ (3 entries); lognormal variance with pedigree 0.1246, pedigree (3,3,5,5,4)
  EcoSpold01Location=CH
- heat, district or industrial, natural gas: 14.5479, 331.484, 822.467 MJ (3 entries); lognormal variance with pedigree 0.1246, pedigree (3,3,5,5,4)
  EcoSpold01Location=RER

## Inputs from nature
- Water, unspecified natural origin [natural resource, in water]: 0.0541 m3; name water_UNO_input; lognormal variance with pedigree 0.342, pedigree (1,1,5,5,1)
  rough estimate

## Emissions to nature
- Water [air, unspecified]: 0.008115 m3; name water_to_air_unspecified; lognormal variance with pedigree 0.0827, pedigree (2,2,5,5,1)
  Calculated value based on literature values and expert opinion. See comments in the parametres' comment field.
  property fraction, origin: fresh water 0; name fraction_origin_fresh_water
  property fraction, origin: salt water 0; name fraction_origin_salt_water
  property fraction, origin: unspecified 1; name fraction_origin_unspecified
- Water [water, unspecified]: 0.002685 m3; name water_to_water_unspecified; lognormal variance with pedigree 0.0827, pedigree (2,2,5,5,1)
  (same comment as for Water)
  property fraction, origin: fresh water 0; name fraction_origin_fresh_water_Ww
  property fraction, origin: unspecified 1; name fraction_origin_unspecified_Ww
  property fraction, origin: salt water 0; name fraction_origin_salt_water_Ww
  property carbon content, fossil 0; name C_content_fossil
  property water in wet mass 1000 kg; name WWM
  property dry mass 0 kg; name DM
  property wet mass 1000 kg; name WM
  property carbon content, non-fossil 0; name C_content_non_fossil

## Sampling procedure
Operator and manufacturer information

## Extrapolations
none This dataset has been copied from an original dataset covering the geography CH. The uncertainty has been adjusted accordingly.

## Review by Gerald Rebitzer (obsolete) 2003-08-27
had passed
