# anaerobic digestion plant construction, for biowaste

Dataset: EcoSpold 2, unit process
Geography: CH
Time period: 2000-01-01 to 2019-12-31
Technology level: current
Classification: ISIC rev.4 ecoinvent: 4290:Construction of other civil engineering projects
Classification: EcoSpold01Categories: biomass/fuels
Tags: ConvertedDataset
Scenario: Business-as-Usual
System model: Allocation at the point of substitution
Share of production covered: 100 %
Generated by: Michael Spielmann (obsolete)
Published in: Jungbluth N. 2007
Database: ecoinvent
isCopyrightProtected: true
accessRestrictedTo: 1

## General comment
This dataset refers to a multioutput process and represents the production of one reference product, which is anaerobic digestion plant for biowaste, and four co-products/wastes: waste reinforced concrete, waste polyvinylchloride, waste polystyrene, and waste asphalt. Infrastructure expenditures are recorded for a plant with a yearly capacity of 10'000t and a lifetime of 25 years. For stationary machines a lifetime of 10 years is assumed. As a first approximation, the machines are taken into account as cast iron.
[This dataset was already contained in the ecoinvent database version 2. It was not individually updated during the transfer to ecoinvent version 3. Life Cycle Impact Assessment results may still have changed, as they are affected by changes in the supply chain, i.e. in other datasets. This dataset was generated following the ecoinvent quality guidelines for version 2. It may have been subject to central changes described in the ecoinvent version 3 change report (http://www.ecoinvent.org/database/ecoinvent-version-3/reports-of-changes/), and the results of the central updates were reviewed extensively. The changes added e.g. consistent water flows and other information throughout the database. The documentation of this dataset can be found in the ecoinvent reports of version 2, which are still available via the ecoinvent website. The change report linked above covers all central changes that were made during the conversion process.]

## Included activities start
From the land transformation/occupation and the reception of the construction materials (aluminium, bitumen, cast iron, copper, concrete, gravel, polystyrene, polyvinylchloride, sand, and steel) at the construction place.

## Included activities end
This activity ends with an anaerobic digestion plant constructed. The dataset includes the infrastructure for the pre-treatment process, digestion of bio-waste and the succsesive treatment of the fermented material (de-watering and post composting).

## Geography
Data represents a Swiss plant.

## Technology
Thermophile, single stage digestion with post composting.

## Time period
Data is obtained from a recent LCA study.

## Reference product
- anaerobic digestion plant, for biowaste: 1 unit; CPC 53290: Other civil engineering works; By-product classification allocatable product
  Thermophile, single stage digestion with post composting.
  EcoSpold01Location=CH
  production volume 0.0336675 unit
    This is a placeholder value that does not reflect real-world production volumes. This dataset does not currently require a real-world production volume to work in the database framework, and no actual data were collected yet. This has no negative effect on the results of the ecoinvent database. The placeholder value of this activity was scaled according to the nominal GDP of 2005 (source: United Nations, http://data.un.org/Glossary.aspx?q=GDP+%28current+US%24%29, accessed 20130726) to reflect an appropriate share of the global production volume, which is also a placeholder value.
  property price 1.23987e7 EUR2005
    Convert from EU 27 price to the world by currency exchange rate.
  property true value 1.23987e7
    allocation property applied in "true value" allocation // value calculated from revenue

## By-products
- electricity, for reuse in municipal waste incineration only: 0 kWh; CPC 17100: Electrical energy; By-product classification allocatable product; pedigree (1,1,1,1,1)
  Net electricity generated from this waste and used in internal MSWI plant energy redistribution.
  Uncertainty: uncertainty is calculated from uncertainties in waste composition and uncertainties in energy efficiency and the uncertainty in internal energy demand
  production volume 7783.29 kWh
  property true value relation 3.6; name E_el_prod_MSWI_true_value_relation
    property to calculate "true value" from
  property exergy 3.6 MJ; name E_el_prod_MSWI_exergy
    This exergy property is based on the exergy content of the product.
  property price 0.1 EUR2005; name E_el_prod_MSWI_price_EUR2005
    Estimated to be the same price as in case of electricity, medium voltage.
  property true value 1003.91
    allocation property applied in "true value" allocation // value calculated from true value relation
- heat, for reuse in municipal waste incineration only: 0 MJ; CPC 17300: Steam and hot water; By-product classification allocatable product; pedigree (1,1,1,1,1)
  Net useful heat generated from this waste and used in internal MSWI plant energy redistribution.
  Uncertainty: uncertainty is calculated from uncertainties in waste composition and uncertainties in energy efficiency and the uncertainty in internal energy demand
  production volume 56388.2 MJ
  property true value relation 0.1842; name E_th_prod_MSWI_true_value_relation
    property to calculate "true value" from
  property exergy 0.1842 MJ; name E_th_prod_MSWI_exergy
    This exergy property is based on the exergy content of the product.
  property price 0.0106 EUR2005; name E_th_prod_MSWI_price_EUR2005
    Average European district heat price from Ecoheatcool and Euroheat 2005-2006, Ecoheat Work package 1: The European heat market. Final report. 10.6 EUR/GJ i s the price of district heat. http://www.solarthermalworld.org/files/Ecoheatcool%20WP1%20Web.pdf?download
  property true value 372.138
    (same comment as for electricity, for reuse in municipal waste incineration only)
- zinc concentrate: 0 kg; CPC 14290: Other non-ferrous metal ores and concentrates (other than uranium or thorium ores and concentrates); By-product classification allocatable product
  Calculated value from the knowledge of the properties of both products.
  production volume 15.0848 kg
  property price 0.38 EUR2005; name ByP_price_EUR2005
    Temporary price data. Calculated as 90% of purchasers price based on: Zinc content in concentrate 53%. Concentrate price per kg Zn 86.5% of refined Zn price (13.5% treatment charges according to CHR Metals Limited 2005: Dynamic cost curves. http://www.minecost.com/dynamic.pdf). 2004 zinc price from USGS (2007) Mineral commodity summaries 2007. <http://minerals.usgs.gov/minerals/pubs/mcs/2007/mcs2007.pdf> [Accessed 25 May 2010]
  property zinc content 0.53; name zinc_C_zinc_concentrate
    Zinc content on a dry matter basis. Value taken from teh "zinc mine operation" /GLO dataset.
  property dry mass 1 kg; name DM_zinc_concentrate
  property carbon content 0
    carbon content on a dry matter basis (reserved; not for manual entry)
  property true value 5.73222
    allocation property applied in "true value" allocation // value calculated from revenue
  properties: wet mass 1 kg, water content 0, carbon content, non-fossil 0, carbon content, fossil 0, water in wet mass 0 kg, carbon allocation 0 kg
- iron scrap, sorted, pressed: 0 kg; By-product classification Recyclable; CPC 39310: Slag, dross, scalings and other waste from the manufacture of iron or steel; pedigree (1,1,1,1,1)
  Iron scrap recovered from this waste.
  Uncertainty: uncertainty calculated from uncertainty in waste composition, uncertainty of share of recyclable metal, uncertainty of transfer coefficient to bottom ash, uncertainty of the efficiency of scrap removal in MSWI plant.
  production volume 1322.93 kg
  property price 0.175 EUR2005
    Temporary price data. Calculated as 90% of purchasers price based on: 2005 import and export prices (total trades (USD) divided by total weight (kg) in biggest economies of the world: EU27, USA, Brasil, China, India, Japan and Russia) from UN Commodity Trade Statistics Database (http://data.un.org/Explorer.aspxDatabase [Accessed 2011.06.20]). Commodity: Waste or scrap, of cast iron
  property carbon content 0
    carbon content on a dry matter basis (reserved; not for manual entry)
  property true value 231.512
    allocation property applied in "true value" allocation // value calculated from revenue
  properties: wet mass 1 kg, water in wet mass 0 kg, carbon content, non-fossil 0, carbon content, fossil 0, dry mass 1 kg, water content 0, carbon allocation 0 kg

## Inputs from technosphere
All rows: lognormal variance with pedigree 0.054, pedigree (3,4,5,1,1)
- waste polystyrene: -3919.49 kg
  EcoSpold01Location=CH
  Calculated value, based on literature.
  Uncertainty: literature studies
  production volume 3920 kg
    Calculated from the production volume of anaerobic digestion plant, for biowaste in proportion to the respective output amounts.
  properties: water content 0.00200401, carbon content, fossil 0.922579, dry mass 0.998 kg, wet mass 1 kg
- reinforcing steel: 119984 kg; source Schleiss K. 1999
  Literature value, considering that the fermentation tank consists of unalloyed steel (reinforcing steel).
  EcoSpold01Location=RER
  Uncertainty: literature studies
  properties: wet mass 1 kg, dry mass 1 kg, carbon content, fossil 0.004
- cast iron: 187976 kg; source Schleiss K. 1999
  Literature value, considering that stationary machines are accounted for as cast iron.
  EcoSpold01Location=RER
  Uncertainty: literature studies
  properties: wet mass 1 kg, carbon content, fossil 0.04, dry mass 1 kg
  note on carbon content, fossil: Cast iron is made by remelting pig iron in small furnaces (e.g. cupola furnaces or electric arc furnaces) and poured into moulds to make castings. It usually contains 2% to 6% carbon (ecoinvent v2.2 report 10_partII). An average content of 4% was considered
- concrete, normal: 1854.26 m3; source Schleiss K. 1999
  EcoSpold01Location=CH
  Literature value.
  Uncertainty: literature studies
  properties: water content 0.086758, wet mass 2380 kg, dry mass 2190 kg
- aluminium, cast alloy: 319.958 kg; source Schleiss K. 1999
  EcoSpold01Location=RER
  Literature value.
  Uncertainty: literature studies
  properties: wet mass 1 kg, dry mass 1 kg
- copper: 2999.61 kg; source Schleiss K. 1999
  EcoSpold01Location=RER
  Literature value.
  Uncertainty: literature studies
  properties: wet mass 1 kg, dry mass 1 kg
- waste reinforced concrete: -4.07947e6 kg
  Calculated value, based on literature.
  EcoSpold01Location=CH
  Uncertainty: literature studies
  production volume 4.08e6 kg
    (same comment as for waste polystyrene)
  properties: water content 0.00585407, dry mass 0.99418 kg, wet mass 1 kg
- polyvinylchloride, suspension polymerised: 3052.79 kg; source Schleiss K. 1999
  EcoSpold01Location=RER
  Literature value.
  Uncertainty: literature studies
  properties: dry mass 1 kg, carbon content, fossil 0.387097, wet mass 1 kg
  note on carbon content, fossil: Monomer is vynyl chloride, C2H3Cl (ecoinvent v2.2 report 11_II). MW=62 g/mol
- aluminium, wrought alloy: 679.912 kg; source Schleiss K. 1999
  EcoSpold01Location=RER
  Literature value.
  Uncertainty: literature studies
  properties: dry mass 1 kg, wet mass 1 kg
- polystyrene, high impact: 3919.49 kg; source Schleiss K. 1999
  EcoSpold01Location=RER
  Literature value.
  Uncertainty: literature studies
  properties: dry mass 1 kg, carbon content, fossil 0.923077, wet mass 1 kg
  note on carbon content, fossil: Chemical formula of polystyrene is (C8H8)n (ecoinvent v2.2 report 11_II)
- waste asphalt: -117535 kg
  (same comment as for waste reinforced concrete)
  production volume 117550 kg
    (same comment as for waste polystyrene)
  properties: carbon content, fossil 0.0440796, water content 0.001001, wet mass 1 kg, dry mass 0.999 kg
  note on carbon content, fossil: The waste contains 94.7% inert material (see Tab A.5 for details) 5.3% bitumen (see Tab A.6 for details), ecoinvent v2.2 report 13_I
- pitch: 11148.5 kg; source Schleiss K. 1999
  EcoSpold01Location=CH
  Literature value.
  Uncertainty: literature studies
  properties: carbon content, fossil 0.83, wet mass 1 kg, dry mass 1 kg
- polyvinylchloride, emulsion polymerised: 446.752 kg; source Schleiss K. 1999
  Literature value.
  EcoSpold01Location=RER
  Uncertainty: literature studies
  properties: wet mass 1 kg, dry mass 1 kg, carbon content, fossil 0.387097
- waste polyvinylchloride: -3499.54 kg
  (same comment as for waste reinforced concrete)
  production volume 3500 kg
    (same comment as for waste polystyrene)
  properties: wet mass 1 kg, dry mass 0.998 kg, carbon content, fossil 0.440882, water content 0.00200401
  note on carbon content, fossil: C content in 1 kg DM was calculated using data in Tab A.1, ecoinvent v2.2 report 13_I
- gravel, round: 1.97224e6 kg; source Schleiss K. 1999
  EcoSpold01Location=CH
  Literature value.
  Uncertainty: literature studies
  properties: dry mass 1 kg, wet mass 1 kg
- sand: 106386 kg; source Schleiss K. 1999
  EcoSpold01Location=CH
  Literature value.
  Uncertainty: literature studies
  properties: wet mass 1 kg, dry mass 1 kg

## Inputs from nature
- Occupation, construction site [natural resource, land]: 2999.61 m2*year; source KOMPOGAS 2005; lognormal variance with pedigree 0.0926, pedigree (2,4,5,1,1)
  Estimated value, considering a land use of c.a. 5000 m2 for a plant with a capacity of 20’000 tonnes and then assuming for a yearly capacity of 10’000 tonnes biowaste, a land occupation of 3000 m2.
  During the construction time of one year the total area is inventoried as 'construction site'.
  Uncertainty: literature studies
- Transformation, from unspecified [natural resource, land]: 2999.61 m2; source KOMPOGAS 2005; lognormal variance with pedigree 0.1726, pedigree (2,4,5,1,1)
  Estimated value, considering a land use of c.a. 5000 m2 for a plant with a capacity of 20’000 tonnes and then assuming for a yearly capacity of 10’000 tonnes biowaste, a land occupation of 3000 m2.
  For the original land type of biowaste plants no general information is available. Thus, transformation is assumed from unspecified.
  Uncertainty: literature studies
- Transformation, to industrial area [natural resource, land]: 2999.61 m2; source KOMPOGAS 2005; lognormal variance with pedigree 0.1726, pedigree (2,4,5,1,1)
  Estimated value, considering a land use of c.a. 5000 m2 for a plant with a capacity of 20’000 tonnes and then assuming for a yearly capacity of 10’000 tonnes biowaste, a land occupation of 3000 m2.
  The area occupied by the plant is inventoried as “industrial area”.
  Uncertainty: literature studies
- Occupation, industrial area [natural resource, land]: 74990.2 m2*year; source KOMPOGAS 2005; lognormal variance with pedigree 0.0926, pedigree (2,4,5,1,1)
  Estmated value, assuming the plant operation time to be 25 years.
  Uncertainty: literature studies

## Sampling procedure
Literature data

## Review by Emilia Moreno Ruiz 2012-05-31
dataset documented by trainee Marcela Valles Lange

## Review by Niels Jungbluth 2005-12-02
Passed.

## Review by Emilia Moreno Ruiz 2012-05-16
documented dataset by trainee Marcela Valles Lange
