# ethanol production from potatoes

Dataset: EcoSpold 2, unit process
Geography: CH
Time period: 2002-01-01 to 2019-12-31
Technology level: current
Classification: EcoSpold01Categories: biomass/fuels
Classification: ISIC rev.4 ecoinvent: 19a: Liquid and gaseous fuels from biomass
Tags: ConvertedDataset
Scenario: Business-as-Usual
System model: Allocation at the point of substitution
Share of production covered: 0 %
Generated by: Edgard Gnansounou
Published in: Jungbluth N. 2007
Database: ecoinvent
isCopyrightProtected: true
accessRestrictedTo: 1

## General comment
Inventory refers to the production of 1 kg hydrated ethanol 95% (dry basis, i.e. 1.05 kg hydrated ethanol 95% wet basis), respectively 1 kg of DDGS (wet basis) from potatoes. The multioutput-process 'potatoes, in distillery' delivers the co-products 'ethanol, 95% in H2O, from potatoes, at distillery' and 'DDGS, from potatoes, at distillery'. Economic allocation with allocation factor for common stages of 95.6% to ethanol. Allocation is done according to carbon balance for CO2 emissions.
[This dataset was already contained in the ecoinvent database version 2. It was not individually updated during the transfer to ecoinvent version 3. Life Cycle Impact Assessment results may still have changed, as they are affected by changes in the supply chain, i.e. in other datasets. This dataset was generated following the ecoinvent quality guidelines for version 2. It may have been subject to central changes described in the ecoinvent version 3 change report (http://www.ecoinvent.org/database/ecoinvent-version-3/reports-of-changes/), and the results of the central updates were reviewed extensively. The changes added e.g. consistent water flows and other information throughout the database. The documentation of this dataset can be found in the ecoinvent reports of version 2, which are still available via the ecoinvent website. The change report linked above covers all central changes that were made during the conversion process.]

## Included activities end
This dataset includes the transport of potatoes to the distillery, and the processing of potatoes to hydrated ethanol (95%) and DDGS (distiller's dried grains with solubles, 90% dry matter). System boundary is at the distillery. Dehydration to anhydrous ethanol is not included.

## Geography
Data is from the etha+ project (Alcosuisse, CH)

## Technology
The process is similar to that of wheat-to-ethanol or yet dry-milling corn-to-ethanol. The production of DDGS from stillage includes separation of draff, concentration, drying and granulation. DDGS are used as animal feed.

## Time period
Data from 2002 to 2005, current technology for the production of ethanol from starch-based feedstocks, applied to potatoes

## Parameters
- fraction, cooling water, cooling pond system, to air: 0.032; name fraction_CW_CP_to_air; lognormal variance with pedigree 0.0413, pedigree (2,3,1,3,1)
  Calculated based on literature value (Scown, C.D., 2011, Water Footprint of U.S. Transportation Fuels and supplying information of the article) (Vionnet, S., Quantis Water Database - Technical Report, 2012).
- fraction, cooling water, to air: 0.3875; name fraction_CW_to_air; = (0.5*fraction_CW_OT_to_air)+(0.5*fraction_CW_R_to_air); lognormal variance with pedigree 0.092025, pedigree (4,4,3,2,4)
  Calculated value based on literature value (see comments of the other parametres present in this dataset) and expert opinion. In the case when no industry/literature data are available about the type of cooling or directly fraction, cooling water, to air specific for the process a default assumption is applied. It is assumed that the once-through cooling system is used in 50% of all cases and recirculating system is used in another 50% of all cases.
- fraction, cooling water, once-through system, to air: 0.004; name fraction_CW_OT_to_air; lognormal variance with pedigree 0.0413, pedigree (2,3,1,3,1)
  (same comment as for fraction, cooling water, cooling pond system, to air)
- fraction, tap water, to air: 0.47; name fraction_TW_to_air; = fraction_PW_to_air; lognormal variance with pedigree 0.092025, pedigree (4,4,3,2,4)
  Calculated value. See comment in the other parametres present in this dataset. Tap water is considered to be always used as process water, thus process water fractions to air are applied to all tap water input flows to calculate the amount of water consumed in the processes.
- fraction, cooling water, recirculating system, to air: 0.771; name fraction_CW_R_to_air; lognormal variance with pedigree 0.0413, pedigree (2,3,1,3,1)
  (same comment as for fraction, cooling water, cooling pond system, to air)
- fraction, process water, to air: 0.47 dimensionless; name fraction_PW_to_air; lognormal variance with pedigree 0.092025, pedigree (4,4,3,2,4)
  Literature value (Statistics Canada, 2007 & Shaffer, K.H., 2008, Consumptive water use in the Great Lakes Basin, USGS) (Vionnet, S., Quantis Water Database - Technical Report, 2012).

## Reference product
- ethanol, without water, in 95% solution state, from fermentation: 1 kg; CPC 35491: Biodiesel; By-product classification allocatable product; CAS 64-17-5
  production volume 0 kg
    Production volume of ethanol for use as a fuel was 1-1.5 Ml in 2005 in CH
    No production in Switzerland. Source: http://www.biofuels-platform.ch/en/infos/eu-bioethanol.php
  property carbon content, non-fossil 0.521739
    Assumed to be like Distillers Grain Corn with Solubles. Composition data obtained from (http://beefmagazine.com/images/2009%20feed%20table.pdf). First, composition data were refered to 1 kg dry mass. Then, C-contents were calculated considering a C-content/dry mass of 46% in carbohydrates (including fibres), 53% in proteins and 75% in fats. All data from 'Evolutionary and Biochemical Aspects', A.D. Kay and T. Vrede (in Global Ecology, 2010, Elsevier B.V., S.E. Jørgensen Ed.).
    C2H6O
  property price 0.324 EUR2005
    Temporary price data. Calculated as 90% of purchasers price based on: 2005 prices from FAPRI2007, 2009. Agricultural outlook. (http://www.fapri.missouri.edu/outreach/publications/ag_outlook.asp?current_page=outreach; accessed 22/06/10). Unit conversion from US gallon to kg - 1 gallon = 3.7856 liter * 0.789 kg/liter (ethanol density) = 2.9868 kg
  property carbon content 0.521739
    carbon content on a dry matter basis (reserved; not for manual entry)
  property true value 0.022392
    allocation property applied in "true value" allocation // value calculated from revenue
  properties: dry mass 1 kg, water content 0, water in wet mass 0 kg, carbon content, fossil 0, wet mass 1 kg, carbon allocation 0.521739 kg

## By-products
All rows: By-product classification allocatable product
- protein feed, 100% crude: 0 kg; CPC 23319: Preparations used in animal feeding n.e.c.
  Calculated based on crude protein content of DDGS (0.38 kg/kg dry mass).
  property price 0.424 EUR2005; name protein_output_price_EUR2005
    Based on protein content and energy feed, gross content in soybean meal and prices per kg of soybean meal. Assumed soybean meal is the most used feed. Soybean meal 2004 prices for World import/export data (tonnes and US$) from FaoStat statistics (http://faostat.fao.org/site/535/default.aspx#ancor, TRADE)- [Accessed 24 May 2010]. See calculations for protein /energy content
  property carbon content, non-fossil 0.53
    considered pure protein (ecoinvent v2.2 report 17, pg 288). C-content in protein is estimated to be 53% ( from "Evolutionary and Biochemical Aspects", A.D. Kay and T. Vrede (in Global Ecology, 2010, Elsevier B.V., S.E. Jørgensen Ed.).
  property carbon content 0.53
    carbon content on a dry matter basis (reserved; not for manual entry)
  property true value 0.0173929
    allocation property applied in "true value" allocation // value calculated from revenue
  properties: carbon content, fossil 0, water in wet mass 0 kg, wet mass 1 kg, dry mass 1 kg, water content 0, carbon allocation 0.53 kg
- energy feed, gross: 0 MJ; CPC 23319: Preparations used in animal feeding n.e.c.
  Calculated based on gross energy of DDGS (20.01MJ/kg dry mass). The dry mass of the reference product is 0.9kg/kg.
  property price 0.0108 EUR2005; name energy_output_price_EUR2005
    Based on energy feed, gross content in soybean meal and prices per kg of soybean meal. Assumed soybean meal is the most used feed. Soybean meal 2004 prices for World import/export data (tonnes and US$) from FaoStat statistics (http://faostat.fao.org/site/535/default.aspx#ancor, TRADE)- [Accessed 24 May 2010]. See calculations for protein /energy content
  property carbon content 0
    carbon content on a dry matter basis (reserved; not for manual entry)
  property true value 0.020996
    allocation property applied in "true value" allocation // value calculated from revenue
  properties: wet mass 1 kg, carbon content, fossil 0, dry mass 1 kg, water content 0, water in wet mass 0 kg, carbon content, non-fossil 0, carbon allocation 0 kg
- electricity, for reuse in municipal waste incineration only: 0 kWh; CPC 17100: Electrical energy; pedigree (1,1,1,1,1)
  Net electricity generated from this waste and used in internal MSWI plant energy redistribution.
  Uncertainty: uncertainty is calculated from uncertainties in waste composition and uncertainties in energy efficiency and the uncertainty in internal energy demand
  property exergy 3.6 MJ; name E_el_prod_MSWI_exergy
    This exergy property is based on the exergy content of the product.
  property true value relation 3.6; name E_el_prod_MSWI_true_value_relation
    property to calculate "true value" from
  property price 0.1 EUR2005; name E_el_prod_MSWI_price_EUR2005
    Estimated to be the same price as in case of electricity, medium voltage.
  property true value 2.4322e-6
    allocation property applied in "true value" allocation // value calculated from true value relation
- heat, for reuse in municipal waste incineration only: 0 MJ; CPC 17300: Steam and hot water; pedigree (1,1,1,1,1)
  Net useful heat generated from this waste and used in internal MSWI plant energy redistribution.
  Uncertainty: uncertainty is calculated from uncertainties in waste composition and uncertainties in energy efficiency and the uncertainty in internal energy demand
  property true value relation 0.1842; name E_th_prod_MSWI_true_value_relation
    property to calculate "true value" from
  property exergy 0.1842 MJ; name E_th_prod_MSWI_exergy
    This exergy property is based on the exergy content of the product.
  property price 0.0106 EUR2005; name E_th_prod_MSWI_price_EUR2005
    Average European district heat price from Ecoheatcool and Euroheat 2005-2006, Ecoheat Work package 1: The European heat market. Final report. 10.6 EUR/GJ i s the price of district heat. http://www.solarthermalworld.org/files/Ecoheatcool%20WP1%20Web.pdf?download
  property true value 8.80449e-7
    (same comment as for electricity, for reuse in municipal waste incineration only)
- zinc concentrate: 0 kg; CPC 14290: Other non-ferrous metal ores and concentrates (other than uranium or thorium ores and concentrates)
  Calculated value from the knowledge of the properties of both products.
  property price 0.38 EUR2005; name ByP_price_EUR2005
    Temporary price data. Calculated as 90% of purchasers price based on: Zinc content in concentrate 53%. Concentrate price per kg Zn 86.5% of refined Zn price (13.5% treatment charges according to CHR Metals Limited 2005: Dynamic cost curves. http://www.minecost.com/dynamic.pdf). 2004 zinc price from USGS (2007) Mineral commodity summaries 2007. <http://minerals.usgs.gov/minerals/pubs/mcs/2007/mcs2007.pdf> [Accessed 25 May 2010]
  property zinc content 0.53; name zinc_C_zinc_concentrate
    Zinc content on a dry matter basis. Value taken from teh "zinc mine operation" /GLO dataset.
  property dry mass 1 kg; name DM_zinc_concentrate
  property carbon content 0
    carbon content on a dry matter basis (reserved; not for manual entry)
  property true value 1.27324e-9
    allocation property applied in "true value" allocation // value calculated from revenue
  properties: wet mass 1 kg, water content 0, carbon content, non-fossil 0, carbon content, fossil 0, water in wet mass 0 kg, carbon allocation 0 kg

## Inputs from technosphere
- sulfuric acid: 0.00693104 kg; lognormal variance with pedigree 0.0501, pedigree (1,2,5,1,1)
  Etha+ project Alcosuisse, industrial data
  Etha+ project Alcosuisse, industrial data
  properties: wet mass 1 kg, dry mass 1 kg
- nitrogen fertiliser, as N: 0.00419988 kg; lognormal variance with pedigree 0.0501, pedigree (1,2,5,1,1)
  Etha+ project Alcosuisse, industrial data
  Etha+ project Alcosuisse, industrial data
  properties: dry mass 1 kg, wet mass 1 kg
- ammonium sulfate, as N: 0.00419988 kg; lognormal variance with pedigree 0.0501, pedigree (1,2,5,1,1)
  Etha+ project Alcosuisse, industrial data
  Etha+ project Alcosuisse, industrial data
  properties: dry mass 1 kg, wet mass 1 kg
- potato, Swiss integrated production: 5.33034 kg; lognormal variance with pedigree 0.0501, pedigree (1,2,5,1,1)
  Etha+ project Alcosuisse, industrial data
  Etha+ project Alcosuisse, industrial data
  properties: dry mass 0.22 kg, carbon content, non-fossil 0.4282, wet mass 1 kg, water content 3.54545
  note on carbon content, non-fossil: Assumed to be like Distillers Grain Corn with Solubles. Composition data obtained from (http://beefmagazine.com/images/2009%20feed%20table.pdf). First, composition data were refered to 1 kg dry mass. Then, C-contents were calculated considering a C-content/dry mass of 46% in carbohydrates (including fibres), 53% in proteins and 75% in fats. All data from 'Evolutionary and Biochemical Aspects', A.D. Kay and T. Vrede (in Global Ecology, 2010, Elsevier B.V., S.E. Jørgensen Ed.). Composition data obtained from Potatoes, raw, skin, in (http://www.nal.usda.gov/fnic/foodcomp/search/). First, composition data were refered to 1 kg dry mass. Then, C-contents were calculated considering a C-content/dry mass of 46% in carbohydrates (including fibres), 53% in proteins and 75% in fats. All data from 'Evolutionary and Biochemical Aspects', A.D. Kay and T. Vrede (in Global Ecology, 2010, Elsevier B.V., S.E. Jørgensen Ed.).
- transport, tractor and trailer, agricultural: 0.0533034 metric ton*km; lognormal variance with pedigree 0.1701, pedigree (1,2,5,1,1)
  Etha+ project Alcosuisse, industrial data
  Etha+ project Alcosuisse, industrial data
- heat, district or industrial, natural gas: 6.94655 MJ; lognormal variance with pedigree 0.0501, pedigree (1,2,5,1,1)
  Etha+ project Alcosuisse, industrial data
  Etha+ project Alcosuisse, industrial data
- tap water: 0.394536 kg; name tap_water_input; lognormal variance with pedigree 0.0501, pedigree (1,2,5,1,1)
  Etha+ project Alcosuisse, industrial data
  Etha+ project Alcosuisse, industrial data
  properties: water content 2962.17, carbon content, fossil 0.00178991, wet mass 1 kg, dry mass 0.000337476 kg
  note on carbon content, fossil: Bicarbonate content is 2.93 mol/m3. CO2 content is 0.1 mol/m3 (ecoinvent v2.2 report 8, Tab 93.1).
- ethanol fermentation plant: 1.88854e-10 unit; lognormal variance with pedigree 0.3501, pedigree (1,2,5,1,1)
  Etha+ project Alcosuisse, industrial data
  This exchange has an activity link directly to the producing activity because the product is primarily consumed in the same geographical area where it is produced.
- Distiller's Dried Grains with Solubles: -0.57541 kg
  production volume 0 kg
    Production volume of ethanol for use as a fuel was 1-1.5 Ml in 2005 in CH
    Calculated from the production volume of ethanol, without water, in 95% solution state, from fermentation in proportion to the respective output amounts.
  properties: wet mass 1 kg, dry mass 0.9 kg, water content 0.111111, carbon content, non-fossil 0.4885, price 0.00365 EUR2005
  note on carbon content, non-fossil: Assumed to be like Distillers Grain Corn with Solubles. Composition data obtained from (http://beefmagazine.com/images/2009%20feed%20table.pdf). First, composition data were refered to 1 kg dry mass. Then, C-contents were calculated considering a C-content/dry mass of 46% in carbohydrates (including fibres), 53% in proteins and 75% in fats. All data from 'Evolutionary and Biochemical Aspects', A.D. Kay and T. Vrede (in Global Ecology, 2010, Elsevier B.V., S.E. Jørgensen Ed.).
- wastewater, from residence: -0.00415537 m3; name wastewater_output; lognormal variance with pedigree 0.0501, pedigree (1,2,5,1,1)
  Etha+ project Alcosuisse, industrial data
  Etha+ project Alcosuisse, industrial data
  production volume 0 m3
    Calculated from the production volume of ethanol, without water, in 95% solution state, from fermentation in proportion to the respective output amounts.
  property price 0 EUR2005; name wastewater_output_price_EUR2005
  properties: carbon content, non-fossil 0.199421, water content 2962.17, dry mass 0.337476 kg, wet mass 1000 kg
  note on carbon content, non-fossil: Assumed to be like Distillers Grain Corn with Solubles. Composition data obtained from (http://beefmagazine.com/images/2009%20feed%20table.pdf). First, composition data were refered to 1 kg dry mass. Then, C-contents were calculated considering a C-content/dry mass of 46% in carbohydrates (including fibres), 53% in proteins and 75% in fats. All data from 'Evolutionary and Biochemical Aspects', A.D. Kay and T. Vrede (in Global Ecology, 2010, Elsevier B.V., S.E. Jørgensen Ed.). 0.0673 kg TOC/m3 (Tab A.17, ecoinvent v2.2 report 13_I). TOC was considered as Total Carbon.
- electricity, medium voltage: 0.209759 kWh; lognormal variance with pedigree 0.0501, pedigree (1,2,5,1,1)
  Etha+ project Alcosuisse, industrial data
  Etha+ project Alcosuisse, industrial data
- soda ash, light, crystalline, heptahydrate: 0.0160443 kg; lognormal variance with pedigree 0.0501, pedigree (1,2,5,1,1)
  Etha+ project Alcosuisse, industrial data
  Etha+ project Alcosuisse, industrial data
  properties: wet mass 1 kg, carbon content, fossil 0.0517241, dry mass 1 kg

## Inputs from nature
- Water, cooling, unspecified natural origin [natural resource, in water]: 6.1036e-5 m3; name water_cooling_UNO_input; lognormal variance with pedigree 1.21, pedigree (5,5,5,5,5)
  property dry mass 0.1101 kg; name DM
  property wet mass 1000 kg; name WM
  property water content 9081.65; name water_content
  property carbon content, non-fossil 0; name C_content_non_fossil
  property water in wet mass 999.89 kg; name WWM
  property carbon content, fossil 0.0104329; name C_content_fossil
- Carbon dioxide, in air [natural resource, in air]: 0.649981 kg; lognormal variance with pedigree 0.04, pedigree (1,1,5,1,1)
  Calculation, to close carbon balance

## Emissions to nature
- Water [air, unspecified]: 0.000209083 m3; name water_to_air_unspecified; = (tap_water_input/1000*fraction_TW_to_air)+(water_cooling_UNO_input*fraction_CW_to_air); lognormal variance with pedigree 0.0807, pedigree (2,2,5,1,1)
  Calculated value based on literature values and expert opinion. See comments in the parametres' comment field.
  property fraction, origin: salt water 0; name fraction_origin_salt_water
  property fraction, origin: unspecified 0.11312; name fraction_origin_unspecified
  property fraction, origin: fresh water 0.88688; name fraction_origin_fresh_water
- Carbon dioxide, non-fossil [air, urban air close to ground]: 1.17033 kg; lognormal variance with pedigree 0.04, pedigree (1,1,5,1,1)
  Calculation, to close carbon balance

## Sampling procedure
Data is from the etha+ project (Alcosuisse, CH), technology by French ethanol plant supplier, modelling by ENERS (CH)

## Review by Emilia Moreno Ruiz 2012-03-19
name change from 'Distiller's Dried Grains with Solubles, from potatoes' to 'Distiller's Dried Grains with Solubles'

## Review by Niels Jungbluth 2006-08-15
Passed.
none
