# concrete production, 30MPa, ready-mix, with cement limestone 6-10%

Dataset: EcoSpold 2, unit process
Geography: BR
Time period: 2015-10-25 to 2019-10-25
Technology level: current
Classification: EcoSpold01Categories: construction materials/concrete
Classification: ISIC rev.4 ecoinvent: 2395:Manufacture of articles of concrete, cement and plaster
Synonyms: ready-mix concrete; ready mixed concrete
Scenario: Business-as-Usual
System model: Allocation at the point of substitution
Share of production covered: 10 %
Generated by: Marcella Ruschi Mendes Saade
Published in: Silva, F. B. 2017
Database: ecoinvent
isCopyrightProtected: true
accessRestrictedTo: 1

## General comment
This dataset represents the production of ready-mixed concrete in Brazil, with 30 MPa compressive strength at 28 days and a slump of 100mm, with 'cement limestone 6-10%' (CP-II-F). Ingredients (for 1 m³): Cement 295 kg, Water 185 kg, Sand 483 kg, Artificial sand + gravel 1389 kg, Polifunctional admixture 2,018 kg. Superplasticizer admixture 0,283 kg.

30 MPa concrete is intended for building structures in general, not exposed to freeze-thaw, including residential, commercial and industrial uses. Ready mix concrete production consists on mixing cement, aggregates, admixtures and water in a predefined proportion, using an automatic dosing central. The proportioned mix is discharged in the concrete delivery truck. In accordance with national standard NBR 7212, when necessary (e.g. great transport distance or road traffic), it is possible to partially mix concrete at the dosing central and store the remaining water in a reservoir within the truck for consistency adjustment at the construction site. In that case, such addition must happen immediately before final mixing and unloading of premix concrete, and a rigorous control system must be established to document the amount of water added at the dosing central and at the construction site, to preserve the water cement ratio predicted for the mix. The concrete mix (cement, SCM, aggregate, water, admixtures) is an average of 19 mix designs, provided by 19 concrete making plants located in the South, Southeast, Northeast and Center-west regions of Brazil.
The dataset represents the production of fresh concrete and includes the water to be added at the construction site for consistency adjustment. Exchange properties are declared for the fresh concrete. Concrete dry mass considers the amount of water that reacts with cement to form hydrates. As a consequence, this dataset is not water balanced according to ecoinvent guidelines.
The waste generated in production has been accounted for, and the amount of additional inputs was proportionately split up between concrete ingredients.

Annual production volume of Ready-Mix concrete for Brazil estimated based on a report published by the Brazilian Association for Portland Cement (ABCP) in 2013 and cement consumption data for 2016, also by ABCP.
Distribution by ready-mix strength class:
- 25/30 MPa = 84%
- 35/40 MPa = 11%
The remaining 4% are associated to the strength class 20 MPa, not modelled here due to its inexpressive consumption.

Reference: "Panorama e Tendências Técnico-Mercadológicas do Setor de Concreto. São Paulo, ABCP, 2013".

## Included activities start
From reception of raw materials at the ready-mix plant gate.

## Included activities end
This activity ends before the delivery of concrete at the construction site.
The dataset includes the whole manufacturing processes to produce ready-mixed concrete, internal processes (material handling and mixing) and infrastructure. Water used for cleaning the truck and waste water were also accounted for.

## Geography
Brazilian data. For some exchanges GLO values have been used as proxy. Data quality indicators adjusted accordingly.

## Technology
Typical technology for average Brazilian production.

## Time period
Literature data are from 2015 and mix designs were provided in 2017

## Parameters
- losses: 0.038 dimensionless; lognormal variance with pedigree 0, pedigree (1,1,1,1,1)
  Literature value. Losses due to returned concrete from construction sites.

## Reference product
- concrete, 30MPa: 1 m3; name ref; By-product classification allocatable product
  30MPa concrete is intended for building structures in general, not exposed to freeze-thaw, including residential, commercial and industrial uses.
  production volume 1.84522e6 m3; name PV
    Production volume and proportion per strength class derived from a report published by the Brazilian Association for Portland cement in 2013. Production volumes adjusted to 2016 based on more recent data for cement consumption from ABCP. Proportion per type of cement derived from expert estimation on cement consumption in Brazil (see Brazilian cement datasets).
  property price 185 EUR2005; name ref_price_EUR2005
    Calculated value based on data from United Nations Commodity Trade Statistics Database (comtrade.un.org). UN comtrade category: 681019 Tiles & flagstones of cement, concrete, artificial ston. Year 2005. Using exchange rate of 1EURO = 1.209 USD. Average of price of import into 5 main markets (EU, US, JP, IN and CN).
  property gravel content 1389 kg; name gravel
  property cement content 295 kg; name cement
  property wet mass 2354 kg; name concrete_density
  property sand content 483 kg; name sand
  property true value 185; name ref_true_value
    allocation property applied in "true value" allocation // value calculated from revenue
  properties: dry mass 2237 kg, water content 0.052302, water in wet mass 117 kg

## By-products
- electricity, for reuse in municipal waste incineration only: 0 kWh; CPC 17100: Electrical energy; By-product classification allocatable product; pedigree (1,1,1,1,1)
  Net electricity generated from this waste and used in internal MSWI plant energy redistribution.
  Uncertainty: uncertainty is calculated from uncertainties in waste composition and uncertainties in energy efficiency and the uncertainty in internal energy demand
  production volume 59807.5 kWh
  property true value relation 3.6; name E_el_prod_MSWI_true_value_relation
    property to calculate "true value" from
  property exergy 3.6 MJ; name E_el_prod_MSWI_exergy
    This exergy property is based on the exergy content of the product.
  property price 0.1 EUR2005; name E_el_prod_MSWI_price_EUR2005
    Estimated to be the same price as in case of electricity, medium voltage.
  property true value 0.00416325
    allocation property applied in "true value" allocation // value calculated from true value relation
- heat, for reuse in municipal waste incineration only: 0 MJ; CPC 17300: Steam and hot water; By-product classification allocatable product; pedigree (1,1,1,1,1)
  (same comment as for electricity, for reuse in municipal waste incineration only)
  production volume 422401 MJ
  property exergy 0.1842 MJ; name E_th_prod_MSWI_exergy
    This exergy property is based on the exergy content of the product.
  property true value relation 0.1842; name E_th_prod_MSWI_true_value_relation
    property to calculate "true value" from
  property price 0.0106 EUR2005; name E_th_prod_MSWI_price_EUR2005
    Average European district heat price from Ecoheatcool and Euroheat 2005-2006, Ecoheat Work package 1: The European heat market. Final report. 10.6 EUR/GJ i s the price of district heat. http://www.solarthermalworld.org/files/Ecoheatcool%20WP1%20Web.pdf?download
  property true value 0.00150449
    (same comment as for electricity, for reuse in municipal waste incineration only)

## Inputs from technosphere
- concrete mixing factory: 4.56986e-7 unit; source Kellenberger D. 2007; lognormal variance with pedigree 0.3326, pedigree (2,5,3,5,1)
  Literature value. From ecoinvent dataset "concrete production, 30-32 MPa, RNA only, GLO, 2006-2006" Access date 10.10.2017
  EcoSpold01Location=CH
  Uncertainty: Basic uncertainty from original dataset, completeness score adjusted.
- gravel, crushed: 1441.74 kg; = gravel * (1+losses); lognormal variance with pedigree 0.0164, pedigree (2,3,2,1,1)
  Calculated value = amount of artificial sand (crushed gravel is used as a proxy in this case) + amount of gravel, Weighted average from 19 concrete mix designs. Losses considered.
  Uncertainty: Variance of logtransformed data calculated based on the sample's coefficient of variation.
  properties: dry mass 1 kg, wet mass 1 kg
- steel, low-alloyed, hot rolled: 0.0237993 kg; name steel; source Kellenberger D. 2007; lognormal variance with pedigree 0.0226, pedigree (2,5,3,5,1)
  Literature value. From ecoinvent dataset "concrete production, 30-32 MPa, RNA only, GLO, 2006-2006l". Access date: 10.10.2017.
  EcoSpold01Location=RER
  Uncertainty: Basic uncertainty from original dataset, completeness score adjusted.
  properties: dry mass 1 kg, wet mass 1 kg
- synthetic rubber: 0.0344989 kg; name rub; lognormal variance with pedigree 0.7214, pedigree (2,3,2,1,1)
  Calculated value. Weighted average amount from 34 concrete plants.
  EcoSpold01Location=RER
  Uncertainty: Variance of logtransformed data calculated based on the sample's coefficient of variation.
  properties: dry mass 1 kg, wet mass 1 kg
- diesel, burned in building machine: 5.00985 MJ; source Alessandra Castro 2015; lognormal variance with pedigree 0.0034, pedigree (2,4,2,1,1)
  Literature value. Diesel used in internal transportation equipment.
  Uncertainty: Value for variance extrapolated from table 10.3 of ecoinvent data quality guidelines
  property density 0.84 kg/l; name density_diesel
  property net heating value 42.8 MJ/kg; name NHV_diesel
- lubricating oil: 0.0498985 kg; name lub_oil; lognormal variance with pedigree 0.2974, pedigree (2,3,2,1,1)
  EcoSpold01Location=RER
  Calculated value. Weighted average amount from 34 concrete plants.
  Uncertainty: Variance of logtransformed data calculated based on the sample's coefficient of variation.
  properties: wet mass 1 kg, dry mass 1 kg
- scrap steel: -0.0237993 kg; = (steel)*-1; lognormal variance with pedigree 0.0226, pedigree (2,5,3,5,1)
  Literature value. From ecoinvent dataset "concrete production, 30-32 MPa, RNA only, GLO, 2006-2006l". Access date: 10.10.2017.
  Uncertainty: Basic uncertainty from original dataset, completeness score adjusted.
  production volume 43916.1 kg; = Ref('b3a22a85-c798-440f-b626-09d2790ff499', 'ProductionVolume') * ((Ref('ac75917d-e687-48c7-91e6-ee6503f3e817')*-1) / Ref('b3a22a85-c798-440f-b626-09d2790ff499'))
    Calculated from production volume of reference product using the relative outputs.
  properties: dry mass 1 kg, wet mass 1 kg
- chemical, organic: 2.38733 kg; = 2,3 * (1+losses); lognormal variance with pedigree 0.1134, pedigree (2,3,2,1,1)
  Calculated value= amount of superplasticizer + amount of polyfunctional admixture. Weighted average from 19 concrete mix designs. Losses considered.
  Uncertainty: Variance of logtransformed data calculated based on the sample's coefficient of variation.
  properties: bulk density 1140 kg/m3, wet mass 1 kg, dry mass 1 kg
- tap water: 192.024 kg; = 185*(1+losses); lognormal variance with pedigree 0.0044, pedigree (2,3,2,1,1)
  EcoSpold01Location=CH
  Calculated value. Water for concrete mix. Includes water from aggregates. Weighted average from 19 concrete mix designs. Losses considered.
  Uncertainty: Variance of logtransformed data calculated based on the sample's coefficient of variation.
  properties: wet mass 1 kg
- waste rubber, unspecified: -0.0344989 kg; = (rub)*-1; lognormal variance with pedigree 0.7214, pedigree (2,3,2,1,1)
  Calculated value.
  Uncertainty: Variance of logtransformed data calculated based on the sample's coefficient of variation.
  production volume 63659.9 kg; = Ref('b3a22a85-c798-440f-b626-09d2790ff499', 'ProductionVolume') * ((Ref('753eed0f-52b9-421d-b7ba-e24b8d6a4ef3')*-1) / Ref('b3a22a85-c798-440f-b626-09d2790ff499'))
    Calculated from production volume of reference product using the relative outputs.
  properties: dry mass 1 kg, carbon content, fossil 0.853, wet mass 1 kg
- wastewater from concrete production: -0.160995 m3; = (was_water)*-1; lognormal variance with pedigree 0.3684, pedigree (2,3,2,1,1)
  EcoSpold01Location=CH
  Calculated value. Based on weighted average amount from 26 concrete plants, referring to water used for washing the concrete trucks and the internal circulation area in the ready-mix facility.
  Uncertainty: Variance of logtransformed data calculated based on the sample's coefficient of variation.
  production volume 297080 m3; = Ref('b3a22a85-c798-440f-b626-09d2790ff499', 'ProductionVolume') * ((Ref('7fc0dc14-c134-4d55-8adc-7ee862882816')*-1) / Ref('b3a22a85-c798-440f-b626-09d2790ff499'))
    Calculated from production volume of reference product using the relative outputs.
  properties: water content 2225.48, dry mass 0.44914 kg, wet mass 1000 kg, carbon content, fossil 0.027074
- cement, limestone 6-10%: 306.201 kg; = cement*(1+losses); lognormal variance with pedigree 0.0114, pedigree (2,3,2,1,1)
  Calculated value, Weighted average from 19 concrete mix designs. Losses considered.
  Uncertainty: Variance of logtransformed data calculated based on the sample's coefficient of variation.
  properties: dry mass 1 kg, wet mass 1 kg
- electricity, medium voltage: 2.98991 kWh; lognormal variance with pedigree 0.2354, pedigree (2,3,2,1,1)
  Calculated value, Weighted average amount from 29 concrete plants.
  EcoSpold01Location=CH
  Uncertainty: Variance of logtransformed data calculated based on the sample's coefficient of variation.
- waste mineral oil: -0.0498985 kg; = (lub_oil)*-1; lognormal variance with pedigree 0.2974, pedigree (2,3,2,1,1)
  (same comment as for waste rubber, unspecified)
  production volume 92076.2 kg; = Ref('b3a22a85-c798-440f-b626-09d2790ff499', 'ProductionVolume') * ((Ref('0da2d6e3-1d75-4d92-95e1-6a5978c7357e')*-1) / Ref('b3a22a85-c798-440f-b626-09d2790ff499'))
    Calculated from production volume of reference product using the relative outputs.
  properties: carbon content, fossil 0.864444, dry mass 0.9 kg, wet mass 1 kg, water content 0.111111
  note on carbon content, fossil: Tab A.6, ecoinvent v2.2 report 13_I. C content has been calculated after data in the tables, and then referred to 1 kg DM
- sand: 501.339 kg; = sand*(1+losses); lognormal variance with pedigree 0.1104, pedigree (2,3,2,1,1)
  (same comment as for cement, limestone 6-10%)
  properties: dry mass 1 kg, wet mass 1 kg
- waste concrete: -89.4493 kg; name was_concrete; = (concrete_density * losses)*-1; source Alessandra Castro 2015; lognormal variance with pedigree 0.0034, pedigree (2,4,2,1,1)
  Literature value.
  Uncertainty: Value for variance extrapolated from table 10.3 of ecoinvent data quality guidelines
  production volume 1.65058e8 kg; = Ref('b3a22a85-c798-440f-b626-09d2790ff499', 'ProductionVolume') * (was_concrete / Ref('b3a22a85-c798-440f-b626-09d2790ff499'))
    Calculated from production volume of reference product using the relative outputs.
  property price 0 EUR2005; name was_concrete_price_EUR2005
  properties: wet mass 1 kg, dry mass 0.9501 kg, water content 0.0525208

## Inputs from nature
- Water, unspecified natural origin [natural resource, in water]: 0.160995 m3; name was_water; lognormal variance with pedigree 0.3684, pedigree (2,3,2,1,1)
  Calculated value. Weighted average amount from 26 concrete plants. Water used for washing the concrete trucks and the internal circulation area in the ready-mix facility.
  Uncertainty: Variance of logtransformed data calculated based on the sample's coefficient of variation.

## Sampling procedure
Data on concrete mixes are a weighted average of 19 concrete ready mix facilities of 6 different companies.
For other flows, the weighted average was calculated from several different concrete plants (26 for process water, 34 for rubber parts and lubricating oil, 29 for electricity), belonging to one of the 7 concrete making companies that provided data. Basic uncertainty was calculated from the coefficient of variation of the sample.
Diesel consumption and waste generation values were taken from a published paper. For other materials used for maintenance (steel parts) and infrastructure, data were extrapolated from the dataset "concrete production, 30-32 MPa, RNA only, GLO, 2006-2009" (accessed 10.10.2017).
No conversion to the geometric mean of the lognormal distribution was done, for consistency reasons with other ecoinvent datasets.

Representativeness is of 10% based on the number of companies that provided concrete mix data (6) divided by the total number of ready-mix concrete production companies in Brazil (60), which is the number of respondant companies in the national survey carried out by ABCP in 2013.

## Extrapolations
Data from a relatively small sample concentrated mostly in the Southeastern region of Brazil, with some facilities spread out in the South, Northeast and Center-west regions, are used to represent the Brazilian concrete production. Some flows have been kept as in the dataset "concrete production, 30-32 MPa, RNA only, GLO, 2006-2006", but uncertainties were adjusted accordingly.
