# glider production, passenger car

Dataset: EcoSpold 2, unit process
Geography: GLO
Time period: 2000-01-01 to 2019-12-31
Technology level: modern
Classification: ISIC rev.4 ecoinvent: 2910:Manufacture of motor vehicles
Scenario: Business-as-Usual
System model: Allocation at the point of substitution
Generated by: Fabienne Habermacher
Published in: F. Habermacher 2010
Database: ecoinvent
isCopyrightProtected: true
accessRestrictedTo: 1

## General comment
This dataset describes the production of a passenger car glider. The glider includes: the body of the car, the steering, braking and suspension system, tyres, cockpit equipment (seats, belts, etc.) and non propulsion related electronics. Entries are given per kg glider. The data has been derived for a glider of about 800kg, corresponding to a compact size car of approximately 1200 to 1400kg.

## Included activities start
The dataset takes as input the raw materials and the energy inputs required for the production process and includes the production facility.

## Included activities end
The dataset returns the finished glider as well as the output scrap fractions from the production process.

## Technology
The dataset is based on averages over passenger car technologies spanning from 2000 to 2010 which are expected to be representative up to 2015.

## Parameters
- fraction, process water, to air: 0.15 dimensionless; name fraction_PW_to_air; lognormal variance with pedigree 0.092025, pedigree (4,4,3,2,4)
  Literature value. In case when no industry/process specific data are available, default evaporation fraction value is used. This value is 15% and is based on literature (Statistics Canada, 2007 & Shaffer, K.H., 2008, Consumptive water use in the Great Lakes Basin, USGS & Shiklomanov, 2003, World Water Resources at the Beginning of the 21st Century) and has been approved by an expert.
- fraction, tap water, to air: 0.15; name fraction_TW_to_air; = fraction_PW_to_air; lognormal variance with pedigree 0.092025, pedigree (4,4,3,2,4)
  Calculated value. See comment in the other parametres present in this dataset. Tap water is considered to be always used as process water, thus process water fractions to air are applied to all tap water input flows to calculate the amount of water consumed in the processes.

## Reference product
- glider, passenger car: 0 kg; source F. Habermacher 2011; CPC 46960: Parts for the goods of subclasses 46910, 46921 and 46929; electrical parts n.e.c. of machinery or apparatus; By-product classification allocatable product
  Materialization based on average from literature values.
  production volume 4.8e10 kg
    Estimate based on projections of passenger car production for 2012 (http://www.worldometers.info/cars/). Total of 60000000 vehicles for 2012.
  property price 11.1 EUR2005
    Calculated based on literature value (UN Commodity Trade Statistics Database) using data on trade value and net weight (kg) for 5 reference countries/regions (RER, USA, JP, CN and IN) which average is assumed to be a good approximation of the global price. The UN classification; 8703 Motor cars and other motor vehicles principally designed for the transport of persons, including station wagons and racing cars. The same price is used for both diesel, petrol, natural gas and electric passenger car.
  property true value 11.1
    allocation property applied in "true value" allocation // value calculated from revenue
- iron scrap, unsorted: 1 kg; source F. Habermacher 2011; CPC 39310: Slag, dross, scalings and other waste from the manufacture of iron or steel; By-product classification Recyclable; pedigree (1,1,1,1,1)
  Scrap fraction from production process.Details in F. Habermacher "Modeling material inventories and environmental impacts of electric passenger cars", Matser Thesis, Department of Environmental Sciences, ETH Zurich, 2011.
  production volume 4.60986e10 kg; = Ref('a446d2df-7be3-437a-ba54-2ec426de7cc5', 'ProductionVolume') * (Ref('17d6dab1-9efe-4584-9159-4f3b400d4051') / Ref('a446d2df-7be3-437a-ba54-2ec426de7cc5'))
    Calculated from production volume of reference product using the relative outputs.
  property price 0.149 EUR2005
    Temporary price data. Calculated as 90% of purchasers price based on: estimated at 85% of sorted scrap
  property carbon content 0
    carbon content on a dry matter basis (reserved; not for manual entry)
  property true value 0.143098
    allocation property applied in "true value" allocation // value calculated from revenue
  properties: dry mass 1 kg, carbon content, non-fossil 0, carbon content, fossil 0, wet mass 1 kg, water content 0, water in wet mass 0 kg, carbon allocation 0 kg

## By-products
- aluminium oxide, non-metallurgical: 0 kg; source European Aluminium Association 2008; CPC 41432: Alumina (aluminium oxide), except artificial corundum; By-product classification allocatable product; CAS 1344-28-1; pedigree (1,1,1,1,1)
  production volume 2.85796e7 kg
  property carbon content, non-fossil 0; name C_content_non_fossil
  property price 0.28 EUR2005; name Al2O3Amount_price_EUR2005
    From UN trade database. http://data.un.org/ Import data from the largest economies of the world are used (Brazil, India, USA, China, Japan and EU-27).
  property dry mass 1 kg; name DM
  property water content 0; name water_content
  property wet mass 1 kg; name WM
  property water in wet mass 0 kg; name WWM
  property carbon content, fossil 0; name C_content_fossil
  property carbon content 0
    carbon content on a dry matter basis (reserved; not for manual entry)
  property true value 0.000148622
    allocation property applied in "true value" allocation // value calculated from revenue
  properties: carbon allocation 0 kg
- aluminium, cast alloy: 0 kg; source European Aluminium Association 2008; By-product classification allocatable product; CPC 41431: Unwrought aluminium; pedigree (1,1,1,1,1)
  EcoSpold01Location=RER
  production volume 2.67156e8 kg
  property price 1.3 EUR2005; name castAlloyAmount_price_EUR2005
  properties: water in wet mass 0 kg, carbon content, non-fossil 0, water content 0, dry mass 1 kg, carbon content, fossil 0, wet mass 1 kg, carbon content 0, carbon allocation 0 kg, true value 0.00645026
- heat, for reuse in municipal waste incineration only: 0 MJ; CPC 17300: Steam and hot water; By-product classification allocatable product; pedigree (1,1,1,1,1)
  Net electricity generated from this waste and used in internal MSWI plant energy redistribution.
  Uncertainty: uncertainty is calculated from uncertainties in waste composition and uncertainties in energy efficiency and the uncertainty in internal energy demand
  production volume 6.88844e10 MJ
  property exergy 0.1842 MJ; name E_th_prod_MSWI_exergy
    This exergy property is based on the exergy content of the product.
  property true value relation 0.1842; name E_th_prod_MSWI_true_value_relation
    property to calculate "true value" from
  property price 0.0106 EUR2005; name E_th_prod_MSWI_price_EUR2005
    Average European district heat price from Ecoheatcool and Euroheat 2005-2006, Ecoheat Work package 1: The European heat market. Final report. 10.6 EUR/GJ i s the price of district heat. http://www.solarthermalworld.org/files/Ecoheatcool%20WP1%20Web.pdf?download
  property true value 0.0091306
    allocation property applied in "true value" allocation // value calculated from true value relation
- electricity, for reuse in municipal waste incineration only: 0 kWh; CPC 17100: Electrical energy; By-product classification allocatable product; pedigree (1,1,1,1,1)
  (same comment as for heat, for reuse in municipal waste incineration only)
  production volume 9.77764e9 kWh
  property exergy 3.6 MJ; name E_el_prod_MSWI_exergy
    This exergy property is based on the exergy content of the product.
  property true value relation 3.6; name E_el_prod_MSWI_true_value_relation
    property to calculate "true value" from
  property price 0.1 EUR2005; name E_el_prod_MSWI_price_EUR2005
    Estimated to be the same price as in case of electricity, medium voltage.
  property true value 0.0253191
    (same comment as for heat, for reuse in municipal waste incineration only)
- aluminium, wrought alloy: 0 kg; source European Aluminium Association 2008; By-product classification allocatable product; CPC 4153: Semi-finished products of aluminium or aluminium alloys; pedigree (1,1,1,1,1)
  production volume 1.39708e8 kg
  property price 1.44 EUR2005; name secondaryAluminiumOutput_price_EUR2005
  properties: wet mass 1 kg, water content 0, carbon content, fossil 0, water in wet mass 0 kg, carbon content, non-fossil 0, dry mass 1 kg, carbon content 0, carbon allocation 0 kg, true value 0.00352998
- copper: 0 kg; source Rentz O. 1999; By-product classification allocatable product; CPC 41413: Refined copper and copper alloys, unwrought; master alloys of copper
  Literature value. Copper uses: Before end-use copper is manufactured into semi fabricated products, such as shapes and ingots (known as 'semis'). These manufacturing processes are subdivided into hot working, cold working and, if necessary, process annealing. Few of the semis are ready for use as such. They more typically travel to first-stage manufacturers, who make metal rods, wire, and casting, and then to component manufacturers who produce such things as motors, valves, and insulated cables The components in turn are incorporated by final-stage manufacturers into a variety of finished products - automobiles, commercial buildings, residential housing, and so forth. These uses account for about 79% of the world-wide consumption of copper.
  production volume 3.18585e8 kg
  properties: dry mass 1 kg, water in wet mass 0 kg, wet mass 1 kg, carbon content, non-fossil 0, water content 0, price 5.52 EUR2005, carbon content, fossil 0, carbon content 0, carbon allocation 0 kg, true value 0.0366373
- zinc concentrate: 0 kg; CPC 14290: Other non-ferrous metal ores and concentrates (other than uranium or thorium ores and concentrates); By-product classification allocatable product
  Calculated value from the knowledge of the properties of both products.
  production volume 75881.7 kg
  property price 0.38 EUR2005; name ByP_price_EUR2005
    Temporary price data. Calculated as 90% of purchasers price based on: Zinc content in concentrate 53%. Concentrate price per kg Zn 86.5% of refined Zn price (13.5% treatment charges according to CHR Metals Limited 2005: Dynamic cost curves. http://www.minecost.com/dynamic.pdf). 2004 zinc price from USGS (2007) Mineral commodity summaries 2007. <http://minerals.usgs.gov/minerals/pubs/mcs/2007/mcs2007.pdf> [Accessed 25 May 2010]
  property zinc content 0.53; name zinc_C_zinc_concentrate
    Zinc content on a dry matter basis. Value taken from teh "zinc mine operation" /GLO dataset.
  property dry mass 1 kg; name DM_zinc_concentrate
  property carbon content 0
    carbon content on a dry matter basis (reserved; not for manual entry)
  property true value 1.92798e-7
    allocation property applied in "true value" allocation // value calculated from revenue
  properties: wet mass 1 kg, water content 0, carbon content, non-fossil 0, carbon content, fossil 0, water in wet mass 0 kg, carbon allocation 0 kg
- iron scrap, sorted, pressed: 0 kg; By-product classification Recyclable; CPC 39310: Slag, dross, scalings and other waste from the manufacture of iron or steel; pedigree (1,1,1,1,1)
  metallic iron scrap removed from ash reamains and recycled.
  Uncertainty: uncertainty is calculated from uncertainties in waste composition and transfer coefficients to soild residues
  production volume 1.20452e8 kg
  property price 0.175 EUR2005
    Temporary price data. Calculated as 90% of purchasers price based on: 2005 import and export prices (total trades (USD) divided by total weight (kg) in biggest economies of the world: EU27, USA, Brasil, China, India, Japan and Russia) from UN Commodity Trade Statistics Database (http://data.un.org/Explorer.aspxDatabase [Accessed 2011.06.20]). Commodity: Waste or scrap, of cast iron
  property carbon content 0
    carbon content on a dry matter basis (reserved; not for manual entry)
  property true value 0.000439149
    allocation property applied in "true value" allocation // value calculated from revenue
  properties: carbon content, non-fossil 0, wet mass 1 kg, dry mass 1 kg, water content 0, carbon content, fossil 0, water in wet mass 0 kg, carbon allocation 0 kg
- aluminium alloy, AlLi: 0 kg; By-product classification allocatable product; CPC 41431: Unwrought aluminium
  reference flow
  production volume 10002.8 kg
  property price 3.6 EUR2005; name ref_price_EUR2005
    Literature value (http://www.economist.com/news/business/21576714-mining-industry-has-enriched-chile-its-future-precarious-copper-solution). Average price between 20015 and 2013.
  property carbon content 0
    carbon content on a dry matter basis (reserved; not for manual entry)
  property true value 6.61757e-7
    allocation property applied in "true value" allocation // value calculated from revenue
  properties: carbon content, non-fossil 0, carbon content, fossil 0, dry mass 1 kg, wet mass 1 kg, water in wet mass 0 kg, carbon allocation 0 kg
- ground granulated blast furnace slag: 0 kg; By-product classification allocatable product; CPC 37440: Portland cement, aluminous cement, slag cement and similar hydraulic cements, except in the form of clinkers
  Functional unit of LCI by Marceau & VanGeem (2003) was 1 short ton of slag cement (GGBFS) output which was converted to 907.18 kg for the present inventory.
  production volume 1145.55 kg
  property water content 0; name GGBFS_water_content
  property carbon content, non-fossil 0; name GGBFS_C_content_non_fossil
  property water in wet mass 0 kg; name GGBFS_WWM
  property carbon content, fossil 0; name GGBFS_C_content_fossil
    Industry value; Arcelor Mittal, chemical composition of blast furnace slag (http://www.cst.com.br/english/products/co_products/catalog_products/blast_slag/blast_slag.asp, accessed: 20121003).
  property price 0.0615 EUR2005; name GGBFS_price_EUR2005
    2005 import and export prices (total trades (USD) divided by total weight (kg) in China, India, USA, Japan, Russia and Europe, major producers and consumers (http://www.cementchina.net/freport/showfre.asp?id=749) from UN Commodity Trade Statistics Database (http://data.un.org/Explorer.aspxDatabase [Accessed 2 July 2010]). Commodity: Cement (portland, aluminious, slag or hydraulic)
  property carbon content 0
    carbon content on a dry matter basis (reserved; not for manual entry)
  property true value 1.29468e-9
    allocation property applied in "true value" allocation // value calculated from revenue
  properties: wet mass 1 kg, dry mass 1 kg, carbon allocation 0 kg
- granulated blast furnace slag: 0 kg; By-product classification allocatable product
  production volume 4742.43 kg
  property wet mass 1 kg; name GBFS_WM
  property dry mass 1 kg; name GBFS_DM
  property price 0.0615 EUR2005; name GBFS_price_EUR2005
    (same comment as for ground granulated blast furnace slag)
  property water in wet mass 0 kg; name GBFS_WWM
  property carbon content, non-fossil 0; name GBFS_C_content_non_fossil
    biogene carbon content on a dry matter basis
  property carbon content, fossil 0; name GBFS_C_content_fossil
    fossil carbon content on a dry matter basis
  property water content 0; name GBFS_water_content
  property carbon content 0
    carbon content on a dry matter basis (reserved; not for manual entry)
  property true value 5.35981e-9
    allocation property applied in "true value" allocation // value calculated from revenue
  properties: carbon allocation 0 kg
- aluminium alloy, metal matrix composite: 0 kg; CPC 41431: Unwrought aluminium; By-product classification allocatable product
  reference flow
  production volume 8087.27 kg
  property water content 0; name Al_MMC_water_content
  property carbon content, non-fossil 0; name Al_MMC_C_content_non_fossil
    biogene carbon content on a dry matter basis
  property price 6.2 EUR2005; name ref_price_EUR2005
    (same comment as for aluminium alloy, AlLi)
  property carbon content, fossil 0.0475; name Al_MMC_C_content_fossil
    fossil carbon content on a dry matter basis
  property dry mass 1 kg; name Al_MMC_DM
  property water in wet mass 0 kg; name Al_MMC_WWM
  property wet mass 1 kg; name Al_MMC_WM
  property carbon content 0.0475
    carbon content on a dry matter basis (reserved; not for manual entry)
  property true value 9.21441e-7
    allocation property applied in "true value" allocation // value calculated from revenue
  properties: carbon allocation 0.0475 kg
- aluminium, primary, cast alloy slab from continuous casting: 0 kg; CPC 41431: Unwrought aluminium; By-product classification allocatable product
  reference flow
  production volume 518245 kg
  property price 3.67 EUR2005; name ref_price_EUR2005
    Estimated to be the same as in case of aluminium, primary, liquid.
  property carbon content 0
    carbon content on a dry matter basis (reserved; not for manual entry)
  property true value 3.49523e-5
    allocation property applied in "true value" allocation // value calculated from revenue
  properties: wet mass 1 kg, carbon content, fossil 0, water content 0, carbon content, non-fossil 0, water in wet mass 0 kg, dry mass 1 kg, carbon allocation 0 kg

## Inputs from technosphere
All rows: source F. Habermacher 2011
- steel, chromium steel 18/8, hot rolled: 0.000108266 kg; lognormal variance with pedigree 0.0424, pedigree (1,3,5,4,2)
  Materialization based on average from literature values.
  properties: dry mass 1 kg, carbon content, fossil 0.0008, wet mass 1 kg
- printed wiring board, mounted mainboard, desktop computer, Pb free: 1.0627e-5 kg; lognormal variance with pedigree 0.0424, pedigree (1,3,5,4,2)
  Materialization based on average from literature values.
  properties: carbon content, non-fossil 0.00406047, wet mass 1 kg, dry mass 1 kg, carbon content, fossil 0.214344
  note on carbon content, non-fossil: C content was calculated as the addition of C content in the PWB components
- steel, low-alloyed, hot rolled: 0.000685685 kg; lognormal variance with pedigree 0.0424, pedigree (1,3,5,4,2)
  Materialization based on average from literature values.
  properties: carbon content, fossil 0.005, dry mass 1 kg, wet mass 1 kg
- nylon 6: 0 kg; pedigree (1,1,1,1,1)
  Materialization based on average from literature values.
  properties: carbon content, fossil 0.637168, dry mass 1 kg, wet mass 1 kg
- light emitting diode: 5.59226e-7 kg; lognormal variance with pedigree 0.0424, pedigree (1,3,5,4,2)
  Materialization based on average from literature values.
  properties: wet mass 1 kg, carbon content, fossil 0.0203273, dry mass 1 kg
- flat glass, uncoated: 0 kg; pedigree (1,1,1,1,1)
  Materialization based on average from literature values.
  properties: dry mass 1 kg, wet mass 1 kg
- sheet rolling, aluminium: 2.27128e-5 kg; lognormal variance with pedigree 0.0424, pedigree (1,3,5,4,2)
  Materialization based on average from literature values.
- acrylonitrile-butadiene-styrene copolymer: 2.34162e-5 kg; lognormal variance with pedigree 0.0424, pedigree (1,3,5,4,2)
  Materialization based on average from literature values.
  properties: dry mass 1 kg, carbon content, fossil 0.853081, wet mass 1 kg
- waste plastic, industrial electronics: 0 kg; pedigree (1,1,1,1,1)
  (same comment as for iron scrap, unsorted)
  production volume 0 kg
    Calculated from production volume of reference product using the relative outputs.
  properties: dry mass 0.847 kg, water content 0.180638, carbon content, fossil 0.81386, wet mass 1 kg
- fibre, viscose: 9.2268e-5 kg; lognormal variance with pedigree 0.0424, pedigree (1,3,5,4,2)
  Materialization based on average from literature values.
  properties: wet mass 1 kg, carbon content, non-fossil 0.240535, dry mass 1 kg
- coating powder: 0 kg; pedigree (1,1,1,1,1)
  Materialization based on average from literature values.
  properties: wet mass 1 kg, carbon content, fossil 0.339435, dry mass 1 kg
- heat, district or industrial, natural gas: 0.00878244 MJ; lognormal variance with pedigree 0.0424, pedigree (1,3,5,4,2)
  Values derived from Ecoinvent Transport Report. Value for entire passenger car scaled and split over glider and drivetrain (about 70% glider, 30% drivetrain).
- zinc: 7.13495e-6 kg; lognormal variance with pedigree 0.0424, pedigree (1,3,5,4,2)
  Materialization based on average from literature values.
  properties: wet mass 1 kg, dry mass 1 kg
- synthetic rubber: 0.000236853 kg; lognormal variance with pedigree 0.0424, pedigree (1,3,5,4,2)
  Materialization based on average from literature values.
  properties: wet mass 1 kg, carbon content, fossil 0.871949, dry mass 1 kg
- electricity, medium voltage: 0.00846803 kWh; lognormal variance with pedigree 0.0424, pedigree (1,3,5,4,2)
  (same comment as for heat, district or industrial, natural gas)
- reinforcing steel: 0.0033779 kg; lognormal variance with pedigree 0.0424, pedigree (1,3,5,4,2)
  Materialization based on average from literature values.
  property water content 0; name water_content
  property carbon content, non-fossil 0; name C_content_non_fossil
  property carbon content, fossil 0.004; name C_content_fossil
  property water in wet mass 0 kg; name WWM
  property wet mass 1 kg; name WM
  property dry mass 1 kg; name DM
- polypropylene, granulate: 0.000265384 kg; lognormal variance with pedigree 0.0424, pedigree (1,3,5,4,2)
  Materialization based on average from literature values.
  properties: dry mass 1 kg, carbon content, fossil 0.857143, wet mass 1 kg
- tempering, flat glass: 0.000167768 kg; lognormal variance with pedigree 0.0424, pedigree (1,3,5,4,2)
  Materialization based on average from literature values.
- lubricating oil: 0 kg; pedigree (1,1,1,1,1)
  Materialization based on average from literature values.
  properties: dry mass 1 kg, carbon content, fossil 0.75, wet mass 1 kg
- copper: 3.54945e-5 kg; lognormal variance with pedigree 0.0424, pedigree (1,3,5,4,2)
  Materialization based on average from literature values.
  properties: dry mass 1 kg, wet mass 1 kg
- lead: 1.24841e-5 kg; lognormal variance with pedigree 0.0424, pedigree (1,3,5,4,2)
  Materialization based on average from literature values.
  properties: wet mass 1 kg, dry mass 1 kg
- polyethylene terephthalate, granulate, amorphous: 7.80541e-6 kg; lognormal variance with pedigree 0.0424, pedigree (1,3,5,4,2)
  Materialization based on average from literature values.
  properties: carbon content, fossil 0.625, dry mass 1 kg, wet mass 1 kg
- road vehicle factory: 1.15157e-12 unit; lognormal variance with pedigree 0.0424, pedigree (1,3,5,4,2)
  Materialization based on average from literature values.
- glass fibre reinforced plastic, polyester resin, hand lay-up: 2.23534e-6 kg; lognormal variance with pedigree 0.0424, pedigree (1,3,5,4,2)
  Materialization based on average from literature values.
  properties: wet mass 1 kg, dry mass 1 kg, carbon content, fossil 0.246639
- aluminium scrap, new: 0 kg; pedigree (1,1,1,1,1)
  (same comment as for iron scrap, unsorted)
  production volume 0 kg
    Calculated from production volume of reference product using the relative outputs.
  properties: price 0.806 EUR2005, dry mass 1 kg, wet mass 1 kg
- polyethylene, low density, granulate: 7.80541e-5 kg; lognormal variance with pedigree 0.0424, pedigree (1,3,5,4,2)
  Materialization based on average from literature values.
  properties: wet mass 1 kg, dry mass 1 kg, carbon content, fossil 0.857143
- polyvinylchloride, suspension polymerised: 5.20361e-5 kg; lognormal variance with pedigree 0.0424, pedigree (1,3,5,4,2)
  Materialization based on average from literature values.
  properties: carbon content, fossil 0.387097, dry mass 1 kg, wet mass 1 kg
- wire drawing, copper: 1.76571e-5 kg; lognormal variance with pedigree 0.0424, pedigree (1,3,5,4,2)
  Materialization based on average from literature values.
- aluminium, cast alloy: 1.99872e-5 kg; lognormal variance with pedigree 0.0424, pedigree (1,3,5,4,2)
  Materialization based on average from literature values.
  properties: wet mass 1 kg, dry mass 1 kg
- tap water: 0.0127398 kg; name tap_water_input; lognormal variance with pedigree 0.0424, pedigree (1,3,5,4,2)
  (same comment as for heat, district or industrial, natural gas)
  properties: dry mass 0.000337476 kg, carbon content, fossil 0.00178991, water content 2962.17, wet mass 1 kg
- used glider, passenger car: -0.0041921 kg
  Materialization based on average from literature values.
  production volume 4.8e10 kg; = Ref('a446d2df-7be3-437a-ba54-2ec426de7cc5', 'ProductionVolume') * ( (Ref('9f9420fc-023c-4d5c-8110-d10912ac576b')*-1) / Ref('a446d2df-7be3-437a-ba54-2ec426de7cc5'))
    Calculated from production volume of reference product using the relative outputs.
- heat, district or industrial, other than natural gas: 0.000249262 MJ; lognormal variance with pedigree 0.0424, pedigree (1,3,5,4,2)
  (same comment as for heat, district or industrial, natural gas)
- magnesium: 3.56705e-6 kg; lognormal variance with pedigree 0.0424, pedigree (1,3,5,4,2)
  Materialization based on average from literature values.
  properties: wet mass 1 kg, dry mass 1 kg
- aluminium, wrought alloy: 5.67819e-6 kg; lognormal variance with pedigree 0.0424, pedigree (1,3,5,4,2)
  Materialization based on average from literature values.
  properties: dry mass 1 kg, wet mass 1 kg
- epoxy resin, liquid: 0 kg; pedigree (1,1,1,1,1)
  Materialization based on average from literature values.
  properties: carbon content, fossil 0.42325, wet mass 1 kg, dry mass 1 kg
- polyurethane, flexible foam: 0 kg; pedigree (1,1,1,1,1)
  Materialization based on average from literature values.
  properties: dry mass 1 kg, wet mass 1 kg, carbon content, fossil 0.633827
- sheet rolling, steel: 0.0028871 kg; lognormal variance with pedigree 0.0424, pedigree (1,3,5,4,2)
  Materialization based on average from literature values.
- nylon 6: 5.16082e-6, 1.045e-5 kg (2 entries); lognormal variance with pedigree 0.0424, pedigree (1,3,5,4,2)
  Materialization based on average from literature values.
- flat glass, uncoated: 2.86483e-5, 0.000139119 kg (2 entries); lognormal variance with pedigree 0.0424, pedigree (1,3,5,4,2)
  Materialization based on average from literature values.
- waste plastic, industrial electronics: -3.24425e-7, -2.14745e-5 kg (2 entries); lognormal variance with pedigree 0.0424, pedigree (1,3,5,4,2)
  (same comment as for iron scrap, unsorted)
  production volume 2.496e8 kg
- coating powder: 2.03308e-5, 4.11673e-5 kg (2 entries); lognormal variance with pedigree 0.0424, pedigree (1,3,5,4,2)
  Materialization based on average from literature values.
- lubricating oil: 2.76447e-6, 1.31236e-5 kg (2 entries); lognormal variance with pedigree 0.0424, pedigree (1,3,5,4,2)
  Materialization based on average from literature values.
- aluminium scrap, new: -5.43697e-7, -4.06761e-6 kg (2 entries); lognormal variance with pedigree 0.0438, pedigree (1,4,5,4,2)
  (same comment as for iron scrap, unsorted)
  production volume 5.28e7 kg
- epoxy resin, liquid: 1.07007e-5, 5.07974e-5 kg (2 entries); lognormal variance with pedigree 0.0424, pedigree (1,3,5,4,2)
  Materialization based on average from literature values.
- polyurethane, flexible foam: 2.54923e-5, 0.000121015 kg (2 entries); lognormal variance with pedigree 0.0424, pedigree (1,3,5,4,2)
  Materialization based on average from literature values.

## Emissions to nature
- COD, Chemical Oxygen Demand [water, unspecified]: 7.638e-7 kg; source F. Habermacher 2011; lognormal variance with pedigree 0.0452, pedigree (1,4,3,4,2)
  Extrapolated from ecoinvent v2.2 passenger car.
- BOD5, Biological Oxygen Demand [water, unspecified]: 1.02874e-7 kg; source F. Habermacher 2011; lognormal variance with pedigree 0.0832, pedigree (1,4,5,4,2)
  Extrapolated from ecoinvent v2.2 passenger car.
- Water [water, unspecified]: 1.08288e-5 m3; name water_to_water_unspecified; = (tap_water_input/1000)*(1-fraction_TW_to_air); lognormal variance with pedigree 0.098025, pedigree (4,4,4,2,4)
  Calculated value based on literature values and expert opinion. See comments in the parametres' comment field.
  property fraction, origin: unspecified 0; name fraction_origin_unspecified_Ww
  property fraction, origin: fresh water 1; name fraction_origin_fresh_water_Ww
  property fraction, origin: salt water 0; name fraction_origin_salt_water_Ww
- NMVOC, non-methane volatile organic compounds, unspecified origin [air, unspecified]: 1.89944e-5 kg; source F. Habermacher 2011; lognormal variance with pedigree 0.0441, pedigree (1,4,3,3,1)
  Extrapolated from ecoinvent v2.2 passenger car.
- TOC, Total Organic Carbon [water, unspecified]: 2.82889e-7 kg; = 0.0001822/2.7; lognormal variance with pedigree 0.0452, pedigree (1,4,3,4,2)
  Derived from COD as described in ecoinvent 3 Data Quality Guidelines (p. 49, paragraph 5.9.7). The same Pedigree matrix value as COD has been used.
- DOC, Dissolved Organic Carbon [water, unspecified]: 2.82889e-7 kg; = 0.0001822/2.7; lognormal variance with pedigree 0.0452, pedigree (1,4,3,4,2)
  (same comment as for TOC, Total Organic Carbon)
- Phosphate [water, unspecified]: 3.95692e-9 kg; source F. Habermacher 2011; lognormal variance with pedigree 0.0441, pedigree (1,4,3,3,1)
  Extrapolated from ecoinvent v2.2 passenger car.
- Water [air, unspecified]: 1.91097e-6 m3; name water_to_air_unspecified; = (tap_water_input/1000)*fraction_TW_to_air; lognormal variance with pedigree 0.098025, pedigree (4,4,4,2,4)
  (same comment as for Water)
  property fraction, origin: fresh water 1; name fraction_origin_fresh_water
  property fraction, origin: unspecified 0; name fraction_origin_unspecified
  property fraction, origin: salt water 0; name fraction_origin_salt_water

## Sampling procedure
Average of material compositions published in literature between 2000 and 2010.

## Extrapolations
The data analysed is taken from literature spanning between 2000 and 2010. The data is expected to be representative up to 2015 since no substantial changes could be observed in the materialisation of passenenger cars between 2000 and 2010. It is not expected that major changes will occur until 2015 in commercially available passenger cars.

## Review by Christian Bauer 2012-06-28
passed
