# operation, computer, desktop, with liquid crystal display, active mode

Dataset: EcoSpold 2, unit process
Geography: CA-QC
Time period: 2001-01-01 to 2019-12-31
Technology level: current
Classification: ISIC rev.4 ecoinvent: 8219:Photocopying, document preparation and other specialized office support act
Classification: EcoSpold01Categories: electronics/services
Synonyms: PC; LCD
Tags: Recontextualization; Operation
Scenario: Business-as-Usual
System model: Allocation at the point of substitution
Generated by: Pascal Lesage
Published in: Hischier R. 2007
Database: ecoinvent
isCopyrightProtected: false
accessRestrictedTo: 1

## General comment
The computer desktop use in the active mode includes the share of computer production (CPU, keyboard, mouse, LCD) as well as the energy consumption (use-phase) and the rail and road transport from factory to user. Energy consumption of computer CPUs and LCD monitors (use-phase) vary a lot depending on the computer looked at. Min.-Max. values are listed; the mean value is calculated via the most likely value according to the reference data. Due to relatively vague literature data for computer and LCD life span, assumptions had to be made.
Child dataset exchanges identical to GLO dataset. Created to enable linking to regional markets (e.g. for electricity). Data quality indicators adjusted accordingly.

## Included activities end
Describes the use of a desktop computer with a LCD monitor in the active mode. Calculated per 1 hour of computer use. Computer life span assumed to be 4 years, for the LCD monitor 6 years. Active mode 5.5 hours a day (office use), 240 days a year. UCTE production mix applied for electricity consumption (low voltage).

## Geography
The data is based on information by international computer manufacturers and literature (active mode consumption).
Child dataset exchanges identical to GLO dataset. Created to enable linking to regional markets (e.g. for electricity). Data quality indicators adjusted accordingly.

## Technology
No technology involved, except for the production of the desktop computer (including LCD, keyboard and mouse), which is described in another dataset.

## Parameters
- Quebec gross domestic product 2011: 3.11e11 USD(2011); name quebecGDP2011; lognormal variance with pedigree 0.0006, pedigree (1,1,1,1,1)
  Quebec Gross domestic product for 2011, expressed in 2011 USD. Source: Institut de la statistique du Québec. Converted from CAD to USD using a yearly average exchange rate of 0.989 CAD/USD (Source: bank of Canada).
- world gross domestic product 2011: 7e13 USD(2011); name worldGDP2011; lognormal variance with pedigree 0.0006, pedigree (1,1,1,1,1)
  World Gross domestic product for 2011, expressed in 2011 USD. Source: World Bank.
- number of days in a year computer desktop home use: 365; name no_days_computer_desktop_home_use; lognormal variance with pedigree 0.1786, pedigree (4,5,5,5,5)
  Estimation (based on assumptions made in ecoinvent report no.18 IV ecoinvent database v2). Number of days in the year when computer (desktop) is used in a home.
- number of computers (desktop) sold in 2005 world: 1.304e8; name no_computer_desktop_sold_GLO_2005; = 130.4*1000000; lognormal variance with pedigree 0.0166, pedigree (4,5,1,1,1)
  Literature value (http://www.etforecasts.com/products/ES_pcww1203.htm). Number of computers (desktop, units) sold in 2005 in the whole world.
- number of days in a year computer desktop office use: 200; name no_days_computer_desktop_office_use; lognormal variance with pedigree 0.1786, pedigree (4,5,5,5,5)
  Estimation (based on assumptions made in ecoinvent report no.18 IV ecoinvent database v2). Number of days in the year when computer (desktop) is used in the office.
- fraction of computers desktop sold for office use: 0.9; name fraction_computer_desktop_office_use; lognormal variance with pedigree 0.2106, pedigree (5,5,5,5,5)
  Estimation
- number of hours in a day when computer (desktop) is in active mode - office use: 5.5; name no_hours_computer_desktop_AM_office_use; lognormal variance with pedigree 0.0127, pedigree (4,4,3,3,1)
  Literature value (Williams, 2005).
- fraction of computers desktop sold for home use: 0.1; name fraction_computer_desktop_home_use; lognormal variance with pedigree 0.2106, pedigree (5,5,5,5,5)
  Estimation
- number of hours in a day when computer (desktop) is in active mode - home use: 3.14; name no_hours_computer_desktop_AM_home_use; lognormal variance with pedigree 0.0127, pedigree (4,4,3,3,1)
  Literature value (Williams, 2005).
- number of computers (desktop) sold in 4 years: 4.79462e8; name no_computer_desktop_sold_4years; = no_computer_desktop_sold_GLO_2005+((123.109+116.226+109.727)*1000000); lognormal variance with pedigree 0.0166, pedigree (4,5,1,1,1)
  Calculated value. Number of computers (desktop) sold in 4 years (from 2002 - 2005 included). Using annual growth of 5.92%. Literature value (http://www.etforecasts.com/products/ES_pcww1203.htm); worldwide sales of desktop computers in millions in 2005 was 130.4 mill. units. Calculated values (using annual growth of 5.92%); 123.1 mil. (2004), 116.2 mil. (2003) and 109.7 mil. (2002).
- fraction of computers (desktop) sold with liquid crystal display: 0.64 % (obsolete); name fraction_computer_desktop_LCD_display; lognormal variance with pedigree 0.0566, pedigree (4,5,5,1,1)
  Literature value (ecoinvent report v2 no.18 IV).

## Reference product
- operation, computer, desktop, with liquid crystal display, active mode: 1 hour; CPC 85: Support services; By-product classification allocatable product
  production volume 1.50593e9 hour; = PARENTVALUE * quebecGDP2011/worldGDP2011
    Gross approximation of Quebec production volume using relative value of Quebec GDP to world GDP
  property price 0.0274178 EUR2005
    Calculated based on inputs: The price of the product has been calculated as a sum of the values of the material and energy inputs for this product. This value is therefore a rough estimation. It may underestimate the real price since there are additional expenses when producing any product. These expences can include for example labour costs, treatment of waste materials and profit for the producer. Please consider carefully whether this level of data quality is acceptable for your application.

## Inputs from technosphere
- electricity, low voltage: 0.085 kWh; lognormal variance with pedigree 0.0432, pedigree (2,3,5,5,1)
  EcoSpold01Location=UCTE
- display, liquid crystal, 17 inches: 1.9026e-5 unit; lognormal variance with pedigree 0.0546, pedigree (3,3,5,5,1)
  EcoSpold01Location=GLO
  properties: carbon content, non-fossil 7.50159e-5, dry mass 5.1 kg, wet mass 5.1 kg, carbon content, fossil 0.309893
  note on carbon content, non-fossil: Calculated as the addition of C contents in the product composition, then referred to 1 kg DM
- computer, desktop, without screen: 2.8539e-5 unit; lognormal variance with pedigree 0.0546, pedigree (3,3,5,5,1)
  EcoSpold01Location=GLO
  properties: carbon content, non-fossil 0.000485011, carbon content, fossil 0.0877555, dry mass 11.3 kg, wet mass 11.3 kg
- pointing device, optical mouse, with cable: 2.8539e-5 unit; lognormal variance with pedigree 0.0546, pedigree (3,3,5,5,1)
  EcoSpold01Location=GLO
  properties: carbon content, fossil 0.482336, dry mass 0.12 kg, wet mass 0.12 kg
- keyboard: 2.8539e-5 unit; lognormal variance with pedigree 0.0546, pedigree (3,3,5,5,1)
  EcoSpold01Location=GLO
  properties: wet mass 1.18 kg, dry mass 1.18 kg, carbon content, fossil 0.57577

## Sampling procedure
Manufacturers, literature and own assumptions.

## Extrapolations
This dataset has been extrapolated from year 2006 to the year of the calculation (2019). The uncertainty has been adjusted accordingly.
