# sulfate pulp production, from eucalyptus ssp. from sustainable forest management, unbleached

Dataset: EcoSpold 2, unit process
Geography: TH
Time period: 2000-01-01 to 2019-12-31
Technology level: current
Classification: ISIC rev.4 ecoinvent: 1701:Manufacture of pulp, paper and paperboard
Classification: EcoSpold01Categories: paper & cardboard/pulps
Synonyms: kraft pulp; Kraftzellstoff
Scenario: Business-as-Usual
System model: Allocation at the point of substitution
Generated by: Roland Hischier
Published in: Hischier R. 2007
Database: ecoinvent
isCopyrightProtected: true
accessRestrictedTo: 1

## General comment
[This dataset was already contained in the ecoinvent database version 2. It was not individually updated during the transfer to ecoinvent version 3. Life Cycle Impact Assessment results may still have changed, as they are affected by changes in the supply chain, i.e. in other datasets. This dataset was generated following the ecoinvent quality guidelines for version 2. It may have been subject to central changes described in the ecoinvent version 3 change report (http://www.ecoinvent.org/database/ecoinvent-version-3/reports-of-changes/), and the results of the central updates were reviewed extensively. The changes added e.g. consistent water flows and other information throughout the database. The documentation of this dataset can be found in the ecoinvent reports of version 2, which are still available via the ecoinvent website. The change report linked above covers all central changes that were made during the conversion process.]

## Included activities end
This module includes the production of unbleached sulphate pulp - including transports to the pulp mill, wood handling, chemical pulping and drying, energy production on-site, recovery cycles of chemicals and internal waste water treatment.

## Geography
Data from a Swiss study (based on scandinavian conditions) and from the Swedish EPA used as European average data.

## Technology
Modern average technology.

## Parameters
- fraction, cooling water, cooling pond system, to air: 0.032; name fraction_CW_CP_to_air; lognormal variance with pedigree 0.0413, pedigree (2,3,1,3,1)
  Calculated based on literature value (Scown, C.D., 2011, Water Footprint of U.S. Transportation Fuels and supplying information of the article) (Vionnet, S., Quantis Water Database - Technical Report, 2012).
- fraction, cooling water, recirculating system, to air: 0.771; name fraction_CW_R_to_air; lognormal variance with pedigree 0.0413, pedigree (2,3,1,3,1)
  (same comment as for fraction, cooling water, cooling pond system, to air)
- fraction, cooling water, once-through system, to air: 0.004; name fraction_CW_OT_to_air; lognormal variance with pedigree 0.0413, pedigree (2,3,1,3,1)
  (same comment as for fraction, cooling water, cooling pond system, to air)
- fraction, cooling water, to air: 0.3875; name fraction_CW_to_air; = (0.5*fraction_CW_OT_to_air)+(0.5*fraction_CW_R_to_air); lognormal variance with pedigree 0.092025, pedigree (4,4,3,2,4)
  Calculated value based on literature value (see comments of the other parametres present in this dataset) and expert opinion. In the case when no industry/literature data are available about the type of cooling or directly fraction, cooling water, to air specific for the process a default assumption is applied. It is assumed that the once-through cooling system is used in 50% of all cases and recirculating system is used in another 50% of all cases.
- fraction, process water, to air: 0.231923 dimensionless; name fraction_PW_to_air; lognormal variance with pedigree 0.092025, pedigree (4,4,3,2,4)
  Literature value (Statistics Canada, 2007 & Shaffer, K.H., 2008, Consumptive water use in the Great Lakes Basin, USGS) (Vionnet, S., Quantis Water Database - Technical Report, 2012).

## Reference product
- sulfate pulp, unbleached: 1 kg; By-product classification allocatable product; CPC 32112: Chemical wood pulp, other than dissolving grades
  production volume 100000 kg
    No data could be found on the production volume of unbleached sulfate pulp from eucalyptus. According to the consultation with an industry expert the total marketable amount of unbleached eucalyptus kraft pulp is negligible due to a lack of markets. Only very view customers with specific applications require unbleached eucalyptus kraft pulp, e.g. the production of phenolic resins impregnated paper, filter papers or carbon paper. Except these purposes unbleached eucalyptus pulp can sometimes also be produced when pulp mills have limitations in the bleaching line, i.e. are unable to bleach their entire production. Given this information we estimate the global amount of unbleached eucalyptus market pulp to be 300000kg per year, of which one third is assumed to be produced in Thailand.
    Reference(s): Correspondence with Celso Foelkel, March 2018, see also <http://www.eucalyptus.com.br/> accessed March 2018.
  property price 0.355 EUR2005
    Temporary price data. Calculated as 90% of purchasers price based on: 2004 export value divided by export quantity from FAOSTAT/Forestry/foresSTAT/European Union+
  property carbon content, non-fossil 0.494
    C content of dry mass of sulfate pulp is 0.494 kgC/kg dry wood (ecoinvent v2.2 report 6_IX & ecoinvent v2.2 report 9). No other C containing products in the formulation of the pulp.
  property carbon content 0.494
    carbon content on a dry matter basis (reserved; not for manual entry)
  property true value 0.355
    allocation property applied in "true value" allocation // value calculated from revenue
  properties: dry mass 0.9 kg, water content 0.111111, wet mass 1 kg, carbon content, fossil 0, water in wet mass 0.1 kg, carbon allocation 0.4446 kg

## By-products
- heat, for reuse in municipal waste incineration only: 0 MJ; CPC 17300: Steam and hot water; By-product classification allocatable product; pedigree (1,1,1,1,1)
  Net electricity generated from this waste and used in internal MSWI plant energy redistribution.
  Uncertainty: uncertainty is calculated from uncertainties in waste composition and uncertainties in energy efficiency and the uncertainty in internal energy demand
  production volume 3.72106 MJ
  property true value relation 0.1842; name E_th_prod_MSWI_true_value_relation
    property to calculate "true value" from
  property exergy 0.1842 MJ; name E_th_prod_MSWI_exergy
    This exergy property is based on the exergy content of the product.
  property price 0.0106 EUR2005; name E_th_prod_MSWI_price_EUR2005
    Average European district heat price from Ecoheatcool and Euroheat 2005-2006, Ecoheat Work package 1: The European heat market. Final report. 10.6 EUR/GJ i s the price of district heat. http://www.solarthermalworld.org/files/Ecoheatcool%20WP1%20Web.pdf?download
  property true value 6.6908e-6
    allocation property applied in "true value" allocation // value calculated from true value relation
- electricity, for reuse in municipal waste incineration only: 0 kWh; CPC 17100: Electrical energy; By-product classification allocatable product; pedigree (1,1,1,1,1)
  (same comment as for heat, for reuse in municipal waste incineration only)
  production volume 0.512636 kWh
  property exergy 3.6 MJ; name E_el_prod_MSWI_exergy
    This exergy property is based on the exergy content of the product.
  property true value relation 3.6; name E_el_prod_MSWI_true_value_relation
    property to calculate "true value" from
  property price 0.1 EUR2005; name E_el_prod_MSWI_price_EUR2005
    Estimated to be the same price as in case of electricity, medium voltage.
  property true value 1.77893e-5
    (same comment as for heat, for reuse in municipal waste incineration only)
- iron scrap, sorted, pressed: 0 kg; By-product classification Recyclable; CPC 39310: Slag, dross, scalings and other waste from the manufacture of iron or steel; pedigree (1,1,1,1,1)
  Iron scrap recovered from this waste.
  Uncertainty: uncertainty calculated from uncertainty in waste composition, uncertainty of share of recyclable metal, uncertainty of transfer coefficient to bottom ash, uncertainty of the efficiency of scrap removal in MSWI plant.
  production volume 0.00307827 kg
  property price 0.175 EUR2005
    Temporary price data. Calculated as 90% of purchasers price based on: 2005 import and export prices (total trades (USD) divided by total weight (kg) in biggest economies of the world: EU27, USA, Brasil, China, India, Japan and Russia) from UN Commodity Trade Statistics Database (http://data.un.org/Explorer.aspxDatabase [Accessed 2011.06.20]). Commodity: Waste or scrap, of cast iron
  property carbon content 0
    carbon content on a dry matter basis (reserved; not for manual entry)
  property true value 2.21943e-6
    allocation property applied in "true value" allocation // value calculated from revenue
  properties: dry mass 1 kg, water content 0, carbon content, non-fossil 0, water in wet mass 0 kg, carbon content, fossil 0, wet mass 1 kg, carbon allocation 0 kg
- iron scrap, unsorted: 0 kg; source European Aluminium Association 2008; CPC 39310: Slag, dross, scalings and other waste from the manufacture of iron or steel; By-product classification Recyclable; pedigree (1,1,1,1,1)
  production volume 8.75801e-8 kg
  property price 0.149 EUR2005; name ironScrapAmount_price_EUR2005
    Temporary price data. Calculated as 90% of purchasers price based on: estimated at 85% of sorted scrap
  property carbon content 0
    carbon content on a dry matter basis (reserved; not for manual entry)
  property true value 5.37637e-11
    allocation property applied in "true value" allocation // value calculated from revenue
  properties: water in wet mass 0 kg, water content 0, carbon content, fossil 0, carbon content, non-fossil 0, dry mass 1 kg, wet mass 1 kg, carbon allocation 0 kg
- aluminium oxide, non-metallurgical: 0 kg; source European Aluminium Association 2008; CPC 41432: Alumina (aluminium oxide), except artificial corundum; By-product classification allocatable product; CAS 1344-28-1; pedigree (1,1,1,1,1)
  production volume 5.51108e-6 kg
  property carbon content, non-fossil 0; name C_content_non_fossil
  property price 0.28 EUR2005; name Al2O3Amount_price_EUR2005
    From UN trade database. http://data.un.org/ Import data from the largest economies of the world are used (Brazil, India, USA, China, Japan and EU-27).
  property dry mass 1 kg; name DM
  property water content 0; name water_content
  property wet mass 1 kg; name WM
  property water in wet mass 0 kg; name WWM
  property carbon content, fossil 0; name C_content_fossil
  property carbon content 0
    carbon content on a dry matter basis (reserved; not for manual entry)
  property true value 6.35759e-9
    allocation property applied in "true value" allocation // value calculated from revenue
  properties: carbon allocation 0 kg
- aluminium, cast alloy: 0 kg; source European Aluminium Association 2008; By-product classification allocatable product; CPC 41431: Unwrought aluminium; pedigree (1,1,1,1,1)
  EcoSpold01Location=RER
  production volume 5.15164e-5 kg
  property price 1.3 EUR2005; name castAlloyAmount_price_EUR2005
    Temporary price data. Calculated as 90% of purchasers price based on: Source: London Metal Exchange, Aluminium alloy price for 2005
  property carbon content 0
    carbon content on a dry matter basis (reserved; not for manual entry)
  property true value 2.75922e-7
    allocation property applied in "true value" allocation // value calculated from revenue
  properties: water in wet mass 0 kg, carbon content, non-fossil 0, water content 0, dry mass 1 kg, carbon content, fossil 0, wet mass 1 kg, carbon allocation 0 kg
- aluminium, wrought alloy: 0 kg; source European Aluminium Association 2008; By-product classification allocatable product; CPC 4153: Semi-finished products of aluminium or aluminium alloys; pedigree (1,1,1,1,1)
  production volume 2.25529e-5 kg
  property price 1.44 EUR2005; name secondaryAluminiumOutput_price_EUR2005
    Estimated based on literature values and expert judgement. Aluminium ccast alloys are about 90% of the price of aluminium wrought alloys.
  property carbon content 0
    carbon content on a dry matter basis (reserved; not for manual entry)
  property true value 1.33802e-7
    allocation property applied in "true value" allocation // value calculated from revenue
  properties: wet mass 1 kg, water content 0, carbon content, fossil 0, water in wet mass 0 kg, carbon content, non-fossil 0, dry mass 1 kg, carbon allocation 0 kg
- copper: 0 kg; source Rentz O. 1999; By-product classification allocatable product; CPC 41413: Refined copper and copper alloys, unwrought; master alloys of copper
  Literature value. Copper uses: Before end-use copper is manufactured into semi fabricated products, such as shapes and ingots (known as 'semis'). These manufacturing processes are subdivided into hot working, cold working and, if necessary, process annealing. Few of the semis are ready for use as such. They more typically travel to first-stage manufacturers, who make metal rods, wire, and casting, and then to component manufacturers who produce such things as motors, valves, and insulated cables The components in turn are incorporated by final-stage manufacturers into a variety of finished products - automobiles, commercial buildings, residential housing, and so forth. These uses account for about 79% of the world-wide consumption of copper.
  production volume 9.79814e-5 kg
  property price 5.52 EUR2005
    Literature value (http://www.economist.com/news/business/21576714-mining-industry-has-enriched-chile-its-future-precarious-copper-solution). Average price between 20015 and 2013.
  property carbon content 0
    carbon content on a dry matter basis (reserved; not for manual entry)
  property true value 2.22833e-6
    allocation property applied in "true value" allocation // value calculated from revenue
  properties: dry mass 1 kg, water in wet mass 0 kg, wet mass 1 kg, carbon content, non-fossil 0, water content 0, carbon content, fossil 0, carbon allocation 0 kg
- zinc concentrate: 0 kg; CPC 14290: Other non-ferrous metal ores and concentrates (other than uranium or thorium ores and concentrates); By-product classification allocatable product
  Calculated value from the knowledge of the properties of both products.
  production volume 7.77705e-14 kg
  property price 0.38 EUR2005; name ByP_price_EUR2005
    Temporary price data. Calculated as 90% of purchasers price based on: Zinc content in concentrate 53%. Concentrate price per kg Zn 86.5% of refined Zn price (13.5% treatment charges according to CHR Metals Limited 2005: Dynamic cost curves. http://www.minecost.com/dynamic.pdf). 2004 zinc price from USGS (2007) Mineral commodity summaries 2007. <http://minerals.usgs.gov/minerals/pubs/mcs/2007/mcs2007.pdf> [Accessed 25 May 2010]
  property zinc content 0.53; name zinc_C_zinc_concentrate
    Zinc content on a dry matter basis. Value taken from teh "zinc mine operation" /GLO dataset.
  property dry mass 1 kg; name DM_zinc_concentrate
  property carbon content 0
    carbon content on a dry matter basis (reserved; not for manual entry)
  property true value 1.21758e-16
    allocation property applied in "true value" allocation // value calculated from revenue
  properties: wet mass 1 kg, water content 0, carbon content, non-fossil 0, carbon content, fossil 0, water in wet mass 0 kg, carbon allocation 0 kg
- potassium fertiliser, as K2O: 0 kg; source CRAAQ 2010; CPC 3463: Mineral or chemical fertilizers, potassic; By-product classification allocatable product; pedigree (1,1,1,1,1)
  This is the potassium (as K2O) output (organic and mineral forms of potassium contained) from organic origin. In practice, only a part of this total amount is available to the plants and the available amount has to be calculated considering efficiency of organic potassium (to replace mineral potassium ), which also depends on many factors, such as climate, soil, crop, timing and technique of application, etc. Since this dataset includes field emissions from the application of sludge, potassium availability has been accounted for in the calculation of direct field emissions.
  Uncertainty: The uncertainty of calculated values is determined from propagation of uncertainty factors of underlying variables.
  production volume 0.000926012 kg
  property price 0.188 EUR2005; name K2O_fertiliser_price_EUR2005
    Temporary price data. Calculated as 90% of purchasers price based on: 2004 import price calulated from FAOSTAT (http://faostat.fao.org/site/575/DesktopDefault.aspx?PageID=575#ancor [accessed 2011.01.27] Potash Fertilizers (K20 total nutrients) in kUSD/Mg
  property carbon content 0
    carbon content on a dry matter basis (reserved; not for manual entry)
  property true value 3.04658e-7
    allocation property applied in "true value" allocation // value calculated from revenue
  properties: carbon content, fossil 0, dry mass 1 kg, water in wet mass 0 kg, water content 0, wet mass 1 kg, carbon content, non-fossil 0, carbon allocation 0 kg
- nitrogen fertiliser, as N: 0 kg; source CRAAQ 2010; CPC 3461: Mineral or chemical fertilizers, nitrogenous; By-product classification allocatable product; pedigree (1,1,1,1,1)
  This is the total nitrogen (as N) output (organic and mineral forms of nitrogen contained) from organic origin. In practice, only a part of this total amount is available to the plants and the available amount has to be calculated considering nitrogen efficiency (to replace mineral nitrogen), which also depends on many factors, such as climate, soil, crop, timing and technique of application, etc. Since this dataset includes field emissions from the application of sludge, nitrogen availability has been accounted for in the calculation of direct field emissions.
  Uncertainty: The uncertainty of calculated values is determined from propagation of uncertainty factors of underlying variables.
  production volume 0.00572693 kg
  property price 0.473 EUR2005; name N_fertiliser_price_EUR2005
    Temporary price data. Calculated as 90% of purchasers price based on: 2004 prices are calculated on basis of Import/Export data (tonnes and US$) from UN Trade Statistics Database (http://data.un.org/Browse.aspx?d=ComTrade, accessed 7/7-2010). N, P2O5, or K2O content (http://www.fertilizer.org/ifa/Home-Page/STATISTICS/Conversions-factors)
  property carbon content 0
    carbon content on a dry matter basis (reserved; not for manual entry)
  property true value 4.74047e-6
    allocation property applied in "true value" allocation // value calculated from revenue
  properties: water content 0, wet mass 1 kg, dry mass 1 kg, carbon content, non-fossil 0, water in wet mass 0 kg, carbon content, fossil 0, carbon allocation 0 kg
- phosphate fertiliser, as P2O5: 0 kg; source CRAAQ 2010; CPC 3462: Mineral or chemical fertilizers, phosphatic; By-product classification allocatable product; pedigree (1,1,1,1,1)
  This is the total phosphate (as P2O5) output (organic and mineral forms of phosphate contained) from organic origin. In practice, only a part of this total amount is available to the plants and the available amount has to be calculated considering efficiency of organic phosphate (to replace mineral phosphate), which also depends on many factors, such as climate, soil, crop, timing and technique of application, etc. Since this dataset includes field emissions from the application of sludge, phosphate availability has been accounted for in the calculation of direct field emissions.
  Uncertainty: The uncertainty of calculated values is determined from propagation of uncertainty factors of underlying variables.
  production volume 0.00383321 kg
  property price 0.241 EUR2005; name P2O5_fertiliser_price_EUR2005
    (same comment as for nitrogen fertiliser, as N)
  property carbon content 0
    carbon content on a dry matter basis (reserved; not for manual entry)
  property true value 1.61666e-6
    allocation property applied in "true value" allocation // value calculated from revenue
  properties: dry mass 1 kg, water content 0, carbon content, fossil 0, wet mass 1 kg, carbon content, non-fossil 0, water in wet mass 0 kg, carbon allocation 0 kg
- soil pH raising agent, as CaCO3: 0 kg; source Marianne Lemieux 2013; CPC 34659: Fertilizers n.e.c.; By-product classification allocatable product; pedigree (1,1,1,1,1)
  Calculated value of the amount of CaCO3 that can be substituted considered the liming efficiency of the sludge.
  Uncertainty: The uncertainty of calculated values is determined from propagation of uncertainty factors of underlying variables.
  production volume 0.106762 kg
  property carbon content, fossil 0.12; name soil_pH_raising_agent_C_content_fossil_0; = 12/(40+12+3*16)
    Stoichiometric calculation. Fossil carbon content on a dry matter basis.
  property carbon content, non-fossil 0; name soil_pH_raising_a_C_content_non_fossil_0
    biogene carbon content on a dry matter basis
  property price 0.117 EUR2005; name soil_pH_raising_agent_as_CaCO3_price_EUR
    The price is estimated to be the same as for lime.
  property carbon content 0.12
    carbon content on a dry matter basis (reserved; not for manual entry)
  property true value 2.18596e-5
    allocation property applied in "true value" allocation // value calculated from revenue
  properties: wet mass 1 kg, water in wet mass 0 kg, water content 0, dry mass 1 kg, carbon allocation 0.12 kg

## Inputs from technosphere
- waste wood, untreated: -4.05934e-5 kg; lognormal variance with pedigree 0.0413, pedigree (2,3,5,3,1)
  EcoSpold01Location=CH
  Average Swedish data from SE-EPA report
  Uncertainty: average Swedish data from SE-EPA report
  production volume 1 kg
    Calculated from the production volume of sulfate pulp in proportion to the respective output amounts.
  properties: water content 0.25, dry mass 0.8 kg, wet mass 1 kg, carbon content, non-fossil 0.48632
  note on carbon content, non-fossil: Tab A.4, ecoinvent v2.2 report 13_I. C content has been referred to 1 kg DM,
- roundwood, eucalyptus ssp. from sustainable forest management, under bark: 0.00226963 m3; lognormal variance with pedigree 0.2141, pedigree (3,4,5,3,5)
  property carbon content, fossil 0; name C_content_fossil
  property water in wet mass 412.5 kg; name WWM
  property wet mass 1237.5 kg; name WM
  property water content 0.5; name water_content
  property dry mass 825 kg; name DM
  property carbon content, non-fossil 0.494; name C_content_non_fossil
- scrap steel: -8.11868e-5 kg; lognormal variance with pedigree 0.0413, pedigree (2,3,5,3,1)
  Average Swedish data from SE-EPA report
  EcoSpold01Location=CH
  Uncertainty: average Swedish data from SE-EPA report
  production volume 1 kg
    (same comment as for waste wood, untreated)
  properties: wet mass 1 kg, dry mass 1 kg
- waste textile, soiled: -7.53877e-5 kg; lognormal variance with pedigree 0.0413, pedigree (2,3,5,3,1)
  (same comment as for waste wood, untreated)
  production volume 1 kg
    (same comment as for waste wood, untreated)
  properties: water content 0.333333, carbon content, non-fossil 0.570519, dry mass 0.75 kg, wet mass 1 kg
  note on carbon content, non-fossil: C content of 1 kg DM was calculated after data in Tab A.4, ecoinvent v2.2 report 13_I,
- natural gas, high pressure: 0.0279442 m3; lognormal variance with pedigree 0.0507, pedigree (1,3,5,3,1)
  Data from swedish producers, examined for a Swiss LCA study
  EcoSpold01Location=RER
  Uncertainty: data from swedish producers, examined for a Swiss LCA study
  properties: wet mass 0.84 kg, heating value, gross 39 MJ, carbon content, fossil 0.602381, dry mass 0.84 kg
  note on carbon content, fossil: An average C content of 0.506 kg C/ m3 has been assumed (this average has been calculated using data in Tab 3.5, ecoinvent v2.2 report 6_V
- ash from paper production sludge: -0.00049292 kg; lognormal variance with pedigree 0.0413, pedigree (2,3,5,3,1)
  (same comment as for waste wood, untreated)
  production volume 1 kg
    (same comment as for waste wood, untreated)
  properties: wet mass 1 kg, carbon content, non-fossil 0.0092, dry mass 1 kg
- waste plastic, mixture: -0.000730881 kg; lognormal variance with pedigree 0.0413, pedigree (2,3,5,3,1)
  (same comment as for scrap steel)
  production volume 1 kg
    (same comment as for waste wood, untreated)
  properties: dry mass 0.847 kg, wet mass 1 kg, carbon content, fossil 0.747344, water content 0.180638
  note on carbon content, fossil: C content in 1 kg DM was calculated using data in Tab A.2, ecoinvent v2.2 report 13_I
- chemical, inorganic: 0.0139977 kg; lognormal variance with pedigree 0.0507, pedigree (1,3,5,3,1)
  EcoSpold01Location=GLO
  Data from swedish producers, examined for a Swiss LCA study
  Uncertainty: data from swedish producers, examined for a Swiss LCA study
  properties: dry mass 1 kg, wet mass 1 kg, carbon content, fossil 0.003
  note on carbon content, fossil: This dataset is an unweighted average of 20 inorganic substances (listed in Tab 88.1, ecoinvent v2.2 report 8, part II), being part of the top100 chemicals included in this database. The C-content has also been calculated as an unweighted average of the C content of the substances composing this dataset.
- municipal solid waste: -0.00411933 kg; lognormal variance with pedigree 0.0413, pedigree (2,3,5,3,1)
  (same comment as for waste wood, untreated)
  production volume 1 kg
    (same comment as for waste wood, untreated)
  properties: wet mass 1 kg, carbon content, non-fossil 0.261655, dry mass 0.771 kg, carbon content, fossil 0.171549, water content 0.297017
  note on carbon content, non-fossil: MSW composition in tab 4.1, ecoinvent v2.2 report 13_I. C content referred to 1 kg DM
- sulfur dioxide, liquid: 0.000899853 kg; lognormal variance with pedigree 0.0507, pedigree (1,3,5,3,1)
  EcoSpold01Location=RER
  Data from swedish producers, examined for a Swiss LCA study
  Uncertainty: data from swedish producers, examined for a Swiss LCA study
  properties: wet mass 1 kg, dry mass 1 kg
- limestone residue: -0.00443928 kg; lognormal variance with pedigree 0.0413, pedigree (2,3,5,3,1)
  (same comment as for waste wood, untreated)
  production volume 1 kg
    (same comment as for waste wood, untreated)
  properties: dry mass 0.995 kg, wet mass 1 kg, carbon content, fossil 0.120005, water content 0.00502513
  note on carbon content, fossil: The waste is characterised as 'calcium carbonate waste' (CaCO3)
- electricity, medium voltage: 0.415932 kWh; lognormal variance with pedigree 0.0507, pedigree (1,3,5,3,1)
  Data from swedish producers, examined for a Swiss LCA study
  EcoSpold01Location=NORDEL
  Uncertainty: data from swedish producers, examined for a Swiss LCA study
- sludge from pulp and paper production: -0.00174971 kg; lognormal variance with pedigree 0.0413, pedigree (2,3,5,3,1)
  (same comment as for waste wood, untreated)
  production volume 1 kg
    (same comment as for waste wood, untreated)
  properties: water content 0.333333, dry mass 0.75 kg, carbon content, non-fossil 0.21, wet mass 1 kg
  note on carbon content, non-fossil: Tab 6.21, ecoinvent v2.2 report 11_III & Tab A.9, ecoinvent v2.2 report 13_I. Sludge from pulp and paper contains 15.75% carbon
- light fuel oil: 0.00148976 kg; lognormal variance with pedigree 0.0507, pedigree (1,3,5,3,1)
  (same comment as for sulfur dioxide, liquid)
  properties: wet mass 1 kg, dry mass 1 kg, carbon content, fossil 0.862
- heavy fuel oil: 0.0207966 kg; lognormal variance with pedigree 0.0507, pedigree (1,3,5,3,1)
  (same comment as for sulfur dioxide, liquid)
  properties: wet mass 1 kg, carbon content, fossil 0.849, dry mass 1 kg
- sulfuric acid: 0.00409933 kg; lognormal variance with pedigree 0.0507, pedigree (1,3,5,3,1)
  (same comment as for natural gas, high pressure)
  properties: dry mass 1 kg, wet mass 1 kg
- sodium hydroxide, without water, in 50% solution state: 0.00699886 kg; lognormal variance with pedigree 0.0507, pedigree (1,3,5,3,1)
  (same comment as for natural gas, high pressure)
  properties: wet mass 1 kg, dry mass 1 kg
- quicklime, milled, loose: 0.00659892 kg; lognormal variance with pedigree 0.0507, pedigree (1,3,5,3,1)
  EcoSpold01Location=CH
  Data from swedish producers, examined for a Swiss LCA study
  Uncertainty: data from swedish producers, examined for a Swiss LCA study
  properties: water content 0.010101, dry mass 0.99 kg, wet mass 1 kg
- pulp factory: 4.99919e-11 unit; lognormal variance with pedigree 0.448, pedigree (4,5,5,5,5)
  Own estimation
  EcoSpold01Location=RER
  Uncertainty: own estimation
- lime: 0.00299951 kg; lognormal variance with pedigree 0.0507, pedigree (1,3,5,3,1)
  Data from swedish producers, examined for a Swiss LCA study
  EcoSpold01Location=CH
  Uncertainty: data from swedish producers, examined for a Swiss LCA study
  properties: carbon content, fossil 0.120005, dry mass 1 kg, wet mass 1 kg
- wood ash mixture, pure: -0.00178971 kg; lognormal variance with pedigree 0.0413, pedigree (2,3,5,3,1)
  (same comment as for waste wood, untreated)
  production volume 1 kg
    (same comment as for waste wood, untreated)
  properties: wet mass 1 kg, carbon content, non-fossil 0.012, dry mass 1 kg
- sodium sulfate, anhydrite: 0.00419932 kg; lognormal variance with pedigree 0.0507, pedigree (1,3,5,3,1)
  (same comment as for natural gas, high pressure)
  properties: dry mass 1 kg, wet mass 1 kg
- green liquor dregs: -0.00725882 kg; lognormal variance with pedigree 0.0413, pedigree (2,3,5,3,1)
  (same comment as for scrap steel)
  production volume 1 kg
    (same comment as for waste wood, untreated)
  properties: water content 0.333333, carbon content, non-fossil 0.390667, wet mass 1 kg, dry mass 0.75 kg
  note on carbon content, non-fossil: Tab 6.25, ecoinvent v2.2 report 11_III & Tab A.9, ecoinvent v2.2 report 13_I
- waste graphical paper: -0.000231962 kg; lognormal variance with pedigree 0.0413, pedigree (2,3,5,3,1)
  (same comment as for scrap steel)
  production volume 1 kg
    (same comment as for waste wood, untreated)
  properties: wet mass 1 kg, carbon content, non-fossil 0.454955, dry mass 0.888 kg, water content 0.126126

## Inputs from nature
- Water, unspecified natural origin [natural resource, in water]: 0.0274955 m3; name water_UNO_input; source Fibria 2010; lognormal variance with pedigree 0.052625, pedigree (3,3,5,2,1)
  Estimation, based on data from bleached pulp
  Calculated based on literature (Fibria, 2010, Sustainability Report_pulp from eucalyptus; Byers, W., 2003, Industrial Water Management), (Vionnet, S., Quantis Water Database - Technical Report, 2012). It includes the main processes: wood washing and screening, evaporation, recausticizing and pulp dryer.
  Uncertainty: estimation, based on data from bleached pulp
- Water, cooling, unspecified natural origin [natural resource, in water]: 0.0174971 m3; name water_cooling_UNO_input; source Fibria 2010; lognormal variance with pedigree 0.0527, pedigree (2,4,5,3,1)
  (same comment as for Water, unspecified natural origin)

## Emissions to nature
- Thorium-228 [air, urban air close to ground]: 1.37978e-6 kBq; lognormal variance with pedigree 0.4386, pedigree (2,5,5,1,4)
  Estimation, based on industrial heating modules of energy carriers used
  Uncertainty: estimation, based on industrial heating modules of energy carriers used
- Methane, fossil [air, urban air close to ground]: 5.14916e-6 kg; lognormal variance with pedigree 0.1786, pedigree (2,5,5,1,4)
  (same comment as for Thorium-228)
- Cobalt [air, urban air close to ground]: 2.90953e-8 kg; lognormal variance with pedigree 0.7786, pedigree (2,5,5,1,4)
  (same comment as for Thorium-228)
- Molybdenum [air, urban air close to ground]: 1.48976e-8 kg; lognormal variance with pedigree 0.7786, pedigree (2,5,5,1,4)
  (same comment as for Thorium-228)
- Iron [air, urban air close to ground]: 1.25979e-6 kg; lognormal variance with pedigree 0.7786, pedigree (2,5,5,1,4)
  (same comment as for Thorium-228)
- Lead [air, urban air close to ground]: 1.03983e-7 kg; lognormal variance with pedigree 0.7786, pedigree (2,5,5,1,4)
  (same comment as for Thorium-228)
- Methanol [air, urban air close to ground]: 4.36929e-7 kg; lognormal variance with pedigree 0.1786, pedigree (2,5,5,1,4)
  (same comment as for Thorium-228)
- TOC, Total Organic Carbon [water, surface water]: 0.00381419 kg; lognormal variance with pedigree 0.0813, pedigree (2,3,5,3,1)
  Calculated by default as TOC (gC) = COD/2.7 (COD measured in g O2). Should more correctly be calculated from the carbon content of the specified emissions to water.
  Uncertainty: average from SE-EPA report and from swedish producers
- Hydrocarbons, aliphatic, unsaturated [air, urban air close to ground]: 4.58925e-6 kg; lognormal variance with pedigree 0.1786, pedigree (2,5,5,1,4)
  (same comment as for Thorium-228)
- Magnesium [air, urban air close to ground]: 1.46976e-6 kg; lognormal variance with pedigree 0.7786, pedigree (2,5,5,1,4)
  (same comment as for Thorium-228)
- Mercury [air, urban air close to ground]: 1.29979e-9 kg; lognormal variance with pedigree 0.7786, pedigree (2,5,5,1,4)
  (same comment as for Thorium-228)
- Carbon dioxide, non-fossil [air, urban air close to ground]: 0.135978 kg; lognormal variance with pedigree 0.1386, pedigree (2,5,5,1,4)
  (same comment as for Thorium-228)
- Methane, non-fossil [air, urban air close to ground]: 5.72907e-7 kg; lognormal variance with pedigree 0.1786, pedigree (2,5,5,1,4)
  (same comment as for Thorium-228)
- BOD5, Biological Oxygen Demand [water, surface water]: 0.00203967 kg; lognormal variance with pedigree 0.0813, pedigree (2,3,5,3,1)
  Average from SE-EPA report and from swedish producers
  Uncertainty: average from SE-EPA report and from swedish producers
- Chlorine [air, urban air close to ground]: 2.57958e-7 kg; lognormal variance with pedigree 0.4386, pedigree (2,5,5,1,4)
  (same comment as for Thorium-228)
- Vanadium [air, urban air close to ground]: 2.23963e-6 kg; lognormal variance with pedigree 0.7786, pedigree (2,5,5,1,4)
  (same comment as for Thorium-228)
- Particulates, < 2.5 um [air, urban air close to ground]: 0.00107982 kg; lognormal variance with pedigree 0.3413, pedigree (2,3,5,3,1)
  (same comment as for BOD5, Biological Oxygen Demand)
- Pentane [air, urban air close to ground]: 1.45976e-8 kg; lognormal variance with pedigree 0.1786, pedigree (2,5,5,1,4)
  (same comment as for Thorium-228)
- Chromium [air, urban air close to ground]: 2.48959e-8 kg; lognormal variance with pedigree 0.7786, pedigree (2,5,5,1,4)
  (same comment as for Thorium-228)
- Uranium-238 [air, urban air close to ground]: 2.50959e-6 kBq; lognormal variance with pedigree 0.4386, pedigree (2,5,5,1,4)
  (same comment as for Thorium-228)
- Thorium [air, urban air close to ground]: 4.76922e-10 kg; lognormal variance with pedigree 0.7786, pedigree (2,5,5,1,4)
  (same comment as for Thorium-228)
- Xylene [air, urban air close to ground]: 2.50959e-8 kg; lognormal variance with pedigree 0.1786, pedigree (2,5,5,1,4)
  (same comment as for Thorium-228)
- Propene [air, urban air close to ground]: 1.25979e-7 kg; lognormal variance with pedigree 0.1786, pedigree (2,5,5,1,4)
  (same comment as for Thorium-228)
- Carbon monoxide, non-fossil [air, urban air close to ground]: 6.87888e-5 kg; lognormal variance with pedigree 0.7786, pedigree (2,5,5,1,4)
  (same comment as for Thorium-228)
- Ethene [air, urban air close to ground]: 7.52877e-7 kg; lognormal variance with pedigree 0.7786, pedigree (2,5,5,1,4)
  (same comment as for Thorium-228)
- m-Xylene [air, urban air close to ground]: 1.71972e-7 kg; lognormal variance with pedigree 0.1786, pedigree (2,5,5,1,4)
  (same comment as for Thorium-228)
- Hydrogen fluoride [air, urban air close to ground]: 4.39928e-7 kg; lognormal variance with pedigree 0.1786, pedigree (2,5,5,1,4)
  (same comment as for Thorium-228)
- Boron [air, urban air close to ground]: 1.18981e-7 kg; lognormal variance with pedigree 0.7786, pedigree (2,5,5,1,4)
  (same comment as for Thorium-228)
- Hydrocarbons, aromatic [air, urban air close to ground]: 1.29979e-7 kg; lognormal variance with pedigree 0.1786, pedigree (2,5,5,1,4)
  (same comment as for Thorium-228)
- Benzene, ethyl- [air, urban air close to ground]: 4.2993e-8 kg; lognormal variance with pedigree 0.1786, pedigree (2,5,5,1,4)
  (same comment as for Thorium-228)
- Selenium [air, urban air close to ground]: 1.26979e-8 kg; lognormal variance with pedigree 0.7786, pedigree (2,5,5,1,4)
  (same comment as for Thorium-228)
- Iodine [air, urban air close to ground]: 2.85953e-9 kg; lognormal variance with pedigree 0.1786, pedigree (2,5,5,1,4)
  (same comment as for Thorium-228)
- Particulates, > 2.5 um, and < 10um [air, urban air close to ground]: 0.000116981 kg; lognormal variance with pedigree 0.1613, pedigree (2,3,5,3,1)
  (same comment as for BOD5, Biological Oxygen Demand)
- Silicon [air, urban air close to ground]: 3.96935e-6 kg; lognormal variance with pedigree 0.7786, pedigree (2,5,5,1,4)
  (same comment as for Thorium-228)
- Sulfur dioxide [air, urban air close to ground]: 0.0011998 kg; lognormal variance with pedigree 0.0413, pedigree (2,3,5,3,1)
  (same comment as for BOD5, Biological Oxygen Demand)
- Acetaldehyde [air, urban air close to ground]: 2.15965e-7 kg; lognormal variance with pedigree 0.1786, pedigree (2,5,5,1,4)
  (same comment as for Thorium-228)
- Potassium [air, urban air close to ground]: 3.38945e-5 kg; lognormal variance with pedigree 0.7786, pedigree (2,5,5,1,4)
  (same comment as for Thorium-228)
- Arsenic [air, urban air close to ground]: 1.88969e-8 kg; lognormal variance with pedigree 0.1786, pedigree (2,5,5,1,4)
  (same comment as for Thorium-228)
- Chromium VI [air, urban air close to ground]: 8.92854e-10 kg; lognormal variance with pedigree 0.7786, pedigree (2,5,5,1,4)
  (same comment as for Thorium-228)
- Acetic acid [air, urban air close to ground]: 5.13916e-7 kg; lognormal variance with pedigree 0.1786, pedigree (2,5,5,1,4)
  (same comment as for Thorium-228)
- Beryllium [air, urban air close to ground]: 3.15949e-10 kg; lognormal variance with pedigree 0.7786, pedigree (2,5,5,1,4)
  (same comment as for Thorium-228)
- Nickel [air, urban air close to ground]: 5.69907e-7 kg; lognormal variance with pedigree 0.7786, pedigree (2,5,5,1,4)
  (same comment as for Thorium-228)
- Benzene [air, urban air close to ground]: 1.42977e-6 kg; lognormal variance with pedigree 0.1786, pedigree (2,5,5,1,4)
  (same comment as for Thorium-228)
- Phenol, pentachloro- [air, urban air close to ground]: 1.15981e-11 kg; lognormal variance with pedigree 0.1786, pedigree (2,5,5,1,4)
  (same comment as for Thorium-228)
- Ethyne [air, urban air close to ground]: 1.25979e-7 kg; lognormal variance with pedigree 0.1786, pedigree (2,5,5,1,4)
  (same comment as for Thorium-228)
- Radium-226 [air, urban air close to ground]: 3.00951e-6 kBq; lognormal variance with pedigree 0.4386, pedigree (2,5,5,1,4)
  (same comment as for Thorium-228)
- Dinitrogen monoxide [air, urban air close to ground]: 5.23915e-6 kg; lognormal variance with pedigree 0.1786, pedigree (2,5,5,1,4)
  (same comment as for Thorium-228)
- Ammonia [air, urban air close to ground]: 2.49959e-6 kg; lognormal variance with pedigree 0.1786, pedigree (2,5,5,1,4)
  (same comment as for Thorium-228)
- Fluorine [air, urban air close to ground]: 7.16883e-8 kg; lognormal variance with pedigree 0.1786, pedigree (2,5,5,1,4)
  (same comment as for Thorium-228)
- Calcium [air, urban air close to ground]: 8.76857e-6 kg; lognormal variance with pedigree 0.4386, pedigree (2,5,5,1,4)
  (same comment as for Thorium-228)
- COD, Chemical Oxygen Demand [water, surface water]: 0.0102983 kg; lognormal variance with pedigree 0.0813, pedigree (2,3,5,3,1)
  (same comment as for BOD5, Biological Oxygen Demand)
- Toluene [air, urban air close to ground]: 4.82921e-7 kg; lognormal variance with pedigree 0.1786, pedigree (2,5,5,1,4)
  (same comment as for Thorium-228)
- Thorium-232 [air, urban air close to ground]: 8.78857e-7 kBq; lognormal variance with pedigree 0.4386, pedigree (2,5,5,1,4)
  (same comment as for Thorium-228)
- Radium-228 [air, urban air close to ground]: 1.62973e-5 kBq; lognormal variance with pedigree 0.4386, pedigree (2,5,5,1,4)
  (same comment as for Thorium-228)
- Hydrogen sulfide [air, urban air close to ground]: 2.59958e-5 kg; lognormal variance with pedigree 0.0413, pedigree (2,3,5,3,1)
  (same comment as for BOD5, Biological Oxygen Demand)
- Carbon dioxide, fossil [air, urban air close to ground]: 0.0944846 kg; lognormal variance with pedigree 0.1386, pedigree (2,5,5,1,4)
  (same comment as for Thorium-228)
- Carbon monoxide, fossil [air, urban air close to ground]: 3.13949e-5 kg; lognormal variance with pedigree 0.7786, pedigree (2,5,5,1,4)
  (same comment as for Thorium-228)
- Tin [air, urban air close to ground]: 1.58974e-10 kg; lognormal variance with pedigree 0.7786, pedigree (2,5,5,1,4)
  (same comment as for Thorium-228)
- Cadmium [air, urban air close to ground]: 2.96952e-8 kg; lognormal variance with pedigree 0.7786, pedigree (2,5,5,1,4)
  (same comment as for Thorium-228)
- Propane [air, urban air close to ground]: 2.77955e-7 kg; lognormal variance with pedigree 0.1786, pedigree (2,5,5,1,4)
  (same comment as for Thorium-228)
- Radon-220 [air, urban air close to ground]: 2.50959e-7 kBq; lognormal variance with pedigree 0.4386, pedigree (2,5,5,1,4)
  (same comment as for Thorium-228)
- Lead-210 [air, urban air close to ground]: 1.16981e-5 kBq; lognormal variance with pedigree 0.4386, pedigree (2,5,5,1,4)
  (same comment as for Thorium-228)
- Bromine [air, urban air close to ground]: 8.83856e-8 kg; lognormal variance with pedigree 0.1786, pedigree (2,5,5,1,4)
  (same comment as for Thorium-228)
- Sodium [air, urban air close to ground]: 2.65957e-6 kg; lognormal variance with pedigree 0.7786, pedigree (2,5,5,1,4)
  (same comment as for Thorium-228)
- Zinc [air, urban air close to ground]: 5.08917e-7 kg; lognormal variance with pedigree 0.7786, pedigree (2,5,5,1,4)
  (same comment as for Thorium-228)
- Potassium-40 [air, urban air close to ground]: 3.38945e-6 kBq; lognormal variance with pedigree 0.4386, pedigree (2,5,5,1,4)
  (same comment as for Thorium-228)
- Nitrogen [water, surface water]: 0.000219964 kg; lognormal variance with pedigree 0.0813, pedigree (2,3,5,3,1)
  (same comment as for BOD5, Biological Oxygen Demand)
- Phosphorus [water, surface water]: 1.99967e-5 kg; lognormal variance with pedigree 0.0813, pedigree (2,3,5,3,1)
  (same comment as for BOD5, Biological Oxygen Demand)
- Antimony [air, urban air close to ground]: 3.96935e-10 kg; lognormal variance with pedigree 0.1786, pedigree (2,5,5,1,4)
  (same comment as for Thorium-228)
- Phosphorus [air, urban air close to ground]: 4.45927e-7 kg; lognormal variance with pedigree 0.1786, pedigree (2,5,5,1,4)
  (same comment as for Thorium-228)
- Uranium [air, urban air close to ground]: 6.34897e-10 kg; lognormal variance with pedigree 0.7786, pedigree (2,5,5,1,4)
  (same comment as for Thorium-228)
- Dioxins, measured as 2,3,7,8-tetrachlorodibenzo-p-dioxin [air, urban air close to ground]: 5.06917e-12 kg; lognormal variance with pedigree 0.1786, pedigree (2,5,5,1,4)
  (same comment as for Thorium-228)
- Manganese [air, urban air close to ground]: 2.48959e-7 kg; lognormal variance with pedigree 0.7786, pedigree (2,5,5,1,4)
  (same comment as for Thorium-228)
- Benzene, hexachloro- [air, urban air close to ground]: 1.02983e-14 kg; lognormal variance with pedigree 0.1786, pedigree (2,5,5,1,4)
  (same comment as for Thorium-228)
- Thallium [air, urban air close to ground]: 3.96935e-10 kg; lognormal variance with pedigree 0.7786, pedigree (2,5,5,1,4)
  (same comment as for Thorium-228)
- Benzo(a)pyrene [air, urban air close to ground]: 7.44879e-10 kg; lognormal variance with pedigree 0.1786, pedigree (2,5,5,1,4)
  (same comment as for Thorium-228)
- PAH, polycyclic aromatic hydrocarbons [air, urban air close to ground]: 1.64973e-8 kg; lognormal variance with pedigree 0.1786, pedigree (2,5,5,1,4)
  (same comment as for Thorium-228)
- Propionic acid [air, urban air close to ground]: 2.17964e-11 kg; lognormal variance with pedigree 0.1786, pedigree (2,5,5,1,4)
  (same comment as for Thorium-228)
- Barium [air, urban air close to ground]: 3.15949e-8 kg; lognormal variance with pedigree 0.7786, pedigree (2,5,5,1,4)
  (same comment as for Thorium-228)
- Particulates, > 10 um [air, urban air close to ground]: 0.000103983 kg; lognormal variance with pedigree 0.0813, pedigree (2,3,5,3,1)
  (same comment as for BOD5, Biological Oxygen Demand)
- Radon-222 [air, urban air close to ground]: 2.50959e-7 kBq; lognormal variance with pedigree 0.4386, pedigree (2,5,5,1,4)
  (same comment as for Thorium-228)
- Acetone [air, urban air close to ground]: 1.28979e-7 kg; lognormal variance with pedigree 0.1786, pedigree (2,5,5,1,4)
  (same comment as for Thorium-228)
- NMVOC, non-methane volatile organic compounds, unspecified origin [air, urban air close to ground]: 1.28979e-6 kg; lognormal variance with pedigree 0.1786, pedigree (2,5,5,1,4)
  (same comment as for Thorium-228)
- Ethane [air, urban air close to ground]: 3.76939e-7 kg; lognormal variance with pedigree 0.1786, pedigree (2,5,5,1,4)
  (same comment as for Thorium-228)
- Copper [air, urban air close to ground]: 1.2198e-7 kg; lognormal variance with pedigree 0.7786, pedigree (2,5,5,1,4)
  (same comment as for Thorium-228)
- Scandium [air, urban air close to ground]: 3.15949e-10 kg; lognormal variance with pedigree 0.7786, pedigree (2,5,5,1,4)
  (same comment as for Thorium-228)
- DOC, Dissolved Organic Carbon [water, surface water]: 0.00381419 kg; lognormal variance with pedigree 0.0813, pedigree (2,3,5,3,1)
  Calculated as equal to TOC.
  Uncertainty: average from SE-EPA report and from swedish producers
- Polonium-210 [air, urban air close to ground]: 2.12965e-5 kBq; lognormal variance with pedigree 0.4386, pedigree (2,5,5,1,4)
  (same comment as for Thorium-228)
- Aluminium [air, urban air close to ground]: 2.68956e-6 kg; lognormal variance with pedigree 0.1786, pedigree (2,5,5,1,4)
  (same comment as for Thorium-228)
- Hydrocarbons, aliphatic, alkanes, unspecified [air, urban air close to ground]: 1.96968e-6 kg; lognormal variance with pedigree 0.1786, pedigree (2,5,5,1,4)
  (same comment as for Thorium-228)
- Butane [air, urban air close to ground]: 2.07966e-8 kg; lognormal variance with pedigree 0.4386, pedigree (2,5,5,1,4)
  (same comment as for Thorium-228)
- Formaldehyde [air, urban air close to ground]: 6.48894e-7 kg; lognormal variance with pedigree 0.1786, pedigree (2,5,5,1,4)
  (same comment as for Thorium-228)
- Ethanol [air, urban air close to ground]: 2.56958e-7 kg; lognormal variance with pedigree 0.1786, pedigree (2,5,5,1,4)
  (same comment as for Thorium-228)
- Suspended solids, unspecified [water, surface water]: 0.0012298 kg; lognormal variance with pedigree 0.0813, pedigree (2,3,5,3,1)
  (same comment as for BOD5, Biological Oxygen Demand)
- Water [air, unspecified]: 0.013157 m3; name water_to_air_unspecified; = (water_cooling_UNO_input*fraction_CW_to_air)+(water_UNO_input*fraction_PW_to_air); lognormal variance with pedigree 0.0807, pedigree (2,2,5,1,1)
  Calculated value based on literature values and expert opinion. See comments in the parametres' comment field.
  property fraction, origin: fresh water 0; name fraction_origin_fresh_water
  property fraction, origin: unspecified 1; name fraction_origin_unspecified
  property fraction, origin: salt water 0; name fraction_origin_salt_water
- Titanium [air, urban air close to ground]: 9.51845e-8 kg; lognormal variance with pedigree 0.7786, pedigree (2,5,5,1,4)
  (same comment as for Thorium-228)
- Nitrogen oxides [air, urban air close to ground]: 0.00139977 kg; lognormal variance with pedigree 0.0413, pedigree (2,3,5,3,1)
  (same comment as for BOD5, Biological Oxygen Demand)
- Hydrogen chloride [air, urban air close to ground]: 1.13981e-5 kg; lognormal variance with pedigree 0.1786, pedigree (2,5,5,1,4)
  (same comment as for Thorium-228)
- Strontium [air, urban air close to ground]: 4.76922e-8 kg; lognormal variance with pedigree 0.7786, pedigree (2,5,5,1,4)
  (same comment as for Thorium-228)
- Water [water, unspecified]: 0.0318357 m3; name water_to_water_unspecified; = water_cooling_UNO_input*(1-fraction_CW_to_air)+water_UNO_input*(1-fraction_PW_to_air); lognormal variance with pedigree 0.0807, pedigree (2,2,5,1,1)
  (same comment as for Water)
  property fraction, origin: unspecified 1; name fraction_origin_unspecified_Ww
  property fraction, origin: salt water 0; name fraction_origin_salt_water_Ww
  property fraction, origin: fresh water 0; name fraction_origin_fresh_water_Ww
