# potato seed production, organic, for setting

Dataset: EcoSpold 2, unit process
Geography: CH
Time period: 1999-01-01 to 2019-12-31
Technology level: current
Classification: ISIC rev.4 ecoinvent: 0164:Seed processing for propagation
Classification: EcoSpold01Categories: agricultural means of production/seed
Tags: ConvertedDataset
Scenario: Business-as-Usual
System model: Allocation at the point of substitution
Share of production covered: 71 %
Generated by: Thomas Nemecek
Published in: Nemecek, T. 2007
Database: ecoinvent
isCopyrightProtected: true
accessRestrictedTo: 1

## General comment
Refers to 1 kg of potato seed (fresh weight), with an average dry matter content of 22%
[This dataset was already contained in the ecoinvent database version 2. It was not individually updated during the transfer to ecoinvent version 3. Life Cycle Impact Assessment results may still have changed, as they are affected by changes in the supply chain, i.e. in other datasets. This dataset was generated following the ecoinvent quality guidelines for version 2. It may have been subject to central changes described in the ecoinvent version 3 change report (http://www.ecoinvent.org/database/ecoinvent-version-3/reports-of-changes/), and the results of the central updates were reviewed extensively. The changes added e.g. consistent water flows and other information throughout the database. The documentation of this dataset can be found in the ecoinvent reports of version 2, which are still available via the ecoinvent website. The change report linked above covers all central changes that were made during the conversion process.]

## Included activities end
The seed produced at the farm is transported to the processing centre, treated (pre-cleaning, cleaning, eventually drying, chemical dressing (for integrated production) and bag filling), stored and afterwards transported to the regional storage centre. No data on wastewater production were available.

## Technology
Refers to average seed processing

## Time period
Date of the major data sources.

## Reference product
- potato seed, organic, for setting: 1 kg; CPC 01260: Vegetable seeds, except beet seeds; By-product classification allocatable product
  EcoSpold01Location=CH
  production volume 1.21206e6 kg
    Consumption of potato seed in Switzerland is 61'450 t/year, 8% imported
    0.11 kg per kg potato yield (2520 kg/ha)
  property price 0.0354843 EUR2005
    Calculated based on inputs: The price of the product has been calculated as a sum of the values of the material and energy inputs for this product. This value is therefore a rough estimation. It may underestimate the real price since there are additional expenses when producing any product. These expences can include for example labour costs, treatment of waste materials and profit for the producer. Please consider carefully whether this level of data quality is acceptable for your application.
  property carbon content, non-fossil 0.4282
    For potato, seeds are tubers (Tab 1.14, ecoinvent v2.2 report 15b). Composition data obtained from Potatoes, raw, skin, in (http://www.nal.usda.gov/fnic/foodcomp/search/). First, composition data were refered to 1 kg dry mass. Then, C-contents were calculated considering a C-content/dry mass of 46% in carbohydrates (including fibres), 53% in proteins and 75% in fats. All data from "Evolutionary and Biochemical Aspects", A.D. Kay and T. Vrede (in Global Ecology, 2010, Elsevier B.V., S.E. Jørgensen Ed.).
  property carbon content 0.4282
    carbon content on a dry matter basis (reserved; not for manual entry)
  properties: dry mass 0.22 kg, water content 3.54545, water in wet mass 0.78 kg, carbon content, fossil 0, wet mass 1 kg, carbon allocation 0.0942039 kg

## Inputs from technosphere
- building, multi-storey: 4e-5 m3; lognormal variance with pedigree 0.410625, pedigree (5,3,5,2,1)
  EcoSpold01Location=RER
  activityLink introduced to establish a direct link to the corresponding regional supply of this product
- electricity, low voltage: 0.073 kWh; lognormal variance with pedigree 0.1226, pedigree (5,3,5,5,1)
  EcoSpold01Location=CH
- potato seed, organic, at farm: 1 kg; lognormal variance with pedigree 0.04, pedigree (1,1,5,1,1)
  EcoSpold01Location=CH
  properties: dry mass 0.2 kg, carbon content, non-fossil 0.4282, wet mass 1 kg, water content 4
  note on carbon content, non-fossil: For potato, seeds are tubers (Tab 1.14, ecoinvent v2.2 report 15b). Composition data obtained from Potatoes, raw, skin, in (http://www.nal.usda.gov/fnic/foodcomp/search/). First, composition data were refered to 1 kg dry mass. Then, C-contents were calculated considering a C-content/dry mass of 46% in carbohydrates (including fibres), 53% in proteins and 75% in fats. All data from "Evolutionary and Biochemical Aspects", A.D. Kay and T. Vrede (in Global Ecology, 2010, Elsevier B.V., S.E. Jørgensen Ed.).

## Inputs from nature
- Occupation, construction site [natural resource, land]: 1.6e-5 m2*year; lognormal variance with pedigree 0.160625, pedigree (5,3,5,2,1)
- Transformation, from unspecified [natural resource, land]: 8e-6 m2; lognormal variance with pedigree 0.220625, pedigree (5,3,5,2,1)
- Transformation, to industrial area [natural resource, land]: 8e-6 m2; lognormal variance with pedigree 0.220625, pedigree (5,3,5,2,1)
- Occupation, industrial area [natural resource, land]: 0.0004 m2*year; lognormal variance with pedigree 0.160625, pedigree (5,3,5,2,1)

## Sampling procedure
Data based on a literature, expert information and enquiry of seed processing plants.

## Extrapolations
This dataset has been extrapolated from year 2002 to the year of the calculation (2019). The uncertainty has been adjusted accordingly.

## Review by Roland Hischier 2003-06-03
Passed.
