# tantalum production, powder, capacitor-grade

Dataset: EcoSpold 2, unit process
Geography: GLO
Time period: 2000-01-01 to 2019-12-31
Technology level: current
Classification: ISIC rev.4 ecoinvent: 2011:Manufacture of basic chemicals
Classification: EcoSpold01Categories: metals/extraction
Synonyms: tantalium
Tags: ConvertedDataset
Scenario: Business-as-Usual
System model: Allocation at the point of substitution
Share of production covered: 0.8 %
Generated by: Mischa Classen
Published in: Classen M. 2009
Database: ecoinvent
isCopyrightProtected: true
accessRestrictedTo: 1

## General comment
This dataset is functional for the use of tantalum as powder in capacitors of port-able electronic devices. It is not valid for the use as an alloying element in steel. Only primary production from tantalite / pegmatite ore is considered. Tantalum as by-product from tin production is not considered.
[This dataset was already contained in the ecoinvent database version 2. It was not individually updated during the transfer to ecoinvent version 3. Life Cycle Impact Assessment results may still have changed, as they are affected by changes in the supply chain, i.e. in other datasets. This dataset was generated following the ecoinvent quality guidelines for version 2. It may have been subject to central changes described in the ecoinvent version 3 change report (http://www.ecoinvent.org/database/ecoinvent-version-3/reports-of-changes/), and the results of the central updates were reviewed extensively. The changes added e.g. consistent water flows and other information throughout the database. The documentation of this dataset can be found in the ecoinvent reports of version 2, which are still available via the ecoinvent website. The change report linked above covers all central changes that were made during the conversion process.]

## Included activities end
Includes the mining of tantalite, its transport to the metallurgical plant, purification and reduction steps. Infrastructure is assessed on related metallurgical and mining operations

## Technology
Open pit mining and beneficiation at Wodgina and Greenbushes in Australia, re-duction from pentoxide at HC Starck, Germany. Relates to state of the art technology, where purified Ta2O5 powder is reduced by magnesium vapour in a rotary kiln or a multiple hearth furnace. Production from secondary materials such as post consumer scrap is disregarded, as is the by product tantalum from tin production.

## Parameters
- fraction, process water, to air: 0.15 dimensionless; name fraction_PW_to_air; lognormal variance with pedigree 0.092025, pedigree (4,4,3,2,4)
  Literature value. In case when no industry/process specific data are available, default evaporation fraction value is used. This value is 15% and is based on literature (Statistics Canada, 2007 & Shaffer, K.H., 2008, Consumptive water use in the Great Lakes Basin, USGS & Shiklomanov, 2003, World Water Resources at the Beginning of the 21st Century) and has been approved by an expert.
- fraction, water, ultrapure, to air: 0.15; name fraction_WUP_to_air; = fraction_PW_to_air; lognormal variance with pedigree 0.092025, pedigree (4,4,3,2,4)
  Calculated value. See comment in the other parametres present in this dataset. Ultrapure water is considered to be always used as process water, thus process water fractions to air are applied to all ultrapure water input flows to calculate the amount of water consumed in the processes.

## Reference product
- tantalum, powder, capacitor-grade: 1 kg; CPC 34231: Chemical elements n.e.c.; inorganic acids except phosphoric, nitric and sulphonitric; inorganic oxygen compoun[…]; By-product classification allocatable product
  EcoSpold01Location=GLO
  production volume 1 kg
    1045.2 t per year
    Dummy value to be replaced by measured, estimated or calculated value
  property price 290 EUR2005
    Calculated value based on data from United Nations Commodity Trade Statistics Database (comtrade.un.org). UN comtrade category: 810320 Unwrought tantalum, incl. Bars & rods obt. simply by sintering; powders. Year 2005. Using exchange rate of 1EURO = 1.209 USD. Average of price of import into 5 main markets (EU, US, JP, IN and CN).
  property carbon content 0
    carbon content on a dry matter basis (reserved; not for manual entry)
  properties: wet mass 1 kg, dry mass 1 kg, carbon content, non-fossil 0, water content 0, water in wet mass 0 kg, carbon content, fossil 0, carbon allocation 0 kg

## Inputs from technosphere
- heat, district or industrial, natural gas: 0.28044 MJ; lognormal variance with pedigree 0.208, pedigree (5,5,5,1,4)
  EcoSpold01Location=RER
- water, ultrapure: 0 kg; name water_ultrapure_input; pedigree (1,1,1,1,1)
  EcoSpold01Location=GLO
  properties: wet mass 1 kg
- hydrogen fluoride: 0 kg; pedigree (1,1,1,1,1)
  EcoSpold01Location=GLO
  properties: dry mass 1 kg, wet mass 1 kg
- diesel, burned in building machine: 1065.1 MJ; lognormal variance with pedigree 0.0407, pedigree (2,2,5,1,1)
  EcoSpold01Location=GLO
- chemical factory, organics: 4e-10 unit; lognormal variance with pedigree 0.508, pedigree (5,5,5,1,4)
  EcoSpold01Location=RER
- ammonia, liquid: 0 kg; pedigree (1,1,1,1,1)
  EcoSpold01Location=RER
  properties: wet mass 1 kg, dry mass 1 kg
- sulfuric acid: 0 kg; pedigree (1,1,1,1,1)
  EcoSpold01Location=RER
  mix
  properties: dry mass 1 kg, wet mass 1 kg
- argon, liquid: 0 kg; pedigree (1,1,1,1,1)
  EcoSpold01Location=RER
  properties: dry mass 1 kg, wet mass 1 kg
- mine infrastructure, open cast, non-ferrous metal: 2.5599e-7 unit; lognormal variance with pedigree 0.446, pedigree (5,5,5,1,3)
  EcoSpold01Location=GLO
- conveyor belt: 0.00068736 m; lognormal variance with pedigree 0.446, pedigree (5,5,5,1,3)
  EcoSpold01Location=RER
- magnesium: 0.3692 kg; lognormal variance with pedigree 0.076, pedigree (4,5,5,1,1)
  EcoSpold01Location=RER
  properties: wet mass 1 kg, dry mass 1 kg
- non-sulfidic tailing, off-site: -9079.1 kg; lognormal variance with pedigree 0.0407, pedigree (2,2,5,1,1)
  EcoSpold01Location=GLO
  production volume 9079.1 kg
    Calculated from the production volume of tantalum, powder, capacitor-grade in proportion to the respective output amounts.
  properties: dry mass 0.7 kg, wet mass 1 kg, water content 0.428571
- electricity, medium voltage: 200.53 kWh; lognormal variance with pedigree 0.0412, pedigree (2,3,5,1,1)
  EcoSpold01Location=UCTE
- water, ultrapure: 0.470594, 0.872978, 0.656428 kg (3 entries); lognormal variance with pedigree 0.076, pedigree (4,5,5,1,1)
  EcoSpold01Location=GLO
- hydrogen fluoride: 0.622633, 1.81937 kg (2 entries); lognormal variance with pedigree 0.0407, pedigree (2,2,5,1,1)
  EcoSpold01Location=GLO
- ammonia, liquid: 0.0876133, 0.767087 kg (2 entries); lognormal variance with pedigree 0.0407, pedigree (2,2,5,1,1)
  EcoSpold01Location=RER
- sulfuric acid: 0.988115, 5.67489 kg (2 entries); lognormal variance with pedigree 0.05, pedigree (1,1,5,1,1)
  EcoSpold01Location=RER
  mix
- argon, liquid: 0.015521, 0.07368 kg (2 entries); lognormal variance with pedigree 0.076, pedigree (4,5,5,1,1)
  EcoSpold01Location=RER

## Inputs from nature
- Transformation, from mineral extraction site [natural resource, land]: 0.71261 m2; lognormal variance with pedigree 0.1787, pedigree (2,2,5,1,3)
- Transformation, to unspecified [natural resource, land]: 0.71261 m2; lognormal variance with pedigree 0.1787, pedigree (2,2,5,1,3)
- Transformation, to mineral extraction site [natural resource, land]: 0.71261 m2; lognormal variance with pedigree 0.1787, pedigree (2,2,5,1,3)
- Water, river [natural resource, in water]: 6.6983 m3; name water_river_input; lognormal variance with pedigree 0.0407, pedigree (2,2,5,1,1)
- Tantalum, in ground [natural resource, in ground]: 1.7606 kg; lognormal variance with pedigree 0.0407, pedigree (2,2,5,1,1)
  81.9% Ta in tantalite; 1.6 ppm Ta in ore
- Occupation, mineral extraction site [natural resource, land]: 0.71261 m2*year; lognormal variance with pedigree 0.0987, pedigree (2,2,5,1,3)
- Transformation, from unspecified [natural resource, land]: 0.71261 m2; lognormal variance with pedigree 0.1787, pedigree (2,2,5,1,3)

## Emissions to nature
- Water [air, unspecified]: 1.00504 m3; name water_to_air_unspecified; = (water_ultrapure_input/1000*fraction_WUP_to_air)+(water_river_input*fraction_PW_to_air); lognormal variance with pedigree 0.0807, pedigree (2,2,5,1,1)
  Calculated value based on literature values and expert opinion. See comments in the parametres' comment field.
  property fraction, origin: unspecified 0; name fraction_origin_unspecified
  property fraction, origin: fresh water 1; name fraction_origin_fresh_water
  property fraction, origin: salt water 0; name fraction_origin_salt_water
- Particulates, > 10 um [air, non-urban air or from high stacks]: 0.46974 kg; lognormal variance with pedigree 0.368725, pedigree (2,2,5,2,3)
- Water [water, unspecified]: 5.69526 m3; name water_to_water_unspecified; = (water_ultrapure_input/1000)*(1-fraction_WUP_to_air)+water_river_input*(1-fraction_PW_to_air); lognormal variance with pedigree 0.0807, pedigree (2,2,5,1,1)
  (same comment as for Water)
  property fraction, origin: salt water 0; name fraction_origin_salt_water_Ww
  property fraction, origin: fresh water 1; name fraction_origin_fresh_water_Ww
  property fraction, origin: unspecified 0; name fraction_origin_unspecified_Ww
  property carbon content, non-fossil 0; name C_content_non_fossil
  property water in wet mass 1000 kg; name WWM
  property wet mass 1000 kg; name WM
  property carbon content, fossil 0; name C_content_fossil
  property dry mass 0 kg; name DM
- Particulates, > 2.5 um, and < 10um [air, non-urban air or from high stacks]: 0.40871 kg; lognormal variance with pedigree 0.108725, pedigree (2,2,5,2,3)
- Ammonia [air, non-urban air or from high stacks]: 0.0008547 kg; lognormal variance with pedigree 0.0807, pedigree (2,2,5,1,1)
- Particulates, < 2.5 um [air, non-urban air or from high stacks]: 0.045412 kg; lognormal variance with pedigree 0.178725, pedigree (2,2,5,2,3)

## Sampling procedure
Literature

## Extrapolations
This dataset has been extrapolated from year 2003 to the year of the calculation (2019). The uncertainty has been adjusted accordingly.

## Review by Roberto Dones 2007-08-22
Passed
