# soybean meal and crude oil production, mechanical extraction

Dataset: EcoSpold 2, unit process
Geography: CA-QC
Time period: 2010-01-01 to 2019-12-31
Technology level: current
Classification: ISIC rev.4 ecoinvent: 1040:Manufacture of vegetable and animal oils and fats
Synonyms: soybean hull; crude soy oil; extrusion extraction
Scenario: Business-as-Usual
System model: Allocation at the point of substitution
Generated by: Pierre-Olivier P.O.
Database: ecoinvent
isCopyrightProtected: true
accessRestrictedTo: 1

## General comment
This dataset represents the mechanical soybean processing into soybean meal and crude soy oil. This dataset is associated to a typically on farm location technology. If the user requires an industrial process, we suggest the “soybean meal and crude oil production” dataset which represents a different chemical extraction process
. In the mechanical extraction process, received soybeans are examined and damaged seeds are eliminated. The soybeans are then cracked into four to six particles by corrugated cracking rolls. The hulls are separated from the soybeans by aspiration. Dehulled soybeans are then extruded (a machine consisting of a screw rotating inside a barrel). The heat is generated by the extruder through friction allows for cooking, sterilizing, stabilizing, texturizing and dehydrating soybeans. Upon leaving the extruder, hot soybeans are conveyed into an expeller, a screw press, which squeezes the oil from soybeans. Expellers have generally an oil removal efficiency of about 65 to 67% (Riaz, 2005).

Riaz, M. N., Bailey’s Industrial Oil and Fat Products: Extrusion Processing of Oilseed Meals for Food and Feed Production. In John Wiley & Sons, Inc.: 2005; Vol. Sixth Edition, Six Volume Set

## Included activities start
arrival of the soybean

## Included activities end
This activity ends with the production of soymeal and crude soy oil. The dataset includes the transport of soybeans to the facility; the extraction process inputs (energy and soybeans) and outputs (discarded soybeans, crude soy oil, soy hull). This dataset doesn't include any infrastructures nor cleaning processes. It also doesn't consider the crude soy oil refining.
Grading and drying at a nearby elevator were also not considered as it was assumed that local extrusion extraction was a non-industrial process mostly done at the farm.

## Geography
Collected data for Quebec industries

## Technology
Current technology in Ontario and Quebec provinces

## Time period
Collected processing data for Quebec industries in 2012-13 period. Soybean production data comes from 2010 statistics

## Parameters
- mass discarded soybeans: 0.02 kg; name m_discarded; lognormal variance with pedigree 0.010025, pedigree (2,3,2,2,3)
  kg/kg soybean. based on the hypothesis from Dalgaard et al. (2008)
  Dalgaard, R.; Schmidt, J.; Halberg, N.; Christensen, P.; Thrane, M.; Pengue. W. A., 2008. LCA of Soybean Meal. International Journal of Life Cycle Assessment, 13, (3), 240-254.
- mass soy hull: 0.09 kg; name hull; lognormal variance with pedigree 0.003425, pedigree (3,3,2,2,1)
  kg/kg soybean; based on the value from Nutridense (2010)
  Nutridense. (2010). BASF Use Co-Products for Efficient, Cost-Effective Rations. http://www.nutridense.com/2010/08/11/use-co-products-for-efficient-cost-effective-rations/ (March 16, 2013)
- mass soymeal: 0.75 kg; name soymeal; lognormal variance with pedigree 0.003425, pedigree (3,3,2,2,1)
  kg/kg soybean; mass balance calculation according to the known protein content in the soybean and the full fat soybean meal (i.e. qty of soybeans * %protein in soybeans = qty of soybean meal * %protein in full fat soymeal)
- mass crude soy oil: 0.14 kg; name oil; lognormal variance with pedigree 0.003425, pedigree (3,3,2,2,1)
  kg/kg soybean; based on mass balance calculation according to the known oil content in the soybean and oil content in the full fat soybean meal (i.e. oil in soybean-oil in full fat soybean meal = crude oil)
- electricity input: 0.0625 kWh; name electricity; = 5/0.08/1000; lognormal variance with pedigree 0.003425, pedigree (3,3,2,2,1)
  kWh/kg soybean; calculated from Energrow data which provides both of the following informations: it costs 5 $ of electricity/ton soybean while the electricity rates in the province are equivalent to 0.08$ per kWh. Consequently, we can calculate the electricity required from the cost (5/0.08 kWh/ton). We then converte the result in kg instead of ton (1 ton =1000 kg)
- mass soybean: 1 kg; name bean; lognormal variance with pedigree 0.003425, pedigree (3,3,2,2,1)

## Reference product
- soybean meal: 1 kg; name meal; = soymeal/soymeal; source Canadian International Grains Institute  2010; By-product classification allocatable product; CPC 21920: Flours and meals of oil seeds or oleaginous fruits, except those of mustard
  see parameter
  production volume 4.54425e7 kg; name ref_pv; = 166*soymeal*365*1000
    Kg; 166 ton soybean/day * 365 day/yr *soymeal. From calculations based on the soybean exchanges in the province of Quebec (imports, production, exports, known processing) we evaluated that 166 ton of soybeans per day were processed with a mechanical extraction in the Quebec province.
  property price 0.528626 EUR2005; name meal_price_EUR2005
    Price provided by the activities data provider.
  property carbon content 0.481931
    carbon content on a dry matter basis (reserved; not for manual entry)
  property true value 0.528626; name meal_true_value
    allocation property applied in "true value" allocation // value calculated from revenue
  properties: carbon content, fossil 0, oil/fat content 0.07, wet mass 1 kg, protein content 0.42, digestable energy content 16.99 MJ/kg, dry mass 0.8281 kg, water in wet mass 0.1719 kg, carbon content, non-fossil 0.481931, carbon allocation 0.399087 kg

## By-products
- soybean oil, crude: 0 kg; name soyoil; = oil/soymeal; source Health Canada 2010; By-product classification allocatable product; CPC 21611: Soya bean oil, crude; CAS 8001-22-7; pedigree (1,1,1,1,1)
  see parameter
  Uncertainty: Calculated variable. Uncertainty will be determined from propagation of uncertainty factors of underlying variables. Uncertainty of actual relation between variables not accounted at this time, although this could be included in a future update
  production volume 8.4826e6 kg; = ref_pv*soyoil/meal
    Calculated from production volume of reference product using the relative outputs.
  property price 1.22147 EUR2005; name soyoil_price_EUR2005
    Price provided by the activities data provider.
  property carbon content 0.768
    carbon content on a dry matter basis (reserved; not for manual entry)
  property true value 0.228007; name soyoil_true_value
    allocation property applied in "true value" allocation // value calculated from revenue
  properties: protein content 0, oil/fat content 1, carbon content, non-fossil 0.768, digestable energy content 36.99 MJ/kg, dry mass 1 kg, carbon content, fossil 0, wet mass 1 kg, water in wet mass 0 kg, carbon allocation 0.768 kg
- protein feed, 100% crude: 0 kg; name hulls; = hull/soymeal; source Ohio State University 2013; By-product classification allocatable product; CPC 23319: Preparations used in animal feeding n.e.c.; pedigree (1,1,1,1,1)
  see parameter; hulls are typically used for its fibre content in animal feeds.
  Uncertainty: Calculated variable. Uncertainty will be determined from propagation of uncertainty factors of underlying variables. Uncertainty of actual relation between variables not accounted at this time, although this could be included in a future update
  production volume 5.4531e6 kg; = ref_pv*hulls/meal
    Calculated from production volume of reference product using the relative outputs.
  property price 0.424 EUR2005; name hulls_price_EUR2005
    Based on protein content and energy feed, gross content in soybean meal and prices per kg of soybean meal. Assumed soybean meal is the most used feed. Soybean meal 2004 prices for World import/export data (tonnes and US$) from FaoStat statistics (http://faostat.fao.org/site/535/default.aspx#ancor, TRADE)- [Accessed 24 May 2010]. See calculations for protein /energy content
  property carbon content 0.432
    carbon content on a dry matter basis (reserved; not for manual entry)
  property true value 0.05088; name hulls_true_value
    allocation property applied in "true value" allocation // value calculated from revenue
  properties: protein content 0.134, water in wet mass 0.091 kg, wet mass 1 kg, dry mass 0.9099 kg, digestable energy content 10.5 MJ/kg, carbon content, fossil 0, carbon content, non-fossil 0.432, oil/fat content 0.018, carbon allocation 0.393077 kg
- heat, for reuse in municipal waste incineration only: 0 MJ; CPC 17300: Steam and hot water; By-product classification allocatable product; pedigree (1,1,1,1,1)
  Net electricity generated from this waste and used in internal MSWI plant energy redistribution.
  Uncertainty: uncertainty is calculated from uncertainties in waste composition and uncertainties in energy efficiency and the uncertainty in internal energy demand
  production volume 401246 MJ
  property price 0.0106 EUR2005; name E_th_prod_MSWI_price_EUR2005
    Average European district heat price from Ecoheatcool and Euroheat 2005-2006, Ecoheat Work package 1: The European heat market. Final report. 10.6 EUR/GJ i s the price of district heat. http://www.solarthermalworld.org/files/Ecoheatcool%20WP1%20Web.pdf?download
  property exergy 0.1842 MJ; name E_th_prod_MSWI_exergy
    This exergy property is based on the exergy content of the product.
  property true value relation 0.1842; name E_th_prod_MSWI_true_value_relation
    property to calculate "true value" from
  property true value 6.02348e-5
    allocation property applied in "true value" allocation // value calculated from true value relation
- electricity, for reuse in municipal waste incineration only: 0 kWh; CPC 17100: Electrical energy; By-product classification allocatable product; pedigree (1,1,1,1,1)
  (same comment as for heat, for reuse in municipal waste incineration only)
  production volume 45491.1 kWh
  property true value relation 3.6; name E_el_prod_MSWI_true_value_relation
    property to calculate "true value" from
  property exergy 3.6 MJ; name E_el_prod_MSWI_exergy
    This exergy property is based on the exergy content of the product.
  property price 0.1 EUR2005; name E_el_prod_MSWI_price_EUR2005
    Estimated to be the same price as in case of electricity, medium voltage.
  property true value 0.000133467
    (same comment as for heat, for reuse in municipal waste incineration only)
- biogas: 0 m3; source Raboni, Massimo 2014; By-product classification allocatable product; CPC 17200: Coal gas, water gas, producer gas and similar gases, other than petroleum gases and other gaseous hydrocarbons; pedigree (1,1,1,1,1)
  An average yield of 100 litres of biogas per kg biowaste is assumed
  production volume 2944.56 m3
  property price 0.109 EUR2005; name biogas_yield_price_EUR2005
    Temporary price data. Calculated as 90% of purchasers price based on: Same prices per energy output as natural gas, based on the proportional lower heating value (2/3 that of natural gas)
  property carbon content, non-fossil 0.449939
    Total C content in kg/Nm3 (Tab 12.8, ecoinvent v2.2 report n17), referred to 1kg DM
  property carbon content 0.449939
    carbon content on a dry matter basis (reserved; not for manual entry)
  property true value 7.06292e-6
    allocation property applied in "true value" allocation // value calculated from revenue
  properties: water in wet mass 0 kg, wet mass 1.15 kg, carbon content, fossil 0, lower heating value 0 MJ/Nm3, water content 0, dry mass 1.15 kg, carbon allocation 0.51743 kg
- zinc concentrate: 0 kg; CPC 14290: Other non-ferrous metal ores and concentrates (other than uranium or thorium ores and concentrates); By-product classification allocatable product
  Calculated value from the knowledge of the properties of both products.
  production volume 0.116223 kg
  property price 0.38 EUR2005; name ByP_price_EUR2005
    Temporary price data. Calculated as 90% of purchasers price based on: Zinc content in concentrate 53%. Concentrate price per kg Zn 86.5% of refined Zn price (13.5% treatment charges according to CHR Metals Limited 2005: Dynamic cost curves. http://www.minecost.com/dynamic.pdf). 2004 zinc price from USGS (2007) Mineral commodity summaries 2007. <http://minerals.usgs.gov/minerals/pubs/mcs/2007/mcs2007.pdf> [Accessed 25 May 2010]
  property zinc content 0.53; name zinc_C_zinc_concentrate
    Zinc content on a dry matter basis. Value taken from teh "zinc mine operation" /GLO dataset.
  property dry mass 1 kg; name DM_zinc_concentrate
  property carbon content 0
    carbon content on a dry matter basis (reserved; not for manual entry)
  property true value 9.71879e-10
    allocation property applied in "true value" allocation // value calculated from revenue
  properties: wet mass 1 kg, water content 0, carbon content, non-fossil 0, carbon content, fossil 0, water in wet mass 0 kg, carbon allocation 0 kg
- compost: 0 kg; CPC 391: Wastes from food and tobacco industry; By-product classification allocatable product; pedigree (1,1,1,1,1)
  EcoSpold01Location=CH
  Biowaste is reduced in mass by a factor of 2 during composting
  production volume 234569 kg
  property water in wet mass 0.472 kg; name Water_in_wet_mass_compost; = 1- DM_compost
  property price 0.03 EUR2005
    Temporary price data. Calculated as 90% of purchasers price based on: Estimation done using the following sources: <http://www.wmaa.asn.au/uploads/documents/MarkWinser_1May2007.pdf>; <http://www.swlf.ait.ac.th/UpdData/International/Composting%20and%20anaerobic%20digestion_%20comparions%20for%20Europe%20and%20Asia.pdf>; <http://www.epa.gov/osw/conserve/rrr/composting/basic.htm>, accessed 2011.06.16
  property carbon content, non-fossil 0.1165
    calculation: dry matter 50%, organic matter 40% of dry matter, C content calculated from organic matter divided by 1.72. Relative to dry matter; relative to fresh matter: divided by 2 => 0.1156
  property dry mass 0.528 kg; name DM_compost
  property water content 0.893939; name Water_content_compost; = Water_in_wet_mass_compost/DM_compost
  property concentration, cadmium 0 kg/kg; name Mass_compost_concentration_Cd; = Mass_biowaste_concentration_Cd*2
    Biowaste mass is reduced by a factor of two during composting, therefore concentration is doubled
  property humus equivalent 0.061 kg
    Humus building fraction expressed in kg per kg product on a FM basis. Humus denotes the converted, primary biomass from plants or animals in the ground. More information can be found in the documentation of the composting itself: "treatment of biowaste, industrial composting".
  property concentration, copper 0 kg/kg; name Mass_compost_concentration_Cu; = Mass_biowaste_concentration_Cu*2
    (same comment as for compost)
  property concentration, calcium 0 kg/kg; name Mass_compost_Ca_concentration; = Mass_biowaste_concentration_Ca*2
    (same comment as for compost)
  property concentration, magnesium 0 kg/kg; name Mass_compost_Mg_concentration; = Mass_biowaste_concentration_Mg*2
    (same comment as for compost)
  property concentration, mercury 0 kg/kg; name Mass_compost_Hg_concentration; = Mass_biowaste_concentration_Hg*2
    (same comment as for compost)
  property concentration, lead 0 kg/kg; name Mass_compost_concentration_Pb; = Mass_biowaste_concentration_Pb*2
    (same comment as for compost)
  property concentration, nickel 0 kg/kg; name Mass_compost_Ni_concentration; = Mass_biowaste_concentration_Ni*2
    (same comment as for compost)
  property concentration, phosphorus 0 kg/kg; name Mass_compost_P_concentration; = Mass_biowaste_concentration_P*2
    (same comment as for compost)
  property concentration, sulfur 0 kg/kg; name Mass_compost_concentration_S; = Mass_biowaste_concentration_S*2
    (same comment as for compost)
  property concentration, potassium 0 kg/kg; name Mass_compost_K_concentration; = Mass_biowaste_concentration_K*2
    (same comment as for compost)
  property nickel content 1.60606e-5; name Mass_compost_Ni_content; = Mass_biowaste_Ni_content/0.5*( DM_biowaste / DM_compost)
    nickel content on a dry matter basis
  property concentration, nitrogen 0 kg/kg; = Mass_biowaste_concentration_N*2
    (same comment as for compost)
  property concentration, zinc 0 kg/kg; name Mass_compost_concentration_Zn; = Mass_biowaste_concentration_Zn*2
    (same comment as for compost)
  property lead content 2.66667e-5; name Mass_compost_Pb_content; = Mass_biowaste_Pb_content/0.5*( DM_biowaste / DM_compost)
    lead content on a dry matter basis
  property copper content 3.81818e-5; name Mass_compost_Cu_content; = Mass_biowaste_Cu_content/0.5*( DM_biowaste / DM_compost)
    copper content on a dry matter basis
  property cadmium content 2.89394e-7; name Mass_compost_Cd_content; = Mass_biowaste_Cd_content/0.5*( DM_biowaste / DM_compost)
    cadmium content on a dry matter basis
  property nitrogen content 0.0136364; name Mass_compost_N_content; = Mass_biowaste_N_content/0.5*( DM_biowaste / DM_compost)
    nitrogen content on a dry matter basis
  property magnesium content 0.00525758; name Mass_compost_Mg_content; = Mass_biowaste_Mg_content/0.5*( DM_biowaste / DM_compost)
    magnesium content on a dry matter basis
  property zinc content 0.000120303; name Mass_compost_Zn_content; = Mass_biowaste_Zn_content/0.5*( DM_biowaste / DM_compost)
    zinc content on a dry matter basis
  property potassium content 0.0099697; name Mass_compost_K_content; = Mass_biowaste_K_content/0.5*( DM_biowaste / DM_compost)
    potassium content on a dry matter basis
  property sulfur content 0.00190909; name Mass_compost_S_content; = Mass_biowaste_S_content/0.5*( DM_biowaste / DM_compost)
    sulfur content on a dry matter basis
  property calcium content 0.0504545; name Mass_compost_Ca_content; = Mass_biowaste_Ca_content/0.5*( DM_biowaste / DM_compost)
    calcium content on a dry matter basis
  property mercury content 1e-7; name Mass_compost_Hg_content; = Mass_biowaste_Hg_content/0.5*( DM_biowaste / DM_compost)
    mercury content on a dry matter basis
  property phosphorus content 0.00275758; name Mass_compost_P_content; = Mass_biowaste_P_content/0.5*( DM_biowaste / DM_compost)
    phosphorus content on a dry matter basis
  property carbon content 0.1165
    carbon content on a dry matter basis (reserved; not for manual entry)
  property true value 0.000154856
    allocation property applied in "true value" allocation // value calculated from revenue
  properties: carbon content, fossil 0, wet mass 1 kg, carbon allocation 0.061512 kg
- iron scrap, sorted, pressed: 0 kg; By-product classification Recyclable; CPC 39310: Slag, dross, scalings and other waste from the manufacture of iron or steel; pedigree (1,1,1,1,1)
  metallic iron scrap removed from ash reamains and recycled.
  Uncertainty: uncertainty is calculated from uncertainties in waste composition and transfer coefficients to soild residues
  production volume 0.0246519 kg
  property price 0.175 EUR2005
    Temporary price data. Calculated as 90% of purchasers price based on: 2005 import and export prices (total trades (USD) divided by total weight (kg) in biggest economies of the world: EU27, USA, Brasil, China, India, Japan and Russia) from UN Commodity Trade Statistics Database (http://data.un.org/Explorer.aspxDatabase [Accessed 2011.06.20]). Commodity: Waste or scrap, of cast iron
  property carbon content 0
    carbon content on a dry matter basis (reserved; not for manual entry)
  property true value 9.49351e-11
    allocation property applied in "true value" allocation // value calculated from revenue
  properties: carbon content, non-fossil 0, wet mass 1 kg, dry mass 1 kg, water content 0, carbon content, fossil 0, water in wet mass 0 kg, carbon allocation 0 kg
- copper: 0 kg; source Rentz O. 1999; By-product classification allocatable product; CPC 41413: Refined copper and copper alloys, unwrought; master alloys of copper
  Literature value. Copper uses: Before end-use copper is manufactured into semi fabricated products, such as shapes and ingots (known as 'semis'). These manufacturing processes are subdivided into hot working, cold working and, if necessary, process annealing. Few of the semis are ready for use as such. They more typically travel to first-stage manufacturers, who make metal rods, wire, and casting, and then to component manufacturers who produce such things as motors, valves, and insulated cables The components in turn are incorporated by final-stage manufacturers into a variety of finished products - automobiles, commercial buildings, residential housing, and so forth. These uses account for about 79% of the world-wide consumption of copper.
  production volume 0.000784676 kg
  property price 5.52 EUR2005
    Literature value (http://www.economist.com/news/business/21576714-mining-industry-has-enriched-chile-its-future-precarious-copper-solution). Average price between 20015 and 2013.
  property carbon content 0
    carbon content on a dry matter basis (reserved; not for manual entry)
  property true value 9.53163e-11
    allocation property applied in "true value" allocation // value calculated from revenue
  properties: dry mass 1 kg, water in wet mass 0 kg, wet mass 1 kg, carbon content, non-fossil 0, water content 0, carbon content, fossil 0, carbon allocation 0 kg
- iron scrap, unsorted: 0 kg; source European Aluminium Association 2008; CPC 39310: Slag, dross, scalings and other waste from the manufacture of iron or steel; By-product classification Recyclable; pedigree (1,1,1,1,1)
  production volume 7.01355e-7 kg
  property price 0.149 EUR2005; name ironScrapAmount_price_EUR2005
    Temporary price data. Calculated as 90% of purchasers price based on: estimated at 85% of sorted scrap
  property carbon content 0
    carbon content on a dry matter basis (reserved; not for manual entry)
  property true value 2.29965e-15
    allocation property applied in "true value" allocation // value calculated from revenue
  properties: water in wet mass 0 kg, water content 0, carbon content, fossil 0, carbon content, non-fossil 0, dry mass 1 kg, wet mass 1 kg, carbon allocation 0 kg
- aluminium oxide, non-metallurgical: 0 kg; source European Aluminium Association 2008; CPC 41432: Alumina (aluminium oxide), except artificial corundum; By-product classification allocatable product; CAS 1344-28-1; pedigree (1,1,1,1,1)
  production volume 4.41336e-5 kg
  property carbon content, non-fossil 0; name C_content_non_fossil
  property price 0.28 EUR2005; name Al2O3Amount_price_EUR2005
    From UN trade database. http://data.un.org/ Import data from the largest economies of the world are used (Brazil, India, USA, China, Japan and EU-27).
  property dry mass 1 kg; name DM
  property water content 0; name water_content
  property wet mass 1 kg; name WM
  property water in wet mass 0 kg; name WWM
  property carbon content, fossil 0; name C_content_fossil
  property carbon content 0
    carbon content on a dry matter basis (reserved; not for manual entry)
  property true value 2.71935e-13
    allocation property applied in "true value" allocation // value calculated from revenue
  properties: carbon allocation 0 kg
- aluminium, cast alloy: 0 kg; source European Aluminium Association 2008; By-product classification allocatable product; CPC 41431: Unwrought aluminium; pedigree (1,1,1,1,1)
  EcoSpold01Location=RER
  production volume 0.000412552 kg
  property price 1.3 EUR2005; name castAlloyAmount_price_EUR2005
    Temporary price data. Calculated as 90% of purchasers price based on: Source: London Metal Exchange, Aluminium alloy price for 2005
  property carbon content 0
    carbon content on a dry matter basis (reserved; not for manual entry)
  property true value 1.18021e-11
    allocation property applied in "true value" allocation // value calculated from revenue
  properties: water in wet mass 0 kg, carbon content, non-fossil 0, water content 0, dry mass 1 kg, carbon content, fossil 0, wet mass 1 kg, carbon allocation 0 kg
- aluminium, wrought alloy: 0 kg; source European Aluminium Association 2008; By-product classification allocatable product; CPC 4153: Semi-finished products of aluminium or aluminium alloys; pedigree (1,1,1,1,1)
  production volume 0.000180607 kg
  property price 1.44 EUR2005; name secondaryAluminiumOutput_price_EUR2005
    Estimated based on literature values and expert judgement. Aluminium ccast alloys are about 90% of the price of aluminium wrought alloys.
  property carbon content 0
    carbon content on a dry matter basis (reserved; not for manual entry)
  property true value 5.72316e-12
    allocation property applied in "true value" allocation // value calculated from revenue
  properties: wet mass 1 kg, water content 0, carbon content, fossil 0, water in wet mass 0 kg, carbon content, non-fossil 0, dry mass 1 kg, carbon allocation 0 kg

## Inputs from technosphere
- soybean: 0.872462 kg; = bean/soymeal; source Ohio State University 2013; lognormal variance with pedigree 0.002, pedigree (1,1,3,1,1)
  see parameter. Since Québec is a net exporter of soybean (production higher than domestic demand), a direct link to Quebec soybean production is considered as long as a regional market is not available (source: Monographie du secteur des grains au Québec, 2013.
  https://www.mapaq.gouv.qc.ca/fr/Publications/Monographiegrain.pdf)
  Uncertainty: Calculated variable. Uncertainty will be determined from propagation of uncertainty factors of underlying variables. Uncertainty of actual relation between variables not accounted at this time, although this could be included in a future update
  properties: dry mass 0.86 kg, wet mass 1 kg, protein content 0.4, oil/fat content 0.215, carbon content, non-fossil 0.52451
- biowaste: -0.0174492 kg; name soy; = (m_discarded/soymeal)*-1; source Dalgaard, R. 2008; lognormal variance with pedigree 0.002, pedigree (1,1,3,1,1)
  see parameter; discarded soybeans
  Uncertainty: Calculated variable. Uncertainty will be determined from propagation of uncertainty factors of underlying variables. Uncertainty of actual relation between variables not accounted at this time, although this could be included in a future update
  production volume 1.2118e6 kg; = ref_pv * (soy/ meal)
    Calculated from production volume of reference product using the relative outputs.
  property price 0 EUR2005; name soy_price_EUR2005
  properties: water content 1.5, dry mass 0.4 kg, carbon content, non-fossil 0.1624, wet mass 1 kg
- electricity, low voltage: 0.0545289 kWh; = electricity/soymeal; source Energrow 2013; lognormal variance with pedigree 0.002, pedigree (1,1,3,1,1)
  (same comment as for soybean oil, crude)

## Sampling procedure
Collected data for Quebec industries for soybean

## Extrapolations
no extrapolation

## Review by Christian Bauer 2014-02-04
passed
