# electricity, high voltage, production mix

Dataset: EcoSpold 2, unit process, production mix
Geography: IN-Southern grid
Time period: 2012-01-01 to 2019-12-31
Scenario: Business-as-Usual
System model: Allocation at the point of substitution
Generated by: [System]
Database: ecoinvent
isCopyrightProtected: false
accessRestrictedTo: 1

## General comment
The calculation of the shares of specific generation technologies in this market is based on two sources. (IEA 2017) contains the share of each technology in this market, for year 2014. (IEA 2014) contains the provincial distribution of production volumes of each technology, for year 2012. These two statistics were combined to calculate the share of each province/technology combination in this electricity market.

## Technology
Average technology used to transmit and distribute electricity. Includes underground and overhead lines. Electricity production according to related technology datasets.
Definition of the voltage levels:
- High voltage level above 24 kV (large scale industry)
- Medium voltage level between 1 kV and 24 kV (medium to small scale industry, service sector
and public buildings)
- Low voltage level below 1 kV (Households)

## Reference product
- electricity, high voltage: 1 kWh; CPC 17100: Electrical energy; By-product classification allocatable product
  production volume 2.34366e11 kWh
  properties: price 0.0977 EUR2005

## Inputs from technosphere
- electricity, high voltage: 0 kWh; source Central Electricity Authority 2013; pedigree (1,1,1,1,1)
  Calculated value/estimation. This value compensates for the losses during transmission on the high voltage level and transformation within the high voltage level. The calculation is made based on total electricity losses between net electricity available at the busbar and the use of electricity calculated based on the Annual report 2012-13 of the Central Electricity Authority (CEA), India. These total losses over the whole chain are then allocated to the different voltage levels as well as transformation and transmission losses based on information in Itten et al. 2014. For details please see the documentation available on ecoQuery.
  Itten R., Frischknecht R., Stucki M. 2014. Life Cycle Inventories of Electricity Mixes and Grid. Version 1.3. treeze, Uster, Switzerland
- electricity, high voltage: 0 kWh; pedigree (2,1,3,1,2)
  Exchange present because of parent child relationship, but not relevant in this dataset.
- electricity, high voltage: 0, 0, 0, 0, 0, 0, 0, 0, 0, 0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 kWh (68 entries)
- electricity, high voltage: 0.0593813 kWh
  production volume 1.31833e10 kWh
- electricity, high voltage: 0, 0 kWh (2 entries)
  properties: price 0.0977 EUR2005, exergy 3.6 MJ
  note on exergy: allocation factor for electricity (=1) vs. heat, where heat is calculated as the termodynamic mean temperature Tm = (Tfeed-Treturn)/ln(Tfeed/Treturn), relative to the application temperature (Tu, typically = 293 K), i.e. (Tm-Tu)/Tm
- electricity, high voltage: 0.403224 kWh
  production volume 8.95201e10 kWh
- electricity, high voltage: 0.15404 kWh
  production volume 3.41986e10 kWh
- electricity, high voltage: 0.118115 kWh
  production volume 2.62228e10 kWh
- electricity, high voltage: 4.37909e-5 kWh
  production volume 9.72207e6 kWh
- electricity, high voltage: 4.21473e-5 kWh
  production volume 9.35717e6 kWh
- electricity, high voltage: 0.0087697 kWh
  production volume 1.94697e9 kWh
- electricity, high voltage: 0.0290201 kWh
  production volume 6.44278e9 kWh
- electricity, high voltage: 0.0106498 kWh
  production volume 2.36437e9 kWh
- electricity, high voltage: 0.0061718 kWh
  production volume 1.37021e9 kWh
- electricity, high voltage: 0.000813675 kWh
  production volume 1.80645e8 kWh
- electricity, high voltage: 0.00140904 kWh
  production volume 3.12824e8 kWh
- electricity, high voltage: 0.00581078 kWh
  production volume 1.29006e9 kWh
- electricity, high voltage: 0.0027512 kWh
  production volume 6.10797e8 kWh
- electricity, high voltage: 0.0756485 kWh
  production volume 1.67948e10 kWh
- electricity, high voltage: 0.0215093 kWh
  production volume 4.7753e9 kWh
- electricity, high voltage: 0.00352372 kWh
  production volume 7.82305e8 kWh
- electricity, high voltage: 0.000443734 kWh
  production volume 9.85138e7 kWh
- electricity, high voltage: 0.00996862 kWh
  production volume 2.21314e9 kWh
- electricity, high voltage: 0.000161742 kWh
  production volume 3.59086e7 kWh
- electricity, high voltage: 0.000266919 kWh
  production volume 5.9259e7 kWh
- electricity, high voltage: 0.000660453 kWh
  production volume 1.46628e8 kWh
- electricity, high voltage: 0.00400847 kWh
  production volume 8.89925e8 kWh
- electricity, high voltage: 0.0191192 kWh
  production volume 4.24466e9 kWh
- electricity, high voltage: 0.000314303 kWh
  production volume 6.97787e7 kWh
- electricity, high voltage: 0.0641336 kWh
  production volume 1.42384e10 kWh

## Extrapolations
This dataset has been extrapolated from year 2015 to the year of the calculation (2019). The uncertainty has been adjusted accordingly.
