# solder production, paste, Sn95.5Ag3.9Cu0.6, for electronics industry

Dataset: EcoSpold 2, unit process
Geography: GLO
Time period: 2005-01-01 to 2019-12-31
Technology level: current
Classification: EcoSpold01Categories: metals/extraction
Classification: ISIC rev.4 ecoinvent: 2029:Manufacture of other chemical products n.e.c.
Tags: ConvertedDataset
Scenario: Business-as-Usual
System model: Allocation at the point of substitution
Generated by: Roland Hischier
Published in: Hischier R. 2007
Database: ecoinvent
isCopyrightProtected: true
accessRestrictedTo: 1

## General comment
Data are based on literature (report from a European research project in the field of lead-free soldering). Infrastructure and transportation efforts are based on own assumptions.
[This dataset was already contained in the ecoinvent database version 2. It was not individually updated during the transfer to ecoinvent version 3. Life Cycle Impact Assessment results may still have changed, as they are affected by changes in the supply chain, i.e. in other datasets. This dataset was generated following the ecoinvent quality guidelines for version 2. It may have been subject to central changes described in the ecoinvent version 3 change report (http://www.ecoinvent.org/database/ecoinvent-version-3/reports-of-changes/), and the results of the central updates were reviewed extensively. The changes added e.g. consistent water flows and other information throughout the database. The documentation of this dataset can be found in the ecoinvent reports of version 2, which are still available via the ecoinvent website. The change report linked above covers all central changes that were made during the conversion process.]

## Included activities end
This dataset includes raw material input, auxillaries input, energy consumption and emissions (air), as well as an estimation of the efforts for transportation and of the infrastructure for the production of solder paste.

## Geography
Data represent global valid composition data for Pb-free solder paste, used in the electronics industry.

## Technology
Typical solder material for the electronics industry. Production by melting (of solder bar), atomizing & sieving, followed by mixing with the respective flux. Data based on literature.

## Reference product
- solder, paste, Sn95.5Ag3.9Cu0.6, for electronics industry: 1 kg; CPC 42950: Wire, rods, tubes, plates, electrodes and similar products, of base metal or of metal carbides, coated or core[…]; By-product classification allocatable product
  EcoSpold01Location=GLO
  production volume 1 kg
    Dummy value to be replaced by measured, estimated or calculated value
  property price 17.5222 EUR2005
    Calculated based on inputs: The price of the product has been calculated as a sum of the values of the material and energy inputs for this product. This value is therefore a rough estimation. It may underestimate the real price since there are additional expenses when producing any product. These expences can include for example labour costs, treatment of waste materials and profit for the producer. Please consider carefully whether this level of data quality is acceptable for your application.
  property carbon content 0
    carbon content on a dry matter basis (reserved; not for manual entry)
  property true value 17.5222
    allocation property applied in "true value" allocation // value calculated from revenue
  properties: water content 0, carbon content, fossil 0, water in wet mass 0 kg, wet mass 1 kg, carbon content, non-fossil 0, dry mass 1 kg, carbon allocation 0 kg

## By-products
- iron scrap, sorted, pressed: 0 kg; By-product classification Recyclable; CPC 39310: Slag, dross, scalings and other waste from the manufacture of iron or steel; pedigree (1,1,1,1,1)
  Iron scrap recovered from this waste.
  Uncertainty: uncertainty calculated from uncertainty in waste composition, uncertainty of share of recyclable metal, uncertainty of transfer coefficient to bottom ash, uncertainty of the efficiency of scrap removal in MSWI plant.
  production volume 0.114216 kg
  property price 0.175 EUR2005
    Temporary price data. Calculated as 90% of purchasers price based on: 2005 import and export prices (total trades (USD) divided by total weight (kg) in biggest economies of the world: EU27, USA, Brasil, China, India, Japan and Russia) from UN Commodity Trade Statistics Database (http://data.un.org/Explorer.aspxDatabase [Accessed 2011.06.20]). Commodity: Waste or scrap, of cast iron
  property carbon content 0
    carbon content on a dry matter basis (reserved; not for manual entry)
  property true value 0.00999393
    allocation property applied in "true value" allocation // value calculated from revenue
  properties: water in wet mass 0 kg, dry mass 1 kg, carbon content, fossil 0, carbon content, non-fossil 0, wet mass 1 kg, water content 0, carbon allocation 0 kg
- zinc concentrate: 0 kg; CPC 14290: Other non-ferrous metal ores and concentrates (other than uranium or thorium ores and concentrates); By-product classification allocatable product
  Calculated value from the knowledge of the properties of both products.
  production volume 5.38611e-8 kg
  property price 0.38 EUR2005; name ByP_price_EUR2005
    Temporary price data. Calculated as 90% of purchasers price based on: Zinc content in concentrate 53%. Concentrate price per kg Zn 86.5% of refined Zn price (13.5% treatment charges according to CHR Metals Limited 2005: Dynamic cost curves. http://www.minecost.com/dynamic.pdf). 2004 zinc price from USGS (2007) Mineral commodity summaries 2007. <http://minerals.usgs.gov/minerals/pubs/mcs/2007/mcs2007.pdf> [Accessed 25 May 2010]
  property zinc content 0.53; name zinc_C_zinc_concentrate
    Zinc content on a dry matter basis. Value taken from teh "zinc mine operation" /GLO dataset.
  property dry mass 1 kg; name DM_zinc_concentrate
  property carbon content 0
    carbon content on a dry matter basis (reserved; not for manual entry)
  property true value 3.04605e-10
    allocation property applied in "true value" allocation // value calculated from revenue
  properties: wet mass 1 kg, water content 0, carbon content, non-fossil 0, carbon content, fossil 0, water in wet mass 0 kg, carbon allocation 0 kg
- electricity, for reuse in municipal waste incineration only: 0 kWh; CPC 17100: Electrical energy; By-product classification allocatable product; pedigree (1,1,1,1,1)
  Net electricity generated from this waste and used in internal MSWI plant energy redistribution.
  Uncertainty: uncertainty is calculated from uncertainties in waste composition and uncertainties in energy efficiency and the uncertainty in internal energy demand
  production volume 7.7558e-12 kWh
  property exergy 3.6 MJ; name E_el_prod_MSWI_exergy
    This exergy property is based on the exergy content of the product.
  property true value relation 3.6; name E_el_prod_MSWI_true_value_relation
    property to calculate "true value" from
  property price 0.1 EUR2005; name E_el_prod_MSWI_price_EUR2005
    Estimated to be the same price as in case of electricity, medium voltage.
  property true value 1.48302e-14
    allocation property applied in "true value" allocation // value calculated from true value relation
- heat, for reuse in municipal waste incineration only: 0 MJ; CPC 17300: Steam and hot water; By-product classification allocatable product; pedigree (1,1,1,1,1)
  Net useful heat generated from this waste and used in internal MSWI plant energy redistribution.
  Uncertainty: uncertainty is calculated from uncertainties in waste composition and uncertainties in energy efficiency and the uncertainty in internal energy demand
  production volume 5.48677e-11 MJ
  property exergy 0.1842 MJ; name E_th_prod_MSWI_exergy
    This exergy property is based on the exergy content of the product.
  property true value relation 0.1842; name E_th_prod_MSWI_true_value_relation
    property to calculate "true value" from
  property price 0.0106 EUR2005; name E_th_prod_MSWI_price_EUR2005
    Average European district heat price from Ecoheatcool and Euroheat 2005-2006, Ecoheat Work package 1: The European heat market. Final report. 10.6 EUR/GJ i s the price of district heat. http://www.solarthermalworld.org/files/Ecoheatcool%20WP1%20Web.pdf?download
  property true value 5.36814e-15
    (same comment as for electricity, for reuse in municipal waste incineration only)

## Inputs from technosphere
- monoethanolamine: 0.00299829 kg; lognormal variance with pedigree 0.0513, pedigree (2,3,5,3,1)
  Data from literature
  EcoSpold01Location=RER
  Uncertainty: data from literature
  properties: wet mass 1 kg, carbon content, fossil 0.393443, dry mass 1 kg
- rosin size, for paper production: 0 kg; pedigree (1,1,1,1,1)
  Data from literature
  EcoSpold01Location=RER
  Uncertainty: data from literature
  properties: dry mass 1 kg, carbon content, non-fossil 0.515474, wet mass 1 kg
  note on carbon content, non-fossil: Mixture of rosin size (approximated by soap) (75%) and alkali (shown as sodium hydroxide) (25%). (ecoinvent v2.2 report 11-III, pg 299).
- scrap tin sheet: 0 kg; pedigree (1,1,1,1,1)
  EcoSpold01Location=CH
  Data from literature
  Uncertainty: data from literature
  production volume 0 kg
    Calculated from the production volume of solder, paste, Sn95.5Ag3.9Cu0.6, for electronic industry in proportion to the respective output amounts.
  properties: dry mass 1 kg, wet mass 1 kg
- formic acid: 0 kg; pedigree (1,1,1,1,1)
  EcoSpold01Location=RER
  Data from literature
  Uncertainty: data from literature
  properties: carbon content, fossil 0.4, wet mass 1 kg, dry mass 1 kg
- electricity, medium voltage: 3.47802 kWh; lognormal variance with pedigree 0.0513, pedigree (2,3,5,3,1)
  EcoSpold01Location=UCTE
  Data from literature
  Uncertainty: data from literature
- solder, bar, Sn95.5Ag3.9Cu0.6, for electronics industry: 0.988326 kg; lognormal variance with pedigree 0.0513, pedigree (2,3,5,3,1)
  Data from literature
  EcoSpold01Location=GLO
  Uncertainty: data from literature
  properties: wet mass 1 kg, dry mass 1 kg
- heat, district or industrial, natural gas: 54.419 MJ; lognormal variance with pedigree 0.0513, pedigree (2,3,5,3,1)
  Data from literature
  EcoSpold01Location=RER
  Uncertainty: data from literature
- isopropanol: 0 kg; pedigree (1,1,1,1,1)
  EcoSpold01Location=RER
  Data from literature
  Uncertainty: data from literature
  properties: carbon content, fossil 0.6, dry mass 1 kg, wet mass 1 kg
- rosin size, for paper production: 0.0164843, 0.0344866 kg (2 entries); lognormal variance with pedigree 0.0513, pedigree (2,3,5,3,1)
  Data from literature
  EcoSpold01Location=RER
  Uncertainty: data from literature
- scrap tin sheet: -0.00147254, -0.097471 kg (2 entries); lognormal variance with pedigree 0.1713, pedigree (2,3,5,3,1)
  EcoSpold01Location=CH
  Data from literature
  Uncertainty: data from literature
  production volume 0.099 kg
- formic acid: 0.00303784, 0.00195931 kg (2 entries); lognormal variance with pedigree 0.0513, pedigree (2,3,5,3,1)
  EcoSpold01Location=RER
  Data from literature
  Uncertainty: data from literature
- isopropanol: 0.00886894, 0.042102 kg (2 entries); lognormal variance with pedigree 0.0513, pedigree (2,3,5,3,1)
  EcoSpold01Location=RER
  Data from literature
  Uncertainty: data from literature

## Emissions to nature
- Particulates, > 10 um [air, urban air close to ground]: 0.000318019 kg; lognormal variance with pedigree 0.3513, pedigree (2,3,5,3,1)
  Data from literature
  Uncertainty: data from literature
- Tin [air, urban air close to ground]: 0.000296831 kg; lognormal variance with pedigree 0.0913, pedigree (2,3,5,3,1)
  Data from literature
  Uncertainty: data from literature
- Particulates, < 2.5 um [air, urban air close to ground]: 0.000556533 kg; lognormal variance with pedigree 0.3513, pedigree (2,3,5,3,1)
  Data from literature
  Uncertainty: data from literature
- Particulates, > 2.5 um, and < 10um [air, urban air close to ground]: 0.000715542 kg; lognormal variance with pedigree 0.3513, pedigree (2,3,5,3,1)
  Data from literature
  Uncertainty: data from literature

## Sampling procedure
own estimation

## Extrapolations
see Geography & Technology

## Review by Rolf Frischknecht 2007-09-14
passed
