# treatment of low level radioactive waste, plasma torch incineration

Dataset: EcoSpold 2, unit process
Geography: CH
Time period: 1992-01-01 to 2019-12-31
Technology level: current
Classification: EcoSpold01Categories: nuclear power/waste treatment
Classification: ISIC rev.4 ecoinvent: 3822:Treatment and disposal of hazardous waste
Tags: Treatment; ConvertedDataset
Scenario: Business-as-Usual
System model: Allocation at the point of substitution
Generated by: Roberto Dones
Published in: Dones, R. 2007
Database: ecoinvent
isCopyrightProtected: true
accessRestrictedTo: 1

## General comment
The module describes the plasma torch incineration of low radioactive level waste, operating at very high temperature. Five cubic meter of waste per year are assumed to be produced by incineration. The emissions from the design have been included. Therefore the oil consumption has been modeled with oil from regional storage and not with oil burned in furnace, to prevent double counting. Emissions to air expected by the designer are used, and the uncertainty estimated on the basis of the range with the maximum considered in desing. Particles are assumed to be below 2.5 micrometer due to the use of several HEPA filters. In 2003 the torch is not yet operating. Maximum designed emissions to water are given.
[This dataset was already contained in the ecoinvent database version 2. It was not individually updated during the transfer to ecoinvent version 3. Life Cycle Impact Assessment results may still have changed, as they are affected by changes in the supply chain, i.e. in other datasets. This dataset was generated following the ecoinvent quality guidelines for version 2. It may have been subject to central changes described in the ecoinvent version 3 change report (http://www.ecoinvent.org/database/ecoinvent-version-3/reports-of-changes/), and the results of the central updates were reviewed extensively. The changes added e.g. consistent water flows and other information throughout the database. The documentation of this dataset can be found in the ecoinvent reports of version 2, which are still available via the ecoinvent website. The change report linked above covers all central changes that were made during the conversion process.]

## Included activities end
The module requires input of service from the final repository for low active level waste, i.e. the take over of the conditioned waste. The module describes the plasma torch incineration of low radioactive level waste, operating at very high temperature. The radioactive and non radioactive emissions to air and water expected from the design have been included. The electricity use, light oil consumption, material consumption, and related transport requirements are added. The values are normalized by the incinerated waste volume.

## Geography
Swiss conditions.

## Technology
Information regards design in mid 1990s.

## Reference product
- low level radioactive waste: -1 m3; By-product classification Waste; CPC 33690: Other radioactive elements and isotopes and compounds; alloys, dispersions, ceramic products and mixtures cont[…]
  EcoSpold01Location=CH
  production volume 9 m3
    estimated proportion; source: ecoinvent v2; value to be replaced by value to be calculated from the demand for this treatment activity
  property price 0 EUR2005
    Waste products are assigned a price of zero as they are assumed to require further treatment.
  property carbon content 0
    carbon content on a dry matter basis (reserved; not for manual entry)
  properties: carbon content, non-fossil 0, dry mass 2500 kg, water in wet mass 0 kg, water content 0, carbon content, fossil 0, wet mass 2500 kg, carbon allocation 0 kg

## By-products
- electricity, for reuse in municipal waste incineration only: 0 kWh; CPC 17100: Electrical energy; By-product classification allocatable product; pedigree (1,1,1,1,1)
  Net electricity generated from this waste and used in internal MSWI plant energy redistribution.
  Uncertainty: uncertainty is calculated from uncertainties in waste composition and uncertainties in energy efficiency and the uncertainty in internal energy demand
  property exergy 3.6 MJ; name E_el_prod_MSWI_exergy
    This exergy property is based on the exergy content of the product.
  property true value relation 3.6; name E_el_prod_MSWI_true_value_relation
    property to calculate "true value" from
  property price 0.1 EUR2005; name E_el_prod_MSWI_price_EUR2005
    Estimated to be the same price as in case of electricity, medium voltage.
- heat, for reuse in municipal waste incineration only: 0 MJ; CPC 17300: Steam and hot water; By-product classification allocatable product; pedigree (1,1,1,1,1)
  Net useful heat generated from this waste and used in internal MSWI plant energy redistribution.
  Uncertainty: uncertainty is calculated from uncertainties in waste composition and uncertainties in energy efficiency and the uncertainty in internal energy demand
  property true value relation 0.1842; name E_th_prod_MSWI_true_value_relation
    property to calculate "true value" from
  property exergy 0.1842 MJ; name E_th_prod_MSWI_exergy
    This exergy property is based on the exergy content of the product.
  property price 0.0106 EUR2005; name E_th_prod_MSWI_price_EUR2005
    Average European district heat price from Ecoheatcool and Euroheat 2005-2006, Ecoheat Work package 1: The European heat market. Final report. 10.6 EUR/GJ i s the price of district heat. http://www.solarthermalworld.org/files/Ecoheatcool%20WP1%20Web.pdf?download
- zinc concentrate: 0 kg; CPC 14290: Other non-ferrous metal ores and concentrates (other than uranium or thorium ores and concentrates); By-product classification allocatable product
  Calculated value from the knowledge of the properties of both products.
  property price 0.38 EUR2005; name ByP_price_EUR2005
    Temporary price data. Calculated as 90% of purchasers price based on: Zinc content in concentrate 53%. Concentrate price per kg Zn 86.5% of refined Zn price (13.5% treatment charges according to CHR Metals Limited 2005: Dynamic cost curves. http://www.minecost.com/dynamic.pdf). 2004 zinc price from USGS (2007) Mineral commodity summaries 2007. <http://minerals.usgs.gov/minerals/pubs/mcs/2007/mcs2007.pdf> [Accessed 25 May 2010]
  property zinc content 0.53; name zinc_C_zinc_concentrate
    Zinc content on a dry matter basis. Value taken from teh "zinc mine operation" /GLO dataset.
  property dry mass 1 kg; name DM_zinc_concentrate
  property carbon content 0
    carbon content on a dry matter basis (reserved; not for manual entry)
  properties: wet mass 1 kg, water content 0, carbon content, non-fossil 0, carbon content, fossil 0, water in wet mass 0 kg, carbon allocation 0 kg

## Inputs from technosphere
- ammonia, liquid: 180 kg; lognormal variance with pedigree 0.06, pedigree (1,1,5,1,1)
  EcoSpold01Location=RER
  based on flowsheet design estimation
  properties: dry mass 1 kg, wet mass 1 kg
- electricity, medium voltage: 520000 kWh; lognormal variance with pedigree 0.16, pedigree (1,1,5,1,1)
  EcoSpold01Location=CH
  own calculation after key data on power.
- low level radioactive waste for final repository: -1 m3; lognormal variance with pedigree 0.04, pedigree (1,1,5,1,1)
  all waste in will move out to final repository.
  EcoSpold01Location=CH
  production volume 9 m3
    Calculated from the production volume of low level radioactive waste in proportion to the respective output amounts.
  properties: dry mass 2500 kg, wet mass 2500 kg
- sulfuric acid: 18 kg; lognormal variance with pedigree 0.06, pedigree (1,1,5,1,1)
  based on flowsheet design estimation
  EcoSpold01Location=RER
  properties: dry mass 1 kg, wet mass 1 kg
- light fuel oil: 3600 kg; lognormal variance with pedigree 0.16, pedigree (1,1,5,1,1)
  own calculation.
  EcoSpold01Location=CH
  properties: carbon content, fossil 0.862, wet mass 1 kg, dry mass 1 kg

## Emissions to nature
- Hydrogen chloride [air, non-urban air or from high stacks]: 0.81 kg; lognormal variance with pedigree 0.52, pedigree (1,1,5,1,1)
  expected emissions used, range with guaranteed value
- Cadmium [air, non-urban air or from high stacks]: 5.4e-6 kg; lognormal variance with pedigree 2.28, pedigree (1,1,5,1,1)
  expected emissions used, range with guaranteed value
- Zinc, ion [water, surface water]: 0.048 kg; lognormal variance with pedigree 0.69, pedigree (1,1,5,1,1)
  own estimation of uncertainty, guaranted releases given
- Aluminium [water, surface water]: 0.24 kg; lognormal variance with pedigree 0.69, pedigree (1,1,5,1,1)
  own estimation of uncertainty, guaranted releases given
- Nitrogen oxides [air, non-urban air or from high stacks]: 21.6 kg; lognormal variance with pedigree 0.06, pedigree (1,1,5,1,1)
  expected emissions used, range with guaranteed value
- Particulates, < 2.5 um [air, non-urban air or from high stacks]: 0.0018 kg; lognormal variance with pedigree 0.69, pedigree (1,1,5,1,1)
  own estimation of uncertainty
- Iron, ion [water, surface water]: 0.048 kg; lognormal variance with pedigree 0.69, pedigree (1,1,5,1,1)
  own estimation of uncertainty, guaranted releases given
- Chromium VI [water, surface water]: 0.0024 kg; lognormal variance with pedigree 0.69, pedigree (1,1,5,1,1)
  own estimation of uncertainty, guaranted releases given
- Lead [air, non-urban air or from high stacks]: 0.00022 kg; lognormal variance with pedigree 2.28, pedigree (1,1,5,1,1)
  expected emissions used, range with guaranteed value
- Radioactive species, Nuclides, unspecified [water, surface water]: 600 kBq; lognormal variance with pedigree 0.69, pedigree (1,1,5,1,1)
  own estimation of uncertainty, guaranted releases given
- Cobalt [water, surface water]: 0.012 kg; lognormal variance with pedigree 0.69, pedigree (1,1,5,1,1)
  own estimation of uncertainty, guaranted releases given
- Copper, ion [water, surface water]: 0.012 kg; lognormal variance with pedigree 0.69, pedigree (1,1,5,1,1)
  own estimation of uncertainty, guaranted releases given
- Chromium, ion [water, surface water]: 0.048 kg; lognormal variance with pedigree 0.69, pedigree (1,1,5,1,1)
  own estimation of uncertainty, guaranted releases given
- Lead [water, surface water]: 0.012 kg; lognormal variance with pedigree 0.69, pedigree (1,1,5,1,1)
  own estimation of uncertainty, guaranted releases given
- Carbon-14 [air, non-urban air or from high stacks]: 1.66e6 kBq; lognormal variance with pedigree 0.16, pedigree (1,1,5,1,1)
  own estimation of uncertainty
- Carbon dioxide, fossil [air, non-urban air or from high stacks]: 11400 kg; lognormal variance with pedigree 0.05, pedigree (1,1,5,1,1)
  own estimation of uncertainty
- Mercury [water, surface water]: 0.00024 kg; lognormal variance with pedigree 0.69, pedigree (1,1,5,1,1)
  own estimation of uncertainty, guaranted releases given
- Cadmium, ion [water, surface water]: 0.0024 kg; lognormal variance with pedigree 0.69, pedigree (1,1,5,1,1)
  own estimation of uncertainty, guaranted releases given
- NMVOC, non-methane volatile organic compounds, unspecified origin [air, non-urban air or from high stacks]: 0.0036 kg; lognormal variance with pedigree 0.69, pedigree (1,1,5,1,1)
  own estimation of uncertainty
- Hydrogen-3, Tritium [air, non-urban air or from high stacks]: 3.04e6 kBq; lognormal variance with pedigree 0.16, pedigree (1,1,5,1,1)
  own estimation of uncertainty
- Hydrocarbons, unspecified [water, surface water]: 0.24 kg; lognormal variance with pedigree 0.69, pedigree (1,1,5,1,1)
  own estimation of uncertainty, guaranted releases given
- Dioxins, measured as 2,3,7,8-tetrachlorodibenzo-p-dioxin [air, non-urban air or from high stacks]: 3.6e-11 kg; lognormal variance with pedigree 0.69, pedigree (1,1,5,1,1)
  own estimation of uncertainty
- Ammonia [air, non-urban air or from high stacks]: 1.44 kg; lognormal variance with pedigree 0.05, pedigree (1,1,5,1,1)
  expected emissions used, range with guaranteed value
- Sulfur dioxide [air, non-urban air or from high stacks]: 5.04 kg; lognormal variance with pedigree 0.16, pedigree (1,1,5,1,1)
  expected emissions used, range with guaranteed value
- Chlorinated solvents, unspecified [water, surface water]: 0.0024 kg; lognormal variance with pedigree 0.69, pedigree (1,1,5,1,1)
  own estimation of uncertainty, guaranted releases given
- Nickel, ion [water, surface water]: 0.048 kg; lognormal variance with pedigree 0.69, pedigree (1,1,5,1,1)
  own estimation of uncertainty, guaranted releases given

## Sampling procedure
Literature

## Extrapolations
This dataset has been extrapolated from year 1998 to the year of the calculation (2019). The uncertainty has been adjusted accordingly.

## Review by Roberto Dones 2003-08-27
passed
for final run August 2003
