# compressed air production, 700 kPa gauge, >30kW, average generation

Dataset: EcoSpold 2, unit process
Geography: RoW
Time period: 1990-01-01 to 2019-12-31
Technology level: current
Classification: ISIC rev.4 ecoinvent: 2011:Manufacture of basic chemicals
Classification: EcoSpold01Categories: mechanical engineering/compressed air generation
Scenario: Business-as-Usual
System model: Allocation at the point of substitution
Share of production covered: 0 %
Generated by: Tereza Levova
Published in: Steiner, R. 2007
Database: ecoinvent
isCopyrightProtected: true
accessRestrictedTo: 1

## General comment
As there is some variation from factory to factory with regard to the LCI, it is advised that in case this dataset becomes important in the results, it is recommended to investigated further if the assumptions made for this dataset are applicable or not.
The losses (of air) during distribution (from the compressor to the final consumer) are part of this dataset. Two types of network are introduced (based on research presented in ecoinvent report 23_MechanicalEngineering); small installations with compressor capacity below 30kW and large installations with compressor capacity above 30kW. This dataset includes large installation (>30kW).

## Included activities end
This dataset includes the compressor, operating materials (lubricating oil), the electricity consumption as well as the transports of the compressor and the lubricant to the installation site. The material for the supply and the energy needed to hold the pressure in the supply installation is included. The installation at the site is not included.

## Geography
Geographical coverage encompasses the industrialised countries.

## Technology
Average technology

## Time period
Estimated value based on literature (ISI Fraunhofer, 2000, Compressed Air Systems in the European Union).
The figure shows the development in old/upgraded/new CAS installations.

## Parameters
- losses during supply: 0.3 % (obsolete); name losses; lognormal variance with pedigree 0.0132, pedigree (4,3,3,5,1)
  Literature value (ecoinvent v2.2 no.23_MechanicalEngineering). The fraction of air lost between compressor and final consumer, i.e in case of this technology 30% of the air produced (and measured) at the compressor leaks during the supply and does not reach the consumer. This loss is accounted for in the market of this product.

## Reference product
- compressed air, 700 kPa gauge: 1 m3; name CA_700_RP; = 1-(1*losses); By-product classification allocatable product; CPC 34250: Salts of oxometallic or peroxometallic acids; colloidal precious metals and compounds thereof; inorganic and o[…]
  In v2 of the ecoinvent database supply network and losses during the distribution were modelled in a separate datasets. In v3 those two datasets are merged in this one dataset, the losses are included and the flows are adjusted accordingly.
  production volume 5.83731e10 m3
    Estimated. The global production volume is extrapolated from the european production volume using the nominal GDP of 2010 (source: United Nations, http://data.un.org/Glossary.aspx?q=GDP+%28current+US%24%29, accessed 20130726 and 20130312).
    Gross domestic product (GDP) at current prices is GDP at prices of the current reporting period. Also known as nominal GDP.
  property price 0.0173446 EUR2005; name CA_700_RP_price_EUR2005
    Calculated based on inputs: The price of the product has been calculated as a sum of the values of the material and energy inputs for this product. This value is therefore a rough estimation. It may underestimate the real price since there are additional expenses when producing any product. These expences can include for example labour costs, treatment of waste materials and profit for the producer. Please consider carefully whether this level of data quality is acceptable for your application.

## Inputs from technosphere
- air compressor, screw-type compressor, 300kW: 9e-8 unit; lognormal variance with pedigree 0.322, pedigree (1,4,4,5,1)
  manufacturer value
  EcoSpold01Location=RER
  Uncertainty: manufacturer value
- waste mineral oil: -2.97143e-6 kg; lognormal variance with pedigree 0.022, pedigree (1,4,4,5,1)
  manufacturer value
  EcoSpold01Location=CH
  Uncertainty: manufacturer value
  production volume 121416 kg; = (Ref('a9e07f08-000e-40d6-a0c8-329d009657dc')*-1)* Ref('fbc02fc0-c8a8-4977-b9e7-b0bf8f22762c', 'ProductionVolume')
    Calculated from the production volume of compressed air, 700 kPa gauge, >30kW, average generation in proportion to the respective output amounts.
  properties: carbon content, fossil 0.864444, water content 0.111111, wet mass 1 kg, dry mass 0.9 kg
  note on carbon content, fossil: Tab A.6, ecoinvent v2.2 report 13_I. C content has been calculated after data in the tables, and then referred to 1 kg DM
- electricity, low voltage: 0 kWh; pedigree (1,1,1,1,1)
  average value
  EcoSpold01Location=UCTE
  Uncertainty: average value
- steel, low-alloyed, hot rolled: 9.79e-5 kg; = (CA_700_RP/1)*9.79E-05; lognormal variance with pedigree 0.0706, pedigree (4,3,5,5,1)
  average value of one distribution network
  Uncertainty: average value of one distribution network
  properties: dry mass 1 kg, wet mass 1 kg, carbon content, fossil 0.005
  note on carbon content, fossil: Low alloyed steel composition given in Tab. 3.2 ecoinvent v2.2 report 10_partII. Steel assumed to have a C content of 0.5%
- section bar rolling, steel: 9.79e-5 kg; = (CA_700_RP/1)*9.79E-05; lognormal variance with pedigree 0.0706, pedigree (4,3,5,5,1)
  (same comment as for steel, low-alloyed, hot rolled)
- lubricating oil: 2.97143e-6 kg; lognormal variance with pedigree 0.022, pedigree (1,4,4,5,1)
  manufacturer value
  EcoSpold01Location=RER
  Uncertainty: manufacturer value
  properties: carbon content, fossil 0.75, dry mass 1 kg, wet mass 1 kg
  note on carbon content, fossil: Lubricating oil is produced from diesel. C-content/dry mass of fats and oils considered 75%, from: ecoinvent v2.2 report, n 15a, pg 40
- electricity, low voltage: 0.00282519, 0.000495503, 0.00814805, 0.123222, 0.020311, 0.0578551 kWh (6 entries); lognormal variance with pedigree 0.0432, pedigree (1,3,5,5,1)
  average value
  EcoSpold01Location=UCTE
  Uncertainty: average value

## Extrapolations
Extrapolated from European dataset.

## Review by Bo Weidema 2012-04-19
In v2 of the ecoinvent database supply network and losses during the distribution were modelled in a separate datasets. In v3 those two datasets are merged in this one dataset, the losses are included and the flows are adjusted accordingly.
