# ethanol production from sweet sorghum

Dataset: EcoSpold 2, unit process
Geography: CN
Time period: 1992-01-01 to 2019-12-31
Technology level: current
Classification: ISIC rev.4 ecoinvent: 19a: Liquid and gaseous fuels from biomass
Classification: EcoSpold01Categories: biomass/fuels
Tags: ConvertedDataset
Scenario: Business-as-Usual
System model: Allocation at the point of substitution
Share of production covered: 0 %
Generated by: Edgard Gnansounou
Published in: Jungbluth N. 2007
Database: ecoinvent
isCopyrightProtected: true
accessRestrictedTo: 1

## General comment
Inventory refers to the production of 1 kg of hydrated ethanol 95% (dry basis, i.e. 1.05 kg hydrated ethanol 95% wet basis), respectively 1 kg of excess bagasse (70% dry matter), 1 kWh of electricity and 1 kg of vinasse. The multioutput-process 'sweet sorghum, in ethanol distillery' delivers the co-products 'ethanol, 95% in H2O, from sweet sorghum, at distillery', 'bagasse, from sweet sorghum, at distillery', 'electricity, bagasse, sorghum, at distillery' and 'vinasse, from sweet sorghum, at distillery'. Economic allocation with allocation factor for common stages of 91% to ethanol. Allocation according to carbon balance for CO2.
[This dataset was already contained in the ecoinvent database version 2. It was not individually updated during the transfer to ecoinvent version 3. Life Cycle Impact Assessment results may still have changed, as they are affected by changes in the supply chain, i.e. in other datasets. This dataset was generated following the ecoinvent quality guidelines for version 2. It may have been subject to central changes described in the ecoinvent version 3 change report (http://www.ecoinvent.org/database/ecoinvent-version-3/reports-of-changes/), and the results of the central updates were reviewed extensively. The changes added e.g. consistent water flows and other information throughout the database. The documentation of this dataset can be found in the ecoinvent reports of version 2, which are still available via the ecoinvent website. The change report linked above covers all central changes that were made during the conversion process.]

## Included activities end
This dataset includes the transport of sorghum to the distillery and the processing of sorghum to ethanol (95% w/w), bagasse (70% dry matter, excess), excess electricity and vinasse from ethanol production. System boundary is at the ethanol distillery. Treatment of waste effluents is not included (most wastewater is spread over the fields nearby).

## Geography
Data is from the etha+ project (Alcosuisse, CH) and the ASIATIC project (LASEN, CH), adapted to CN context

## Technology
Juice extraction is performed through milling (not diffusion). The juice is then converted to ethanol by standard fermentation and distillation techniques. Energy supply is done by combustion of the bagasse resulting from the extraction stage. The main product is ethanol.

## Time period
Data from 1992 to 2005, current technology

## Parameters
- fraction, cooling water, cooling pond system, to air: 0.032; name fraction_CW_CP_to_air; lognormal variance with pedigree 0.0413, pedigree (2,3,1,3,1)
  Calculated based on literature value (Scown, C.D., 2011, Water Footprint of U.S. Transportation Fuels and supplying information of the article) (Vionnet, S., Quantis Water Database - Technical Report, 2012).
- fraction, cooling water, once-through system, to air: 0.004; name fraction_CW_OT_to_air; lognormal variance with pedigree 0.0413, pedigree (2,3,1,3,1)
  (same comment as for fraction, cooling water, cooling pond system, to air)
- fraction, tap water, to air: 0; name fraction_TW_to_air; = fraction_PW_to_air
  Calculated value. See comment in the other parametres present in this dataset. Tap water is considered to be always used as process water, thus process water fractions to air are applied to all tap water input flows to calculate the amount of water consumed in the processes.
- fraction, water, decarbonised, to air: 0.64; name fraction_WDC_to_air; = fraction_CW_to_air; lognormal variance with pedigree 0.092025, pedigree (4,4,3,2,4)
  Calculated value. See comments in the other parametres present in this dataset. Decarbonised water is considered to be always used as cooling water, thus cooling water fractions to air are applied to all carbonised water input flows to calculate the amount of water consumed in the processes.
- fraction, cooling water, recirculating system, to air: 0.771; name fraction_CW_R_to_air; lognormal variance with pedigree 0.0413, pedigree (2,3,1,3,1)
  (same comment as for fraction, cooling water, cooling pond system, to air)
- fraction, cooling water, to air: 0.64; name fraction_CW_to_air; lognormal variance with pedigree 0.092025, pedigree (4,4,3,2,4)
  Calculated value based on literature value (Schonoor, 2008) (Vionnet, S., Quantis Water Database - Technical Report, 2012).
- fraction, process water, to air: 0 dimensionless; name fraction_PW_to_air
  Estimated value, expert opinion (Vionnet, S., Quantis Water Database - Technical Report, 2012).

## Reference product
- ethanol, without water, in 95% solution state, from fermentation: 0 kg; name ethanol_RP; CPC 35491: Biodiesel; By-product classification allocatable product; CAS 64-17-5
  EcoSpold01Location=CN
  production volume 1.75022e6 kg; name ethanol_RP_PV; = 3.5451E+07*0.04937
    Estimated. The Chinese production volume is extrapolated from the global production volume using the nominal GDP of 2005 (source: United Nations, http://data.un.org/Glossary.aspx?q=GDP+%28current+US%24%29, accessed 20130726 and 20130312).
  property price 0.324 EUR2005
    Temporary price data. Calculated as 90% of purchasers price based on: 2005 prices from FAPRI2007, 2009. Agricultural outlook. (http://www.fapri.missouri.edu/outreach/publications/ag_outlook.asp?current_page=outreach; accessed 22/06/10). Unit conversion from US gallon to kg - 1 gallon = 3.7856 liter * 0.789 kg/liter (ethanol density) = 2.9868 kg
  property carbon content 0.521739
    carbon content on a dry matter basis (reserved; not for manual entry)
  property true value 0.0188584; name ethanol_RP_true_value
    allocation property applied in "true value" allocation // value calculated from revenue
  properties: wet mass 1 kg, water in wet mass 0 kg, carbon content, fossil 0, carbon content, non-fossil 0.521739, water content 0, dry mass 1 kg, carbon allocation 0.521739 kg
- vinasse, from fermentation of sweet sorghum: 1 kg; By-product classification Recyclable; CPC 39149: Beet-pulp and other waste of sugar manufacture
  EcoSpold01Location=CN
  production volume 2.3106e7 kg; = Ref('7debd409-352d-44b5-b3df-42d852b66206')/ ethanol_RP* ethanol_RP_PV
    Calculated from the production volume of ethanol, without water, in 95% solution state, from fermentation in proportion to the respective output amounts.
  property price 0.073 EUR2005
    Temporary price data. Calculated as 90% of purchasers price based on: Calculated relative to the price of sugar beet pulp based on the difference in dry matter content 15%/25%
  property carbon content, non-fossil 0.12867
    The carbon content of all vinasses was assumed to be 0.12867 kg per dry matter (ecoinvent v2.2 report n 17, pg 281, vinasse from sugar beet)
  property carbon content 0.12867
    carbon content on a dry matter basis (reserved; not for manual entry)
  property true value 0.0560939
    allocation property applied in "true value" allocation // value calculated from revenue
  properties: water in wet mass 0.85 kg, wet mass 1 kg, water content 5.66667, carbon content, fossil 0, dry mass 0.15 kg, carbon allocation 0.0193005 kg

## By-products
- electricity, high voltage: 0 kWh; CPC 17100: Electrical energy; By-product classification allocatable product
  EcoSpold01Location=CN
  production volume 1.47148e6 kWh; = Ref('b37ea696-caeb-43e2-a2cb-1b42fa7a6cc6')/ ethanol_RP* ethanol_RP_PV
    (same comment as for vinasse, from fermentation of sweet sorghum)
  property price 0.0977 EUR2005
    Temporary price data. Calculated as 90% of purchasers price based on: 94% of the average price (to account for a 6% loss in transformation and transmission) for electricity for industrial consumersin 2005 (excluded taxes). From IEA.
  property exergy 3.6 MJ; name electricity_output_exergy
    allocation factor for electricity (=1) vs. heat, where heat is calculated as the termodynamic mean temperature Tm = (Tfeed-Treturn)/ln(Tfeed/Treturn), relative to the application temperature (Tu, typically = 293 K), i.e. (Tm-Tu)/Tm
  property true value relation 3.6; name electricity_output_true_value_relation
    property to calculate "true value" from
  property true value 0.00575941
    allocation property applied in "true value" allocation // value calculated from true value relation
- heat, district or industrial, other than natural gas: 0 MJ; source Bauer, C. 2007; CPC 17300: Steam and hot water; By-product classification allocatable product; pedigree (1,1,1,1,1)
  Heat production is calculated based on heat efficiency of cogen unit (77%), lower calorific value of bagasse (13.8 MJ/kg dry mass) and dry mass of bagasse (0.702 w/w)
  production volume 5.82272e6 MJ
  property true value relation 0.169678; name heat_output_true_value_relation
    property to calculate "true value" from
  property exergy 0.169678 MJ; name heat_output_exergy
    (same comment as for electricity, high voltage)
  property price 0.0106 EUR2005; name heat_output_price_EUR2005
    Average European district heat price from Ecoheatcool and Euroheat 2005-2006, Ecoheat Work package 1: The European heat market. Final report. 10.6 EUR/GJ i s the price of district heat. http://www.solarthermalworld.org/files/Ecoheatcool%20WP1%20Web.pdf?download
  property true value 0.00107417
    (same comment as for electricity, high voltage)
- heat, for reuse in municipal waste incineration only: 0 MJ; CPC 17300: Steam and hot water; By-product classification allocatable product; pedigree (1,1,1,1,1)
  Net electricity generated from this waste and used in internal MSWI plant energy redistribution.
  Uncertainty: uncertainty is calculated from uncertainties in waste composition and uncertainties in energy efficiency and the uncertainty in internal energy demand
  production volume 34.6178 MJ
  property exergy 0.1842 MJ; name E_th_prod_MSWI_exergy
    This exergy property is based on the exergy content of the product.
  property price 0.0106 EUR2005; name E_th_prod_MSWI_price_EUR2005
    (same comment as for heat, district or industrial, other than natural gas)
  property true value relation 0.1842; name E_th_prod_MSWI_true_value_relation
    property to calculate "true value" from
  property true value 6.93282e-9
    (same comment as for electricity, high voltage)
- electricity, for reuse in municipal waste incineration only: 0 kWh; CPC 17100: Electrical energy; By-product classification allocatable product; pedigree (1,1,1,1,1)
  (same comment as for heat, for reuse in municipal waste incineration only)
  production volume 4.69499 kWh
  property price 0.1 EUR2005; name E_el_prod_MSWI_price_EUR2005
    Estimated to be the same price as in case of electricity, medium voltage.
  property exergy 3.6 MJ; name E_el_prod_MSWI_exergy
    This exergy property is based on the exergy content of the product.
  property true value relation 3.6; name E_el_prod_MSWI_true_value_relation
    property to calculate "true value" from
  property true value 1.83763e-8
    (same comment as for electricity, high voltage)
- iron scrap, sorted, pressed: 0 kg; By-product classification Recyclable; CPC 39310: Slag, dross, scalings and other waste from the manufacture of iron or steel; pedigree (1,1,1,1,1)
  metallic iron scrap removed from ash reamains and recycled.
  Uncertainty: uncertainty is calculated from uncertainties in waste composition and transfer coefficients to soild residues
  production volume 0.547121 kg
  property price 0.175 EUR2005
    Temporary price data. Calculated as 90% of purchasers price based on: 2005 import and export prices (total trades (USD) divided by total weight (kg) in biggest economies of the world: EU27, USA, Brasil, China, India, Japan and Russia) from UN Commodity Trade Statistics Database (http://data.un.org/Explorer.aspxDatabase [Accessed 2011.06.20]). Commodity: Waste or scrap, of cast iron
  property carbon content 0
    carbon content on a dry matter basis (reserved; not for manual entry)
  property true value 3.18412e-9
    allocation property applied in "true value" allocation // value calculated from revenue
  properties: carbon content, non-fossil 0, wet mass 1 kg, dry mass 1 kg, water content 0, carbon content, fossil 0, water in wet mass 0 kg, carbon allocation 0 kg
- copper: 0 kg; source Rentz O. 1999; By-product classification allocatable product; CPC 41413: Refined copper and copper alloys, unwrought; master alloys of copper
  Literature value. Copper uses: Before end-use copper is manufactured into semi fabricated products, such as shapes and ingots (known as 'semis'). These manufacturing processes are subdivided into hot working, cold working and, if necessary, process annealing. Few of the semis are ready for use as such. They more typically travel to first-stage manufacturers, who make metal rods, wire, and casting, and then to component manufacturers who produce such things as motors, valves, and insulated cables The components in turn are incorporated by final-stage manufacturers into a variety of finished products - automobiles, commercial buildings, residential housing, and so forth. These uses account for about 79% of the world-wide consumption of copper.
  production volume 0.0174149 kg
  property price 5.52 EUR2005
    Literature value (http://www.economist.com/news/business/21576714-mining-industry-has-enriched-chile-its-future-precarious-copper-solution). Average price between 20015 and 2013.
  property carbon content 0
    carbon content on a dry matter basis (reserved; not for manual entry)
  property true value 3.19689e-9
    allocation property applied in "true value" allocation // value calculated from revenue
  properties: dry mass 1 kg, water in wet mass 0 kg, wet mass 1 kg, carbon content, non-fossil 0, water content 0, carbon content, fossil 0, carbon allocation 0 kg
- zinc concentrate: 0 kg; CPC 14290: Other non-ferrous metal ores and concentrates (other than uranium or thorium ores and concentrates); By-product classification allocatable product
  Calculated value from the knowledge of the properties of both products.
  production volume 1.38227e-11 kg
  property price 0.38 EUR2005; name ByP_price_EUR2005
    Temporary price data. Calculated as 90% of purchasers price based on: Zinc content in concentrate 53%. Concentrate price per kg Zn 86.5% of refined Zn price (13.5% treatment charges according to CHR Metals Limited 2005: Dynamic cost curves. http://www.minecost.com/dynamic.pdf). 2004 zinc price from USGS (2007) Mineral commodity summaries 2007. <http://minerals.usgs.gov/minerals/pubs/mcs/2007/mcs2007.pdf> [Accessed 25 May 2010]
  property zinc content 0.53; name zinc_C_zinc_concentrate
    Zinc content on a dry matter basis. Value taken from teh "zinc mine operation" /GLO dataset.
  property dry mass 1 kg; name DM_zinc_concentrate
  property carbon content 0
    carbon content on a dry matter basis (reserved; not for manual entry)
  property true value 1.7468e-19
    allocation property applied in "true value" allocation // value calculated from revenue
  properties: wet mass 1 kg, water content 0, carbon content, non-fossil 0, carbon content, fossil 0, water in wet mass 0 kg, carbon allocation 0 kg
- iron scrap, unsorted: 0 kg; source European Aluminium Association 2008; CPC 39310: Slag, dross, scalings and other waste from the manufacture of iron or steel; By-product classification Recyclable; pedigree (1,1,1,1,1)
  production volume 1.55661e-5 kg
  property price 0.149 EUR2005; name ironScrapAmount_price_EUR2005
    Temporary price data. Calculated as 90% of purchasers price based on: estimated at 85% of sorted scrap
  property carbon content 0
    carbon content on a dry matter basis (reserved; not for manual entry)
  property true value 7.71321e-14
    allocation property applied in "true value" allocation // value calculated from revenue
  properties: water in wet mass 0 kg, water content 0, carbon content, fossil 0, carbon content, non-fossil 0, dry mass 1 kg, wet mass 1 kg, carbon allocation 0 kg
- aluminium oxide, non-metallurgical: 0 kg; source European Aluminium Association 2008; CPC 41432: Alumina (aluminium oxide), except artificial corundum; By-product classification allocatable product; CAS 1344-28-1; pedigree (1,1,1,1,1)
  production volume 0.000979517 kg
  property carbon content, non-fossil 0; name C_content_non_fossil
  property price 0.28 EUR2005; name Al2O3Amount_price_EUR2005
    From UN trade database. http://data.un.org/ Import data from the largest economies of the world are used (Brazil, India, USA, China, Japan and EU-27).
  property dry mass 1 kg; name DM
  property water content 0; name water_content
  property wet mass 1 kg; name WM
  property water in wet mass 0 kg; name WWM
  property carbon content, fossil 0; name C_content_fossil
  property carbon content 0
    carbon content on a dry matter basis (reserved; not for manual entry)
  property true value 9.12092e-12
    allocation property applied in "true value" allocation // value calculated from revenue
  properties: carbon allocation 0 kg
- aluminium, cast alloy: 0 kg; source European Aluminium Association 2008; By-product classification allocatable product; CPC 41431: Unwrought aluminium; pedigree (1,1,1,1,1)
  EcoSpold01Location=RER
  production volume 0.00915631 kg
  property price 1.3 EUR2005; name castAlloyAmount_price_EUR2005
    Temporary price data. Calculated as 90% of purchasers price based on: Source: London Metal Exchange, Aluminium alloy price for 2005
  property carbon content 0
    carbon content on a dry matter basis (reserved; not for manual entry)
  property true value 3.95852e-10
    allocation property applied in "true value" allocation // value calculated from revenue
  properties: water in wet mass 0 kg, carbon content, non-fossil 0, water content 0, dry mass 1 kg, carbon content, fossil 0, wet mass 1 kg, carbon allocation 0 kg
- aluminium, wrought alloy: 0 kg; source European Aluminium Association 2008; By-product classification allocatable product; CPC 4153: Semi-finished products of aluminium or aluminium alloys; pedigree (1,1,1,1,1)
  production volume 0.00400846 kg
  property price 1.44 EUR2005; name secondaryAluminiumOutput_price_EUR2005
    Estimated based on literature values and expert judgement. Aluminium ccast alloys are about 90% of the price of aluminium wrought alloys.
  property carbon content 0
    carbon content on a dry matter basis (reserved; not for manual entry)
  property true value 1.91959e-10
    allocation property applied in "true value" allocation // value calculated from revenue
  properties: wet mass 1 kg, water content 0, carbon content, fossil 0, water in wet mass 0 kg, carbon content, non-fossil 0, dry mass 1 kg, carbon allocation 0 kg

## Inputs from technosphere
- heat and power co-generation unit, 6400kW thermal, components for electricity only: 1.3518e-9 unit; lognormal variance with pedigree 0.372, pedigree (4,4,5,5,1)
  Adapted from the dataset 'wood chips, in cogen 6400kWth, wood', according to actual water, carbon and energy content of the fuel (pressed sorghum bagasse)
  EcoSpold01Location=CH
  Uncertainty: Adapted from the dataset 'wood chips, in cogen 6400kWth, wood', according to actual water, carbon and energy content of the fuel (pressed sorghum bagasse)
- nitrogen fertiliser, as N: 0.000392143 kg; lognormal variance with pedigree 0.0707, pedigree (2,4,5,3,3)
  Etha+ project Alcosuisse, industrial data
  EcoSpold01Location=RER
  Uncertainty: etha+ project Alcosuisse, industrial data
  properties: dry mass 1 kg, wet mass 1 kg
- tap water: 0.763882 kg; name tap_water_input; lognormal variance with pedigree 0.04, pedigree (1,1,5,1,1)
  Literature survey, industrial data
  EcoSpold01Location=RER
  Uncertainty: Literature survey, industrial data
  properties: carbon content, fossil 0.00178991, wet mass 1 kg, water content 2962.17, dry mass 0.000337476 kg
  note on carbon content, fossil: Bicarbonate content is 2.93 mol/m3. CO2 content is 0.1 mol/m3 (ecoinvent v2.2 report 8, Tab 93.1).
- sulfuric acid: 0.00196072 kg; lognormal variance with pedigree 0.0707, pedigree (2,4,5,3,3)
  (same comment as for nitrogen fertiliser, as N)
  properties: dry mass 1 kg, wet mass 1 kg
- bagasse, from sweet sorghum: -0.0231703 kg
  EcoSpold01Location=CN
  production volume 780583 kg; = (Ref('4e01c641-6196-4888-95d7-6776436957c5')*-1)/ ethanol_RP* ethanol_RP_PV
    (same comment as for vinasse, from fermentation of sweet sorghum)
  properties: water content 0.424501, wet mass 1 kg, price 0.01 EUR2005, dry mass 0.702 kg, carbon content, non-fossil 0.443
  note on carbon content, non-fossil: C content (dry matter basis) is 44.3% (Tab 16.31, ecoinvent v2.2 report 17)
- water, decarbonised: 0.00110251 kg; name water_decarbonised_input; lognormal variance with pedigree 0.072, pedigree (4,4,5,5,1)
  EcoSpold01Location=RER
  Adapted from the dataset 'wood chips, in cogen 6400kWth, wood', according to actual water, carbon and energy content of the fuel (pressed sorghum bagasse)
  Uncertainty: Adapted from the dataset 'wood chips, in cogen 6400kWth, wood', according to actual water, carbon and energy content of the fuel (pressed sorghum bagasse)
  properties: wet mass 1 kg
- chemical, organic: 8.04093e-6 kg; lognormal variance with pedigree 0.072, pedigree (4,4,5,5,1)
  Adapted from the dataset 'wood chips, in cogen 6400kWth, wood', according to actual water, carbon and energy content of the fuel (pressed sorghum bagasse)
  EcoSpold01Location=GLO
  Uncertainty: Adapted from the dataset 'wood chips, in cogen 6400kWth, wood', according to actual water, carbon and energy content of the fuel (pressed sorghum bagasse)
  properties: carbon content, fossil 0.628, wet mass 1 kg, dry mass 1 kg
  note on carbon content, fossil: This dataset is an unweighted average of 20 organic substances (listed in Tab 88.1, ecoinvent v2.2 report 8, part II), being part of the top100 chemicals included in this database. The C-content has also been calculated as an unweighted average of the C content of the substances composing this dataset.
- ammonia, liquid: 1.14874e-8 kg; lognormal variance with pedigree 0.072, pedigree (4,4,5,5,1)
  (same comment as for water, decarbonised)
  properties: wet mass 1 kg, dry mass 1 kg
- lubricating oil: 1.65287e-5 kg; lognormal variance with pedigree 0.070625, pedigree (2,4,5,2,3)
  EcoSpold01Location=RER
  Compilation of data from sugarcane and sorghum milling, industrial data
  Uncertainty: Compilation of data from sugarcane and sorghum milling, industrial data
  properties: carbon content, fossil 0.75, wet mass 1 kg, dry mass 1 kg
  note on carbon content, fossil: Lubricating oil is produced from diesel. C-content/dry mass of fats and oils considered 75%, from: ecoinvent v2.2 report, n 15a, pg 40
- chlorine, liquid: 4.59479e-7 kg; lognormal variance with pedigree 0.072, pedigree (4,4,5,5,1)
  (same comment as for water, decarbonised)
  properties: dry mass 1 kg, wet mass 1 kg
- waste mineral oil: -4.59479e-6 kg; lognormal variance with pedigree 0.072, pedigree (4,4,5,5,1)
  EcoSpold01Location=CH
  Adapted from the dataset 'wood chips, in cogen 6400kWth, wood', according to actual water, carbon and energy content of the fuel (pressed sorghum bagasse)
  Uncertainty: Adapted from the dataset 'wood chips, in cogen 6400kWth, wood', according to actual water, carbon and energy content of the fuel (pressed sorghum bagasse)
  production volume 154.794 kg; = (Ref('24930a10-de63-42d9-b986-e177f7d6b5a7')*-1)/ ethanol_RP* ethanol_RP_PV
    (same comment as for vinasse, from fermentation of sweet sorghum)
  properties: wet mass 1 kg, carbon content, fossil 0.864444, dry mass 0.9 kg, water content 0.111111
  note on carbon content, fossil: Tab A.6, ecoinvent v2.2 report 13_I. C content has been calculated after data in the tables, and then referred to 1 kg DM
- municipal solid waste: -4.59479e-6 kg; lognormal variance with pedigree 0.072, pedigree (4,4,5,5,1)
  (same comment as for waste mineral oil)
  production volume 154.794 kg; = (Ref('05e0894c-d470-49b7-8bd4-c81db986f020')*-1)/ ethanol_RP* ethanol_RP_PV
    (same comment as for vinasse, from fermentation of sweet sorghum)
  properties: wet mass 1 kg, carbon content, fossil 0.171549, carbon content, non-fossil 0.261655, dry mass 0.771 kg, water content 0.297017
  note on carbon content, fossil: MSW composition in tab 4.1, ecoinvent v2.2 report 13_I. C content referred to 1 kg DM
- wood ash mixture, pure: -0.000741059 kg; lognormal variance with pedigree 0.072, pedigree (4,4,5,5,1)
  (same comment as for waste mineral oil)
  production volume 24965.5 kg; = (Ref('1edd1f3c-f1c7-4f3f-b29b-2d0d84081a98')*-1)/ ethanol_RP* ethanol_RP_PV
    (same comment as for vinasse, from fermentation of sweet sorghum)
  properties: dry mass 1 kg, wet mass 1 kg, carbon content, non-fossil 0.012
- sweet sorghum stem: 0.892574 kg; lognormal variance with pedigree 0.0406, pedigree (2,1,5,1,1)
  EcoSpold01Location=CN
  Average ethanol yields in China, literature survey
  Uncertainty: Average ethanol yields in China, literature survey
  properties: dry mass 0.27 kg, carbon content, non-fossil 0.425926, wet mass 1 kg, water content 2.7037
  note on carbon content, non-fossil: C content 0.115 kg/kg fresh mass. ecoinvent v2.2 report n 17, Tab 11.2
- ethanol fermentation plant: 2.60034e-11 unit; lognormal variance with pedigree 0.3527, pedigree (2,4,5,3,1)
  Calculation, according to feed capacity and lifetime of the plant
  EcoSpold01Location=CH
  Uncertainty: Calculation, according to feed capacity and lifetime of the plant
- wastewater, average: -1.10251e-6 m3; lognormal variance with pedigree 0.072, pedigree (4,4,5,5,1)
  (same comment as for heat and power co-generation unit, 6400kW thermal, components for elec)
  production volume 37.1423 m3; = (Ref('621e81f2-0f54-4fba-9b24-48e7316bcb29')*-1)/ ethanol_RP* ethanol_RP_PV
    (same comment as for vinasse, from fermentation of sweet sorghum)
  properties: carbon content, non-fossil 0.194039, dry mass 0.346837 kg, water content 2882.2, wet mass 1000 kg
  note on carbon content, non-fossil: 0.0673 kg TOC/m3 (Tab A.17, ecoinvent v2.2 report 13_I). TOC was considered as Total Carbon.
- ammonium sulfate, as N: 0.000261426 kg; lognormal variance with pedigree 0.0707, pedigree (2,4,5,3,3)
  EcoSpold01Location=RER
  Etha+ project Alcosuisse, industrial data
  Uncertainty: etha+ project Alcosuisse, industrial data
  properties: wet mass 1 kg, dry mass 1 kg
- sodium chloride, powder: 5.74353e-6 kg; lognormal variance with pedigree 0.072, pedigree (4,4,5,5,1)
  (same comment as for water, decarbonised)
  properties: wet mass 1 kg, dry mass 1 kg
- heat and power co-generation unit, 6400kW thermal, building: 3.37607e-10 unit; lognormal variance with pedigree 0.372, pedigree (4,4,5,5,1)
  (same comment as for heat and power co-generation unit, 6400kW thermal, components for elec)
- heat and power co-generation unit, 6400kW thermal, common components for heat+electricity: 1.3518e-9 unit; lognormal variance with pedigree 0.372, pedigree (4,4,5,5,1)
  (same comment as for heat and power co-generation unit, 6400kW thermal, components for elec)

## Inputs from nature
- Carbon dioxide, in air [natural resource, in air]: 0.0554137 kg; lognormal variance with pedigree 0.04, pedigree (1,1,5,1,1)
  Calculation, to close carbon balance
  Uncertainty: Calculation, to close carbon balance

## Emissions to nature
- Water [water, unspecified]: 0.000764279 m3; name water_to_water_unspecified; = (tap_water_input/1000)*(1-fraction_TW_to_air)+(water_decarbonised_input/1000)*(1-fraction_WDC_to_air); lognormal variance with pedigree 0.0807, pedigree (2,2,5,1,1)
  Calculated value based on literature values and expert opinion. See comments in the parametres' comment field.
  property water in wet mass 1000 kg; name WWM
  property wet mass 1000 kg; name WM
  property carbon content, fossil 0; name C_content_fossil
  property dry mass 0 kg; name DM
  property carbon content, non-fossil 0; name C_content_non_fossil
- Ammonia [air, urban air close to ground]: 2.43753e-6 kg; lognormal variance with pedigree 0.082, pedigree (4,4,5,5,1)
  Adapted from the dataset 'wood chips, in cogen 6400kWth, wood', according to actual water, carbon and energy content of the fuel (pressed sorghum bagasse)
  Uncertainty: Adapted from the dataset 'wood chips, in cogen 6400kWth, wood', according to actual water, carbon and energy content of the fuel (pressed sorghum bagasse)
- Carbon dioxide, non-fossil [air, urban air close to ground]: 0.275555 kg; lognormal variance with pedigree 0.04, pedigree (1,1,5,1,1)
  Calculation, to close carbon balance (incl. carbon from the combustion of bagasse)
  Uncertainty: Calculation, to close carbon balance (incl. carbon from the combustion of bagasse)
- Water [air, unspecified]: 7.05605e-7 m3; name water_to_air_unspecified; = (tap_water_input/1000*fraction_TW_to_air)+(water_decarbonised_input/1000*fraction_WDC_to_air); lognormal variance with pedigree 0.0807, pedigree (2,2,5,1,1)
  (same comment as for Water)
- Zinc [air, urban air close to ground]: 4.20259e-7 kg; lognormal variance with pedigree 0.722, pedigree (4,4,5,5,1)
  (same comment as for Ammonia)
- Potassium [air, urban air close to ground]: 3.27798e-5 kg; lognormal variance with pedigree 0.722, pedigree (4,4,5,5,1)
  (same comment as for Ammonia)
- Phenol, pentachloro- [air, urban air close to ground]: 1.01753e-11 kg; lognormal variance with pedigree 0.112, pedigree (4,4,5,5,1)
  (same comment as for Ammonia)
- Particulates, < 2.5 um [air, urban air close to ground]: 5.64053e-5 kg; lognormal variance with pedigree 0.372, pedigree (4,4,5,5,1)
  (same comment as for Ammonia)
- Toluene [air, urban air close to ground]: 3.76871e-7 kg; lognormal variance with pedigree 0.112, pedigree (4,4,5,5,1)
  (same comment as for Ammonia)
- PAH, polycyclic aromatic hydrocarbons [air, urban air close to ground]: 1.38188e-8 kg; lognormal variance with pedigree 0.372, pedigree (4,4,5,5,1)
  (same comment as for Ammonia)
- Sodium [air, urban air close to ground]: 1.82112e-6 kg; lognormal variance with pedigree 0.722, pedigree (4,4,5,5,1)
  (same comment as for Ammonia)
- Hydrocarbons, aliphatic, unsaturated [air, urban air close to ground]: 3.8943e-6 kg; lognormal variance with pedigree 0.112, pedigree (4,4,5,5,1)
  (same comment as for Ammonia)
- Copper [air, urban air close to ground]: 3.08188e-8 kg; lognormal variance with pedigree 0.722, pedigree (4,4,5,5,1)
  (same comment as for Ammonia)
- Chromium VI [air, urban air close to ground]: 5.60349e-11 kg; lognormal variance with pedigree 0.722, pedigree (4,4,5,5,1)
  (same comment as for Ammonia)
- Methane, non-fossil [air, urban air close to ground]: 5.45211e-7 kg; lognormal variance with pedigree 0.112, pedigree (4,4,5,5,1)
  (same comment as for Ammonia)
- Manganese [air, urban air close to ground]: 2.39549e-7 kg; lognormal variance with pedigree 0.722, pedigree (4,4,5,5,1)
  (same comment as for Ammonia)
- Arsenic [air, urban air close to ground]: 1.40089e-9 kg; lognormal variance with pedigree 0.722, pedigree (4,4,5,5,1)
  (same comment as for Ammonia)
- Sulfur dioxide [air, urban air close to ground]: 3.48818e-6 kg; lognormal variance with pedigree 0.072, pedigree (4,4,5,5,1)
  (same comment as for Ammonia)
- Dioxins, measured as 2,3,7,8-tetrachlorodibenzo-p-dioxin [air, urban air close to ground]: 3.8943e-14 kg; lognormal variance with pedigree 0.372, pedigree (4,4,5,5,1)
  (same comment as for Ammonia)
- Mercury [air, urban air close to ground]: 4.20259e-10 kg; lognormal variance with pedigree 0.722, pedigree (4,4,5,5,1)
  (same comment as for Ammonia)
- Phosphorus [air, urban air close to ground]: 4.20259e-7 kg; lognormal variance with pedigree 0.112, pedigree (4,4,5,5,1)
  (same comment as for Ammonia)
- Benzo(a)pyrene [air, urban air close to ground]: 6.28122e-10 kg; lognormal variance with pedigree 0.372, pedigree (4,4,5,5,1)
  (same comment as for Ammonia)
- Acetaldehyde [air, urban air close to ground]: 8.54523e-8 kg; lognormal variance with pedigree 0.112, pedigree (4,4,5,5,1)
  (same comment as for Ammonia)
- Benzene, ethyl- [air, urban air close to ground]: 3.76871e-8 kg; lognormal variance with pedigree 0.112, pedigree (4,4,5,5,1)
  (same comment as for Ammonia)
- Benzene, hexachloro- [air, urban air close to ground]: 9.04534e-15 kg; lognormal variance with pedigree 0.372, pedigree (4,4,5,5,1)
  (same comment as for Ammonia)
- Formaldehyde [air, urban air close to ground]: 1.63314e-7 kg; lognormal variance with pedigree 0.112, pedigree (4,4,5,5,1)
  (same comment as for Ammonia)
- Benzene [air, urban air close to ground]: 1.14321e-6 kg; lognormal variance with pedigree 0.112, pedigree (4,4,5,5,1)
  (same comment as for Ammonia)
- Calcium [air, urban air close to ground]: 8.19508e-6 kg; lognormal variance with pedigree 0.722, pedigree (4,4,5,5,1)
  (same comment as for Ammonia)
- Magnesium [air, urban air close to ground]: 5.05714e-7 kg; lognormal variance with pedigree 0.722, pedigree (4,4,5,5,1)
  (same comment as for Ammonia)
- Chlorine [air, urban air close to ground]: 2.52152e-7 kg; lognormal variance with pedigree 0.112, pedigree (4,4,5,5,1)
  (same comment as for Ammonia)
- NMVOC, non-methane volatile organic compounds, unspecified origin [air, urban air close to ground]: 7.66301e-7 kg; lognormal variance with pedigree 0.112, pedigree (4,4,5,5,1)
  (same comment as for Ammonia)
- Dinitrogen monoxide [air, urban air close to ground]: 3.22201e-6 kg; lognormal variance with pedigree 0.112, pedigree (4,4,5,5,1)
  (same comment as for Ammonia)
- Nickel [air, urban air close to ground]: 8.40519e-9 kg; lognormal variance with pedigree 0.722, pedigree (4,4,5,5,1)
  (same comment as for Ammonia)
- Hydrocarbons, aliphatic, alkanes, unspecified [air, urban air close to ground]: 1.14321e-6 kg; lognormal variance with pedigree 0.112, pedigree (4,4,5,5,1)
  (same comment as for Ammonia)
- Fluorine [air, urban air close to ground]: 7.00429e-8 kg; lognormal variance with pedigree 0.112, pedigree (4,4,5,5,1)
  (same comment as for Ammonia)
- Cadmium [air, urban air close to ground]: 9.80581e-10 kg; lognormal variance with pedigree 0.722, pedigree (4,4,5,5,1)
  (same comment as for Ammonia)
- Nitrogen oxides [air, urban air close to ground]: 0.000123273 kg; lognormal variance with pedigree 0.112, pedigree (4,4,5,5,1)
  (same comment as for Ammonia)
- Bromine [air, urban air close to ground]: 8.40519e-8 kg; lognormal variance with pedigree 0.722, pedigree (4,4,5,5,1)
  (same comment as for Ammonia)
- Chromium [air, urban air close to ground]: 5.54743e-9 kg; lognormal variance with pedigree 0.722, pedigree (4,4,5,5,1)
  (same comment as for Ammonia)
- Carbon monoxide, non-fossil [air, urban air close to ground]: 8.79364e-6 kg; lognormal variance with pedigree 0.722, pedigree (4,4,5,5,1)
  (same comment as for Ammonia)
- m-Xylene [air, urban air close to ground]: 1.50747e-7 kg; lognormal variance with pedigree 0.112, pedigree (4,4,5,5,1)
  (same comment as for Ammonia)
- Lead [air, urban air close to ground]: 3.48818e-8 kg; lognormal variance with pedigree 0.722, pedigree (4,4,5,5,1)
  (same comment as for Ammonia)

## Sampling procedure
Data is from the etha+ project (Alcosuisse, CH) and the ASIATIC project (LASEN, CH), technology by French ethanol plant supplier, modelling by ENERS (CH)

## Extrapolations
Direct emissions (resulting from the combustion of sorghum bagasse) are based on the the combustion of wood chips (without emission control), according to the corresponding dry matter content, carbon content and energy content.

## Review by Niels Jungbluth 2006-08-15
Passed.
none
