# maintenance, train, passenger, high-speed

Dataset: EcoSpold 2, unit process
Geography: DE
Time period: 1996-01-01 to 2019-12-31
Technology level: current
Classification: EcoSpold01Categories: transport systems/train
Classification: ISIC rev.4 ecoinvent: 3315:Repair of transport equipment, except motor vehicles
Tags: ConvertedDataset
Scenario: Business-as-Usual
System model: Allocation at the point of substitution
Generated by: Michael Spielmann (obsolete)
Published in: Spielmann M. 2004
Database: ecoinvent
isCopyrightProtected: true
accessRestrictedTo: 1

## General comment
The life span of the train is assumed to be 25 years; a yearly performance of 400'000 vkm results in a life time performance of 10’000’000 vkm.
[This dataset was already contained in the ecoinvent database version 2. It was not individually updated during the transfer to ecoinvent version 3. Life Cycle Impact Assessment results may still have changed, as they are affected by changes in the supply chain, i.e. in other datasets. This dataset was generated following the ecoinvent quality guidelines for version 2. It may have been subject to central changes described in the ecoinvent version 3 change report (http://www.ecoinvent.org/database/ecoinvent-version-3/reports-of-changes/), and the results of the central updates were reviewed extensively. The changes added e.g. consistent water flows and other information throughout the database. The documentation of this dataset can be found in the ecoinvent reports of version 2, which are still available via the ecoinvent website. The change report linked above covers all central changes that were made during the conversion process.]

## Included activities end
This inventory includes expenditures for regular maintenance and repair.

## Geography
Data represents a train maintenance of an ICE (no distinction between ICE 1 and ICE 2 is made)

## Technology
ICE 1 and ICE 2

## Parameters
- fraction, process water, to air: 0.15 dimensionless; name fraction_PW_to_air; lognormal variance with pedigree 0.092025, pedigree (4,4,3,2,4)
  Literature value. In case when no industry/process specific data are available, default evaporation fraction value is used. This value is 15% and is based on literature (Statistics Canada, 2007 & Shaffer, K.H., 2008, Consumptive water use in the Great Lakes Basin, USGS & Shiklomanov, 2003, World Water Resources at the Beginning of the 21st Century) and has been approved by an expert.
- fraction, tap water, to air: 0.15; name fraction_TW_to_air; = fraction_PW_to_air; lognormal variance with pedigree 0.092025, pedigree (4,4,3,2,4)
  Calculated value. See comment in the other parametres present in this dataset. Tap water is considered to be always used as process water, thus process water fractions to air are applied to all tap water input flows to calculate the amount of water consumed in the processes.

## Reference product
- maintenance, train, passenger, high-speed: 1 unit; By-product classification allocatable product; CPC 87149: Maintenance and repair services of other transport equipment
  EcoSpold01Location=DE
  production volume 0.242058 unit
    This is a placeholder value that does not reflect real-world production volumes. This dataset does not currently require a real-world production volume to work in the database framework, and no actual data were collected yet. This has no negative effect on the results of the ecoinvent database. The placeholder value of this activity was scaled according to the nominal GDP of 2005 (source: United Nations, http://data.un.org/Glossary.aspx?q=GDP+%28current+US%24%29, accessed 20130726) to reflect an appropriate share of the global production volume, which is also a placeholder value.
  property price 491546 EUR2005
    Calculated based on inputs: The price of the product has been calculated as a sum of the values of the material and energy inputs for this product. This value is therefore a rough estimation. It may underestimate the real price since there are additional expenses when producing any product. These expences can include for example labour costs, treatment of waste materials and profit for the producer. Please consider carefully whether this level of data quality is acceptable for your application.
  property true value 491546
    allocation property applied in "true value" allocation // value calculated from revenue

## By-products
- heat, for reuse in municipal waste incineration only: 0 MJ; CPC 17300: Steam and hot water; By-product classification allocatable product; pedigree (1,1,1,1,1)
  Net electricity generated from this waste and used in internal MSWI plant energy redistribution.
  production volume 1817.11 MJ
  property true value relation 0.1842; name E_th_prod_MSWI_true_value_relation
    property to calculate 'true value' from
  property exergy 0.1842 MJ; name E_th_prod_MSWI_exergy
    This exergy property is based on the exergy content of the product.
  property price 0.0106 EUR2005; name E_th_prod_MSWI_price_EUR2005
    Average European district heat price from Ecoheatcool and Euroheat 2005-2006, Ecoheat Work package 1: The European heat market. Final report. 10.6 EUR/GJ i s the price of district heat. http://www.solarthermalworld.org/files/Ecoheatcool%20WP1%20Web.pdf?download
  property true value 12.1732
    allocation property applied in "true value" allocation // value calculated from true value relation
- electricity, for reuse in municipal waste incineration only: 0 kWh; CPC 17100: Electrical energy; By-product classification allocatable product; pedigree (1,1,1,1,1)
  (same comment as for heat, for reuse in municipal waste incineration only)
  production volume 229.166 kWh
  property price 0.1 EUR2005; name E_el_prod_MSWI_price_EUR2005
    Estimated to be the same price as in case of electricity, medium voltage.
  property exergy 3.6 MJ; name E_el_prod_MSWI_exergy
    This exergy property is based on the exergy content of the product.
  property true value relation 3.6; name E_el_prod_MSWI_true_value_relation
    property to calculate 'true value' from
  property true value 30.0047
    (same comment as for heat, for reuse in municipal waste incineration only)

## Inputs from technosphere
- sodium hydroxide, without water, in 50% solution state: 39996.6 kg; lognormal variance with pedigree 0.0508, pedigree (2,2,5,3,1)
  Literature studies (regular maintenance)
  EcoSpold01Location=RER
  Uncertainty: literature studies (regular maintenance)
  properties: dry mass 1 kg, wet mass 1 kg
- aluminium, cast alloy: 39.9966 kg; lognormal variance with pedigree 0.0508, pedigree (2,2,5,3,1)
  EcoSpold01Location=RER
  Literature studies (repair)
  Uncertainty: literature studies (repair)
  properties: wet mass 1 kg, dry mass 1 kg
- tap water: 456961 kg; name tap_water_input; lognormal variance with pedigree 0.0508, pedigree (2,2,5,3,1)
  EcoSpold01Location=RER
  Literature studies (repair & regular maintenance)
  Uncertainty: literature studies (repair & regular maintenance)
  properties: carbon content, fossil 0.00178991, dry mass 0.000337476 kg, water content 2962.17, wet mass 1 kg
  note on carbon content, fossil: Bicarbonate content is 2.93 mol/m3. CO2 content is 0.1 mol/m3 (ecoinvent v2.2 report 8, Tab 93.1).
- aluminium, wrought alloy: 84.9927 kg; lognormal variance with pedigree 0.0508, pedigree (2,2,5,3,1)
  (same comment as for aluminium, cast alloy)
  properties: wet mass 1 kg, dry mass 1 kg
- electricity, medium voltage: 1.57986e6 kWh; lognormal variance with pedigree 0.0508, pedigree (2,2,5,3,1)
  Literature studies (repair & regular maintenance)
  EcoSpold01Location=DE
  Uncertainty: literature studies (repair & regular maintenance)
- lubricating oil: 499.957 kg; lognormal variance with pedigree 0.0508, pedigree (2,2,5,3,1)
  Literature studies (repair)
  EcoSpold01Location=RER
  Uncertainty: literature studies (repair)
  properties: carbon content, fossil 0.75, wet mass 1 kg, dry mass 1 kg
  note on carbon content, fossil: Lubricating oil is produced from diesel. C-content/dry mass of fats and oils considered 75%, from: ecoinvent v2.2 report, n 15a, pg 40
- copper: 124.989 kg; lognormal variance with pedigree 0.0508, pedigree (2,2,5,3,1)
  (same comment as for lubricating oil)
  properties: dry mass 1 kg, wet mass 1 kg
- paper, woodfree, uncoated: 20698.2 kg; lognormal variance with pedigree 0.0508, pedigree (2,2,5,3,1)
  Literature studies (repair & regular maintenance)
  EcoSpold01Location=RER
  Uncertainty: literature studies (repair & regular maintenance)
  properties: carbon content, non-fossil 0.281215, water content 0.0582011, carbon content, fossil 0.0251406, wet mass 1 kg, dry mass 0.945 kg
  note on carbon content, non-fossil: Biogenic C content was calculated after biogenic C contents of chemicals used in the production of the paper (in Tab 8.54 & 8.55 ecoinvent v2.2 report 11_III, part 8). The cellulose content in 1 kg of paper (on a wet mas basis) was estimated as (1-chemical content), C content of cellulose was considered 0.44 kgC/kg dry mass (ecoinvent v2.2 report, n 15a, pg 40)
  note on carbon content, fossil: Fossil C content was calculated after fossil C contents of chemicals used in the production of the paper (in Tab 8.54 & 8.55 ecoinvent v2.2 report 11_III, part 8).
- reinforcing steel: 44996.1 kg; lognormal variance with pedigree 0.0508, pedigree (2,2,5,3,1)
  Literature study (repair)
  EcoSpold01Location=RER
  Uncertainty: literature study (repair)
  properties: carbon content, fossil 0.004, wet mass 1 kg, dry mass 1 kg
- waste emulsion paint: -1999.83 kg; lognormal variance with pedigree 0.1708, pedigree (2,2,5,3,1)
  Based on own calculations, assuming that 0.6 of the paint are emitted as NMVOCs.
  EcoSpold01Location=CH
  Uncertainty: based on own calculations, assuming that 0.6 of the paint are emitted as NMVOCs.
  production volume 2000 kg
    Calculated from the production volume of maintenance, train, passenger, high-speed in proportion to the respective output amounts.
  properties: carbon content, fossil 0.27, dry mass 1 kg, wet mass 1 kg
  note on carbon content, fossil: Tab A.4, ecoinvent v2.2 report 13_I. C content has been calculated after data in the tables, and then referred to 1 kg DM
- wastewater, average: -456.961 m3; lognormal variance with pedigree 0.0508, pedigree (2,2,5,3,1)
  EcoSpold01Location=CH
  Literature studies (repair & regular maintenance)
  Uncertainty: literature studies (repair & regular maintenance)
  production volume 457 m3
    (same comment as for waste emulsion paint)
  properties: water content 2882.2, dry mass 0.346837 kg, carbon content, non-fossil 0.194039, wet mass 1000 kg
  note on carbon content, non-fossil: 0.0673 kg TOC/m3 (Tab A.17, ecoinvent v2.2 report 13_I). TOC was considered as Total Carbon.
- solvent, organic: 499.957 kg; lognormal variance with pedigree 0.0508, pedigree (2,2,5,3,1)
  EcoSpold01Location=GLO
  Literature studies (repair)
  Uncertainty: literature studies (repair)
  properties: carbon content, fossil 0.63072, wet mass 1 kg, dry mass 1 kg
  note on carbon content, fossil: Mixture of 15 of the most often used solvents (list in ecoinvent v2.2 report 11-III, pg 293). C content was calculated as an unweighted average of C content of the different solvents
- alkyd paint, white, without solvent, in 60% solution state: 4999.57 kg; lognormal variance with pedigree 0.0508, pedigree (2,2,5,3,1)
  (same comment as for aluminium, cast alloy)
  properties: carbon content, non-fossil 0.199629, wet mass 1 kg, carbon content, fossil 0.140367, dry mass 1 kg
  note on carbon content, non-fossil: C content was calculated as an addition of C content in the raw materials.
- heat, district or industrial, natural gas: 2.50978e7 MJ; lognormal variance with pedigree 0.0508, pedigree (2,2,5,3,1)
  (same comment as for tap water)

## Emissions to nature
- NMVOC, non-methane volatile organic compounds, unspecified origin [air, unspecified]: 3499.7 kg; lognormal variance with pedigree 0.1708, pedigree (2,2,5,3,1)
  Derived from the used paint and solvent, assuming all solvent is emitted to air.
  Uncertainty: Derived from the used paint and solvent, assuming all solvent is emitted to air.
- Water [air, unspecified]: 68.5441 m3; name water_to_air_unspecified; = (tap_water_input/1000*fraction_TW_to_air); lognormal variance with pedigree 0.0807, pedigree (2,2,5,1,1)
  Calculated value based on literature values and expert opinion. See comments in the parametres' comment field.
  property fraction, origin: unspecified 0; name fraction_origin_unspecified
  property fraction, origin: fresh water 1; name fraction_origin_fresh_water
  property fraction, origin: salt water 0; name fraction_origin_salt_water

## Sampling procedure
The data of the material composition and energy consumption is based on literature studies.

## Review by Michael Spielmann (obsolete) 2004-04-05
passed
