# transport, freight, aircraft, all distances to generic market for transport, freight, aircraft, unspecified

Dataset: EcoSpold 2, unit process
Geography: GLO
Time period: 2016-01-01 to 2019-12-31
Technology level: current
Classification: ISIC rev.4 ecoinvent: 5120:Freight air transport
Tags: linking activity
Scenario: Business-as-Usual
System model: Allocation at the point of substitution
Generated by: Lucia Valsasina
Database: ecoinvent
isCopyrightProtected: true
accessRestrictedTo: 1

## General comment
This is a linking activity which transfers part of the production volume of the specific transport, freight, aircraft of all distances to the generic market for transport, freight, aircraft, unspecified.
The transport, freight, lorry, unspecified is meant to be used by activities, where the distance of the transport supplied is unkown.

## Included activities start
The activity starts with the input of the transport activities for the different flight distances. The mix is based on the production volumes of the respective transforming activities.

## Included activities end
The activity ends with the supply of 1 metric ton*km of generic (i.e. unspecified) transport.

## Reference product
- transport, freight, aircraft, unspecified: 1 metric ton*km; By-product classification allocatable product; CPC 65319: Air transport services of other freight
  production volume 8.45176e10 metric ton*km; name transport_RP_PV; = (7517000000*0.9*0.5)+(17800000000*0.9*0.5)+(54800000000*0.9*0.5)+(107700000000*0.9*0.5)
    Estimated.
    The production volume is calculated as a sum of all the "transport, freight, aircraft, ... haul" activities.
    It is estimated, that 10% of this transport is used for transport of goods in need of atmosphere control.
    It is also estimated, that 50% of the production volume of this transport is transfered to the generic market for transport, freight, aircraft, unspecified. Which means, that 50% of people using this transport do not know or do not care about the distance travelled.
  property price 0.0323532 EUR2005
    Calculated based on inputs: The price of the product has been calculated as a sum of the values of the material and energy inputs for this product. This value is therefore a rough estimation. It may underestimate the real price since there are additional expenses when producing any product. These expences can include for example labour costs, treatment of waste materials and profit for the producer. Please consider carefully whether this level of data quality is acceptable for your application.

## Inputs from technosphere
- transport, freight, aircraft, short haul: 0.0947731 metric ton*km; = (17800000000*0.9*0.5)/ transport_RP_PV; lognormal variance with pedigree 0.2106, pedigree (5,5,5,5,5)
  Calculated from the production volumes.
  The production volume is taken from the "transport, freight, aircraft, ... haul" activities.
  It is estimated, that 10% of this transport is used for transport of goods in need of atmosphere control.
  It is also estimated, that 50% of the production volume of this transport is transfered to the generic market for transport, freight, aircraft, unspecified. Which means, that 50% of people using this transport do not know or do not care about the distance travelled.
- transport, freight, aircraft, very short haul: 0.040023 metric ton*km; = (7517000000*0.9*0.5)/ transport_RP_PV; lognormal variance with pedigree 0.2106, pedigree (5,5,5,5,5)
  (same comment as for transport, freight, aircraft, short haul)
- transport, freight, aircraft, medium haul: 0.291773 metric ton*km; = (54800000000*0.9*0.5)/ transport_RP_PV; lognormal variance with pedigree 0.2106, pedigree (5,5,5,5,5)
  (same comment as for transport, freight, aircraft, short haul)
- transport, freight, aircraft, long haul: 0.573431 metric ton*km; = (1.077E+11*0.9*0.5)/ transport_RP_PV; lognormal variance with pedigree 0.2106, pedigree (5,5,5,5,5)
  (same comment as for transport, freight, aircraft, short haul)

## Extrapolations
This dataset has been extrapolated from year 2016 to the year of the calculation (2019). The uncertainty has been adjusted accordingly.
