# treatment of waste packaging paper, open dump, moist infiltration class (300mm)

Dataset: EcoSpold 2, unit process
Geography: GLO
Time period: 2006-01-01 to 2019-12-31
Technology level: current
Classification: ISIC rev.4 ecoinvent: 3821:Treatment and disposal of non-hazardous waste
Synonyms: municipal waste landfill
Scenario: Business-as-Usual
System model: Allocation at the point of substitution
Share of production covered: 1 %
Generated by: Avraam Symeonidis
Database: ecoinvent
isCopyrightProtected: true
accessRestrictedTo: 1

## General comment
This dataset represents the activity of waste disposal of waste packaging paper in a open dump. Recommended use of this dataset: For packaging paper, which goes to disposal as part of unmanaged communal waste mixture. Larger amounts of *already separated* packaging paper could go to recycling, depending on country-specific situation. // Waste composition (wet, in ppm): upper heating value 16.77 MJ/kg; lower heating value 14.12 MJ/kg; H2O 110980; O 377790; H 53851; C 403520; S 1381.8; N 4098.6; P 124.15; B 19.101; Cl 1892.4; Br n.a.; F 21.631; I n.a.; Ag n.a.; As 2.2761; Ba 125.43; Cd 1.8323; Co 0.71627; Cr 14.922; Cu 64.327; Hg 0.14537; Mn 39.49; Mo 4.7751; Ni 10.235; Pb 79.273; Sb 0.7879; Se 2.8651; Sn n.a.; V n.a.; Zn 132.49; Be 1.0824; Sc n.a.; Sr 64.751; Ti 191.01; Tl 1.9101; W n.a.; Si 21297; Fe 1305; Ca 3820.1; Al 12415; K 955.03; Mg 4775.1; Na 1020.9; . // Share of carbon in waste that is biogenic 100%. Share of metals in waste not oxidised and bulk-recyclable (exclude very small or thin parts) Iron: 0%; Alu: 0%; Copper: 0%. Overall degradability of waste during 100 years: 27%.

## Included activities start
from final waste deposition (without transports to the site)

## Included activities end
Waste-specific short-term emissions to air via landfill gas and landfill leachate. Waste-specific long-term emissions from landfill.

## Geography
Given name of landfill location is 'infiltration class 3 moist (2018)'. Landfill site with mean annual temperature (MAT) of 8 degC, mean annual precipitation (MAP) of 900 mm/year, and net infiltration of 300 mm/year.
Climate adjustments result in an alpha t (temperature) for permafrost areas of 0.999. Total climate adjustments with alpha pt of 0.999.

## Technology
This is an inventory for an open, uncontrolled waste dump for municipal solid waste. Ultimate average landfill height is 7 meters. Operation phase duration is 15 years.Percentage of landfill gas directly emitted is 100w%. A Methane Correction Factor (MCF) for landfill air emissions of 0.7057 is employed.
Leachate of the landfill is not treated. Based on average waste composition and climate data the end of carbonate phase is estimated to be reached 2658 years after waste deposition.

## Reference product
- waste packaging paper: -1 kg; CPC 39240: Waste and scrap of paper or paperboard; By-product classification Recyclable; pedigree (1,1,1,1,1)
  main reference product of this activity (supply of disposal service).
  Uncertainty: Uncertainty is not adjusted, as this is the refence product
  production volume 1 kg
    The amount of the annual production volume is a placeholder value. The contribution of this technology to the different local markets can be found in the markets themselves.
  property price 0.1 EUR2005
    For paper and board waste the price, in 2005, according to [http://ec.europa.eu/eurostat] is about 1 EUR/kg corresponding to a purchase price of 0.099 similar to the price of UN comodittie: Waste, scrap of paper, board, nes (including unsorted).
  property carbon content 0.45389
    carbon content on a dry matter basis (reserved; not for manual entry)
  properties: thallium content 2.1485e-6, silicon content 0.023956, chromium content 1.6785e-5, copper content 7.2357e-5, zinc content 0.00014903, hydrogen content 0.060574, heating value, net 14.12 MJ, titanium content 0.00021485, oxygen content 0.42495, nickel content 1.1512e-5, phosphorus content 0.00013965, strontium content 7.2834e-5, heating value, gross 16.768 MJ, cobalt content 8.0568e-7, molybdenum content 5.3712e-6, arsenic content 2.5603e-6, potassium content 0.0010742, iron content 0.001468, lead content 8.9169e-5, beryllium content 1.2175e-6, calcium content 0.004297, cadmium content 2.061e-6, manganese content 4.442e-5, fluorine content 2.4332e-5, boron content 2.1485e-5, aluminium content 0.013965, mercury content 1.6352e-7, wet mass 1 kg, water in wet mass 0.11098 kg, dry mass 0.88902 kg, sodium content 0.0011484, magnesium content 0.0053712, water content 0.12483, carbon content, non-fossil 0.45389, barium content 0.00014108, selenium content 3.2227e-6, sulfur content 0.0015543, nitrogen content 0.0046102, chlorine content 0.0021286, antimony content 8.8625e-7, carbon allocation 0.403517 kg

## Emissions to nature
- Copper [air, non-urban air or from high stacks]: 2.4271e-11 kg; lognormal variance with pedigree 0.67844, pedigree (1,1,3,1,1)
  burden from direct release or incineration of landfill biogas; or windblown leachate evaporite in arid climates.
  Uncertainty: Uncertainty calculated from unertainty of the waste composition of this waste, uncertainty in waste decomposition and short-term leaching in landfill
- Mercury [water, ground-]: 2.6855e-9 kg; lognormal variance with pedigree 0.52943, pedigree (1,1,3,1,1)
  burden from short-term leachate to groundwater in uncontrolled landfill in moist cimate.
  Uncertainty: Uncertainty calculated from unertainty of the waste composition of this waste, uncertainty in waste decomposition and short-term leaching in landfill
- Cadmium, ion [water, ground-, long-term]: 1.7448e-6 kg; lognormal variance with pedigree 0.37473, pedigree (1,1,3,1,1)
  Emissions from long-term leachate (>100a) directly from MSW landfill and indirectly via incineration of treatement sludge from leachate treatement.
  Uncertainty: Uncertainty calculated depending on waste input and uncertainty of long-term transfer coefficents in landfill.
- Mercury [air, non-urban air or from high stacks]: 1.0742e-9 kg; lognormal variance with pedigree 0.55634, pedigree (1,1,3,1,1)
  (same comment as for Copper)
- Cobalt [water, ground-]: 6.2087e-8 kg; lognormal variance with pedigree 0.43841, pedigree (1,1,3,1,1)
  (same comment as for Mercury)
- Chloride [water, ground-, long-term]: 0.00058921 kg; lognormal variance with pedigree 0.14995, pedigree (1,1,3,1,1)
  (same comment as for Cadmium, ion)
- Manganese [air, non-urban air or from high stacks]: 3.0493e-9 kg; lognormal variance with pedigree 0.52087, pedigree (1,1,3,1,1)
  (same comment as for Copper)
- Chromium VI [water, ground-]: 4.5871e-8 kg; lognormal variance with pedigree 0.43303, pedigree (1,1,3,1,1)
  (same comment as for Mercury)
- Nitrate [water, ground-, long-term]: 5.7371e-5 kg; lognormal variance with pedigree 0.12721, pedigree (1,1,3,1,1)
  (same comment as for Cadmium, ion)
- Cobalt [air, non-urban air or from high stacks]: 1.5522e-11 kg; lognormal variance with pedigree 0.69462, pedigree (1,1,3,1,1)
  (same comment as for Copper)
- Arsenic, ion [water, ground-]: 1.1025e-7 kg; lognormal variance with pedigree 0.41491, pedigree (1,1,3,1,1)
  (same comment as for Mercury)
- Boron [water, ground-, long-term]: 1.9101e-14 kg; lognormal variance with pedigree 0.778, pedigree (1,1,3,1,1)
  (same comment as for Cadmium, ion)
- Cadmium [air, non-urban air or from high stacks]: 5.7965e-10 kg; lognormal variance with pedigree 0.57553, pedigree (1,1,3,1,1)
  (same comment as for Copper)
- Barium [water, ground-]: 3.874e-5 kg; lognormal variance with pedigree 0.24417, pedigree (1,1,3,1,1)
  (same comment as for Mercury)
- Phosphate [water, ground-, long-term]: 2.5198e-5 kg; lognormal variance with pedigree 0.69422, pedigree (1,1,3,1,1)
  (same comment as for Cadmium, ion)
- Chromium [air, non-urban air or from high stacks]: 1.1468e-11 kg; lognormal variance with pedigree 0.7042, pedigree (1,1,3,1,1)
  (same comment as for Copper)
- Fluoride [water, ground-]: 4.2856e-7 kg; lognormal variance with pedigree 0.36473, pedigree (1,1,3,1,1)
  (same comment as for Mercury)
- Nitrite [water, ground-, long-term]: 2.9692e-5 kg; lognormal variance with pedigree 0.12721, pedigree (1,1,3,1,1)
  (same comment as for Cadmium, ion)
- Barium [air, non-urban air or from high stacks]: 9.6849e-9 kg; lognormal variance with pedigree 0.48242, pedigree (1,1,3,1,1)
  (same comment as for Copper)
- Cadmium, ion [water, ground-]: 8.6947e-8 kg; lognormal variance with pedigree 0.42251, pedigree (1,1,3,1,1)
  (same comment as for Mercury)
- Hydrogen sulfide [water, ground-, long-term]: 8.877e-5 kg; lognormal variance with pedigree 0.15618, pedigree (1,1,3,1,1)
  (same comment as for Cadmium, ion)
- Nitrogen oxides [air, non-urban air or from high stacks]: 1.5159e-6 kg; lognormal variance with pedigree 0.18235, pedigree (1,1,3,1,1)
  burden from direct release or incineration of landfill biogas.
  Uncertainty: Uncertainty calculated from unertainty of the waste composition of this waste, uncertainty in waste decomposition and short-term leaching in landfill
- Phosphate [water, ground-]: 5.7373e-6 kg; lognormal variance with pedigree 0.3144, pedigree (1,1,3,1,1)
  (same comment as for Mercury)
- Nitrogen, organic bound [water, ground-, long-term]: 0.00089163 kg; lognormal variance with pedigree 0.12721, pedigree (1,1,3,1,1)
  (same comment as for Cadmium, ion)
- Hydrogen fluoride [air, non-urban air or from high stacks]: 2.3253e-6 kg; lognormal variance with pedigree 0.32302, pedigree (1,1,3,1,1)
  (same comment as for Copper)
- Chloride [water, ground-]: 0.0012851 kg; lognormal variance with pedigree 0.14688, pedigree (1,1,3,1,1)
  (same comment as for Mercury)
- Ammonium, ion [water, ground-, long-term]: 0.00054553 kg; lognormal variance with pedigree 0.12721, pedigree (1,1,3,1,1)
  (same comment as for Cadmium, ion)
- Hydrogen chloride [air, non-urban air or from high stacks]: 1.8524e-5 kg; lognormal variance with pedigree 0.23833, pedigree (1,1,3,1,1)
  (same comment as for Copper)
- Boron [water, ground-]: 1.9101e-5 kg; lognormal variance with pedigree 0.29755, pedigree (1,1,3,1,1)
  (same comment as for Mercury)
- Sulfate [water, ground-, long-term]: 0.0034054 kg; lognormal variance with pedigree 0.15618, pedigree (1,1,3,1,1)
  (same comment as for Cadmium, ion)
- Arsenic [air, non-urban air or from high stacks]: 1.5456e-9 kg; lognormal variance with pedigree 0.54341, pedigree (1,1,3,1,1)
  (same comment as for Copper)
- Ammonium, ion [water, ground-]: 0.0010532 kg; lognormal variance with pedigree 0.1228, pedigree (1,1,3,1,1)
  (same comment as for Mercury)
- COD, Chemical Oxygen Demand [water, ground-, long-term]: 0.32232 kg; lognormal variance with pedigree 0.0087615, pedigree (1,1,3,1,1)
  (same comment as for Cadmium, ion)
- Carbon dioxide, non-fossil [air, non-urban air or from high stacks]: 0.23444 kg; lognormal variance with pedigree 0.002, pedigree (1,1,3,1,1)
  (same comment as for Nitrogen oxides)
- Nitrate [water, ground-]: 0.00011076 kg; lognormal variance with pedigree 0.1228, pedigree (1,1,3,1,1)
  (same comment as for Mercury)
- DOC, Dissolved Organic Carbon [water, ground-, long-term]: 0.2947 kg; lognormal variance with pedigree 0.0087615, pedigree (1,1,3,1,1)
  (same comment as for Cadmium, ion)
- Occupation, dump site [natural resource, land]: 0.0035714 m2*year; lognormal variance with pedigree 0.082256, pedigree (1,1,3,1,1)
  for landfill operation phase and spontaneous renaturation.
  Uncertainty: Uncertainty calculated from uncertainty in base parameters.
- Nitrite [water, ground-]: 5.7321e-5 kg; lognormal variance with pedigree 0.1228, pedigree (1,1,3,1,1)
  (same comment as for Mercury)
- TOC, Total Organic Carbon [water, ground-, long-term]: 0.2947 kg; lognormal variance with pedigree 0.0087615, pedigree (1,1,3,1,1)
  (same comment as for Cadmium, ion)
- Methane, non-fossil [air, non-urban air or from high stacks]: 0.055618 kg; lognormal variance with pedigree 0.030476, pedigree (1,1,3,1,1)
  (same comment as for Nitrogen oxides)
- Nitrogen, organic bound [water, ground-]: 0.0017213 kg; lognormal variance with pedigree 0.1228, pedigree (1,1,3,1,1)
  (same comment as for Mercury)
- BOD5, Biological Oxygen Demand [water, ground-, long-term]: 0.076305 kg; lognormal variance with pedigree 0.0087615, pedigree (1,1,3,1,1)
  (same comment as for Cadmium, ion)
- Sulfur dioxide [air, non-urban air or from high stacks]: 4.8629e-5 kg; lognormal variance with pedigree 0.23056, pedigree (1,1,3,1,1)
  (same comment as for Nitrogen oxides)
- Hydrogen sulfide [water, ground-]: 1.0108e-5 kg; lognormal variance with pedigree 0.18586, pedigree (1,1,3,1,1)
  (same comment as for Mercury)
- Sodium, ion [water, ground-, long-term]: 1.0209e-12 kg; lognormal variance with pedigree 0.64618, pedigree (1,1,3,1,1)
  (same comment as for Cadmium, ion)
- Sulfate [water, ground-]: 0.00038777 kg; lognormal variance with pedigree 0.18586, pedigree (1,1,3,1,1)
  (same comment as for Mercury)
- Magnesium [water, ground-, long-term]: 0.0039803 kg; lognormal variance with pedigree 0.11685, pedigree (1,1,3,1,1)
  (same comment as for Cadmium, ion)
- DOC, Dissolved Organic Carbon [water, ground-]: 0.0031695 kg; lognormal variance with pedigree 0.10613, pedigree (1,1,3,1,1)
  (same comment as for Mercury)
- Potassium, ion [water, ground-, long-term]: 0.00076668 kg; lognormal variance with pedigree 0.16846, pedigree (1,1,3,1,1)
  (same comment as for Cadmium, ion)
- TOC, Total Organic Carbon [water, ground-]: 0.0031695 kg; lognormal variance with pedigree 0.10613, pedigree (1,1,3,1,1)
  (same comment as for Mercury)
- Thallium [water, ground-, long-term]: 1.8801e-6 kg; lognormal variance with pedigree 0.37333, pedigree (1,1,3,1,1)
  (same comment as for Cadmium, ion)
- Sodium [air, non-urban air or from high stacks]: 2.5517e-7 kg; lognormal variance with pedigree 0.37434, pedigree (1,1,3,1,1)
  (same comment as for Copper)
- Iron, ion [water, ground-, long-term]: 0.0013002 kg; lognormal variance with pedigree 0.15774, pedigree (1,1,3,1,1)
  (same comment as for Cadmium, ion)
- BOD5, Biological Oxygen Demand [water, ground-]: 0.00082068 kg; lognormal variance with pedigree 0.10613, pedigree (1,1,3,1,1)
  (same comment as for Mercury)
- Calcium, ion [water, ground-, long-term]: 0.0036859 kg; lognormal variance with pedigree 0.12344, pedigree (1,1,3,1,1)
  (same comment as for Cadmium, ion)
- Heat, waste [water, ground-, long-term]: 12.246 MJ; lognormal variance with pedigree 0.022385, pedigree (1,1,3,1,1)
  burden from long-term decomposition of waste (>100a).
  Uncertainty: Uncertainty calculated from unertainty of the waste composition of this waste, uncertainty in waste decomposition and short-term leaching in landfill
- Magnesium [water, ground-]: 0.00079465 kg; lognormal variance with pedigree 0.136, pedigree (1,1,3,1,1)
  (same comment as for Mercury)
- Aluminium [water, ground-, long-term]: 0.012248 kg; lognormal variance with pedigree 0.08743, pedigree (1,1,3,1,1)
  (same comment as for Cadmium, ion)
- Heat, waste [soil, industrial]: 3.6437 MJ; lognormal variance with pedigree 0.023709, pedigree (1,1,3,1,1)
  burden from short-term decomposition of waste (0-100a).
  Uncertainty: Uncertainty calculated from unertainty of the waste composition of this waste, uncertainty in waste decomposition and short-term leaching in landfill
- Potassium, ion [water, ground-]: 0.0001883 kg; lognormal variance with pedigree 0.18434, pedigree (1,1,3,1,1)
  (same comment as for Mercury)
- Silicon [water, ground-, long-term]: 0.00027359 kg; lognormal variance with pedigree 1.2547, pedigree (1,1,3,1,1)
  (same comment as for Cadmium, ion)
- COD, Chemical Oxygen Demand [water, ground-]: 0.0034667 kg; lognormal variance with pedigree 0.10613, pedigree (1,1,3,1,1)
  (same comment as for Mercury)
- Aluminium [water, ground-]: 0.00016737 kg; lognormal variance with pedigree 0.16976, pedigree (1,1,3,1,1)
  (same comment as for Mercury)
- Strontium [water, ground-, long-term]: 6.3735e-5 kg; lognormal variance with pedigree 0.25698, pedigree (1,1,3,1,1)
  (same comment as for Cadmium, ion)
- Magnesium [air, non-urban air or from high stacks]: 1.9866e-7 kg; lognormal variance with pedigree 0.38435, pedigree (1,1,3,1,1)
  (same comment as for Copper)
- Sodium, ion [water, ground-]: 0.0010207 kg; lognormal variance with pedigree 0.16573, pedigree (1,1,3,1,1)
  (same comment as for Mercury)
- Beryllium [water, ground-, long-term]: 1.0654e-6 kg; lognormal variance with pedigree 0.3918, pedigree (1,1,3,1,1)
  (same comment as for Cadmium, ion)
- Iron [air, non-urban air or from high stacks]: 1.2085e-9 kg; lognormal variance with pedigree 0.55021, pedigree (1,1,3,1,1)
  (same comment as for Copper)
- Silicon [water, ground-]: 0.0002871 kg; lognormal variance with pedigree 0.15419, pedigree (1,1,3,1,1)
  (same comment as for Mercury)
- Titanium, ion [water, ground-, long-term]: 0.00018843 kg; lognormal variance with pedigree 0.22099, pedigree (1,1,3,1,1)
  (same comment as for Cadmium, ion)
- Calcium [air, non-urban air or from high stacks]: 3.3536e-8 kg; lognormal variance with pedigree 0.44265, pedigree (1,1,3,1,1)
  (same comment as for Copper)
- Iron, ion [water, ground-]: 4.8341e-6 kg; lognormal variance with pedigree 0.27919, pedigree (1,1,3,1,1)
  (same comment as for Mercury)
- Zinc, ion [water, ground-, long-term]: 0.0001308 kg; lognormal variance with pedigree 0.23315, pedigree (1,1,3,1,1)
  (same comment as for Cadmium, ion)
- Aluminium [air, non-urban air or from high stacks]: 4.1842e-8 kg; lognormal variance with pedigree 0.43801, pedigree (1,1,3,1,1)
  (same comment as for Copper)
- Calcium, ion [water, ground-]: 0.00013414 kg; lognormal variance with pedigree 0.17905, pedigree (1,1,3,1,1)
  (same comment as for Mercury)
- Antimony [water, ground-, long-term]: 4.8033e-8 kg; lognormal variance with pedigree 0.88748, pedigree (1,1,3,1,1)
  (same comment as for Cadmium, ion)
- Potassium [air, non-urban air or from high stacks]: 4.7075e-8 kg; lognormal variance with pedigree 0.43021, pedigree (1,1,3,1,1)
  (same comment as for Copper)
- Strontium [water, ground-]: 1.0152e-6 kg; lognormal variance with pedigree 0.33494, pedigree (1,1,3,1,1)
  (same comment as for Mercury)
- Selenium [water, ground-, long-term]: 5.1159e-7 kg; lognormal variance with pedigree 0.54331, pedigree (1,1,3,1,1)
  (same comment as for Cadmium, ion)
- Titanium [air, non-urban air or from high stacks]: 6.4372e-10 kg; lognormal variance with pedigree 0.57158, pedigree (1,1,3,1,1)
  (same comment as for Copper)
- Beryllium [water, ground-]: 1.697e-8 kg; lognormal variance with pedigree 0.46976, pedigree (1,1,3,1,1)
  (same comment as for Mercury)
- Manganese [water, ground-, long-term]: 2.729e-5 kg; lognormal variance with pedigree 0.27453, pedigree (1,1,3,1,1)
  (same comment as for Cadmium, ion)
- Silicon [air, non-urban air or from high stacks]: 7.1774e-8 kg; lognormal variance with pedigree 0.42244, pedigree (1,1,3,1,1)
  (same comment as for Copper)
- Thallium [water, ground-]: 2.9947e-8 kg; lognormal variance with pedigree 0.4513, pedigree (1,1,3,1,1)
  (same comment as for Mercury)
- Lead [water, ground-, long-term]: 7.9147e-5 kg; lognormal variance with pedigree 0.25024, pedigree (1,1,3,1,1)
  (same comment as for Cadmium, ion)
- Thallium [air, non-urban air or from high stacks]: 7.4867e-12 kg; lognormal variance with pedigree 0.71899, pedigree (1,1,3,1,1)
  (same comment as for Copper)
- Titanium, ion [water, ground-]: 2.5749e-6 kg; lognormal variance with pedigree 0.30333, pedigree (1,1,3,1,1)
  (same comment as for Mercury)
- Mercury [water, ground-, long-term]: 1.4161e-7 kg; lognormal variance with pedigree 0.45616, pedigree (1,1,3,1,1)
  (same comment as for Cadmium, ion)
- Strontium [air, non-urban air or from high stacks]: 2.538e-10 kg; lognormal variance with pedigree 0.60263, pedigree (1,1,3,1,1)
  (same comment as for Copper)
- Zinc, ion [water, ground-]: 1.6927e-6 kg; lognormal variance with pedigree 0.31705, pedigree (1,1,3,1,1)
  (same comment as for Mercury)
- Molybdenum [water, ground-, long-term]: 1.2308e-6 kg; lognormal variance with pedigree 0.45643, pedigree (1,1,3,1,1)
  (same comment as for Cadmium, ion)
- Beryllium [air, non-urban air or from high stacks]: 4.2425e-12 kg; lognormal variance with pedigree 0.73745, pedigree (1,1,3,1,1)
  (same comment as for Copper)
- Lead [water, ground-]: 1.2596e-7 kg; lognormal variance with pedigree 0.39851, pedigree (1,1,3,1,1)
  (same comment as for Mercury)
- Nickel, ion [water, ground-, long-term]: 1.0074e-5 kg; lognormal variance with pedigree 0.31822, pedigree (1,1,3,1,1)
  (same comment as for Cadmium, ion)
- Selenium [air, non-urban air or from high stacks]: 2.037e-11 kg; lognormal variance with pedigree 0.68625, pedigree (1,1,3,1,1)
  (same comment as for Copper)
- Antimony [water, ground-]: 2.2407e-8 kg; lognormal variance with pedigree 0.46337, pedigree (1,1,3,1,1)
  (same comment as for Mercury)
- Copper, ion [water, ground-, long-term]: 6.4242e-5 kg; lognormal variance with pedigree 0.25719, pedigree (1,1,3,1,1)
  (same comment as for Cadmium, ion)
- Zinc [air, non-urban air or from high stacks]: 3.7615e-10 kg; lognormal variance with pedigree 0.58932, pedigree (1,1,3,1,1)
  (same comment as for Copper)
- Selenium [water, ground-]: 8.148e-8 kg; lognormal variance with pedigree 0.42139, pedigree (1,1,3,1,1)
  (same comment as for Mercury)
- Chromium VI [water, ground-, long-term]: 4.1353e-8 kg; lognormal variance with pedigree 2.4723, pedigree (1,1,3,1,1)
  (same comment as for Cadmium, ion)
- Molybdenum [air, non-urban air or from high stacks]: 3.395e-11 kg; lognormal variance with pedigree 0.6695, pedigree (1,1,3,1,1)
  (same comment as for Copper)
- Molybdenum [water, ground-]: 1.358e-7 kg; lognormal variance with pedigree 0.40464, pedigree (1,1,3,1,1)
  (same comment as for Mercury)
- Cobalt [water, ground-, long-term]: 6.5417e-7 kg; lognormal variance with pedigree 0.40529, pedigree (1,1,3,1,1)
  (same comment as for Cadmium, ion)
- Antimony [air, non-urban air or from high stacks]: 5.6017e-12 kg; lognormal variance with pedigree 0.72823, pedigree (1,1,3,1,1)
  (same comment as for Copper)
- Nickel, ion [water, ground-]: 1.6046e-7 kg; lognormal variance with pedigree 0.39618, pedigree (1,1,3,1,1)
  (same comment as for Mercury)
- Arsenic, ion [water, ground-, long-term]: 2.1643e-6 kg; lognormal variance with pedigree 0.36766, pedigree (1,1,3,1,1)
  (same comment as for Cadmium, ion)
- Nickel [air, non-urban air or from high stacks]: 4.0116e-11 kg; lognormal variance with pedigree 0.66387, pedigree (1,1,3,1,1)
  (same comment as for Copper)
- Manganese [water, ground-]: 1.2197e-5 kg; lognormal variance with pedigree 0.28263, pedigree (1,1,3,1,1)
  (same comment as for Mercury)
- Barium [water, ground-, long-term]: 8.6677e-5 kg; lognormal variance with pedigree 0.23608, pedigree (1,1,3,1,1)
  (same comment as for Cadmium, ion)
- Lead [air, non-urban air or from high stacks]: 4.1988e-11 kg; lognormal variance with pedigree 0.66065, pedigree (1,1,3,1,1)
  (same comment as for Copper)
- Copper, ion [water, ground-]: 8.4949e-8 kg; lognormal variance with pedigree 0.41141, pedigree (1,1,3,1,1)
  (same comment as for Mercury)
- Fluoride [water, ground-, long-term]: 1.8994e-5 kg; lognormal variance with pedigree 0.29373, pedigree (1,1,3,1,1)
  (same comment as for Cadmium, ion)

## Extrapolations
This dataset has been extrapolated from year 2012 to the year of the calculation (2019). The uncertainty has been adjusted accordingly.
