# industrial furnace production, 1MW, oil

Dataset: EcoSpold 2, unit process
Geography: CH
Time period: 1993-01-01 to 2019-12-31
Technology level: current
Classification: ISIC rev.4 ecoinvent: 2815a: Manufacture of furnaces and boilers for liquid fuels
Classification: EcoSpold01Categories: oil/heating systems
Tags: ConvertedDataset
Scenario: Business-as-Usual
System model: Allocation at the point of substitution
Generated by: Niels Jungbluth
Published in: Jungbluth, N. 2007
Database: ecoinvent
isCopyrightProtected: true
accessRestrictedTo: 1

## General comment
Inventory for a furnace with a life time of 20 years.
[This dataset was already contained in the ecoinvent database version 2. It was not individually updated during the transfer to ecoinvent version 3. Life Cycle Impact Assessment results may still have changed, as they are affected by changes in the supply chain, i.e. in other datasets. This dataset was generated following the ecoinvent quality guidelines for version 2. It may have been subject to central changes described in the ecoinvent version 3 change report (http://www.ecoinvent.org/database/ecoinvent-version-3/reports-of-changes/), and the results of the central updates were reviewed extensively. The changes added e.g. consistent water flows and other information throughout the database. The documentation of this dataset can be found in the ecoinvent reports of version 2, which are still available via the ecoinvent website. The change report linked above covers all central changes that were made during the conversion process.]

## Included activities end
Infrastructure of the furnace, including electric equipment. Energy use for the production. Disposal of the facilities.

## Geography
Data for Swiss and German producers.

## Technology
Oil furnace used in industrial production facilities.

## Time period
Materials investigated in 1993. Energy use estimated based on environmental report from 1998.

## Parameters
- fraction, process water, to air: 0.15 dimensionless; name fraction_PW_to_air; lognormal variance with pedigree 0.092025, pedigree (4,4,3,2,4)
  Literature value. In case when no industry/process specific data are available, default evaporation fraction value is used. This value is 15% and is based on literature (Statistics Canada, 2007 & Shaffer, K.H., 2008, Consumptive water use in the Great Lakes Basin, USGS & Shiklomanov, 2003, World Water Resources at the Beginning of the 21st Century) and has been approved by an expert.
- fraction, tap water, to air: 0.15; name fraction_TW_to_air; = fraction_PW_to_air; lognormal variance with pedigree 0.092025, pedigree (4,4,3,2,4)
  Calculated value. See comment in the other parametres present in this dataset. Tap water is considered to be always used as process water, thus process water fractions to air are applied to all tap water input flows to calculate the amount of water consumed in the processes.

## Reference product
- industrial furnace, 1MW, oil: 1 unit; By-product classification allocatable product; CPC 43420: Industrial or laboratory furnaces and ovens, except non-electric bakery ovens; other industrial or laboratory […]
  EcoSpold01Location=CH
  production volume 0.0336675 unit
    This is a placeholder value that does not reflect real-world production volumes. This dataset does not currently require a real-world production volume to work in the database framework, and no actual data were collected yet. This has no negative effect on the results of the ecoinvent database. The placeholder value of this activity was scaled according to the nominal GDP of 2005 (source: United Nations, http://data.un.org/Glossary.aspx?q=GDP+%28current+US%24%29, accessed 20130726) to reflect an appropriate share of the global production volume, which is also a placeholder value.
  property price 72252 EUR2005
    UNDATA "Industrial furnace, oven, incinerator non-electric ne" (Average I/E prices of EU27, 6.133 EUR/kg; http://data.un.org/Data.aspx?q=industrial+furnace&d=ComTrade&f=_l1Code%3a84%3bcmdCode%3a841780). The prices are per kg and converted to per unit by summed weight of material concumption of the process in existing ecoinvent documentation from ecoinvent v.2.2. From information in the dataset industrial furnace production, 1MW, oil.; total weight about 10955 kg/unit)
  property true value 72252
    allocation property applied in "true value" allocation // value calculated from revenue

## By-products
- electricity, for reuse in municipal waste incineration only: 0 kWh; CPC 17100: Electrical energy; By-product classification allocatable product; pedigree (1,1,1,1,1)
  Net electricity generated from this waste and used in internal MSWI plant energy redistribution.
  Uncertainty: uncertainty is calculated from uncertainties in waste composition and uncertainties in energy efficiency and the uncertainty in internal energy demand
  production volume 0.557601 kWh
  property exergy 3.6 MJ; name E_el_prod_MSWI_exergy
    This exergy property is based on the exergy content of the product.
  property true value relation 3.6; name E_el_prod_MSWI_true_value_relation
    property to calculate "true value" from
  property price 0.1 EUR2005; name E_el_prod_MSWI_price_EUR2005
    Estimated to be the same price as in case of electricity, medium voltage.
  property true value 0.0715579
    allocation property applied in "true value" allocation // value calculated from true value relation
- heat, for reuse in municipal waste incineration only: 0 MJ; CPC 17300: Steam and hot water; By-product classification allocatable product; pedigree (1,1,1,1,1)
  Net useful heat generated from this waste and used in internal MSWI plant energy redistribution.
  Uncertainty: uncertainty is calculated from uncertainties in waste composition and uncertainties in energy efficiency and the uncertainty in internal energy demand
  production volume 3.91644 MJ
  property true value relation 0.1842; name E_th_prod_MSWI_true_value_relation
    property to calculate "true value" from
  property exergy 0.1842 MJ; name E_th_prod_MSWI_exergy
    This exergy property is based on the exergy content of the product.
  property price 0.0106 EUR2005; name E_th_prod_MSWI_price_EUR2005
    Average European district heat price from Ecoheatcool and Euroheat 2005-2006, Ecoheat Work package 1: The European heat market. Final report. 10.6 EUR/GJ i s the price of district heat. http://www.solarthermalworld.org/files/Ecoheatcool%20WP1%20Web.pdf?download
  property true value 0.0257165
    (same comment as for electricity, for reuse in municipal waste incineration only)
- zinc concentrate: 0 kg; CPC 14290: Other non-ferrous metal ores and concentrates (other than uranium or thorium ores and concentrates); By-product classification allocatable product
  Calculated value from the knowledge of the properties of both products.
  production volume 0.00013301 kg
  property price 0.38 EUR2005; name ByP_price_EUR2005
    Temporary price data. Calculated as 90% of purchasers price based on: Zinc content in concentrate 53%. Concentrate price per kg Zn 86.5% of refined Zn price (13.5% treatment charges according to CHR Metals Limited 2005: Dynamic cost curves. http://www.minecost.com/dynamic.pdf). 2004 zinc price from USGS (2007) Mineral commodity summaries 2007. <http://minerals.usgs.gov/minerals/pubs/mcs/2007/mcs2007.pdf> [Accessed 25 May 2010]
  property zinc content 0.53; name zinc_C_zinc_concentrate
    Zinc content on a dry matter basis. Value taken from teh "zinc mine operation" /GLO dataset.
  property dry mass 1 kg; name DM_zinc_concentrate
  property carbon content 0
    carbon content on a dry matter basis (reserved; not for manual entry)
  property true value 5.05437e-5
    allocation property applied in "true value" allocation // value calculated from revenue
  properties: wet mass 1 kg, water content 0, carbon content, non-fossil 0, carbon content, fossil 0, water in wet mass 0 kg, carbon allocation 0 kg

## Inputs from technosphere
- heat, district or industrial, other than natural gas: 8046.49 MJ; lognormal variance with pedigree 0.0427, pedigree (2,4,5,3,1)
  EcoSpold01Location=CH
  Environmental report
  Uncertainty: Environmental report
- wastewater from pig iron production: -5.13999 m3; name wastewater_output; lognormal variance with pedigree 0.3527, pedigree (2,4,5,3,1)
  EcoSpold01Location=CH
  Environmental report, 83% of water use, basic uncertainty estimated = 3
  Uncertainty: Environmental report, 83% of water use, basic uncertainty estimated = 3
  production volume 5.14 m3
    Calculated from the production volume of industrial furnace, 1MW, oil in proportion to the respective output amounts.
  property price 0 EUR2005; name wastewater_output_price_EUR2005
  properties: carbon content, fossil 1.2149e-5, dry mass 0.337476 kg, water content 2962.17, wet mass 1000 kg
  note on carbon content, fossil: TOC = 0.0000041 kg/m3 (Tab A.19, ecoinvent v2.2 report 13_I). TOC was considered as Total Carbon.
- cast iron: 4199.99 kg; lognormal variance with pedigree 0.054, pedigree (3,4,5,1,1)
  Literature
  EcoSpold01Location=RER
  Uncertainty: Literature
  properties: carbon content, fossil 0.04, dry mass 1 kg, wet mass 1 kg
  note on carbon content, fossil: Cast iron is made by remelting pig iron in small furnaces (e.g. cupola furnaces or electric arc furnaces) and poured into moulds to make castings. It usually contains 2% to 6% carbon (ecoinvent v2.2 report 10_partII). An average content of 4% was considered
- tap water: 6189.99 kg; name tap_water_input; lognormal variance with pedigree 0.3527, pedigree (2,4,5,3,1)
  Environmental report, basic uncertainty estimated = 3
  EcoSpold01Location=RER
  Uncertainty: Environmental report, basic uncertainty estimated = 3
  properties: water content 2962.17, dry mass 0.000337476 kg, carbon content, fossil 0.00178991, wet mass 1 kg
  note on carbon content, fossil: Bicarbonate content is 2.93 mol/m3. CO2 content is 0.1 mol/m3 (ecoinvent v2.2 report 8, Tab 93.1).
- refractory, fireclay, packed: 69.9999 kg; lognormal variance with pedigree 0.054, pedigree (3,4,5,1,1)
  EcoSpold01Location=DE
  Literature
  Uncertainty: Literature
  properties: wet mass 1 kg, dry mass 1 kg
- steel, chromium steel 18/8, hot rolled: 230 kg; lognormal variance with pedigree 0.054, pedigree (3,4,5,1,1)
  Literature
  EcoSpold01Location=RER
  Uncertainty: Literature
  properties: carbon content, fossil 0.0008, dry mass 1 kg, wet mass 1 kg
  note on carbon content, fossil: Stainless steel model is the grade 304 steel (18/8 stainless, 18% chromium 8% nickel; max. 0.08% C)
- waste mineral wool, for final disposal: -39.9999 kg; lognormal variance with pedigree 0.054, pedigree (3,4,5,1,1)
  EcoSpold01Location=CH
  Literature
  Uncertainty: Literature
  production volume 40 kg
    (same comment as for wastewater from pig iron production)
  properties: dry mass 1 kg, wet mass 1 kg
- copper: 0.03 kg; lognormal variance with pedigree 0.054, pedigree (3,4,5,1,1)
  EcoSpold01Location=RER
  Literature
  Uncertainty: Literature
  properties: wet mass 1 kg, dry mass 1 kg
- stone wool, packed: 39.9999 kg; lognormal variance with pedigree 0.054, pedigree (3,4,5,1,1)
  Literature
  EcoSpold01Location=CH
  Uncertainty: Literature
  properties: carbon content, fossil 0.015401, dry mass 1 kg, wet mass 1 kg
  note on carbon content, fossil: The chemical composition of the glass fibres used in the rock wool production is similar to the composition of naturally cooled volcano basalt and has a composition listed in Tab. 3.1 and 3.2 in ecoinvent v2.2 report 16, part XIV. Rock wool contains: a minimum of 96% mineral fibres,between 0.5 and 3.0 weight percent of phenolic resin depending on the specific product characteristics, and about 0.2 percent mineral oil (ecoinvent v2.2 report 16, part XIV). An average composition of 1.8% phenolic resin, 0.2% mineral oil, and 98% mineral fibres has been assumed and used to calculate C content of the rock wool
- polyethylene, high density, granulate: 0.399999 kg; lognormal variance with pedigree 0.054, pedigree (3,4,5,1,1)
  Literature
  EcoSpold01Location=RER
  Uncertainty: Literature
  properties: carbon content, fossil 0.857143, dry mass 1 kg, wet mass 1 kg
  note on carbon content, fossil: Polyethylene is formed out of a huge amount of ethylene monomers (C2H4) (ecoinvent v2.2 report 11_II). MW=28 g/mol
- aluminium, cast alloy: 30 kg; lognormal variance with pedigree 0.054, pedigree (3,4,5,1,1)
  EcoSpold01Location=RER
  Literature
  Uncertainty: Literature
  properties: wet mass 1 kg, dry mass 1 kg
- steel, low-alloyed, hot rolled: 190 kg; lognormal variance with pedigree 0.054, pedigree (3,4,5,1,1)
  EcoSpold01Location=RER
  Literature
  Uncertainty: Literature
  properties: wet mass 1 kg, carbon content, fossil 0.005, dry mass 1 kg
  note on carbon content, fossil: Low alloyed steel composition given in Tab. 3.2 ecoinvent v2.2 report 10_partII. Steel assumed to have a C content of 0.5%
- brass: 0.0499999 kg; lognormal variance with pedigree 0.054, pedigree (3,4,5,1,1)
  Literature, mixing valve
  EcoSpold01Location=CH
  Uncertainty: Literature, mixing valve
  properties: dry mass 1 kg, wet mass 1 kg
- heat, district or industrial, natural gas: 14400 MJ; lognormal variance with pedigree 0.0427, pedigree (2,4,5,3,1)
  Environmental report
  EcoSpold01Location=RER
  Uncertainty: Environmental report
- electricity, medium voltage: 2780 kWh; lognormal variance with pedigree 0.0427, pedigree (2,4,5,3,1)
  Environmental report
  EcoSpold01Location=CH
  Uncertainty: Environmental report
- alkyd paint, white, without solvent, in 60% solution state: 4.99999 kg; lognormal variance with pedigree 0.054, pedigree (3,4,5,1,1)
  EcoSpold01Location=RER
  Literature
  Uncertainty: Literature
  properties: carbon content, non-fossil 0.199629, wet mass 1 kg, dry mass 1 kg, carbon content, fossil 0.140367
  note on carbon content, non-fossil: C content was calculated as an addition of C content in the raw materials.
- waste plastic, mixture: -0.399999 kg; lognormal variance with pedigree 0.054, pedigree (3,4,5,1,1)
  EcoSpold01Location=CH
  Literature
  Uncertainty: Literature
  production volume 0.4 kg
    (same comment as for wastewater from pig iron production)
  properties: carbon content, fossil 0.747344, water content 0.180638, dry mass 0.847 kg, wet mass 1 kg
  note on carbon content, fossil: C content in 1 kg DM was calculated using data in Tab A.2, ecoinvent v2.2 report 13_I
- waste concrete: -69.9999 kg; lognormal variance with pedigree 0.054, pedigree (3,4,5,1,1)
  EcoSpold01Location=CH
  Literature
  Uncertainty: Literature
  production volume 70 kg
    (same comment as for wastewater from pig iron production)
  properties: water content 1, dry mass 0.5 kg, wet mass 1 kg

## Emissions to nature
- Water [air, unspecified]: 0.928499 m3; name water_to_air_unspecified; = (tap_water_input/1000)*fraction_TW_to_air; lognormal variance with pedigree 0.130025, pedigree (4,4,5,2,4)
  Calculated value based on literature values and expert opinion. See comments in the parametres' comment field.
  property fraction, origin: unspecified 0; name fraction_origin_unspecified
  property fraction, origin: salt water 0; name fraction_origin_salt_water
  property fraction, origin: fresh water 1; name fraction_origin_fresh_water
- Water [water, unspecified]: 0.1215 m3; name water_to_water_unspecified; = (tap_water_input/1000)*(1-fraction_TW_to_air)-(wastewater_output*-1); lognormal variance with pedigree 0.130025, pedigree (4,4,5,2,4)
  (same comment as for Water)
  property fraction, origin: salt water 0; name fraction_origin_salt_water_Ww
  property fraction, origin: unspecified 0; name fraction_origin_unspecified_Ww
  property fraction, origin: fresh water 1; name fraction_origin_fresh_water_Ww
  property wet mass 1000 kg; name WM
  property water in wet mass 1000 kg; name WWM
  property dry mass 0 kg; name DM
  property carbon content, non-fossil 0; name C_content_non_fossil
  property carbon content, fossil 0; name C_content_fossil

## Sampling procedure
Data provided by manufacturers.

## Extrapolations
Data for Germany used with assumptions for Swiss energy supply.

## Review by Michael Spielmann (obsolete) 2003-07-15
Passed.
