# thermal storage system construction, solar tower power plant, 20 MW

Dataset: EcoSpold 2, unit process
Geography: RoW
Time period: 2010-01-01 to 2020-01-01
Technology level: current
Classification: ISIC rev.4 ecoinvent: 4220a: Construction of utility projects for electricity production, except for liquid fuels
Tags: Concentrated Solar Power; CSP
Scenario: Business-as-Usual
System model: Allocation at the point of substitution
Generated by: Karin Treyer
Published in: Telsnig, Thomas 2015
Database: ecoinvent
isCopyrightProtected: true
accessRestrictedTo: 1

## General comment
This activity represents the construction of a hot and cold two stage nitrate salt thermal storage system for a solar tower 20 MW power plant in Upington, South Africa. The main components in this activity are nitrogen pressure vessels, storage tanks, pumps,pipes, electrical wiring and insulation and finally concrete and paint works. The storage time resulting from the present design is between 3 and 6 hours. The heat storage capacity as calculated for the present CSP plant design amounts to 440 MW.
This dataset is entirely based on the detailed life cycle inventory as presented in the dissertation report by
Telsnig, Thomas. 2015. Standortabhängige Analyse und Bewertung solarthermischer Kraftwerke am Beispiel Südafrikas. Forschungsbericht. Band 123. ISSN 0938-1228. Institut für Energiewirtschaft und Rationelle Energieanwendung, Universität Stuttgart, Germany.

## Included activities start
The activities start with preparation of the molten salt made of NaNO3 and KNO3 60% and 40% by weight mixture respectively.

## Included activities end
The activity concludes with the decommissioning of the storage components.

## Geography
This dataset has been extrapolated from a dataset modelled for the location Upington, South Africa. Uncertainty has not been adjusted as it is assumed that the modelled 20 MW solar tower power plant would be very similar in other parts of the world.

## Technology
Cold Salt Storage Tank (vertical cylindrical tank, self supporting roof, atmospheric pressure 135 ft diameter x 40 ft height, ASTM A 516, grade 70, carbon steel. 1050000lb approx weight, includes internal salt distribution piping

Hot Salt Storage Tank (vertical cylindrical tank, self supporting roof, atmospheric pressure 141 ft diameter x 40 ft height, ASTM A 240, type 347, stainless steel. 1140000lb approx weight, includes internal salt distribution piping

## Reference product
- thermal storage system, solar tower power plant, 20 MW: 0 unit; By-product classification allocatable product; CPC 53262: Power plants; pedigree (1,1,1,1,1)
  production volume 1 unit
    Data about concentrating solar power plants in operation, construction and development globally are available from SolarPACES (https://solarpaces.nrel.gov/, accessed April 2019). On average 2 solar tower concentrating solar power plants per year went in operation worldwide between 2010 and 2019. This includes plants with an installed capacity other than 20MW and is used as approximate annual production volume for this dataset.
  property price 8.5e6 EUR2005
    Telsnig 2015: Investment cost for the thermal storage system of a 20MW CSP solar tower plant in South Africa (EUR2010) with limited storage capacity (see Table 4-4 in Telsnig, 2015).
    Reference(s): Telsnig, Thomas. 2015. Standortabhängige Analyse und Bewertung solarthermischer Kraftwerke am Beispiel Südafrikas. Forschungsbericht. Band 123. ISSN 0938-1228. Institut für Energiewirtschaft und Rationelle Energieanwendung, Universität Stuttgart, Germany.
  property lifetime 30 year
    The economic lifetime of the plant is assumed to be 30 years.
  property capacity [MW] 440 MW
    Thermal heat storage capacity as calculated for the present CSP plant design.
  property true value 8.5e6
    allocation property applied in "true value" allocation // value calculated from revenue
- used nitrate salts, for solar power application: 1 kg; = nitratesalts*0.85; CPC 3549: Other chemical products; By-product classification allocatable product; pedigree (1,1,1,1,1)
  Nitrate salt discharge at the end of the power plant lifetime. For a lack of available data, it was assumed that 15% of nitrate salts are lost during operation or discharge. This estimate is considered conservative. However, at the point of dataset creation the end of the lifetime of first generation CSP plants lies at least 30 years into the future. Therefore, the fate of nitrate salts used in these plants remains uncertain. It is currently assumed that they can be reused in future plants
  It is indicated by Bradshaw et al. (2002) that nitrate salts which cannot be recovered or reused need to be treated as hazardous waste.
  Reference(s):
  W. BRADSHAW, ROBERT & B. DAWSON, DANIEL & DE LA ROSA, WILFREDO & GILBERT, ROCKWELL & H. GOODS, STEVEN & Hale, Mary Jane & JACOBS, PETER & A. JONES, SCOTT & Kolb, Gregory & Pacheco, James & R. PRAIRIE, MICHAEL & E. REILLY, HUGH & Showalter, Steve & vant-hull, Lorin. (2002). Final Test and Evaluation Results from the Solar Two Project. 10.2172/793226.
  production volume 2.6524e6 kg; = Ref('a55533d7-ecb2-4237-880e-0b9e3722f93f', 'ProductionVolume') * (Ref('4f637463-df80-49b2-9115-49ed0842ef9e') / Ref('a55533d7-ecb2-4237-880e-0b9e3722f93f'))
    Calculated from production volume of reference product using the relative outputs.
  property price 0.715 EUR2005
    Information from personal communication with SQM S.A. (https://www.sqm.com/en/): the average market price for nitrate salts used in solar power application in 2019 is approximately 800USD per metric tonne. See also SQM 2018 Results, http://s1.q4cdn.com/793210788/files/doc_presentations/2018/07/SQM-CorpPres_1Q18_long-final_12jul2018-update.pdf, accessed June 2019. Converted to EUR applying an exchange rate of 1.12 USD/EUR (as of June 2019).
  property true value 1.89646e6
    allocation property applied in "true value" allocation // value calculated from revenue

## By-products
- copper: 0 kg; source Rentz O. 1999; By-product classification allocatable product; CPC 41413: Refined copper and copper alloys, unwrought; master alloys of copper
  Literature value. Copper uses: Before end-use copper is manufactured into semi fabricated products, such as shapes and ingots (known as 'semis'). These manufacturing processes are subdivided into hot working, cold working and, if necessary, process annealing. Few of the semis are ready for use as such. They more typically travel to first-stage manufacturers, who make metal rods, wire, and casting, and then to component manufacturers who produce such things as motors, valves, and insulated cables The components in turn are incorporated by final-stage manufacturers into a variety of finished products - automobiles, commercial buildings, residential housing, and so forth. These uses account for about 79% of the world-wide consumption of copper.
  production volume 24.1374 kg
  properties: dry mass 1 kg, water in wet mass 0 kg, wet mass 1 kg, carbon content, non-fossil 0, water content 0, price 5.52 EUR2005, carbon content, fossil 0, carbon content 0, carbon allocation 0 kg, true value 66.6192
- electricity, for reuse in municipal waste incineration only: 0 kWh; CPC 17100: Electrical energy; By-product classification allocatable product; pedigree (1,1,1,1,1)
  Net electricity generated from this waste and used in internal MSWI plant energy redistribution.
  Uncertainty: uncertainty is calculated from uncertainties in waste composition and uncertainties in energy efficiency and the uncertainty in internal energy demand
  production volume 15.0011 kWh
  property exergy 3.6 MJ; name E_el_prod_MSWI_exergy
    This exergy property is based on the exergy content of the product.
  property true value relation 3.6; name E_el_prod_MSWI_true_value_relation
    property to calculate "true value" from
  property price 0.1 EUR2005; name E_el_prod_MSWI_price_EUR2005
    Estimated to be the same price as in case of electricity, medium voltage.
  property true value 1.58974
    allocation property applied in "true value" allocation // value calculated from true value relation
- heat, for reuse in municipal waste incineration only: 0 MJ; CPC 17300: Steam and hot water; By-product classification allocatable product; pedigree (1,1,1,1,1)
  Net useful heat generated from this waste and used in internal MSWI plant energy redistribution.
  Uncertainty: uncertainty is calculated from uncertainties in waste composition and uncertainties in energy efficiency and the uncertainty in internal energy demand
  production volume 128.985 MJ
  property true value relation 0.1842; name E_th_prod_MSWI_true_value_relation
    property to calculate "true value" from
  property exergy 0.1842 MJ; name E_th_prod_MSWI_exergy
    This exergy property is based on the exergy content of the product.
  property price 0.0106 EUR2005; name E_th_prod_MSWI_price_EUR2005
    Average European district heat price from Ecoheatcool and Euroheat 2005-2006, Ecoheat Work package 1: The European heat market. Final report. 10.6 EUR/GJ i s the price of district heat. http://www.solarthermalworld.org/files/Ecoheatcool%20WP1%20Web.pdf?download
  property true value 0.691363
    (same comment as for electricity, for reuse in municipal waste incineration only)
- zinc concentrate: 0 kg; CPC 14290: Other non-ferrous metal ores and concentrates (other than uranium or thorium ores and concentrates); By-product classification allocatable product
  Calculated value from the knowledge of the properties of both products.
  production volume 0.00310989 kg
  property price 0.38 EUR2005; name ByP_price_EUR2005
    Temporary price data. Calculated as 90% of purchasers price based on: Zinc content in concentrate 53%. Concentrate price per kg Zn 86.5% of refined Zn price (13.5% treatment charges according to CHR Metals Limited 2005: Dynamic cost curves. http://www.minecost.com/dynamic.pdf). 2004 zinc price from USGS (2007) Mineral commodity summaries 2007. <http://minerals.usgs.gov/minerals/pubs/mcs/2007/mcs2007.pdf> [Accessed 25 May 2010]
  property zinc content 0.53; name zinc_C_zinc_concentrate
    Zinc content on a dry matter basis. Value taken from teh "zinc mine operation" /GLO dataset.
  property dry mass 1 kg; name DM_zinc_concentrate
  property carbon content 0
    carbon content on a dry matter basis (reserved; not for manual entry)
  property true value 2.74472e-6
    allocation property applied in "true value" allocation // value calculated from revenue
  properties: wet mass 1 kg, water content 0, carbon content, non-fossil 0, carbon content, fossil 0, water in wet mass 0 kg, carbon allocation 0 kg
- iron scrap, sorted, pressed: 0 kg; By-product classification Recyclable; CPC 39310: Slag, dross, scalings and other waste from the manufacture of iron or steel; pedigree (1,1,1,1,1)
  Iron scrap recovered from this waste.
  Uncertainty: uncertainty calculated from uncertainty in waste composition, uncertainty of share of recyclable metal, uncertainty of transfer coefficient to bottom ash, uncertainty of the efficiency of scrap removal in MSWI plant.
  production volume 5713.76 kg
  property price 0.175 EUR2005
    Temporary price data. Calculated as 90% of purchasers price based on: 2005 import and export prices (total trades (USD) divided by total weight (kg) in biggest economies of the world: EU27, USA, Brasil, China, India, Japan and Russia) from UN Commodity Trade Statistics Database (http://data.un.org/Explorer.aspxDatabase [Accessed 2011.06.20]). Commodity: Waste or scrap, of cast iron
  property carbon content 0
    carbon content on a dry matter basis (reserved; not for manual entry)
  property true value 13.5502
    allocation property applied in "true value" allocation // value calculated from revenue
  properties: wet mass 1 kg, water in wet mass 0 kg, carbon content, non-fossil 0, carbon content, fossil 0, dry mass 1 kg, water content 0, carbon allocation 0 kg

## Inputs from technosphere
- stone wool: 0.0058199 kg; name wool; lognormal variance with pedigree 0.0137, pedigree (4,4,3,3,2)
  Used as an insulation material
  properties: carbon content, fossil 0.015401, wet mass 1 kg, dry mass 1 kg
  note on carbon content, fossil: The chemical composition of the glass fibres used in the rock wool production is similar to the composition of naturally cooled volcano basalt and has a composition listed in Tab. 3.1 and 3.2 in ecoinvent v2.2 report 16, part XIV. Rock wool contains: a minimum of 96% mineral fibres,between 0.5 and 3.0 weight percent of phenolic resin depending on the specific product characteristics, and about 0.2 percent mineral oil (ecoinvent v2.2 report 16, part XIV). An average composition of 1.8% phenolic resin, 0.2% mineral oil, and 98% mineral fibres has been assumed and used to calculate C content of the rock wool
- hazardous waste, for incineration: 0 kg; pedigree (1,1,1,1,1)
  (same comment as for used nitrate salts, for solar power application)
  production volume 0 kg
    Calculated from production volume of reference product using the relative outputs.
  properties: dry mass 0.75 kg, wet mass 1 kg, water content 0.333333, carbon content, fossil 0.554667
  note on carbon content, fossil: Tab A.6, ecoinvent v2.2 report 13_I. C content has been calculated after data in the tables, and then referred to 1 kg DM
- concrete, normal: 0 m3; name concrete; pedigree (1,1,1,1,1)
  Concrete for elevated platforms and to embed metals
  properties: wet mass 2380 kg, dry mass 2190 kg, water content 0.086758
- sand: 0 kg; pedigree (1,1,1,1,1)
  Tank foundation
  properties: dry mass 1 kg, wet mass 1 kg
- diesel, burned in diesel-electric generating set, 18.5kW: 0.0822407 MJ; lognormal variance with pedigree 0.0137, pedigree (4,4,3,3,2)
  Diesel used for melting the salt before it is filled into the storage tanks.
- nitrate salts, for solar power application: 0.214603 kg; name nitratesalts; lognormal variance with pedigree 0.0137, pedigree (4,4,3,3,2)
  Used as molten salt with 60% (by weight) contribution of technical grade sodium nitrate, and 40% (by weight) technical grade potassium nitrate.
- steel, low-alloyed: 0.000150475 kg; name lowsteel; lognormal variance with pedigree 0.0137, pedigree (4,4,3,3,2)
  Light structural steel
  properties: dry mass 1 kg, carbon content, fossil 0.005, wet mass 1 kg
- excavation, hydraulic digger: 2.94348e-5 m3; lognormal variance with pedigree 0.0137, pedigree (4,4,3,3,2)
  Excavation and backfilling. The digger is a removable unit. All the soil dislocated for initial construction is put back. Hence no end of life calculation is needed.
- tin plated chromium steel sheet, 2 mm: 5.50183e-7 m2; lognormal variance with pedigree 0.0137, pedigree (4,4,3,3,2)
  Deck plate construction
  properties: dry mass 15.6365 kg, wet mass 15.6365 kg
- alkyd paint, white, without solvent, in 60% solution state: 8.8717e-6 kg; name paint; lognormal variance with pedigree 0.0137, pedigree (4,4,3,3,2)
  Used for painting of the structural steel to prevent rust
  properties: wet mass 1 kg, carbon content, non-fossil 0.199629, carbon content, fossil 0.140367, dry mass 1 kg
  note on carbon content, non-fossil: C content was calculated as an addition of C content in the raw materials.
- waste mineral wool, for final disposal: 0 kg; pedigree (1,1,1,1,1)
  Rock wool used in insulation sent for final disposal
  production volume 0 kg
    Calculated from production volume of reference product using the relative outputs.
  properties: dry mass 1 kg, wet mass 1 kg
- scrap copper: 0 kg; pedigree (1,1,1,1,1)
  Scrap copper disposal
  production volume 0 kg
    Calculated from production volume of reference product using the relative outputs.
  properties: dry mass 1 kg, wet mass 1 kg
- steel, chromium steel 18/8, hot rolled: 0.00841876 kg; name chromesteel; lognormal variance with pedigree 0.0137, pedigree (4,4,3,3,2)
  Used in the 2 stage nitrogen compressor and cold, hot salt, spare pumps
  properties: dry mass 1 kg, wet mass 1 kg, carbon content, fossil 0.0008
  note on carbon content, fossil: Stainless steel model is the grade 304 steel (18/8 stainless, 18% chromium 8% nickel; max. 0.08% C)
- copper: 3.50742e-6 kg; lognormal variance with pedigree 0.0137, pedigree (4,4,3,3,2)
  Copper supplied for field wiring purposes
  properties: wet mass 1 kg, dry mass 1 kg
- waste reinforcement steel: 0 kg; pedigree (1,1,1,1,1)
  All steel masses combined
  production volume 0 kg
    Calculated from production volume of reference product using the relative outputs.
  properties: dry mass 1 kg, wet mass 1 kg
- reinforcing steel: 0.00912836 kg; name steel; lognormal variance with pedigree 0.0137, pedigree (4,4,3,3,2)
  Used in construction of the 2 storage tanks hot and cold, heat exchanger, pumps etc
  properties: dry mass 1 kg, carbon content, fossil 0.004, wet mass 1 kg
- foam glass: 0.000694262 kg; name foamglass; lognormal variance with pedigree 0.0137, pedigree (4,4,3,3,2)
  Used in tank foundation insulation
  properties: wet mass 1 kg, dry mass 1 kg
- waste paint: 0 kg; pedigree (1,1,1,1,1)
  Paint disposal
  production volume 0 kg
    Calculated from production volume of reference product using the relative outputs.
  properties: dry mass 1 kg, carbon content, fossil 0.65, wet mass 1 kg
- wire drawing, copper: 3.50742e-6 kg; = copper; lognormal variance with pedigree 0.0137, pedigree (4,4,3,3,2)
  The copper input is used to draw wires for field wiring, cables etc
- drawing of pipe, steel: 5.50183e-6 kg; lognormal variance with pedigree 0.0137, pedigree (4,4,3,3,2)
  Process done to draw pipes from steel.
- refractory, basic, packed: 0.00245801 kg; name refractory; lognormal variance with pedigree 0.0137, pedigree (4,4,3,3,2)
  Tank perimeter foundation
  properties: wet mass 1 kg, dry mass 1 kg
- waste glass: 0 kg; pedigree (1,1,1,1,1)
  Inert material disposal
  production volume 0 kg
    Calculated from production volume of reference product using the relative outputs.
  properties: dry mass 1 kg, wet mass 1 kg
- transformer, high voltage use: 3.9063e-5 kg; lognormal variance with pedigree 0.0137, pedigree (4,4,3,3,2)
  Transformer setup including substations and primary power distribution sources
  properties: dry mass 1 kg, carbon content, fossil 0.262798, wet mass 1 kg
- waste concrete: 0 kg; pedigree (1,1,1,1,1)
  Disposal of concrete. The density is assumed to be 2200kg/m3.
  production volume 0 kg
    Calculated from production volume of reference product using the relative outputs.
  properties: wet mass 1 kg, dry mass 0.5 kg, water content 1
- hazardous waste, for incineration: -0.000820006, -0.0313705 kg (2 entries); lognormal variance with pedigree 0.0137, pedigree (4,4,3,3,2)
  (same comment as for used nitrate salts, for solar power application)
  production volume 468070 kg
- concrete, normal: 1.09509e-9, 3.6349e-8, 3.78752e-9, 3.06626e-8, 1.72477e-8, 7.30393e-8, 1.41959e-6 m3 (7 entries); lognormal variance with pedigree 0.0137, pedigree (4,4,3,3,2)
  Concrete for elevated platforms and to embed metals
- sand: 3.5238e-6, 0.00067876, 8.12695e-6 kg (3 entries); lognormal variance with pedigree 0.0137, pedigree (4,4,3,3,2)
  Tank foundation
- waste mineral wool, for final disposal: -3.16217e-5, -0.00578828 kg (2 entries); lognormal variance with pedigree 0.0137, pedigree (4,4,3,3,2)
  Rock wool used in insulation sent for final disposal
  production volume 84625 kg
- scrap copper: -1.57185e-7, -3.35023e-6 kg (2 entries); lognormal variance with pedigree 0.0137, pedigree (4,4,3,3,2)
  Scrap copper disposal
  production volume 51 kg
- waste reinforcement steel: -1.22799e-5, -0.0176853 kg (2 entries); lognormal variance with pedigree 0.0137, pedigree (4,4,3,3,2)
  All steel masses combined
  production volume 514668 kg
- waste paint: -2.0578e-8, -8.85112e-6 kg (2 entries); lognormal variance with pedigree 0.0137, pedigree (4,4,3,3,2)
  Paint disposal
  production volume 129 kg
- waste glass: -5.58107e-5, -5.14395e-6, -1.16699e-7, -4.79923e-7, -7.2879e-7, -0.000106014, -0.000525968 kg (7 entries); lognormal variance with pedigree 0.0137, pedigree (4,4,3,3,2)
  Inert material disposal
  production volume 10095 kg
- waste concrete: -2.09202e-5, -0.005917 kg (2 entries); lognormal variance with pedigree 0.0137, pedigree (4,4,3,3,2)
  Disposal of concrete. The density is assumed to be 2200kg/m3.
  production volume 86341 kg

## Sampling procedure
This dataset is entirely based on the detailed life cycle inventory as presented in the dissertation report by
Telsnig, Thomas. 2015. Standortabhängige Analyse und Bewertung solarthermischer Kraftwerke am Beispiel Südafrikas. Forschungsbericht. Band 123. ISSN 0938-1228. Institut für Energiewirtschaft und Rationelle Energieanwendung, Universität Stuttgart, Germany. Further, data in Telsnig 2015 are not shown explicitely for the downscaled 20 MW solar tower power plant. This gap is filled in the ecoinvent report.

## Extrapolations
This dataset has been extrapolated from a dataset modelled for the location Upington, South Africa. The original data modelling a 440 MW power plant have been scaled down with parameter specific linear and non-linear equations to represent a 20 MW plant design. Uncertainty has not been adjusted as it is assumed that the modelled 20 MW solar tower power plant would be very similar in other parts of the world.

## Review by Christopher Oberschelp 2017-03-13
Very detailed, structured and well-documented datasets. Main exchanges have been checked and make sense.
