# clinker production

Dataset: EcoSpold 2, unit process
Geography: PE
Time period: 2014-01-01 to 2019-12-31
Technology level: current
Classification: EcoSpold01Categories: construction materials/binder
Classification: ISIC rev.4 ecoinvent: 2394:Manufacture of cement, lime and plaster
Synonyms: clinker; rotary kiln; cement
Scenario: Business-as-Usual
System model: Allocation at the point of substitution
Share of production covered: 68 %
Generated by: Simon Gmünder
Published in: Gmünder S. 2017
Database: ecoinvent
isCopyrightProtected: true
accessRestrictedTo: 1

## General comment
The dataset describes the production of Portland cement clinker. Clinker is made by sintering a mixture composed mainly of limestone and clay at temperatures up to 1400 °C.
The dataset is mainly based on sustainability reports of the two principal clinker producers of Peru (Pacasmayo and Unacem).

## Included activities start
From the reception of traditional and alternative fuels and raw materials at the factory gate.

## Included activities end
This activity ends with the cooling of the produced clinker. It includes the whole manufacturing process to produce clinker (raw material provision, grinding and mixing; rotary kiln process), internal processes (transport, etc.) and for the infrastructure only the rotary kiln (material consumption) is taken into account. No administration is included.

## Geography
Representative clinker production in Peru. Data based from main clinker producers.

## Technology
This dataset represents the current technology for clinker production in Peru

## Time period
The production volume of 2016 is considered. Data from sustainability reports of 2014 to 2017 is used. Not all the data for all exchanges was available for the same year, consequently the time period covers several years (the latest available is used).

## Parameters
- fraction, process water, to air: 0.79 dimensionless; name fraction_PW_to_air; lognormal variance with pedigree 0.042125, pedigree (3,2,1,2,1)
  Literature value. Water emitted to air refers to the water that is removed from the system and thus is not available for later use (CSI consumption indicator in litres per ton of cement). According to the sustainability reports from UNACEM 79% of the water is emitted to air.
- water withdrawal, per kg of clinker: 0.000157 m3/kg; name water_withdrawal; lognormal variance with pedigree 0.092025, pedigree (4,4,3,2,4)
  Calculated value. The values reported from the sustainability reports from Pacasmayo and Unacem from 2016 are used to extrapolate the average water withdrawal for cement and clinker production.

## Reference product
- clinker: 1 kg; By-product classification allocatable product; CPC 37430: Cement clinkers
  EcoSpold01Location=CH
  production volume 7.62097e9 kg; name clinker_PV
    Literature value
    The total production of clinker in Peru is 7'620'970 ton for 2016 (ASOCEM, 2016).
  property price 0.047 EUR2005
    Calculated value based on data from United Nations Commodity Trade Statistics Database (comtrade.un.org). UN comtrade category: 252310 Cement Clinkers. Using exchange rate of 1EURO = 1.209 USD. Average of price of import into 5 main markets (EU, US, JP, IN and CN).
  property carbon content 0
    carbon content on a dry matter basis (reserved; not for manual entry)
  property true value 0.047; name clinker_true_value
    allocation property applied in "true value" allocation // value calculated from revenue
  properties: dry mass 1 kg, water content 0, water in wet mass 0 kg, carbon content, fossil 0, wet mass 1 kg, carbon content, non-fossil 0, carbon allocation 0 kg

## By-products
- electricity, for reuse in municipal waste incineration only: 0 kWh; CPC 17100: Electrical energy; By-product classification allocatable product; pedigree (1,1,1,1,1)
  Net electricity generated from this waste and used in internal MSWI plant energy redistribution.
  Uncertainty: uncertainty is calculated from uncertainties in waste composition and uncertainties in energy efficiency and the uncertainty in internal energy demand
  production volume 8291.33 kWh
  property exergy 3.6 MJ; name E_el_prod_MSWI_exergy
    This exergy property is based on the exergy content of the product.
  property true value relation 3.6; name E_el_prod_MSWI_true_value_relation
    property to calculate "true value" from
  property price 0.1 EUR2005; name E_el_prod_MSWI_price_EUR2005
    Estimated to be the same price as in case of electricity, medium voltage.
  property true value 1.40777e-7
    allocation property applied in "true value" allocation // value calculated from true value relation
- iron scrap, sorted, pressed: 0 kg; By-product classification Recyclable; CPC 39310: Slag, dross, scalings and other waste from the manufacture of iron or steel; pedigree (1,1,1,1,1)
  Iron scrap recovered from this waste.
  Uncertainty: uncertainty calculated from uncertainty in waste composition, uncertainty of share of recyclable metal, uncertainty of transfer coefficient to bottom ash, uncertainty of the efficiency of scrap removal in MSWI plant.
  production volume 1043.94 kg
  property price 0.175 EUR2005
    Temporary price data. Calculated as 90% of purchasers price based on: 2005 import and export prices (total trades (USD) divided by total weight (kg) in biggest economies of the world: EU27, USA, Brasil, China, India, Japan and Russia) from UN Commodity Trade Statistics Database (http://data.un.org/Explorer.aspxDatabase [Accessed 2011.06.20]). Commodity: Waste or scrap, of cast iron
  property carbon content 0
    carbon content on a dry matter basis (reserved; not for manual entry)
  property true value 2.3972e-8
    allocation property applied in "true value" allocation // value calculated from revenue
  properties: dry mass 1 kg, water content 0, carbon content, non-fossil 0, water in wet mass 0 kg, carbon content, fossil 0, wet mass 1 kg, carbon allocation 0 kg
- heat, for reuse in municipal waste incineration only: 0 MJ; CPC 17300: Steam and hot water; By-product classification allocatable product; pedigree (1,1,1,1,1)
  (same comment as for electricity, for reuse in municipal waste incineration only)
  production volume 61247.3 MJ
  property exergy 0.1842 MJ; name E_th_prod_MSWI_exergy
    This exergy property is based on the exergy content of the product.
  property true value relation 0.1842; name E_th_prod_MSWI_true_value_relation
    property to calculate "true value" from
  property price 0.0106 EUR2005; name E_th_prod_MSWI_price_EUR2005
    Average European district heat price from Ecoheatcool and Euroheat 2005-2006, Ecoheat Work package 1: The European heat market. Final report. 10.6 EUR/GJ i s the price of district heat. http://www.solarthermalworld.org/files/Ecoheatcool%20WP1%20Web.pdf?download
  property true value 5.32084e-8
    (same comment as for electricity, for reuse in municipal waste incineration only)
- iron scrap, unsorted: 0 kg; source European Aluminium Association 2008; CPC 39310: Slag, dross, scalings and other waste from the manufacture of iron or steel; By-product classification Recyclable; pedigree (1,1,1,1,1)
  production volume 0.0297013 kg
  property price 0.149 EUR2005; name ironScrapAmount_price_EUR2005
    Temporary price data. Calculated as 90% of purchasers price based on: estimated at 85% of sorted scrap
  property carbon content 0
    carbon content on a dry matter basis (reserved; not for manual entry)
  property true value 5.807e-13
    allocation property applied in "true value" allocation // value calculated from revenue
  properties: water in wet mass 0 kg, water content 0, carbon content, fossil 0, carbon content, non-fossil 0, dry mass 1 kg, wet mass 1 kg, carbon allocation 0 kg
- aluminium oxide, non-metallurgical: 0 kg; source European Aluminium Association 2008; CPC 41432: Alumina (aluminium oxide), except artificial corundum; By-product classification allocatable product; CAS 1344-28-1; pedigree (1,1,1,1,1)
  production volume 1.86899 kg
  property carbon content, non-fossil 0; name C_content_non_fossil
  property price 0.28 EUR2005; name Al2O3Amount_price_EUR2005
    From UN trade database. http://data.un.org/ Import data from the largest economies of the world are used (Brazil, India, USA, China, Japan and EU-27).
  property dry mass 1 kg; name DM
  property water content 0; name water_content
  property wet mass 1 kg; name WM
  property water in wet mass 0 kg; name WWM
  property carbon content, fossil 0; name C_content_fossil
  property carbon content 0
    carbon content on a dry matter basis (reserved; not for manual entry)
  property true value 6.86681e-11
    allocation property applied in "true value" allocation // value calculated from revenue
  properties: carbon allocation 0 kg
- aluminium, cast alloy: 0 kg; source European Aluminium Association 2008; By-product classification allocatable product; CPC 41431: Unwrought aluminium; pedigree (1,1,1,1,1)
  EcoSpold01Location=RER
  production volume 17.4709 kg
  property price 1.3 EUR2005; name castAlloyAmount_price_EUR2005
    Temporary price data. Calculated as 90% of purchasers price based on: Source: London Metal Exchange, Aluminium alloy price for 2005
  property carbon content 0
    carbon content on a dry matter basis (reserved; not for manual entry)
  property true value 2.98022e-9
    allocation property applied in "true value" allocation // value calculated from revenue
  properties: water in wet mass 0 kg, carbon content, non-fossil 0, water content 0, dry mass 1 kg, carbon content, fossil 0, wet mass 1 kg, carbon allocation 0 kg
- aluminium, wrought alloy: 0 kg; source European Aluminium Association 2008; By-product classification allocatable product; CPC 4153: Semi-finished products of aluminium or aluminium alloys; pedigree (1,1,1,1,1)
  production volume 7.64844 kg
  property price 1.44 EUR2005; name secondaryAluminiumOutput_price_EUR2005
    Estimated based on literature values and expert judgement. Aluminium ccast alloys are about 90% of the price of aluminium wrought alloys.
  property carbon content 0
    carbon content on a dry matter basis (reserved; not for manual entry)
  property true value 1.44519e-9
    allocation property applied in "true value" allocation // value calculated from revenue
  properties: wet mass 1 kg, water content 0, carbon content, fossil 0, water in wet mass 0 kg, carbon content, non-fossil 0, dry mass 1 kg, carbon allocation 0 kg
- copper: 0 kg; source Rentz O. 1999; By-product classification allocatable product; CPC 41413: Refined copper and copper alloys, unwrought; master alloys of copper
  Literature value. Copper uses: Before end-use copper is manufactured into semi fabricated products, such as shapes and ingots (known as 'semis'). These manufacturing processes are subdivided into hot working, cold working and, if necessary, process annealing. Few of the semis are ready for use as such. They more typically travel to first-stage manufacturers, who make metal rods, wire, and casting, and then to component manufacturers who produce such things as motors, valves, and insulated cables The components in turn are incorporated by final-stage manufacturers into a variety of finished products - automobiles, commercial buildings, residential housing, and so forth. These uses account for about 79% of the world-wide consumption of copper.
  production volume 33.2287 kg
  property price 5.52 EUR2005
    Literature value (http://www.economist.com/news/business/21576714-mining-industry-has-enriched-chile-its-future-precarious-copper-solution). Average price between 20015 and 2013.
  property carbon content 0
    carbon content on a dry matter basis (reserved; not for manual entry)
  property true value 2.40682e-8
    allocation property applied in "true value" allocation // value calculated from revenue
  properties: dry mass 1 kg, water in wet mass 0 kg, wet mass 1 kg, carbon content, non-fossil 0, water content 0, carbon content, fossil 0, carbon allocation 0 kg
- zinc concentrate: 0 kg; CPC 14290: Other non-ferrous metal ores and concentrates (other than uranium or thorium ores and concentrates); By-product classification allocatable product
  Calculated value from the knowledge of the properties of both products.
  production volume 2.63746e-8 kg
  property price 0.38 EUR2005; name ByP_price_EUR2005
    Temporary price data. Calculated as 90% of purchasers price based on: Zinc content in concentrate 53%. Concentrate price per kg Zn 86.5% of refined Zn price (13.5% treatment charges according to CHR Metals Limited 2005: Dynamic cost curves. http://www.minecost.com/dynamic.pdf). 2004 zinc price from USGS (2007) Mineral commodity summaries 2007. <http://minerals.usgs.gov/minerals/pubs/mcs/2007/mcs2007.pdf> [Accessed 25 May 2010]
  property zinc content 0.53; name zinc_C_zinc_concentrate
    Zinc content on a dry matter basis. Value taken from teh "zinc mine operation" /GLO dataset.
  property dry mass 1 kg; name DM_zinc_concentrate
  property carbon content 0
    carbon content on a dry matter basis (reserved; not for manual entry)
  property true value 1.3151e-18
    allocation property applied in "true value" allocation // value calculated from revenue
  properties: wet mass 1 kg, water content 0, carbon content, non-fossil 0, carbon content, fossil 0, water in wet mass 0 kg, carbon allocation 0 kg

## Inputs from technosphere
- industrial machine, heavy, unspecified: 3.75998e-5 kg; = 0.0000376*clinker; lognormal variance with pedigree 0.3322, pedigree (4,4,2,5,1)
  Literature value. The data from global clinker production is used, since no Colombian specific data is available and the relevance of the infrastructure is rather low.
  EcoSpold01Location=RER
- municipal solid waste: -4.44998e-5 kg; name MSW; lognormal variance with pedigree 0.0034, pedigree (2,1,2,5,1)
  Literature value. The data from global clinker production is used, since no Peru specific data is available. Cement kiln dust (CKD) discarded as solid waste.
  Consulted on October 20th 2017
  EcoSpold01Location=CH
  production volume 339133 kg; = clinker_PV* MSW/clinker
    Calculated from the production volume of clinker in proportion to the respective output amounts.
  properties: carbon content, non-fossil 0.261655, carbon content, fossil 0.171549, dry mass 0.771 kg, water content 0.297017, wet mass 1 kg
  note on carbon content, non-fossil: MSW composition in tab 4.1, ecoinvent v2.2 report 13_I. C content referred to 1 kg DM
- lubricating oil: 4.70998e-5 kg; = 0.0000471*clinker; lognormal variance with pedigree 0.0128, pedigree (2,1,2,5,1)
  Literature value. Auxiliary materials include parts of infrastructure and lubrication oil. The data from clinker production.GLO (accessed on 2018/01/04) is used, since no Peru specific data is available and the relevance of the auxiliary materials is rather low.
  EcoSpold01Location=RER
  properties: carbon content, fossil 0.75, dry mass 1 kg, wet mass 1 kg
  note on carbon content, fossil: Lubricating oil is produced from diesel. C-content/dry mass of fats and oils considered 75%, from: ecoinvent v2.2 report, n 15a, pg 40
- natural gas, high pressure: 0.0308538 m3; = 0.0308539944903581*clinker; source Manuel Lascarro 2017; lognormal variance with pedigree 0.0014, pedigree (2,1,2,1,1)
  EcoSpold01Location=CH
  Calculated value. Based on the wieghted average from the sustainability reports of Pacasmayo and Unacem. The LHV are taken from (Dauriat et al., 2014) Mathematical formula to calculate the value is:
  1.12 /LHV_NG
  property lower heating value 36.3 MJ/Nm3; name LHV_NG
- iron ore, crude ore, 46% Fe: 0.0346998 kg; = 0.0347*clinker; source Pacasmayo 2014; lognormal variance with pedigree 0.0128, pedigree (2,1,2,5,1)
  Estimated value. For Peru the same total amount of material input was assumed as for the global ecoinvent dataset (1.74kg of primary and secondary raw material per kg of clinker produced), given the limitation in data availability. The material composition is based on data from the Pacasmayo cement producer, representing 20% of the Peruvian market. The clinker composition in Peru (Pacasmayo, 2014) is 72% limestone, 15% clays, 2% iron oxide and 11% calcareous marl.
  properties: dry mass 1 kg, wet mass 1 kg
- electricity, medium voltage: 0.0800996 kWh; = 0.0801*clinker; source Argos 2017; lognormal variance with pedigree 0.0014, pedigree (2,1,2,1,1)
  EcoSpold01Location=CH
  Calculated value. Based on information from sutainability reports. See Gmünder 2017 for more information.
  Gmünder S., Myers N., Laffely J. and Silva F. (2017) life cycle inventory of cement and concrete production in Peru and Colombia. Ecoinvent report.
- diesel, low-sulfur: 0.00139999 kg; = 0.0014*clinker; lognormal variance with pedigree 0.0014, pedigree (2,1,2,1,1)
  Calculated value. Based on the wieghted average from the sustainability reports of Pacasmayo and Unacem. The LHV are taken from (Dauriat et al., 2014)
  properties: carbon content, fossil 0.865, wet mass 1 kg, dry mass 1 kg
- steel, chromium steel 18/8, hot rolled: 5.85997e-5 kg; = 0.0000586*clinker; lognormal variance with pedigree 0.0128, pedigree (2,1,2,5,1)
  EcoSpold01Location=RER
  Literature value. Auxiliary materials include parts of infrastructure and lubrication oil. The data from clinker production.GLO (accessed on 2018/01/04) is used, since no Peru specific data is available and the relevance of the auxiliary materials is rather low.
  properties: wet mass 1 kg, dry mass 1 kg, carbon content, fossil 0.0008
  note on carbon content, fossil: Stainless steel model is the grade 304 steel (18/8 stainless, 18% chromium 8% nickel; max. 0.08% C)
- inert waste, for final disposal: -0.000178999 kg; name inert_waste_disposal; lognormal variance with pedigree 0.0034, pedigree (2,1,2,5,1)
  (same comment as for municipal solid waste)
  production volume 1.36415e6 kg; = clinker_PV* inert_waste_disposal/clinker
    (same comment as for municipal solid waste)
  property price 0 EUR2005; name inert_waste_disposal_price_EUR2005
  properties: water content 0.00502513, dry mass 0.995 kg, wet mass 1 kg
- refractory, high aluminium oxide, packed: 0.000136999 kg; = 0.000137*clinker; lognormal variance with pedigree 0.0128, pedigree (2,1,2,5,1)
  Literature value. Auxiliary materials include parts of infrastructure and lubrication oil. The data from clinker production.GLO (accessed on 2018/01/04) is used, since no Peru specific data is available and the relevance of the auxiliary materials is rather low.
  EcoSpold01Location=DE
  properties: dry mass 1 kg, wet mass 1 kg
- refractory, fireclay, packed: 8.20996e-5 kg; = 0.0000821*clinker; lognormal variance with pedigree 0.0128, pedigree (2,1,2,5,1)
  (same comment as for refractory, high aluminium oxide, packed)
  properties: dry mass 1 kg, wet mass 1 kg
- hard coal: 0.101038 kg; = 0.101038062283737*clinker+ (MSW*-1)*0+ (inert_waste_disposal*-1)*0; source Manuel Lascarro 2017; lognormal variance with pedigree 0.0015, pedigree (2,2,2,1,1)
  EcoSpold01Location=WEU
  Calculated value. Based on the wieghted average from the sustainability reports of Pacasmayo and Unacem. The LHV are taken from (Dauriat et al., 2014)
  property lower heating value MJ per kg 28.9 MJ/kg; name LHV_hard_coal
  properties: carbon content, fossil 0.845, water content 0.0638298, dry mass 0.94 kg, wet mass 1 kg
  note on carbon content, fossil: C content 75-94% (specified in Tab 1.1, report 6, part VI). A mean content of 0.845 kg C/ kg dry hard coal was considered
  note on lower heating value MJ per kg: Net calorific value. LHV of 28.9 MJ/Kg from (Quantis, CSI-Tool for EPDs for cement and concrete, 2015)
- clay: 0.259999 kg; = 0.26*clinker; source Pacasmayo 2014; lognormal variance with pedigree 0.0035, pedigree (2,2,2,5,1)
  EcoSpold01Location=CH
  Estimated value. For Peru the same total amount of material input was assumed as for the global ecoinvent dataset (1.74kg of primary and secondary raw material per kg of clinker produced), given the limitation in data availability. The material composition is based on data from the Pacasmayo cement producer, representing 20% of the Peruvian market. The clinker composition in Peru (Pacasmayo, 2014) is 72% limestone, 15% clays, 2% iron oxide and 11% calcareous marl.
  properties: water content 0.0362694, dry mass 0.965 kg, wet mass 1 kg
- calcareous marl: 0.190999 kg; = 0.191*clinker; source Pacasmayo 2014; lognormal variance with pedigree 0.0035, pedigree (2,2,2,5,1)
  (same comment as for clay)
  properties: dry mass 1 kg, carbon content, fossil 0.087767, wet mass 1 kg
  note on carbon content, fossil: composed from 3/4 pure limestone and 1/4 clay, ecoinvent v2.2 report 7 part II pg 14. C content of limestone is 0.117 kg/kg WM
- limestone, crushed, for mill: 1.24999 kg; = 1.25*clinker; source Pacasmayo 2014; lognormal variance with pedigree 0.0049, pedigree (3,2,2,5,1)
  (same comment as for iron ore, crude ore, 46% Fe)
  properties: carbon content, fossil 0.117492, wet mass 1 kg, dry mass 0.998 kg, water content 0.00200401
- cement factory: 6.19997e-12 unit; = 0.0000000000062*clinker; lognormal variance with pedigree 0.3128, pedigree (2,1,2,5,1)
  EcoSpold01Location=CH
  Literature value. The data from global clinker production is used, since no Colombian specific data is available and the relevance of the infrastructure is rather low.
- refractory, basic, packed: 0.000189999 kg; = 0.00019*clinker; lognormal variance with pedigree 0.0128, pedigree (2,1,2,5,1)
  (same comment as for refractory, high aluminium oxide, packed)
  properties: wet mass 1 kg, dry mass 1 kg

## Inputs from nature
- Water, well, in ground [natural resource, in water]: 0.000125599 m3; = 0.0001256*clinker; source Argos 2017; lognormal variance with pedigree 0.0083, pedigree (3,2,2,1,1)
  Calculated value. The values reported from the sustainability reports from Argos and Cemex from 2016 are used to extrapolate the average water withdrawal for cement and clinker production. The shares are calculated as following: surface water (67%), ground water (11%), tap water (9%), rain water (6%) and waste water (7%). Mathematical formula to calculate the value is:
  water_withdrawal*80/100
- Water, river [natural resource, in water]: 3.13998e-5 m3; = 0.0000314*clinker; source Argos 2017; lognormal variance with pedigree 0.0083, pedigree (3,2,2,1,1)
  Calculated value. The values reported from the sustainability reports from Argos and Cemex from 2016 are used to extrapolate the average water withdrawal for cement and clinker production. The shares are calculated as following: surface water (67%), ground water (11%), tap water (9%), rain water (6%) and waste water (7%). Mathematical formula to calculate the value is:water_withdrawal*20/100

## Emissions to nature
- Toluene [air, urban air close to ground]: 1.99999e-6 kg; = 0.000002*clinker; source Quantis 2015; lognormal variance with pedigree 0.062, pedigree (1,5,3,5,1)
  Literature value. The data is based on the LCA core model of the WBCSD-CSI EPD tool (Dauriat et al., 2014) (Dauriat et al., 2014)
  Dauriat, A., Porté, C., Delerce, C., Guignard, C., & Adams, A. (2014). WBCSD CSI tool for EPDs of concrete and cement: LCA core model and database report.
- Dibenz(a,h)anthracene [air, unspecified]: 2.87998e-12 kg; = 0.00000000000288*clinker; lognormal variance with pedigree 0.3028, pedigree (2,1,2,5,1)
  Literature value. This value was taken from the "clinker production, GLO" dataset as it was considered adequate also for this dataset.
  Consulted on October 20th 2017
- Antimony [air, unspecified]: 3.08998e-7 kg; = 0.000000309* clinker; source Quantis 2015; lognormal variance with pedigree 0.062, pedigree (1,5,3,5,1)
  (same comment as for Toluene)
- Ammonia [air, unspecified]: 6.91996e-5 kg; = 0.0000692*clinker; source Quantis 2015; lognormal variance with pedigree 0.056, pedigree (1,4,3,5,1)
  (same comment as for Toluene)
- Mercury [air, unspecified]: 5.09997e-8 kg; = 0.000000051*clinker; source Quantis 2015; lognormal variance with pedigree 0.062, pedigree (1,5,3,5,1)
  (same comment as for Toluene)
- Xylene [air, urban air close to ground]: 1.99999e-6 kg; = 0.000002*clinker; source Quantis 2015; lognormal variance with pedigree 0.062, pedigree (1,5,3,5,1)
  (same comment as for Toluene)
- Methane, fossil [air, unspecified]: 1.78999e-5 kg; = 0.0000179*clinker; source Quantis 2015; lognormal variance with pedigree 0.1328, pedigree (2,1,2,5,1)
  Literature value. The total methane emissions are taken from the model as standard values specified in the CSI EPD tool (Dauriat et al., 2014). The share of biogenic and fossil emissions is based on the type of the kiln fuel input and is the biogenic emissions in Peru are 0% of the total emissions (Gmünder, 2017).
- Nickel [air, unspecified]: 6.91996e-8 kg; = 0.0000000692*clinker; source Quantis 2015; lognormal variance with pedigree 0.062, pedigree (1,5,3,5,1)
  (same comment as for Toluene)
- Sulfur dioxide [air, unspecified]: 0.000405998 kg; = 0.000406*clinker; source Argos 2017; lognormal variance with pedigree 0.0088, pedigree (2,1,2,5,1)
  Calculated value. Values on total SO2 emissions from sustainability reports are used.
- Thallium [air, unspecified]: 3.19998e-8 kg; = 0.000000032*clinker; source Quantis 2015; lognormal variance with pedigree 0.062, pedigree (1,5,3,5,1)
  (same comment as for Toluene)
- Methane, dichloro-, HCC-30 [air, unspecified]: 5.17997e-8 kg; = 0.0000000518*clinker; lognormal variance with pedigree 0.3028, pedigree (2,1,2,5,1)
  (same comment as for Dibenz(a,h)anthracene)
- Beryllium [air, unspecified]: 3.52998e-9 kg; = 0.00000000353*clinker; source Quantis 2015; lognormal variance with pedigree 0.056, pedigree (1,4,3,5,1)
  (same comment as for Toluene)
- Dioxins, measured as 2,3,7,8-tetrachlorodibenzo-p-dioxin [air, unspecified]: 5.49997e-14 kg; = 0.000000000000055*clinker; source Quantis 2015; lognormal variance with pedigree 0.062, pedigree (1,5,3,5,1)
  (same comment as for Toluene)
- Water [water, unspecified]: 3.29698e-5 m3; = 0.00003297*clinker; source Argos 2017; lognormal variance with pedigree 0.0029, pedigree (3,2,2,1,1)
  Literature value. Water emitted to air refers to the water that is removed from the system and thus is not available for later use (CSI consumption indicator in litres per ton of cement). According to the sustainability reports the share of water consumed is about 79%. Mathematical formula to calculate the value is:water_withdrawal-water_to_air
- Hydrogen chloride [air, unspecified]: 2.30999e-5 kg; = 0.0000231*clinker; source Quantis 2015; lognormal variance with pedigree 0.056, pedigree (1,4,3,5,1)
  (same comment as for Toluene)
- Arsenic [air, unspecified]: 1.01999e-7 kg; = 0.000000102*clinker; source Quantis 2015; lognormal variance with pedigree 0.062, pedigree (1,5,3,5,1)
  (same comment as for Toluene)
- Phosphorus [air, unspecified]: 3.47998e-13 kg; = 0.000000000000348*clinker; lognormal variance with pedigree 0.0428, pedigree (2,1,2,5,1)
  (same comment as for Dibenz(a,h)anthracene)
- Water [air, unspecified]: 0.000124029 m3; name water_to_air; = 0.00012403*clinker; source Argos 2017; lognormal variance with pedigree 0.003, pedigree (3,2,2,3,1)
  Literature value. Water emitted to air refers to the water that is removed from the system and thus is not available for later use (CSI consumption indicator in litres per ton of cement). According to the sustainability reports the share of water consumed is about 79%.
  property fraction, origin: salt water 0; name fraction_origin_salt_water
  property fraction, origin: fresh water 0.173469; name fraction_origin_fresh_water
  property fraction, origin: unspecified 0.826531; name fraction_origin_unspecified
- Copper [air, unspecified]: 6.28997e-8 kg; = 0.0000000629*clinker; source Quantis 2015; lognormal variance with pedigree 0.062, pedigree (1,5,3,5,1)
  (same comment as for Toluene)
- Manganese [air, unspecified]: 5.09997e-8 kg; = 0.000000051*clinker; source Quantis 2015; lognormal variance with pedigree 0.056, pedigree (1,4,3,5,1)
  (same comment as for Toluene)
- Zinc [air, unspecified]: 5.27997e-7 kg; = 0.000000528*clinker; source Quantis 2015; lognormal variance with pedigree 0.056, pedigree (1,4,3,5,1)
  (same comment as for Toluene)
- Benzene [air, non-urban air or from high stacks]: 4.00998e-6 kg; = 0.00000401*clinker; source Quantis 2015; lognormal variance with pedigree 0.062, pedigree (1,5,3,5,1)
  (same comment as for Toluene)
- Chrysene [air, unspecified]: 5.64997e-13 kg; = 0.000000000000565*clinker; lognormal variance with pedigree 0.3028, pedigree (2,1,2,5,1)
  (same comment as for Dibenz(a,h)anthracene)
- Particulates, < 2.5 um [air, non-urban air or from high stacks]: 0.000121999 kg; = 0.000122*clinker; source Quantis 2015; lognormal variance with pedigree 0.304, pedigree (1,4,3,1,1)
  Calculated value. Values on total PM emissions from the sustainability report of Pacasmayo is used and the same distribution based on the WBCSD-CSI EPD tool is assumed (48% < 2.5um, 18% > 2.5 um, and < 10um and 34% > 10um).
- Chromium [air, unspecified]: 9.36995e-8 kg; = 0.0000000937*clinker; source Quantis 2015; lognormal variance with pedigree 0.062, pedigree (1,5,3,5,1)
  (same comment as for Toluene)
- Phenanthrene [air, unspecified]: 6.59997e-10 kg; = 0.00000000066*clinker; lognormal variance with pedigree 0.6528, pedigree (2,1,2,5,1)
  (same comment as for Dibenz(a,h)anthracene)
- Cadmium [air, unspecified]: 1.60999e-8 kg; = 0.0000000161*clinker; source Quantis 2015; lognormal variance with pedigree 0.056, pedigree (1,4,3,5,1)
  (same comment as for Toluene)
- Ethane [air, non-urban air or from high stacks]: 9.99995e-6 kg; = 0.00001*clinker; source Quantis 2015; lognormal variance with pedigree 0.062, pedigree (1,5,3,5,1)
  (same comment as for Toluene)
- Indeno(1,2,3-cd)pyrene [air, unspecified]: 1.12999e-12 kg; = 0.00000000000113*clinker; lognormal variance with pedigree 0.3028, pedigree (2,1,2,5,1)
  (same comment as for Dibenz(a,h)anthracene)
- Nitrogen oxides [air, unspecified]: 0.00134999 kg; = 0.00135*clinker; source Argos 2017; lognormal variance with pedigree 0.0428, pedigree (2,1,2,5,1)
  Calculated value. Values on NOx emissions from sustainability reports are used.
- Acetaldehyde [air, non-urban air or from high stacks]: 3.97998e-6 kg; = 0.00000398*clinker; source Quantis 2015; lognormal variance with pedigree 0.062, pedigree (1,5,3,5,1)
  (same comment as for Toluene)
- Particulates, > 2.5 um, and < 10um [air, non-urban air or from high stacks]: 4.56998e-5 kg; = 0.0000457*clinker; source Quantis 2015; lognormal variance with pedigree 0.304, pedigree (1,4,3,1,1)
  (same comment as for Particulates, < 2.5 um)
- Cobalt [air, unspecified]: 1.91999e-8 kg; = 0.0000000192*clinker; source Quantis 2015; lognormal variance with pedigree 0.056, pedigree (1,4,3,5,1)
  (same comment as for Toluene)
- Ethene [air, urban air close to ground]: 1.31999e-5 kg; = 0.0000132*clinker; source Quantis 2015; lognormal variance with pedigree 0.062, pedigree (1,5,3,5,1)
  (same comment as for Toluene)
- Pyrene [air, unspecified]: 3.43998e-11 kg; = 0.0000000000344*clinker; lognormal variance with pedigree 0.3028, pedigree (2,1,2,5,1)
  (same comment as for Dibenz(a,h)anthracene)
- Carbon monoxide, fossil [air, unspecified]: 0.00114999 kg; = 0.00115*clinker; source Manuel Lascarro 2017; lognormal variance with pedigree 0.6528, pedigree (2,1,2,5,1)
  Literature value. The total carbon monoxide are taken from the model as standard values specified in the CSI EPD tool (Dauriat et al., 2014). The share of biogenic and fossil emissions is based on the type of the kiln fuel input and is the biogenic emissions in Peru are 0% of the total emissions (Gmünder, 2017).
- Hydrocarbons, aliphatic, alkanes, unspecified [air, urban air close to ground]: 5.20997e-8 kg; = 0.0000000521*clinker; source Quantis 2015; lognormal variance with pedigree 0.062, pedigree (1,5,3,5,1)
  (same comment as for Toluene)
- Fluoranthene [air, unspecified]: 4.71998e-11 kg; = 0.0000000000472*clinker; lognormal variance with pedigree 0.3028, pedigree (2,1,2,5,1)
  (same comment as for Toluene)
- Chromium VI [air, unspecified]: 5.43997e-10 kg; = 0.000000000544*clinker; lognormal variance with pedigree 0.0428, pedigree (2,1,2,5,1)
  (same comment as for Dibenz(a,h)anthracene)
- Formaldehyde [air, urban air close to ground]: 7.67996e-6 kg; = 0.00000768*clinker; source Quantis 2015; lognormal variance with pedigree 0.062, pedigree (1,5,3,5,1)
  (same comment as for Toluene)
- Benzo(a)pyrene [air, unspecified]: 2.27999e-7 kg; = 0.000000228*clinker; source Quantis 2015; lognormal variance with pedigree 0.056, pedigree (1,4,3,5,1)
  (same comment as for Toluene)
- Particulates, > 10 um [air, non-urban air or from high stacks]: 8.63995e-5 kg; = 0.0000864*clinker; source Quantis 2015; lognormal variance with pedigree 0.124, pedigree (1,4,3,1,1)
  (same comment as for Particulates, < 2.5 um)
- Hydrogen sulfide [air, urban air close to ground]: 6.11997e-7 kg; = 0.000000612*clinker; source Quantis 2015; lognormal variance with pedigree 0.0083, pedigree (3,2,2,1,1)
  (same comment as for Toluene)
- Fluorene [air, unspecified]: 4.27998e-11 kg; = 0.0000000000428*clinker; lognormal variance with pedigree 0.3028, pedigree (2,1,2,5,1)
  (same comment as for Toluene)
- Carbon dioxide, fossil [air, unspecified]: 0.862995 kg; = 0.863*clinker; source Manuel Lascarro 2017; lognormal variance with pedigree 0.0035, pedigree (2,2,2,5,1)
  Calculated value. The data is based on the fuel inputs and the emissions are calculated based on the LCA core model of the WBCSD-CSI EPD tool (Dauriat et al., 2014) (Dauriat et al., 2014)
  Dauriat, A., Porté, C., Delerce, C., Guignard, C., & Adams, A. (2014). WBCSD CSI tool for EPDs of concrete and cement: LCA core model and database report.
- Hydrogen fluoride [air, urban air close to ground]: 2.30999e-6 kg; = 0.00000231*clinker; source Quantis 2015; lognormal variance with pedigree 0.062, pedigree (1,5,3,5,1)
  (same comment as for Toluene)
- Selenium [air, unspecified]: 5.54997e-8 kg; = 0.0000000555*clinker; source Quantis 2015; lognormal variance with pedigree 0.056, pedigree (1,4,3,5,1)
  (same comment as for Toluene)
- Tin [air, unspecified]: 1.07999e-6 kg; = 0.00000108*clinker; lognormal variance with pedigree 0.6628, pedigree (2,1,2,5,1)
  (same comment as for Toluene)
- Propane [air, urban air close to ground]: 8.35996e-6 kg; = 0.00000836*clinker; source Quantis 2015; lognormal variance with pedigree 0.062, pedigree (1,5,3,5,1)
  (same comment as for Toluene)
- Vanadium [air, unspecified]: 5.36997e-8 kg; = 0.0000000537*clinker; source Quantis 2015; lognormal variance with pedigree 0.056, pedigree (1,4,3,5,1)
  (same comment as for Toluene)
- Lead [air, unspecified]: 1.70999e-7 kg; = 0.000000171*clinker; source Quantis 2015; lognormal variance with pedigree 0.062, pedigree (1,5,3,5,1)
  (same comment as for Toluene)

## Sampling procedure
The data is compiled based on different data sources, including sustainability reports, literature values and expert judgements. Most data is derived from sustainability reports of the two principal clinker producers of Peru (Pacasmayo and Unacem). The data is checked, completed and validated by local experts. In total, it is estimated that the data considered is representative for 68% of clinker production in all the country (market share of the three main clinker producers).
Unit flows were calculated by dividing the amounts of inputs and outputs by the total clinker production in mass.
The amount of the exchanges were calculated considering the arithmetic/weighted average of the sample. No conversion to the geometric mean of the lognormal distribution was done, for consistency reasons with other Ecoinvent datasets.

## Extrapolations
The life cycle inventory model is based on the PCR for cement and concrete(Environdec, 2010), as well as on the LCA core model of the WBCSD-CSI EPD tool (Dauriat et al., 2014).
Air emissions (expect CO2, NOx and SO2) are modelled on literature values (Dauriat et al., 2014). The infrastructure, auxiliary materials, wastes are based on the global ecoinvent dataset for clinker production.

Standard basic uncertainty values were used.

Dauriat, A., Porté, C., Delerce, C., Guignard, C., & Adams, A. (2014). WBCSD CSI tool for EPDs of concrete and cement: LCA core model and database report.

Environdec. (2010). Product category rules of UN CPC 3744 Cement.

## Review by Marion Sié 2017-12-07
The author specifies the LHV of secondary fuels are specified in the Published source report.
