# containerboard production, linerboard, testliner

Dataset: EcoSpold 2, unit process
Geography: RER
Time period: 2009-01-01 to 2019-12-31
Technology level: current
Classification: ISIC rev.4 ecoinvent: 1702:Manufacture of corrugated paper and paperboard and of containers of paper a
Classification: EcoSpold01Categories: paper & cardboard/cardboard & corrugated board
Synonyms: recycled liner; containerboard; linerboard
Scenario: Business-as-Usual
System model: Allocation at the point of substitution
Share of production covered: 66 %
Generated by: Angeline de Beaufort
Published in: FEFCO Corrugated Packaging 2015
Database: ecoinvent
isCopyrightProtected: true
accessRestrictedTo: 1

## General comment
This dataset represents the production of testliner from recovered paper. Testliner is produced from secondary material, while kraftliner is commonly produced from virgin material. Both products are used interchangeably as bottom and top layers surrounding the mid layer of “medium” in the production of corrugated board.
Mind that this dataset is identical to the production recycled fluting (wellenstoff) except for inputs of
alkyletene dimer sizing agent,
chemical, organic and
kaolin
are specific to testliner. These do not appear in the production of wellenstoff.
FEFCO (2015) reports weighted average values of in- and outputs over the testliner and wellenstoff where there is no technical reason for differences between the two grades. This is mentioned to be the case for energy consumption and the related emissions to air, for water consumption, the related effluents and emissions to water as well as for residues. For this reason also the calculated emissions resulting from fuel consumption are identical for wellenstoff and testliner.
With the update of this dataset to 2015 industry data, heat and electricity are no longer produced as byproducts, compared to the previous version of this dataset, which was based on 2009 industry data (FEFCO, 2009/2015).
treatment of recovered paper to linerboard, testliner, RER 2015
treatment of recovered paper to linerboard, testliner, RER 2015

## Included activities start
The process starts wih the reception of the recovered paper.

## Included activities end
The stock preparation is done in accordance with a recipe for each paper grade and grammage. The grades of recovered paper are put on the conveyor to the pulper in the ratio mentioned in the recipe. In the pulper the blend of dry, baled paper is converted into a pumpable suspension of fibres. This is achieved by submerging the bales in water and agitating the mixture so that the paper is wetted and broken up to form a suspension. The pulp is then screened and cleaned. and may undergo a disperging treatment. The stock passes through one or two head boxes onto the paper machine, Testliner mostly consists of two plies of paper.The process for the production of Testliner ends with the production of corrugated board base paper.

## Geography
Data for main producers in Europe (Austria, Czech Republic, France, Germany, Italy, the Netherlands, Spain and Great Britain).

## Technology
Average of present used technology

## Parameters
- fraction, process water, to air: 0.15 dimensionless; name fraction_PW_to_air; lognormal variance with pedigree 0.092025, pedigree (4,4,3,2,4)
  Literature value. In case when no industry/process specific data are available, default evaporation fraction value is used. This value is 15% and is based on literature (Statistics Canada, 2007 & Shaffer, K.H., 2008, Consumptive water use in the Great Lakes Basin, USGS & Shiklomanov, 2003, World Water Resources at the Beginning of the 21st Century) and has been approved by an expert.
- fraction, tap water, to air: 0.15; name fraction_TW_to_air; = fraction_PW_to_air; lognormal variance with pedigree 0.092025, pedigree (4,4,3,2,4)
  Calculated value. See comment in the other parametres present in this dataset. Tap water is considered to be always used as process water, thus process water fractions to air are applied to all tap water input flows to calculate the amount of water consumed in the processes.

## Reference product
- containerboard, linerboard: 1 kg; name linerboardAmount; By-product classification allocatable product; CPC 32151: Corrugated paper and paperboard
  FEFCO, 2015.
  production volume 6.52641e9 kg; name linerboardProductionVolume; = 22279000000*(0.278/0.949)
    Calculated value cross-checked with industry information. Calculated by splitting the total shipment of corrugated packaging materials in Europe in 2015 as reported by FEFCO (2015) (2.23*10^10 kg) according to the reported shares of the consumption of testliner, kraftliner, other recycled liner, semi-chemical fluting and wellentsoff (=recycled fluting), respectively. The sum of shares was scaled to sum up to 100%. Reference(s): FEFCO. 2015. Annual Statistics 2015. http://www.fefco.org/sites/default/files/documents/Fefco_AnnualEvaluation_2015.pdf, accessed 6. February 2018
  property price 0.598 EUR2005; name linerboardAmount_price_EUR2005
    Export prices for the World+ according to: http://faostat.fao.org/site/626/DesktopDefault.aspx?PageID=626#ancor downloaded 28 April 2009; calculated as export value divided by export volume.
  property carbon content 0.46
    carbon content on a dry matter basis (reserved; not for manual entry)
  property true value 598; name linerboardAmount_true_value
    allocation property applied in "true value" allocation // value calculated from revenue
  properties: carbon content, non-fossil 0.46, water content 0.08, wet mass 1 kg, dry mass 0.925926 kg, water in wet mass 0.0740741 kg, carbon allocation 0.425926 kg

## By-products
All rows: By-product classification allocatable product
- phosphate fertiliser, as P2O5: 0 kg; source CRAAQ 2010; CPC 3462: Mineral or chemical fertilizers, phosphatic; pedigree (1,1,1,1,1)
  This is the total phosphate (as P2O5) output (organic and mineral forms of phosphate contained) from organic origin. In practice, only a part of this total amount is available to the plants and the available amount has to be calculated considering efficiency of organic phosphate (to replace mineral phosphate), which also depends on many factors, such as climate, soil, crop, timing and technique of application, etc. For information purposes, the amount considering efficiency of organic phosphate is estimated in the parameter section of this dataset under 'phosphorus availability for plants'. Since this dataset includes field emissions from the application of sludge, phosphate availability has been accounted for in the calculation of direct field emissions.
  production volume 1.23698e6 kg
  property price 0.241 EUR2005; name P2O5_fertiliser_price_EUR2005
    Temporary price data. Calculated as 90% of purchasers price based on: 2004 prices are calculated on basis of Import/Export data (tonnes and US$) from UN Trade Statistics Database (http://data.un.org/Browse.aspx?d=ComTrade, accessed 7/7-2010). N, P2O5, or K2O content (http://www.fertilizer.org/ifa/Home-Page/STATISTICS/Conversions-factors)
  property carbon content 0
    carbon content on a dry matter basis (reserved; not for manual entry)
  property true value 0.0456442
    allocation property applied in "true value" allocation // value calculated from revenue
  properties: water content 0, carbon content, non-fossil 0, wet mass 1 kg, dry mass 1 kg, water in wet mass 0 kg, carbon content, fossil 0, carbon allocation 0 kg
- nitrogen fertiliser, as N: 0 kg; source CRAAQ 2010; CPC 3461: Mineral or chemical fertilizers, nitrogenous; pedigree (1,1,1,1,1)
  This is the total nitrogen (as N) output (organic and mineral forms of nitrogen contained) from organic origin. In practice, only a part of this total amount is available to the plants and the available amount has to be calculated considering nitrogen efficiency (to replace mineral nitrogen), which also depends on many factors, such as climate, soil, crop, timing and technique of application, etc. For information purposes, the amount considering nitrogen efficiency is estimated in the parameter section of this dataset under 'nitrogen availability for plants'. Since this dataset includes field emissions from the application of sludge, nitrogen availability has been accounted for in the calculation of direct field emissions.
  production volume 1.84809e6 kg
  property price 0.473 EUR2005; name N_fertiliser_price_EUR2005
    (same comment as for phosphate fertiliser, as P2O5)
  property carbon content 0
    carbon content on a dry matter basis (reserved; not for manual entry)
  property true value 0.133841
    allocation property applied in "true value" allocation // value calculated from revenue
  properties: dry mass 1 kg, water content 0, carbon content, fossil 0, carbon content, non-fossil 0, water in wet mass 0 kg, wet mass 1 kg, carbon allocation 0 kg
- soil pH raising agent, as CaCO3: 0 kg; source Marianne Lemieux 2013; CPC 34659: Fertilizers n.e.c.; pedigree (1,1,1,1,1)
  Calculated value of the amount of CaCO3 that can be substituted considered the liming efficiency of the sludge.
  production volume 3.44524e7 kg
  property carbon content, non-fossil 0; name soil_pH_raising_a_C_content_non_fossil_0
    biogene carbon content on a dry matter basis
  property carbon content, fossil 0.12; name soil_pH_raising_agent_Cfoss_content; = 12/(40+12+3*16)
    Stoichiometric calculation. Fossil carbon content on a dry matter basis.
  property price 0.117 EUR2005; name soil_pH_raising_agent_as_CaCO3_price_EUR
    The price is estimated to be the same as for lime.
  property carbon content 0.12
    carbon content on a dry matter basis (reserved; not for manual entry)
  property true value 0.617177
    allocation property applied in "true value" allocation // value calculated from revenue
  properties: water in wet mass 0 kg, dry mass 1 kg, water content 0, wet mass 1 kg, carbon allocation 0.12 kg
- potassium fertiliser, as K2O: 0 kg; source CRAAQ 2010; CPC 3463: Mineral or chemical fertilizers, potassic; pedigree (1,1,1,1,1)
  This is the potassium (as K2O) output (organic and mineral forms of potassium contained) from organic origin. In practice, only a part of this total amount is available to the plants and the available amount has to be calculated considering efficiency of organic potassium (to replace mineral potassium ), which also depends on many factors, such as climate, soil, crop, timing and technique of application, etc. For information purposes, the amount considering efficiency of organic potassium is estimated in the parameter section of this dataset under 'potassium availability for plants'. Since this dataset includes field emissions from the application of sludge, potassium availability has been accounted for in the calculation of direct field emissions.
  production volume 298826 kg
  property price 0.188 EUR2005; name K2O_fertiliser_price_EUR2005
    Temporary price data. Calculated as 90% of purchasers price based on: 2004 import price calulated from FAOSTAT (http://faostat.fao.org/site/575/DesktopDefault.aspx?PageID=575#ancor [accessed 2011.01.27] Potash Fertilizers (K20 total nutrients) in kUSD/Mg
  property carbon content 0
    carbon content on a dry matter basis (reserved; not for manual entry)
  property true value 0.00860162
    allocation property applied in "true value" allocation // value calculated from revenue
  properties: wet mass 1 kg, water content 0, water in wet mass 0 kg, dry mass 1 kg, carbon content, fossil 0, carbon content, non-fossil 0, carbon allocation 0 kg
- electricity, for reuse in municipal waste incineration only: 0 kWh; CPC 17100: Electrical energy; pedigree (1,1,1,1,1)
  Net electricity generated from this waste and used in internal MSWI plant energy redistribution.
  Uncertainty: uncertainty is calculated from uncertainties in waste composition and uncertainties in energy efficiency and the uncertainty in internal energy demand
  production volume 19563.6 kWh
  property exergy 3.6 MJ; name E_el_prod_MSWI_exergy
    This exergy property is based on the exergy content of the product.
  property true value relation 3.6; name E_el_prod_MSWI_true_value_relation
    property to calculate "true value" from
  property price 0.1 EUR2005; name E_el_prod_MSWI_price_EUR2005
    Estimated to be the same price as in case of electricity, medium voltage.
  property true value 2.84605e-7
    allocation property applied in "true value" allocation // value calculated from true value relation
- heat, for reuse in municipal waste incineration only: 0 MJ; CPC 17300: Steam and hot water; pedigree (1,1,1,1,1)
  Net useful heat generated from this waste and used in internal MSWI plant energy redistribution.
  Uncertainty: uncertainty is calculated from uncertainties in waste composition and uncertainties in energy efficiency and the uncertainty in internal energy demand
  production volume 138401 MJ
  property exergy 0.1842 MJ; name E_th_prod_MSWI_exergy
    This exergy property is based on the exergy content of the product.
  property true value relation 0.1842; name E_th_prod_MSWI_true_value_relation
    property to calculate "true value" from
  property price 0.0106 EUR2005; name E_th_prod_MSWI_price_EUR2005
    Average European district heat price from Ecoheatcool and Euroheat 2005-2006, Ecoheat Work package 1: The European heat market. Final report. 10.6 EUR/GJ i s the price of district heat. http://www.solarthermalworld.org/files/Ecoheatcool%20WP1%20Web.pdf?download
  property true value 1.03019e-7
    (same comment as for electricity, for reuse in municipal waste incineration only)
- zinc concentrate: 0 kg; CPC 14290: Other non-ferrous metal ores and concentrates (other than uranium or thorium ores and concentrates)
  Calculated value from the knowledge of the properties of both products.
  production volume 4.9091 kg
  property price 0.38 EUR2005; name ByP_price_EUR2005
    Temporary price data. Calculated as 90% of purchasers price based on: Zinc content in concentrate 53%. Concentrate price per kg Zn 86.5% of refined Zn price (13.5% treatment charges according to CHR Metals Limited 2005: Dynamic cost curves. http://www.minecost.com/dynamic.pdf). 2004 zinc price from USGS (2007) Mineral commodity summaries 2007. <http://minerals.usgs.gov/minerals/pubs/mcs/2007/mcs2007.pdf> [Accessed 25 May 2010]
  property zinc content 0.53; name zinc_C_zinc_concentrate
    Zinc content on a dry matter basis. Value taken from teh "zinc mine operation" /GLO dataset.
  property dry mass 1 kg; name DM_zinc_concentrate
  property carbon content 0
    carbon content on a dry matter basis (reserved; not for manual entry)
  property true value 2.11221e-10
    allocation property applied in "true value" allocation // value calculated from revenue
  properties: wet mass 1 kg, water content 0, carbon content, non-fossil 0, carbon content, fossil 0, water in wet mass 0 kg, carbon allocation 0 kg

## Inputs from technosphere
- kaolin: 0.000580111 kg; source FEFCO Corrugated Packaging 2015; lognormal variance with pedigree 0.0032, pedigree (1,3,3,1,1)
  Proxy for filler, unspecified. Contrary to most other exchanges which are a weighted average between the grades testliner and recycled fluting (FEFCO,2015), this exchange is specific to testliner, it does not appear in the productio of recycled fluting (wellentsoff).
  properties: dry mass 1 kg, wet mass 1 kg
- pitch despergents, in paper production: 3.07213e-5 kg; source FEFCO Corrugated Packaging 2015; lognormal variance with pedigree 0.0032, pedigree (1,3,3,1,1)
  FEFCO, 2015.
  Uncertainty: The data for the production of Testliner and Wellenstoff were collected from mills, together producing about 63% (9.700.000 tonnes) of the total annual production of corrugated base papers from recovered paper in Europe. They were provided by paper mills in Austria, Czech Republic, France, Germany, Italy, the Netherlands, Spain and Great Britain. The data are for the year 2008. The data were collected directly from the producers and checked by technical experts.
  properties: dry mass 1 kg, wet mass 1 kg, carbon content, fossil 0.29009
- diesel, low-sulfur: 0.000470861 kg; = 0.02018*1000/42.8; source FEFCO Corrugated Packaging 2015; lognormal variance with pedigree 0.0038, pedigree (1,3,3,1,2)
  Reported as 0.02 GJ /ton NSP. Converted to kg using the lower heating value (42.8 MJ/kg) reported in "Dones R. et al.(2007) Life Cycle Inventories of Energy Systems: Results for Current Systems in Switzerland and other UCTE Countries. Final report ecoinvent data v2.0, No. 5. Swiss Centre for Life Cycle Inventories, Dübendorf, CH.
  properties: carbon content, fossil 0.865, dry mass 1 kg, wet mass 1 kg
- alkylketene dimer sizing agent, for paper production: 0.00175457 kg; source FEFCO Corrugated Packaging 2015; lognormal variance with pedigree 0.0032, pedigree (1,3,3,1,1)
  Reported as sizing agents. Contrary to most other exchanges which are a weighted average between the grades testliner and recycled fluting (FEFCO,2015), this exchange is specific to testliner, it does not appear in the productio of recycled fluting (wellentsoff).
  properties: carbon content, non-fossil 0.53823, wet mass 1 kg, dry mass 1 kg
- core board: 0.00244671 kg; = 2.4+0.05; source FEFCO Corrugated Packaging 2015; lognormal variance with pedigree 0.0032, pedigree (1,3,3,1,1)
  Reported as paper consumption for corrugated board production. Cores and core plugs summed.
  properties: water content 0.0582011, dry mass 0.945 kg, carbon content, non-fossil 0.430314, wet mass 1 kg
- potato starch: 0.0144092 kg; = 0.706553237438887+ (26.5853484265679+0.858725016950933)/2; source FEFCO Corrugated Packaging 2015; lognormal variance with pedigree 0.0032, pedigree (1,3,3,1,1)
  Proxy for potato starch (0.71kg) and half of "starch, modified" (0.86 kg), and "wheat starch" (26.6 kg). Other half of latter two starches modeled as maize starch.
  properties: carbon content, non-fossil 0.46, water content 0.25, wet mass 1 kg, dry mass 0.8 kg
- hard coal: 0.00562449 kg; = 0.161076908007024*1000/28.6; source FEFCO Corrugated Packaging 2015; lognormal variance with pedigree 0.0118, pedigree (2,3,3,1,3)
  Reported as 0.16 GJ /ton NSP. Converted to kg using the lower heating value (28.6 MJ/kg) reported in "Dones R. et al.(2007) Life Cycle Inventories of Energy Systems: Results for Current Systems in Switzerland and other UCTE Countries. Final report ecoinvent data v2.0, No. 5. Swiss Centre for Life Cycle Inventories, Dübendorf, CH.
  Uncertainty: Uncertainty accounts for both the uncertainty associated with the fuel consumption value reported by FEFCO and the lower heating value used to convert the exchange value to a mass basis.
  properties: wet mass 1 kg, carbon content, fossil 0.845, dry mass 0.94 kg, water content 0.0638298
- wood chips, dry, measured as dry mass: 0.00306824 kg; = 0.0564087368482092*1000/18.36
  Reported as "biofuels (bark, scrap wood and tall oil)" 0.56 GJ/tonne product. Average lower heating value of wood chips calculated as 18.36MJ/kg dry mass.
  properties: carbon content, non-fossil 0.494, water content 0.4, wet mass 1.4 kg, dry mass 1 kg
  note on carbon content, non-fossil: C content of dry mass is 0.494 kgC/kg dry wood (ecoinvent v2.2 report 9).
- lignite ash: -0.000517306 kg; lognormal variance with pedigree 0.0433, pedigree (2,2,3,1,4)
  Estimation based on fuel input data and emission factors from corresponding fuel combustion ecoinvent datasets. Emissions from peat combustion approximated with lignite combustion, LPG with natural gas combustion, diesel with light fuel oil combustion, refuse derived fuel (RFD) with combustion of wood chips from post consumer wood.
  production volume 3.38069e6 kg; = linerboardProductionVolume * ((Ref('9fd68aad-fa6a-4562-b5ac-2f44edc64589')*-1) / linerboardAmount)
    Calculated from production volume of reference product using the relative outputs.
  properties: dry mass 1 kg, wet mass 1 kg
- municipal solid waste: -0.0418475 kg; = (10.47597+31.4279)*-1; source FEFCO Corrugated Packaging 2015; lognormal variance with pedigree 0.0086, pedigree (1,3,3,1,1)
  Waste reported as "residue, rejects, paper-related" (10 kg), representing paper clips, tags, adhesive labels, fibres etc. and "residue, rejects, other" (31 kg), representing e.g. glass, sand, plastics. The average dry mass of the rejects is about 50%.
  production volume 2.73482e8 kg; = (Ref('8577294a-f195-46b0-913a-f97886d25b1c')*-1)/ linerboardAmount* linerboardProductionVolume
    Calculated from production volume of reference product using the relative outputs.
  property dry mass 0.5 kg; name MSW_DM
  property water content 1; name MSW_water_content
  properties: wet mass 1 kg, carbon content, non-fossil 0.261655, carbon content, fossil 0.171549
  note on carbon content, non-fossil: MSW composition in tab 4.1, ecoinvent v2.2 report 13_I. C content referred to 1 kg DM
- hard coal ash: -0.000471416 kg; lognormal variance with pedigree 0.2106, pedigree (5,5,5,5,5)
  (same comment as for lignite ash)
  production volume 3.0808e6 kg; = linerboardProductionVolume * ((Ref('ccaf98c1-93c9-4833-8e97-06a2ec21f5a0')*-1) / linerboardAmount)
    Calculated from production volume of reference product using the relative outputs.
  properties: dry mass 1 kg, wet mass 1 kg
- sodium hydroxide, without water, in 50% solution state: 9.30894e-5 kg; source FEFCO Corrugated Packaging 2015; lognormal variance with pedigree 0.0032, pedigree (1,3,3,1,1)
  FEFCO, 2015.
  properties: dry mass 1 kg, wet mass 1 kg
- wood chips, from post-consumer wood, measured as dry mass: 0.00879644 kg; = 0.17*1000/19.3; lognormal variance with pedigree 0.0487, pedigree (2,2,3,1,4)
  Reported as fuel input of Refuse Derived Fuel (without further specifcation on the composition) of 0.17 GJ per tonne net saleable product.
  properties: water content 0.4, carbon content, non-fossil 0.494, dry mass 1 kg, wet mass 1.4 kg
- triazine-compound, unspecified: 5.48402e-5 kg; = 0.109828/2; source FEFCO Corrugated Packaging 2015; lognormal variance with pedigree 0.0112, pedigree (1,3,3,1,3)
  Reported as biocide. Assumed equally split between dithiocarbamate and triazine-compound
  properties: dry mass 1 kg, carbon content, fossil 0.475616, wet mass 1 kg
- chemical, inorganic: 0.000257267 kg; source FEFCO Corrugated Packaging 2015; lognormal variance with pedigree 0.0127, pedigree (3,2,3,1,3)
  Proxi for coagulants. Contrary to most other exchanges which are a weighted average between the grades testliner and recycled fluting (FEFCO,2015), this exchange is specific to testliner, it does not appear in the productio of recycled fluting (wellentsoff).
  properties: carbon content, fossil 0.003, dry mass 1 kg, wet mass 1 kg
  note on carbon content, fossil: This dataset is an unweighted average of 20 inorganic substances (listed in Tab 88.1, ecoinvent v2.2 report 8, part II), being part of the top100 chemicals included in this database. The C-content has also been calculated as an unweighted average of the C content of the substances composing this dataset.
- liquefied petroleum gas: 0 kg; source FEFCO 2009; pedigree (1,1,1,1,1)
  This value was taken over from the previous version of this dataset, i.e. reflects the value reported in FEFCO 2009. It was reported as 0.052 MJ /ton net saleable product. Converted to kg using the lower heating value (46.05 MJ/kg), assuming a 50/50 mix of butane and propane and lower heating values from NIST Chemistry Handbook. Reference(s): FEFCO. 2009. Cepi container board, European database for corrugated board life cycle studies. Accessible online at http://www.fefco.org/sites/default/files/documents/2009_LCA_report_Fefco.pdf, last accessed 31. Jan 2018
- heat, district or industrial, natural gas: 0.000508575 MJ; source FEFCO Corrugated Packaging 2015; lognormal variance with pedigree 0.0107, pedigree (1,2,3,1,3)
  Reported as GJ/t of steam from external CHP
- waste paperboard, sorted: 1.09063 kg; name recoveredPaperAmount; = 1.0921*1000; source FEFCO Corrugated Packaging 2015; lognormal variance with pedigree 0.0027, pedigree (1,2,3,1,1)
  Reported as 1.092t wet weight of recovered paperper tonne product, with 0.88kg dry mass/kg
  property wet mass 1 kg; name recoveredPaperAmount_WM
  property water in wet mass 0.12 kg; name recoveredPaperAmount_WWM
  property dry mass 0.88 kg; name recoveredPaperAmount_DM
  property carbon content, non-fossil 0.46; name recoveredPaperAmo_C_content_non_fossil_0
  note on carbon content, non-fossil: biogene carbon content on a dry matter basis. Value taken over from linerboard and fluting medium.
- dithiocarbamate-compound: 5.48402e-5 kg; = 0.109828/2; source FEFCO Corrugated Packaging 2015; lognormal variance with pedigree 0.0112, pedigree (1,3,3,1,3)
  Reported as biocide. Assumed equally split between dithiocarbamate and triazine-compound
  properties: wet mass 1 kg, dry mass 1 kg, carbon content, fossil 0.179339
- retention aid, for paper production: 0.000950682 kg; source FEFCO Corrugated Packaging 2015; lognormal variance with pedigree 0.0032, pedigree (1,3,3,1,1)
  FEFCO, 2015.
  properties: dry mass 1 kg, wet mass 1 kg, carbon content, fossil 0.5
- tap water: 0.115132 kg; name tap_water_input; = 0.115287*1000; source FEFCO Corrugated Packaging 2015; lognormal variance with pedigree 0.0032, pedigree (1,3,3,1,1)
  Reported as municipal water supply in m3/t
  properties: wet mass 1 kg, water content 2940, carbon content, fossil 0.0017899, dry mass 0.00034 kg
- lubricating oil: 2.90165e-5 kg; source FEFCO Corrugated Packaging 2015; lognormal variance with pedigree 0.0032, pedigree (1,3,3,1,1)
  Reported as 0.052 MJ /ton NSP. Converted to kg using the lower heating value (46.05 MJ/kg), assuming a 50/50 mix of butane and propane and lower heating values from NIST Chemistry Handbook.
  properties: wet mass 1 kg, dry mass 1 kg, carbon content, fossil 0.75
- ethoxylated alcohol (AE3): 0.000274005 kg; source FEFCO Corrugated Packaging 2015; lognormal variance with pedigree 0.0032, pedigree (1,3,3,1,1)
  Proxy for defoamer, unspecified.
  properties: carbon content, fossil 0.20795, carbon content, non-fossil 0.48522, wet mass 1 kg, dry mass 1 kg
- light fuel oil: 2.25691e-5 kg; = 0.000965*1000/42.7; source FEFCO Corrugated Packaging 2015; lognormal variance with pedigree 0.0118, pedigree (2,3,3,1,3)
  Reported as 0.001 GJ /ton NSP. Converted to kg using the lower heating value (42.7 MJ/kg) reported in "Dones R. et al.(2007) Life Cycle Inventories of Energy Systems: Results for Current Systems in Switzerland and other UCTE Countries. Final report ecoinvent data v2.0, No. 5. Swiss Centre for Life Cycle Inventories, Dübendorf, CH."
  Uncertainty: Uncertainty accounts for both the uncertainty associated with the fuel consumption value reported by FEFCO and the lower heating value used to convert the exchange value to a mass basis.
  properties: carbon content, fossil 0.862, dry mass 1 kg, wet mass 1 kg
- natural gas, low pressure: 0.126823 m3; = 4.67336*1000/36.8; source FEFCO Corrugated Packaging 2015; lognormal variance with pedigree 0.0032, pedigree (1,3,3,1,1)
  Reported as 4.67 GJ /ton NSP. Converted to Nm3 using the lower heating value (36.8 MJ/m3) reported in "Dones R. et al.(2007) Life Cycle Inventories of Energy Systems: Results for Current Systems in Switzerland and other UCTE Countries. Final report ecoinvent data v2.0, No. 5. Swiss Centre for Life Cycle Inventories, Dübendorf, CH."
  properties: wet mass 0.84 kg, dry mass 0.84 kg, heating value, gross 39 MJ, carbon content, fossil 0.60238
- heavy fuel oil: 7.53911e-5 kg; = 0.003065*1000/ 40.6; source FEFCO Corrugated Packaging 2015; lognormal variance with pedigree 0.0118, pedigree (2,3,3,1,3)
  Reported as 0.0031 GJ /ton NSP. Converted to kg using the lower heating value (40.6 MJ/kg) reported in "Dones R. et al.(2007) Life Cycle Inventories of Energy Systems: Results for Current Systems in Switzerland and other UCTE Countries. Final report ecoinvent data v2.0, No. 5. Swiss Centre for Life Cycle Inventories, Dübendorf, CH."
  Uncertainty: Uncertainty accounts for both the uncertainty associated with the fuel consumption value reported by FEFCO and the lower heating value used to convert the exchange value to a mass basis.
  properties: wet mass 1 kg, carbon content, fossil 0.849, dry mass 1 kg
- lignite briquettes: 0.215544 MJ; = 0.215834234299992*1000; source FEFCO Corrugated Packaging 2015; lognormal variance with pedigree 0.0032, pedigree (1,3,3,1,1)
  Reported as lignite.
  properties: water content 0.23457, dry mass 0.0415385 kg, wet mass 0.051282 kg, carbon content, fossil 0.65679
- sludge from pulp and paper production: 0 kg; name sludgeTotalAmount; source FEFCO Corrugated Packaging 2015; pedigree (1,1,1,1,1)
  Reported as residue, inorganic sludges (0kg) and organic sludges (49 kg).
  production volume 0 kg
    Calculated from production volume of corrugated board base paper.
  property price 0 EUR2005; name sludgeTotalAmount_price_EUR2005
  property carbon content, non-fossil 0.21; name sludgeTotalAmount_C_content_non_fossil
  property water in wet mass 0.65 kg; name sludgeTotalAmount_WWM
  property dry mass 0.35 kg; name sludgeTotalAmount_DM
  property water content 1.85714; name sludgeTotalAmount_water_content
  property wet mass 1 kg; name sludgeTotalAmount_WM
- waste mineral oil: 0 kg; name wasteLubricantsOilAmount; source FEFCO Corrugated Packaging 2015; pedigree (1,1,1,1,1)
  Reported as residue, lubricants and oil.
  production volume 0 kg
    Calculated from production volume of corrugated board base paper.
  property water in wet mass 0 kg; name wasteLubricantsOilAmount_WWM
  property wet mass 1 kg; name wasteLubricantsOilAmount_WM
  property dry mass 1 kg; name wasteLubricantsOilAmount_DM
  property carbon content, fossil 0.86444; name wasteLubricantsOilAmo_C_content_fossil_0
  property water content 0; name wasteLubricantsOilAmount_water_content
  property price 0 EUR2005; name wasteLubricantsOilAmount_price_EUR2005
- packaging film, low density polyethylene: 1.49798e-5 kg; source FEFCO Corrugated Packaging 2015; lognormal variance with pedigree 0.0032, pedigree (1,3,3,1,1)
  Proxy for PE.
  properties: wet mass 1 kg, dry mass 1 kg, carbon content, fossil 0.85714
- paper mill, integrated: 5.43268e-11 unit; lognormal variance with pedigree 0.1692, pedigree (4,3,5,1,5)
  Assumption.
- ash from paper production sludge: 0 kg; name inorganicAshAmount; source FEFCO Corrugated Packaging 2015; pedigree (1,1,1,1,1)
  Reported as residue inorganic ashes
  production volume 0 kg
    Calculated from production volume of corrugated board base paper.
  property price 0 EUR2005; name inorganicAshAmount_price_EUR2005
  property dry mass 0.8 kg; name inorganicAshAmount_DM
  property wet mass 1 kg; name inorganicAshAmount_WM
  property carbon content, non-fossil 0.0092; name inorganicAshAmoun_C_content_non_fossil_0
- EUR-flat pallet: 4.54388e-7 unit; source FEFCO Corrugated Packaging 2015; lognormal variance with pedigree 0.0052, pedigree (3,3,3,1,1)
  Assumption that the weight of a pallet is 22 kg. 0,01 kg of pallet is used for 1000kg of product.
  properties: dry mass 18.3333 kg, wet mass 22 kg, carbon content, fossil 0.0311351, carbon content, non-fossil 0.58833, water content 0.2
- electricity, medium voltage: 0.162548 kWh; = 0.585962/0.0036
  Reported as 0.59GJ/tonne net saleable product.
- chemical, organic: 0.000631263 kg; source FEFCO Corrugated Packaging 2015; lognormal variance with pedigree 0.0032, pedigree (1,3,3,1,1)
  Reported as colorants.
  properties: dry mass 1 kg, carbon content, fossil 0.628, wet mass 1 kg
- maize starch: 0.0302811 kg; = 16.5998582373369+(26.5853484265679+0.858725016950933)/2; source FEFCO Corrugated Packaging 2015; lognormal variance with pedigree 0.0506, pedigree (1,5,3,1,4)
  Proxy for maize starch (16.6kg) and half of "starch, modified" (0.86 kg), and "wheat starch" (26.6 kg). Other half of latter two starches modeled as potato starch.
  properties: wet mass 1 kg, water content 0.16279, carbon content, non-fossil 0.46, dry mass 0.86 kg
- liquefied petroleum gas: 1.12198e-6, 5.70618e-9 kg (2 entries); source FEFCO 2009; lognormal variance with pedigree 0.0038, pedigree (1,3,3,1,2)
  (same comment as for liquefied petroleum gas)
- sludge from pulp and paper production: -0.0493648, -3.6506e-5 kg (2 entries); source FEFCO Corrugated Packaging 2015; lognormal variance with pedigree 0.0032, pedigree (1,3,3,1,1)
  Reported as residue, inorganic sludges (0kg) and organic sludges (49 kg).
  production volume 3.22847e8 kg
  properties: carbon content, non-fossil 0.21, dry mass 0.35 kg, water content 1.85714, wet mass 1 kg
- waste mineral oil: -3.28155e-5, -7.59316e-7 kg (2 entries); source FEFCO Corrugated Packaging 2015; lognormal variance with pedigree 0.0032, pedigree (1,3,3,1,1)
  Reported as residue, lubricants and oil.
  production volume 219418 kg
  properties: wet mass 1 kg, dry mass 1 kg, carbon content, fossil 0.86444
- ash from paper production sludge: -0.00290174, -7.58497e-5 kg (2 entries); source FEFCO Corrugated Packaging 2015; lognormal variance with pedigree 0.0032, pedigree (1,3,3,1,1)
  Reported as residue inorganic ashes
  production volume 1.94591e7 kg
  properties: dry mass 0.8 kg, wet mass 1 kg, carbon content, non-fossil 0.0092

## Inputs from nature
- Water, well, in ground [natural resource, in water]: 0.00297704 m3; name water_well_in_ground_input; source FEFCO Corrugated Packaging 2015; lognormal variance with pedigree 0.0038, pedigree (1,3,3,1,2)
  Reported as input of ground water in m3/tonne of net saleable product.
- Water, river [natural resource, in water]: 0.00365044 m3; name water_river_input; source FEFCO Corrugated Packaging 2015; lognormal variance with pedigree 0.0038, pedigree (1,3,3,1,2)
  Reported as surface water in m3/t

## Emissions to nature
- Benzene, hexachloro- [air, unspecified]: 2.22244e-15 kg; lognormal variance with pedigree 0.170125, pedigree (4,2,3,2,5)
  (same comment as for lignite ash)
- COD, Chemical Oxygen Demand [water, unspecified]: 0.000821986 kg; source FEFCO Corrugated Packaging 2015; lognormal variance with pedigree 0.0426, pedigree (1,3,3,1,1)
  FEFCO, 2015.
- Ethyne [air, unspecified]: 1.159e-6 kg; lognormal variance with pedigree 0.0526, pedigree (3,3,3,1,3)
  Estimation based on fuel input data and emission factors from corresponding fuel combustion ecoinvent datasets. Emissions from peat combustion approximated with lignite combustion, LPG with natural gas combustion, diesel with light fuel oil combustion, refuse derived fuel (RFD) with combustion of wood chips from post consumer wood.
  Uncertainty: This emission was calculated from the ecoinvent emission factor of combustion of energy. Some energy sources do not have emission factor (LPG, peat and diesel) so other factors were used ( natural gas, lignite and light fuel oil).
- Arsenic, ion [water, unspecified]: 5.02297e-8 kg; lognormal variance with pedigree 0.6626, pedigree (4,4,3,1,2)
  This value is qualified as "not representative" in FEFCO (2015) because only a few mills were able to report this figure. Moreover, mills were not able to report substances in the input water, hence this figure represents gross rather than net emissions. The value is a straight average over the reporting mills.
- Radon-222 [air, unspecified]: 1.02473e-6 kBq; lognormal variance with pedigree 0.3126, pedigree (3,3,3,1,3)
  (same comment as for Ethyne)
- Ethanol [air, unspecified]: 9.18283e-10 kg; lognormal variance with pedigree 0.0526, pedigree (3,3,3,1,3)
  (same comment as for Ethyne)
- Carbon monoxide, non-fossil [air, unspecified]: 4.10276e-5 kg; lognormal variance with pedigree 0.780125, pedigree (4,2,3,2,5)
  (same comment as for lignite ash)
- Sodium [air, unspecified]: 9.9559e-7 kg; lognormal variance with pedigree 0.0526, pedigree (3,3,3,1,3)
  (same comment as for Ethyne)
- Methanol [air, unspecified]: 1.56108e-9 kg; lognormal variance with pedigree 0.0526, pedigree (3,3,3,1,3)
  (same comment as for Ethyne)
- Fluorine [air, unspecified]: 1.54336e-8 kg; lognormal variance with pedigree 0.170125, pedigree (4,2,3,2,5)
  (same comment as for lignite ash)
- NMVOC, non-methane volatile organic compounds, unspecified origin [air, unspecified]: 4.78937e-6 kg; lognormal variance with pedigree 0.0526, pedigree (3,3,3,1,3)
  (same comment as for Ethyne)
- Particulates, > 10 um [air, unspecified]: 3.18091e-5 kg; lognormal variance with pedigree 0.0526, pedigree (3,3,3,1,3)
  Particulate matter emissions from fuel combustion were not reported by the data source, only dust emissions of 0.00083 kg/1000kg of reference product. These are considered to be covered in the particulate matter emissions estimated from on site fuel use.
  Uncertainty: This emission was calculated from the ecoinvent emission factor of combustion of energy. Some energy sources do not have emission factor (LPG, peat and diesel) so other factors were used ( natural gas, lignite and light fuel oil).
- m-Xylene [air, unspecified]: 3.70407e-8 kg; lognormal variance with pedigree 0.170125, pedigree (4,2,3,2,5)
  (same comment as for lignite ash)
- Propane [air, unspecified]: 3.30774e-6 kg; lognormal variance with pedigree 0.0526, pedigree (3,3,3,1,3)
  (same comment as for Ethyne)
- Calcium [air, unspecified]: 1.28959e-5 kg; lognormal variance with pedigree 0.0526, pedigree (3,3,3,1,3)
  (same comment as for Ethyne)
- Methane, non-fossil [air, unspecified]: 3.61227e-7 kg; lognormal variance with pedigree 0.170125, pedigree (4,2,3,2,5)
  (same comment as for lignite ash)
- Iron [air, unspecified]: 3.65241e-6 kg; lognormal variance with pedigree 0.6626, pedigree (3,3,3,1,3)
  (same comment as for Ethyne)
- Radium-228 [air, unspecified]: 1.24199e-5 kBq; lognormal variance with pedigree 0.3126, pedigree (3,3,3,1,3)
  (same comment as for Ethyne)
- Chlorine [air, unspecified]: 5.5561e-8 kg; lognormal variance with pedigree 0.170125, pedigree (4,2,3,2,5)
  (same comment as for lignite ash)
- Chlorides, unspecified [water, unspecified]: 0.000758978 kg; lognormal variance with pedigree 0.0506, pedigree (2,5,3,1,1)
  This value is taken over from the FEFCO 2009 statisitcs because it is not reported anymore in FEFCO 2015 and no better data were available. In the FEFCO 2009 report it is qualified as "not representative" because only a few mills were able to report this figure. Moreover, mills were not able to report substances in the input water, hence this figure represents gross rather than net emissions. The value is a straight average over the reporting mills. Reference(s): Correspondence with industry expert. FEFCO. 2009. Cepi container board, European database for corrugated board life cycle studies. Accessible online at http://www.fefco.org/sites/default/files/documents/2009_LCA_report_Fefco.pdf, last accessed 31. Jan 2018
  Uncertainty: Note as not representative in the report.
- Vanadium [air, unspecified]: 3.78892e-8 kg; lognormal variance with pedigree 0.0526, pedigree (3,3,3,1,3)
  (same comment as for Ethyne)
- Benzene, ethyl- [air, unspecified]: 9.26017e-9 kg; lognormal variance with pedigree 0.170125, pedigree (4,2,3,2,5)
  (same comment as for lignite ash)
- Potassium-40 [air, unspecified]: 5.79411e-6 kBq; lognormal variance with pedigree 0.3126, pedigree (3,3,3,1,3)
  (same comment as for Ethyne)
- Manganese [air, unspecified]: 6.15201e-8 kg; lognormal variance with pedigree 0.6626, pedigree (3,3,3,1,3)
  (same comment as for Ethyne)
- Sulfur dioxide [air, unspecified]: 0.000108518 kg; lognormal variance with pedigree 0.130725, pedigree (4,2,3,2,5)
  (same comment as for lignite ash)
- Silicon [air, unspecified]: 2.86492e-5 kg; lognormal variance with pedigree 0.0526, pedigree (3,3,3,1,3)
  (same comment as for Ethyne)
- Strontium [air, unspecified]: 8.80051e-8 kg; lognormal variance with pedigree 0.0526, pedigree (3,3,3,1,3)
  (same comment as for Ethyne)
- Phenol, pentachloro- [air, unspecified]: 2.50024e-12 kg; lognormal variance with pedigree 0.170125, pedigree (4,2,3,2,5)
  (same comment as for lignite ash)
- Thorium-232 [air, unspecified]: 1.56045e-6 kBq; lognormal variance with pedigree 0.3126, pedigree (3,3,3,1,3)
  (same comment as for Ethyne)
- Aluminium [air, unspecified]: 4.30434e-6 kg; lognormal variance with pedigree 0.6626, pedigree (3,3,3,1,3)
  (same comment as for Ethyne)
- Hydrogen sulfide [air, unspecified]: 2.15544e-8 kg; lognormal variance with pedigree 0.170125, pedigree (4,2,3,2,5)
  (same comment as for lignite ash)
- Xylene [air, unspecified]: 7.27551e-7 kg; lognormal variance with pedigree 0.0526, pedigree (3,3,3,1,3)
  (same comment as for Ethyne)
- Beryllium [air, unspecified]: 7.50149e-10 kg; lognormal variance with pedigree 0.0526, pedigree (3,3,3,1,3)
  (same comment as for Ethyne)
- Radium-226 [air, unspecified]: 5.39939e-6 kBq; lognormal variance with pedigree 0.3126, pedigree (3,3,3,1,3)
  (same comment as for Ethyne)
- Acetaldehyde [air, unspecified]: 2.42343e-8 kg; lognormal variance with pedigree 0.0526, pedigree (3,3,3,1,3)
  (same comment as for Ethyne)
- Phosphorus [air, unspecified]: 1.24645e-7 kg; lognormal variance with pedigree 0.0526, pedigree (3,3,3,1,3)
  (same comment as for Ethyne)
- Particulates, < 2.5 um [air, unspecified]: 2.53295e-5 kg; lognormal variance with pedigree 0.3126, pedigree (3,3,3,1,3)
  (same comment as for Particulates, > 10 um)
- TOC, Total Organic Carbon [water, unspecified]: 0.000325454 kg; source FEFCO Corrugated Packaging 2015; lognormal variance with pedigree 0.0432, pedigree (1,3,3,1,2)
  FEFCO, 2015.
- Thorium [air, unspecified]: 9.61958e-10 kg; lognormal variance with pedigree 0.0526, pedigree (3,3,3,1,3)
  (same comment as for Ethyne)
- Antimony [air, unspecified]: 5.7101e-9 kg; lognormal variance with pedigree 0.4126, pedigree (3,3,3,1,3)
  (same comment as for Ethyne)
- Mercury [air, unspecified]: 3.17084e-9 kg; lognormal variance with pedigree 0.6626, pedigree (3,3,3,1,3)
  (same comment as for lignite ash)
- Potassium [air, unspecified]: 7.75538e-6 kg; lognormal variance with pedigree 0.6626, pedigree (3,3,3,1,3)
  (same comment as for Ethyne)
- Propionic acid [air, unspecified]: 9.89226e-8 kg; lognormal variance with pedigree 0.0526, pedigree (3,3,3,1,3)
  (same comment as for Ethyne)
- Copper, ion [water, unspecified]: 8.07226e-8 kg; source FEFCO Corrugated Packaging 2015; lognormal variance with pedigree 0.6526, pedigree (1,3,3,1,1)
  (same comment as for Arsenic, ion)
- Dioxins, measured as 2,3,7,8-tetrachlorodibenzo-p-dioxin [air, unspecified]: 1.34103e-14 kg; lognormal variance with pedigree 0.0526, pedigree (3,3,3,1,3)
  (same comment as for lignite ash)
- Ethane [air, unspecified]: 3.477e-6 kg; lognormal variance with pedigree 0.0526, pedigree (3,3,3,1,3)
  (same comment as for Ethyne)
- Bromine [air, unspecified]: 2.33377e-8 kg; lognormal variance with pedigree 0.0526, pedigree (3,3,3,1,3)
  (same comment as for Ethyne)
- Nitrogen oxides [air, unspecified]: 0.00034677 kg; source FEFCO Corrugated Packaging 2015; lognormal variance with pedigree 0.0426, pedigree (1,3,3,1,1)
  This value was reported by FEFCO 2015, i.e. it is not calculated using emission factors, contrary to most combustion emissions.
- Hydrocarbons, aliphatic, unsaturated [air, unspecified]: 2.11597e-6 kg; lognormal variance with pedigree 0.0526, pedigree (3,3,3,1,3)
  (same comment as for Ethyne)
- Hydrocarbons, aromatic [air, unspecified]: 1.0912e-9 kg; lognormal variance with pedigree 0.0526, pedigree (3,3,3,1,3)
  (same comment as for Ethyne)
- Boron [air, unspecified]: 2.53425e-6 kg; lognormal variance with pedigree 0.6626, pedigree (3,3,3,1,3)
  (same comment as for Ethyne)
- Copper [air, unspecified]: 2.99983e-8 kg; lognormal variance with pedigree 0.6626, pedigree (3,3,3,1,3)
  (same comment as for lignite ash)
- Cobalt [air, unspecified]: 8.78381e-9 kg; lognormal variance with pedigree 0.6626, pedigree (3,3,3,1,3)
  (same comment as for Ethyne)
- Formaldehyde [air, unspecified]: 5.89639e-7 kg; lognormal variance with pedigree 0.0526, pedigree (3,3,3,1,3)
  (same comment as for Ethyne)
- Methane, fossil [air, unspecified]: 7.62113e-5 kg; lognormal variance with pedigree 0.0526, pedigree (3,3,3,1,3)
  (same comment as for Ethyne)
- Ammonium, ion [water, unspecified]: 1.59785e-5 kg; source FEFCO 2009; lognormal variance with pedigree 0.0506, pedigree (2,5,3,1,1)
  This value is taken over from the FEFCO 2009 statisitcs because it is not reported anymore in FEFCO 2015 and no better data were available. In the FEFCO 2009 report it is qualified as "not representative" because only a few mills were able to report this figure. Moreover, mills were not able to report substances in the input water, hence this figure represents gross rather than net emissions. The value is a straight average over the reporting mills. Reference(s): Correspondence with industry expert. FEFCO. 2009. Cepi container board, European database for corrugated board life cycle studies. Accessible online at http://www.fefco.org/sites/default/files/documents/2009_LCA_report_Fefco.pdf, last accessed 31. Jan 2018
- Phenol [air, unspecified]: 1.07772e-7 kg; lognormal variance with pedigree 0.0526, pedigree (3,3,3,1,3)
  (same comment as for Ethyne)
- Particulates, > 2.5 um, and < 10um [air, unspecified]: 1.21665e-5 kg; lognormal variance with pedigree 0.1326, pedigree (3,3,3,1,3)
  (same comment as for Particulates, > 10 um)
- Phosphorus [water, unspecified]: 7.20655e-6 kg; source FEFCO Corrugated Packaging 2015; lognormal variance with pedigree 0.0426, pedigree (1,3,3,1,1)
  FEFCO, 2015.
- Acetone [air, unspecified]: 4.59142e-10 kg; lognormal variance with pedigree 0.0526, pedigree (3,3,3,1,3)
  (same comment as for Ethyne)
- Suspended solids, unspecified [water, unspecified]: 0.000229832 kg; source FEFCO Corrugated Packaging 2015; lognormal variance with pedigree 0.0426, pedigree (1,3,3,1,1)
  FEFCO, 2015.
- Arsenic [air, unspecified]: 1.53461e-8 kg; lognormal variance with pedigree 0.0526, pedigree (3,3,3,1,3)
  (same comment as for lignite ash)
- Toluene [air, unspecified]: 1.31435e-6 kg; lognormal variance with pedigree 0.0526, pedigree (3,3,3,1,3)
  (same comment as for Ethyne)
- PAH, polycyclic aromatic hydrocarbons [air, unspecified]: 5.29016e-8 kg; lognormal variance with pedigree 0.3126, pedigree (3,3,3,1,3)
  (same comment as for Ethyne)
- Sulfur oxides [air, unspecified]: 4.12777e-5 kg; source FEFCO Corrugated Packaging 2015; lognormal variance with pedigree 0.0032, pedigree (1,3,3,1,1)
  FEFCO, 2015.
- Tin [air, unspecified]: 5.38135e-10 kg; lognormal variance with pedigree 0.6626, pedigree (3,3,3,1,3)
  (same comment as for Ethyne)
- Zinc, ion [water, unspecified]: 2.51757e-7 kg; source FEFCO Corrugated Packaging 2015; lognormal variance with pedigree 0.6626, pedigree (4,4,3,1,2)
  (same comment as for Chlorides, unspecified)
- Lead-210 [air, unspecified]: 2.09226e-5 kBq; lognormal variance with pedigree 0.3126, pedigree (3,3,3,1,3)
  (same comment as for Ethyne)
- Nickel [air, unspecified]: 1.87049e-8 kg; lognormal variance with pedigree 0.6626, pedigree (3,3,3,1,3)
  (same comment as for Ethyne)
- Carbon dioxide, non-fossil [air, unspecified]: 0.02474 kg; source FEFCO Corrugated Packaging 2015; lognormal variance with pedigree 0.0032, pedigree (1,3,3,1,1)
  (same comment as for Nitrogen oxides)
- Dinitrogen monoxide [air, unspecified]: 1.55171e-6 kg; lognormal variance with pedigree 0.0526, pedigree (3,3,3,1,3)
  (same comment as for lignite ash)
- DOC, Dissolved Organic Carbon [water, unspecified]: 0.000325454 kg; lognormal variance with pedigree 0.0446, pedigree (3,3,3,1,1)
  No data available for DOC. DOC=TOC as proposed by ecoinvent Data Quality Guidelines.
- Thallium [air, unspecified]: 2.84e-10 kg; lognormal variance with pedigree 0.0526, pedigree (3,3,3,1,3)
  (same comment as for Ethyne)
- Iodine [air, unspecified]: 1.16604e-8 kg; lognormal variance with pedigree 0.0526, pedigree (3,3,3,1,3)
  (same comment as for Ethyne)
- Propene [air, unspecified]: 1.159e-6 kg; lognormal variance with pedigree 0.0526, pedigree (3,3,3,1,3)
  (same comment as for Ethyne)
- Zinc [air, unspecified]: 1.10209e-7 kg; lognormal variance with pedigree 0.6626, pedigree (3,3,3,1,3)
  (same comment as for Ethyne)
- AOX, Adsorbable Organic Halogen as Cl [water, unspecified]: 8.23435e-7 kg; source FEFCO Corrugated Packaging 2015; lognormal variance with pedigree 0.0506, pedigree (2,5,3,1,1)
  FEFCO, 2015.
  Uncertainty: Note as not representative in the report.
- Hydrocarbons, aliphatic, alkanes, unspecified [air, unspecified]: 1.45184e-6 kg; lognormal variance with pedigree 0.0526, pedigree (3,3,3,1,3)
  (same comment as for Ethyne)
- Uranium-238 [air, unspecified]: 4.51386e-6 kBq; lognormal variance with pedigree 0.3126, pedigree (3,3,3,1,3)
  (same comment as for Ethyne)
- Cadmium [air, unspecified]: 2.13476e-9 kg; lognormal variance with pedigree 0.0526, pedigree (3,3,3,1,3)
  (same comment as for lignite ash)
- Lead [air, unspecified]: 2.86516e-8 kg; lognormal variance with pedigree 0.6626, pedigree (3,3,3,1,3)
  (same comment as for lignite ash)
- Magnesium [air, unspecified]: 2.36104e-6 kg; lognormal variance with pedigree 0.6626, pedigree (3,3,3,1,3)
  (same comment as for Ethyne)
- Water [water, surface water]: 0.00537996 m3; name water_to_water_surface; source FEFCO Corrugated Packaging 2015; lognormal variance with pedigree 0.0032, pedigree (1,3,3,1,1)
  This value was reported by FEFCO 2015, i.e. it is not calculated using emission factors, contrary to most combustion emissions. It accounts for both "thermally polluted" (0.16m3) and "chemically polluted" (5.2 m3) water output, after treatment.
- Nitrogen [water, unspecified]: 5.54465e-5 kg; source FEFCO Corrugated Packaging 2015; lognormal variance with pedigree 0.0426, pedigree (1,3,3,1,1)
  Reported as total nitrogen.
- Benzo(a)pyrene [air, unspecified]: 4.51698e-9 kg; lognormal variance with pedigree 0.0526, pedigree (3,3,3,1,3)
  (same comment as for Ethyne)
- Titanium [air, unspecified]: 1.16142e-7 kg; lognormal variance with pedigree 0.6626, pedigree (3,3,3,1,3)
  (same comment as for Ethyne)
- Carbon monoxide, fossil [air, unspecified]: 5.59311e-5 kg; source FEFCO Corrugated Packaging 2015; lognormal variance with pedigree 0.6526, pedigree (1,3,3,1,1)
  (same comment as for Nitrogen oxides)
- Water [air, unspecified]: 0.00138094 m3; name water_to_air_unspecified; = 0.002796175+1.38; lognormal variance with pedigree 0.098025, pedigree (4,4,4,2,4)
  1.38m3 of water evaporated to air were calcualted to close the water balance of this process. This is about 20% of the water inputs. 0.00279 is estimation based on fuel input data and emission factors from corresponding fuel combustion ecoinvent datasets. Emissions from peat combustion approximated with lignite combustion, LPG with natural gas combustion, diesel with light fuel oil combustion, refuse derived fuel (RFD) with combustion of wood chips from post consumer wood.
  property fraction, origin: salt water 0; name fraction_origin_salt_water
  property fraction, origin: unspecified 0; name fraction_origin_unspecified
  property fraction, origin: fresh water 1; name fraction_origin_fresh_water
- Ethene [air, unspecified]: 6.95399e-6 kg; lognormal variance with pedigree 0.0526, pedigree (3,3,3,1,3)
  (same comment as for Ethyne)
- Radon-220 [air, unspecified]: 1.02473e-6 kBq; lognormal variance with pedigree 0.3126, pedigree (3,3,3,1,3)
  (same comment as for Ethyne)
- Hydrogen fluoride [air, unspecified]: 2.31887e-7 kg; lognormal variance with pedigree 0.0526, pedigree (3,3,3,1,3)
  (same comment as for Ethyne)
- Barium [air, unspecified]: 7.50149e-8 kg; lognormal variance with pedigree 0.0526, pedigree (3,3,3,1,3)
  (same comment as for Ethyne)
- Ammonia [air, unspecified]: 5.37194e-7 kg; lognormal variance with pedigree 0.0526, pedigree (3,3,3,1,3)
  (same comment as for lignite ash)
- Chromium VI [air, unspecified]: 6.17015e-10 kg; lognormal variance with pedigree 0.6626, pedigree (3,3,3,1,3)
  (same comment as for Ethyne)
- Polonium-210 [air, unspecified]: 3.83894e-5 kBq; lognormal variance with pedigree 0.3126, pedigree (3,3,3,1,3)
  (same comment as for Ethyne)
- Scandium [air, unspecified]: 3.41046e-10 kg; lognormal variance with pedigree 0.0526, pedigree (3,3,3,1,3)
  (same comment as for Ethyne)
- Benzene [air, unspecified]: 3.41866e-6 kg; lognormal variance with pedigree 0.0526, pedigree (3,3,3,1,3)
  (same comment as for Ethyne)
- Pentane [air, unspecified]: 5.93978e-6 kg; lognormal variance with pedigree 0.0526, pedigree (3,3,3,1,3)
  (same comment as for Ethyne)
- Thorium-228 [air, unspecified]: 2.48909e-6 kBq; lognormal variance with pedigree 0.3126, pedigree (3,3,3,1,3)
  (same comment as for Ethyne)
- BOD5, Biological Oxygen Demand [water, unspecified]: 6.12974e-5 kg; source FEFCO Corrugated Packaging 2015; lognormal variance with pedigree 0.0426, pedigree (1,3,3,1,1)
  FEFCO, 2015.
- Lead [water, unspecified]: 3.63245e-8 kg; lognormal variance with pedigree 0.6626, pedigree (4,4,3,1,2)
  (same comment as for Arsenic, ion)
- Carbon dioxide, fossil [air, unspecified]: 0.322718 kg; source FEFCO Corrugated Packaging 2015; lognormal variance with pedigree 0.0032, pedigree (1,3,3,1,1)
  (same comment as for Nitrogen oxides)
- Chromium [air, unspecified]: 2.00047e-8 kg; lognormal variance with pedigree 0.6626, pedigree (3,3,3,1,3)
  (same comment as for lignite ash)
- Mercury [water, unspecified]: 4.09664e-9 kg; lognormal variance with pedigree 0.6626, pedigree (4,4,3,1,2)
  (same comment as for Arsenic, ion)
- Acetic acid [air, unspecified]: 7.43755e-7 kg; lognormal variance with pedigree 0.0526, pedigree (3,3,3,1,3)
  (same comment as for Ethyne)
- Selenium [air, unspecified]: 1.7916e-8 kg; lognormal variance with pedigree 0.0526, pedigree (3,3,3,1,3)
  (same comment as for Ethyne)
- Chromium, ion [water, unspecified]: 9.29111e-8 kg; lognormal variance with pedigree 0.6626, pedigree (4,4,3,1,2)
  (same comment as for Arsenic, ion)
- Uranium [air, unspecified]: 1.49977e-9 kg; lognormal variance with pedigree 0.0526, pedigree (3,3,3,1,3)
  (same comment as for Ethyne)
- Molybdenum [air, unspecified]: 1.03221e-8 kg; lognormal variance with pedigree 0.6626, pedigree (3,3,3,1,3)
  (same comment as for Ethyne)
- Nickel, ion [water, unspecified]: 2.12482e-8 kg; lognormal variance with pedigree 0.6626, pedigree (4,4,3,1,2)
  (same comment as for Arsenic, ion)
- Butane [air, unspecified]: 3.46893e-6 kg; lognormal variance with pedigree 0.0526, pedigree (3,3,3,1,3)
  (same comment as for Ethyne)
- Hydrogen chloride [air, unspecified]: 7.30341e-6 kg; lognormal variance with pedigree 0.0526, pedigree (3,3,3,1,3)
  (same comment as for Ethyne)

## Sampling procedure
Data were collected from the producers by Cepi ContainerBoard and FEFCO Corrugated Pagaging for the European Database for Corrugated Board Life Cycle Studies and reviewed by the Institut für Energie- und Umweltforschung Heidelberg (ifeu).
The data for the production of Testliner and Wellenstoff were
collected from mills, which together represent about 66% of the total yearly production of corrugated base papers from recovered paper in Europe. 66% of production correspond to 12.490.000 tonnes.Data were provided by mills in Austria, Czech Republic, France, Germany, Italy, the Netherlands, Poland, Spain and the United Kingdom. Each mill produces between 60.000 - 1.300.000 tonnes of net saleable paper (FEFCO, 2015).

Mind that this dataset is identical to the production recycled fluting (wellenstoff) except for inputs of
alkyletene dimer sizing agent
chemical, organic and
kaolin
are specific to testliner. These do not appear in the production of wellenstoff.
FEFCO (2015) reports weighted average values of in- and outputs over the testliner and wellenstoff where there is no technical reason for differences between the two grades. This is mentioned to be the case for energy consumption and the related emissions to air, for water consumption, the related effluents and emissions to water as well as for residues. For this reason also the calculated emissions resulting from fuel consumption are identical for wellenstoff and testliner.
Reference(s): CCB & FEFCO. 2015. European Database for Corrugated Board Life Cycle Studies. Accessible online at <http://www.fefco.org/sites/default/files/lca-report-2015.pdf> (25.Jan 2018).

## Extrapolations
Additional air emissions from the combustion of fossil fuels estimated based on industrial heating datasets from the ecoinvent database: light fuel oil: heat production, light fuel oil, at industrial furnace 1MW, Europe without Switzerland
heavy fuel oil: heat production, heavy fuel oil, at industrial furnace 1MW, Europe without Switzerland
hard coal: heat production, at hard coal industrial furnace 1-10MW, Europe without Switzerland
natural gas: heat production, natural gas, at industrial furnace >100kW, Europe without Switzerland
lignite briquettes: heat production, lignite briquette, at stove 5-15kW, Europe without Switzerland
wood chips: heat production, wood chips from industry, at furnace 1000kW, CH
