# charger production, for electric scooter

Dataset: EcoSpold 2, unit process
Geography: GLO
Time period: 2005-01-01 to 2019-12-31
Technology level: current
Classification: ISIC rev.4 ecoinvent: 2610:Manufacture of electronic components and boards
Scenario: Business-as-Usual
System model: Allocation at the point of substitution
Generated by: Andrea Del Duce
Database: ecoinvent
isCopyrightProtected: true
accessRestrictedTo: 1

## General comment
This dataset describes the production of a charger suitable for an electric scooter. The entries are given as a function of kg of device. The original data was collected for a device of approximately 3 kg weight. The dataset is based on direct inspection of existing commercial devices of current technology.

## Included activities start
The dataset takes as input the various electronic components required to build the charger and includes the components' production efforts. Assembly energy not included due to lack of data.

## Included activities end
The dataset returns the assembled device and production waste as a by-product.

## Reference product
- charger, for electric scooter: 1 kg; CPC 49941: Parts and accessories of motorcycles and side-cars; By-product classification allocatable product
  production volume 2.35e6 kg
    Rough estimate based on 1% electric scooters out of 466E6 world two wheeler production projection between 2010 and 2016.(www.electric-bicycle-guide.com)
  property price 143 EUR2005
    Calculated value based on estimates and literature. The price of the batterry is 32.06euro/kg. The weight of a battery for an electric scooter is 30kg (producer's information: http://vespino.ch/?page_id=6, accessed 20130726). The market price for an electric scooter is approximatelly 4600euro (producer's information: http://vespino.ch/?page_id=6, accessed: 20130726). It is estimated, that the basic price is 1/3 lower than the market price (expert judgement). The basic price of a scooter without batterry is then calculated to be ((4600*2/3)-(32.06*30)=) 2105euro. The ratio between the price of powertrain and glider in case of electric cars is 1:17 (for more details see the comment field of these products' prices). The resulting prices are 8.4euro/kg of glider, for electric scooter and 142euro/kg of powertrain, for electric scooter. The price is considered to be the same (142euro/kg) for all the parts of the powertrain, such as motor, controller and charger.
  property true value 432.575
    allocation property applied in "true value" allocation // value calculated from revenue

## By-products
- aluminium, cast alloy: 0 kg; source European Aluminium Association 2008; By-product classification allocatable product; CPC 41431: Unwrought aluminium; pedigree (1,1,1,1,1)
  EcoSpold01Location=RER
  production volume 40633.9 kg
  property price 1.3 EUR2005; name castAlloyAmount_price_EUR2005
  properties: carbon content, fossil 0, dry mass 1 kg, wet mass 1 kg, water content 0, water in wet mass 0 kg, carbon content, non-fossil 0, carbon content 0, carbon allocation 0 kg, true value 0.0323054
- iron scrap, unsorted: 0 kg; source European Aluminium Association 2008; CPC 39310: Slag, dross, scalings and other waste from the manufacture of iron or steel; By-product classification Recyclable; pedigree (1,1,1,1,1)
  production volume 69.0797 kg
  property price 0.149 EUR2005; name ironScrapAmount_price_EUR2005
    Temporary price data. Calculated as 90% of purchasers price based on: estimated at 85% of sorted scrap
  property carbon content 0
    carbon content on a dry matter basis (reserved; not for manual entry)
  property true value 6.29481e-6
    allocation property applied in "true value" allocation // value calculated from revenue
  properties: wet mass 1 kg, water content 0, water in wet mass 0 kg, dry mass 1 kg, carbon content, fossil 0, carbon content, non-fossil 0, carbon allocation 0 kg
- aluminium oxide, non-metallurgical: 0 kg; source European Aluminium Association 2008; CPC 41432: Alumina (aluminium oxide), except artificial corundum; By-product classification allocatable product; CAS 1344-28-1; pedigree (1,1,1,1,1)
  production volume 4346.9 kg
  property dry mass 1 kg; name DM
  property wet mass 1 kg; name WM
  property carbon content, fossil 0; name C_content_fossil
  property water in wet mass 0 kg; name WWM
  property water content 0; name water_content
  property price 0.28 EUR2005; name Al2O3Amount_price_EUR2005
    From UN trade database. http://data.un.org/ Import data from the largest economies of the world are used (Brazil, India, USA, China, Japan and EU-27).
  property carbon content, non-fossil 0; name C_content_non_fossil
  property carbon content 0
    carbon content on a dry matter basis (reserved; not for manual entry)
  property true value 0.000744358
    allocation property applied in "true value" allocation // value calculated from revenue
  properties: carbon allocation 0 kg
- heat, for reuse in municipal waste incineration only: 0 MJ; CPC 17300: Steam and hot water; By-product classification allocatable product; pedigree (1,1,1,1,1)
  Net electricity generated from this waste and used in internal MSWI plant energy redistribution.
  Uncertainty: uncertainty is calculated from uncertainties in waste composition and uncertainties in energy efficiency and the uncertainty in internal energy demand
  production volume 10854.3 MJ
  property exergy 0.1842 MJ; name E_th_prod_MSWI_exergy
    This exergy property is based on the exergy content of the product.
  property true value relation 0.1842; name E_th_prod_MSWI_true_value_relation
    property to calculate "true value" from
  property price 0.0106 EUR2005; name E_th_prod_MSWI_price_EUR2005
    Average European district heat price from Ecoheatcool and Euroheat 2005-2006, Ecoheat Work package 1: The European heat market. Final report. 10.6 EUR/GJ i s the price of district heat. http://www.solarthermalworld.org/files/Ecoheatcool%20WP1%20Web.pdf?download
  property true value 4.35009e-5
    allocation property applied in "true value" allocation // value calculated from true value relation
- electricity, for reuse in municipal waste incineration only: 0 kWh; CPC 17100: Electrical energy; By-product classification allocatable product; pedigree (1,1,1,1,1)
  (same comment as for heat, for reuse in municipal waste incineration only)
  production volume 1564.61 kWh
  property exergy 3.6 MJ; name E_el_prod_MSWI_exergy
    This exergy property is based on the exergy content of the product.
  property true value relation 3.6; name E_el_prod_MSWI_true_value_relation
    property to calculate "true value" from
  property price 0.1 EUR2005; name E_el_prod_MSWI_price_EUR2005
    Estimated to be the same price as in case of electricity, medium voltage.
  property true value 0.00012255
    (same comment as for heat, for reuse in municipal waste incineration only)
- aluminium, wrought alloy: 0 kg; source European Aluminium Association 2008; By-product classification allocatable product; CPC 4153: Semi-finished products of aluminium or aluminium alloys; pedigree (1,1,1,1,1)
  production volume 34526.4 kg
  property price 1.44 EUR2005; name secondaryAluminiumOutput_price_EUR2005
    Estimated based on literature values and expert judgement. Aluminium ccast alloys are about 90% of the price of aluminium wrought alloys.
  property carbon content 0
    carbon content on a dry matter basis (reserved; not for manual entry)
  property true value 0.0339422
    allocation property applied in "true value" allocation // value calculated from revenue
  properties: dry mass 1 kg, wet mass 1 kg, carbon content, fossil 0, water content 0, carbon content, non-fossil 0, water in wet mass 0 kg, carbon allocation 0 kg
- copper: 0 kg; By-product classification allocatable product; CPC 41413: Refined copper and copper alloys, unwrought; master alloys of copper; pedigree (1,1,1,1,1)
  Measured value. Based on reported copper waste send to recycling.
  production volume 6.26254e-5 kg
  property price 5.52 EUR2005; name copper_price_EUR2005
  properties: dry mass 1 kg, carbon content, non-fossil 0, water in wet mass 0 kg, water content 0, carbon content, fossil 0, wet mass 1 kg, carbon content 0, carbon allocation 0 kg, true value 3.9252e-10
- aluminium alloy, AlLi: 0 kg; By-product classification allocatable product; CPC 41431: Unwrought aluminium
  reference flow
  production volume 7.35869 kg
  property price 3.6 EUR2005; name ref_price_EUR2005
    Literature value (http://www.economist.com/news/business/21576714-mining-industry-has-enriched-chile-its-future-precarious-copper-solution). Average price between 20015 and 2013.
  property carbon content 0
    carbon content on a dry matter basis (reserved; not for manual entry)
  property true value 3.00798e-5
    allocation property applied in "true value" allocation // value calculated from revenue
  properties: carbon content, non-fossil 0, carbon content, fossil 0, dry mass 1 kg, wet mass 1 kg, water in wet mass 0 kg, carbon allocation 0 kg
- ground granulated blast furnace slag: 0 kg; By-product classification allocatable product; CPC 37440: Portland cement, aluminous cement, slag cement and similar hydraulic cements, except in the form of clinkers
  Functional unit of LCI by Marceau & VanGeem (2003) was 1 short ton of slag cement (GGBFS) output which was converted to 907.18 kg for the present inventory.
  production volume 0.842735 kg
  property water content 0; name GGBFS_water_content
  property carbon content, non-fossil 0; name GGBFS_C_content_non_fossil
  property water in wet mass 0 kg; name GGBFS_WWM
  property carbon content, fossil 0; name GGBFS_C_content_fossil
    Industry value; Arcelor Mittal, chemical composition of blast furnace slag (http://www.cst.com.br/english/products/co_products/catalog_products/blast_slag/blast_slag.asp, accessed: 20121003).
  property price 0.0615 EUR2005; name GGBFS_price_EUR2005
    2005 import and export prices (total trades (USD) divided by total weight (kg) in China, India, USA, Japan, Russia and Europe, major producers and consumers (http://www.cementchina.net/freport/showfre.asp?id=749) from UN Commodity Trade Statistics Database (http://data.un.org/Explorer.aspxDatabase [Accessed 2 July 2010]). Commodity: Cement (portland, aluminious, slag or hydraulic)
  property carbon content 0
    carbon content on a dry matter basis (reserved; not for manual entry)
  property true value 5.8849e-8
    allocation property applied in "true value" allocation // value calculated from revenue
  properties: wet mass 1 kg, dry mass 1 kg, carbon allocation 0 kg
- zinc concentrate: 0 kg; CPC 14290: Other non-ferrous metal ores and concentrates (other than uranium or thorium ores and concentrates); By-product classification allocatable product
  Calculated value from the knowledge of the properties of both products.
  production volume 1.29398e-7 kg
  property price 0.38 EUR2005; name ByP_price_EUR2005
    Temporary price data. Calculated as 90% of purchasers price based on: Zinc content in concentrate 53%. Concentrate price per kg Zn 86.5% of refined Zn price (13.5% treatment charges according to CHR Metals Limited 2005: Dynamic cost curves. http://www.minecost.com/dynamic.pdf). 2004 zinc price from USGS (2007) Mineral commodity summaries 2007. <http://minerals.usgs.gov/minerals/pubs/mcs/2007/mcs2007.pdf> [Accessed 25 May 2010]
  property zinc content 0.53; name zinc_C_zinc_concentrate
    Zinc content on a dry matter basis. Value taken from teh "zinc mine operation" /GLO dataset.
  property dry mass 1 kg; name DM_zinc_concentrate
  property carbon content 0
    carbon content on a dry matter basis (reserved; not for manual entry)
  property true value 5.58322e-14
    allocation property applied in "true value" allocation // value calculated from revenue
  properties: wet mass 1 kg, water content 0, carbon content, non-fossil 0, carbon content, fossil 0, water in wet mass 0 kg, carbon allocation 0 kg
- granulated blast furnace slag: 0 kg; By-product classification allocatable product
  production volume 3.48883 kg
  property wet mass 1 kg; name GBFS_WM
  property dry mass 1 kg; name GBFS_DM
  property price 0.0615 EUR2005; name GBFS_price_EUR2005
    (same comment as for ground granulated blast furnace slag)
  property water in wet mass 0 kg; name GBFS_WWM
  property carbon content, non-fossil 0; name GBFS_C_content_non_fossil
    biogene carbon content on a dry matter basis
  property carbon content, fossil 0; name GBFS_C_content_fossil
    fossil carbon content on a dry matter basis
  property water content 0; name GBFS_water_content
  property carbon content 0
    carbon content on a dry matter basis (reserved; not for manual entry)
  property true value 2.43628e-7
    allocation property applied in "true value" allocation // value calculated from revenue
  properties: carbon allocation 0 kg
- aluminium alloy, metal matrix composite: 0 kg; CPC 41431: Unwrought aluminium; By-product classification allocatable product
  reference flow
  production volume 5.9495 kg
  property water content 0; name Al_MMC_water_content
  property carbon content, non-fossil 0; name Al_MMC_C_content_non_fossil
    biogene carbon content on a dry matter basis
  property price 6.2 EUR2005; name ref_price_EUR2005
    (same comment as for aluminium alloy, AlLi)
  property carbon content, fossil 0.0475; name Al_MMC_C_content_fossil
    fossil carbon content on a dry matter basis
  property dry mass 1 kg; name Al_MMC_DM
  property water in wet mass 0 kg; name Al_MMC_WWM
  property wet mass 1 kg; name Al_MMC_WM
  property carbon content 0.0475
    carbon content on a dry matter basis (reserved; not for manual entry)
  property true value 4.18837e-5
    allocation property applied in "true value" allocation // value calculated from revenue
  properties: carbon allocation 0.0475 kg
- aluminium, primary, cast alloy slab from continuous casting: 0 kg; CPC 41431: Unwrought aluminium; By-product classification allocatable product
  reference flow
  production volume 381.254 kg
  property price 3.67 EUR2005; name ref_price_EUR2005
    Estimated to be the same as in case of aluminium, primary, liquid.
  property carbon content 0
    carbon content on a dry matter basis (reserved; not for manual entry)
  property true value 0.00158874
    allocation property applied in "true value" allocation // value calculated from revenue
  properties: wet mass 1 kg, carbon content, fossil 0, water content 0, carbon content, non-fossil 0, water in wet mass 0 kg, dry mass 1 kg, carbon allocation 0 kg

## Inputs from technosphere
- resistor, metal film type, through-hole mounting: 0.00602879 kg; lognormal variance with pedigree 0.0064, pedigree (2,4,3,4,2)
  Based on the direct inspection of a commercial device.
  properties: carbon content, fossil 0.029003, wet mass 1 kg, dry mass 1 kg
- transformer, low voltage use: 0.00991578 kg; lognormal variance with pedigree 0.0064, pedigree (2,4,3,4,2)
  Based on the direct inspection of a commercial device.
  properties: carbon content, fossil 0.11936, dry mass 1 kg, wet mass 1 kg
- integrated circuit, logic type: 0.000426478 kg; lognormal variance with pedigree 0.0064, pedigree (2,4,3,4,2)
  Based on the direct inspection of a commercial device.
  properties: carbon content, fossil 0.221701, dry mass 1 kg, wet mass 1 kg
- transistor, auxilliaries and energy use: 0.00544145 kg; lognormal variance with pedigree 0.0064, pedigree (2,4,3,4,2)
  Based on the direct inspection of a commercial device.
- transformer, high voltage use: 0.165263 kg; lognormal variance with pedigree 0.0064, pedigree (2,4,3,4,2)
  Based on the direct inspection of a commercial device.
  properties: carbon content, fossil 0.262798, wet mass 1 kg, dry mass 1 kg
- fan, for power supply unit, desktop computer: 0.0264421 kg; lognormal variance with pedigree 0.0064, pedigree (2,4,3,4,2)
  Based on the direct inspection of a commercial device.
  properties: dry mass 1 kg, carbon content, fossil 0.693687, carbon content, non-fossil 0.000300198, wet mass 1 kg
- transistor, surface-mounted: 0.000980009 kg; lognormal variance with pedigree 0.0064, pedigree (2,4,3,4,2)
  Based on the direct inspection of a commercial device.
  properties: dry mass 1 kg, wet mass 1 kg, carbon content, fossil 0.083636
- transistor, wired, small size, through-hole mounting: 0.00027037 kg; lognormal variance with pedigree 0.0064, pedigree (2,4,3,4,2)
  Based on the direct inspection of a commercial device.
  properties: wet mass 1 kg, carbon content, fossil 0.080338, dry mass 1 kg
- aluminium, cast alloy: 0.181789 kg; lognormal variance with pedigree 0.0138, pedigree (2,4,3,4,3)
  Based on the direct inspection of a commercial device.
  properties: dry mass 1 kg, wet mass 1 kg
- aluminium scrap, new: 0 kg
  Own assumption of waste from production. Waste factor taken from F. Habermacher 2011.
  production volume 0 kg
    Calculated from production volume of reference product using the relative outputs.
  properties: price 0.806 EUR2005, wet mass 1 kg, dry mass 1 kg
- diode, glass-, for through-hole mounting: 0.00118196 kg; lognormal variance with pedigree 0.0064, pedigree (2,4,3,4,2)
  Based on the direct inspection of a commercial device.
  properties: carbon content, fossil 0.0203273, dry mass 1 kg, wet mass 1 kg
- plug, inlet and outlet, for computer cable: 0.991578 unit; lognormal variance with pedigree 0.0064, pedigree (2,4,3,4,2)
  Based on the direct inspection of a commercial device.
  properties: dry mass 0.0585 kg, wet mass 0.0585 kg, carbon content, fossil 0.3397
  note on carbon content, fossil: Calculated as the addition of C contents in the product composition
- cable, printer cable, without plugs: 0.0661052 m; lognormal variance with pedigree 0.0064, pedigree (2,4,3,4,2)
  Based on the direct inspection of a commercial device.
  properties: wet mass 0.072 kg, dry mass 0.072 kg, carbon content, fossil 0.282258
  note on carbon content, fossil: Calculated as the addition of C contents in the product composition. Then referred to 1 kg DM
- metal working, average for aluminium product manufacturing: 0.165263 kg; lognormal variance with pedigree 0.0152, pedigree (3,4,3,4,3)
  Own assumption.
- switch, toggle type: 0.00522231 kg; lognormal variance with pedigree 0.0064, pedigree (2,4,3,4,2)
  Based on the direct inspection of a commercial device.
  properties: carbon content, fossil 0.116333, dry mass 1 kg, wet mass 1 kg
- inductor, auxilliaries and energy use: 0.108088 kg; lognormal variance with pedigree 0.0064, pedigree (2,4,3,4,2)
  Based on the direct inspection of a commercial device.
- liquid crystal display, unmounted: 0.00330526 kg; lognormal variance with pedigree 0.0064, pedigree (2,4,3,4,2)
  Based on the direct inspection of a commercial device.
  properties: carbon content, non-fossil 4.20542e-5, carbon content, fossil 0.327872, wet mass 1 kg, dry mass 1 kg
- mounting, through-hole technology, Pb-free solder: 0.0122923 m2; lognormal variance with pedigree 0.0064, pedigree (2,4,3,4,2)
  Based on the direct inspection of a commercial device.
- printed wiring board, through-hole mounted, unspecified, Pb free: 0.0122923 kg; lognormal variance with pedigree 0.0064, pedigree (2,4,3,4,2)
  Based on the direct inspection of a commercial device.
  properties: carbon content, fossil 0.255344, wet mass 1 kg, carbon content, non-fossil 0.00192028, dry mass 1 kg
- inductor, miniature radio frequency chip: 5.55284e-6 kg; lognormal variance with pedigree 0.0064, pedigree (2,4,3,4,2)
  Based on the direct inspection of a commercial device.
  properties: wet mass 1 kg, dry mass 1 kg, carbon content, fossil 0.0535842
- copper: 0.000161958 kg; lognormal variance with pedigree 0.0064, pedigree (2,4,3,4,2)
  Based on the direct inspection of a commercial device.
  properties: wet mass 1 kg, dry mass 1 kg
- capacitor, electrolyte type, < 2cm height: 0.00341103 kg; lognormal variance with pedigree 0.0064, pedigree (2,4,3,4,2)
  Based on the direct inspection of a commercial device.
  properties: dry mass 1 kg, wet mass 1 kg, carbon content, non-fossil 0.0222053, carbon content, fossil 0.189636
- potentiometer, unspecified: 0.00403242 kg; lognormal variance with pedigree 0.0064, pedigree (2,4,3,4,2)
  Based on the direct inspection of a commercial device.
  properties: wet mass 1 kg, carbon content, fossil 0.570934, dry mass 1 kg, carbon content, non-fossil 0.0189996
- diode, auxilliaries and energy use: 0.00133202 kg; lognormal variance with pedigree 0.0064, pedigree (2,4,3,4,2)
  Based on the direct inspection of a commercial device.
- capacitor, auxilliaries and energy use: 0.0777562 kg; lognormal variance with pedigree 0.0064, pedigree (2,4,3,4,2)
  Based on the direct inspection of a commercial device.
- resistor, surface-mounted: 9.71746e-5 kg; lognormal variance with pedigree 0.0064, pedigree (2,4,3,4,2)
  Based on the direct inspection of a commercial device.
  properties: carbon content, fossil 0.00893558, wet mass 1 kg, dry mass 1 kg
- cable, connector for computer, without plugs: 1.37168 m; lognormal variance with pedigree 0.0064, pedigree (2,4,3,4,2)
  Based on the direct inspection of a commercial device.
  properties: dry mass 0.065 kg, wet mass 0.065 kg, carbon content, fossil 0.359823
- capacitor, film type, for through-hole mounting: 0.04082 kg; lognormal variance with pedigree 0.0064, pedigree (2,4,3,4,2)
  Based on the direct inspection of a commercial device.
  properties: carbon content, fossil 0.278876, wet mass 1 kg, dry mass 1 kg
- printed wiring board, surface mounted, unspecified, Pb free: 0.00193027 kg; lognormal variance with pedigree 0.0064, pedigree (2,4,3,4,2)
  Based on the direct inspection of a commercial device.
  properties: carbon content, fossil 0.132522, wet mass 1 kg, dry mass 1 kg
- resistor, auxilliaries and energy use: 0.00612597 kg; lognormal variance with pedigree 0.0064, pedigree (2,4,3,4,2)
  Based on the direct inspection of a commercial device.
- polyethylene, high density, granulate: 0.134855 kg; lognormal variance with pedigree 0.0064, pedigree (2,4,3,4,2)
  Based on the direct inspection of a commercial device.
  properties: wet mass 1 kg, dry mass 1 kg, carbon content, fossil 0.857143
  note on carbon content, fossil: Polyethylene is formed out of a huge amount of ethylene monomers (C2H4) (ecoinvent v2.2 report 11_II). MW=28 g/mol
- inductor, ring core choke type: 0.108082 kg; lognormal variance with pedigree 0.0064, pedigree (2,4,3,4,2)
  Based on the direct inspection of a commercial device.
  properties: carbon content, fossil 0.445934, wet mass 1 kg, dry mass 1 kg
- capacitor, for surface-mounting: 0.000142126 kg; lognormal variance with pedigree 0.0064, pedigree (2,4,3,4,2)
  Based on the direct inspection of a commercial device.
  properties: dry mass 1 kg, wet mass 1 kg
- light emitting diode: 0.000347052 kg; lognormal variance with pedigree 0.0064, pedigree (2,4,3,4,2)
  Based on the direct inspection of a commercial device.
  properties: carbon content, fossil 0.0203273, wet mass 1 kg, dry mass 1 kg
- transistor, wired, big size, through-hole mounting: 0.00419107 kg; lognormal variance with pedigree 0.0064, pedigree (2,4,3,4,2)
  Based on the direct inspection of a commercial device.
  properties: wet mass 1 kg, dry mass 1 kg, carbon content, fossil 0.0946006
- plug, inlet and outlet, for network cable: 1.48737 unit; lognormal variance with pedigree 0.0064, pedigree (2,4,3,4,2)
  Based on the direct inspection of a commercial device.
  properties: wet mass 0.0086 kg, dry mass 0.0086 kg, carbon content, fossil 0.414034
- capacitor, electrolyte type, > 2cm height: 0.0333831 kg; lognormal variance with pedigree 0.0064, pedigree (2,4,3,4,2)
  Based on the direct inspection of a commercial device.
  properties: dry mass 1 kg, carbon content, fossil 0.16971, wet mass 1 kg, carbon content, non-fossil 0.0349727
- aluminium scrap, new: -0.00194854, -0.0145778 kg (2 entries)
  Own assumption of waste from production. Waste factor taken from F. Habermacher 2011.
  production volume 38843 kg

## Sampling procedure
Direct inspection of a typical device of common technology.

## Extrapolations
The inspected device represents a typical technology which is believed to be representative up to 2015.

## Review by Emilia Moreno Ruiz 2013-01-08
correction of exchange name to “printed wiring board, surface mounted, [...]"

## Review by Christian Bauer 2012-05-25
passed
