# trawler maintenance, steel

Dataset: EcoSpold 2, unit process
Geography: PE
Time period: 2010-01-01 to 2020-12-31
Technology level: current
Classification: ISIC rev.4 ecoinvent: 0311:Marine fishing
Scenario: Business-as-Usual
System model: Allocation at the point of substitution
Generated by: Angel Avadi
Published in: Avadí, A. 2018
Database: ecoinvent
isCopyrightProtected: true
accessRestrictedTo: 1

## General comment
This dataset represents the maintenance of steel trawlers, per 1000 kg of light ship weight, based on data from Peru (2004-3013), corresponding to 9 vessels (from a fleet of 54) for which data was avilable with different levels of detail. Specific data for specific inventory items may be based on sub-samples for which detailed data was available. Vessel dimensions: 34 - 275 m3 (16 - 34 m length).
System boundaries and relation between activities

## Included activities start
Maintenance of vessels, including provision of all materials and work

## Included activities end
End of life of replaced materials. Batteries are excluded, as they do not exist in the database

## Geography
Data from Peru

## Technology
Peru features various shipyards and relevant ship-building and ship-retrofitting expertise.

## Reference product
- iron scrap, unsorted: 1 kg; = steel+gear; source Angel Avadí 2017; CPC 39310: Slag, dross, scalings and other waste from the manufacture of iron or steel; By-product classification Recyclable
  Waste steel from hull and fishing gear
  production volume 0.00145417 kg; = prod_vol * (Ref('dd0581c6-74cc-482e-a5d7-6aca1f45ad3a') / LSW)
    Calculated from production volume of reference product using the relative outputs.
  property price 0.149 EUR2005
    Temporary price data. Calculated as 90% of purchasers price based on: estimated at 85% of sorted scrap
  property carbon content 0
    carbon content on a dry matter basis (reserved; not for manual entry)
  property true value 21.7361
    allocation property applied in "true value" allocation // value calculated from revenue
  properties: carbon content, fossil 0, wet mass 1 kg, carbon content, non-fossil 0, dry mass 1 kg, water in wet mass 0 kg, water content 0, carbon allocation 0 kg
- trawler maintenance, steel: 0 kg; name LSW; = steel+copper+nylon+engine*1000+paint+gear+rubber; source Angel Avadí 2017; By-product classification allocatable product; CPC 8729: Maintenance and repair services of other goods n.e.c.
  Maintenance of a steel trawler, per 1000 kg of light ship weight (LSW) over its lifetime. Regressions based on mainly primary data were created to relate the weight of each inventory item to a purse seiner's LSW, adjusted for trawler's gear. The list of inventory items (granularity) contribute >95% of environmental impacts, as described in the reference publication.
  production volume 0.002923 kg; name prod_vol
    GDP for Peru as a proportion of the world
  property price 1.72304 EUR2005; name LSW_price_EUR2005
    Calculated based on inputs: The price of the product has been calculated as a sum of the values of the material and energy inputs for this product. This value is therefore a rough estimation. It may underestimate the real price since there are additional expenses when producing any product. These expences can include for example labour costs, treatment of waste materials and profit for the producer. Please consider carefully whether this level of data quality is acceptable for your application.
  property true value 505.248; name LSW_true_value
    allocation property applied in "true value" allocation // value calculated from revenue

## By-products
- heat, for reuse in municipal waste incineration only: 0 MJ; CPC 17300: Steam and hot water; By-product classification allocatable product; pedigree (1,1,1,1,1)
  Net electricity generated from this waste and used in internal MSWI plant energy redistribution.
  production volume 0.00029873 MJ
  property true value relation 0.1842; name E_th_prod_MSWI_true_value_relation
    property to calculate 'true value' from
  property exergy 0.1842 MJ; name E_th_prod_MSWI_exergy
    This exergy property is based on the exergy content of the product.
  property price 0.0106 EUR2005; name E_th_prod_MSWI_price_EUR2005
    Average European district heat price from Ecoheatcool and Euroheat 2005-2006, Ecoheat Work package 1: The European heat market. Final report. 10.6 EUR/GJ i s the price of district heat. http://www.solarthermalworld.org/files/Ecoheatcool%20WP1%20Web.pdf?download
  property true value 0.197544
    allocation property applied in "true value" allocation // value calculated from true value relation
- electricity, for reuse in municipal waste incineration only: 0 kWh; CPC 17100: Electrical energy; By-product classification allocatable product; pedigree (1,1,1,1,1)
  (same comment as for heat, for reuse in municipal waste incineration only)
  production volume 4.15317e-5 kWh
  property price 0.1 EUR2005; name E_el_prod_MSWI_price_EUR2005
    Estimated to be the same price as in case of electricity, medium voltage.
  property exergy 3.6 MJ; name E_el_prod_MSWI_exergy
    This exergy property is based on the exergy content of the product.
  property true value relation 3.6; name E_el_prod_MSWI_true_value_relation
    property to calculate 'true value' from
  property true value 0.536756
    (same comment as for heat, for reuse in municipal waste incineration only)
- copper: 0 kg; source Rentz O. 1999; By-product classification allocatable product; CPC 41413: Refined copper and copper alloys, unwrought; master alloys of copper
  Literature value. Copper uses: Before end-use copper is manufactured into semi fabricated products, such as shapes and ingots (known as 'semis'). These manufacturing processes are subdivided into hot working, cold working and, if necessary, process annealing. Few of the semis are ready for use as such. They more typically travel to first-stage manufacturers, who make metal rods, wire, and casting, and then to component manufacturers who produce such things as motors, valves, and insulated cables The components in turn are incorporated by final-stage manufacturers into a variety of finished products - automobiles, commercial buildings, residential housing, and so forth. These uses account for about 79% of the world-wide consumption of copper.
  production volume 0.000108586 kg
  properties: dry mass 1 kg, water in wet mass 0 kg, wet mass 1 kg, carbon content, non-fossil 0, water content 0, price 5.52 EUR2005, carbon content, fossil 0, carbon content 0, carbon allocation 0 kg, true value 60.1301
- zinc concentrate: 0 kg; CPC 14290: Other non-ferrous metal ores and concentrates (other than uranium or thorium ores and concentrates); By-product classification allocatable product
  Calculated value from the knowledge of the properties of both products.
  production volume 8.61875e-14 kg
  property price 0.38 EUR2005; name ByP_price_EUR2005
    Temporary price data. Calculated as 90% of purchasers price based on: Zinc content in concentrate 53%. Concentrate price per kg Zn 86.5% of refined Zn price (13.5% treatment charges according to CHR Metals Limited 2005: Dynamic cost curves. http://www.minecost.com/dynamic.pdf). 2004 zinc price from USGS (2007) Mineral commodity summaries 2007. <http://minerals.usgs.gov/minerals/pubs/mcs/2007/mcs2007.pdf> [Accessed 25 May 2010]
  property zinc content 0.53; name zinc_C_zinc_concentrate
    Zinc content on a dry matter basis. Value taken from teh "zinc mine operation" /GLO dataset.
  property dry mass 1 kg; name DM_zinc_concentrate
  property carbon content 0
    carbon content on a dry matter basis (reserved; not for manual entry)
  property true value 3.28555e-9
    allocation property applied in "true value" allocation // value calculated from revenue
  properties: wet mass 1 kg, water content 0, carbon content, non-fossil 0, carbon content, fossil 0, water in wet mass 0 kg, carbon allocation 0 kg

## Inputs from technosphere
- nylon 6-6: 0.00179708 kg; name nylon; source Angel Avadí 2017; triangular min 0.00179708, mostLikely 0.00179708, max 0.00179708, pedigree (2,3,1,1,1)
  Fishing net maintenance, 40% every 10 years
  Uncertainty: Data from 9 vessels
  property dry mass 1 kg; name nylon_DM
  property water in wet mass 0 kg; name nylon_WWM
  property carbon content, fossil 0.637168; name nylon_CCF
  property water content 0; name nylon_WC
  property carbon content, non-fossil 0; name nylon_CCNF
  properties: wet mass 1 kg
- waste paint on metal: -0.00768849 kg; = (paint*1/3)*-1; source Angel Avadí 2017
  Waste paint, 2/3 of solids emitted to ocean
  production volume 0.000302371 kg; = prod_vol * ((Ref('32971c58-4473-42f3-9978-83ddf9fb844a')*-1) / LSW)
    Calculated from production volume of reference product using the relative outputs.
  properties: carbon content, non-fossil 0.199629, dry mass 1 kg, carbon content, fossil 0.140367, wet mass 1 kg
- waste rubber, unspecified: -0.000757865 kg; = (rubber)*-1
  Waste rubber
  production volume 2.98052e-5 kg; = prod_vol * ((Ref('bf2a0137-afd6-49ed-8e5d-afcfb3fbce40')*-1) / LSW)
    Calculated from production volume of reference product using the relative outputs.
  properties: carbon content, fossil 0.871949, dry mass 1 kg, wet mass 1 kg
- wire drawing, copper: 0.00361697 kg; name copper; source Angel Avadí 2017; triangular min 0.00361697, mostLikely 0.00361697, max 0.00361697, pedigree (3,3,1,1,1)
  Manufacture of copper wire, 1.5 replacements over lifetime
  Uncertainty: Assumptions on replacement rates
- waste plastic, mixture: -0.00179708 kg; = (nylon)*-1; source Angel Avadí 2017
  Waste nylon
  production volume 7.06751e-5 kg; = prod_vol * ((Ref('1e4e4d3a-b41d-463b-9191-bf437e0634dd')*-1) / LSW)
    Calculated from production volume of reference product using the relative outputs.
  properties: carbon content, fossil 0.637168, dry mass 1 kg, wet mass 1 kg
- steel, low-alloyed, hot rolled: 0.0276279 kg; name steel; source Angel Avadí 2017; triangular min 0.0276279, mostLikely 0.0276279, max 0.0276279, pedigree (2,3,1,1,1)
  Steel hull, sheets, 12% replacement every 2 years; transmission, structural elements
  Uncertainty: Data from 9 vessels
  property carbon content, non-fossil 0; name steel_C_content_non_fossil
  properties: carbon content, fossil 0.005, wet mass 1 kg, dry mass 1 kg
  note on carbon content, fossil: Low alloyed steel composition given in Tab. 3.2 ecoinvent v2.2 report 10_partII. Steel assumed to have a C content of 0.5%
  note on carbon content, non-fossil: Low alloyed steel composition given in Tab. 3.2 ecoinvent v2.2 report 10_partII.
- copper scrap, sorted, pressed: -0.00361697 kg; = (copper)*-1; source Angel Avadí 2017
  Waste copper wire
  production volume 0.000142247 kg; = prod_vol * ((Ref('45fc9a80-ea39-4614-9f38-2a2bb9d64de5')*-1) / LSW)
    Calculated from production volume of reference product using the relative outputs.
  properties: price 2.84 EUR2005, dry mass 1 kg, wet mass 1 kg
- copper: 0.00361697 kg; = copper; source Angel Avadí 2017
  Copper wire for electric circuit construction, 50% recycled
  properties: dry mass 1 kg, wet mass 1 kg
- steel, low-alloyed: 0.00934785 kg; name gear; source Angel Avadí 2017; triangular min 0.00934785, mostLikely 0.00934785, max 0.00934785, pedigree (2,3,1,1,1)
  Fishing net maintenance, 40% every 10 years
  Uncertainty: Data from 9 vessels
  properties: dry mass 1 kg, carbon content, fossil 0.005, wet mass 1 kg
- synthetic rubber: 0.000757865 kg; name rubber; source Angel Avadí 2017; triangular min 0.000757865, mostLikely 0.000757865, max 0.000757865, pedigree (2,3,1,1,1)
  Fishing net maintenance, 40% every 10 years
  Uncertainty: Data from 9 vessels
  property carbon content, non-fossil 0; name rubber_CCNF
  property water content 0; name rubber_WC
  property carbon content, fossil 0.871949; name rubber_CCF
  property dry mass 1 kg; name rubber_DM
  property water in wet mass 0 kg; name rubber_WWM
  properties: wet mass 1 kg
  note on carbon content, fossil: EPDM (Ethylene-propene-diene terpolymer) rubber is a terpolymer of ethylene, propene, and a diene with the residual unsaturated portion of the diene in the side chain (ecoinvent v2.2 report 7-part XX & Ullmann). Chemical formula (deduced from Evidences of Solvent-Induced Miscibility in Polychloroprene-co-Ethylene-Propene Diene Terpolymer Blends, Dubey et al., Journal of Applied Polymer Science, 2009, 111:1884–1891): C20H35
- alkyd paint, white, without solvent, in 60% solution state: 0.0230655 kg; name paint; source Angel Avadí 2017; triangular min 0.0230655, mostLikely 0.0230655, max 0.0230655, pedigree (1,3,1,1,1)
  Hull and deck paint, including antifouling, maintenance, every 2 years
  Uncertainty: Data from 9 vessels
  property carbon content, non-fossil 0.199629; name paint_CCNF
  property carbon content, fossil 0.140367; name paint_CCF
  properties: dry mass 1 kg, wet mass 1 kg
  note on carbon content, non-fossil: C content was calculated as an addition of C content in the raw materials.
- marine engine: 8.11093e-6 unit; name engine; source Angel Avadí 2017; triangular min 8.11093e-6, mostLikely 8.11093e-6, max 8.11093e-6, pedigree (3,3,1,1,1)
  Marine diesel engine maintenance, 1 replacement over the lifespan
  Uncertainty: Data from 54 vessels, assumptions on replacement/maintenance
  property lifetime capacity [h] 8000 hour; name engine_lifetime_capacity_PMH
  property lifetime 15 year; name engine_lifetime

## Emissions to nature
- Solids, inorganic [water, ocean]: 0.015377 kg; = paint*2/3; source Avadí, A. 2018
  Waste paint, 2/3 of solids emitted to ocean
