# treatment of waste rubber, unspecified, municipal incineration with fly ash extraction

Dataset: EcoSpold 2, unit process
Geography: CH
Time period: 2006-01-01 to 2019-12-31
Technology level: current
Classification: ISIC rev.4 ecoinvent: 3821:Treatment and disposal of non-hazardous waste
Synonyms: municipal waste incineration; Kehrichtverbrennung; Siedlungsabfallverbrennung
Scenario: Business-as-Usual
System model: Allocation at the point of substitution
Share of production covered: 100 %
Generated by: Gabor Doka
Published in: Doka G. 2015
Database: ecoinvent
isCopyrightProtected: true
accessRestrictedTo: 1

## General comment
This dataset represents the activity of waste disposal of waste rubber, unspecified in a municipal solid waste incinerator (MSWI) // Recommended use of this dataset: For small or large used rubber parts (can be as part of a larger contraption), which go to disposal as part of communal waste mixture. // // Waste composition (wet, in ppm): upper heating value 29.3 MJ/kg; lower heating value 27.19 MJ/kg; H2O n.a.; O n.a.; H 106690; C 853530; S 3700; N n.a.; P n.a.; B n.a.; Cl 20000; Br n.a.; F n.a.; I n.a.; Ag n.a.; As n.a.; Ba n.a.; Cd 8; Co n.a.; Cr n.a.; Cu n.a.; Hg 0.001; Mn n.a.; Mo n.a.; Ni n.a.; Pb 70; Sb n.a.; Se n.a.; Sn n.a.; V n.a.; Zn 16000; Be n.a.; Sc n.a.; Sr n.a.; Ti n.a.; Tl n.a.; W n.a.; Si n.a.; Fe n.a.; Ca n.a.; Al n.a.; K n.a.; Mg n.a.; Na n.a.; // Share of carbon in waste that is biogenic 0%. // Share of metals in waste not oxidised and bulk-recyclable (exclude very small or thin parts) Iron: 0%; Alu: 0%; Copper: 0%. // Recovery of metal scrap from bottom ash to recycling: 0g iron scrap, 0g aluminium scrap, 0g copper scrap. From this waste, the FLUWA process in the technology mix recovers 0.00492kg (DM) of a hydroxide sludge to be recycled in zinc furnaces. // Ultimately one kg of this waste produces 0.03579 kg of bottom ash (can include some washed ash) and 0.0165 kg of residues, which are landfilled (technology mix). Additional solidification of residues with 0.006599 kg of cement.Net energy production: 3.25MJ/kg electric energy and 6.34MJ/kg thermal energy. //

## Included activities start
waste incineration from waste reception gate and delivery into waste bunker at incinerator plant site (without transports to the incinerator)

## Included activities end
Waste-specific short-term emissions to water from leachate. Long-term emissions from landfill to ground water.

## Geography
Specific to the technology mix encountered in Switzerland in 2012.

## Technology
average Swiss MSWI plants in 2010 (grate incinerators) with electrostatic precipitator for fly ash (ESP), wet flue gas scrubber and 25% SNCR , 42.77% SCR-high dust , 32.68% SCR-low dust -DeNOx facilities and 0% without Denox (weighted according to mass of burnt waste, representing Swiss average). Efficiency of iron scrap separation from slag : 58%. Efficiency of non-ferrous scrap separation from slag : 31%. The technology mix for this dataset includes a filter ash treatment (FLUWA) of a share of 46.22%. Gross electric efficiency technology mix 15.84% and Gross thermal efficiency technology mix 28.51%

## Time period
Waste composition as given in literature reference, theoretical data or other source. Transfer coefficients for modern MSWI.

## Reference product
- waste rubber, unspecified: 0 kg; CPC 39: Wastes or scraps; By-product classification Waste
  Main reference product of this activity (supply of disposal service).
  production volume 0 kg
    based on corresponding global production volume of MSW fraction in conventional MSWI (wo fly ash extraction) and scaled down to annual Swiss incinerated MSW mass of 3.02 mio. tonnes.
  property price 0 EUR2005
    Waste products are assigned a price of zero as they are assumed to require further treatment.
  property carbon content 0.85353
    carbon content on a dry matter basis (reserved; not for manual entry)
  properties: lead content 7e-5, hydrogen content 0.10669, wet mass 1 kg, carbon content, fossil 0.85353, zinc content 0.016, dry mass 1 kg, mercury content 1e-9, cadmium content 8e-6, sulfur content 0.0037, chlorine content 0.02, carbon allocation 0.85353 kg
- electricity, for reuse in municipal waste incineration only: 1 kWh; CPC 17100: Electrical energy; By-product classification allocatable product; pedigree (1,1,1,1,1)
  Net electricity generated from this waste and used in internal MSWI plant energy redistribution.
  Uncertainty: uncertainty is calculated from uncertainties in waste composition and uncertainties in energy efficiency and the uncertainty in internal energy demand
  production volume 4.1266e7 kWh

## By-products
- electricity, for reuse in municipal waste incineration only: 0 kWh; name E_el_prod_MSWI; CPC 17100: Electrical energy; By-product classification allocatable product; pedigree (1,1,1,1,1)
  (same comment as for electricity, for reuse in municipal waste incineration only)
  production volume 0 kWh
    calculated in proportion to reference product waste input to incinerator
  property exergy 3.6 MJ; name E_el_prod_MSWI_exergy
    This exergy property is based on the exergy content of the product.
  property true value relation 3.6; name E_el_prod_MSWI_true_value_relation
    property to calculate "true value" from
  property price 0.1 EUR2005; name E_el_prod_MSWI_price_EUR2005
    Estimated to be the same price as in case of electricity, medium voltage.
- heat, for reuse in municipal waste incineration only: 0 MJ; name E_th_prod_MSWI; CPC 17300: Steam and hot water; By-product classification allocatable product; pedigree (1,1,1,1,1)
  Net useful heat generated from this waste and used in internal MSWI plant energy redistribution.
  Uncertainty: uncertainty is calculated from uncertainties in waste composition and uncertainties in energy efficiency and the uncertainty in internal energy demand
  production volume 0 MJ
    calculated in proportion to reference product waste input to incinerator
  property true value relation 0.1842; name E_th_prod_MSWI_true_value_relation
    property to calculate "true value" from
  property exergy 0.1842 MJ; name E_th_prod_MSWI_exergy
    This exergy property is based on the exergy content of the product.
  property price 0.0106 EUR2005; name E_th_prod_MSWI_price_EUR2005
    Average European district heat price from Ecoheatcool and Euroheat 2005-2006, Ecoheat Work package 1: The European heat market. Final report. 10.6 EUR/GJ i s the price of district heat. http://www.solarthermalworld.org/files/Ecoheatcool%20WP1%20Web.pdf?download
- zinc concentrate: 0 kg; CPC 14290: Other non-ferrous metal ores and concentrates (other than uranium or thorium ores and concentrates); By-product classification allocatable product
  Calculated value from the knowledge of the properties of both products.
  property price 0.38 EUR2005; name ByP_price_EUR2005
    Temporary price data. Calculated as 90% of purchasers price based on: Zinc content in concentrate 53%. Concentrate price per kg Zn 86.5% of refined Zn price (13.5% treatment charges according to CHR Metals Limited 2005: Dynamic cost curves. http://www.minecost.com/dynamic.pdf). 2004 zinc price from USGS (2007) Mineral commodity summaries 2007. <http://minerals.usgs.gov/minerals/pubs/mcs/2007/mcs2007.pdf> [Accessed 25 May 2010]
  property zinc content 0.53; name zinc_C_zinc_concentrate
    Zinc content on a dry matter basis. Value taken from teh "zinc mine operation" /GLO dataset.
  property dry mass 1 kg; name DM_zinc_concentrate
  property carbon content 0
    carbon content on a dry matter basis (reserved; not for manual entry)
  properties: wet mass 1 kg, water content 0, carbon content, non-fossil 0, carbon content, fossil 0, water in wet mass 0 kg, carbon allocation 0 kg
## Inputs from technosphere
- cement, unspecified: 0.000633463 kg; lognormal variance with pedigree 0.079831, pedigree (1,1,3,1,1)
  Cement required for solidification of landfilled residual material.
  Uncertainty: Uncertainty calculated from uncertainty of the waste composition of this waste, of transfer coefficients in the incinerator and of the solidification recipe.
  properties: dry mass 1 kg, wet mass 1 kg
- heat, district or industrial, natural gas: 0.0260865 MJ; lognormal variance with pedigree 0.15885, pedigree (1,1,3,1,1)
  Input to DeNOx stage, to heat up flue gas in low-dust SCR.
  Uncertainty: uncertainty calculated from uncertainty in average DeNOx input, uncertainty in the share of thermal NOx, uncertainty of nitrogen content in average municipal waste and the uncertainty in nitrogen content in *this* waste.
- chemical, organic: 0.000276711 kg; lognormal variance with pedigree 1.2827, pedigree (1,1,3,1,1)
  Auxilliary inputs for the wastewater treatment stage of the incinerator plant. Proxy for (pure) Trisodium-trimercapto-s-triazine (CAS 17766-26-6), used as 15% diluted solution, aka TMT15.
  Uncertainty: uncertainty calculated from uncertainty in average TMT15 input, of transfer coefficients in the incinerator, and the uncertainty of the waste composition of this waste
  properties: wet mass 1 kg, carbon content, fossil 0.628, dry mass 1 kg
- lubricating oil: 8.41025e-5 kg; source European Aluminium Association 2008; lognormal variance with pedigree 0.0546, pedigree (2,5,5,1,1)
  Proxy for hydraulic oil.
  EcoSpold01Location=RER
- municipal solid waste: -6.00915e-6 kg; source European Aluminium Association 2008; lognormal variance with pedigree 0.0492, pedigree (2,5,5,1,1)
  EcoSpold01Location=CH
  Reported as solid waste - unspecified. Approximated sa municipal solid waste in Althaus (2009)
- copper: 0.000406509 kg; source European Aluminium Association 2008; lognormal variance with pedigree 0.0546, pedigree (2,5,5,1,1)
  Reported as "additives". Assumed to be copper in Althaus (2009).
  EcoSpold01Location=RER
- electricity, medium voltage: 0.00185933 kWh; source European Aluminium Association 2008; lognormal variance with pedigree 0.0492, pedigree (2,5,5,1,1)
  EcoSpold01Location=UCTE
- heat, district or industrial, natural gas: 0.0054233 MJ; source European Aluminium Association 2008
  Reported as kg natural gas. Conversion to heat supplied by the combustion of natural gas based on lower heating value of natural gas and boiler efficiency (expressed as 1/fuel_use), both taken from ecoinvent reports on energy production.
- scrap copper: -1.0728e-5, -5.03334e-7 kg (2 suppliers, which the file names only by identifier); sum of these -1.12313e-5 kg; lognormal variance with pedigree 0.0492, pedigree (2,5,5,1,1)
  Reported as Byproduct of (Non-Ferrous) Metals. Copper used as a weak proxy. While no specific data found on composition, scrap Zinc would probably constitute a better proxy, but zinc scrap processing not modelled in database yet. Copper considered on recommendation of sector editor.
- waste rubber, unspecified: -0.000321964, -0.00733584 kg (2 suppliers, which the file names only by identifier); sum of these -0.0076578 kg; source European Aluminium Association 2008; lognormal variance with pedigree 0.0492, pedigree (2,5,5,1,1)
  EcoSpold01Location=CH
- waste mineral oil: -0.00010649, -2.46407e-6 kg (2 suppliers, which the file names only by identifier); sum of these -0.000108954 kg; source European Aluminium Association 2008; lognormal variance with pedigree 0.0492, pedigree (2,5,5,1,1)
  Reported as byproduct of oil for combustion.
- copper scrap, sorted, pressed: -3.74212e-5 kg; source Pierre Fréon 2014
  Waste copper wire
  production volume 0.305 kg
- extrusion, plastic pipes: 4.68908e-6 kg; source Pierre Fréon 2014
  Proxy for manufacture of plastic parts
- aluminium scrap, post-consumer: -0.000126097 kg; source Pierre Fréon 2014
  Weste aluminium
  production volume 0.245 kg
- aluminium alloy, metal matrix composite: 6.52219e-6 kg; source Pierre Fréon 2014; triangular min 6.52219e-6, mostLikely 6.52219e-6, max 6.52219e-6, pedigree (4,2,1,1,1)
  Al alloy for marine electric motor construction
  Uncertainty: Data from 24 motors
- metal working, average for steel product manufacturing: 0.00248216 kg; source Pierre Fréon 2014
  Marine electric motor construction
- steel, chromium steel 18/8: 6.43212e-5 kg; source Pierre Fréon 2014; triangular min 6.43212e-5, mostLikely 6.43212e-5, max 6.43212e-5, pedigree (4,2,1,1,1)
  Chromium steel for marine electric motor construction
  Uncertainty: Data from 24 motors
- polyethylene, high density, granulate: 0.00254361 kg; source Pierre Fréon 2014; triangular min 0.00254361, mostLikely 0.00254361, max 0.00254361, pedigree (4,2,1,1,1)
  Plastic for marine electric motor construction
  Uncertainty: Data from 24 motors
- wire drawing, copper: 5.91973e-5 kg; source Pierre Fréon 2014; triangular min 5.91973e-5, mostLikely 5.91973e-5, max 5.91973e-5, pedigree (4,2,1,1,1)
  Manufacture of copper wire
  Uncertainty: Data from 24 motors
- waste plastic, mixture: -2.97936e-6, -3.3107e-7, -1.36744e-7, -1.29851e-7, -4.95493e-6, -4.3518e-8, -2.50383e-8, -2.83647e-5 kg (8 suppliers, which the file names only by identifier); sum of these -3.69652e-5 kg; source Pierre Fréon 2014
  Waste plastic
  production volume 0.05 kg
- scrap steel: -0.00121403, -1.663e-5, -0.00310191 kg (3 suppliers, which the file names only by identifier); sum of these -0.00433257 kg; source Pierre Fréon 2014
  Representing waste chromium steel
  production volume 0.4 kg
- cast iron: 0.00117901 kg; source Pierre Fréon 2014; triangular min 0.00117901, mostLikely 0.00117901, max 0.00117901, pedigree (3,4,3,5,2)
  Cast iron for marine diesel engine construction
  Uncertainty: Materials data from Reenaas, M. (2005). SOLIDE OXIDE FUEL CELL COMBINED WITH GAS TURBINE VERSUS DIESEL ENGINE AS AUXILIARY POWER PRODUCING UNIT. Masters Dissertation. Industrial Ecology, NTNU. No uncertainty data was available, so a 10% error was assumed.
- sulfuric acid: 1.94152e-5, 8.64562e-7 kg (2 suppliers, which the file names only by identifier); sum of these 2.02798e-5 kg; lognormal variance with pedigree 0.0521, pedigree (1,4,5,3,1)
  Data of 1 European plant - reported in Fisher (2006)
  EcoSpold01Location=RER
  Uncertainty: data of 1 European plant - reported in Fisher (2006)
- electricity, medium voltage: 0.00104894, 3.71269e-6, 7.12416e-7, 1.88734e-10, 2.57604e-7, 2.39305e-7, 5.23213e-5, 1.40913e-11, 3.34604e-10, 6.2284e-10 kWh (10 suppliers, which the file names only by identifier); sum of these 0.00110619 kWh; lognormal variance with pedigree 0.0032, pedigree (1,3,3,1,1)
  Amount and activity link based on primary data collected from participating companies.
- copper sulfate: 1.19689e-7 kg; lognormal variance with pedigree 0.0032, pedigree (1,3,3,1,1)
  Amount and activity link based on primary data collected from participating companies.
- diesel: 6.78972e-8, 6.18714e-6, 3.60874e-13 kg (3 suppliers, which the file names only by identifier); sum of these 6.25504e-6 kg; lognormal variance with pedigree 0.0032, pedigree (1,3,3,1,1)
  Amount and activity link based on primary data collected from participating companies. Emissions from diesel combustion included in dataset.
- tap water: 0.243447 kg; lognormal variance with pedigree 0.0032, pedigree (1,3,3,1,1)
  Amount and activity link based on primary data collected from participating companies.
- steel, low-alloyed: 0.0037374 kg; lognormal variance with pedigree 0.0032, pedigree (1,3,3,1,1)
  Amount and activity link based on primary data collected from participating companies.
- concrete, normal: 2.47784e-8 m3; lognormal variance with pedigree 0.0032, pedigree (1,3,3,1,1)
  Amount and activity link based on primary data collected from participating companies.
- waste wood, post-consumer: -0.000929082 kg; lognormal variance with pedigree 0.0032, pedigree (1,3,3,1,1)
  Amount and activity link based on primary data collected from participating companies.
  production volume 527319 kg
- transport, freight, sea, bulk carrier for dry goods: 2.41224e-9 metric ton*km; lognormal variance with pedigree 0.1226, pedigree (1,3,3,1,1)
  Inbound transport of materials to sites. Amount and activity link based on primary data collected from participating companies.
- used Li-ion battery: -0.000361652 kg; lognormal variance with pedigree 0.0032, pedigree (1,3,3,1,1)
  Amount and activity link based on primary data collected from participating companies.
  production volume 30057 kg
- non-sulfidic overburden, off-site: -0.000171087 kg; lognormal variance with pedigree 0.0032, pedigree (1,3,3,1,1)
  Amount and activity link based on primary data collected from participating companies.
  production volume 3.33704e11 kg
- pig iron: 5.79443e-5 kg; lognormal variance with pedigree 0.0032, pedigree (1,3,3,1,1)
  Amount and activity link based on primary data collected from participating companies.
- inert waste: -1.19522e-8, -1.02941e-10, -4.52949e-5 kg (3 suppliers, which the file names only by identifier); sum of these -4.5307e-5 kg; lognormal variance with pedigree 0.0032, pedigree (1,3,3,1,1)
  Amount and activity link based on primary data collected from participating companies.
  production volume 9.14737e6 kg
- lubricating oil: 0.000369184 kg; lognormal variance with pedigree 0.0032, pedigree (1,3,3,1,1)
  Amount and activity link based on primary data collected from participating companies.
- hazardous waste, for incineration: -1.41876e-6, -3.70855e-8, -2.26042e-8 kg (3 suppliers, which the file names only by identifier); sum of these -1.47845e-6 kg; lognormal variance with pedigree 0.0032, pedigree (1,3,3,1,1)
  Amount and activity link based on primary data collected from participating companies.
  production volume 6.58402e7 kg
- sulfidic tailings, from zinc-lead mine operation: -2.18057e-5, -3.06974e-6, -2.68867e-6, -5.69489e-6, -1.11357e-6, -7.38854e-6, -3.91656e-6, -1.25415e-5 kg (8 suppliers, which the file names only by identifier); sum of these -5.82192e-5 kg; lognormal variance with pedigree 0.0032, pedigree (1,3,3,1,1)
  Amount and activity link based on primary data collected from participating companies.
  production volume 1.13556e11 kg
- nylon 6: 1.36667e-6, 3.29755e-7 kg (2 suppliers, which the file names only by identifier); sum of these 1.69643e-6 kg; lognormal variance with pedigree 0.0032, pedigree (1,3,3,1,1)
  Amount and activity link based on primary data collected from participating companies.
- transport, freight, lorry 16-32 metric ton, EURO3: 6.17271e-9, 1.51555e-8 metric ton*km (2 suppliers, which the file names only by identifier); sum of these 2.13282e-8 metric ton*km; lognormal variance with pedigree 0.1226, pedigree (1,3,3,1,1)
  (same comment as for transport, freight, sea, bulk carrier for dry goods)
- waste mineral oil: -0.000298361 kg; lognormal variance with pedigree 0.0032, pedigree (1,3,3,1,1)
  Amount and activity link based on primary data collected from participating companies.
  production volume 1.91672e6 kg
- municipal solid waste: -3.12336e-9, -2.1856e-9, -9.77324e-7, -5.72665e-6 kg (4 suppliers, which the file names only by identifier); sum of these -6.70928e-6 kg; lognormal variance with pedigree 0.0032, pedigree (1,3,3,1,1)
  Amount and activity link based on primary data collected from participating companies.
  production volume 2.68043e7 kg
- waste rubber, unspecified: -0.000243417 kg; lognormal variance with pedigree 0.0032, pedigree (1,3,3,1,1)
  Amount and activity link based on primary data collected from participating companies.
  production volume 7904.23 kg
- scrap copper: -2.15997e-5 kg; lognormal variance with pedigree 0.0032, pedigree (1,3,3,1,1)
  Amount and activity link based on primary data collected from participating companies.
  production volume 1.09065e6 kg
- quicklime, in pieces, loose: 8.82036e-13, 5.32984e-8 kg (2 suppliers, which the file names only by identifier); sum of these 5.32993e-8 kg; lognormal variance with pedigree 0.0032, pedigree (1,3,3,1,1)
  Amount and activity link based on primary data collected from participating companies.
- oxygen, liquid: 3.67042e-7, 1.33517e-6 kg (2 suppliers, which the file names only by identifier); sum of these 1.70221e-6 kg; lognormal variance with pedigree 0.0032, pedigree (1,3,3,1,1)
  Amount and activity link based on primary data collected from participating companies.
- battery separator: 4.58356e-8 kg; lognormal variance with pedigree 0.0207, pedigree (2,4,4,3,1)
  EcoSpold01Location=CN
- aluminium, wrought alloy: 0.00512186 kg; lognormal variance with pedigree 0.0207, pedigree (2,4,4,3,1)
  EcoSpold01Location=RER
- ethylene carbonate: 1.36315e-7 kg; lognormal variance with pedigree 0.0207, pedigree (2,4,4,3,1)
  EcoSpold01Location=CN
- extrusion, plastic film: 6.81589e-6 kg; lognormal variance with pedigree 0.0207, pedigree (2,4,4,3,1)
  EcoSpold01Location=RER
- anode, graphite, for lithium-ion battery: 3.42646e-7 kg; lognormal variance with pedigree 0.0207, pedigree (2,4,4,3,1)
  EcoSpold01Location=CN
- polyethylene, low density, granulate: 1.3379e-7 kg; lognormal variance with pedigree 0.0207, pedigree (2,4,4,3,1)
  EcoSpold01Location=RER
- sheet rolling, aluminium: 2.08977e-7 kg; lognormal variance with pedigree 0.3207, pedigree (2,4,4,3,1)
  EcoSpold01Location=RER
- heat, district or industrial, natural gas: 3.38863e-5 MJ; lognormal variance with pedigree 0.0381, pedigree (4,4,4,3,1)
  EcoSpold01Location=RER
- cathode, LiMn2O4, for lithium-ion battery: 2.79225e-7 kg; lognormal variance with pedigree 0.0207, pedigree (2,4,4,3,1)
  EcoSpold01Location=CN
- printed wiring board, surface mounted, unspecified, Pb free: 5.76403e-7 kg; lognormal variance with pedigree 0.0101, pedigree (1,4,4,3,1)
  This original value from production mix has been replaced by 2 flows. Pb-containing has a share of 0.3, Pb-free has a share of 0.7.
- printed wiring board, surface mounted, unspecified, Pb containing: 4.16572e-7 kg; lognormal variance with pedigree 0.0101, pedigree (1,4,4,3,1)
  (same comment as for printed wiring board, surface mounted, unspecified, Pb free)
- battery cell, Li-ion: 8.32462e-8 kg; lognormal variance with pedigree 0.0101, pedigree (1,4,4,3,1)
  EcoSpold01Location=CN
- reinforcing steel: 0.000666199 kg; lognormal variance with pedigree 0.0287, pedigree (2,4,4,3,3)
  EcoSpold01Location=RER
- sheet rolling, steel: 5.18227e-5 kg; lognormal variance with pedigree 0.0287, pedigree (2,4,4,3,3)
  EcoSpold01Location=RER
- battery, Li-ion, rechargeable, prismatic: 0.000212002 kg; source Carrier 2014; lognormal variance with pedigree 0.0186, pedigree (4,5,3,1,1)
  Literature value (Carrier, 2014, Operation and service for 69RG15 generator set units, http://dms.hvacpartners.com//docs/2000/Public/04/T-361.pdf, accessed 20141218).
- zinc coat, pieces: 0.000208716 m2; lognormal variance with pedigree 0.0186, pedigree (4,5,3,1,1)
  Calculated value based on estimates.
  The dimentions of the genset are approximatelly 2.4*1*0.7m.
- steel, low-alloyed, hot rolled: 0.00911524 kg; lognormal variance with pedigree 0.0186, pedigree (4,5,3,1,1)
  Calculated value.
- metal working, average for aluminium product manufacturing: 1.1854e-6 kg; lognormal variance with pedigree 0.0186, pedigree (4,5,3,1,1)
  Calculated.
- welding, arc, steel: 3.5884e-5 m; lognormal variance with pedigree 0.0186, pedigree (4,5,3,1,1)
  Estimated.
- electronics, for control units: 8.98083e-5 kg; source Carrier 2014; lognormal variance with pedigree 0.0186, pedigree (4,5,3,1,1)
  Estimated based on literature.
- aluminium alloy, AlMg3: 0.00111883 kg; lognormal variance with pedigree 0.0267, pedigree (2,2,4,1,3)
  EcoSpold01Location=RER
  Estimation:5% of aluminium parts replaced
  Uncertainty: Estimation:5% of aluminium parts replaced
- waste plastic, mixture: -0.00241248 kg; lognormal variance with pedigree 0.0341, pedigree (4,2,4,1,3)
  Plastics to municipal incineration
  EcoSpold01Location=CH
  Uncertainty: plastics to municipal incineration
  production volume 1.0088 kg
- section bar extrusion, aluminium: 0.00110505 kg; lognormal variance with pedigree 0.0961, pedigree (4,2,4,1,4)
  EcoSpold01Location=RER
  Assumption for pipe drawing
  Uncertainty: Assumption for pipe drawing
- tap water: 0.0761478 kg; lognormal variance with pedigree 0.0092, pedigree (2,3,4,1,1)
  Assumption based on: Cherry, C.R. 2007, 1488 liters waste water for all production phases (incl. Battery manufacturing --> 50%)
  EcoSpold01Location=RER
  Uncertainty: Assumption based on: Cherry, C.R. 2007, 1488 liters waste water for all production phases (incl. Battery manufacturing --> 50%)
- chromium steel removed by turning, average, conventional: 0.000698982 kg; lognormal variance with pedigree 0.0961, pedigree (4,2,4,1,4)
  Assumption
  EcoSpold01Location=RER
  Uncertainty: Assumption
- polyurethane, flexible foam: 6.04019e-5 kg; lognormal variance with pedigree 0.0267, pedigree (2,2,4,1,3)
  Estimation: saddle once replaced, Scooter: no replacement
  EcoSpold01Location=RER
  Uncertainty: Estimation: saddle once replaced, Scooter: no replacement
- synthetic rubber: 0.0154322 kg; lognormal variance with pedigree 0.0267, pedigree (2,2,4,1,3)
  EcoSpold01Location=RER
  Estimation: 3.75 (bike)/3 (scooter) tyre-sets use in life-time
  Uncertainty: Estimation: 3.75 (bike)/3 (scooter) tyre-sets use in life-time
- injection moulding: 0.00261253 kg; lognormal variance with pedigree 0.0961, pedigree (4,2,4,1,4)
  EcoSpold01Location=RER
  Assumption
  Uncertainty: Assumption
- lead: 0.000331439 kg; lognormal variance with pedigree 0.0341, pedigree (4,2,4,1,3)
  Estimation: 2 batteries per 50000km
  EcoSpold01Location=RER
  Uncertainty: Estimation: 2 batteries per 50000km
- used Ni-metal hydride battery: -0.000182666 kg; lognormal variance with pedigree 0.0267, pedigree (2,2,4,1,3)
  EcoSpold01Location=GLO
  Amount of S-Pb batteries replaced
  Uncertainty: Amount of S-Pb batteries replaced
  production volume 0.341561 kg
- alkyd paint, white, without solvent, in 60% solution state: 0.000131673 kg; lognormal variance with pedigree 0.1287, pedigree (4,3,5,3,4)
  EcoSpold01Location=RER
  Uncertainty: weight ratio scooter:passenger car
- aluminium, cast alloy: 9.19999e-5 kg; lognormal variance with pedigree 0.1287, pedigree (4,3,5,3,4)
  15 kg aluminium, production mix.
  0.32: part of aluminium cast alloy in aluminium, production mix. Based on the aluminium, production mix in ecoinvent v2.2.
  Uncertainty: 15 kg
- chromium: 6.37243e-8 kg; lognormal variance with pedigree 0.1287, pedigree (4,3,5,3,4)
  EcoSpold01Location=RER
  Uncertainty: weight ratio scooter:passenger car
- polyvinylchloride, suspension polymerised: 1.09514e-5 kg; lognormal variance with pedigree 0.0446, pedigree (4,3,4,1,3)
  EcoSpold01Location=RER
  Uncertainty: 15% of passenger car
- tap water: 0.0115643 kg; lognormal variance with pedigree 0.1287, pedigree (4,3,5,3,4)
  EcoSpold01Location=RER
  Uncertainty: weight ratio scooter:passenger car
- used motor scooter: -3.85876e-7 unit; lognormal variance with pedigree 0.3086, pedigree (2,1,4,1,1)
  Uncertainty: Estimation: Scooter 50'000km
  production volume 1.32237 unit
- wire drawing, copper: 0.000293834 kg; lognormal variance with pedigree 0.1287, pedigree (4,3,5,3,4)
  activityLink introduced to establish a direct link to the corresponding regional supply of this product
  Uncertainty: weight ratio scooter:passenger car
- section bar rolling, steel: 0.00190461 kg; lognormal variance with pedigree 0.1287, pedigree (4,3,5,3,4)
  (same comment as for wire drawing, copper)
- polyvinylchloride, emulsion polymerised: 1.5757e-6 kg; lognormal variance with pedigree 0.0446, pedigree (4,3,4,1,3)
  EcoSpold01Location=RER
  Uncertainty: 15% of passenger car
- nickel, 99.5%: 3.71735e-8 kg; lognormal variance with pedigree 0.1287, pedigree (4,3,5,3,4)
  EcoSpold01Location=GLO
  Uncertainty: weight ratio scooter:passenger car
- zinc: 2.88336e-7 kg; lognormal variance with pedigree 0.1287, pedigree (4,3,5,3,4)
  EcoSpold01Location=RER
  Uncertainty: weight ratio scooter:passenger car
- polypropylene, granulate: 7.66923e-5 kg; lognormal variance with pedigree 0.0446, pedigree (4,3,4,1,3)
  EcoSpold01Location=RER
  Uncertainty: 15% of passenger car
- heat, district or industrial, other than natural gas: 0.00621736 MJ; lognormal variance with pedigree 0.0346, pedigree (4,3,4,1,3)
  EcoSpold01Location=RER
  Uncertainty: 50% of Environmental report Honda, 2008
- ethylene, average: 2.43477e-7 kg; lognormal variance with pedigree 0.1287, pedigree (4,3,5,3,4)
  EcoSpold01Location=RER
  Uncertainty: weight ratio scooter:passenger car
- sheet rolling, steel: 0.0102533 kg; lognormal variance with pedigree 0.0446, pedigree (4,3,4,1,3)
  activityLink introduced to establish a direct link to the corresponding regional supply of this product
  Uncertainty: 5% of passenger car
- section bar rolling, steel: 8.76669e-5 kg; lognormal variance with pedigree 0.1306, pedigree (4,3,5,5,4)
  EcoSpold01Location=RER
  Uncertainty: weight ratio scooter:passenger car
- injection moulding: 7.54985e-5 kg; lognormal variance with pedigree 0.1306, pedigree (4,3,5,5,4)
  EcoSpold01Location=RER
  Uncertainty: All HDPE
- alkyd paint, white, without solvent, in 60% solution state: 1.10995e-5 kg; lognormal variance with pedigree 0.1306, pedigree (4,3,5,5,4)
  EcoSpold01Location=RER
  Uncertainty: weight ratio scooter:passenger car
- heat, district or industrial, other than natural gas: 2.02241e-5, 9.42503e-7 MJ (2 suppliers, which the file names only by identifier); sum of these 2.11666e-5 MJ; lognormal variance with pedigree 0.0366, pedigree (4,3,4,5,3)
  EcoSpold01Location=RER
  Uncertainty: 50% of Environmental report Honda, 2008
- tap water: 3.24345e-5, 0.00243443, 4.57871e-5, 0.00135166, 0.000273402, 0.000100021, 0.0154146 kg (7 suppliers, which the file names only by identifier); sum of these 0.0196523 kg; lognormal variance with pedigree 0.1306, pedigree (4,3,5,5,4)
  EcoSpold01Location=RER
  Uncertainty: weight ratio scooter:passenger car
- electricity, medium voltage: 9.24035e-6, 0.000156702, 0.00223976, 7.50647e-6 kWh (4 suppliers, which the file names only by identifier); sum of these 0.00241321 kWh; lognormal variance with pedigree 0.0366, pedigree (4,3,4,5,3)
  EcoSpold01Location=JP
  Uncertainty: 50% of Environmental report Honda, 2008
- ethylene, average: 3.91213e-9, 2.43826e-7 kg (2 suppliers, which the file names only by identifier); sum of these 2.47739e-7 kg; lognormal variance with pedigree 0.1306, pedigree (4,3,5,5,4)
  EcoSpold01Location=RER
  Uncertainty: weight ratio scooter:passenger car
- decommissioned road: -1.19014e-7 m*year; lognormal variance with pedigree 0.428, pedigree (4,1,5,1,4)
  Allocation of road use according to gross ton kilometre performance
  EcoSpold01Location=RER
  Uncertainty: allocation of road use according to gross ton kilometre performance
  production volume 1.781e-6 m*year
- used electric bicycle: -1.49989e-7 unit; lognormal variance with pedigree 0.3086, pedigree (2,1,4,1,1)
  Estimation: eBike 15'000km
  EcoSpold01Location=CH
  Uncertainty: Estimation: eBike 15'000km
  production volume 2.24454e-6 unit
- energy use and operation emissions, electric bicycle, label-certified electricity: 0.000563134 km; lognormal variance with pedigree 0.128, pedigree (1,1,4,1,1)
  EcoSpold01Location=CH
  Defined by laws and physics;activityLink introduced to establish a direct link to the corresponding regional supply of this product
  Uncertainty: defined by laws and physics
- maintenance, electric bicycle: 7.49947e-8 unit; lognormal variance with pedigree 0.3086, pedigree (2,1,4,1,1)
  Estimation: eBike 15'000km
  EcoSpold01Location=CH
  Uncertainty: Estimation: eBike 15'000km
- electric bicycle: 1.49989e-7 unit; lognormal variance with pedigree 0.3086, pedigree (2,1,4,1,1)
  Estimation: eBike 15'000km
  EcoSpold01Location=RER
  Uncertainty: Estimation: eBike 15'000km
- energy use and operation emissions, electric bicycle, label-certified electricity: 0.000563134 km; lognormal variance with pedigree 0.13, pedigree (1,1,4,5,1)
  EcoSpold01Location=CH
  Defined by laws and physics
  Uncertainty: defined by laws and physics
- maintenance, electric bicycle: 7.49947e-8 unit; lognormal variance with pedigree 0.3106, pedigree (2,1,4,5,1)
  EcoSpold01Location=CH
  Estimation: eBike 15'000km
  Uncertainty: Estimation: eBike 15'000km
- road: 1.48451e-6 m*year; lognormal variance with pedigree 0.43, pedigree (4,1,5,5,4)
  EcoSpold01Location=CH
  Allocation of road use according to gross ton kilometre performance
  Uncertainty: allocation of road use according to gross ton kilometre performance
- electricity, medium voltage: 0.000212481 kWh; lognormal variance with pedigree 0.05, pedigree (1,1,4,5,1)
  composite
  EcoSpold01Location=CN
- section bar extrusion, aluminium: 2.77844e-5 kg; lognormal variance with pedigree 0.0981, pedigree (4,2,4,5,4)
  Assumption for pipe drawing
  EcoSpold01Location=RER
  Uncertainty: Assumption for pipe drawing
- chromium steel removed by turning, average, conventional: 6.09101e-6 kg; lognormal variance with pedigree 0.0981, pedigree (4,2,4,5,4)
  Assumption
  EcoSpold01Location=RER
  Uncertainty: Assumption
- polyurethane, flexible foam: 3.25903e-8 kg; lognormal variance with pedigree 0.0287, pedigree (2,2,4,5,3)
  EcoSpold01Location=RER
  Estimation: saddle once replaced, Scooter: no replacement
  Uncertainty: Estimation: saddle once replaced, Scooter: no replacement
- waste plastic, mixture: -1.99387e-6 kg; lognormal variance with pedigree 0.0361, pedigree (4,2,4,5,3)
  EcoSpold01Location=CH
  Plastics to municipal incineration
  Uncertainty: plastics to municipal incineration
  production volume 3.0264 kg
- tap water: 4.2122e-8 kg; lognormal variance with pedigree 0.0112, pedigree (2,3,4,5,1)
  (same comment as for tap water)
- electricity, medium voltage: 0.00724967 kWh; lognormal variance with pedigree 0.0767, pedigree (4,3,5,3,3)
  Estimated - from CRT treatment activities
  EcoSpold01Location=UCTE
  Uncertainty: estimated - from CRT treatment activities
- polystyrene foam slab: 8.91947e-7 kg; source von Geibler J. 2003; lognormal variance with pedigree 0.0701, pedigree (1,4,5,3,3)
  EcoSpold01Location=RER
  Literature Value.
- packaging film, low density polyethylene: 6.24999e-7 kg; source von Geibler J. 2003; lognormal variance with pedigree 0.0701, pedigree (1,4,5,3,3)
  Literature Value.
  EcoSpold01Location=RER
- polystyrene, high impact: 3.78481e-5 kg; source von Geibler J. 2003; lognormal variance with pedigree 0.0701, pedigree (1,4,5,3,3)
  EcoSpold01Location=RER
  Literature Value.
- steel, chromium steel 18/8, hot rolled: 0.00136818 kg; source von Geibler J. 2003; lognormal variance with pedigree 0.0701, pedigree (1,4,5,3,3)
  Literature Value.
  EcoSpold01Location=RER
- wastewater, unpolluted: -1.61352e-6, -0.000200076 m3 (2 suppliers, which the file names only by identifier); sum of these -0.00020169 m3; source Fujitsu L. 2003; lognormal variance with pedigree 0.0701, pedigree (1,4,5,3,3)
  Literature Value.
  EcoSpold01Location=CH
  production volume 1.62 m3
- waste polystyrene: -3.47729e-5, -9.18234e-10, -3.79264e-10, -3.60138e-10, -1.37427e-8, -1.53218e-10, -6.94446e-11, -9.62065e-8 kg (8 suppliers, which the file names only by identifier); sum of these -3.48847e-5 kg; source von Geibler J. 2003; lognormal variance with pedigree 0.0701, pedigree (1,4,5,3,3)
  Literature Value.
  EcoSpold01Location=CH
  production volume 0.089 kg
- waste polyethylene: -1.09978e-5, -7.52181e-9, -3.10678e-9, -2.95016e-9, -1.12575e-7, -1.2551e-9, -5.68862e-10, -1.72983e-7 kg (8 suppliers, which the file names only by identifier); sum of these -1.12987e-5 kg; source von Geibler J. 2003; lognormal variance with pedigree 0.0701, pedigree (1,4,5,3,3)
  EcoSpold01Location=CH
  Literature Value.
  production volume 0.051 kg
- waste electric and electronic equipment: -1.12948e-5 kg; lognormal variance with pedigree 0.134, pedigree (3,4,5,1,4)
  Rough estimation
  EcoSpold01Location=GLO
  Uncertainty: rough estimation
  production volume 0.347424 kg
- used printed wiring boards: -1.60251e-7 kg; lognormal variance with pedigree 0.054, pedigree (3,4,5,1,1)
  Calculated - based on composition data
  EcoSpold01Location=GLO
  Uncertainty: calculated - based on composition data
  production volume 0.016478 kg
- metal working, average for steel product manufacturing: 0.000150848 kg; lognormal variance with pedigree 0.004425, pedigree (2,3,3,2,2)
  Measured value: represent the working of the steel-based auxiliaries
  Uncertainty: Default value from Table 10.3. DQG
- metal working, average for aluminium product manufacturing: 5.53487e-6 kg; lognormal variance with pedigree 0.0032, pedigree (1,3,3,1,1)
  Measured value: represent the working of the aluminium required for the copensation of the deterioration of the moulds
  Uncertainty: Default value from Table 10.3. DQG
- extrusion, plastic pipes: 7.32296e-7 kg; lognormal variance with pedigree 0.004425, pedigree (2,3,3,2,2)
  Measured value: represents the working of the tetrafluorethylene based auxilliaries
  Uncertainty: Default value from Table 10.3. DQG
- waste plastic, mixture: -1.92093e-6 kg; lognormal variance with pedigree 0.004425, pedigree (2,3,3,2,2)
  Measured value: represents the total amount of mono materials recycled externally.
  Uncertainty: Default value taken fromTable 10.3. DQG
  production volume 886635 kg
- extrusion, plastic film: 1.49089e-6 kg; lognormal variance with pedigree 0.004425, pedigree (2,3,3,2,2)
  Measured value: represents the foaming of the plastic caps
  Uncertainty: Default value from Table 10.3. DQG
- used glider, from electric scooter: -8.74994e-7 kg
  production volume 6.213e7 kg
- heat, district or industrial, natural gas: 0.0120009 MJ; source M. Leuenberger 2010; lognormal variance with pedigree 0.0366, pedigree (4,3,4,5,3)
  EcoSpold01Location=RER
  50% of Environmental report Honda, 2008
  Uncertainty: 50% of Environmental report Honda, 2008
- heat, district or industrial, other than natural gas: 3.55053e-5 MJ; source M. Leuenberger 2010; lognormal variance with pedigree 0.0366, pedigree (4,3,4,5,3)
  50% of Environmental report Honda, 2008
  EcoSpold01Location=RER
  Uncertainty: 50% of Environmental report Honda, 2008
- aluminium scrap, new: -2.66508e-8, -1.99385e-7 kg (2 suppliers, which the file names only by identifier); sum of these -2.26035e-7 kg; lognormal variance with pedigree 0.0518, pedigree (2,4,5,4,3)
  Production waste. Waste factors taken from F. Habermacher 2011.
  production volume 1.05621e6 kg
- acrylonitrile-butadiene-styrene copolymer: 5.25877e-6 kg; source F. Habermacher 2011; lognormal variance with pedigree 0.0424, pedigree (1,3,5,4,2)
  Materialization based on average from literature values.
- glass fibre reinforced plastic, polyester resin, hand lay-up: 2.38338e-5 kg; source F. Habermacher 2011; lognormal variance with pedigree 0.0424, pedigree (1,3,5,4,2)
  Materialization based on average from literature values.
- flat glass, uncoated: 1.13308e-5, 3.93866e-5 kg (2 suppliers, which the file names only by identifier); sum of these 5.07174e-5 kg; source F. Habermacher 2011; lognormal variance with pedigree 0.0424, pedigree (1,3,5,4,2)
  Materialization based on average from literature values.
- waste plastic, industrial electronics: -2.27436e-6, -8.14214e-11 kg (2 suppliers, which the file names only by identifier); sum of these -2.27445e-6 kg; source F. Habermacher 2011; lognormal variance with pedigree 0.0424, pedigree (1,3,5,4,2)
  Scrap fraction from production process.Details in F. Habermacher "Modeling material inventories and environmental impacts of electric passenger cars", Matser Thesis, Department of Environmental Sciences, ETH Zurich, 2011.
  production volume 2.496e8 kg
- epoxy resin, liquid: 8.04784e-7, 3.86346e-7 kg (2 suppliers, which the file names only by identifier); sum of these 1.19113e-6 kg; source F. Habermacher 2011; lognormal variance with pedigree 0.0424, pedigree (1,3,5,4,2)
  Materialization based on average from literature values.
- ethylene glycol: 4.34527e-8 kg; source H.-J. Althaus 2010; lognormal variance with pedigree 0.0444, pedigree (2,4,5,4,2)
  Based on a Volkswagen Golf A4 materialization.
- used internal combustion engine, from passenger car: -1.70707e-6 kg; source H.-J. Althaus 2010
  production volume 1.65e10 kg
- polyphenylene sulfide: 1.70707e-7 kg; source H.-J. Althaus 2010; lognormal variance with pedigree 0.0444, pedigree (2,4,5,4,2)
  Based on a Volkswagen Golf A4 materialization.
- electric motor, electric passenger car: 2.48989e-7 kg
- used powertrain from electric passenger car, manual dismantling: -3.76865e-7 kg; source F. Habermacher 2011
  production volume 721980 kg
- inverter, for electric passenger car: 4.463e-8 kg; source F. Habermacher 2011; lognormal variance with pedigree 0.0058, pedigree (1,4,3,4,2)
  This electric drivetrain and the data describing each component is based on direct information from the Swiss manufacturer Brusa.
- used powertrain, from electric scooter: -1.06787e-6 kg
  production volume 7.79228e6 kg
- electric motor, for electric scooter: 6.13231e-7 kg; lognormal variance with pedigree 0.0198, pedigree (2,4,4,4,3)
  Based on current available technology.
- charger, for electric scooter: 3.19832e-7 kg; lognormal variance with pedigree 0.0198, pedigree (2,4,4,4,3)
  Based on current available technology.
- controller, for electric scooter: 1.34276e-7 kg; lognormal variance with pedigree 0.0198, pedigree (2,4,4,4,3)
  Based on current available technology.
- concrete, normal: 9.83783e-8 m3; lognormal variance with pedigree 0.008, pedigree (1,1,4,1,1)
  Calculated Value.
  EcoSpold01Location=CH
  Uncertainty: Calculated variable. Uncertainty will be determined from propagation of uncertainty factors of underlying variables.
- waste reinforcement steel: -0.000193334 kg; lognormal variance with pedigree 0.008, pedigree (1,1,4,1,1)
  Estimation. Based on material input.
  EcoSpold01Location=CH
  Uncertainty: Calculated variable. Uncertainty will be determined from propagation of uncertainty factors of underlying variables.
  production volume 976317 kg
- waste polyvinylchloride: -1.07867e-5 kg; lognormal variance with pedigree 0.008, pedigree (1,1,4,1,1)
  EcoSpold01Location=CH
  Estimation. Based on material input.
  Uncertainty: Calculated variable. Uncertainty will be determined from propagation of uncertainty factors of underlying variables.
  production volume 45060.8 kg
- polyethylene, linear low density, granulate: 4.86431e-6 kg; lognormal variance with pedigree 0.008, pedigree (1,1,4,1,1)
  Calculated Value.
  Uncertainty: Calculated variable. Uncertainty will be determined from propagation of uncertainty factors of underlying variables.
- waste reinforced concrete: -7.96908e-5 kg; lognormal variance with pedigree 0.008, pedigree (1,1,4,1,1)
  (same comment as for waste reinforcement steel)
  production volume 11540 kg
- charcoal: 2.19192e-7 kg; lognormal variance with pedigree 0.008, pedigree (1,1,4,1,1)
  (same comment as for polyethylene, linear low density, granulate)
- waste glass pane in burnable frame: -2.55574e-5 kg; lognormal variance with pedigree 0.008, pedigree (1,1,4,1,1)
  (same comment as for waste polyvinylchloride)
  production volume 75101.3 kg
- polyvinylchloride, bulk polymerised: 3.05799e-5 kg; lognormal variance with pedigree 0.008, pedigree (1,1,4,1,1)
  Calculated Value.
  EcoSpold01Location=RER
  Uncertainty: Calculated variable. Uncertainty will be determined from propagation of uncertainty factors of underlying variables.
- polyurethane, rigid foam: 6.68767e-6, 4.99538e-6 kg (2 suppliers, which the file names only by identifier); sum of these 1.1683e-5 kg; lognormal variance with pedigree 0.008, pedigree (1,1,4,1,1)
  (same comment as for polyethylene, linear low density, granulate)
- waste wood, untreated: -2.44205e-6 kg; lognormal variance with pedigree 0.008, pedigree (1,1,4,1,1)
  Estimation. Based on material input.
  Uncertainty: Calculated variable. Uncertainty will be determined from propagation of uncertainty factors of underlying variables.
  production volume 1216.28 kg
- silica sand: 0.00129486 kg; lognormal variance with pedigree 0.008, pedigree (1,1,4,1,1)
  Calculated Value.
  EcoSpold01Location=DE
  Uncertainty: Calculated variable. Uncertainty will be determined from propagation of uncertainty factors of underlying variables.
- municipal solid waste: -3.80046e-8 kg; lognormal variance with pedigree 0.008, pedigree (1,1,4,1,1)
  (same comment as for waste wood, untreated)
  production volume 29815.9 kg
- waste reinforcement steel: -2.73758e-5 kg; lognormal variance with pedigree 0.008, pedigree (1,1,4,1,1)
  (same comment as for waste reinforcement steel)
  production volume 178160 kg
- waste glass pane in burnable frame: -8.59749e-6 kg; lognormal variance with pedigree 0.008, pedigree (1,1,4,1,1)
  (same comment as for waste polyvinylchloride)
  production volume 13704.6 kg
- waste reinforced concrete: -0.000547143 kg; lognormal variance with pedigree 0.008, pedigree (1,1,4,1,1)
  (same comment as for waste polyvinylchloride)
  production volume 2105.83 kg
- waste polyvinylchloride: -7.60788e-6 kg; lognormal variance with pedigree 0.008, pedigree (1,1,4,1,1)
  (same comment as for waste polyvinylchloride)
  production volume 8222.77 kg
- waste wood, untreated: -8.24753e-6 kg; lognormal variance with pedigree 0.008, pedigree (1,1,4,1,1)
  (same comment as for waste wood, untreated)
  production volume 221.948 kg
- concrete, normal: 2.79767e-7, 2.01798e-6, 4.88227e-9, 3.95254e-8, 3.17464e-9 m3 (5 suppliers, which the file names only by identifier); sum of these 2.34533e-6 m3; lognormal variance with pedigree 0.008, pedigree (1,1,4,1,1)
  EcoSpold01Location=CH
  Calculated Value.
  Uncertainty: Calculated variable. Uncertainty will be determined from propagation of uncertainty factors of underlying variables.
- municipal solid waste: -2.75001e-5 kg; lognormal variance with pedigree 0.008, pedigree (1,1,4,1,1)
  (same comment as for waste wood, untreated)
  production volume 1.9283e7 kg
- waste reinforced concrete: -0.000165006 kg; lognormal variance with pedigree 0.008, pedigree (1,1,4,1,1)
  (same comment as for waste polyvinylchloride)
  production volume 1.36192e6 kg
- waste polyvinylchloride: -1.80063e-5 kg; lognormal variance with pedigree 0.008, pedigree (1,1,4,1,1)
  (same comment as for waste polyvinylchloride)
  production volume 5.31796e6 kg
- waste wood, untreated: -2.04882e-7 kg; lognormal variance with pedigree 0.008, pedigree (1,1,4,1,1)
  (same comment as for waste wood, untreated)
  production volume 143542 kg
- polyvinylidenchloride, granulate: 8.19308e-6, 7.89783e-6 kg (2 suppliers, which the file names only by identifier); sum of these 1.60909e-5 kg; lognormal variance with pedigree 0.008, pedigree (1,1,4,1,1)
  (same comment as for polyethylene, linear low density, granulate)
- bronze: 7.01891e-6 kg; lognormal variance with pedigree 0.008, pedigree (1,1,4,1,1)
  (same comment as for polyethylene, linear low density, granulate)
- glass fibre: 1.10509e-5 kg; lognormal variance with pedigree 0.008, pedigree (1,1,4,1,1)
  (same comment as for polyethylene, linear low density, granulate)
- waste polyethylene/polypropylene product: -3.34856e-7 kg; lognormal variance with pedigree 0.008, pedigree (1,1,4,1,1)
  Calculated value. Proxy for the treatment of the epoxy resin (polyepoxide, formed from reaction of an epoxide resin with polyamine hardener). When using PrePreg in the manufacturing process, up to 10% of the PrePreg turns into waste due to cutoffs directly. The remaining amount will turn into waste/by-product after 20 years.
  Uncertainty: Calculated variable. Uncertainty will be determined from propagation of uncertainty factors of underlying variables. Uncertainty of actual relation between variables not accounted at this time, although this could be included in a future update.
  production volume 70196 kg
- waste glass: -2.34118e-5 kg; lognormal variance with pedigree 0.008, pedigree (1,1,4,1,1)
  Estimated value based on 2MW GLO dataset.
  The glass fibre reinforced plastic of the rotor is disposed of as 50% glass and 50% plastic. When using PrePreg in the manufacturing process, up to 10% of the PrePreg turns into waste due to cutoffs directly. The remaining amount will turn into waste/by-product after 20 years.
  Today, it is not possible to recycle the turbine blades. When the turbine’s lifetime expires, the blades will
  be dismantled into smaller pieces, which are deposited at controlled waste deposits.[Elsam. 2004b. Life Cycle Assessment of turbines PSO 1999. Elsam Engineering A/S, Fredericia, Denmark]
  Uncertainty: Calculated variable. Uncertainty will be determined from propagation of uncertainty factors of underlying variables. Uncertainty of actual relation between variables not accounted at this time, although this could be included in a future update.
  production volume 39127.8 kg
- electronics scrap from control units: -9.16883e-8 kg; lognormal variance with pedigree 0.008, pedigree (1,1,4,1,1)
  Calculated value
  Uncertainty: Calculated variable. Uncertainty will be determined from propagation of uncertainty factors of underlying variables. Uncertainty of actual relation between variables not accounted at this time, although this could be included in a future update.
  production volume 2425.74 kg
- excavation, hydraulic digger: 1.53679e-7 m3; lognormal variance with pedigree 0.008, pedigree (1,1,4,1,1)
  Estimated value. Same amount than the concrete in foundation
  Uncertainty: Calculated variable. Uncertainty will be determined from propagation of uncertainty factors of underlying variables. Uncertainty of actual relation between variables not accounted at this time, although this could be included in a future update.
- glass fibre reinforced plastic, polyamide, injection moulded: 1.96628e-6 kg; source ENERCON GmbH 2010, p. p. 25, Tab. 5.3; lognormal variance with pedigree 0.0147, pedigree (2,1,4,3,1)
  Literature value. Used for the rotor blades. The main materials used in the rotor blades are glass fibres and epoxy resin.
  Split between materials is based on prepeg used in the 2MW dataset.
  Prepreg is used as material for the blades in this dataset. It was not possible to get information on the exact composition of Prepreg. From the supplier’s PrePreg safety data sheets it is assumed that Prepreg consists of approx 40% epoxy and 60% glass fibre. Total Prepreg mass is 21507 kg. When using PrePreg in the manufacturing process, up to 10% of the PrePreg turns into waste due to cutoffs.
  Uncertainty: estimated variance
- sheet rolling, chromium steel: 3.99427e-5 kg; lognormal variance with pedigree 0.008, pedigree (1,1,4,1,1)
  (same comment as for electronics scrap from control units)
- waste glass: -1.91757e-6, -2.43059e-7, -2.26771e-8, -1.01349e-7, -4.56866e-5, -1.28446e-6, -5.5142e-9 kg (7 suppliers, which the file names only by identifier); sum of these -4.92612e-5 kg
  Estimation. The glass fibre reinforced plastic of the rotor is disposed of as 50% glass and 50% plastic. When using PrePreg in the manufacturing process, up to 10% of the PrePreg turns into waste due to cutoffs directly. The remaining amount will turn into waste/by-product after 20 years.
  Today, it is not possible to recycle the turbine blades. When the turbine’s lifetime expires, the blades will
  be dismantled into smaller pieces, which are deposited at controlled waste deposits.[Elsam. 2004b. Life Cycle Assessment of turbines PSO 1999. Elsam Engineering A/S, Fredericia, Denmark]
  production volume 6.64665e7 kg
- waste polyethylene/polypropylene product: -7.97059e-7, -9.04557e-5 kg (2 suppliers, which the file names only by identifier); sum of these -9.12527e-5 kg
  Calculated value. Proxy for the treatment of the epoxy resin (polyepoxide, formed from reaction of an epoxide resin with polyamine hardener). When using PrePreg in the manufacturing process, up to 10% of the PrePreg turns into waste due to cutoffs directly. The remaining amount will turn into waste/by-product after 20 years.
  production volume 8.8622e7 kg
- waste paint on wall: -9.72618e-7 kg
  Estimation. Alkyd paint at the concrete tower.
  production volume 1.52834e6 kg
- waste polyvinylchloride: -2.42525e-6, -6.15301e-7, -2.54141e-7, -2.41331e-7, -1.70307e-5, -1.35499e-6, -4.65342e-8 kg (7 suppliers, which the file names only by identifier); sum of these -2.19683e-5 kg
  Calculated value.
  production volume 2.89636e6 kg
- alkyd paint, white, without water, in 60% solution state: 1.0095e-8, 8.37589e-7 kg (2 suppliers, which the file names only by identifier); sum of these 8.47684e-7 kg; source Chataignere A. 2003, p. 46f; lognormal variance with pedigree 0.0567, pedigree (4,4,5,3,2)
  Literature value/calculated value. Used for the tower, the nacelle and the three blades.
  Sum of paint used for the tower (2411kg, directly final value) as well as for the nacelle (654 kg) and in the three blades (3*184 kg) extrapolated with accordant weight factors from a 1.5MW wind turbine.
  Uncertainty: estimated variance. higher basic uncertainty because of the extrapolation and the age of the data.
- waste paint on metal: -4.04618e-5, -3.92301e-8 kg (2 suppliers, which the file names only by identifier); sum of these -4.05011e-5 kg
  Calculated value/estimation. Paint on the nacelle and the blades.
  production volume 3.27653e6 kg
- waste wire plastic: -5.47452e-8 kg; lognormal variance with pedigree 0.008, pedigree (1,1,4,1,1)
  Calculated value
  production volume 577376 kg
- waste polyvinylchloride product: -8.00776e-7, -2.42884e-8, -2.06062e-6 kg (3 suppliers, which the file names only by identifier); sum of these -2.88568e-6 kg; lognormal variance with pedigree 0.0192, pedigree (2,5,4,5,1)
  Calculated based on the input of PVC.
  production volume 3.12211e7 kg
- blow moulding: 5.27742e-8, 2.38788e-7 kg (2 suppliers, which the file names only by identifier); sum of these 2.91562e-7 kg; lognormal variance with pedigree 0.374402, pedigree (5,5,5,5,5)
  Literature data and primary data from French manufacturers (Boulard et al, 2011). Tanks for the fertigation system.
- tractor, 4-wheel, agricultural: 1.3995e-6 kg
  Literature data and primary data from French manufacturers (Boulard et al, 2011). Tractor.
- agricultural machinery, unspecified: 4.61474e-7 kg; lognormal variance with pedigree 0.374402, pedigree (5,5,5,5,5)
  Literature data and primary data from French manufacturers (Boulard et al, 2011). Ramp and cable drum for the soil preparation system.
- concrete block: 1.83132e-6, 5.55355e-6, 2.51543e-6 kg (3 suppliers, which the file names only by identifier); sum of these 9.9003e-6 kg; lognormal variance with pedigree 0.374402, pedigree (5,5,5,5,5)
  Literature data and primary data from French manufacturers (Boulard et al, 2011). Mechanical room part of for the storage system.
- zinc coat, coils: 0.00223526, 2.8329e-5 m2 (2 suppliers, which the file names only by identifier); sum of these 0.00226359 m2; lognormal variance with pedigree 0.374402, pedigree (5,5,5,5,5)
  Literature data and primary data from French manufacturers (Boulard et al, 2011). Poles and trellis for the greenhouse structure.
- diesel, burned in building machine: 0.0127548 MJ; lognormal variance with pedigree 0.374402, pedigree (5,5,5,5,5)
  Literature data and primary data from French manufacturers (Boulard et al, 2011). Energy for building the greenhouse and retention pond.
- electricity, low voltage: 9.95267e-7, 1.85784e-9, 1.49901e-8, 4.90713e-8, 2.63839e-9, 1.7765e-8, 7.45681e-9, 6.58772e-9, 0.0119383, 1.22623e-8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 kWh (47 suppliers, which the file names only by identifier); sum of these 0.0119438 kWh; lognormal variance with pedigree 0.374402, pedigree (5,5,5,5,5)
  Literature data and primary data from French manufacturers (Boulard et al, 2011). Electricity for manufacturing of the greenhouse structure.
- polyvinylfluoride: 5.76356e-7 kg; lognormal variance with pedigree 0.374402, pedigree (5,5,5,5,5)
  Literature data and primary data from French manufacturers (Boulard et al, 2011). Cables and wires for the greenhouse structure and the CO2 injection system.
- waste concrete: -0.00945863 kg
  Concrete components sent to treatment
  production volume 0.196838 kg
- waste glass: -7.61645e-6 kg
  Flat glass sent to treatment
  production volume 0.0897395 kg
- polystyrene, expandable: 4.51154e-7 kg; lognormal variance with pedigree 0.374402, pedigree (5,5,5,5,5)
  Literature data and primary data from French manufacturers (Boulard et al, 2011). Plastic bags part of for the support system.
- drawing of pipe, steel: 3.65798e-6, 1.56354e-5 kg (2 suppliers, which the file names only by identifier); sum of these 1.92933e-5 kg; lognormal variance with pedigree 0.374402, pedigree (5,5,5,5,5)
  Literature data and primary data from French manufacturers (Boulard et al, 2011). Tubes and siphons for the heating system.
- polymer foaming: 2.10093e-6, 3.69493e-7 kg (2 suppliers, which the file names only by identifier); sum of these 2.47043e-6 kg; lognormal variance with pedigree 0.374402, pedigree (5,5,5,5,5)
  (same comment as for polystyrene, expandable)
- ethylene vinyl acetate copolymer: 9.75273e-8, 2.65119e-6 kg (2 suppliers, which the file names only by identifier); sum of these 2.74871e-6 kg; lognormal variance with pedigree 0.374402, pedigree (5,5,5,5,5)
  Literature data and primary data from French manufacturers (Boulard et al, 2011). Plastic covers for the greenhouse structure.
- polyester resin, unsaturated: 1.08812e-9, 2.95795e-8 kg (2 suppliers, which the file names only by identifier); sum of these 3.06676e-8 kg; lognormal variance with pedigree 0.374402, pedigree (5,5,5,5,5)
  Literature data and primary data from French manufacturers (Boulard et al, 2011). Roofing membrane.
- polycarbonate: 1.77249e-7 kg; lognormal variance with pedigree 0.374402, pedigree (5,5,5,5,5)
  Literature data and primary data from French manufacturers (Boulard et al, 2011). Cladding materials.
- calendering, rigid sheets: 4.5046e-9, 1.22203e-7 kg (2 suppliers, which the file names only by identifier); sum of these 1.26708e-7 kg; lognormal variance with pedigree 0.374402, pedigree (5,5,5,5,5)
  (same comment as for polycarbonate)
- silicone product: 1.03e-6, 2.60299e-9 kg (2 suppliers, which the file names only by identifier); sum of these 1.0326e-6 kg; lognormal variance with pedigree 0.374402, pedigree (5,5,5,5,5)
  Literature data and primary data from French manufacturers (Boulard et al, 2011). Silicone.
- bitumen seal: 3.80282e-7 kg; lognormal variance with pedigree 0.374402, pedigree (5,5,5,5,5)
  Literature data and primary data from French manufacturers (Boulard et al, 2011). Cement sealing in the greenhouse structure.
- waste polyvinylchloride: -9.73501e-8 kg
  Etylene vinyl acetate copolymer (plastic covers) sent to treatment
  production volume 0.0228088 kg
- acrylic varnish, without water, in 87.5% solution state: 8.86612e-10, 1.88598e-7 kg (2 suppliers, which the file names only by identifier); sum of these 1.89485e-7 kg; lognormal variance with pedigree 0.374402, pedigree (5,5,5,5,5)
  Literature data and primary data from French manufacturers (Boulard et al, 2011). Paint protection.
- blower and heat exchange unit, decentralized, 180-250 m3/h: 4.60337e-6 unit; lognormal variance with pedigree 0.422225, pedigree (1,4,2,2,5)
  Calculated value. Represents here an air-conditioning unit. The amount of exchange is calculated as: amount of input product * (lifetime of the hotel / lifetime of the product). Assumed service life of the air-conditioning unit is 15 years. Source: ASHRAE 2018. ASHRAE Equipment Life Expectancy chart. Available from: http://www.culluminc.com/wp-content/uploads/2013/02/ASHRAE_Chart_HVAC_Life_Expectancy%201.pdf Accessed 23 March 2018.
- waste concrete: -0.00993741 kg; lognormal variance with pedigree 0.122825, pedigree (1,4,2,2,5)
  Calculated value. Amount of output material is set equal to the amount of respective input material, concrete, clay brick, base plaster and foundation. Conversion is made from m3 of concrete to kg of concrete based on the density reported in the properties section for the product "concrete, normal" (see wet mass property).
  production volume 3.44868e8 kg
- door, inner, wood: 1.06556e-7 m2; lognormal variance with pedigree 0.122825, pedigree (1,4,2,2,5)
  Calculated value. The amount of exchange is calculated as: amount of input product * (lifetime of the hotel / lifetime of the product). Dimensions of a standar assumed to be 1,981 x 0,610 m and include wooden door frame. Souce: https://www.jbkind.com/info-centre/standard-door-sizes. Assumed service life of 40 years. Source: Cobut et al. 2015. The environmental footprint of interior wood doors in non-residential buildings - part 1: life cycle assessment. Journal of Cleaner Production, 109, 232-246. In terms of outputs, assumed to have gone to used door, inner, wood.
- clay brick: 0.000227242 kg; lognormal variance with pedigree 0.123425, pedigree (2,4,2,2,5)
  Calculated value. Combined of all instances of use across the building structure and walls. Assumed density of bricks = 1922 kg/m3. Source: The calculator site, 2018. Construction. Available from: https://www.thecalculatorsite.com/conversions/substances/construction.php. Accessed 13 January 2018. Assumed service life of 75 years which is equal to the service life of the hotel building with minor refurbishments throughout. In terms of outputs assumed to have gone to waste concrete.
- glass wool mat: 1.04983e-6 kg; lognormal variance with pedigree 0.123425, pedigree (2,4,2,2,5)
  Calculated value. Used here in place of acustic tile as a more conventional product. The amount of exchange is calculated as: amount of input product * (lifetime of the hotel / lifetime of the product). Combined of all instances of use across the building structure, walls and ceiling. Assumed service life of 75 years which is equal to the service life of the hotel building with minor refurbishments throughout. Assumed thickiness of glass wool 100 mm. Source: Knauf Insulation 2018. Knauf Insulation. Available from: http://www.knaufinsulation.co.uk/products/glass-mineral-wool-rolls/loft-insulation-rolls/earthwool-loft-roll-44 Accessed 16 March 2018. The density of glass wool is assumed to be 40 kg/m3 based on the specifications in ecoinvent dataset "glass wool mat production, CH 2000" accessed 22 Janaury 2018. In terms of outputs, assumed to have gone to waste glass.
- ceramic tile: 4.03623e-5 kg; lognormal variance with pedigree 0.122825, pedigree (1,4,2,2,5)
  Calculated value. The amount of exchange is calculated as: amount of input product * (lifetime of the hotel / lifetime of the product). Combined of all instances of use across the building floor. Assuming 12.3 kg of tiles is required to cover 1 m2 of floor area. Source: Victoria Plumbing 2018. British ceramic tile. Available from: https://victoriaplum.com/product/british-ceramic-tile-metro-bevel-white-gloss-tile-100mm-x-200mm Accessed 16 March 2018. Assumed service life of 5 years for floor ceramic tile which is equivalent to the period of major refurbishments in hotels. Source: Filimonau et al. 2011. Reviewing the carbon footprint analysis of hotels: Life Cycle Energy Analysis (LCEA) as a holistic method for carbon impact appraisal of tourist accommodation. Journal of Cleaner Production, 19(17-18), 1917-1930. In terms of outputs assumed to have gone to insert waste.
- waste wood, untreated: -3.93354e-6 kg; lognormal variance with pedigree 0.123425, pedigree (2,4,2,2,5)
  Calculated value. The amount is set equal to the amount of input materials, sawnwood, with conversion made from volume to weight. The conversion is based on the density reported in the property section for the respective products (see the wet mass property).
  production volume 645553 kg
- gypsum plasterboard: 7.34492e-5 kg; lognormal variance with pedigree 0.123425, pedigree (2,4,2,2,5)
  Calculated value. Combined of all instances of all across the building walls, ceiling and roof. Assumed thickness of roof plasterboard 12.5 mm. Source: Practical DYI 2018. Types of plasterboard. Available from: https://www.practicaldiy.com/general-building/plasterboard/plasterboard.php Accessed 23 March 2018. Assumed density of plasterboard 640 kg/m3. Source: British Gypsum 2018. What is the density of Gyproc plasterboards? Available from: http://www.british-gypsum.com/technical-advice/faqs/114-what-is-the-density-of-gyproc-plasterboards Accessed 23 March 2018. Assumed service life of 75 years with minor refurbishments throughout. In terms of outputs assumed to have gone to waste gypsum plasterboard.
- flat glass, coated: 4.38478e-5 kg; lognormal variance with pedigree 0.122825, pedigree (1,4,2,2,5)
  Estimated value. For window glass: Assuming each room has two windows. Assumed size of a standard 2020 window of 0.37 m2, https://modernize.com/windows/standard-sizes Assuming 15 kg of window glass is required to cover 1m2 of area (double-glazed windows). For construction glass: Assuming density of glass 2.6 kg/m3. Available from https://www.engineeringtoolbox.com/density-solids-d_1265.html Accessed 16 March 2018. Assumed average service life of 20 years for both types. Source: Howard et al. 2007. Comparative service life assessment of window systems. Available from: http://www.fwpa.com.au/images/marketaccess/PR07.1047%20Final%20Report%20WEB.pdf Accessed 16 March 2018. In terms of outputs assumed to have gone to waste glass.
- sawnwood, beam, softwood, dried (u=10%), planed: 7.91994e-9 m3; lognormal variance with pedigree 0.123425, pedigree (2,4,2,2,5)
  Calculated value. Represents here all wood used in flooring and for wall decoration. Combined of all instances of use across the building. Assumed thickness of wood to be 9.5 mm. Source: APA 2016. Wall construction. An excerpt of the engineering wood construction guide. Available from: https://www.buildgp.com/DocumentViewer.aspx?elementid=10198 Accessed 25 March 2018. Assumed service life of 75 years with minor refurbishments throughout. In terms of outputs assumed to have gone to waste wood, untreated.
- electricity, low voltage: 4.07754e-6 kWh; lognormal variance with pedigree 0.422225, pedigree (1,4,2,2,5)
  Calculated value. Assuming that 0.30 kWh/m3 of electricity is necessary to construct a building. Source: Zabalza et al. 2013. Use of LCA as a Tool for Building Ecodesign. A Case Study of a Low Energy Building in Spain. Energies, 6 (8), 3901-3921.
- window frame, aluminium, U=1.6 W/m2K: 1.6541e-6 m2; lognormal variance with pedigree 0.2106, pedigree (5,5,5,5,5)
  Calculated value. The amount of exchange is calculated as: amount of input product * (lifetime of the hotel / lifetime of the product). Assumed service life of 35 years. Source: Asif et al. 2002. LIFE CYCLE OF WINDOW MATERIALS - A COMPARATIVE ASSESSMENT. Available from: http://ohp.parks.ca.gov/pages/1054/files/uk%20window%20frame%20lca.pdf Accessed 16 March 2018.
- natural stone plate, cut: 1.32386e-7 kg; lognormal variance with pedigree 0.123425, pedigree (2,4,2,2,5)
  Calculated value. Used here in place of marble. Combined of all instances of use across the building. Assumed thickness of marble is 22 mm. Source: Erdly and Schwartz 2004. Building facade maintenance, repair, and inspection. ASTM International, West Conshohocken, USA. Assumed density of marble is 2.7 kg/m3. Source: The Engineering Toolbox 2018. Densities of common solids. Available from: https://www.engineeringtoolbox.com/density-solids-d_1265.html Accessed 25 March 2018. Assumed service life of 75 years which is equal to the service life of the hotel building with minor refurbishments throughout. In terms of outputs assumed to have gone to inert waste.
- wastewater, average: -6.37189e-6 m3; lognormal variance with pedigree 0.122825, pedigree (1,4,2,2,5)
  Calculated value. The amount is set equal to the amount of input material, tap water with conversion from kg to m3. 1 m3 of water is assumed to be equal to 1000 kg of water.
  production volume 82715.5 m3
- concrete, normal: 3.25343e-6 m3; lognormal variance with pedigree 0.122825, pedigree (1,4,2,2,5)
  Calculated value.
  Combined of all instances of use across the building structure, walls (m2) and floor (3501.5m3). Assumed thickness of 225 mm, Available at http://kingspaninsulation.co.uk/getattachment/5fdd04b2-e58e-4622-97bb-5861799ab02a/Thermafloor-TF70-pdf.pdf Accessed on 10 Feb 2018 Assumed service life of 75 years which is equal to the service life of the hotel building with minor refurbishments throughout.
  Additionally the concrete for foundations is accounted for (164.27m3). Estimated value based on the hotel area. In terms of outputs assumed to have gone to waste concrete.
- used door, inner, wood: -1.06556e-7 m2; lognormal variance with pedigree 0.122825, pedigree (1,4,2,2,5)
  Calculated value. Amount of output material is set equal to the amount of respectiveinput material, door, inner, wood.
  production volume 10646.8 m2
- sanitary ceramics: 4.75808e-6 kg; lognormal variance with pedigree 0.422225, pedigree (1,4,2,2,5)
  Calculated value. The amount of exchange is calculated as: amount of input product * (lifetime of the hotel / lifetime of the product). This flow represents ceramic washing basin and ceramic toilet seat. The hotel has 60 washing basins and 60 toilet seats. Washing basins are assumed to weigh 15kg (information taken from IKEA (2018) for the product "TÖRNVIKEN Countertop wash-basin", source retrieved from: http://www.ikea.com/gb/en/products/washstands-taps/wash-basins/t%C3%B6rnviken-countertop-wash-basin-white-art-90291518/, accessed 12 Feb 2018). The assumed lifetime is 15 years. Toilet seats are assumed to weigh 35kg (information taken from B&Q (2018) for the product "COOKE & LEWIS FABIENNE CLOSE-COUPLED TOILET WITH SOFT CLOSE SEAT", source retrieved from: https://www.diy.com/departments/cooke-lewis-fabienne-close-coupled-toilet-with-soft-close-seat/1142804_BQ.prd?B/R_Toilets_C_CT, accessed 12 Feb 2018). In terms of outputs, assumed to have gone to inert waste.
  In terms of outputs, assumed to have gone to inert waste.
- waste gypsum plasterboard: -7.34492e-5 kg; lognormal variance with pedigree 0.123425, pedigree (2,4,2,2,5)
  Calculated value. Amount of output material is set equal to the amount of respective input material, gypsum plasterboard.
  production volume 613248 kg
- base plaster: 1.16867e-6 kg; lognormal variance with pedigree 0.122825, pedigree (1,4,2,2,5)
  Estimated value. Combined of all instances of use across the building structure and walls. Assuming that 401 bags of base paster (each bag has a weight of 25 kg) are required to plaster the area of circa 3638,89 m2. Source: British Gypsum 2018. Plaster Coverage Tool. Available from: http://www.british-gypsum.com/technical-advice/plaster-coverage-tool. Accessed 23 March 2018. Assumed service life of 75 years which is equal to the service life of the hotel building with minor refurbishments throughout. In terms of outputs assumed to have gone to waste concrete.
- used window frame, wood-metal: -4.30039e-8 m2; lognormal variance with pedigree 0.123425, pedigree (2,4,2,2,5)
  Calculated value. Amount of output material is set equal to the amount of respective input material, window frame, wood-metal.
  production volume 60194.9 m2
- plywood, for indoor use: 1.21891e-8 m3; lognormal variance with pedigree 0.123425, pedigree (2,4,2,2,5)
  Calculated value. Represents here wood used as ceiling material and for decoration. Assumed average thickness of plywood is 19mm. Source: Plymaster 2018. Interior Plywood. Available from: (http://plymaster.com.au/plywood-products-interior.htm#/1) Accessed 25 March 2018. Assumed service life of 75 years with minor refurbishments throughout. In terms of outputs assumed to have gone to waste wood, untreated.
- blower and heat exchange unit, central, 600-1200 m3/h: 2.01339e-7 unit; lognormal variance with pedigree 0.422225, pedigree (1,4,2,2,5)
  Calculated value. Represents here 4 central air-conditioning units. The amount of exchange is calculated as: amount of input product * (lifetime of the hotel / lifetime of the product). Assumed service life of the air-conditioning unit is 20 years. Source: ASHRAE 2018. ASHRAE Equipment Life Expectancy chart. Available from: http://www.culluminc.com/wp-content/uploads/2013/02/ASHRAE_Chart_HVAC_Life_Expectancy%201.pdf Accessed 23 March 2018.
- waste wood, untreated: -4.27075e-5 kg; lognormal variance with pedigree 0.123425, pedigree (2,4,2,2,5)
  Calculated value. The amount is set equal to the amount of input materials, sawnwood, with conversion made from volume to weight. The amount also includes waste plywood, for indoor use, with convertion from m3 to kg. Density for both material is taken from the properties section, see their respective wet mass.
  production volume 659514 kg
- electricity, low voltage: 3.34478e-6 kWh; lognormal variance with pedigree 0.422225, pedigree (1,4,2,2,5)
  Calculated value. Assuming that 0.30 kWh/m3 of electricity is necessary to construct a building. Source: Zabalza et al. 2013. Use of LCA as a Tool for Building Ecodesign. A Case Study of a Low Energy Building in Spain. Energies, 6(8), 3901-3921.
- concrete, normal: 8.62295e-7 m3; lognormal variance with pedigree 0.123425, pedigree (2,4,2,2,5)
  Calculated value.
  Combined of all instances of use across the building structure, walls and floor (14450m3). Assumed thickness of concrete of 225 mm, Insulation 2011. Thermafloor TF70. INSULATION FOR SOLID CONCRETE AND SUSPENDED GROUND FLOORS. Available from http://kingspaninsulation.co.uk/getattachment/5fdd04b2-e58e-4622-97bb-5861799ab02a/Thermafloor-TF70-pdf.pdf Accessed 23 March 2018. Assumed service life of 75 years which is equal to the service life of the hotel building with minor refurbishments throughout.
  Additionally the concrete for foundations is accounted for (30840m3). Estimated value based on the hotel area and construction practices in Peru. The case study hotel has 4 floors of underground parking that occupy 2570 m2 of area and have 3 m of height each. Hotel foundation is then calculated as 2570 m2 x 3 m x 4 = 30840 m3. In terms of outputs assumed to have gone to waste concrete.
- waste polyethylene: -0.000149905, -2.00774e-15, -5.01318e-15, -2.74109e-15, -2.12653e-15, -5.59753e-15, -6.33945e-14, -8.32279e-15, -4.98018e-14, -5.73553e-15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 kg (28 suppliers, which the file names only by identifier); sum of these -0.000149905 kg; lognormal variance with pedigree 0.004425, pedigree (2,3,3,2,2)
  Measured value, proxy exchange: represents the disposal of the tetrafluoroethylene consumed as an auxilliary during the process.
  Uncertainty: Default value taken fromTable 10.3. DQG
  production volume 722.573 kg
- waste plastic, mixture: -4.85566e-9, -1.21242e-8, -6.62925e-9, -5.14294e-9, -1.35375e-8, -1.81433e-9, -1.53318e-7, -2.01284e-8, -2.09512e-9, -1.20444e-7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 kg (34 suppliers, which the file names only by identifier); sum of these -8.20516e-7 kg; lognormal variance with pedigree 0.004425, pedigree (2,3,3,2,2)
  (same comment as for waste plastic, mixture)
  production volume 2.28888e7 kg
- electricity, medium voltage: 4.94787e-9, 3.69719e-8, 6.80616e-9, 4.30072e-8, 1.84499e-8, 1.68021e-8, 2.98044e-8, 2.58686e-7, 1.73454e-8, 4.1711e-9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 kWh (37 suppliers, which the file names only by identifier); sum of these 0.00755333 kWh; lognormal variance with pedigree 0.004425, pedigree (2,3,3,2,2)
  Measured value: represents the electricity consumption of the entire processing step. Includes the electricity consumption required for internal recycling.
  EcoSpold01Location=UCTE
  Uncertainty: Default value taken fromTable 10.3. DQG
- waste polypropylene: -3.41915e-12, -1.0732e-12, -2.6797e-12, -1.4652e-12, -1.13669e-12, -2.99205e-12, -8.01423e-6, -5.3548e-7, -4.04975e-8, -4.01003e-13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 kg (42 suppliers, which the file names only by identifier); sum of these -6.5215e-5 kg; lognormal variance with pedigree 0.004425, pedigree (2,3,3,2,2)
  Measured value, proxy exchange: represents the disposal of the plastic caps consumed as an auxilliary during the process.
  Uncertainty: Default value taken fromTable 10.3. DQG
  production volume 384532 kg
- waste wood, untreated: -2.33094e-8, -1.70418e-9, -6.54691e-8, -1.56365e-8 kg (4 suppliers, which the file names only by identifier); sum of these -1.06119e-7 kg; lognormal variance with pedigree 0.008, pedigree (1,1,4,1,1)
  (same comment as for waste wood, untreated)
  production volume 145527 kg
- waste wire plastic: -6.21795e-8 kg
  Calculated value
  production volume 1.23183e7 kg
- waste glass: -3.98348e-8, -2.01366e-8, -6.33882e-8, -1.61703e-8, -2.35541e-8, -3.73804e-8, -4.92777e-9, -6.6996e-7, -9.24865e-8, -7.42564e-9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 kg (35 suppliers, which the file names only by identifier); sum of these -3.48022e-6 kg
  Flat glass sent to treatment
  production volume 1.83026 kg
- waste concrete: -3.34003e-5 kg
  Concrete components sent to treatment
  production volume 4.01456 kg
- waste polyvinylchloride: -1.36167e-9, -3.4e-9, -1.85904e-9, -1.44223e-9, -3.79631e-9, -5.08792e-10, -4.29948e-8, -5.64461e-9, -5.87535e-10, -3.37762e-8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 kg (34 suppliers, which the file names only by identifier); sum of these -2.30097e-7 kg
  Etylene vinyl acetate copolymer (plastic covers) sent to treatment
  production volume 0.465191 kg
- transport, freight, sea, container ship: 2.72602e-11 metric ton*km; lognormal variance with pedigree 0.1226, pedigree (1,3,3,1,1)
  Amount based on primary data collected from participating companies.
- transport, freight, lorry >32 metric ton, EURO3: 2.20931e-12 metric ton*km; lognormal variance with pedigree 0.1226, pedigree (1,3,3,1,1)
  Inbound transport of zinc concentrate and other materials to sites. Amount and activity link based on primary data collected from participating companies.
- transport, freight train: 5.98803e-12 metric ton*km; lognormal variance with pedigree 0.1226, pedigree (1,3,3,1,1)
  (same comment as for transport, freight, lorry >32 metric ton, EURO3)
- transport, freight, inland waterways, barge: 7.97854e-12 metric ton*km; lognormal variance with pedigree 0.1226, pedigree (1,3,3,1,1)
  (same comment as for transport, freight, lorry >32 metric ton, EURO3)
- waste wood, untreated: -3.04165e-7 kg; lognormal variance with pedigree 0.0032, pedigree (1,3,3,1,1)
  Amount based on primary data collected from participating companies.
  production volume 4.40738e6 kg
- clinker: 0.011772, 3.10694e-13, 0.000615418, 0.000472181, 0.000788942, 0.00019207, 0.0374097 kg (7 suppliers, which the file names only by identifier); sum of these 0.0512503 kg; lognormal variance with pedigree 0.0032, pedigree (1,3,3,1,1)
  Amount based on primary data collected from participating companies.
- cement, unspecified: 1.15939e-13, 2.42043e-14, 5.57212e-13, 5.47388e-13, 4.80368e-5, 1.76949e-13, 2.14088e-14, 2.39122e-12 kg (8 suppliers, which the file names only by identifier); sum of these 4.80368e-5 kg; lognormal variance with pedigree 0.0032, pedigree (1,3,3,1,1)
  Amount based on primary data collected from participating companies.
- steam, in chemical industry: 5.08158e-8, 2.88214e-7 kg (2 suppliers, which the file names only by identifier); sum of these 3.3903e-7 kg; lognormal variance with pedigree 0.0032, pedigree (1,3,3,1,1)
  Amount based on primary data collected from participating companies.
- wastewater, average: -2.10407e-7, -1.94495e-6 m3 (2 suppliers, which the file names only by identifier); sum of these -2.15536e-6 m3; lognormal variance with pedigree 0.0032, pedigree (1,3,3,1,1)
  Amount based on primary data collected from participating companies.
  production volume 663094 m3
- nylon 6-6: 5.41098e-6 kg; source Angel Avadí 2017; triangular min 5.41098e-6, mostLikely 5.41098e-6, max 5.41098e-6, pedigree (2,3,1,1,1)
  Fishing gear construction
  Uncertainty: Data from 9 vessels
- used trawler, steel: -0.00213649 kg; source Angel Avadí 2017
  EOL of a steel trawler, per 1000 kg of light ship weight (LSW), at the end of its lifetime. Regressions based on mainly primary data were created to relate the weight of each inventory item to a purse seiner's LSW, adjusted for trawler's gear. The list of inventory items (granularity) contribute >95% of environmental impacts, as described in the reference publication. Includes engines and motors
  production volume 0.002923 kg
- marine electric motor: 1.98756e-8 unit; source Angel Avadí 2017; triangular min 1.98756e-8, mostLikely 1.98756e-8, max 1.98756e-8, pedigree (2,5,3,3,2)
  Electric motors and pumps
  Uncertainty: Data from 9 vessels
- marine engine: 1.45934e-7 unit; source Angel Avadí 2017; triangular min 1.45934e-7, mostLikely 1.45934e-7, max 1.45934e-7, pedigree (2,5,3,3,2)
  Marine diesel engine
  Uncertainty: Data from 9 vessels
- nylon 6-6: 1.48683e-5 kg; source Angel Avadí 2017; triangular min 1.48683e-5, mostLikely 1.48683e-5, max 1.48683e-5, pedigree (2,3,1,5,1)
  Fishing gear construction
  Uncertainty: Data from 9 vessels
- used long liner, steel: -0.00105643 kg; source Angel Avadí 2017
  EOL of a steel long liner, per 1000 kg of light ship weight (LSW), at the end of its lifetime. Regressions based on mainly primary data were created to relate the weight of each inventory item to a purse seiner's LSW, adjusted for long liner's gear. The list of inventory items (granularity) contribute >95% of environmental impacts, as described in the reference publication. Includes engines and motors
  production volume 0.2892 kg
- cable, unspecified: 1.05032e-6 kg; lognormal variance with pedigree 0.0438, pedigree (1,4,5,4,2)
  This product represents average, unspecified cable. Data are from Fulvio and Peiro 2015.
- used cable: -1.05032e-6 kg; lognormal variance with pedigree 0.0438, pedigree (1,4,5,4,2)
  The amount is set equal to the input amount for the respective material. Data are from Fulvio and Peiro 2015.
  production volume 1.8e7 kg
- scrap aluminium: -1.20498e-6, -5.6535e-8, -2.53244e-6 kg (3 suppliers, which the file names only by identifier); sum of these -3.79395e-6 kg; lognormal variance with pedigree 0.0438, pedigree (1,4,5,4,2)
  (same comment as for used cable)
  production volume 9.6e6 kg
- brass: 5.48951e-9, 7.85092e-7 kg (2 suppliers, which the file names only by identifier); sum of these 7.90581e-7 kg; lognormal variance with pedigree 0.0438, pedigree (1,4,5,4,2)
  Data are from Fulvio and Peiro 2015. In terms of outputs assumed to have gone to waste copper.
- electronic component, passive, unspecified: 5.36762e-7 kg; lognormal variance with pedigree 0.0064, pedigree (2,4,3,4,2)
  Data are from Miljogiraff 2015.
- seal, natural rubber based: 4.77887e-7 kg; lognormal variance with pedigree 0.0064, pedigree (2,4,3,4,2)
  Data are from Miljogiraff 2015.
- printed paper: 3.71201e-8 kg; lognormal variance with pedigree 0.003425, pedigree (1,4,2,2,2)
  Data from Yuan et al. 2016.
- kraft paper, bleached: 3.21708e-7 kg; lognormal variance with pedigree 0.003425, pedigree (1,4,2,2,2)
  Data from Yuan et al. 2016.
- electricity, high voltage: 3.32621e-5 kWh; lognormal variance with pedigree 0.003425, pedigree (1,4,2,2,2)
  Data from Yuan et al. 2016.
- polystyrene, general purpose: 1.23734e-7 kg; lognormal variance with pedigree 0.003425, pedigree (1,4,2,2,2)
  Data from Yuan et al. 2016.
- trisodium phosphate: 1.28782e-7 kg; lognormal variance with pedigree 0.003425, pedigree (1,4,2,2,2)
  Used herein place of phosphating agent, degreaser and surface conditioning agent. In terms of outputs assumed to have gone to wastewater. Data from Yuan et al. 2016.
- waste packaging paper: -3.84755e-8, -2.39239e-9, -8.64471e-9, -1.56035e-9, -1.56668e-8, -8.42931e-10, -2.09193e-10, -2.91036e-7 kg (8 suppliers, which the file names only by identifier); sum of these -3.58828e-7 kg; lognormal variance with pedigree 0.003425, pedigree (1,4,2,2,2)
  Used here in place of kraft liner and paper. Data from Yuan et al. 2016. The amount is set equal to the input amount for the respective material.
  production volume 9.26115e7 kg
- compressed air, 1000 kPa gauge: 2.64825e-7, 6.50804e-7 m3 (2 suppliers, which the file names only by identifier); sum of these 9.15629e-7 m3; lognormal variance with pedigree 0.003425, pedigree (1,4,2,2,2)
  Data from Yuan et al. 2016.
- waste polypropylene: -6.94559e-6 kg; lognormal variance with pedigree 0.003425, pedigree (1,4,2,2,2)
  Data from Yuan et al. 2016. The amount is set equal to the input amount for the respective material.
  production volume 4.77109e8 kg
- sheet rolling, chromium steel: 0.000917899 kg; lognormal variance with pedigree 0.0201, pedigree (1,4,4,3,1)
  EcoSpold01Location=RER
  Manufacturer data
  Uncertainty: manufacturer data
- sheet rolling, aluminium: 0.00510861 kg; lognormal variance with pedigree 0.0586, pedigree (4,3,5,1,1)
  EcoSpold01Location=RER
  Estimation
  Uncertainty: estimation
- waste polystyrene: -1.0288e-6 kg; lognormal variance with pedigree 0.054, pedigree (3,4,5,1,1)
  Literature value.
  EcoSpold01Location=CH
  Uncertainty: literature studies
  production volume 342 kg
- glued laminated timber, for outdoor use: 1.66608e-8 m3; lognormal variance with pedigree 0.054, pedigree (3,4,5,1,1)
  EcoSpold01Location=RER
  Literature value.
  Uncertainty: literature studies
- used bicycle: -2.39713e-6 unit; lognormal variance with pedigree 0.3086, pedigree (2,1,4,1,1)
  Uncertainty: Estimation: Bike 15'000km
  production volume 1.32237 unit
- wire drawing, steel: 0.00011173 kg; lognormal variance with pedigree 0.096, pedigree (4,1,4,1,4)
  activityLink introduced to establish a direct link to the corresponding regional supply of this product
  Uncertainty: Assumption
- powder coat, aluminium sheet: 1.08568e-6 m2; lognormal variance with pedigree 0.096, pedigree (4,1,4,1,4)
  activityLink introduced to establish a direct link to the corresponding regional supply of this product
  Uncertainty: Assumption: pipe diamter: 4cm, pipe length: 3m
- powder coat, aluminium sheet: 7.77309e-7 m2; lognormal variance with pedigree 0.098, pedigree (4,1,4,5,4)
  EcoSpold01Location=RER
  Uncertainty: Assumption: pipe diamter: 4cm, pipe length: 3m
- wire drawing, steel: 0.000605626 kg; lognormal variance with pedigree 0.098, pedigree (4,1,4,5,4)
  EcoSpold01Location=RER
  Uncertainty: Assumption
- stone wool, packed: 0.00117538 kg; lognormal variance with pedigree 0.0526, pedigree (2,4,5,1,1)
  Questionnaire
  EcoSpold01Location=CH
  Uncertainty: Questionnaire
- powder coat, steel: 0.00069036 m2; lognormal variance with pedigree 0.054, pedigree (3,4,5,1,1)
  EcoSpold01Location=RER
  Questionnaire, estimations
  Uncertainty: Questionnaire, estimations
- steel, unalloyed: 0.00915816 kg; lognormal variance with pedigree 0.0526, pedigree (2,4,5,1,1)
  EcoSpold01Location=RER
  Questionnaire
  Uncertainty: Questionnaire
- inert waste, for final disposal: -0.000106805 kg; lognormal variance with pedigree 0.07, pedigree (4,4,5,1,1)
  EcoSpold01Location=CH
  Estimations on precentage material disposed
  Uncertainty: Estimations on precentage material disposed
  production volume 1.26 kg
- waste expanded polystyrene: -8.10857e-8 kg; lognormal variance with pedigree 0.07, pedigree (4,4,5,1,1)
  (same comment as for inert waste, for final disposal)
  production volume 0.26 kg
- heat, district or industrial, other than natural gas: 0.0260865 MJ; lognormal variance with pedigree 0.07, pedigree (1,1,5,1,1)
  EcoSpold01Location=RER
  4,5,1,2,1,5; Data estimated from related companies
- laminating service, foil, with acrylic binder: 2.602e-6 m2; lognormal variance with pedigree 0.072, pedigree (3,4,5,1,3)
  Questionnaire, approximation for technology
  EcoSpold01Location=RER
  Uncertainty: Questionnaire, approximation for technology
- glazing, triple, U<0.5 W/m2K: 8.71921e-7 m2; lognormal variance with pedigree 0.0521, pedigree (1,4,5,3,1)
  EcoSpold01Location=RER
- stone wool: 9.58003e-7 kg; lognormal variance with pedigree 0.0521, pedigree (1,4,5,3,1)
  EcoSpold01Location=CH
- powder coat, steel: 2.32936e-5 m2; lognormal variance with pedigree 0.054, pedigree (1,4,5,5,1)
  EcoSpold01Location=RER
- building, hall: 3.31689e-6 m2; lognormal variance with pedigree 0.318, pedigree (4,5,3,1,1)
  Calculated value based on estimates.
  1m2 of hall is available every day for 50 years
  1 container occupies during the dismantling the area of its based for the period of 2 days
- used intermodal shipping container, 20-foot: -1.80436e-7 unit; lognormal variance with pedigree 0.00206, pedigree (1,1,3,1,1)
  Calculated value.
  production volume 432000 unit
- metal working, average for chromium steel product manufacturing: 6.17567e-6 kg; lognormal variance with pedigree 0.0038, pedigree (2,3,3,1,1)
  Calculated value.
- chromium steel pipe: 6.17567e-6 kg; lognormal variance with pedigree 0.0038, pedigree (2,3,3,1,1)
  Industrial value (Jost, Products for Container Equipment and Intermodal transports, http://www.jost-world.com/workflow/pdfanleitungen/kataloge/JOST_CT_ZDE180000039E_0910.pdf, accessed 20141014).
  There are 4 locking bars on the container.
- plywood, for outdoor use: 1.96184e-7, 1.82079e-6 m3 (2 suppliers, which the file names only by identifier); sum of these 2.01698e-6 m3; lognormal variance with pedigree 0.0038, pedigree (2,3,3,1,1)
  Calculated value.
  This exchange represent the amount of wood needed for the wooden floor of the container.
- used intermodal shipping container, 40-foot, high-cube: -1.35386e-7 unit; lognormal variance with pedigree 0.0026, pedigree (1,1,3,1,1)
  Calculated value.
  production volume 264000 unit
- used intermodal shipping container, 40-foot: -1.37827e-7 unit; lognormal variance with pedigree 0.0026, pedigree (1,1,3,1,1)
  Calculated value.
  production volume 192000 unit
- used intermodal shipping container, 45-foot, high-cube: -1.0994e-7 unit; lognormal variance with pedigree 0.0026, pedigree (1,1,3,1,1)
  Calculated value.
  production volume 40000 unit
- waste polyurethane foam: -7.26846e-10, -9.26646e-7 kg (2 suppliers, which the file names only by identifier); sum of these -9.27373e-7 kg
  Calculated value based on knowledge of material composition of the lorry with refrigeration machine, 16 metric tons.
- refrigeration machine, carbon dioxide, liquid as refrigerant: 1.93511e-8 unit; lognormal variance with pedigree 0.0406, pedigree (1,1,5,1,1)
  Literature value.
  There are different types of refrigeration machines used in refrigerated transport by lorries. The Carrier Supra 560 type of refrigeration machine weight 385 kg (Carrier, http://www.trucktrailer.carrier.com/StaticFiles/Carrier.com/Carrier%20Brand%20Sites%20Content/Carrier%20Transicold%20North%20America%20TruckTrailer/Files/Products/Truck/Diesel/Supra%20560/Supra560.pdf, accessed 20141103).
- used lorry with refrigeration machine, 16 metric ton: -3.5546e-8 unit
  production volume 7200 unit
- wastewater from lorry production: -7.3473e-7 m3; source MAN Nutzfahrzeuge AG 2000; lognormal variance with pedigree 0.052, pedigree (1,1,5,5,1)
  EcoSpold01Location=CH
  Literature value. Data represent MAN production sites in Germany and comprises: final truck assembly, engine manufacturing, manufacturing of metal parts. Data available from environmental reports of the company.
  Additional references:
  MAN Nutzfahrzeuge AG (2002) Umwelterklärung 2002. MAN Nutzfahrzeuge AG, München
  production volume 15696 m3
- propylene glycol, liquid: 2.58527e-7, 5.23485e-7 kg (2 suppliers, which the file names only by identifier); sum of these 7.82012e-7 kg; source Volvo Truck Corporation 2004; lognormal variance with pedigree 0.052, pedigree (1,1,5,5,1)
  EcoSpold01Location=RER
  Estimated value. Based on the material composition of a Volvo FH as available from product declaration.
- pitch: 5.39473e-8, 9.27813e-10, 4.19926e-8, 2.68714e-9, 1.62798e-8, 1.88228e-9, 3.54699e-10, 2.37389e-7 kg (8 suppliers, which the file names only by identifier); sum of these 3.5546e-7 kg; source Volvo Truck Corporation 2004; lognormal variance with pedigree 0.052, pedigree (1,1,5,5,1)
  EcoSpold01Location=RER
  Estimated value. Based on the material composition of a Volovo FH as available from product declaration.
- refrigeration machine, R134a as refrigerant: 1.93511e-8 unit; lognormal variance with pedigree 0.0406, pedigree (1,1,5,1,1)
  (same comment as for refrigeration machine, carbon dioxide, liquid as refrigerant)
- sheet rolling, copper: 2.24814e-5 kg; lognormal variance with pedigree 0.2, pedigree (5,5,5,5,4)
  Assumed type of processing
  EcoSpold01Location=RER
  Uncertainty: assumed type of processing
- waste polyurethane: -2.01927e-6 kg; lognormal variance with pedigree 0.2, pedigree (5,5,5,5,4)
  EcoSpold01Location=CH
  Assumed route of disposal
  Uncertainty: assumed route of disposal
  production volume 0.00847 kg
- metal working, average for chromium steel product manufacturing: 4.41045e-5 kg; lognormal variance with pedigree 0.2, pedigree (5,5,5,5,4)
  EcoSpold01Location=RER
  Assumed type of processing
  Uncertainty: assumed type of processing
- manual dismantling of used passenger car with internal combustion engine: 8.95568e-5 unit; lognormal variance with pedigree 0.0184, pedigree (2,3,4,4,3)
  Manual dismantling of used vehicle.
- glider, passenger car: 8.13837e-5 kg; source H.-J. Althaus 2010; lognormal variance with pedigree 0.005, pedigree (2,3,3,4,2)
  Based on currently available compact size cars.
- internal combustion engine, for passenger car: 2.53134e-5 kg; source H.-J. Althaus 2010; lognormal variance with pedigree 0.0064, pedigree (2,4,3,4,2)
  Based on currently available compact size cars.
- powertrain, for electric passenger car: 1.64081e-6 kg; source F. Habermacher 2011; lognormal variance with pedigree 0.005, pedigree (2,3,3,4,2)
  Estimate based on currently produced electric vehicles.
- manual dismantling of used electric passenger car: 1.87812e-5 unit; lognormal variance with pedigree 0.0184, pedigree (2,3,4,4,3)
  One dismantling unit per kg vehicle is needed.
- waste cement in concrete and mortar: -5.98371e-7 kg; lognormal variance with pedigree 0.0512, pedigree (2,3,5,1,1)
  Estimation for materials used
  EcoSpold01Location=CH
  Uncertainty: Estimation for materials used
  production volume 52812 kg
- sand: 0.00249738 kg; lognormal variance with pedigree 0.3607, pedigree (2,2,5,1,1)
  Data from one inventory study (Labhardt 1996)
  EcoSpold01Location=CH
  Uncertainty: & basic uncertainty of 3; Data from one inventory study (Labhardt 1996)
- concrete, sole plate and foundation: 1.95397e-6 m3; lognormal variance with pedigree 0.3607, pedigree (2,2,5,1,1)
  EcoSpold01Location=CH
  Data from one inventory study (Labhardt 1996)
  Uncertainty: & basic uncertainty of 3; Data from one inventory study (Labhardt 1996)
- waste concrete, not reinforced: -0.00837279 kg; lognormal variance with pedigree 0.3607, pedigree (2,2,5,1,1)
  (same comment as for concrete, sole plate and foundation)
  production volume 1.99e6 kg
- gravel, round: 0.00271879 kg; lognormal variance with pedigree 0.3607, pedigree (2,2,5,1,1)
  (same comment as for concrete, sole plate and foundation)
- excavation, hydraulic digger: 4.53694e-5 m3; lognormal variance with pedigree 0.3607, pedigree (2,2,5,1,1)
  EcoSpold01Location=RER
  Data from one inventory study (Labhardt 1996)
  Uncertainty: & basic uncertainty of 3; Data from one inventory study (Labhardt 1996)
- gravel, crushed: 0.000818521 kg; lognormal variance with pedigree 0.3607, pedigree (2,2,5,1,1)
  (same comment as for concrete, sole plate and foundation)
- waste bulk iron, excluding reinforcement: -0.000603024 kg; lognormal variance with pedigree 0.072, pedigree (3,4,5,1,3)
  Estimation based on data of Questionnaire
  EcoSpold01Location=CH
  Uncertainty: Estimation based on data of Questionnaire
- used air filter in exhaust air valve: -9.35651e-5 unit; lognormal variance with pedigree 0.044, pedigree (3,4,5,1,1)
  Questionnaire, Data related to building considered
  EcoSpold01Location=CH
  Uncertainty: Questionnaire, Data related to building considered
  production volume 0.0226 unit
- used air filter central unit, 600 m3/h: -6.3384e-6 unit; lognormal variance with pedigree 0.044, pedigree (3,4,5,1,1)
  (same comment as for used air filter in exhaust air valve)
  production volume 0.00251 unit
- used silencer steel, DN 315: -4.03501e-7 unit; lognormal variance with pedigree 0.044, pedigree (3,4,5,1,1)
  EcoSpold01Location=CH
  Questionnaire, Data related to building considered
  Uncertainty: Questionnaire, Data related to building considered
  production volume 0.000103 unit
- air filter, central unit, 600 m3/h: 6.3384e-6 unit; lognormal variance with pedigree 0.044, pedigree (3,4,5,1,1)
  Questionnaire, Data related to building considered
  EcoSpold01Location=RER
  Uncertainty: Questionnaire, Data related to building considered
- air filter, in exhaust air valve: 9.35651e-5 unit; lognormal variance with pedigree 0.044, pedigree (3,4,5,1,1)
  EcoSpold01Location=RER
  Questionnaire, Data related to building considered
  Uncertainty: Questionnaire, Data related to building considered
- ventilation system, central, 1 x 720 m3/h, polyethylene ducts, with earth tube heat exchanger: 3.24481e-8 unit; lognormal variance with pedigree 0.044, pedigree (3,4,5,1,1)
  (same comment as for used silencer steel, DN 315)
- silencer, steel, DN 315, 50 mm: 4.03501e-7 unit; lognormal variance with pedigree 0.044, pedigree (3,4,5,1,1)
  (same comment as for used silencer steel, DN 315)
- used flexible duct aluminium/PET, DN of 125: -1.53105e-5 m; lognormal variance with pedigree 0.044, pedigree (3,4,5,1,1)
  (same comment as for used air filter in exhaust air valve)
  production volume 0.000513 m
- used ventilation control and wiring central unit: -2.01257e-7 unit; lognormal variance with pedigree 0.044, pedigree (3,4,5,1,1)
  (same comment as for used air filter in exhaust air valve)
  production volume 5.13e-5 unit
- ventilation control and wiring, central unit: 2.01257e-7 unit; lognormal variance with pedigree 0.044, pedigree (3,4,5,1,1)
  (same comment as for air filter, central unit, 600 m3/h)
- used silencer steel, DN 125: -2.06981e-5 unit; lognormal variance with pedigree 0.044, pedigree (3,4,5,1,1)
  (same comment as for used air filter in exhaust air valve)
  production volume 0.000615 unit
- used blower and heat exchange unit central, 600-1200 m3/h: -2.01257e-7 unit; lognormal variance with pedigree 0.044, pedigree (3,4,5,1,1)
  (same comment as for used air filter in exhaust air valve)
  production volume 5.13e-5 unit
- flexible duct, aluminium/PET, DN of 125: 1.53105e-5 m; lognormal variance with pedigree 0.044, pedigree (3,4,5,1,1)
  (same comment as for air filter, in exhaust air valve)
- silencer, steel, DN 125: 2.06981e-5 unit; lognormal variance with pedigree 0.044, pedigree (3,4,5,1,1)
  (same comment as for used silencer steel, DN 315)
- ventilation system, central, 1 x 720 m3/h, steel ducts, with earth tube heat exchanger: 3.06734e-8 unit; lognormal variance with pedigree 0.044, pedigree (3,4,5,1,1)
  (same comment as for used air filter in exhaust air valve)
- spiral-seam duct, steel, DN 400: 5.95643e-6 m; lognormal variance with pedigree 0.0426, pedigree (2,4,5,1,1)
  (same comment as for air filter, central unit, 600 m3/h)
- insulation spiral-seam duct, rockwool, DN 400, 30 mm: 4.08724e-6 m; lognormal variance with pedigree 0.0426, pedigree (2,4,5,1,1)
  (same comment as for air filter, central unit, 600 m3/h)
- exhaust air roof hood, steel, DN 400: 1.39565e-7 unit; lognormal variance with pedigree 0.04, pedigree (1,1,5,1,1)
  EcoSpold01Location=CH
  2,4,1,1,1,nA; Questionnaire, Data related to building considered
- used exhaust air valve in-wall housing, plastic/steel: -1.40897e-5 unit; lognormal variance with pedigree 0.0426, pedigree (2,4,5,1,1)
  (same comment as for used silencer steel, DN 315)
  production volume 0.606024 unit
- used sealing tape aluminium/PE, 50 mm wide: -0.000395994 m; lognormal variance with pedigree 0.0426, pedigree (2,4,5,1,1)
  (same comment as for used silencer steel, DN 315)
  production volume 6.7336 m
- used room-connecting overflow element steel, approx. 40 m3/h: -1.40897e-5 unit; lognormal variance with pedigree 0.0426, pedigree (2,4,5,1,1)
  (same comment as for used air filter in exhaust air valve)
  production volume 0.606024 unit
- spiral-seam duct, steel, DN 125: 9.39312e-6 m; lognormal variance with pedigree 0.0426, pedigree (2,4,5,1,1)
  (same comment as for air filter, in exhaust air valve)
- outside air intake, stainless steel, DN 370: 1.39565e-7 unit; lognormal variance with pedigree 0.0426, pedigree (2,4,5,1,1)
  (same comment as for air filter, in exhaust air valve)
- used outside air intake stainless steel, DN 370: -1.39565e-7 unit; lognormal variance with pedigree 0.0426, pedigree (2,4,5,1,1)
  (same comment as for used air filter in exhaust air valve)
  production volume 0.033668 unit
- supply air inlet, steel/SS, DN 75: 2.34828e-5 unit; lognormal variance with pedigree 0.0426, pedigree (2,4,5,1,1)
  (same comment as for air filter, central unit, 600 m3/h)
- room-connecting overflow element, steel, approx. 40 m3/h: 1.40897e-5 unit; lognormal variance with pedigree 0.0426, pedigree (2,4,5,1,1)
  (same comment as for air filter, central unit, 600 m3/h)
- polyethylene pipe, DN 200, SDR 41: 1.67478e-5 m; lognormal variance with pedigree 0.0426, pedigree (2,4,5,1,1)
  (same comment as for air filter, in exhaust air valve)
- air distribution terminal panel, steel, 120 m3/h: 9.39312e-6 unit; lognormal variance with pedigree 0.0426, pedigree (2,4,5,1,1)
  (same comment as for used silencer steel, DN 315)
- exhaust air valve, in-wall housing, plastic/steel, DN 125: 1.40897e-5 unit; lognormal variance with pedigree 0.0426, pedigree (2,4,5,1,1)
  (same comment as for used air filter in exhaust air valve)
- polyethylene pipe, corrugated, DN 75: 0.000121551 m; lognormal variance with pedigree 0.0426, pedigree (2,4,5,1,1)
  (same comment as for air filter, in exhaust air valve)
- used air distribution terminal panel steel, 120 m3/h: -9.39312e-6 unit; lognormal variance with pedigree 0.0426, pedigree (2,4,5,1,1)
  (same comment as for used silencer steel, DN 315)
  production volume 0.404016 unit
- sealing tape, aluminium/PE, 50 mm wide: 0.000395994 m; lognormal variance with pedigree 0.0426, pedigree (2,4,5,1,1)
  (same comment as for air filter, central unit, 600 m3/h)
- used exhaust air roof hood steel, DN 400: -1.39565e-7 unit; lognormal variance with pedigree 0.0426, pedigree (2,4,5,1,1)
  (same comment as for used silencer steel, DN 315)
  production volume 0.033668 unit
- ventilation duct, steel, 100x50 mm: 0.00028733 m; lognormal variance with pedigree 0.0426, pedigree (2,4,5,1,1)
  (same comment as for air filter, in exhaust air valve)
- ventilation duct, connection piece, steel, 100x50 mm: 7.18325e-5 unit; lognormal variance with pedigree 0.0426, pedigree (2,4,5,1,1)
  (same comment as for air filter, central unit, 600 m3/h)
- ventilation duct, elbow 90°, steel, 100x50 mm: 0.000109185 unit; lognormal variance with pedigree 0.0426, pedigree (2,4,5,1,1)
  (same comment as for air filter, central unit, 600 m3/h)
- ventilation control and wiring, decentralized unit: 4.57164e-6 unit; lognormal variance with pedigree 0.044, pedigree (3,4,5,1,1)
  (same comment as for air filter, central unit, 600 m3/h)
- air filter, decentralized unit, 180-250 m3/h: 2.43649e-5 unit; lognormal variance with pedigree 0.044, pedigree (3,4,5,1,1)
  (same comment as for air filter, central unit, 600 m3/h)
- used ventilation control and wiring decentralized unit: -4.57164e-6 unit; lognormal variance with pedigree 0.044, pedigree (3,4,5,1,1)
  (same comment as for used silencer steel, DN 315)
  production volume 0.000308 unit
- used air filter decentralized unit, 180-250 m3/h: -2.43649e-5 unit; lognormal variance with pedigree 0.044, pedigree (3,4,5,1,1)
  (same comment as for used air filter in exhaust air valve)
  production volume 0.0151 unit
- used blower and heat exchange unit decentralized, 180-250 m3/h: -4.57164e-6 unit; lognormal variance with pedigree 0.044, pedigree (3,4,5,1,1)
  (same comment as for used silencer steel, DN 315)
  production volume 0.000308 unit
- exhaust air outlet, steel/aluminium, 85x365 mm: 7.71835e-6 unit; lognormal variance with pedigree 0.0426, pedigree (2,4,5,1,1)
  (same comment as for used silencer steel, DN 315)
- used window frame, wood: -4.30913e-8 m2; lognormal variance with pedigree 0.122825, pedigree (1,4,2,2,5)
  Calculated value. Amount of output material is set equal to the amount of respective input material, window frame, wood.
  production volume 8839.29 m2
- window frame, wood, U=1.5 W/m2K: 4.30913e-8 m2; lognormal variance with pedigree 0.122825, pedigree (1,4,2,2,5)
  (same comment as for window frame, aluminium, U=1.6 W/m2K)
- waste cement, hydrated: -4.80368e-5 kg; lognormal variance with pedigree 0.122825, pedigree (1,4,2,2,5)
  Calculated value.The amount is set equal to the amount of the input material, cement.
  production volume 5.66714e7 kg
- waste polyurethane: -3.78033e-7 kg; lognormal variance with pedigree 0.0512, pedigree (2,3,5,1,1)
  (same comment as for waste cement in concrete and mortar)
  production volume 535.09 kg
- waste bitumen sheet: -3.78033e-7 kg; lognormal variance with pedigree 0.0512, pedigree (2,3,5,1,1)
  EcoSpold01Location=CH
  Estimation for materials used
  Uncertainty: Estimation for materials used
  production volume 535.09 kg
- scrap lead acid battery: -1.54924e-5 kg; source Spielmann, M. 2007; lognormal variance with pedigree 0.00200012, pedigree (1,1,3,1,1)
  production volume 839000 kg
    Calculated from production volume of reference product using the relative outputs.
- waste aluminium: -4.34321e-5 kg; source Knechtle N. 1997; lognormal variance with pedigree 0.0213607, pedigree (1,1,3,1,1)
  production volume 1.17e6 kg
    Calculated from production volume of reference product using the relative outputs.
- waste glass sheet: -2.94312e-6, -7.49319e-8, -1.13409e-5 kg (3 suppliers, which the file names only by identifier); sum of these -1.4359e-5 kg; source Knechtle N. 1997; lognormal variance with pedigree 0.0026, pedigree (1,1,3,1,1)
  EcoSpold01Location=CH
  production volume 1.04e6 kg
    Calculated from the production volume of harvester in proportion to the respective output amounts.
- water, completely softened: 7.49061e-7, 1.04217e-6, 1.39224e-6 kg (3 suppliers, which the file names only by identifier); sum of these 3.18347e-6 kg; source Spielmann, M. 2007; lognormal variance with pedigree 0.069, pedigree (3,4,5,1,1)
  for battery; the amount is extrapolated from reference via total weight of machine
- acetylene: 1.2336e-7, 5.85605e-7 kg (2 suppliers, which the file names only by identifier); sum of these 7.08964e-7 kg; source Spielmann, M. 2007; lognormal variance with pedigree 0.189, pedigree (3,4,5,1,5)
  used during disassembly
- waste bulk iron, excluding reinforcement: -0.000143473, -0.000298345 kg (2 suppliers, which the file names only by identifier); sum of these -0.000441818 kg; source Spielmann, M. 2007; lognormal variance with pedigree 0.00200001, pedigree (1,1,3,1,1)
  production volume 3.7875e6 kg
    Calculated from production volume of reference product using the relative outputs.
- diethylene glycol: 2.46445e-5 kg; lognormal variance with pedigree 0.0669, pedigree (2,2,2,5,1)
  Measured value. Weighted average of values informed by manufacturers. Grinding aid for cement production.
  Uncertainty: Basic uncertainty calculated from sample.

- granulated blast furnace slag: 0.0120217 kg; lognormal variance with pedigree 0.0079, pedigree (2,2,2,5,1)
  Measured value. Weighted average of values informed by manufacturers. Raw material for cement production.In Brazil, around 70% of the blast furnace slag used in cement making is ground along with clinker in the cement plant, not in the steel making plant. The energy for grinding is declared in the cement dataset (average aggregate data for all cement types).
  Uncertainty: Basic uncertainty calculated from sample.
- water, harvested from rainwater: 0.000313987 kg; lognormal variance with pedigree 1.6319, pedigree (2,2,2,5,1)
  Measured value. Weighted average of values informed by manufacturers. Water for equipment cooling and dust control.
  Uncertainty: Basic uncertainty calculated from sample.
- gypsum, mineral: 0.0024585, 0.000552172, 0.000247833 kg (3 suppliers, which the file names only by identifier); sum of these 0.00325851 kg; lognormal variance with pedigree 0.0679, pedigree (2,2,2,5,1)
  Measured value. Weighted average of values informed by manufacturers. Raw material for cement production.
  Uncertainty: Basic uncertainty calculated from sample.
- limestone, crushed, for mill: 0.00171539, 0.00366273 kg (2 suppliers, which the file names only by identifier); sum of these 0.00537812 kg; lognormal variance with pedigree 0.0589, pedigree (2,2,2,5,1)
  (same comment as for gypsum, mineral)
- wastewater from concrete production: -1.05714e-5 m3; lognormal variance with pedigree 0.0208, pedigree (2,5,2,5,1)
  Calculated value. The water balance is established taking into account the total water input (withdrawal) minus the outputs, which include the water contained in the concrete, the water evaporated and the water infiltrated. In general, no waste water is produced. The water incorporated in the concrete correspond to the cement amount multiplied by w/c ratio. The share of the water evaporated to air and the water infiltrated is calculated based on the sustainability reports from Argos (60% evaporated).
  EcoSpold01Location=CH
  production volume 451652 m3
- sand: 0.000239469, 0.0456791 kg (2 suppliers, which the file names only by identifier); sum of these 0.0459186 kg; source Manuel Lascarro 2017; lognormal variance with pedigree 0.0188, pedigree (4,5,2,5,1)
  Estimated value. The mix design contains 1860 kg /m3 of aggregates. The aggregates are composed by a mix of 40% of sand and 60% of gravels (Ing. Pimentel, 2017).
  Uncertainty: Calculated variable. Uncertainty will be determined from propagation of uncertainty factors of underlying variables.
- cement, alternative constituents 21-35%: 6.71386e-6, 0.000883012, 0.00230354 kg (3 suppliers, which the file names only by identifier); sum of these 0.00319327 kg; source Manuel Lascarro 2017; lognormal variance with pedigree 0.0188, pedigree (4,5,2,5,1)
  Estimated value. Confirmed by local experts from association (Dir, Lascarro, Ing Pimentel, Asocreto, 2017) and biggest ready-mix plant from Holcim in Bogota (Holcim, 2017)
  Holcim. (2017). Visit of Concrete facility - Holcim Puente Aranda. Bogota.
  Uncertainty: Calculated variable. Uncertainty will be determined from propagation of uncertainty factors of underlying variables.
- electricity, medium voltage: 9.13511e-7, 8.06937e-8, 4.28647e-6, 5.77553e-8, 4.74108e-7, 7.24054e-8, 1.20076e-7, 2.41208e-9, 9.79079e-8, 1.3946e-7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 kWh (20 suppliers, which the file names only by identifier); sum of these 7.33751e-6 kWh; lognormal variance with pedigree 0.0208, pedigree (2,5,2,5,1)
  EcoSpold01Location=CH
  Calculated value. The sustainability reports of the cement manufacturers reports the electricity demand for concrete (Cementos Argos S.A, 2017; Cemex, 2017; Holcim, 2015).
  Argos 2.38E+00 Colombia value, sustainability report 2016.
  Holcim 3.25E+00 Colombia value, sustainability report 2015.
  Cemex 3.70E+00 Colombia value, sustainability report 2015.
  Values in kWh/m3
  The value presented is calculated considering a weighted average with production volumes.
  Cementos Argos S.A. (2017). Energy and Co-Processing, 1-8.
  Cemex. (2015). Sustainability Report 2015.
  Holcim. (2015). Informe de Desarrollo Sostenible 2015.
  Uncertainty: There is an important variability of energy consumption between plants
- gravel, crushed: 0.0725625, 0.0122798, 0.0014511 kg (3 suppliers, which the file names only by identifier); sum of these 0.0862934 kg; lognormal variance with pedigree 0.0188, pedigree (4,5,2,5,1)
  (same comment as for sand)
- cement, limestone 21-35%: 0.00609819 kg; lognormal variance with pedigree 0.0108, pedigree (4,3,2,5,1)
  Estimated value. SUPERMIX value as the most produced concrete for 20MPa (Ing. Guerra, 2017)
  Uncertainty: Calculated variable. Uncertainty will be determined from propagation of uncertainty factors of underlying variables.
- cement, pozzolana and fly ash 36-55%: 7.47691e-6, 0.00564726 kg (2 suppliers, which the file names only by identifier); sum of these 0.00565474 kg; lognormal variance with pedigree 0.0108, pedigree (4,3,2,5,1)
  (same comment as for cement, limestone 21-35%)
- cement, Portland: 0.000578702, 1.86606e-5, 2.6529e-5, 6.71309e-6, 0.000559132, 0.00064747, 2.72532e-5, 0.00380796 kg (8 suppliers, which the file names only by identifier); sum of these 0.00567242 kg; lognormal variance with pedigree 0.0108, pedigree (4,3,2,5,1)
  (same comment as for cement, limestone 21-35%)
- cement, alternative constituents 45%: 0.00186274 kg; source Manuel Lascarro 2017; lognormal variance with pedigree 0.0188, pedigree (4,5,2,5,1)
  (same comment as for cement, alternative constituents 21-35%)
- cement, blast furnace slag 35-70%: 0.00689889 kg; lognormal variance with pedigree 0.0094, pedigree (2,3,2,5,1)
  Calculated value, Weighted average from 4 concrete mix designs. Losses considered.
  Uncertainty: Variance of logtransformed data calculated based on the sample's coefficient of variation.
- gravel, crushed: 0.0627422 kg; lognormal variance with pedigree 0.0354, pedigree (2,3,2,5,1)
  Calculated value = amount of artificial sand (crushed gravel is used as a proxy in this case) + amount of gravel, Weighted average from 4 concrete mix designs. Losses considered.
  Uncertainty: Variance of logtransformed data calculated based on the sample's coefficient of variation.
- sand: 0.0291318 kg; lognormal variance with pedigree 0.1274, pedigree (2,3,2,5,1)
  (same comment as for cement, blast furnace slag 35-70%)
- cement, blast furnace slag 6-34%: 0.0057774 kg; lognormal variance with pedigree 0.0044, pedigree (2,3,2,5,1)
  Calculated value, Weighted average from 17 concrete mix designs. Losses considered.
  Uncertainty: Variance of logtransformed data calculated based on the sample's coefficient of variation.
- cement, limestone 6-10%: 0.00615123 kg; lognormal variance with pedigree 0.0134, pedigree (2,3,2,5,1)
  Calculated value, Weighted average from 19 concrete mix designs. Losses considered.
  Uncertainty: Variance of logtransformed data calculated based on the sample's coefficient of variation.
- waste polyvinylfluoride: -1.42793e-7 kg; lognormal variance with pedigree 0.0606, pedigree (4,3,5,5,1)
  Calculation for end of life disposal
  EcoSpold01Location=CH
  Uncertainty: Calculation for end of life disposal
  production volume 137981 kg
- wastewater from glass production: -4.60334e-8 m3; lognormal variance with pedigree 0.0606, pedigree (4,3,5,5,1)
  EcoSpold01Location=CH
  Calculation with water use
  Uncertainty: Calculation with water use
  production volume 44482.2 m3
- polyvinylfluoride, film: 1.42793e-7 kg; lognormal variance with pedigree 0.0446, pedigree (3,3,5,5,1)
  EcoSpold01Location=US
  Pacca 2006
  Uncertainty: Pacca 2006
- expanded perlite: 1.83975e-7 kg; lognormal variance with pedigree 0.0137, pedigree (4,4,3,3,2)
  Used primarily for insulation purposes in pipes etc
- foam glass: 3.96003e-8 kg; lognormal variance with pedigree 0.0137, pedigree (4,4,3,3,2)
  Used in insulation of tank foundation
- nitrate salts, for solar power application: 9.63093e-6 kg; lognormal variance with pedigree 0.0137, pedigree (4,4,3,3,2)
  Used as molten salt with 60% (by weight) contribution of technical grade sodium nitrate, and 40% (by weight) technical grade potassium nitrate.
- refractory, basic, packed: 1.33156e-7 kg; lognormal variance with pedigree 0.0137, pedigree (4,4,3,3,2)
  Refractory brick, with mortar (tank perimeter foundation)
- waste mineral wool: -5.13641e-10, -4.50138e-8 kg (2 suppliers, which the file names only by identifier); sum of these -4.55275e-8 kg; lognormal variance with pedigree 0.0137, pedigree (4,4,3,3,2)
  Rock wool used in instrumentation aspect send for final disposal
  production volume 979440 kg
- calcined clay: 0.00110726 kg; lognormal variance with pedigree 1.4629, pedigree (2,2,2,5,1)
  (same comment as for gypsum, mineral)
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
## Inputs from nature
- Oxygen [natural resource, in air]: 0 kg; pedigree (1,1,1,1,1)
  Oxygen from ambient air needed to combust and oxidise this waste. Net demand, i.e. without O2 leaving the plant in flue gas uncombusted.
  Uncertainty: uncertainty is calculated from uncertainties in waste composition and transfer coefficients to flue gas and soild residues in incinerator
- Water, unspecified natural origin [natural resource, in water]: 9.69848e-6 m3; source European Aluminium Association 2008; lognormal variance with pedigree 0.0492, pedigree (2,5,5,1,1)
  Reported as "water - input"
- Water, river [natural resource, in water]: 5.85241e-5 m3; source Althaus H.-J. 2004; lognormal variance with pedigree 0.098, pedigree (4,5,5,5,4)
  Literature value.
- Dolomite, in ground [natural resource, in ground]: 2.50746e-11 kg; lognormal variance with pedigree 0.0032, pedigree (1,3,3,1,1)
  Amount and activity link based on primary data collected from participating companies.
- Water, lake [natural resource, in water]: 8.07505e-9 m3; lognormal variance with pedigree 0.0032, pedigree (1,3,3,1,1)
  Amount and activity link based on primary data collected from participating companies.
- Sulfur, in ground [natural resource, in ground]: 7.77741e-8 kg; lognormal variance with pedigree 0.0032, pedigree (1,3,3,1,1)
  Amount and activity link based on primary data collected from participating companies.
- Water, cooling, unspecified natural origin [natural resource, in water]: 4.56665e-8 m3; lognormal variance with pedigree 0.0032, pedigree (1,3,3,1,1)
  Amount and activity link based on primary data collected from participating companies.
- Strontium, in ground [natural resource, in ground]: 3.18413e-10 kg; lognormal variance with pedigree 0.0032, pedigree (1,3,3,1,1)
  Amount and activity link based on primary data collected from participating companies.
- Copper, in ground [natural resource, in ground]: 1.8282e-7 kg; lognormal variance with pedigree 0.0032, pedigree (1,3,3,1,1)
  Amount and activity link based on primary data collected from participating companies.
- Aluminium, in ground [natural resource, in ground]: 2.36213e-8 kg; lognormal variance with pedigree 0.0032, pedigree (1,3,3,1,1)
  Amount and activity link based on primary data collected from participating companies.
- Gangue, in ground [natural resource, in ground]: 0.000221138 kg; lognormal variance with pedigree 0.0032, pedigree (1,3,3,1,1)
  Amount and activity link based on primary data collected from participating companies.
- Gold, in ground [natural resource, in ground]: 1.52068e-8 kg; lognormal variance with pedigree 0.0032, pedigree (1,3,3,1,1)
  Amount and activity link based on primary data collected from participating companies.
- Vanadium, in ground [natural resource, in ground]: 3.02153e-11 kg; lognormal variance with pedigree 0.0032, pedigree (1,3,3,1,1)
  Amount and activity link based on primary data collected from participating companies.
- Zinc, in ground [natural resource, in ground]: 6.60968e-6 kg; lognormal variance with pedigree 0.0032, pedigree (1,3,3,1,1)
  Amount and activity link based on primary data collected from participating companies.
- Titanium, in ground [natural resource, in ground]: 1.11558e-9 kg; lognormal variance with pedigree 0.0032, pedigree (1,3,3,1,1)
  Amount and activity link based on primary data collected from participating companies.
- Sodium, in ground [natural resource, in ground]: 9.03299e-10 kg; lognormal variance with pedigree 0.0032, pedigree (1,3,3,1,1)
  Amount and activity link based on primary data collected from participating companies.
- Nickel, in ground [natural resource, in ground]: 1.7795e-11 kg; lognormal variance with pedigree 0.0032, pedigree (1,3,3,1,1)
  Amount and activity link based on primary data collected from participating companies.
- Silver, in ground [natural resource, in ground]: 2.41378e-9 kg; lognormal variance with pedigree 0.0032, pedigree (1,3,3,1,1)
  Amount and activity link based on primary data collected from participating companies.
- Potassium, in ground [natural resource, in ground]: 2.95831e-8 kg; lognormal variance with pedigree 0.0032, pedigree (1,3,3,1,1)
  Amount and activity link based on primary data collected from participating companies.
- Manganese, in ground [natural resource, in ground]: 1.70872e-9 kg; lognormal variance with pedigree 0.0032, pedigree (1,3,3,1,1)
  Amount and activity link based on primary data collected from participating companies.
- Magnesium, in ground [natural resource, in ground]: 4.69264e-7 kg; lognormal variance with pedigree 0.0032, pedigree (1,3,3,1,1)
  Amount and activity link based on primary data collected from participating companies.
- Phosphorus, in ground [natural resource, in ground]: 2.01888e-10 kg; lognormal variance with pedigree 0.0032, pedigree (1,3,3,1,1)
  Amount and activity link based on primary data collected from participating companies.
- Iron, in ground [natural resource, in ground]: 2.96282e-8 kg; lognormal variance with pedigree 0.0032, pedigree (1,3,3,1,1)
  Amount and activity link based on primary data collected from participating companies.
- Mercury, in ground [natural resource, in ground]: 2.40729e-13 kg; lognormal variance with pedigree 0.0032, pedigree (1,3,3,1,1)
  Amount and activity link based on primary data collected from participating companies.
- Lead, in ground [natural resource, in ground]: 1.41324e-6 kg; lognormal variance with pedigree 0.0032, pedigree (1,3,3,1,1)
  Amount and activity link based on primary data collected from participating companies.
- Sand, unspecified, in ground [natural resource, in ground]: 0.231401 kg; lognormal variance with pedigree 0.0032, pedigree (1,3,3,1,1)
  Amount and activity link based on primary data collected from participating companies.
- Cadmium, in ground [natural resource, in ground]: 7.76838e-10 kg; lognormal variance with pedigree 0.0032, pedigree (1,3,3,1,1)
  Amount and activity link based on primary data collected from participating companies.
- Calcium, in ground [natural resource, in ground]: 8.20919e-7 kg; lognormal variance with pedigree 0.0032, pedigree (1,3,3,1,1)
  Amount and activity link based on primary data collected from participating companies.
- Barium, in ground [natural resource, in ground]: 1.25559e-10 kg; lognormal variance with pedigree 0.0032, pedigree (1,3,3,1,1)
  Amount and activity link based on primary data collected from participating companies.
- Water, well, in ground [natural resource, in water]: 0.0019556 m3; lognormal variance with pedigree 0.0032, pedigree (1,3,3,1,1)
  Amount and activity link based on primary data collected from participating companies.
- Chromium, in ground [natural resource, in ground]: 2.91765e-11 kg; lognormal variance with pedigree 0.0032, pedigree (1,3,3,1,1)
  Amount and activity link based on primary data collected from participating companies.
- Occupation, industrial area [natural resource, land]: 0.000862116 m2*year; lognormal variance with pedigree 0.008, pedigree (1,1,4,1,1)
  (same comment as for polyethylene, linear low density, granulate)
- Transformation, from unspecified [natural resource, land]: 1.41954e-5 m2; lognormal variance with pedigree 0.008, pedigree (1,1,4,1,1)
  (same comment as for polyethylene, linear low density, granulate)
- Transformation, to industrial area [natural resource, land]: 1.47115e-5 m2; lognormal variance with pedigree 0.008, pedigree (1,1,4,1,1)
  (same comment as for polyethylene, linear low density, granulate)
- Transformation, from pasture, man made [natural resource, land]: 1.82242e-7 m2; source ENERCON GmbH 2010; lognormal variance with pedigree 0.0481, pedigree (1,1,4,3,1)
  Literature value
  Uncertainty: Estimated variance.
- Transformation, to urban, continuously built [natural resource, land]: 9.56255e-7 m2; lognormal variance with pedigree 0.242225, pedigree (1,4,2,2,5)
  Calculated value. Based on survey data.
- Occupation, urban, continuously built [natural resource, land]: 7.17191e-5 m2*year; lognormal variance with pedigree 0.162225, pedigree (1,4,2,2,5)
  Calculated value. Based on survey data, the gross floor area multiplied by the lifetime of the building.
- Transformation, from urban, continuously built [natural resource, land]: 4.88024e-7 m2; lognormal variance with pedigree 0.242225, pedigree (1,4,2,2,5)
  Calculated value. Based on survey data.
- Transformation, from urban, green area [natural resource, land]: 4.01074e-7 m2; lognormal variance with pedigree 0.242225, pedigree (1,4,2,2,5)
  Calculated value. Based on survey data.
- Transformation, from heterogeneous, agricultural [natural resource, land]: 4.01065e-7 m2; lognormal variance with pedigree 0.1726, pedigree (2,4,5,1,1)
  Literature value.
  Uncertainty: literature studies
- Occupation, mineral extraction site [natural resource, land]: 0.00376964 m2*year; lognormal variance with pedigree 0.0466, pedigree (2,4,3,5,1)
  Measured Value, occupation x service life estimation (100y) of the loading port. No occupation of the river considered since mining occurs in a barge.
  Uncertainty: Default basic uncertainty
- Transformation, to mineral extraction site [natural resource, land]: 3.76964e-5 m2; lognormal variance with pedigree 0.1266, pedigree (2,4,3,5,1)
  Measured Value, occupation and production estimate of one company with 5 different loading ports, based on aerial images. The total area of the ports is 2.69E+5 m2, while the production of sand is1.03E+09 kg.
  Transformation of the river is not considered.
- Transformation, from wetland, inland (non-use) [natural resource, land]: 1.88482e-5 m2; lognormal variance with pedigree 0.1266, pedigree (2,4,3,5,1)
  Measured Value, loading ports installation occur on the margin of rivers with special permissions. According to local environmental law, constructions on the riverside should protect at least 30 m of distance for riparian forest recovery. (Brazilian Law Nº 12.651, from 2012), in this case, the transformation, from the wetland, considered as 50% of the original area. Transformation of the river is not considered.
  Uncertainty: Default basic uncertainty
- Transformation, from forest, unspecified [natural resource, land]: 1.88482e-5 m2; lognormal variance with pedigree 0.1266, pedigree (2,4,3,5,1)
  Measured Value, loading ports installation occur on the margin of rivers with special permissions. According to local environmental law, constructions on the riverside should protect at least 30 m of distance for riparian forest recovery. (Brazilian Law Nº 12.651, from 2012), in this case, the transformation, from the forest, considered as 50% of the original area. Transformation of the river is not considered.
  Uncertainty: Default basic uncertainty

## Emissions to nature
- COD, Chemical Oxygen Demand [water, ground-, long-term]: 0 kg; pedigree (1,1,1,1,1)
  Long-term emissions from landfilling of incineration residues.
  Uncertainty: uncertainty is calculated from uncertainties in waste composition and transfer coefficients in incinerator and landfills.
- DOC, Dissolved Organic Carbon [water, ground-, long-term]: 0 kg; pedigree (1,1,1,1,1)
  (same comment as for COD, Chemical Oxygen Demand)
- Mercury [air, urban air close to ground]: 0 kg; pedigree (1,1,1,1,1)
  Emission to air from waste composition and transfer coefficients.
  Uncertainty: uncertainty is calculated from uncertainties in waste composition and transfer coefficients in incinerator
- Sulfate [water, ground-, long-term]: 0 kg; pedigree (1,1,1,1,1)
  (same comment as for COD, Chemical Oxygen Demand)
- Chloride [water, ground-, long-term]: 0 kg; pedigree (1,1,1,1,1)
  (same comment as for COD, Chemical Oxygen Demand)
- Arsenic, ion [water, ground-, long-term]: 0 kg; pedigree (1,1,1,1,1)
  (same comment as for COD, Chemical Oxygen Demand)
- Cadmium, ion [water, ground-, long-term]: 0 kg; pedigree (1,1,1,1,1)
  (same comment as for COD, Chemical Oxygen Demand)
- Cobalt [water, ground-, long-term]: 0 kg; pedigree (1,1,1,1,1)
  (same comment as for COD, Chemical Oxygen Demand)
- Chromium VI [water, ground-, long-term]: 0 kg; pedigree (1,1,1,1,1)
  (same comment as for COD, Chemical Oxygen Demand)
- Copper, ion [water, ground-, long-term]: 0 kg; pedigree (1,1,1,1,1)
  (same comment as for COD, Chemical Oxygen Demand)
- Carbon monoxide, fossil [air, urban air close to ground]: 0 kg; pedigree (1,1,1,1,1)
  Incomplete combustion product emitted to air.
  Uncertainty: uncertainty calculated from uncertainty in average operation emissions, and the uncertainty of the flue gas volume from this waste.
- Mercury [water, ground-, long-term]: 0 kg; pedigree (1,1,1,1,1)
  (same comment as for COD, Chemical Oxygen Demand)
- Ammonia [air, urban air close to ground]: 0 kg; pedigree (1,1,1,1,1)
  Nitrogen species emitted to air after DeNOx stage.
  Uncertainty: uncertainty calculated from uncertainty in average N-emissions and uncertainty in the share of thermal NOx and the uncertainty in nitrogen content in *this* waste.
- Zinc [air, urban air close to ground]: 0 kg; pedigree (1,1,1,1,1)
  (same comment as for Mercury)
- Manganese [water, ground-, long-term]: 0 kg; pedigree (1,1,1,1,1)
  (same comment as for COD, Chemical Oxygen Demand)
- Carbon dioxide, fossil [air, urban air close to ground]: 0 kg; pedigree (1,1,1,1,1)
  (same comment as for Mercury)
- Nickel, ion [water, ground-, long-term]: 0 kg; pedigree (1,1,1,1,1)
  (same comment as for COD, Chemical Oxygen Demand)
- Lead [water, ground-, long-term]: 0 kg; pedigree (1,1,1,1,1)
  (same comment as for COD, Chemical Oxygen Demand)
- Antimony [water, ground-, long-term]: 0 kg; pedigree (1,1,1,1,1)
  (same comment as for COD, Chemical Oxygen Demand)
- BOD5, Biological Oxygen Demand [water, surface water]: 7.02627e-10 kg; lognormal variance with pedigree 0.019384, pedigree (1,1,3,1,1)
  Emissions to water from waste composition and transfer coefficients in incinerator and landfills.
  Uncertainty: uncertainty is calculated from uncertainties in waste composition and transfer coefficients in incinerator and landfills
- Tin, ion [water, ground-, long-term]: 0 kg; pedigree (1,1,1,1,1)
  (same comment as for COD, Chemical Oxygen Demand)
- Iron, ion [water, ground-, long-term]: 0 kg; pedigree (1,1,1,1,1)
  (same comment as for COD, Chemical Oxygen Demand)
- Vanadium, ion [water, ground-, long-term]: 0 kg; pedigree (1,1,1,1,1)
  (same comment as for COD, Chemical Oxygen Demand)
- Sulfur dioxide [air, urban air close to ground]: 0 kg; pedigree (1,1,1,1,1)
  (same comment as for Mercury)
- TOC, Total Organic Carbon [water, surface water]: 1.90007e-9 kg; lognormal variance with pedigree 0.01921, pedigree (1,1,3,1,1)
  (same comment as for BOD5, Biological Oxygen Demand)
- Methane, fossil [air, urban air close to ground]: 0 kg; pedigree (1,1,1,1,1)
  (same comment as for Carbon monoxide, fossil)
- Thallium [water, ground-, long-term]: 0 kg; pedigree (1,1,1,1,1)
  (same comment as for COD, Chemical Oxygen Demand)
- Cadmium [air, urban air close to ground]: 0 kg; pedigree (1,1,1,1,1)
  (same comment as for Mercury)
- DOC, Dissolved Organic Carbon [water, surface water]: 1.90007e-9 kg; lognormal variance with pedigree 0.01921, pedigree (1,1,3,1,1)
  (same comment as for BOD5, Biological Oxygen Demand)
- Arsenic, ion [water, surface water]: 2.76648e-10 kg
  Emissions to water from waste composition and transfer coefficients in incinerator and landfills.
- Sulfate [water, surface water]: 4.6293e-8 kg; lognormal variance with pedigree 0.24411, pedigree (1,1,3,1,1)
  (same comment as for BOD5, Biological Oxygen Demand)
- Chloride [water, surface water]: 2.25815e-10 kg; lognormal variance with pedigree 0.10419, pedigree (1,1,3,1,1)
  (same comment as for BOD5, Biological Oxygen Demand)
- Calcium, ion [water, ground-, long-term]: 0 kg; pedigree (1,1,1,1,1)
  (same comment as for COD, Chemical Oxygen Demand)
- Cadmium, ion [water, surface water]: 2.39903e-11 kg; lognormal variance with pedigree 1.2405, pedigree (1,1,3,1,1)
  (same comment as for BOD5, Biological Oxygen Demand)
- Aluminium [water, ground-, long-term]: 0 kg; pedigree (1,1,1,1,1)
  (same comment as for COD, Chemical Oxygen Demand)
- Cobalt [water, surface water]: 0 kg; pedigree (1,1,1,1,1)
  (same comment as for BOD5, Biological Oxygen Demand)
- NMVOC, non-methane volatile organic compounds, unspecified origin [air, urban air close to ground]: 0 kg; pedigree (1,1,1,1,1)
  (same comment as for Carbon monoxide, fossil)
- Zinc, ion [water, ground-, long-term]: 0 kg; pedigree (1,1,1,1,1)
  (same comment as for COD, Chemical Oxygen Demand)
- Chromium VI [water, surface water]: 1.25134e-9 kg; lognormal variance with pedigree 0.1697, pedigree (1,1,3,1,1)
  (same comment as for BOD5, Biological Oxygen Demand)
- Particulates, < 2.5 um [air, urban air close to ground]: 0 kg; pedigree (1,1,1,1,1)
  (same comment as for Carbon monoxide, fossil)
- Copper, ion [water, surface water]: 1.00227e-10 kg; lognormal variance with pedigree 1.0161, pedigree (1,1,3,1,1)
  (same comment as for BOD5, Biological Oxygen Demand)
- Particulates, > 2.5 um, and < 10um [air, urban air close to ground]: 0 kg; pedigree (1,1,1,1,1)
  (same comment as for Carbon monoxide, fossil)
- Mercury [water, surface water]: 1.56205e-12 kg; lognormal variance with pedigree 2.083, pedigree (1,1,3,1,1)
  (same comment as for BOD5, Biological Oxygen Demand)
- Nitrogen oxides [air, urban air close to ground]: 0 kg; pedigree (1,1,1,1,1)
  Sum of fuel-Nox and thermal-NOx emitted to air after DeNOx stage.
  Uncertainty: uncertainty calculated from uncertainty in average N-emissions and uncertainty in the share of thermal NOx and the uncertainty in nitrogen content in *this* waste.
- Dioxins, measured as 2,3,7,8-tetrachlorodibenzo-p-dioxin [air, urban air close to ground]: 0 kg; pedigree (1,1,1,1,1)
  (same comment as for Carbon monoxide, fossil)
- Lead [air, urban air close to ground]: 0 kg; pedigree (1,1,1,1,1)
  (same comment as for Mercury)
- Manganese [water, surface water]: 1.64495e-10 kg; lognormal variance with pedigree 1.2196, pedigree (1,1,3,1,1)
  (same comment as for BOD5, Biological Oxygen Demand)
- COD, Chemical Oxygen Demand [water, surface water]: 5.20413e-9 kg; lognormal variance with pedigree 0.019237, pedigree (1,1,3,1,1)
  (same comment as for BOD5, Biological Oxygen Demand)
- Benzene [air, urban air close to ground]: 0 kg; pedigree (1,1,1,1,1)
  (same comment as for Carbon monoxide, fossil)
- Nickel, ion [water, surface water]: 3.03136e-12 kg; lognormal variance with pedigree 0.72042, pedigree (1,1,3,1,1)
  (same comment as for BOD5, Biological Oxygen Demand)
- Toluene [air, urban air close to ground]: 0 kg; pedigree (1,1,1,1,1)
  (same comment as for Carbon monoxide, fossil)
- Lead [water, surface water]: 3.21002e-11 kg; lognormal variance with pedigree 0.83665, pedigree (1,1,3,1,1)
  (same comment as for BOD5, Biological Oxygen Demand)
- Benzene, pentachloro- [air, urban air close to ground]: 0 kg; pedigree (1,1,1,1,1)
  (same comment as for Carbon monoxide, fossil)
- Antimony [water, surface water]: 9.69524e-13 kg; lognormal variance with pedigree 0.031563, pedigree (1,1,3,1,1)
  (same comment as for BOD5, Biological Oxygen Demand)
- Benzene, hexachloro- [air, urban air close to ground]: 0 kg; pedigree (1,1,1,1,1)
  (same comment as for Carbon monoxide, fossil)
- Tin, ion [water, surface water]: 0 kg; pedigree (1,1,1,1,1)
  (same comment as for BOD5, Biological Oxygen Demand)
- Phenol, pentachloro- [air, urban air close to ground]: 0 kg; pedigree (1,1,1,1,1)
  (same comment as for Carbon monoxide, fossil)
- Silicon [water, ground-, long-term]: 0 kg; pedigree (1,1,1,1,1)
  (same comment as for COD, Chemical Oxygen Demand)
- Vanadium, ion [water, surface water]: 0 kg; pedigree (1,1,1,1,1)
  (same comment as for BOD5, Biological Oxygen Demand)
- Benzo(a)pyrene [air, urban air close to ground]: 0 kg; pedigree (1,1,1,1,1)
  (same comment as for Carbon monoxide, fossil)
- Zinc, ion [water, surface water]: 4.72604e-9 kg; lognormal variance with pedigree 0.40035, pedigree (1,1,3,1,1)
  (same comment as for BOD5, Biological Oxygen Demand)
- Heat, waste [water, surface water]: 0 MJ; pedigree (1,1,1,1,1)
  Waste heat generated from heating value of this waste plus any electricity required to process it.
  Uncertainty: uncertainty is calculated from uncertainties in waste composition and uncertainties in energy efficiency and the uncertainty in internal energy demand
- Thallium [water, surface water]: 0 kg; pedigree (1,1,1,1,1)
  (same comment as for BOD5, Biological Oxygen Demand)
- Hydrogen chloride [air, urban air close to ground]: 0 kg; pedigree (1,1,1,1,1)
  (same comment as for Mercury)
- Heat, waste [air, urban air close to ground]: 0 MJ; pedigree (1,1,1,1,1)
  (same comment as for Heat, waste)
- Silicon [water, surface water]: 0 kg; pedigree (1,1,1,1,1)
  (same comment as for BOD5, Biological Oxygen Demand)
- Water [air, urban air close to ground]: 0 m3; pedigree (1,1,1,1,1)
  Water vapour from waste humidity, hydrogen oxidation and part of the process water.
  Uncertainty: Uncertainty calculated from uncertainty in waste composition, process water input and the uncertainty of fraction to air.
- Iron, ion [water, surface water]: 1.37595e-9 kg; lognormal variance with pedigree 1.2853, pedigree (1,1,3,1,1)
  (same comment as for BOD5, Biological Oxygen Demand)
- Calcium, ion [water, surface water]: 1.62377e-8 kg; lognormal variance with pedigree 0.90314, pedigree (1,1,3,1,1)
  (same comment as for BOD5, Biological Oxygen Demand)
- Water [water, surface water]: 1.80294e-9 m3; lognormal variance with pedigree 1.3565, pedigree (1,1,3,1,1)
  Process water released to surface water.
  Uncertainty: uncertainty calculated from uncertainty in process water input and the uncertainty of fraction to surface water.
- TOC, Total Organic Carbon [water, ground-, long-term]: 0 kg; pedigree (1,1,1,1,1)
  (same comment as for COD, Chemical Oxygen Demand)
- Aluminium [water, surface water]: 5.61231e-13 kg; lognormal variance with pedigree 0.7464, pedigree (1,1,3,1,1)
  (same comment as for BOD5, Biological Oxygen Demand)
- BOD5, Biological Oxygen Demand [water, ground-, long-term]: 0 kg; pedigree (1,1,1,1,1)
  (same comment as for COD, Chemical Oxygen Demand)
- Particulates, < 2.5 um [air, unspecified]: 9.17363e-9 kg; source European Aluminium Association 2008; lognormal variance with pedigree 0.3886, pedigree (2,5,5,1,4)
  Reported as dust emissions to air. Split between three classes of particulates based on CEPMIEP database: 32% <2.5 um, 48% >2.5<10 um, 20% > 10 um. Assumed process emissions and not combustion emissions.
  Uncertainty: Uncertainty accounts for use of CEPMEIP database to split total particulates among the three particulate classes.
- Particulates, > 2.5 um, and < 10um [air, unspecified]: 3.99923e-9 kg; source European Aluminium Association 2008; lognormal variance with pedigree 0.2086, pedigree (2,5,5,1,4)
  Reported as dust emissions to air. Split between three classes of particulates based on CEPMIEP database: 32% <2.5 um, 48% >2.5<10 um, 20% > 10 um . Assumed process emissions and not combustion emissions.
  Uncertainty: Uncertainty accounts for use of CEPMEIP database to split total particulates among the three particulate classes.
- Particulates, > 10 um [air, unspecified]: 1.22206e-8 kg; source European Aluminium Association 2008; lognormal variance with pedigree 0.1286, pedigree (2,5,5,1,4)
  (same comment as for Particulates, > 2.5 um, and < 10um)
- Hydrogen chloride [air, unspecified]: 2.27723e-12 kg; source European Aluminium Association 2008; lognormal variance with pedigree 0.0886, pedigree (2,5,5,1,1)
- Water [air, unspecified]: 0.00010124 m3; lognormal variance with pedigree 0.130025, pedigree (4,4,5,2,4)
  Calculated value based on literature values and expert opinion. See comments in the parametres' comment field.
- Water [water, unspecified]: 0.0020161 m3; lognormal variance with pedigree 0.130025, pedigree (4,4,5,2,4)
  (same comment as for Water)
- Fluoride [water, surface water]: 2.07459e-11 kg; lognormal variance with pedigree 0.7021, pedigree (1,4,5,3,1)
  Data of 1 European plant - reported in Fisher (2006)
  Uncertainty: data of 1 European plant - reported in Fisher (2006)
- Suspended solids, unspecified [water, surface water]: 2.72107e-9 kg; lognormal variance with pedigree 0.0921, pedigree (1,4,5,3,1)
  (same comment as for Fluoride)
- Lead [soil, industrial]: 2.22708e-13 kg; lognormal variance with pedigree 0.0426, pedigree (1,3,3,1,1)
  Amount and activity link based on primary data collected from participating companies.
- Sulfur dioxide [air, unspecified]: 5.15856e-9 kg; lognormal variance with pedigree 0.0032, pedigree (1,3,3,1,1)
  Amount and activity link based on primary data collected from participating companies.
- Ammonia [air, unspecified]: 8.06675e-10 kg; lognormal variance with pedigree 0.0426, pedigree (1,3,3,1,1)
  Amount and activity link based on primary data collected from participating companies.
- Suspended solids, unspecified [water, ocean]: 1.59212e-9 kg; lognormal variance with pedigree 0.0426, pedigree (1,3,3,1,1)
  Amount and activity link based on primary data collected from participating companies.
- Ammonium, ion [water, surface water]: 3.53395e-11 kg; lognormal variance with pedigree 0.0426, pedigree (1,3,3,1,1)
  Amount and activity link based on primary data collected from participating companies.
- Hydrocarbons, unspecified [soil, unspecified]: 7.26125e-12 kg; lognormal variance with pedigree 0.0426, pedigree (1,3,3,1,1)
  Amount and activity link based on primary data collected from participating companies.
- Selenium [air, unspecified]: 4.13794e-13 kg; lognormal variance with pedigree 0.6526, pedigree (1,3,3,1,1)
  Amount and activity link based on primary data collected from participating companies.
- Fluoride [soil, industrial]: 1.45934e-11 kg; lognormal variance with pedigree 0.0426, pedigree (1,3,3,1,1)
  Amount and activity link based on primary data collected from participating companies.
- Sodium [soil, industrial]: 9.13669e-15 kg; lognormal variance with pedigree 0.0426, pedigree (1,3,3,1,1)
  Amount and activity link based on primary data collected from participating companies.
- Benzene [air, unspecified]: 4.77035e-10 kg; lognormal variance with pedigree 0.0426, pedigree (1,3,3,1,1)
  Amount and activity link based on primary data collected from participating companies.
- Lead [air, unspecified]: 6.47282e-10 kg; lognormal variance with pedigree 0.6526, pedigree (1,3,3,1,1)
  Amount and activity link based on primary data collected from participating companies.
- Sulfate [soil, unspecified]: 1.55587e-13 kg; lognormal variance with pedigree 0.0426, pedigree (1,3,3,1,1)
  Amount and activity link based on primary data collected from participating companies.
- Fluorine [air, unspecified]: 2.61922e-11 kg; lognormal variance with pedigree 0.0426, pedigree (1,3,3,1,1)
  Amount and activity link based on primary data collected from participating companies.
- Zinc [soil, industrial]: 6.39174e-11 kg; lognormal variance with pedigree 0.0426, pedigree (1,3,3,1,1)
  Amount and activity link based on primary data collected from participating companies.
- Arsenic, ion [water, ocean]: 1.77162e-15 kg; lognormal variance with pedigree 0.6526, pedigree (1,3,3,1,1)
  Amount and activity link based on primary data collected from participating companies.
- Dissolved solids [water, surface water]: 5.03039e-8 kg; lognormal variance with pedigree 0.0426, pedigree (1,3,3,1,1)
  Amount and activity link based on primary data collected from participating companies.
- Zinc, ion [water, ocean]: 5.88253e-11 kg; lognormal variance with pedigree 0.6526, pedigree (1,3,3,1,1)
  Amount and activity link based on primary data collected from participating companies.
- Selenium [water, surface water]: 4.06491e-14 kg; lognormal variance with pedigree 0.6526, pedigree (1,3,3,1,1)
  Amount and activity link based on primary data collected from participating companies.
- Antimony [air, unspecified]: 4.04815e-12 kg; lognormal variance with pedigree 0.6526, pedigree (1,3,3,1,1)
  Amount and activity link based on primary data collected from participating companies.
- Fluoride [water, ocean]: 1.03042e-12 kg; lognormal variance with pedigree 0.0426, pedigree (1,3,3,1,1)
  Amount and activity link based on primary data collected from participating companies.
- Aldehydes, unspecified [air, unspecified]: 6.52212e-13 kg; lognormal variance with pedigree 0.0426, pedigree (1,3,3,1,1)
  Amount and activity link based on primary data collected from participating companies.
- Formaldehyde [air, unspecified]: 4.915e-11 kg; lognormal variance with pedigree 0.0426, pedigree (1,3,3,1,1)
  Amount and activity link based on primary data collected from participating companies.
- Phosphorus [water, surface water]: 1.42962e-11 kg; lognormal variance with pedigree 0.0426, pedigree (1,3,3,1,1)
  Amount and activity link based on primary data collected from participating companies.
- Sodium, ion [water, surface water]: 1.46122e-9 kg; lognormal variance with pedigree 0.0426, pedigree (1,3,3,1,1)
  Amount and activity link based on primary data collected from participating companies.
- Dioxins, measured as 2,3,7,8-tetrachlorodibenzo-p-dioxin [air, unspecified]: 0 kg; pedigree (1,1,1,1,1)
  Amount and activity link based on primary data collected from participating companies.
- Potassium, ion [water, surface water]: 6.02855e-10 kg; lognormal variance with pedigree 0.0426, pedigree (1,3,3,1,1)
  Amount and activity link based on primary data collected from participating companies.
- Cyanide [water, surface water]: 4.39597e-13 kg; lognormal variance with pedigree 0.0426, pedigree (1,3,3,1,1)
  Amount and activity link based on primary data collected from participating companies.
- COD, Chemical Oxygen Demand [water, ocean]: 9.28602e-14 kg; source Weidema B P 2013; lognormal variance with pedigree 0.25, pedigree (5,5,5,5,5)
  Calculated value. The amount of COD is assumed to be five times that of BOD5, based on the estimates provided in section 5.9.7 of Weidema et al. (2013).
- Copper, ion [water, ocean]: 1.26597e-15 kg; lognormal variance with pedigree 0.6526, pedigree (1,3,3,1,1)
  Amount and activity link based on primary data collected from participating companies.
- Nitrogen oxides [air, unspecified]: 2.27364e-7 kg; lognormal variance with pedigree 0.0426, pedigree (1,3,3,1,1)
  Amount and activity link based on primary data collected from participating companies.
- Cobalt [air, unspecified]: 8.68428e-12 kg; lognormal variance with pedigree 0.6526, pedigree (1,3,3,1,1)
  Amount and activity link based on primary data collected from participating companies.
- Nitrogen, organic bound [water, surface water]: 2.25672e-10 kg; lognormal variance with pedigree 0.0426, pedigree (1,3,3,1,1)
  Amount and activity link based on primary data collected from participating companies.
- DOC, Dissolved Organic Carbon [water, ocean]: 3.09967e-14 kg; lognormal variance with pedigree 0.25, pedigree (5,5,5,5,5)
  Calculated value. The amount of DOC is assumed to be equal to the amount of TOC
- Nitrogen [water, surface water]: 1.13615e-10 kg; lognormal variance with pedigree 0.0426, pedigree (1,3,3,1,1)
  Amount and activity link based on primary data collected from participating companies.
- TOC, Total Organic Carbon [water, ocean]: 3.09967e-14 kg; source Weidema B P 2013; lognormal variance with pedigree 0.25, pedigree (5,5,5,5,5)
  Calculated value. The relation between COD and TOC is assumed to be COD (g O2) = 2.7*TOC (g C), based on the estimates provided in section 5.9.7 of Weidema et al. (2013).
- Chromium [soil, industrial]: 0 kg; pedigree (1,1,1,1,1)
  Amount and activity link based on primary data collected from participating companies.
- Nitric acid [soil, industrial]: 4.86876e-13 kg; lognormal variance with pedigree 0.0426, pedigree (1,3,3,1,1)
  Amount and activity link based on primary data collected from participating companies.
- NMVOC, non-methane volatile organic compounds, unspecified origin [air, unspecified]: 4.17523e-7 kg; lognormal variance with pedigree 0.0426, pedigree (1,3,3,1,1)
  Amount and activity link based on primary data collected from participating companies.
- Copper [soil, industrial]: 2.47445e-11 kg; lognormal variance with pedigree 0.0426, pedigree (1,3,3,1,1)
  Amount and activity link based on primary data collected from participating companies.
- PAH, polycyclic aromatic hydrocarbons [air, unspecified]: 1.02062e-14 kg; lognormal variance with pedigree 0.3026, pedigree (1,3,3,1,1)
  Amount and activity link based on primary data collected from participating companies.
- Chromium VI [air, unspecified]: 1.00299e-13 kg; lognormal variance with pedigree 0.6526, pedigree (1,3,3,1,1)
  Amount and activity link based on primary data collected from participating companies.
- Nickel [soil, industrial]: 9.54661e-14 kg; lognormal variance with pedigree 0.0426, pedigree (1,3,3,1,1)
  Amount and activity link based on primary data collected from participating companies.
- Chromium [air, unspecified]: 1.16333e-11 kg; lognormal variance with pedigree 0.6526, pedigree (1,3,3,1,1)
  Amount and activity link based on primary data collected from participating companies.
- Nitrogen [soil, industrial]: 1.85097e-11 kg; lognormal variance with pedigree 0.0426, pedigree (1,3,3,1,1)
  Amount and activity link based on primary data collected from participating companies.
- Copper [air, unspecified]: 6.96837e-10 kg; lognormal variance with pedigree 0.6526, pedigree (1,3,3,1,1)
  Amount and activity link based on primary data collected from participating companies.
- Nickel [air, unspecified]: 7.29895e-12 kg; lognormal variance with pedigree 0.6526, pedigree (1,3,3,1,1)
  Amount and activity link based on primary data collected from participating companies.
- Ammonia [soil, industrial]: 6.01922e-12 kg; lognormal variance with pedigree 0.0426, pedigree (1,3,3,1,1)
  Amount and activity link based on primary data collected from participating companies.
- Carbon dioxide, non-fossil [air, unspecified]: 1.92462e-8 kg; lognormal variance with pedigree 0.0032, pedigree (1,3,3,1,1)
  Amount and activity link based on primary data collected from participating companies.
- Nitrate [water, surface water]: 1.42727e-9 kg; lognormal variance with pedigree 0.0426, pedigree (1,3,3,1,1)
  Amount and activity link based on primary data collected from participating companies.
- Chlorine [water, surface water]: 7.23193e-10 kg; lognormal variance with pedigree 0.0426, pedigree (1,3,3,1,1)
  Amount and activity link based on primary data collected from participating companies.
- Nickel, ion [water, ocean]: 0 kg; pedigree (1,1,1,1,1)
  Amount and activity link based on primary data collected from participating companies.
- Carbon monoxide, fossil [air, unspecified]: 3.71998e-8 kg; lognormal variance with pedigree 0.6526, pedigree (1,3,3,1,1)
  Amount and activity link based on primary data collected from participating companies.
- Methane, fossil [air, unspecified]: 6.62473e-10 kg; lognormal variance with pedigree 0.0426, pedigree (1,3,3,1,1)
  Amount and activity link based on primary data collected from participating companies.
- Methanol [air, unspecified]: 2.95715e-10 kg; lognormal variance with pedigree 0.0426, pedigree (1,3,3,1,1)
  Amount and activity link based on primary data collected from participating companies.
- Mercury [air, unspecified]: 3.8306e-13 kg; lognormal variance with pedigree 0.6526, pedigree (1,3,3,1,1)
  Amount and activity link based on primary data collected from participating companies.
- Calcium [soil, industrial]: 2.74531e-13 kg; lognormal variance with pedigree 0.0426, pedigree (1,3,3,1,1)
  Amount and activity link based on primary data collected from participating companies.
- Mercury [soil, industrial]: 3.87518e-15 kg; lognormal variance with pedigree 0.0426, pedigree (1,3,3,1,1)
  Amount and activity link based on primary data collected from participating companies.
- Magnesium [water, surface water]: 1.12284e-9 kg; lognormal variance with pedigree 0.0426, pedigree (1,3,3,1,1)
  Amount and activity link based on primary data collected from participating companies.
- Beryllium [air, unspecified]: 2.68242e-13 kg; lognormal variance with pedigree 0.0426, pedigree (1,3,3,1,1)
  Amount and activity link based on primary data collected from participating companies.
- Manganese [soil, industrial]: 1.38116e-11 kg; lognormal variance with pedigree 0.0426, pedigree (1,3,3,1,1)
  Amount and activity link based on primary data collected from participating companies.
- Cadmium [air, unspecified]: 6.77368e-12 kg; lognormal variance with pedigree 0.6526, pedigree (1,3,3,1,1)
  Amount and activity link based on primary data collected from participating companies.
- Manganese [water, ocean]: 1.10785e-13 kg; lognormal variance with pedigree 0.6526, pedigree (1,3,3,1,1)
  Amount and activity link based on primary data collected from participating companies.
- BOD5, Biological Oxygen Demand [water, ocean]: 1.67382e-14 kg; lognormal variance with pedigree 0.0426, pedigree (1,3,3,1,1)
  Amount and activity link based on primary data collected from participating companies.
- Mercury [water, ocean]: 0 kg; pedigree (1,1,1,1,1)
  Amount and activity link based on primary data collected from participating companies.
- Carbon dioxide, fossil [air, unspecified]: 2.38229e-5 kg; lognormal variance with pedigree 0.0032, pedigree (1,3,3,1,1)
  Amount and activity link based on primary data collected from participating companies. Accounts for on-site combustion of diesel at mine. Some companies provided emissions on the combustion of natural gas, diesel, propane, or other fuels, which are included here. If no emissions were provided for these other fuels then input is reflected as a an input of heat instead of a direct fuel input.
- Cadmium [soil, industrial]: 9.55801e-14 kg; lognormal variance with pedigree 0.0426, pedigree (1,3,3,1,1)
  Amount and activity link based on primary data collected from participating companies.
- Manganese [air, unspecified]: 4.66389e-11 kg; lognormal variance with pedigree 0.6526, pedigree (1,3,3,1,1)
  Amount and activity link based on primary data collected from participating companies.
- Arsenic [soil, industrial]: 2.65335e-14 kg; lognormal variance with pedigree 0.0426, pedigree (1,3,3,1,1)
  Amount and activity link based on primary data collected from participating companies.
- VOC, volatile organic compounds, unspecified origin [air, unspecified]: 3.14229e-11 kg; lognormal variance with pedigree 0.0426, pedigree (1,3,3,1,1)
  Amount and activity link based on primary data collected from participating companies.
- Cadmium, ion [water, ocean]: 5.20858e-13 kg; lognormal variance with pedigree 0.6526, pedigree (1,3,3,1,1)
  Amount and activity link based on primary data collected from participating companies.
- Lead [water, ocean]: 1.06484e-11 kg; lognormal variance with pedigree 0.6526, pedigree (1,3,3,1,1)
  Amount and activity link based on primary data collected from participating companies.
- Benzo(a)pyrene [air, unspecified]: 0 kg; pedigree (1,1,1,1,1)
  Amount and activity link based on primary data collected from participating companies.
- Hydrogen fluoride [air, unspecified]: 1.75067e-12 kg; lognormal variance with pedigree 0.0426, pedigree (1,3,3,1,1)
  Amount and activity link based on primary data collected from participating companies.
- Sulfur oxides [air, unspecified]: 2.14576e-11 kg; lognormal variance with pedigree 0.0426, pedigree (1,3,3,1,1)
  Amount and activity link based on primary data collected from participating companies.
- Zinc [air, unspecified]: 6.46682e-10 kg; lognormal variance with pedigree 0.6526, pedigree (1,3,3,1,1)
  Amount and activity link based on primary data collected from participating companies.
- Arsenic [air, unspecified]: 3.55896e-11 kg; lognormal variance with pedigree 0.6526, pedigree (1,3,3,1,1)
  Amount and activity link based on primary data collected from participating companies.
- Phosphate [water, surface water]: 2.65524e-11 kg; lognormal variance with pedigree 0.1287, pedigree (4,3,5,3,4)
  Uncertainty: weight ratio scooter:passenger car
- COD, Chemical Oxygen Demand [water, unspecified]: 4.79393e-9 kg; source F. Habermacher 2011; lognormal variance with pedigree 0.0452, pedigree (1,4,3,4,2)
  Extrapolated from ecoinvent v2.2 passenger car.
- BOD5, Biological Oxygen Demand [water, unspecified]: 4.52125e-9 kg; source F. Habermacher 2011; lognormal variance with pedigree 0.0832, pedigree (1,4,5,4,2)
  Extrapolated from ecoinvent v2.2 passenger car.
- TOC, Total Organic Carbon [water, unspecified]: 2.0753e-9 kg; lognormal variance with pedigree 0.0452, pedigree (1,4,3,4,2)
  Derived from COD as described in ecoinvent 3 Data Quality Guidelines (p. 49, paragraph 5.9.7). The same Pedigree matrix value as COD has been used.
- DOC, Dissolved Organic Carbon [water, unspecified]: 2.0753e-9 kg; lognormal variance with pedigree 0.0452, pedigree (1,4,3,4,2)
  (same comment as for TOC, Total Organic Carbon)
- Phosphate [water, unspecified]: 1.63283e-12 kg; source F. Habermacher 2011; lognormal variance with pedigree 0.0441, pedigree (1,4,3,3,1)
  Extrapolated from ecoinvent v2.2 passenger car.
- Molybdenum [air, unspecified]: 0 kg; pedigree (1,1,1,1,1)
  Amount based on primary data collected from participating companies.
- Hydrocarbons, unspecified [air, non-urban air or from high stacks]: 2.26683e-15 kg; lognormal variance with pedigree 0.0426, pedigree (1,3,3,1,1)
  Amount based on primary data collected from participating companies.
- Iron, ion [water, ocean]: 0 kg; pedigree (1,1,1,1,1)
  Amount based on primary data collected from participating companies.
- Thallium [water, ocean]: 0 kg; pedigree (1,1,1,1,1)
  Amount based on primary data collected from participating companies.
- Sulfur [soil, industrial]: 1.42067e-11 kg; lognormal variance with pedigree 0.0426, pedigree (1,3,3,1,1)
  Amount based on primary data collected from participating companies.
- Cyanide [water, ocean]: 0 kg; pedigree (1,1,1,1,1)
  Amount based on primary data collected from participating companies.
- Sulfuric acid [air, unspecified]: 2.66351e-14 kg; lognormal variance with pedigree 0.0426, pedigree (1,3,3,1,1)
  Amount based on primary data collected from participating companies.
- Chlorine [air, unspecified]: 0 kg; pedigree (1,1,1,1,1)
  Amount based on primary data collected from participating companies.
- Phenol [water, surface water]: 0 kg; pedigree (1,1,1,1,1)
  Amount based on primary data collected from participating companies.
- Nitrogen [water, ocean]: 1.04091e-14 kg; lognormal variance with pedigree 0.0426, pedigree (1,3,3,1,1)
  Amount based on primary data collected from participating companies.
- Ammonium, ion [water, ocean]: 4.29883e-15 kg; lognormal variance with pedigree 0.0426, pedigree (1,3,3,1,1)
  Amount based on primary data collected from participating companies.
- Nitrate [water, ocean]: 0 kg; pedigree (1,1,1,1,1)
  Amount based on primary data collected from participating companies.
- Nitrogen dioxide [water, surface water]: 0 kg; pedigree (1,1,1,1,1)
  Amount based on primary data collected from participating companies.
- Acidity, unspecified [water, surface water]: 0 kg; pedigree (1,1,1,1,1)
  Amount based on primary data collected from participating companies.
- Sulfuric acid [water, surface water]: 8.49703e-13 kg; lognormal variance with pedigree 0.0426, pedigree (1,3,3,1,1)
  Amount based on primary data collected from participating companies.
- Xylene [air, unspecified]: 1.95859e-10 kg; source MAN Nutzfahrzeuge AG 2000; lognormal variance with pedigree 0.162, pedigree (1,1,5,5,1)
  Calculated value. Based on the diesel consumption for engine testing, direct environmental emissions to air are calculated, employing the emission profile of a lorry 28t empty. Is assumed that diesel is used for engine testing and the operation of fork-lifters. The latter is modeled as building machine.Energy expenditures for stationary combustion processes are available from environmental reports of a German lorry manufacturer MAN Nutzfahrzeuge AG (2000) and MAN Nutzfahrzeuge AG (2002).
  Additional references:
  MAN Nutzfahrzeuge AG (2002) Umwelterklärung 2002. MAN Nutzfahrzeuge AG, München.
- Dinitrogen monoxide [air, unspecified]: 7.92676e-10 kg; source MAN Nutzfahrzeuge AG 2000; lognormal variance with pedigree 0.162, pedigree (1,1,5,5,1)
  (same comment as for Xylene)
- Toluene [air, unspecified]: 1.95859e-10 kg; source MAN Nutzfahrzeuge AG 2000; lognormal variance with pedigree 0.162, pedigree (1,1,5,5,1)
  (same comment as for Xylene)
- Oils, unspecified [soil, unspecified]: 4.40299e-5 kg; lognormal variance with pedigree 0.0186, pedigree (4,5,3,1,1)
  Estimated value.
- Carbon dioxide, fossil [air, non-urban air or from high stacks]: 2.39957e-6 kg; source Spielmann, M. 2007; lognormal variance with pedigree 0.0543166, pedigree (1,1,3,1,1)
  acethylene converted to CO2
- Solids, inorganic [water, ocean]: 8.0923e-5 kg; source Avadí, A. 2018
  Waste paint, 2/3 of solids emitted to ocean
