# treatment of waste bitumen, sanitary landfill

Dataset: EcoSpold 2, unit process
Geography: CH
Time period: 1994-01-01 to 2019-12-31
Technology level: current
Classification: EcoSpold01Categories: waste management/sanitary landfill
Classification: ISIC rev.4 ecoinvent: 3821:Treatment and disposal of non-hazardous waste
Tags: ConvertedDataset; Treatment
Scenario: Business-as-Usual
System model: Allocation at the point of substitution
Generated by: Gabor Doka (obsolete)
Published in: Doka G. 2007
Database: ecoinvent
isCopyrightProtected: true
accessRestrictedTo: 1

## General comment
Inventoried waste contains 100% bitumen; .
waste composition (wet, in ppm): upper heating value 41.39 MJ/kg; lower heating value 39.38 MJ/kg; H2O 13560; O 10000; H 100000; C 830860; S 40000; N 5000; P 4; B n.a.; Cl n.a.; Br n.a.; F n.a.; I n.a.; Ag n.a.; As 0.7; Ba n.a.; Cd n.a.; Co 0.43; Cr 0.35; Cu 5; Hg 0.02; Mn n.a.; Mo 0.56; Ni 100; Pb 1; Sb n.a.; Se 0.2; Sn 89; V 250; Zn n.a.; Be n.a.; Sc n.a.; Sr n.a.; Ti n.a.; Tl n.a.; W n.a.; Si 6; Fe 75; Ca 6; Al 7; K n.a.; Mg n.a.; Na 35;
Share of carbon in waste that is biogenic 0%.
Overall degradability of waste during 100 years: 1%.
[This dataset was already contained in the ecoinvent database version 2. It was not individually updated during the transfer to ecoinvent version 3. Life Cycle Impact Assessment results may still have changed, as they are affected by changes in the supply chain, i.e. in other datasets. This dataset was generated following the ecoinvent quality guidelines for version 2. It may have been subject to central changes described in the ecoinvent version 3 change report (http://www.ecoinvent.org/database/ecoinvent-version-3/reports-of-changes/), and the results of the central updates were reviewed extensively. The changes added e.g. consistent water flows and other information throughout the database. The documentation of this dataset can be found in the ecoinvent reports of version 2, which are still available via the ecoinvent website. The change report linked above covers all central changes that were made during the conversion process.]

## Included activities end
Waste-specific short-term emissions to air via landfill gas incineration and landfill leachate. Burdens from treatment of short-term leachate (0-100a) in wastewater treatment plant (including WWTP sludge disposal in municipal incinerator). Long-term emissions from landfill to groundwater (after base lining failure).

## Geography
Technology encountered in Switzerland in 2000. Landfill includes base seal, leachate collection system, treatment of leachate in municipal wastewater treatment plant.

## Technology
Swiss municipal sanitary landfill for biogenic or untreated municipal waste ('reactive organic landfill'). Landfill gas and leachate collection system. Recultivation and monitoring for 150 years after closure.

## Reference product
- waste bitumen: -1 kg; CPC 39990: Other wastes n.e.c.; By-product classification Waste; CAS 8052-42-4
  production volume 0.0336675 kg
    This is a placeholder value that does not reflect real-world production volumes. This dataset does not currently require a real-world production volume to work in the database framework, and no actual data were collected yet. This has no negative effect on the results of the ecoinvent database. The placeholder value of this activity was scaled according to the nominal GDP of 2005 (source: United Nations, http://data.un.org/Glossary.aspx?q=GDP+%28current+US%24%29, accessed 20130726) to reflect an appropriate share of the global production volume, which is also a placeholder value.
  property price 0 EUR2005
    Waste products are assigned a price of zero as they are assumed to require further treatment.
  property carbon content 0.842657
    carbon content on a dry matter basis (reserved; not for manual entry)
  properties: water content 0.0141988, carbon content, non-fossil 0, wet mass 1 kg, water in wet mass 0.014 kg, dry mass 0.986 kg, carbon content, fossil 0.842657, carbon allocation 0.83086 kg

## By-products
- electricity, for reuse in municipal waste incineration only: 0 kWh; CPC 17100: Electrical energy; By-product classification allocatable product; pedigree (1,1,1,1,1)
  Net electricity generated from this waste and used in internal MSWI plant energy redistribution.
  Uncertainty: uncertainty is calculated from uncertainties in waste composition and uncertainties in energy efficiency and the uncertainty in internal energy demand
  property exergy 3.6 MJ; name E_el_prod_MSWI_exergy
  property true value relation 3.6; name E_el_prod_MSWI_true_value_relation
  property price 0.1 EUR2005; name E_el_prod_MSWI_price_EUR2005
- heat, for reuse in municipal waste incineration only: 0 MJ; CPC 17300: Steam and hot water; By-product classification allocatable product; pedigree (1,1,1,1,1)
  Net useful heat generated from this waste and used in internal MSWI plant energy redistribution.
  Uncertainty: uncertainty is calculated from uncertainties in waste composition and uncertainties in energy efficiency and the uncertainty in internal energy demand
  property exergy 0.1842 MJ; name E_th_prod_MSWI_exergy
  property true value relation 0.1842; name E_th_prod_MSWI_true_value_relation
  property price 0.0106 EUR2005; name E_th_prod_MSWI_price_EUR2005
- zinc concentrate: 0 kg; CPC 14290: Other non-ferrous metal ores and concentrates (other than uranium or thorium ores and concentrates); By-product classification allocatable product
  Calculated value from the knowledge of the properties of both products.
  property price 0.38 EUR2005; name ByP_price_EUR2005
    Temporary price data. Calculated as 90% of purchasers price based on: Zinc content in concentrate 53%. Concentrate price per kg Zn 86.5% of refined Zn price (13.5% treatment charges according to CHR Metals Limited 2005: Dynamic cost curves. http://www.minecost.com/dynamic.pdf). 2004 zinc price from USGS (2007) Mineral commodity summaries 2007. <http://minerals.usgs.gov/minerals/pubs/mcs/2007/mcs2007.pdf> [Accessed 25 May 2010]
  property zinc content 0.53; name zinc_C_zinc_concentrate
    Zinc content on a dry matter basis. Value taken from teh "zinc mine operation" /GLO dataset.
  property dry mass 1 kg; name DM_zinc_concentrate
  property carbon content 0
    carbon content on a dry matter basis (reserved; not for manual entry)
  properties: wet mass 1 kg, water content 0, carbon content, non-fossil 0, carbon content, fossil 0, water in wet mass 0 kg, carbon allocation 0 kg

## Inputs from technosphere
- titanium dioxide: 5.03e-9 kg; lognormal variance with pedigree 0.86, pedigree (1,1,5,1,1)
  burden from incineration of sludge from wastewater treatment of the short-term leachate (0-100a). uncertainty is calculated from uncertainties in waste composition and transfer coefficients in incinerator and uncertainty of waste decomposition and short-term leaching in sanitary landfill
  properties: dry mass 1 kg, wet mass 1 kg
- cement, unspecified: 7.86e-8 kg; lognormal variance with pedigree 0.67, pedigree (1,1,5,1,1)
  (same comment as for titanium dioxide)
  properties: dry mass 1 kg, wet mass 1 kg
- process-specific burdens, municipal waste incineration: 0.000143 kg; lognormal variance with pedigree 0.78, pedigree (1,1,5,1,1)
  Burden from incineration of sludge from wastewater treatment of the short-term leachate (0-100a).
  Burden from incineration of sludge from wastewater treatment of the short-term leachate (0-100a).;activityLink introduced to establish a direct link to the corresponding regional supply of this product
- sanitary landfill facility: 5.56e-10 unit; lognormal variance with pedigree 0.04, pedigree (1,1,5,1,1)
  demands per kilogram waste. uncertainty is heeded in the module
  This exchange has an activity link directly to the producing activity because the product is primarily consumed in the same geographical area where it is produced.
- sewer grid, 5E9l/year, 110 km: 5.45e-10 km; lognormal variance with pedigree 0.2106, pedigree (5,5,5,5,5)
  burden from wastewater treatment of the short-term leachate (0-100a). Uncertainty calculated from unertainty of the waste composition of this waste, uncertainty in waste decomposition and short-term leaching in sanitary landfill
- quicklime, milled, packed: 1.58e-9 kg; lognormal variance with pedigree 0.53, pedigree (1,1,5,1,1)
  (same comment as for titanium dioxide)
  properties: wet mass 1 kg, water content 0.010101, dry mass 0.99 kg
- residual material landfill: 0 unit; pedigree (1,1,1,1,1)
  (same comment as for titanium dioxide)
- iron (III) chloride, without water, in 40% solution state: 1.53e-8 kg; lognormal variance with pedigree 2.1, pedigree (1,1,5,1,1)
  (same comment as for titanium dioxide)
  properties: wet mass 1 kg, dry mass 1 kg
- ammonia, liquid: 1.76e-7 kg; lognormal variance with pedigree 0.61, pedigree (1,1,5,1,1)
  (same comment as for titanium dioxide)
  properties: wet mass 1 kg, dry mass 1 kg
- heat, district or industrial, natural gas: 6.7518e-5 MJ; lognormal variance with pedigree 0.24, pedigree (5,5,5,5,5)
  (same comment as for titanium dioxide)
- aluminium sulfate, powder: 2.87e-9 kg; lognormal variance with pedigree 2.29, pedigree (5,5,5,5,5)
  (same comment as for sewer grid, 5E9l/year, 110 km)
  properties: dry mass 1 kg, wet mass 1 kg
- chromium oxide, flakes: 1.03e-10 kg; lognormal variance with pedigree 0.97, pedigree (5,5,5,5,5)
  burden from incineration of sludge from wastewater treatment of the short-term leachate (0-100a). Proxy for vanadium pentoxide V2O5 in SCR catalyst, uncertainty calculated from uncertainty in average DeNOx input, uncertainty in the share of thermal NOx, uncertainty of nitrogen content in average municipal waste and the unertainty in nitrogen content in *this* waste and uncertainty of waste decomposition and short-term leaching in sanitary landfill
  properties: wet mass 1 kg, dry mass 1 kg
- heat, central or small-scale, other than natural gas: 3.7788e-5 MJ; lognormal variance with pedigree 0.24, pedigree (5,5,5,5,5)
  (same comment as for sewer grid, 5E9l/year, 110 km)
- process-specific burdens, slag landfill: 7.69e-7 kg; lognormal variance with pedigree 0.52, pedigree (1,1,5,1,1)
  burden from incineration of sludge from wastewater treatment of the short-term leachate (0-100a). uncertainty is calculated from uncertainties in waste composition and transfer coefficients in incinerator and uncertainty of waste decomposition and short-term leaching in sanitary landfill;activityLink introduced to establish a direct link to the corresponding regional supply of this product
- iron sulfate: 1.06e-8 kg; lognormal variance with pedigree 2.29, pedigree (5,5,5,5,5)
  (same comment as for sewer grid, 5E9l/year, 110 km)
  properties: wet mass 1 kg, dry mass 1 kg
- heat, for reuse in municipal waste incineration only: 0.00012 MJ; name E_th_prod_MSWI; lognormal variance with pedigree 0.78, pedigree (1,1,5,1,1)
  (same comment as for titanium dioxide)
- process-specific burdens, residual material landfill: 1.97e-7 kg; lognormal variance with pedigree 0.66, pedigree (1,1,5,1,1)
  (same comment as for process-specific burdens, slag landfill)
- waste graphical paper: -3.88e-5 kg; lognormal variance with pedigree 0.2106, pedigree (5,5,5,5,5)
  (same comment as for sewer grid, 5E9l/year, 110 km)
  production volume 3.88e-5 kg
    Calculated from the production volume of waste bitumen, 1.4% water in proportion to the respective output amounts.
  properties: wet mass 1 kg, dry mass 0.888 kg, carbon content, non-fossil 0.454955, water content 0.126126
- sodium hydroxide, without water, in 50% solution state: 8.73e-9 kg; lognormal variance with pedigree 0.53, pedigree (1,1,5,1,1)
  (same comment as for titanium dioxide)
  properties: dry mass 1 kg, wet mass 1 kg
- electricity, for reuse in municipal waste incineration only: 2.06e-5 kWh; name E_el_prod_MSWI; lognormal variance with pedigree 1.2, pedigree (1,1,5,1,1)
  (same comment as for titanium dioxide)
- chemical, inorganic: 1.9e-11 kg; lognormal variance with pedigree 0.43, pedigree (1,1,5,1,1)
  (same comment as for titanium dioxide)
  properties: wet mass 1 kg, carbon content, fossil 0.003, dry mass 1 kg
  note on carbon content, fossil: This dataset is an unweighted average of 20 inorganic substances (listed in Tab 88.1, ecoinvent v2.2 report 8, part II), being part of the top100 chemicals included in this database. The C-content has also been calculated as an unweighted average of the C content of the substances composing this dataset.
- waste plastic, mixture: -3.88e-5 kg; lognormal variance with pedigree 0.2106, pedigree (5,5,5,5,5)
  (same comment as for sewer grid, 5E9l/year, 110 km)
  production volume 3.88e-5 kg
    (same comment as for waste graphical paper)
  properties: carbon content, fossil 0.747344, water content 0.180638, wet mass 1 kg, dry mass 0.847 kg
  note on carbon content, fossil: C content in 1 kg DM was calculated using data in Tab A.2, ecoinvent v2.2 report 13_I
- hydrochloric acid, without water, in 30% solution state: 1.14e-11 kg; lognormal variance with pedigree 0.43, pedigree (1,1,5,1,1)
  (same comment as for titanium dioxide)
  properties: dry mass 1 kg, wet mass 1 kg
- municipal waste incineration facility: 3.58e-14 unit; lognormal variance with pedigree 0.78, pedigree (1,1,5,1,1)
  Burden from incineration of sludge from wastewater treatment of the short-term leachate (0-100a).
  Burden from incineration of sludge from wastewater treatment of the short-term leachate (0-100a).
- wastewater treatment facility, capacity 5E9l/year: 1.42e-11 unit; lognormal variance with pedigree 0.2106, pedigree (5,5,5,5,5)
  (same comment as for sewer grid, 5E9l/year, 110 km)
- waste cement, hydrated: -1.97e-7 kg; lognormal variance with pedigree 0.67, pedigree (1,1,5,1,1)
  (same comment as for titanium dioxide)
  production volume 1.97e-7 kg
    (same comment as for waste graphical paper)
  properties: dry mass 1 kg, wet mass 1 kg
- slag landfill: 1.37e-15 unit; lognormal variance with pedigree 0.52, pedigree (1,1,5,1,1)
  (same comment as for titanium dioxide)
- process-specific burdens, sanitary landfill: 1 kg; lognormal variance with pedigree 0.04, pedigree (1,1,5,1,1)
  demands per kilogram waste. uncertainty is heeded in the module;activityLink introduced to establish a direct link to the corresponding regional supply of this product
- chemical, organic: 2.93e-11 kg; lognormal variance with pedigree 2.69, pedigree (1,1,5,1,1)
  (same comment as for titanium dioxide)
  properties: wet mass 1 kg, dry mass 1 kg, carbon content, fossil 0.628
  note on carbon content, fossil: This dataset is an unweighted average of 20 organic substances (listed in Tab 88.1, ecoinvent v2.2 report 8, part II), being part of the top100 chemicals included in this database. The C-content has also been calculated as an unweighted average of the C content of the substances composing this dataset.
- electricity, low voltage: 0.0008 kWh; lognormal variance with pedigree 0.49, pedigree (5,5,5,5,5)
  (same comment as for sewer grid, 5E9l/year, 110 km)

## Emissions to nature
- Sodium [air, non-urban air or from high stacks]: 3.62e-10 kg; lognormal variance with pedigree 2.4, pedigree (1,1,5,1,1)
  burden from direct release or incineration of landfill biogas. Uncertainty calculated from unertainty of the waste composition of this waste, uncertainty in waste decomposition and short-term leaching in sanitary landfill
- Cobalt [air, non-urban air or from high stacks]: 3.46e-13 kg; lognormal variance with pedigree 3.3, pedigree (1,1,5,1,1)
  (same comment as for Sodium)
- Vanadium [air, urban air close to ground]: 1.3e-11 kg; lognormal variance with pedigree 1.57, pedigree (1,1,5,1,1)
  Emissions from short-term leachate treatment and incineration of resulting sludge. Uncertainty calculated depending on waste input and uncertainty of transfer coefficents in landfill, wastewater treatment and incineration model.
- Vanadium, ion [water, surface water]: 1.34e-7 kg; lognormal variance with pedigree 1.53, pedigree (1,1,5,1,1)
  (same comment as for Vanadium)
- Phosphorus [air, urban air close to ground]: 1.42e-12 kg; lognormal variance with pedigree 2.19, pedigree (1,1,5,1,1)
  (same comment as for Vanadium)
- Nitrogen, organic bound [water, ground-, long-term]: 0.00325 kg; lognormal variance with pedigree 0.49, pedigree (1,1,5,1,1)
  Emissions from long-term leachate (>100a) directly from MSW landfill and indirectly via incineration of treatement sludge from leachate treatement. Uncertainty calculated depending on waste input and uncertainty of long-term transfer coefficents in landfill.
- Copper, ion [water, surface water]: 6.35e-11 kg; lognormal variance with pedigree 2.45, pedigree (1,1,5,1,1)
  (same comment as for Vanadium)
- Cobalt [air, urban air close to ground]: 0 kg; pedigree (1,1,1,1,1)
  (same comment as for Vanadium)
- Silicon [water, surface water]: 1.8e-10 kg; lognormal variance with pedigree 2.14, pedigree (1,1,5,1,1)
  (same comment as for Vanadium)
- Chromium [air, non-urban air or from high stacks]: 9.97e-15 kg; lognormal variance with pedigree 3.75, pedigree (1,1,5,1,1)
  (same comment as for Sodium)
- Nitrate [water, ground-, long-term]: 0.000209 kg; lognormal variance with pedigree 0.49, pedigree (1,1,5,1,1)
  (same comment as for Nitrogen, organic bound)
- Arsenic [air, non-urban air or from high stacks]: 1.76e-11 kg; lognormal variance with pedigree 2.79, pedigree (1,1,5,1,1)
  (same comment as for Sodium)
- Lead [water, ground-, long-term]: 1e-6 kg; lognormal variance with pedigree 1.6, pedigree (1,1,5,1,1)
  (same comment as for Nitrogen, organic bound)
- Nitrogen oxides [air, urban air close to ground]: 1.09e-6 kg; lognormal variance with pedigree 0.51, pedigree (1,1,5,1,1)
  (same comment as for Vanadium)
- Silicon [water, ground-, long-term]: 1.15e-7 kg; lognormal variance with pedigree 5.28, pedigree (1,1,5,1,1)
  (same comment as for Nitrogen, organic bound)
- Ammonia [air, urban air close to ground]: 1.11e-7 kg; lognormal variance with pedigree 0.53, pedigree (1,1,5,1,1)
  (same comment as for Vanadium)
- Lead [air, urban air close to ground]: 1.95e-15 kg; lognormal variance with pedigree 2.69, pedigree (1,1,5,1,1)
  (same comment as for Vanadium)
- COD, Chemical Oxygen Demand [water, surface water]: 0.000153 kg; lognormal variance with pedigree 0.86, pedigree (1,1,5,1,1)
  (same comment as for Vanadium)
- Tin, ion [water, surface water]: 2.19e-9 kg; lognormal variance with pedigree 2.05, pedigree (1,1,5,1,1)
  (same comment as for Vanadium)
- Chromium [air, urban air close to ground]: 0 kg; pedigree (1,1,1,1,1)
  (same comment as for Vanadium)
- Ammonium, ion [water, ground-, long-term]: 0.00199 kg; lognormal variance with pedigree 0.49, pedigree (1,1,5,1,1)
  (same comment as for Nitrogen, organic bound)
- Chromium, ion [water, surface water]: 6.26e-14 kg; lognormal variance with pedigree 2.72, pedigree (1,1,5,1,1)
  (same comment as for Vanadium)
- Lead [air, non-urban air or from high stacks]: 1.96e-14 kg; lognormal variance with pedigree 3.67, pedigree (1,1,5,1,1)
  (same comment as for Sodium)
- Selenium [water, ground-, long-term]: 5.64e-8 kg; lognormal variance with pedigree 2.22, pedigree (1,1,5,1,1)
  (same comment as for Nitrogen, organic bound)
- TOC, Total Organic Carbon [water, surface water]: 3.86e-5 kg; lognormal variance with pedigree 0.86, pedigree (1,1,5,1,1)
  (same comment as for Vanadium)
- Silicon [air, urban air close to ground]: 6.56e-12 kg; lognormal variance with pedigree 2.15, pedigree (1,1,5,1,1)
  (same comment as for Vanadium)
- Particulates, < 2.5 um [air, non-urban air or from high stacks]: 3.96e-7 kg; lognormal variance with pedigree 0.71, pedigree (1,1,5,1,1)
  (same comment as for Sodium)
- Arsenic, ion [water, surface water]: 1.11e-9 kg; lognormal variance with pedigree 2.23, pedigree (1,1,5,1,1)
  (same comment as for Vanadium)
- Dinitrogen monoxide [air, urban air close to ground]: 3.07e-7 kg; lognormal variance with pedigree 0.47, pedigree (1,1,5,1,1)
  (same comment as for Vanadium)
- Sodium, ion [water, surface water]: 1.45e-6 kg; lognormal variance with pedigree 1.35, pedigree (1,1,5,1,1)
  Emissions from short-term leachate treatment. Uncertainty calculated depending on waste input and uncertainty of transfer coefficents in landfill and wastewater treatment.
- Calcium [air, urban air close to ground]: 1.28e-12 kg; lognormal variance with pedigree 2.03, pedigree (1,1,5,1,1)
  (same comment as for Vanadium)
- Sulfur dioxide [air, non-urban air or from high stacks]: 5.22e-5 kg; lognormal variance with pedigree 0.96, pedigree (1,1,5,1,1)
  (same comment as for Sodium)
- Nitrite [water, ground-, long-term]: 0.000108 kg; lognormal variance with pedigree 0.49, pedigree (1,1,5,1,1)
  (same comment as for Nitrogen, organic bound)
- Copper [air, urban air close to ground]: 1.34e-15 kg; lognormal variance with pedigree 2.52, pedigree (1,1,5,1,1)
  (same comment as for Vanadium)
- NMVOC, non-methane volatile organic compounds, unspecified origin [air, urban air close to ground]: 6.18e-9 kg; lognormal variance with pedigree 1.03, pedigree (1,1,5,1,1)
  (same comment as for Vanadium)
- Lead [water, surface water]: 6.48e-12 kg; lognormal variance with pedigree 2.64, pedigree (1,1,5,1,1)
  (same comment as for Vanadium)
- Silicon [air, non-urban air or from high stacks]: 7.5e-13 kg; lognormal variance with pedigree 3.2, pedigree (1,1,5,1,1)
  (same comment as for Sodium)
- Nitrogen oxides [air, non-urban air or from high stacks]: 3.22e-8 kg; lognormal variance with pedigree 1.13, pedigree (1,1,5,1,1)
  (same comment as for Sodium)
- Nickel, ion [water, surface water]: 3.53e-8 kg; lognormal variance with pedigree 1.72, pedigree (1,1,5,1,1)
  (same comment as for Vanadium)
- BOD5, Biological Oxygen Demand [water, surface water]: 4.8e-5 kg; lognormal variance with pedigree 0.86, pedigree (1,1,5,1,1)
  (same comment as for Vanadium)
- Iron [air, non-urban air or from high stacks]: 2.58e-12 kg; lognormal variance with pedigree 3.03, pedigree (1,1,5,1,1)
  (same comment as for Sodium)
- DOC, Dissolved Organic Carbon [water, ground-, long-term]: 0.211 kg; lognormal variance with pedigree 0.51, pedigree (1,1,5,1,1)
  (same comment as for Nitrogen, organic bound)
- Copper [air, non-urban air or from high stacks]: 7e-14 kg; lognormal variance with pedigree 3.5, pedigree (1,1,5,1,1)
  (same comment as for Sodium)
- Aluminium [water, ground-, long-term]: 7e-6 kg; lognormal variance with pedigree 1.35, pedigree (1,1,5,1,1)
  (same comment as for Nitrogen, organic bound)
- Molybdenum [air, non-urban air or from high stacks]: 1.48e-13 kg; lognormal variance with pedigree 3.41, pedigree (1,1,5,1,1)
  (same comment as for Sodium)
- Tin, ion [water, ground-, long-term]: 8.9e-5 kg; lognormal variance with pedigree 1.02, pedigree (1,1,5,1,1)
  (same comment as for Nitrogen, organic bound)
- Cobalt [water, ground-, long-term]: 4.29e-7 kg; lognormal variance with pedigree 1.71, pedigree (1,1,5,1,1)
  (same comment as for Nitrogen, organic bound)
- Nitrate [water, surface water]: 0.00022 kg; lognormal variance with pedigree 0.49, pedigree (1,1,5,1,1)
  (same comment as for Vanadium)
- Calcium, ion [water, surface water]: 7.05e-9 kg; lognormal variance with pedigree 2, pedigree (1,1,5,1,1)
  (same comment as for Vanadium)
- Mercury [air, urban air close to ground]: 0 kg; pedigree (1,1,1,1,1)
  (same comment as for Vanadium)
- Calcium [air, non-urban air or from high stacks]: 1.95e-12 kg; lognormal variance with pedigree 3.08, pedigree (1,1,5,1,1)
  (same comment as for Sodium)
- Calcium, ion [water, ground-, long-term]: 5.99e-6 kg; lognormal variance with pedigree 1.38, pedigree (1,1,5,1,1)
  (same comment as for Nitrogen, organic bound)
- Molybdenum [water, surface water]: 3.49e-10 kg; lognormal variance with pedigree 2.34, pedigree (1,1,5,1,1)
  (same comment as for Vanadium)
- Sodium, ion [water, ground-, long-term]: 3.36e-5 kg; lognormal variance with pedigree 1.14, pedigree (1,1,5,1,1)
  (same comment as for Nitrogen, organic bound)
- Carbon monoxide, fossil [air, urban air close to ground]: 4.46e-7 kg; lognormal variance with pedigree 0.93, pedigree (1,1,5,1,1)
  (same comment as for Vanadium)
- Arsenic, ion [water, ground-, long-term]: 6.99e-7 kg; lognormal variance with pedigree 1.65, pedigree (1,1,5,1,1)
  (same comment as for Nitrogen, organic bound)
- Carbon monoxide, fossil [air, non-urban air or from high stacks]: 1.18e-6 kg; lognormal variance with pedigree 1.06, pedigree (1,1,5,1,1)
  (same comment as for Sodium)
- Mercury [air, non-urban air or from high stacks]: 5.48e-12 kg; lognormal variance with pedigree 2.79, pedigree (1,1,5,1,1)
  (same comment as for Sodium)
- Iron [air, urban air close to ground]: 4.66e-13 kg; lognormal variance with pedigree 1.67, pedigree (1,1,5,1,1)
  (same comment as for Vanadium)
- Carbon dioxide, fossil [air, non-urban air or from high stacks]: 0.0208 kg; lognormal variance with pedigree 0.41, pedigree (1,1,5,1,1)
  (same comment as for Sodium)
- Selenium [air, non-urban air or from high stacks]: 5.27e-14 kg; lognormal variance with pedigree 3.55, pedigree (1,1,5,1,1)
  (same comment as for Sodium)
- NMVOC, non-methane volatile organic compounds, unspecified origin [air, non-urban air or from high stacks]: 2.23e-8 kg; lognormal variance with pedigree 0.45, pedigree (1,1,5,1,1)
  (same comment as for Sodium)
- Vanadium [air, non-urban air or from high stacks]: 6.59e-11 kg; lognormal variance with pedigree 2.61, pedigree (1,1,5,1,1)
  (same comment as for Sodium)
- Arsenic [air, urban air close to ground]: 3.54e-13 kg; lognormal variance with pedigree 2.28, pedigree (1,1,5,1,1)
  (same comment as for Vanadium)
- Cyanide [air, urban air close to ground]: 3.13e-9 kg; lognormal variance with pedigree 0.63, pedigree (1,1,5,1,1)
  (same comment as for Vanadium)
- Aluminium [air, non-urban air or from high stacks]: 8.75e-13 kg; lognormal variance with pedigree 3.18, pedigree (1,1,5,1,1)
  (same comment as for Sodium)
- Phosphate [water, surface water]: 2.41e-9 kg; lognormal variance with pedigree 2.16, pedigree (1,1,5,1,1)
  (same comment as for Vanadium)
- Vanadium, ion [water, ground-, long-term]: 7.28e-5 kg; lognormal variance with pedigree 1.26, pedigree (1,1,5,1,1)
  (same comment as for Nitrogen, organic bound)
- Methane, fossil [air, urban air close to ground]: 1.36e-6 kg; lognormal variance with pedigree 0.91, pedigree (1,1,5,1,1)
  (same comment as for Vanadium)
- Molybdenum [water, ground-, long-term]: 2.21e-7 kg; lognormal variance with pedigree 1.9, pedigree (1,1,5,1,1)
  (same comment as for Nitrogen, organic bound)
- Methane, fossil [air, non-urban air or from high stacks]: 0.00319 kg; lognormal variance with pedigree 0.45, pedigree (1,1,5,1,1)
  (same comment as for Sodium)
- Chromium VI [water, ground-, long-term]: 1.59e-9 kg; lognormal variance with pedigree 9.03, pedigree (1,1,5,1,1)
  (same comment as for Nitrogen, organic bound)
- COD, Chemical Oxygen Demand [water, ground-, long-term]: 0.231 kg; lognormal variance with pedigree 0.51, pedigree (1,1,5,1,1)
  (same comment as for Nitrogen, organic bound)
- Aluminium [air, urban air close to ground]: 5.85e-12 kg; lognormal variance with pedigree 1.93, pedigree (1,1,5,1,1)
  (same comment as for Vanadium)
- Iron, ion [water, ground-, long-term]: 5.26e-6 kg; lognormal variance with pedigree 2.8, pedigree (1,1,5,1,1)
  (same comment as for Nitrogen, organic bound)
- Tin [air, non-urban air or from high stacks]: 1.31e-12 kg; lognormal variance with pedigree 3.11, pedigree (1,1,5,1,1)
  (same comment as for Sodium)
- Hydrogen sulfide [water, ground-, long-term]: 0.0029 kg; lognormal variance with pedigree 0.25, pedigree (1,1,5,1,1)
  (same comment as for Nitrogen, organic bound)
- Mercury [water, ground-, long-term]: 2e-8 kg; lognormal variance with pedigree 1.96, pedigree (1,1,5,1,1)
  (same comment as for Nitrogen, organic bound)
- Carbon dioxide, fossil [air, urban air close to ground]: 0.000695 kg; lognormal variance with pedigree 0.86, pedigree (1,1,5,1,1)
  (same comment as for Vanadium)
- TOC, Total Organic Carbon [water, ground-, long-term]: 0.211 kg; lognormal variance with pedigree 0.51, pedigree (1,1,5,1,1)
  (same comment as for Nitrogen, organic bound)
- Nickel [air, non-urban air or from high stacks]: 1.45e-11 kg; lognormal variance with pedigree 2.81, pedigree (1,1,5,1,1)
  (same comment as for Sodium)
- Tin [air, urban air close to ground]: 4.05e-12 kg; lognormal variance with pedigree 2.08, pedigree (1,1,5,1,1)
  (same comment as for Vanadium)
- Phosphate [water, ground-, long-term]: 8.3e-8 kg; lognormal variance with pedigree 7.67, pedigree (1,1,5,1,1)
  (same comment as for Nitrogen, organic bound)
- Molybdenum [air, urban air close to ground]: 5.82e-13 kg; lognormal variance with pedigree 2.36, pedigree (1,1,5,1,1)
  (same comment as for Vanadium)
- Chloride [water, surface water]: 9.51e-9 kg; lognormal variance with pedigree 2.18, pedigree (1,1,5,1,1)
  (same comment as for Sodium, ion)
- Chromium VI [water, surface water]: 2.09e-11 kg; lognormal variance with pedigree 2.68, pedigree (1,1,5,1,1)
  (same comment as for Vanadium)
- Nickel, ion [water, ground-, long-term]: 0.0001 kg; lognormal variance with pedigree 1, pedigree (1,1,5,1,1)
  (same comment as for Nitrogen, organic bound)
- Nitrite [water, surface water]: 1.27e-6 kg; lognormal variance with pedigree 0.76, pedigree (1,1,5,1,1)
  (same comment as for Vanadium)
- Selenium [air, urban air close to ground]: 0 kg; pedigree (1,1,1,1,1)
  (same comment as for Vanadium)
- DOC, Dissolved Organic Carbon [water, surface water]: 3.71e-5 kg; lognormal variance with pedigree 0.86, pedigree (1,1,5,1,1)
  (same comment as for Vanadium)
- Aluminium [water, surface water]: 2.1e-10 kg; lognormal variance with pedigree 2.1, pedigree (1,1,5,1,1)
  (same comment as for Vanadium)
- Iron, ion [water, surface water]: 5.23e-9 kg; lognormal variance with pedigree 1.95, pedigree (1,1,5,1,1)
  (same comment as for Vanadium)
- Ammonium, ion [water, surface water]: 6.05e-5 kg; lognormal variance with pedigree 0.54, pedigree (1,1,5,1,1)
  (same comment as for Vanadium)
- Nickel [air, urban air close to ground]: 0 kg; pedigree (1,1,1,1,1)
  (same comment as for Vanadium)
- Copper, ion [water, ground-, long-term]: 5e-6 kg; lognormal variance with pedigree 1.4, pedigree (1,1,5,1,1)
  (same comment as for Nitrogen, organic bound)
- Cobalt [water, surface water]: 7.02e-10 kg; lognormal variance with pedigree 2.22, pedigree (1,1,5,1,1)
  (same comment as for Vanadium)
- Sulfate [water, ground-, long-term]: 0.111 kg; lognormal variance with pedigree 0.25, pedigree (1,1,5,1,1)
  (same comment as for Nitrogen, organic bound)
- Nitrogen [water, surface water]: 1.64e-6 kg; lognormal variance with pedigree 0.5, pedigree (1,1,5,1,1)
  (same comment as for Vanadium)
- Selenium [water, surface water]: 1.41e-10 kg; lognormal variance with pedigree 2.46, pedigree (1,1,5,1,1)
  (same comment as for Vanadium)
- Mercury [water, surface water]: 4.34e-12 kg; lognormal variance with pedigree 2.66, pedigree (1,1,5,1,1)
  (same comment as for Vanadium)
- BOD5, Biological Oxygen Demand [water, ground-, long-term]: 0.0546 kg; lognormal variance with pedigree 0.51, pedigree (1,1,5,1,1)
  (same comment as for Nitrogen, organic bound)
- Sulfate [water, surface water]: 0.000455 kg; lognormal variance with pedigree 0.74, pedigree (1,1,5,1,1)
  (same comment as for Sodium, ion)

## Sampling procedure
Landfill model based on observed leachate concentrations in literature. Extrapolated to 60'000 years heeding chemical characteristics. Initial waste composition from various literature sources.

## Extrapolations
This dataset has been extrapolated from year 2000 to the year of the calculation (2019). The uncertainty has been adjusted accordingly.

## Review by Niels Jungbluth 2003-07-21
Passed. Calculation for standard deviation 95 of, i.e., infrastructure,
land occupation, transport services or other services can differ from
standard Pedigree approach used in this project and figures obtained by
this procedure.
