# fluorescent whitening agent production, distyrylbiphenyl type

Dataset: EcoSpold 2, unit process
Geography: RoW
Time period: 1999-01-01 to 2019-12-31
Technology level: current
Classification: EcoSpold01Categories: washing agents/auxiliary agents
Classification: ISIC rev.4 ecoinvent: 2011:Manufacture of basic chemicals
Synonyms: DSBP
Tags: ConvertedDataset
Scenario: Business-as-Usual
System model: Allocation at the point of substitution
Share of production covered: 98 %
Generated by: Rainer Zah
Published in: Zah R. 2004
Database: ecoinvent
isCopyrightProtected: true
accessRestrictedTo: 1

## General comment
data based on company information for a former detergent study of EMPA
[This dataset was already contained in the ecoinvent database version 2. It was not individually updated during the transfer to ecoinvent version 3. Life Cycle Impact Assessment results may still have changed, as they are affected by changes in the supply chain, i.e. in other datasets. This dataset was generated following the ecoinvent quality guidelines for version 2. It may have been subject to central changes described in the ecoinvent version 3 change report (http://www.ecoinvent.org/database/ecoinvent-version-3/reports-of-changes/), and the results of the central updates were reviewed extensively. The changes added e.g. consistent water flows and other information throughout the database. The documentation of this dataset can be found in the ecoinvent reports of version 2, which are still available via the ecoinvent website. The change report linked above covers all central changes that were made during the conversion process.]

## Included activities end
This module contains material and energy input, production of waste and emissions for the production of the mentioned FWA (fluorescent whitening agent). Transport and infrastructure have been estimated.

## Geography
data from European main producer, used as European average

## Technology
Typcial production process for end of 90s

## Time period
year of reported data

## Parameters
- fraction, process water, to air: 0.4 dimensionless; name fraction_PW_to_air; lognormal variance with pedigree 0.092025, pedigree (4,4,3,2,4)

## Reference product
- fluorescent whitening agent, distyrylbiphenyl type: 1 kg; By-product classification allocatable product; CPC 34310: Synthetic organic colouring matter and preparations based thereon; synthetic organic products of a kind used a[…]; CAS 27344-41-8
  EcoSpold01Location=RER
  production volume 2.67763 kg
    This is a placeholder value that does not reflect real-world production volumes. This dataset does not currently require a real-world production volume to work in the database framework, and no actual data were collected yet. This has no negative effect on the results of the ecoinvent database.
  property carbon content, non-fossil 0
    MW of Distyrylbiphenyl sulfonate is 563. It contains 28 C atoms (BgVV Health assessment of certain stilbene derivatives. Health assessment of specific stilbene derivatives used as textile auxiliaries or in detergents, 2001)
  property carbon content, fossil 0.596803
    (same comment as for fluorescent whitening agent, distyrylbiphenyl type)
  property carbon content 0.596803
    carbon content on a dry matter basis (reserved; not for manual entry)
  property true value 1.57
    allocation property applied in "true value" allocation // value calculated from revenue
  properties: price 1.57 EUR2005, water content 0, water in wet mass 0 kg, dry mass 1 kg, wet mass 1 kg, carbon allocation 0.596803 kg

## By-products
- heat, for reuse in municipal waste incineration only: 0 MJ; CPC 17300: Steam and hot water; By-product classification allocatable product; pedigree (1,1,1,1,1)
  Net electricity generated from this waste and used in internal MSWI plant energy redistribution.
  Uncertainty: uncertainty is calculated from uncertainties in waste composition and uncertainties in energy efficiency and the uncertainty in internal energy demand
  production volume 0.25298 MJ
  property exergy 0.1842 MJ; name E_th_prod_MSWI_exergy
    This exergy property is based on the exergy content of the product.
  property price 0.0106 EUR2005; name E_th_prod_MSWI_price_EUR2005
    Average European district heat price from Ecoheatcool and Euroheat 2005-2006, Ecoheat Work package 1: The European heat market. Final report. 10.6 EUR/GJ i s the price of district heat. http://www.solarthermalworld.org/files/Ecoheatcool%20WP1%20Web.pdf?download
  property true value relation 0.1842; name E_th_prod_MSWI_true_value_relation
    property to calculate "true value" from
  property true value 0.000623927
    allocation property applied in "true value" allocation // value calculated from true value relation
- electricity, for reuse in municipal waste incineration only: 0 kWh; CPC 17100: Electrical energy; By-product classification allocatable product; pedigree (1,1,1,1,1)
  (same comment as for heat, for reuse in municipal waste incineration only)
  production volume 0.0342475 kWh
  property price 0.1 EUR2005; name E_el_prod_MSWI_price_EUR2005
    Estimated to be the same price as in case of electricity, medium voltage.
  property exergy 3.6 MJ; name E_el_prod_MSWI_exergy
    This exergy property is based on the exergy content of the product.
  property true value relation 3.6; name E_el_prod_MSWI_true_value_relation
    property to calculate "true value" from
  property true value 0.00165076
    (same comment as for heat, for reuse in municipal waste incineration only)
- iron scrap, sorted, pressed: 0 kg; By-product classification Recyclable; CPC 39310: Slag, dross, scalings and other waste from the manufacture of iron or steel; pedigree (1,1,1,1,1)
  metallic iron scrap removed from ash reamains and recycled.
  Uncertainty: uncertainty is calculated from uncertainties in waste composition and transfer coefficients to soild residues
  production volume 0.0046359 kg
  property price 0.175 EUR2005
    Temporary price data. Calculated as 90% of purchasers price based on: 2005 import and export prices (total trades (USD) divided by total weight (kg) in biggest economies of the world: EU27, USA, Brasil, China, India, Japan and Russia) from UN Commodity Trade Statistics Database (http://data.un.org/Explorer.aspxDatabase [Accessed 2011.06.20]). Commodity: Waste or scrap, of cast iron
  property carbon content 0
    carbon content on a dry matter basis (reserved; not for manual entry)
  property true value 0.000281105
    allocation property applied in "true value" allocation // value calculated from revenue
  properties: carbon content, non-fossil 0, wet mass 1 kg, dry mass 1 kg, water content 0, carbon content, fossil 0, water in wet mass 0 kg, carbon allocation 0 kg
- copper: 0 kg; source Rentz O. 1999; By-product classification allocatable product; CPC 41413: Refined copper and copper alloys, unwrought; master alloys of copper
  Literature value. Copper uses: Before end-use copper is manufactured into semi fabricated products, such as shapes and ingots (known as 'semis'). These manufacturing processes are subdivided into hot working, cold working and, if necessary, process annealing. Few of the semis are ready for use as such. They more typically travel to first-stage manufacturers, who make metal rods, wire, and casting, and then to component manufacturers who produce such things as motors, valves, and insulated cables The components in turn are incorporated by final-stage manufacturers into a variety of finished products - automobiles, commercial buildings, residential housing, and so forth. These uses account for about 79% of the world-wide consumption of copper.
  production volume 0.000149384 kg
  property price 5.52 EUR2005
    Literature value (http://www.economist.com/news/business/21576714-mining-industry-has-enriched-chile-its-future-precarious-copper-solution). Average price between 20015 and 2013.
  property carbon content 0
    carbon content on a dry matter basis (reserved; not for manual entry)
  property true value 0.000282234
    allocation property applied in "true value" allocation // value calculated from revenue
  properties: dry mass 1 kg, water in wet mass 0 kg, wet mass 1 kg, carbon content, non-fossil 0, water content 0, carbon content, fossil 0, carbon allocation 0 kg
- zinc concentrate: 0 kg; CPC 14290: Other non-ferrous metal ores and concentrates (other than uranium or thorium ores and concentrates); By-product classification allocatable product
  Calculated value from the knowledge of the properties of both products.
  production volume 1.1857e-13 kg
  property price 0.38 EUR2005; name ByP_price_EUR2005
    Temporary price data. Calculated as 90% of purchasers price based on: Zinc content in concentrate 53%. Concentrate price per kg Zn 86.5% of refined Zn price (13.5% treatment charges according to CHR Metals Limited 2005: Dynamic cost curves. http://www.minecost.com/dynamic.pdf). 2004 zinc price from USGS (2007) Mineral commodity summaries 2007. <http://minerals.usgs.gov/minerals/pubs/mcs/2007/mcs2007.pdf> [Accessed 25 May 2010]
  property zinc content 0.53; name zinc_C_zinc_concentrate
    Zinc content on a dry matter basis. Value taken from teh "zinc mine operation" /GLO dataset.
  property dry mass 1 kg; name DM_zinc_concentrate
  property carbon content 0
    carbon content on a dry matter basis (reserved; not for manual entry)
  property true value 1.54215e-14
    allocation property applied in "true value" allocation // value calculated from revenue
  properties: wet mass 1 kg, water content 0, carbon content, non-fossil 0, carbon content, fossil 0, water in wet mass 0 kg, carbon allocation 0 kg
- iron scrap, unsorted: 0 kg; source European Aluminium Association 2008; CPC 39310: Slag, dross, scalings and other waste from the manufacture of iron or steel; By-product classification Recyclable; pedigree (1,1,1,1,1)
  production volume 1.22647e-7 kg
  property price 0.149 EUR2005; name ironScrapAmount_price_EUR2005
    Temporary price data. Calculated as 90% of purchasers price based on: estimated at 85% of sorted scrap
  property carbon content 0
    carbon content on a dry matter basis (reserved; not for manual entry)
  property true value 6.80933e-9
    allocation property applied in "true value" allocation // value calculated from revenue
  properties: water in wet mass 0 kg, water content 0, carbon content, fossil 0, carbon content, non-fossil 0, dry mass 1 kg, wet mass 1 kg, carbon allocation 0 kg
- aluminium oxide, non-metallurgical: 0 kg; source European Aluminium Association 2008; CPC 41432: Alumina (aluminium oxide), except artificial corundum; By-product classification allocatable product; CAS 1344-28-1; pedigree (1,1,1,1,1)
  production volume 7.71773e-6 kg
  property carbon content, non-fossil 0; name C_content_non_fossil
  property price 0.28 EUR2005; name Al2O3Amount_price_EUR2005
    From UN trade database. http://data.un.org/ Import data from the largest economies of the world are used (Brazil, India, USA, China, Japan and EU-27).
  property dry mass 1 kg; name DM
  property water content 0; name water_content
  property wet mass 1 kg; name WM
  property water in wet mass 0 kg; name WWM
  property carbon content, fossil 0; name C_content_fossil
  property carbon content 0
    carbon content on a dry matter basis (reserved; not for manual entry)
  property true value 8.05208e-7
    allocation property applied in "true value" allocation // value calculated from revenue
  properties: carbon allocation 0 kg
- aluminium, cast alloy: 0 kg; source European Aluminium Association 2008; By-product classification allocatable product; CPC 41431: Unwrought aluminium; pedigree (1,1,1,1,1)
  EcoSpold01Location=RER
  production volume 7.21436e-5 kg
  property price 1.3 EUR2005; name castAlloyAmount_price_EUR2005
    Temporary price data. Calculated as 90% of purchasers price based on: Source: London Metal Exchange, Aluminium alloy price for 2005
  property carbon content 0
    carbon content on a dry matter basis (reserved; not for manual entry)
  property true value 3.49464e-5
    allocation property applied in "true value" allocation // value calculated from revenue
  properties: water in wet mass 0 kg, carbon content, non-fossil 0, water content 0, dry mass 1 kg, carbon content, fossil 0, wet mass 1 kg, carbon allocation 0 kg
- aluminium, wrought alloy: 0 kg; source European Aluminium Association 2008; By-product classification allocatable product; CPC 4153: Semi-finished products of aluminium or aluminium alloys; pedigree (1,1,1,1,1)
  production volume 3.15831e-5 kg
  property price 1.44 EUR2005; name secondaryAluminiumOutput_price_EUR2005
    Estimated based on literature values and expert judgement. Aluminium ccast alloys are about 90% of the price of aluminium wrought alloys.
  property carbon content 0
    carbon content on a dry matter basis (reserved; not for manual entry)
  property true value 1.69464e-5
    allocation property applied in "true value" allocation // value calculated from revenue
  properties: wet mass 1 kg, water content 0, carbon content, fossil 0, water in wet mass 0 kg, carbon content, non-fossil 0, dry mass 1 kg, carbon allocation 0 kg

## Inputs from technosphere
- hazardous waste, for incineration: -5.57973e-9 kg; lognormal variance with pedigree 0.0532, pedigree (2,3,5,5,1)
  EcoSpold01Location=CH
  Uncertainty: ;
  production volume 1.4968e-8 kg
    Calculated from the production volume of fluorescent whitening agent, distyrylbiphenyl type in proportion to the respective output amounts.
  properties: dry mass 0.75 kg, carbon content, fossil 0.554667, water content 0.333333, wet mass 1 kg
  note on carbon content, fossil: Tab A.6, ecoinvent v2.2 report 13_I. C content has been calculated after data in the tables, and then referred to 1 kg DM
- average incineration residue: -0.044019 kg; lognormal variance with pedigree 0.0532, pedigree (2,3,5,5,1)
  EcoSpold01Location=CH
  Uncertainty: ;
  production volume 0.118084 kg
    (same comment as for hazardous waste, for incineration)
  properties: wet mass 1 kg, carbon content, fossil 0.0325466, carbon content, non-fossil 0.0511208, dry mass 1 kg
  note on carbon content, fossil: Tab A.1, ecoinvent v2.2 report 13_I. It is considered that 61.1% of the C has a biogenic origin
- inert waste, for final disposal: -0.232572 kg; lognormal variance with pedigree 0.0532, pedigree (2,3,5,5,1)
  EcoSpold01Location=CH
  Uncertainty: ;
  production volume 0.623888 kg
    (same comment as for hazardous waste, for incineration)
  properties: water content 0.00502513, dry mass 0.995 kg, wet mass 1 kg
- chemical factory, organics: 1.19779e-9 unit; lognormal variance with pedigree 0.3532, pedigree (2,3,5,5,1)
  EcoSpold01Location=RER
  Uncertainty: ;
- municipal solid waste: 0 kg; pedigree (1,1,1,1,1)
  EcoSpold01Location=CH
  Uncertainty: ;
  production volume 0 kg
    (same comment as for hazardous waste, for incineration)
  properties: carbon content, fossil 0.171549, water content 0.297017, carbon content, non-fossil 0.261655, wet mass 1 kg, dry mass 0.771 kg
  note on carbon content, fossil: MSW composition in tab 4.1, ecoinvent v2.2 report 13_I. C content referred to 1 kg DM
- municipal solid waste: -0.000736457, -0.000185569, -0.000265189, -0.520852 kg (4 entries); lognormal variance with pedigree 0.0532, pedigree (2,3,5,5,1)
  EcoSpold01Location=CH
  Uncertainty: ;
  production volume 1.4004 kg

## Inputs from nature
- Gas, natural, in ground [natural resource, in ground]: 4.85107 m3; lognormal variance with pedigree 0.0532, pedigree (2,3,5,5,1)
  Uncertainty: ;
- Wood, unspecified, standing [natural resource, biotic]: 2.00631e-5 m3; lognormal variance with pedigree 0.0532, pedigree (2,3,5,5,1)
  Uncertainty: ;
- Energy, potential (in hydropower reservoir), converted [natural resource, in water]: 32.5401 MJ
- Sylvite, in ground [natural resource, in ground]: 1.2477e-7 kg; lognormal variance with pedigree 0.0532, pedigree (2,3,5,5,1)
  25% Sylvite in sylvinite
  Uncertainty: ;
- Magnesite, in ground [natural resource, in ground]: 8.84372e-9 kg; lognormal variance with pedigree 0.0532, pedigree (2,3,5,5,1)
  60% Magnesite in ore
  Uncertainty: ;
- Coal, hard, unspecified, in ground [natural resource, in ground]: 2.08616 kg; lognormal variance with pedigree 0.0532, pedigree (2,3,5,5,1)
  Uncertainty: ;
- Fluorspar, in ground [natural resource, in ground]: 1.93643e-5 kg; lognormal variance with pedigree 0.0532, pedigree (2,3,5,5,1)
  92% CaF2 in ore
  Uncertainty: ;
- Uranium, in ground [natural resource, in ground]: 0.000114789 kg; lognormal variance with pedigree 0.0532, pedigree (2,3,5,5,1)
  Uncertainty: ;
- Sodium chloride, in ground [natural resource, in ground]: 3.34384 kg; lognormal variance with pedigree 0.0532, pedigree (2,3,5,5,1)
  Uncertainty: ;
- Diatomite, in ground [natural resource, in ground]: 0.0101813 kg; lognormal variance with pedigree 0.0532, pedigree (2,3,5,5,1)
  Uncertainty: ;
- Coal, brown, in ground [natural resource, in ground]: 1.30759 kg; lognormal variance with pedigree 0.0532, pedigree (2,3,5,5,1)
  Uncertainty: ;
- Water, unspecified natural origin [natural resource, in water]: 6.68769 m3; name water_UNO_input; source EMPA - Swiss Federal Laboratories for Ma 1999; lognormal variance with pedigree 0.0546, pedigree (3,3,5,5,1)
  Calculated based on literature, (Vionnet, S., Quantis Water Database - Technical Report, 2012). Technology: via 4.4-bis (chloromethyl)-bi-phenyl and trimethylphosphite, via the 4.4 - bis (dimethoxyphos-phonomethyl)-sulphonic acid.
  property water in wet mass 999.89 kg; name WWM
  property carbon content, non-fossil 0; name C_content_non_fossil
  property dry mass 0.1101 kg; name DM
  property wet mass 1000 kg; name WM
  property water content 9081.65; name water_content
  property carbon content, fossil 0.0104329; name C_content_fossil
- Phosphorus, in ground [natural resource, in ground]: 1.93643 kg; lognormal variance with pedigree 0.0532, pedigree (2,3,5,5,1)
  18% P in apatite; 12% in ore
  Uncertainty: ;
- Iron, in ground [natural resource, in ground]: 0.00695719 kg; lognormal variance with pedigree 0.0532, pedigree (2,3,5,5,1)
  46% Fe in siderite; 25% Fe in ore
  Uncertainty: ;
- Calcite, in ground [natural resource, in ground]: 0.0796533 kg; lognormal variance with pedigree 0.0532, pedigree (2,3,5,5,1)
  Uncertainty: ;
- Sand, unspecified, in ground [natural resource, in ground]: 0.0547991 kg; lognormal variance with pedigree 0.0532, pedigree (2,3,5,5,1)
  Uncertainty: ;
- Antimony, in ground [natural resource, in ground]: 0.00105805 kg; lognormal variance with pedigree 0.0532, pedigree (2,3,5,5,1)
  Uncertainty: ;
- Aluminium, in ground [natural resource, in ground]: 0.00154715 kg; lognormal variance with pedigree 0.0532, pedigree (2,3,5,5,1)
  24% Al in bauxite; 11% Al in ore
  Uncertainty: ;
- Oil, crude, in ground [natural resource, in ground]: 2.78487 kg; lognormal variance with pedigree 0.0532, pedigree (2,3,5,5,1)
  Uncertainty: ;

## Emissions to nature
- Mercury [water, surface water]: 1.27765e-8 kg; lognormal variance with pedigree 0.7032, pedigree (2,3,5,5,1)
  Uncertainty: ;
- Particulates, < 2.5 um [air, urban air close to ground]: 0.00444182 kg; lognormal variance with pedigree 0.0932, pedigree (2,3,5,5,1)
  Uncertainty: ;
- Chlorine [air, urban air close to ground]: 5.98897e-10 kg; lognormal variance with pedigree 0.0932, pedigree (2,3,5,5,1)
  Uncertainty: ;
- Hydrocarbons, unspecified [water, surface water]: 0.0017368 kg; lognormal variance with pedigree 0.3532, pedigree (2,3,5,5,1)
  Uncertainty: ;
- BOD5, Biological Oxygen Demand [water, surface water]: 3.27397e-5 kg; lognormal variance with pedigree 0.0932, pedigree (2,3,5,5,1)
  Uncertainty: ;
- Antimony [water, surface water]: 6.90728e-5 kg; lognormal variance with pedigree 0.7032, pedigree (2,3,5,5,1)
  Uncertainty: ;
- Hydrocarbons, chlorinated [air, urban air close to ground]: 4.46178e-5 kg; lognormal variance with pedigree 0.1732, pedigree (2,3,5,5,1)
  Uncertainty: ;
- Carbon dioxide, fossil [air, urban air close to ground]: 20.662 kg; lognormal variance with pedigree 0.0532, pedigree (2,3,5,5,1)
  Uncertainty: ;
- Lead [air, urban air close to ground]: 4.28212e-6 kg; lognormal variance with pedigree 0.7032, pedigree (2,3,5,5,1)
  Uncertainty: ;
- Aluminium [water, surface water]: 0.00386289 kg; lognormal variance with pedigree 0.7032, pedigree (2,3,5,5,1)
  Uncertainty: ;
- COD, Chemical Oxygen Demand [water, surface water]: 0.000179669 kg; lognormal variance with pedigree 0.0932, pedigree (2,3,5,5,1)
  Uncertainty: ;
- Cadmium [air, urban air close to ground]: 8.77385e-7 kg; lognormal variance with pedigree 0.7032, pedigree (2,3,5,5,1)
  Uncertainty: ;
- Chloride [water, surface water]: 0.479118 kg; lognormal variance with pedigree 0.0932, pedigree (2,3,5,5,1)
  Uncertainty: ;
- Benzene [air, urban air close to ground]: 6.6777e-5 kg; lognormal variance with pedigree 0.3532, pedigree (2,3,5,5,1)
  Uncertainty: ;
- DOC, Dissolved Organic Carbon [water, surface water]: 0.0142737 kg; lognormal variance with pedigree 0.0932, pedigree (2,3,5,5,1)
  Uncertainty: ;
- Particulates, > 2.5 um, and < 10um [air, urban air close to ground]: 0.00763993 kg; lognormal variance with pedigree 0.0932, pedigree (2,3,5,5,1)
  Uncertainty: ;
- NMVOC, non-methane volatile organic compounds, unspecified origin [air, urban air close to ground]: 0.0328395 kg; lognormal variance with pedigree 0.1732, pedigree (2,3,5,5,1)
  Uncertainty: ;
- Nitrate [water, surface water]: 0.0107802 kg; lognormal variance with pedigree 0.0932, pedigree (2,3,5,5,1)
  Uncertainty: ;
- Nitrogen, organic bound [water, surface water]: 8.46442e-6 kg; lognormal variance with pedigree 0.0932, pedigree (2,3,5,5,1)
  Uncertainty: ;
- Chlorinated solvents, unspecified [water, surface water]: 9.62228e-8 kg; lognormal variance with pedigree 0.3532, pedigree (2,3,5,5,1)
  Uncertainty: ;
- Particulates, > 10 um [air, urban air close to ground]: 0.00568553 kg; lognormal variance with pedigree 0.0932, pedigree (2,3,5,5,1)
  Uncertainty: ;
- Fluoride [water, surface water]: 1.5771e-5 kg; lognormal variance with pedigree 0.0932, pedigree (2,3,5,5,1)
  Uncertainty: ;
- Sulfur dioxide [air, urban air close to ground]: 0.095025 kg; lognormal variance with pedigree 0.0532, pedigree (2,3,5,5,1)
  Uncertainty: ;
- Radioactive species, other beta emitters [air, urban air close to ground]: 9851.86 kBq; lognormal variance with pedigree 0.3532, pedigree (2,3,5,5,1)
  Uncertainty: ;
- Methane, fossil [air, urban air close to ground]: 0.0349357 kg; lognormal variance with pedigree 0.0932, pedigree (2,3,5,5,1)
  Uncertainty: ;
- TOC, Total Organic Carbon [water, surface water]: 0.0205621 kg; lognormal variance with pedigree 0.0932, pedigree (2,3,5,5,1)
  Uncertainty: ;
- Carbon monoxide, fossil [air, urban air close to ground]: 0.0105805 kg; lognormal variance with pedigree 0.7032, pedigree (2,3,5,5,1)
  Uncertainty: ;
- Dinitrogen monoxide [air, urban air close to ground]: 0.000606883 kg; lognormal variance with pedigree 0.0932, pedigree (2,3,5,5,1)
  Uncertainty: ;
- Cadmium, ion [water, surface water]: 2.26583e-7 kg; lognormal variance with pedigree 0.7032, pedigree (2,3,5,5,1)
  Uncertainty: ;
- Iron, ion [water, surface water]: 0.00583925 kg; lognormal variance with pedigree 0.7032, pedigree (2,3,5,5,1)
  Uncertainty: ;
- Radioactive species, Nuclides, unspecified [water, surface water]: 90.2339 kBq; lognormal variance with pedigree 0.3532, pedigree (2,3,5,5,1)
  Uncertainty: ;
- Sulfate [water, surface water]: 0.223588 kg; lognormal variance with pedigree 0.0932, pedigree (2,3,5,5,1)
  Uncertainty: ;
- Manganese [air, urban air close to ground]: 6.25848e-7 kg; lognormal variance with pedigree 0.0932, pedigree (2,3,5,5,1)
  Uncertainty: ;
- Toluene [water, surface water]: 7.32651e-6 kg; lognormal variance with pedigree 0.3532, pedigree (2,3,5,5,1)
  Uncertainty: ;
- Nitrogen oxides [air, urban air close to ground]: 0.0582927 kg; lognormal variance with pedigree 0.0932, pedigree (2,3,5,5,1)
  Uncertainty: ;
- Cyanide [water, surface water]: 1.19779e-6 kg; lognormal variance with pedigree 0.0932, pedigree (2,3,5,5,1)
  Uncertainty: ;
- Hydrogen chloride [air, urban air close to ground]: 0.00169688 kg; lognormal variance with pedigree 0.1732, pedigree (2,3,5,5,1)
  Uncertainty: ;
- Water [water, unspecified]: 4.01261 m3; name water_to_water_unspecified; lognormal variance with pedigree 0.0827, pedigree (2,2,5,5,1)
  Calculated value based on literature values and expert opinion. See comments in the parametres' comment field.
  property fraction, origin: fresh water 0; name fraction_origin_fresh_water_Ww
  property fraction, origin: salt water 0; name fraction_origin_salt_water_Ww
  property fraction, origin: unspecified 1; name fraction_origin_unspecified_Ww
- Copper, ion [water, surface water]: 2.25585e-5 kg; lognormal variance with pedigree 0.7032, pedigree (2,3,5,5,1)
  Uncertainty: ;
- Water [air, unspecified]: 2.67507 m3; name water_to_air_unspecified; lognormal variance with pedigree 0.0827, pedigree (2,2,5,5,1)
  (same comment as for Water)
  property fraction, origin: fresh water 0; name fraction_origin_fresh_water
  property fraction, origin: salt water 0; name fraction_origin_salt_water
  property fraction, origin: unspecified 1; name fraction_origin_unspecified
- Hydrocarbons, aromatic [air, urban air close to ground]: 0.000156711 kg; lognormal variance with pedigree 0.3532, pedigree (2,3,5,5,1)
  Uncertainty: ;
- Hydrogen [air, urban air close to ground]: 0.00249541 kg; lognormal variance with pedigree 0.0932, pedigree (2,3,5,5,1)
  Uncertainty: ;
- Ammonium, ion [water, surface water]: 0.00389283 kg; lognormal variance with pedigree 0.0932, pedigree (2,3,5,5,1)
  Uncertainty: ;
- Nickel [air, urban air close to ground]: 2.18598e-5 kg; lognormal variance with pedigree 0.7032, pedigree (2,3,5,5,1)
  Uncertainty: ;
- Solids, inorganic [water, surface water]: 0.050507 kg; lognormal variance with pedigree 0.0932, pedigree (2,3,5,5,1)
  Uncertainty: ;
- PAH, polycyclic aromatic hydrocarbons [water, surface water]: 7.69583e-7 kg; lognormal variance with pedigree 0.3532, pedigree (2,3,5,5,1)
  Uncertainty: ;
- Hydrogen fluoride [air, urban air close to ground]: 8.5243e-5 kg; lognormal variance with pedigree 0.0932, pedigree (2,3,5,5,1)
  Uncertainty: ;
- Nickel, ion [water, surface water]: 1.51721e-5 kg; lognormal variance with pedigree 0.7032, pedigree (2,3,5,5,1)
  Uncertainty: ;
- Sulfide [water, surface water]: 0.00210612 kg; lognormal variance with pedigree 0.0932, pedigree (2,3,5,5,1)
  Uncertainty: ;
- Chromium, ion [water, surface water]: 3.16417e-5 kg; lognormal variance with pedigree 0.7032, pedigree (2,3,5,5,1)
  Uncertainty: ;
- Lead [water, surface water]: 1.75677e-5 kg; lognormal variance with pedigree 0.7032, pedigree (2,3,5,5,1)
  Uncertainty: ;
- Nitrogen [water, surface water]: 0.000797532 kg; lognormal variance with pedigree 0.0932, pedigree (2,3,5,5,1)
  Uncertainty: ;
- Arsenic, ion [water, surface water]: 6.23851e-6 kg; lognormal variance with pedigree 0.7032, pedigree (2,3,5,5,1)
  Uncertainty: ;
- Methane, bromotrifluoro-, Halon 1301 [air, urban air close to ground]: 2.74495e-7 kg; lognormal variance with pedigree 0.1732, pedigree (2,3,5,5,1)
  Uncertainty: ;
- Barium [water, surface water]: 0.000390281 kg; lognormal variance with pedigree 0.7032, pedigree (2,3,5,5,1)
  Uncertainty: ;
- Zinc [air, urban air close to ground]: 1.26767e-5 kg; lognormal variance with pedigree 0.7032, pedigree (2,3,5,5,1)
  Uncertainty: ;
- Mercury [air, urban air close to ground]: 3.4237e-7 kg; lognormal variance with pedigree 0.7032, pedigree (2,3,5,5,1)
  Uncertainty: ;
- Phosphate [water, surface water]: 0.00231574 kg; lognormal variance with pedigree 0.0932, pedigree (2,3,5,5,1)
  Uncertainty: ;
- Zinc, ion [water, surface water]: 0.000170686 kg; lognormal variance with pedigree 0.7032, pedigree (2,3,5,5,1)
  Uncertainty: ;
- Phenol [water, surface water]: 9.85186e-6 kg; lognormal variance with pedigree 0.3532, pedigree (2,3,5,5,1)
  Uncertainty: ;
- PAH, polycyclic aromatic hydrocarbons [air, urban air close to ground]: 1.05805e-6 kg; lognormal variance with pedigree 0.1732, pedigree (2,3,5,5,1)
  Uncertainty: ;
- Hydrocarbons, aromatic [water, surface water]: 5.43998e-5 kg; lognormal variance with pedigree 0.3532, pedigree (2,3,5,5,1)
  Uncertainty: ;
- Ammonia [air, urban air close to ground]: 9.28291e-5 kg; lognormal variance with pedigree 0.0932, pedigree (2,3,5,5,1)
  Uncertainty: ;

## Sampling procedure
aggregated data, calculated by the producing company itself

## Extrapolations
see geography and technology This dataset has been copied from an original dataset covering the geography RER. The uncertainty has been adjusted accordingly.

## Review by Heiko Kunst 2007-11-15
passed.
