# electricity production, hydro, reservoir, non-alpine region

Dataset: EcoSpold 2, unit process
Geography: AR
Time period: 2012-01-01 to 2019-12-31
Technology level: modern
Classification: ISIC rev.4 ecoinvent: 3510:Electric power generation, transmission and distribution
Tags: hydro power
Scenario: Business-as-Usual
System model: Allocation at the point of substitution
Generated by: Alejandro P Arena
Published in: Suppen, N 2017
Database: ecoinvent
isCopyrightProtected: true
accessRestrictedTo: 1

## General comment
This dataset represents the production of high voltage electricity at grid-connected reservoir hydropower plants located in non mountaineous regions in Argentina in 2014. Lifetime is assumed to be 150 years for the dam and 80 years for the rest of materials.
This dataset is based on the "electricity production, hydro, reservoir, non-alpine region/GLO 2008" dataset (accessed: January 24th, 2018), in which the reservoir hydropower plants are modelled with non-alpine region plants extrapolated from data on Swiss hydropower plants. The original dataset refers to plant construction of a mix of types of dams built between 1945 and 1970; therefore they might not be representative for more modern construction, for an individual type and for small-scale and smallest-scale plants.
Supporting documentation available at: <http://portalweb.cammesa.com/Memnet1/default.aspx>. Additional information can be obtained from CAMMESA under request.

## Included activities start
This dataset starts from the power plant ready to produce electricity, i.e. the reservoir filled with water.
From (potential) energy in water, entering the power plant.

## Included activities end
This activity ends with 1kWh of high voltage electricity produced at the power plant and arrived at the busbar.

This dataset includes
- the area/volume occupied for the barrage, power station, and the lake
- a preliminary estimation of emissions of methane
- operation and maintenance activities and materials of the power plants, such as lubricating oil or mass of water passing through the turbines.

This dataset doesn't include
- land use for access roads to the reservoir
- emissions of carbon dioxide and dinitrogen oxide
- raw materials extraction, decommissioning and waste treatment as these activities are already included in the infrastructure datasets
- transformation of the electricity produced.

## Geography
Data were extrapolated from the average Swiss reservoir hydropower plant.

## Technology
Storage power plants have an appendant reservoir. The size of the reservoir can range from daily, monthly to annual storage reservoirs. According to the net head high-pressure, medium-pressure and low-pressure systems can be distinguished. High- and medium-pressure systems are constructed as dams. High-pressure storage power plants with a head of over 50 meters are very common in Switzerland. For this dataset concrete dams (arch dams and gravity dams) with a height of more then 30 meters are taken into account. Also pumped storage power plants are included because in most cases the data is only available for the overall generation system. The same counts for high- and medium-pressure and alpine run-of-river power plants which are also included in the storage power plant dataset. Due to the fact that the efforts for the plant construction are similar to storage power plants and that the estimated production is comparatively low, high- and medium-pressure run-of-river power plants are covered by the reservoir power station dataset.
The technology used in the dataset has an overall efficiency of 82%, more modern technologies show an overall efficiency of about 88%. The overall efficiency is composed of the efficiency of the works water channel, the turbine, the generator and the transformer and are listed below:
Efficiency of power plant current modern
Works water channel 0.95 0.95
Turbine 0.87 0.91
Generator 0.96 0.98
Transformer 0.98 0.99
Reservoir power plant total
without works water channel 0.82 0.88
with works water channel 0.78 0.84
Pumped storage power plant 0.70 0.74
The losses along the works water channel are primarily caused by friction and are calculated from the difference between gross and net head. Based on this calculation the efficiency of the works water channel amounts to 95%. The losses depend on the flow rate and have its maximum at full load. The smaller the cross section of adits and pressure pipelines, the higher the flow velocity and thus the friction losses. In older plants according to Bischof (1992) the efficiency of works water channels could be increased generally more than by replacing turbines and generators.
The efficiency losses in turbines depend on the turbine type (Kaplan, Francis, Pelton, etc.), the turbine output and on the ratio between turbined water amount and the rated water amount. In König (1997) examples for curve progressions of the relationship between these variables are shown. For current power plants an efficiency of 87% is assumed, more modern turbines show an efficiency of about 91%.
The efficiency of generators depends on the output, the rotation speed of the generator and the cooling system. Some relevant data can be found in König (1997). For today’s power plants an efficiency of approximately 96% is assumed, modern generators show an efficiency of about 98%. The efficiency of transformers amounts to 98%, respectively 99%.
References:
Bischof, R. (1992) Modernisierungspotential bei bestehenden Wasserkraftwerken. Vortrag beim Schweizerischen Technischen Verband, Sektion Graubünden, 21. Oktober 1992. Churwalden, Schweiz [unpublished].
König F., von (1985) Bau von Wasserkraftanlagen. C.F. Müller, Karlsruhe.

## Time period
The Annual Production Volume is valid for the year 2014

## Parameters
- lifetime: 150 year; lognormal variance with pedigree 0.0014, pedigree (2,2,1,3,1)
  Estimation based on experiences.
  nan
- losses from gross electricity production: 0.01 dimensionless; name losses_gross_net; lognormal variance with pedigree 0.003225, pedigree (3,3,1,2,1)
  Literature value. Generic value taken from the IEA Electricity information 2014, part I, p. I.7: 'The difference between gross and net electricity production is generally observed to be about 7% for conventional thermal stations, 1% for hydro stations and 6% for nuclear.'
  IEA/OECD. 2014. Electricity Information 2014. International Energy Agency (IEA), Paris Cedex (FR).
  nan
  Uncertainty: Generic assumption
- gross electricity production: 1.00935e10 kWh; name gross_electricity; lognormal variance with pedigree 0.008725, pedigree (4,2,1,2,1)
  Literature value/statistics, extrapolation. Gross production of grid-connected electricity in reservoir hydropower plants in non mountainous regions in 2014 . Run-of-river with pondage power plants in these regions have been included in this dataset.These power plants are: F. Ameghino, Arroyito, Cadillal, Ch Carrizal, Cabra Corral, Casa De Piedra, P. Banderita, Rio Hondo, S. Grande Arg, San Roque, El Tunal, Chocon, Rio Grande: The source (CAMMESA) provides statistics about net energy exchanges through the electric wholesale market . The gross production have been calculated with the losses_gross_net parameter
  Sources: CAMMESA "COMPAÑÍA ADMINISTRADORA DEL MERCADO MAYORISTA ELÉCTRICO SOCIEDAD ANÓNIMA" ISupporting documentation available at: <http://portalweb.cammesa.com/Memnet1/default.aspx>.

## Reference product
- electricity, high voltage: 1 kWh; CPC 17100: Electrical energy; By-product classification allocatable product
  production volume 9.99257e9 kWh; name apv_electricity; = gross_electricity*(1-losses_gross_net)
    Literature/Calculated value.
    Net electricity production of grid-connected electricity in reservoir hydropower plants in non mountainous regions in 2014.
    The source (CAMMESA) provides statistics about net energy exchanges through the electric wholesale market .
    See the comment for the parameter losses from gross electricity production for more information
    Source:; CAMMESA "COMPAÑÍA ADMINISTRADORA DEL MERCADO MAYORISTA ELÉCTRICO SOCIEDAD ANÓNIMA". Supporting documentation available at: http://portalweb.cammesa.com/Memnet1/default.aspx
  property price 0.0977 EUR2005
    Temporary price data. Calculated as 90% of purchasers price based on: 94% of the average price (to account for a 6% loss in transformation and transmission) for electricity for industrial consumersin 2005 (excluded taxes). From IEA.

## Inputs from technosphere
- lubricating oil: 7.56e-6 kg; name lubricating_oil; = 0.000009*0.84; source Vögtlin H. J. 2002, p. p.36 in Bolliger et al.; lognormal variance with pedigree 0.1001, pedigree (4,2,3,5,3)
  Data taken from the GLO 2008 dataset, For the consumption of lubricating oil during plant operation no data was available. It is assumed that both turbines and run-of-river plants need the same amount of oil hence the information about lubricating oil consumption of run-of-rivers is adopted. A consumption of lubricating oil for turbines of 9 liters per GWh is estimated. With an oil density of 0.84 kg/l this amounts to 0.007 g/kWh. The lubricating oil is in a closed loop system (i.e. cannot get into the turbined water system) and is disposed annualy as waste oil in a hazardous waste treatment plant.
  properties: dry mass 1 kg, wet mass 1 kg, carbon content, fossil 0.75
  note on carbon content, fossil: Lubricating oil is produced from diesel. C-content/dry mass of fats and oils considered 75%, from: ecoinvent v2.2 report, n 15a, pg 40
- hydropower plant, reservoir, non-alpine regions: 4.0404e-13 unit; = 1/(lifetime*16500000000); source Bolliger, R. 2007, p. p.40f, Tab. 1.1 p.3; lognormal variance with pedigree 0.0422, pedigree (1,1,2,5,1)
  Literature value/calculated value. The needed amount of infrastructure per kWh produced is calculated with the lifetime and the annual net energy production (16500GWh/a).
- waste mineral oil: -7.56e-6 kg; name waste_oil; = (lubricating_oil)*-1; lognormal variance with pedigree 0.0922, pedigree (1,1,2,5,1)
  Estimation taken from the GLO 2008 dataset, which in turn is based on data of Swiss reservoir power plants. The lubricating oil is in a closed loop system (i.e. cannot get into the turbined water system) and is disposed annualy as waste oil in a hazardous waste treatment plant. The information given is based on own assumptions.
  production volume 75543.8 kg; = apv_electricity* waste_oil
    Calculated from the production volume of electricity, high voltage, hydro, reservoir, non-alpine region in proportion to the respective output amounts.
  property price 0 EUR2005; name waste_oil_price_EUR2005
  properties: water content 0.111111, wet mass 1 kg, dry mass 0.9 kg, carbon content, fossil 0.864444
  note on carbon content, fossil: Tab A.6, ecoinvent v2.2 report 13_I. C content has been calculated after data in the tables, and then referred to 1 kg DM

## Inputs from nature
- Occupation, lake, artificial [natural resource, land]: 0.27825 m2*year; = transformation_from*lifetime; source Bolliger, R. 2007, p. p.35; lognormal variance with pedigree 0.0722, pedigree (1,1,2,5,1)
  Standard values for landuse are assumed.
  Regarding reservoir power stations, land (i.e. meadows, moorlands, gravel areas etc.) is mainly occupied by reservoirs. Averaged over the investigated sample and distributed over life time the specific land use amounts to 0.0035 m2a/kWh; the transformation of land amounts to 0.00023 m2/kWh.
  The original state before setting up the reservoir has to be classified as module 'transformation, from unspecified' due to the fact that various types of flooded ground can be distinguished. The flooded area partly consisted of alpine meadows and grazing land, rarely also villages had to be resettled; often impassable, rocky alpine valleys and gorges were filled with water, where only marginal vegetation and no agricultural use was possible. The definition of the character and the environmental value (e.g. forest, areas with rare mushrooms, moorlands, etc.) of the affected areas were not possible, due to the lack of information.
  The original state before setting up the reservoir has to be classified as module 'transformation, from unspecified' due to the fact that various types of flooded ground can be distinguished. The flooded area partly consisted of alpine meadows and grazing land, rarely also villages had to be resettled; often impassable, rocky alpine valleys and gorges were filled with water, where only marginal vegetation and no agricultural use was possible. The definition of the character and the environmental value (e.g. forest, areas with rare mushrooms, moorlands, etc.) of the affected areas were not possible, due to the lack of information.
  Regarding reservoir power stations, land (i.e. meadows, moorlands, gravel areas etc.) is mainly occupied by reservoirs. Averaged over the investigated sample and distributed over life time the specific land use amounts to 0.0035 m2a/kWh; the transformation of land amounts to 0.00023 m2/kWh.
  Standard values for landuse are assumed.
  Calculated value, based on the transformation area and the estimated life time
- Transformation, to lake, artificial [natural resource, land]: 0.00183645 m2; = transformation_from-transformation_to_industrial; source Bolliger, R. 2007, p. p.35; lognormal variance with pedigree 0.3022, pedigree (1,1,2,5,1)
  Estimation based on the transformed area
- Water, turbine use, unspecified natural origin [natural resource, in water]: 2.31 m3; name water_turbine_use_UNO_input; source Bolliger, R. 2007, p. p.36; lognormal variance with pedigree 0.0022, pedigree (1,1,2,5,1)
  For reservoirs in non-alpine regions, it is assumed that they are not as deep as reservoirs in alpine regions and have a bigger surface. As for the land use, also for the water use a factor 10 in comparison to alpine reservoirs is assumed.
  Literature value/estimation. The specific turbine water amount is inversely proportional to the average head. A guidance value says that a hydropower plant can produce 1kWh of electricity with 1 m3 water over a head of 450 m. The ecological relevance of the turbine water amount is that it presents a demonstrative dimension of water being taken from natural water balance for a while.
- Transformation, from unspecified [natural resource, land]: 0.001855 m2; name transformation_from; source Bolliger, R. 2007, p. p.35; lognormal variance with pedigree 0.3022, pedigree (1,1,2,5,1)
  Regarding reservoir power stations, land (i.e. meadows, moorlands, gravel areas etc.) is mainly occupied by reservoirs. Averaged over the investigated sample and distributed over life time the specific land use amounts to 0.0035 m2a/kWh; the transformation of land amounts to 0.000023 m2/kWh.
  The origin of state after setting up the reservoir has to be classified as module 'transformation to lake, artificial'; the area occupied by the dam and the power station has to be classified as 'transformation to industrial area' with an assumed, simplified rate of 1% of the total area. The area affected by power stations plays a subordinate role due to the fact that power stations often were built in caverns. Land occupied by newly built access roads is neglected.
  Standard values for landuse are assumed.
  Estimation. The water surface of all hydro power plants with pondage in non mountain regions have been summed up and related with the amount of electricity production.
  Source: Inventario de Presas y Centrales Hidroeléctricas de la República Argentina,- 1a ed. Subsecretaria de Recursos Hídricos de la Nación
  Buenos Aires : Ministerio de Planificación Federal, Inversión Pública y Servicios, 2010. ISBN 978-987-23585-8-7
- Volume occupied, reservoir [natural resource, in water]: 2.81 m3*year; source BWW 1991, p. p.35 in Bolliger et al.; lognormal variance with pedigree 0.342, pedigree (1,1,5,5,1)
  Estimation. The useful volume of all hydro power plants with pondage in non-mountain regions have been considered, and related with the amount of electricy produced during the useful life.
  Source: Inventario de Presas y Centrales Hidroeléctricas de la República Argentina,- 1a ed. Subsecretaria de Recursos Hídricos de la Nación
  Buenos Aires : Ministerio de Planificación Federal, Inversión Pública y Servicios, 2010. ISBN 978-987-23585-8-7
- Transformation, to industrial area [natural resource, land]: 1.855e-5 m2; name transformation_to_industrial; = transformation_from*0.01; source Bolliger, R. 2007, p. p.35; lognormal variance with pedigree 0.1582, pedigree (4,1,2,5,3)
  Estimation. The area for the barrage and the power station are assumed to amount to 1% of the total land use. No land use for access roads was taken into account.
- Energy, potential (in hydropower reservoir), converted [natural resource, in water]: 3.79 MJ
  Reflects range average to best performance.

## Emissions to nature
- Water [air, unspecified]: 0.0292217 m3; name water_to_air_unspecified; lognormal variance with pedigree 0.0409, pedigree (2,2,2,1,1)
  Calculated value based on literature values and expert opinion. See comments in the parametres' comment field.
  property fraction, origin: salt water 0; name fraction_origin_salt_water_Ww
  property fraction, origin: fresh water 1; name fraction_origin_fresh_water_Ww
  property fraction, origin: unspecified 0; name fraction_origin_unspecified_Ww
- Methane, non-fossil [air, non-urban air or from high stacks]: 0.000204 kg; lognormal variance with pedigree 0.0992, pedigree (5,3,5,4,3)
  Hertwich, E.G. 2013. Addressing Biogenic Greenhouse Gas Emissions from Hydropower in LCA. Environmental Sciency&Technology, 47, 9604-9611
  Literature value/calculated value taken over from the global dataset "electricity production, hydro, reservoir, non-alpine region, GLO, 2015": Hertwich 2013 provides an analysis of greenhouse gas emissions from hydropower plants. 89 data points are available for temperate non-alpine plants, from which the average CO2 and CH4 emissions are calculated.
  Hertwich, E.G. 2013. Addressing Biogenic Greenhouse Gas Emissions from Hydropower in LCA. Environmental Sciency&Technology, 47, 9604-9611
- Carbon dioxide, from soil or biomass stock [air, non-urban air or from high stacks]: 0.039 kg; lognormal variance with pedigree 0.0992, pedigree (5,3,5,4,3)
  Literature value/calculated value taken over from the global dataset "electricity production, hydro, reservoir, non-alpine region, GLO, 2017": Hertwich 2013 provides an analysis of greenhouse gas emissions from hydropower plants. 89 data points are available for temperate non-alpine plants, from which the average CO2 and CH4 emissions are calculated.
  Hertwich, E.G. 2013. Addressing Biogenic Greenhouse Gas Emissions from Hydropower in LCA. Environmental Sciency&Technology, 47, 9604-9611
- Water [water, unspecified]: 2.28078 m3; name water_to_water_unspecified; = water_turbine_use_UNO_input-water_to_air_unspecified; lognormal variance with pedigree 0.098025, pedigree (4,4,4,2,4)
  (same comment as for Water)
  property fraction, origin: unspecified 0; name fraction_origin_unspecified
  property fraction, origin: fresh water 1; name fraction_origin_fresh_water
  property fraction, origin: salt water 0; name fraction_origin_salt_water

## Sampling procedure
Sampling procedure based on literature. Data referred to reservoir and run-of-riverr with pondage power plants in non-alpine regions. The considered power plants are: F. Ameghino, Arroyito, Cadillal, Ch Carrizal, Cabra Corral, Casa De Piedra, P. Banderita, Rio Hondo, S. Grande Arg, San Roque, El Tunal, Chocon, and Rio Grande.

## Extrapolations
This dataset has been extrapolated from year 2017 to the year of the calculation (2019). The uncertainty has been adjusted accordingly.
