# bentonite quarry operation

Dataset: EcoSpold 2, unit process
Geography: DE
Time period: 1997-01-01 to 2019-12-31
Technology level: current
Classification: ISIC rev.4 ecoinvent: 0810:Quarrying of stone, sand and clay
Scenario: Business-as-Usual
System model: Allocation at the point of substitution
Generated by: Daniel Kellenberger (obsolete)
Published in: Kellenberger D. 2007
Database: ecoinvent
isCopyrightProtected: true
accessRestrictedTo: 1

## General comment
This dataset represents the production of 1 kg of bentonite. Bentonite is an industrial mineral with a high content of swellable threelayer clay minerals, which often originates from the transformation of volcanic ashes and tuffs. Bentonite is used for the production of activated bentonite. This dataset is based on information published in an environmental report by a German company (Süd-Chemie AG).
References:
Kellenberger D., Althaus H.-J., Jungbluth N., Künniger T., Lehmann M. and Thalmann P. (2007) Life Cycle Inventories of Building Products. Final report ecoinvent Data v2.0 No. 7. EMPA Dübendorf, Swiss Centre for Life Cycle Inventories, Dübendorf, CH.
Virta R. L. (2015) USGS 2013 Minerals Yearbook – Clay and shale [advance release]

## Included activities start
From the excavation of bentonite in the ground.

## Included activities end
This activity ends with the production of bentonite. The dataset includes the excavation by digger, transportation to the first grinding machine, the land-use of the mine and the recultivation of the land.

## Geography
This dataset is based on data from a German company.

## Technology
The technology used in the modelled German mine is probably state-of-art (first mining company in Europe taking part at an eco-audit based on EG-eco-audit requirements). The assumed thickness of the bentonite layer is 3 m. The thickness of overburden material is estimated to be 30 m. Digging and transportation is made by heavy diesel machines.
Reference:
Kellenberger D., Althaus H.-J., Jungbluth N., Künniger T., Lehmann M. and Thalmann P. (2007) Life Cycle Inventories of Building Products. Final report ecoinvent Data v2.0 No. 7. EMPA Dübendorf, Swiss Centre for Life Cycle Inventories, Dübendorf, CH.

## Parameters
- fraction, process water, to air: 0.2 dimensionless; name fraction_PW_to_air; lognormal variance with pedigree 0.092025, pedigree (4,4,3,2,4)
- fraction, tap water, to air: 0.2; name fraction_TW_to_air; lognormal variance with pedigree 0.092025, pedigree (4,4,3,2,4)

## Reference product
- bentonite: 1 kg; name RP; CPC 15400: Clays; By-product classification allocatable product
  Bentonite is an industrial mineral with a high content of swellable threelayer clay minerals, which often originates from the transformation of volcanic ashes and tuffs. Bentonite is used for the production of activated bentonite.
  References:
  Kellenberger D., Althaus H.-J., Jungbluth N., Künniger T., Lehmann M. and Thalmann P. (2007) Life Cycle Inventories of Building Products. Final report ecoinvent Data v2.0 No. 7. EMPA Dübendorf, Swiss Centre for Life Cycle Inventories, Dübendorf, CH.
  Virta R. L. (2015) USGS 2013 Minerals Yearbook – Clay and shale [advance release]
  production volume 3.6e8 kg; name RP_PV
    Literature value. The U.S. Geological Survey reports a production volume of 360 thousand metric tons for Germany in 2016 (USGS 2017).
    Reference:
    U.S. Geological Survey (USGS) (2017) Mineral Commodity Summaries, Clays, January 2017, https://minerals.usgs.gov/minerals/pubs/commodity/clays/mcs-2017-clays.pdf (accessed on the 2017-08-08).
  property price 0.096 EUR2005
    Literature value; could be too high as it is not "at mine", but import / export; price found at: http://data.un.org/Data.aspx?q=bentonite&d=ComTrade&f=_l1Code%3a26%3bcmdCode%3a250810.
  property carbon content, non-fossil 0
    Bentonite is an absorbent aluminium phyllosilicate, generally impure clay consisting mostly of montmorillonite, whose chemical formula is (Na,Ca)0.33(Al,Mg)2(Si4O10)(OH)2·nH2O (ecoinvent v2.2 report 7_part XIX)
  property carbon content, fossil 0
    (same comment as for bentonite)
  property carbon content 0
    carbon content on a dry matter basis (reserved; not for manual entry)
  property true value 0.096; name RP_true_value
    allocation property applied in "true value" allocation // value calculated from revenue
  properties: water in wet mass 0 kg, wet mass 1 kg, dry mass 1 kg, water content 0, carbon allocation 0 kg

## By-products
- heat, for reuse in municipal waste incineration only: 0 MJ; CPC 17300: Steam and hot water; By-product classification allocatable product; pedigree (1,1,1,1,1)
  Net electricity generated from this waste and used in internal MSWI plant energy redistribution.
  Uncertainty: uncertainty is calculated from uncertainties in waste composition and uncertainties in energy efficiency and the uncertainty in internal energy demand
  production volume 394787 MJ
  property exergy 0.1842 MJ; name E_th_prod_MSWI_exergy
    This exergy property is based on the exergy content of the product.
  property price 0.0106 EUR2005; name E_th_prod_MSWI_price_EUR2005
    Average European district heat price from Ecoheatcool and Euroheat 2005-2006, Ecoheat Work package 1: The European heat market. Final report. 10.6 EUR/GJ i s the price of district heat. http://www.solarthermalworld.org/files/Ecoheatcool%20WP1%20Web.pdf?download
  property true value relation 0.1842; name E_th_prod_MSWI_true_value_relation
    property to calculate "true value" from
  property true value 7.26045e-6
    allocation property applied in "true value" allocation // value calculated from true value relation
- electricity, for reuse in municipal waste incineration only: 0 kWh; CPC 17100: Electrical energy; By-product classification allocatable product; pedigree (1,1,1,1,1)
  (same comment as for heat, for reuse in municipal waste incineration only)
  production volume 53444.5 kWh
  property true value relation 3.6; name E_el_prod_MSWI_true_value_relation
    property to calculate "true value" from
  property price 0.1 EUR2005; name E_el_prod_MSWI_price_EUR2005
    Estimated to be the same price as in case of electricity, medium voltage.
  property exergy 3.6 MJ; name E_el_prod_MSWI_exergy
    This exergy property is based on the exergy content of the product.
  property true value 1.92095e-5
    (same comment as for heat, for reuse in municipal waste incineration only)
- iron scrap, sorted, pressed: 0 kg; By-product classification Recyclable; CPC 39310: Slag, dross, scalings and other waste from the manufacture of iron or steel; pedigree (1,1,1,1,1)
  Iron scrap recovered from this waste.
  Uncertainty: uncertainty calculated from uncertainty in waste composition, uncertainty of share of recyclable metal, uncertainty of transfer coefficient to bottom ash, uncertainty of the efficiency of scrap removal in MSWI plant.
  production volume 1355.71 kg
  property price 0.175 EUR2005
    Temporary price data. Calculated as 90% of purchasers price based on: 2005 import and export prices (total trades (USD) divided by total weight (kg) in biggest economies of the world: EU27, USA, Brasil, China, India, Japan and Russia) from UN Commodity Trade Statistics Database (http://data.un.org/Explorer.aspxDatabase [Accessed 2011.06.20]). Commodity: Waste or scrap, of cast iron
  property carbon content 0
    carbon content on a dry matter basis (reserved; not for manual entry)
  property true value 6.59027e-7
    allocation property applied in "true value" allocation // value calculated from revenue
  properties: dry mass 1 kg, water content 0, carbon content, non-fossil 0, water in wet mass 0 kg, carbon content, fossil 0, wet mass 1 kg, carbon allocation 0 kg
- iron scrap, unsorted: 0 kg; source European Aluminium Association 2008; CPC 39310: Slag, dross, scalings and other waste from the manufacture of iron or steel; By-product classification Recyclable; pedigree (1,1,1,1,1)
  production volume 0.191392 kg
  property price 0.149 EUR2005; name ironScrapAmount_price_EUR2005
    Temporary price data. Calculated as 90% of purchasers price based on: estimated at 85% of sorted scrap
  property carbon content 0
    carbon content on a dry matter basis (reserved; not for manual entry)
  property true value 7.92151e-11
    allocation property applied in "true value" allocation // value calculated from revenue
  properties: water in wet mass 0 kg, water content 0, carbon content, fossil 0, carbon content, non-fossil 0, dry mass 1 kg, wet mass 1 kg, carbon allocation 0 kg
- aluminium oxide, non-metallurgical: 0 kg; source European Aluminium Association 2008; CPC 41432: Alumina (aluminium oxide), except artificial corundum; By-product classification allocatable product; CAS 1344-28-1; pedigree (1,1,1,1,1)
  production volume 12.0436 kg
  property carbon content, non-fossil 0; name C_content_non_fossil
  property price 0.28 EUR2005; name Al2O3Amount_price_EUR2005
    From UN trade database. http://data.un.org/ Import data from the largest economies of the world are used (Brazil, India, USA, China, Japan and EU-27).
  property dry mass 1 kg; name DM
  property water content 0; name water_content
  property wet mass 1 kg; name WM
  property water in wet mass 0 kg; name WWM
  property carbon content, fossil 0; name C_content_fossil
  property carbon content 0
    carbon content on a dry matter basis (reserved; not for manual entry)
  property true value 9.36723e-9
    allocation property applied in "true value" allocation // value calculated from revenue
  properties: carbon allocation 0 kg
- aluminium, cast alloy: 0 kg; source European Aluminium Association 2008; By-product classification allocatable product; CPC 41431: Unwrought aluminium; pedigree (1,1,1,1,1)
  EcoSpold01Location=RER
  production volume 112.581 kg
  property price 1.3 EUR2005; name castAlloyAmount_price_EUR2005
    Temporary price data. Calculated as 90% of purchasers price based on: Source: London Metal Exchange, Aluminium alloy price for 2005
  property carbon content 0
    carbon content on a dry matter basis (reserved; not for manual entry)
  property true value 4.06542e-7
    allocation property applied in "true value" allocation // value calculated from revenue
  properties: water in wet mass 0 kg, carbon content, non-fossil 0, water content 0, dry mass 1 kg, carbon content, fossil 0, wet mass 1 kg, carbon allocation 0 kg
- aluminium, wrought alloy: 0 kg; source European Aluminium Association 2008; By-product classification allocatable product; CPC 4153: Semi-finished products of aluminium or aluminium alloys; pedigree (1,1,1,1,1)
  production volume 49.2857 kg
  property price 1.44 EUR2005; name secondaryAluminiumOutput_price_EUR2005
    Estimated based on literature values and expert judgement. Aluminium ccast alloys are about 90% of the price of aluminium wrought alloys.
  property carbon content 0
    carbon content on a dry matter basis (reserved; not for manual entry)
  property true value 1.97143e-7
    allocation property applied in "true value" allocation // value calculated from revenue
  properties: wet mass 1 kg, water content 0, carbon content, fossil 0, water in wet mass 0 kg, carbon content, non-fossil 0, dry mass 1 kg, carbon allocation 0 kg
- copper: 0 kg; source Rentz O. 1999; By-product classification allocatable product; CPC 41413: Refined copper and copper alloys, unwrought; master alloys of copper
  Literature value. Copper uses: Before end-use copper is manufactured into semi fabricated products, such as shapes and ingots (known as 'semis'). These manufacturing processes are subdivided into hot working, cold working and, if necessary, process annealing. Few of the semis are ready for use as such. They more typically travel to first-stage manufacturers, who make metal rods, wire, and casting, and then to component manufacturers who produce such things as motors, valves, and insulated cables The components in turn are incorporated by final-stage manufacturers into a variety of finished products - automobiles, commercial buildings, residential housing, and so forth. These uses account for about 79% of the world-wide consumption of copper.
  production volume 13.0254 kg
  property price 5.52 EUR2005
    Literature value (http://www.economist.com/news/business/21576714-mining-industry-has-enriched-chile-its-future-precarious-copper-solution). Average price between 20015 and 2013.
  property carbon content 0
    carbon content on a dry matter basis (reserved; not for manual entry)
  property true value 1.99722e-7
    allocation property applied in "true value" allocation // value calculated from revenue
  properties: dry mass 1 kg, water in wet mass 0 kg, wet mass 1 kg, carbon content, non-fossil 0, water content 0, carbon content, fossil 0, carbon allocation 0 kg
- zinc concentrate: 0 kg; CPC 14290: Other non-ferrous metal ores and concentrates (other than uranium or thorium ores and concentrates); By-product classification allocatable product
  Calculated value from the knowledge of the properties of both products.
  production volume 1.03386e-8 kg
  property price 0.38 EUR2005; name ByP_price_EUR2005
    Temporary price data. Calculated as 90% of purchasers price based on: Zinc content in concentrate 53%. Concentrate price per kg Zn 86.5% of refined Zn price (13.5% treatment charges according to CHR Metals Limited 2005: Dynamic cost curves. http://www.minecost.com/dynamic.pdf). 2004 zinc price from USGS (2007) Mineral commodity summaries 2007. <http://minerals.usgs.gov/minerals/pubs/mcs/2007/mcs2007.pdf> [Accessed 25 May 2010]
  property zinc content 0.53; name zinc_C_zinc_concentrate
    Zinc content on a dry matter basis. Value taken from teh "zinc mine operation" /GLO dataset.
  property dry mass 1 kg; name DM_zinc_concentrate
  property carbon content 0
    carbon content on a dry matter basis (reserved; not for manual entry)
  property true value 1.0913e-17
    allocation property applied in "true value" allocation // value calculated from revenue
  properties: wet mass 1 kg, water content 0, carbon content, non-fossil 0, carbon content, fossil 0, water in wet mass 0 kg, carbon allocation 0 kg

## Inputs from technosphere
- heat, district or industrial, other than natural gas: 0.00818662 MJ; lognormal variance with pedigree 0.0406, pedigree (1,3,5,1,1)
- tap water: 0.00683801 kg; name tap_water_input; lognormal variance with pedigree 0.0406, pedigree (1,3,5,1,1)
  Literature data.
  Reference:
  Süd-Chemie (1999) vereinfachte Umwelterklärung Bentonit 1999, Standort Moosburg. Süd-Chemie AG, München und Moosburg, D-80333 München.
  properties: wet mass 1 kg, water content 2962.17, dry mass 0.000337476 kg, carbon content, fossil 0.00178991
  note on carbon content, fossil: Bicarbonate content is 2.93 mol/m3. CO2 content is 0.1 mol/m3 (ecoinvent v2.2 report 8, Tab 93.1).
- diesel, burned in building machine: 0.0920732 MJ; lognormal variance with pedigree 0.0406, pedigree (1,3,5,1,1)
- lubricating oil: 8.05765e-5 kg; lognormal variance with pedigree 0.0406, pedigree (1,3,5,1,1)
  (same comment as for tap water)
  properties: dry mass 1 kg, carbon content, fossil 0.75, wet mass 1 kg
  note on carbon content, fossil: Lubricating oil is produced from diesel. C-content/dry mass of fats and oils considered 75%, from: ecoinvent v2.2 report, n 15a, pg 40
- recultivation, bentonite mine: 1.54955e-5 m2; lognormal variance with pedigree 0.1606, pedigree (1,3,5,1,1)
  Literature data.
  Reference:
  Süd-Chemie (1997) Umwelterklärung Bentonit 1997, Standort Moosburg. Süd-Chemie AG, München und Moosburg, D-80333 München.
- wastewater, average: -5.91828e-6 m3; name BP_wastewater_average; lognormal variance with pedigree 0.0406, pedigree (1,3,5,1,1)
  (same comment as for tap water)
  production volume 2131.2 m3; = RP_PV*BP_wastewater_average/ABS(RP)
    Calculated from the production volume of bentonite in proportion to the respective output amounts.
  property price 0 EUR2005; name BP_wastewater_average_price_EUR2005
  properties: wet mass 1000 kg, water content 2882.2, dry mass 0.346837 kg, carbon content, non-fossil 0.194039
  note on carbon content, non-fossil: 0.0673 kg TOC/m3 (Tab A.17, ecoinvent v2.2 report 13_I). TOC was considered as Total Carbon.
- ethylene glycol: 3.61895e-6 kg; lognormal variance with pedigree 0.0406, pedigree (1,3,5,1,1)
  (same comment as for tap water)
  properties: wet mass 1 kg, dry mass 1 kg, carbon content, fossil 0.387097
- soda ash, light, crystalline, heptahydrate: 0.0199942 kg; lognormal variance with pedigree 0.1786, pedigree (4,5,5,5,5)
  Estimated value based on expert judgement.
  properties: dry mass 1 kg, wet mass 1 kg, carbon content, fossil 0.0517241
- municipal solid waste: -0.000386887 kg; name BP_municipal_solid_waste; lognormal variance with pedigree 0.0406, pedigree (1,3,5,1,1)
  (same comment as for tap water)
  production volume 139320 kg; = RP_PV*BP_municipal_solid_waste/ABS(RP)
    (same comment as for wastewater, average)
  properties: wet mass 1 kg, dry mass 0.771 kg, carbon content, fossil 0.171549, carbon content, non-fossil 0.261655, water content 0.297017
  note on carbon content, fossil: MSW composition in tab 4.1, ecoinvent v2.2 report 13_I. C content referred to 1 kg DM
- transport, passenger car: 0.0384888 km; lognormal variance with pedigree 0.1606, pedigree (1,3,5,1,1)
  Transport, passenger car is in this cased used as a proxy for emissions caused by using conveyor belt.
  Reference:
  Süd-Chemie (1999) vereinfachte Umwelterklärung Bentonit 1999, Standort Moosburg. Süd-Chemie AG, München und Moosburg, D-80333 München.'
- electricity, medium voltage: 0.000713792 kWh; lognormal variance with pedigree 0.0406, pedigree (1,3,5,1,1)
  (same comment as for tap water)

## Inputs from nature
- Transformation, from unspecified [natural resource, land]: 0.000219234 m2; lognormal variance with pedigree 0.1606, pedigree (1,3,5,1,1)
  Calculated value based on literature data (Süd-Chemie 1997). The volume of material extracted (including the overburden material and the bentonite) is 2.75 mio m3 per year. The average thickness of the overburden layer and bentonite layer is 33 m in total. Based on an annual production volume of bentonite of 380000 tonnes, the transformed land per kg of bentonite produced is 2.19E-4 m2.
  Reference:
  Süd-Chemie (1997) Umwelterklärung Bentonit 1997, Standort Moosburg. Süd-Chemie AG, München und Moosburg, D-80333 München.
- Occupation, mineral extraction site [natural resource, land]: 0.00649811 m2*year; lognormal variance with pedigree 0.0806, pedigree (1,3,5,1,1)
  Calculated value. Based on Süd-Chemie (1997), the area of the mine was 247 ha in 1997, of which 233.1 ha was being used for storage, while 13.9 ha was being mined. Assuming that the total surface of the mine (247 ha) stays constant over time (meaning that a portion of the surface used is restored every year) and based on an average annual production volume of bentonite of 380000 tonnes, the land occupation is 0.0065 m2*year/kg bentonite.
  Reference:
  Süd-Chemie (1997) Umwelterklärung Bentonit 1997, Standort Moosburg. Süd-Chemie AG, München und Moosburg, D-80333 München.
- Transformation, to mineral extraction site [natural resource, land]: 0.000219234 m2; lognormal variance with pedigree 0.1606, pedigree (1,3,5,1,1)
  (same comment as for Transformation, from unspecified)
- Clay, bentonite, in ground [natural resource, in ground]: 0.999709 kg; lognormal variance with pedigree 0.0406, pedigree (1,3,5,1,1)
  (same comment as for tap water)
- Water, unspecified natural origin [natural resource, in water]: 3.86887e-5 m3; name water_UNO_input; lognormal variance with pedigree 0.0406, pedigree (1,3,5,1,1)
  (same comment as for tap water)

## Emissions to nature
- Water [air, unspecified]: 9.10535e-6 m3; = (tap_water_input/1000*fraction_TW_to_air)+(water_UNO_input*fraction_PW_to_air); lognormal variance with pedigree 0.0807, pedigree (2,2,5,1,1)
  Calculated as a fraction of the input of water. For more details, refer to the mathematical relation and the parameters.
  property fraction, origin: salt water 0; name fraction_origin_salt_water
  property fraction, origin: unspecified 0.849802; name fraction_origin_unspecified
  property fraction, origin: fresh water 0.150198; name fraction_origin_fresh_water
- Water [water, unspecified]: 3.05031e-5 m3; = (tap_water_input/1000)*(1-fraction_TW_to_air)+water_UNO_input*(1-fraction_PW_to_air)-0.00000592; lognormal variance with pedigree 0.0807, pedigree (2,2,5,1,1)
  (same comment as for Water)
  property wet mass 1000 kg; name WM
  property fraction, origin: salt water 0; name fraction_origin_salt_water_Ww
  property water in wet mass 1000 kg; name WWM
  property fraction, origin: fresh water 0.150198; name fraction_origin_fresh_water_Ww
  property fraction, origin: unspecified 0.849802; name fraction_origin_unspecified_Ww
  property dry mass 0 kg; name DM
  property carbon content, fossil 0; name C_content_fossil
  property carbon content, non-fossil 0; name C_content_non_fossil

## Sampling procedure
The data is based on an environmental report of one German company (Süd-Chemie AG).

## Review by Emilia Moreno Ruiz 2017-08-10
This dataset was additionally reviewed in a separate review process by Eric Johnson of Atlantic Consulting as well as Emilia Moreno Ruiz and Gregor Wernet of ecoinvent.
