# treatment of coal slurry, impoundment

Dataset: EcoSpold 2, unit process
Geography: GLO
Time period: 1985-01-01 to 2019-12-31
Technology level: current
Classification: ISIC rev.4 ecoinvent: 3822:Treatment and disposal of hazardous waste
Classification: EcoSpold01Categories: waste management/others
Synonyms: coal slurry; coal milling reject; coal washery refuse; coal refining discard
Tags: ConvertedDataset; Treatment
Scenario: Business-as-Usual
System model: Allocation at the point of substitution
Share of production covered: 1 %
Generated by: Gabor Doka (obsolete)
Published in: Dones R. 2007
Database: ecoinvent
isCopyrightProtected: true
accessRestrictedTo: 1

## General comment
[This dataset was already contained in the ecoinvent database version 2. It was not individually updated during the transfer to ecoinvent version 3. Life Cycle Impact Assessment results may still have changed, as they are affected by changes in the supply chain, i.e. in other datasets. This dataset was generated following the ecoinvent quality guidelines for version 2. It may have been subject to central changes described in the ecoinvent version 3 change report (http://www.ecoinvent.org/database/ecoinvent-version-3/reports-of-changes/), and the results of the central updates were reviewed extensively. The changes added e.g. consistent water flows and other information throughout the database. The documentation of this dataset can be found in the ecoinvent reports of version 2, which are still available via the ecoinvent website. The change report linked above covers all central changes that were made during the conversion process.]

## Included activities end
Waste-specific emissions from lignite spoil leachate. Short- and long-term emissions to groundwater from rainwater infiltration leaching. Leaching by lateral groundwater flow not included.

## Geography
Data represents a worldwide average. Generic water infiltration rate according to weighted mean of major sites of coal tailings production in the world.

## Technology
Mechanically stable and revegetated coal tailings impoundment

## Time period
Average coal tailings composition from literature references. Transfer coefficients from prospective model, specific to coal tailings.

## Reference product
- coal slurry: -1 kg; CPC 39: Wastes or scraps; By-product classification Waste
  EcoSpold01Location=GLO
  production volume 1 kg
    Approx. 1167 Mio t/a coal tailings generation
    Dummy value to be replaced by value to be calculated from the demand for this treatment activity
  property price 0 EUR2005
    Waste products are assigned a price of zero as they are assumed to require further treatment.
  property carbon content, fossil 0.124
    Coal tailings composition in Tab 3.4, (Doka G. (2009) Life Cycle Inventory of the disposal of lignite spoil, coal spoil and coal tailings. Doka Life Cycle Assessments, Zurich. Commissioned by the Swiss Centre for Life Cycle Inventories ecoinvent Centre)
  property carbon content 0.124
    carbon content on a dry matter basis (reserved; not for manual entry)
  properties: wet mass 1 kg, dry mass 1 kg, carbon content, non-fossil 0, water in wet mass 0 kg, water content 0, carbon allocation 0.124 kg

## Emissions to nature
- Calcium, ion [water, ground-, long-term]: 0.0010137 kg; lognormal variance with pedigree 4.468, pedigree (1,1,4,1,1)
  Uncertainty is calculated from uncertainties in waste composition and transfer coefficients
- Zinc, ion [water, ground-, long-term]: 5.3894e-5 kg; lognormal variance with pedigree 4.498, pedigree (1,1,4,1,1)
  (same comment as for Calcium, ion)
- Vanadium, ion [water, ground-]: 2.4205e-9 kg; lognormal variance with pedigree 7.638, pedigree (1,1,4,1,1)
  (same comment as for Calcium, ion)
- Selenium [water, ground-, long-term]: 7.3747e-7 kg; lognormal variance with pedigree 5.638, pedigree (1,1,4,1,1)
  (same comment as for Calcium, ion)
- Calcium, ion [water, ground-]: 8.7084e-5 kg; lognormal variance with pedigree 4.608, pedigree (1,1,4,1,1)
  (same comment as for Calcium, ion)
- Phosphate [water, ground-]: 8.376e-8 kg; lognormal variance with pedigree 1.128, pedigree (1,1,4,1,1)
  (same comment as for Calcium, ion)
- Nitrate [water, ground-]: 1.3174e-5 kg; lognormal variance with pedigree 0.158, pedigree (1,1,4,1,1)
  (same comment as for Calcium, ion)
- Chloride [water, ground-, long-term]: 0.00034186 kg; lognormal variance with pedigree 0.108, pedigree (1,1,4,1,1)
  (same comment as for Calcium, ion)
- Scandium [water, ground-]: 2.8729e-9 kg; lognormal variance with pedigree 0.758, pedigree (1,1,4,1,1)
  (same comment as for Calcium, ion)
- Sodium, ion [water, ground-]: 0.00010876 kg; lognormal variance with pedigree 2.448, pedigree (1,1,4,1,1)
  (same comment as for Calcium, ion)
- Barium [water, ground-, long-term]: 5.0382e-5 kg; lognormal variance with pedigree 10.038, pedigree (1,1,4,1,1)
  (same comment as for Calcium, ion)
- Selenium [water, ground-]: 8.3298e-9 kg; lognormal variance with pedigree 5.988, pedigree (1,1,4,1,1)
  (same comment as for Calcium, ion)
- Manganese [water, ground-, long-term]: 6.8824e-5 kg; lognormal variance with pedigree 5.148, pedigree (1,1,4,1,1)
  (same comment as for Calcium, ion)
- Scandium [water, ground-, long-term]: 2.8085e-7 kg; lognormal variance with pedigree 1.958, pedigree (1,1,4,1,1)
  (same comment as for Calcium, ion)
- Silicon [water, ground-, long-term]: 0.00023769 kg; lognormal variance with pedigree 9.118, pedigree (1,1,4,1,1)
  (same comment as for Calcium, ion)
- Chloride [water, ground-]: 0.00010314 kg; lognormal variance with pedigree 0.148, pedigree (1,1,4,1,1)
  (same comment as for Calcium, ion)
- Strontium [water, ground-, long-term]: 1.8757e-5 kg; lognormal variance with pedigree 2.908, pedigree (1,1,4,1,1)
  (same comment as for Calcium, ion)
- Arsenic, ion [water, ground-]: 8.9987e-9 kg; lognormal variance with pedigree 10.328, pedigree (1,1,4,1,1)
  (same comment as for Calcium, ion)
- Copper, ion [water, ground-]: 1.8693e-8 kg; lognormal variance with pedigree 2.958, pedigree (1,1,4,1,1)
  (same comment as for Calcium, ion)
- Strontium [water, ground-]: 6.2087e-7 kg; lognormal variance with pedigree 3.138, pedigree (1,1,4,1,1)
  (same comment as for Calcium, ion)
- Fluoride [water, ground-, long-term]: 1.2361e-6 kg; lognormal variance with pedigree 0.028, pedigree (1,1,4,1,1)
  (same comment as for Calcium, ion)
- Mercury [water, ground-, long-term]: 4.8011e-8 kg; lognormal variance with pedigree 5.188, pedigree (1,1,4,1,1)
  (same comment as for Calcium, ion)
- Fluoride [water, ground-]: 6.2395e-7 kg; lognormal variance with pedigree 0.038, pedigree (1,1,4,1,1)
  (same comment as for Calcium, ion)
- Cobalt [water, ground-]: 3.7898e-8 kg; lognormal variance with pedigree 3.198, pedigree (1,1,4,1,1)
  (same comment as for Calcium, ion)
- Molybdenum [water, ground-, long-term]: 1.3121e-6 kg; lognormal variance with pedigree 2.968, pedigree (1,1,4,1,1)
  (same comment as for Calcium, ion)
- Aluminium [water, ground-, long-term]: 0.0004023 kg; lognormal variance with pedigree 10.598, pedigree (1,1,4,1,1)
  (same comment as for Calcium, ion)
- Iron, ion [water, ground-]: 2.5207e-6 kg; lognormal variance with pedigree 7.518, pedigree (1,1,4,1,1)
  (same comment as for Calcium, ion)
- Beryllium [water, ground-]: 1.3399e-8 kg; lognormal variance with pedigree 0.788, pedigree (1,1,4,1,1)
  (same comment as for Calcium, ion)
- Sulfate [water, ground-]: 0.00064316 kg; lognormal variance with pedigree 5.708, pedigree (1,1,4,1,1)
  (same comment as for Calcium, ion)
- Sulfate [water, ground-, long-term]: 7.6214e-5 kg; lognormal variance with pedigree 5.488, pedigree (1,1,4,1,1)
  (same comment as for Calcium, ion)
- Antimony [water, ground-]: 2.2282e-9 kg; lognormal variance with pedigree 1.898, pedigree (1,1,4,1,1)
  (same comment as for Calcium, ion)
- Iron, ion [water, ground-, long-term]: 0.0015099 kg; lognormal variance with pedigree 7.238, pedigree (1,1,4,1,1)
  (same comment as for Calcium, ion)
- Nitrate [water, ground-, long-term]: 7.4012e-9 kg; lognormal variance with pedigree 0.008, pedigree (1,1,4,1,1)
  (same comment as for Calcium, ion)
- Lead [water, ground-, long-term]: 8.9587e-7 kg; lognormal variance with pedigree 7.168, pedigree (1,1,4,1,1)
  (same comment as for Calcium, ion)
- Magnesium [water, ground-]: 4.2208e-5 kg; lognormal variance with pedigree 6.128, pedigree (1,1,4,1,1)
  (same comment as for Calcium, ion)
- Antimony [water, ground-, long-term]: 1.2585e-7 kg; lognormal variance with pedigree 1.598, pedigree (1,1,4,1,1)
  (same comment as for Calcium, ion)
- Nickel, ion [water, ground-]: 1.7833e-7 kg; lognormal variance with pedigree 4.468, pedigree (1,1,4,1,1)
  (same comment as for Calcium, ion)
- Beryllium [water, ground-, long-term]: 5.7944e-7 kg; lognormal variance with pedigree 0.518, pedigree (1,1,4,1,1)
  (same comment as for Calcium, ion)
- Thallium [water, ground-]: 1.2566e-10 kg; lognormal variance with pedigree 0.788, pedigree (1,1,4,1,1)
  (same comment as for Calcium, ion)
- Silicon [water, ground-]: 1.435e-6 kg; lognormal variance with pedigree 9.548, pedigree (1,1,4,1,1)
  (same comment as for Calcium, ion)
- Manganese [water, ground-]: 3.7158e-6 kg; lognormal variance with pedigree 5.328, pedigree (1,1,4,1,1)
  (same comment as for Calcium, ion)
- Magnesium [water, ground-, long-term]: 0.00081634 kg; lognormal variance with pedigree 5.938, pedigree (1,1,4,1,1)
  (same comment as for Calcium, ion)
- Cadmium, ion [water, ground-, long-term]: 6.2111e-7 kg; lognormal variance with pedigree 3.128, pedigree (1,1,4,1,1)
  (same comment as for Calcium, ion)
- Barium [water, ground-]: 8.4111e-8 kg; lognormal variance with pedigree 10.648, pedigree (1,1,4,1,1)
  (same comment as for Calcium, ion)
- Vanadium, ion [water, ground-, long-term]: 1.3351e-6 kg; lognormal variance with pedigree 7.688, pedigree (1,1,4,1,1)
  (same comment as for Calcium, ion)
- Cobalt [water, ground-, long-term]: 3.3911e-6 kg; lognormal variance with pedigree 2.848, pedigree (1,1,4,1,1)
  (same comment as for Calcium, ion)
- Zinc, ion [water, ground-]: 3.7178e-7 kg; lognormal variance with pedigree 4.908, pedigree (1,1,4,1,1)
  (same comment as for Calcium, ion)
- Titanium, ion [water, ground-, long-term]: 3.3079e-6 kg; lognormal variance with pedigree 24.448, pedigree (1,1,4,1,1)
  (same comment as for Calcium, ion)
- Nickel, ion [water, ground-, long-term]: 1.6115e-5 kg; lognormal variance with pedigree 4.108, pedigree (1,1,4,1,1)
  (same comment as for Calcium, ion)
- Tin, ion [water, ground-, long-term]: 1.6953e-8 kg; lognormal variance with pedigree 5.988, pedigree (1,1,4,1,1)
  (same comment as for Calcium, ion)
- Sodium, ion [water, ground-, long-term]: 0.00057671 kg; lognormal variance with pedigree 2.368, pedigree (1,1,4,1,1)
  (same comment as for Calcium, ion)
- Silver, ion [water, ground-, long-term]: 1.0941e-9 kg; lognormal variance with pedigree 0.038, pedigree (1,1,4,1,1)
  (same comment as for Calcium, ion)
- Potassium, ion [water, ground-, long-term]: 0.0013002 kg; lognormal variance with pedigree 5.928, pedigree (1,1,4,1,1)
  (same comment as for Calcium, ion)
- Tin, ion [water, ground-]: 1.6782e-10 kg; lognormal variance with pedigree 0.998, pedigree (1,1,4,1,1)
  (same comment as for Calcium, ion)
- Arsenic, ion [water, ground-, long-term]: 3.1203e-6 kg; lognormal variance with pedigree 9.798, pedigree (1,1,4,1,1)
  (same comment as for Calcium, ion)
- Mercury [water, ground-]: 5.8769e-10 kg; lognormal variance with pedigree 5.528, pedigree (1,1,4,1,1)
  (same comment as for Calcium, ion)
- Potassium, ion [water, ground-]: 1.2422e-5 kg; lognormal variance with pedigree 6.298, pedigree (1,1,4,1,1)
  (same comment as for Calcium, ion)
- Tungsten [water, ground-, long-term]: 1.8432e-8 kg; lognormal variance with pedigree 0.098, pedigree (1,1,4,1,1)
  (same comment as for Calcium, ion)
- Chromium VI [water, ground-, long-term]: 4.7496e-6 kg; lognormal variance with pedigree 2.858, pedigree (1,1,4,1,1)
  (same comment as for Calcium, ion)
- Molybdenum [water, ground-]: 2.2688e-8 kg; lognormal variance with pedigree 3.268, pedigree (1,1,4,1,1)
  (same comment as for Calcium, ion)
- Silver, ion [water, ground-]: 2.4459e-9 kg; lognormal variance with pedigree 0.008, pedigree (1,1,4,1,1)
  (same comment as for Calcium, ion)
- Copper, ion [water, ground-, long-term]: 1.1197e-5 kg; lognormal variance with pedigree 2.378, pedigree (1,1,4,1,1)
  (same comment as for Calcium, ion)
- Chromium VI [water, ground-]: 8.755e-9 kg; lognormal variance with pedigree 2.928, pedigree (1,1,4,1,1)
  (same comment as for Calcium, ion)
- Titanium, ion [water, ground-]: 5.5224e-9 kg; lognormal variance with pedigree 22.048, pedigree (1,1,4,1,1)
  (same comment as for Calcium, ion)
- Thallium [water, ground-, long-term]: 1.2693e-8 kg; lognormal variance with pedigree 2.668, pedigree (1,1,4,1,1)
  (same comment as for Calcium, ion)
- Lead [water, ground-]: 1.4956e-9 kg; lognormal variance with pedigree 5.868, pedigree (1,1,4,1,1)
  (same comment as for Calcium, ion)
- Phosphate [water, ground-, long-term]: 1.2357e-8 kg; lognormal variance with pedigree 3.058, pedigree (1,1,4,1,1)
  (same comment as for Calcium, ion)
- Tungsten [water, ground-]: 2.6106e-10 kg; lognormal variance with pedigree 0.408, pedigree (1,1,4,1,1)
  (same comment as for Calcium, ion)
- Aluminium [water, ground-]: 6.7161e-7 kg; lognormal variance with pedigree 10.398, pedigree (1,1,4,1,1)
  (same comment as for Calcium, ion)
- Cadmium, ion [water, ground-]: 1.8568e-8 kg; lognormal variance with pedigree 3.368, pedigree (1,1,4,1,1)
  (same comment as for Calcium, ion)

## Sampling procedure
Disposal model based on observed leachate concentrations in literature. Extrapolated to 60'000 years heeding chemical characteristics. Initial tailings composition from various literature sources.

## Extrapolations
This dataset has been extrapolated from year 2009 to the year of the calculation (2019). The uncertainty has been adjusted accordingly.

## Review by Christian Bauer 2010-02-09
passed.
none
