# ferrochromium production, high carbon, 55% Cr

Dataset: EcoSpold 2, unit process
Geography: RoW
Time period: 2012-01-01 to 2019-12-31
Technology level: current
Classification: ISIC rev.4 ecoinvent: 2410:Manufacture of basic iron and steel
Synonyms: Charge Chrome
Scenario: Business-as-Usual
System model: Allocation at the point of substitution
Share of production covered: 94 %
Generated by: [System]
Published in: Charikinya E. 2017
Database: ecoinvent
isCopyrightProtected: true
accessRestrictedTo: 1

## General comment
This dataset is a copy of the South African dataset for Ferrochromium production. It is, for now, the best available representative of the GLO sector.
96% of total chrome ore production is used in metallurgical applications in 2014. High-carbon ferrochrome & charge chrome production represents 94% of global ferrochrome production in 2014. Around 3 quarters of ferrochrome production is used to produce stainless steel. Chrome ore, ferrochrome and stainless steel are highly correlated.

## Included activities start
Activities start includes the mining of the Chromium ore and its concentration and extraction operations

## Included activities end
Activities ends with Ferrochrome produced to be traded globally. The vast majority of FeCr produced is charge chrome from China, South Africa, followed by Kazakhstan and India.

## Geography
This dataset is a copy of the South African dataset for Ferrochromium, hich caron, 55% Cr production. It is, for now, the best available representative of the GLO sector.

## Technology
Ferrochrome or Charged chrome is a major product or Chrome’s product line. Charged chrome is an iron and chromium alloy (55% Cr, 7% C, 4% Si) produced in open, submerged and DC arc furnaces. Submerged furnace
Chromite ore consisting of iron oxides, chromium oxides, magnesium oxides and aluminium oxides mixed with carbon sources in batches for the endothermic reduction reactions (Visser, 2006).
The aluminium and magnesium oxides have high melting temperature therefore fluxes of limestone, dolomite and quartz are applied to condition the slag phase for ease of tapping (Visser, 2006). The CO produced in submerged furnaces is burnt with oxygen to heat furnace feed. From the furnace slag is tapped. After tapping it is de-slagged, granulated, cast into ingots or transferred into the next phase of processing (Visser, 2006).
Intermediate-carbon ferrochrome is processed from hot charge chrome slag. The product has a lower silicon and carbon content, less than 0.3% and 1.5% respectively. Figure below shows a diagram o the process. The hot slag charge chrome is transferred to a CLU converter where oxygen and on site generated steam (CO from closed furnace) blown in the bottom of the vessel. Burnt lime and dolomite are used to strip Si from the metal to from SiO2. As more CO is produced, the carbon content (C) content is decreases. When the slag suitable carbon grade the slag is tapped and thereafter granulated. The granulated product is the transported for export (Visser, 2006).

## Time period
Data were colleted over a perido of 5 years and 2015 was chosen as reference year.

## Parameters
- fraction, process water, to air: 0.15 dimensionless; name fraction_PW_to_air; lognormal variance with pedigree 0.21, pedigree (5,5,5,5,5)
  Literature value. In case when no industry/process specific data are available, default evaporation fraction value is used. This value is 15% and is based on literature (Statistics Canada, 2007 & Shaffer, K.H., 2008, Consumptive water use in the Great Lakes Basin, USGS & Shiklomanov, 2003, World Water Resources at the Beginning of the 21st Century) and has been approved by an expert.
- water used in primary activity: 0.00622587 m3; name totWaterPA; = water_surface+water_ground+(potable_water/1000)+water_abstracted_recycled; lognormal variance with pedigree 0.21, pedigree (5,5,5,5,5)
  this is represents the sum of all water inputs to the process

## Reference product
- ferrochromium, high carbon, 55% Cr: 1 kg; name RP; By-product classification allocatable product; CPC 41113: Ferro-chromium; CAS 11114-46-8; pedigree (1,1,1,1,1)
  Ferrochrome or Charge chrome production. Values of RP and by-products are based on Merafe-Glencore production values (Merafe Sustainability Report (2016)).
  production volume 6.881e9 kg; name APV_glo
    Global annual production volume for 2015 from the International Chromium Development Associations
  property iron content 0.3635; name RP_Fe_content
    iron content on a dry matter basis
  property price 1.22941 EUR2005; name RP_price_EUR2005
    Assuming that chromium content (and the price of chromium) is the determining factor in the price of ferrochromium, this value was calculated relative to the price for "ferrochromium, high-carbon, 68% Cr": (55/68) * 1.52 (EUR/kg; price for ferrochromium, high-carbon, 68% Cr)
  property carbon content 0.07
    carbon content on a dry matter basis (reserved; not for manual entry)
  properties: dry mass 1 kg, carbon content, non-fossil 0, water in wet mass 0 kg, wet mass 1 kg, manganese content 0.0017, water content 0, carbon content, fossil 0.07, silicon content 0.04, chromium content 0.55, carbon allocation 0.07 kg

## Inputs from technosphere
- tap water: 0 kg; name potable_water; pedigree (1,1,1,1,1)
  Potable water
  properties: wet mass 1 kg, dry mass 0.000337476 kg, water content 2962.17, carbon content, fossil 0.00178991
  note on carbon content, fossil: Bicarbonate content is 2.93 mol/m3. CO2 content is 0.1 mol/m3 (ecoinvent v2.2 report 8, Tab 93.1).
- silica sand: 0.436 kg; lognormal variance with pedigree 0.0034, pedigree (2,3,2,5,1)
  Value calculated from the Merafe Report on Wonderkop Smelter (6 May 2016) that report 0.436 tonne of flux (a mix of Dolimite, Limestone and Qaurtz) per 1 tonne of FeCr produced.
  properties: dry mass 0.99 kg, water content 0.010101, wet mass 1 kg
- non-sulfidic tailing, off-site: -0.595 kg; name ByP_03; lognormal variance with pedigree 0.0058, pedigree (2,3,3,5,2)
  This accounts specifically for Regulated ferrochrome slime and tailings and processing wastes.
  Previously all mineral waste was stored together was not treated before disposal in specially designed faciliities on site. This made it legally claissified as hazardous material. Of late sludge which has a high concentration of Cr (VI) is treated before disposal. Slag constitutes most of the mineral waste, it is reprocessed when possible. Otherwise all mineral waste is stockpiled. Overburden is used for backfilling.
  production volume 4.0942e9 kg; = APV_glo * ((Ref('5ac28a65-ebe7-494d-9286-1a4299be6dcf')*-1) / RP)
    Calculated from production volume of reference product using the relative outputs.
  property price 0 EUR2005; name ByP_03_price_EUR2005
  properties: wet mass 1 kg, water content 0.428571, dry mass 0.7 kg
- nickel smelter slag: -1.51 kg; name ByP_04; lognormal variance with pedigree 0.0058, pedigree (2,3,3,5,2)
  This accounts specifically for Regulated slag.
  Previously all mineral waste was stored together was not treated before disposal in specially designed faciliities on site. This made it legally claissified as hazardous material. Of late sludge which has a high concentration of Cr (VI) is treated before disposal. Slag constitutes most of the mineral waste, it is reprocessed when possible. Otherwise all mineral waste is stockpiled. Overburden is used for backfilling.
  production volume 1.03903e10 kg; = APV_glo * ((Ref('47c3df86-c6d7-4237-bf1a-91c3f11f08f2')*-1) / RP)
    Calculated from production volume of reference product using the relative outputs.
  property price 0 EUR2005; name ByP_04_price_EUR2005
  properties: dry mass 1 kg, carbon content, fossil 0.00345, wet mass 1 kg
- non-ferrous metal smelter: 7.54717e-12 unit; = 1/(50*2650000000); lognormal variance with pedigree 0.172, pedigree (4,4,5,5,5)
  Value estimated from the annual production volume produced by the infrastructure (2.650.000 ton metal /year) and lifetime of 50 years and scaled down to refer to 1 kg of Ferrochrome produce.
- electricity, medium voltage: 0 kWh; pedigree (1,1,1,1,1)
  Electricity usage. Data are based on the Merafe-Glencore (ferrochrome producer) sustainability reports and the XSTRATA available at: http://www.portsregulator.org/images/documents/XSTRATA_submission-Ferrochrome_Industry_Communique.pdf
- hard coal: 0 kg; pedigree (1,1,1,1,1)
  Carbon reductants (anthracite, coke and coal for smelting). Merafe resources, Wonderkop Smelter (2016).
  properties: water content 0.0638298, carbon content, fossil 0.845, wet mass 1 kg, dry mass 0.94 kg
  note on carbon content, fossil: C content 75-94% (specified in Tab 1.1, report 6, part VI). A mean content of 0.845 kg C/ kg dry hard coal was considered
- inert waste: 0 kg; name ByP_01; pedigree (1,1,1,1,1)
  This accounts specifically for Delisted metallurgical slag.
  Previously all mineral waste was stored together was not treated before disposal in specially designed faciliities on site. This made it legally claissified as hazardous material. Of late sludge which has a high concentration of Cr (VI) is treated before disposal. Slag constitutes most of the mineral waste, it is reprocessed when possible. Otherwise all mineral waste is stockpiled. Overburden is used for backfilling.
  production volume 0 kg
    Calculated from production volume of reference product using the relative outputs.
  property price 0 EUR2005; name ByP_01_price_EUR2005
  properties: dry mass 1 kg, wet mass 1 kg
- diesel, burned in building machine: 1.23 MJ; lognormal variance with pedigree 0.0029, pedigree (2,2,2,5,1)
  Diesel usage in the mine and ferrochrome plants and given as direct energy usage in the Merafe-Glencore Integrate report (2015).
- hazardous waste, for underground deposit: -0.00186 kg; name ByP_02; lognormal variance with pedigree 0.0058, pedigree (2,3,3,5,2)
  This accounts specifically for Quench ash.
  Previously all mineral waste was stored together was not treated before disposal in specially designed faciliities on site. This made it legally claissified as hazardous material. Of late sludge which has a high concentration of Cr (VI) is treated before disposal. Slag constitutes most of the mineral waste, it is reprocessed when possible. Otherwise all mineral waste is stockpiled. Overburden is used for backfilling.
  production volume 1.27987e7 kg; = APV_glo * ((Ref('108a566f-4a22-41dc-866e-0feb3d9653cb')*-1) / RP)
    Calculated from production volume of reference product using the relative outputs.
  property price 0 EUR2005; name ByP_02_price_EUR2005
  properties: carbon content, fossil 0.554667, wet mass 1 kg, dry mass 1 kg
  note on carbon content, fossil: Tab A.6, ecoinvent v2.2 report 13_I, average hazardous waste composition was used, and referred to 0% water mass. No waste-specific emission are currently inventoried for underground deposits. Accordingly, no waste composition must be specified. For generic, average waste to underground deposit deposition in a 200 liter steel drum without cement solidification is assumed (ecoinvent v2.2 report 13_I).
- tap water: 2.1089e-6, 0.000750995, 1.75197e-5, 3.4853e-6, 8.78856e-5, 2.28632e-6, 0.00100572 kg (7 entries); lognormal variance with pedigree 0.0058, pedigree (2,3,3,5,2)
  Potable water
- electricity, medium voltage: 0.00131127, 0.0314334, 0.000179507, 0.000575922, 0.00118155, 0.00010818, 0.00101036, 0.000649799, 0.00834599, 0.0250535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 kWh (36 entries); lognormal variance with pedigree 0.0058, pedigree (2,3,3,5,2)
  (same comment as for electricity, medium voltage)
- hard coal: 0.0261041, 0.0702451, 0.0431287, 0.299108, 0.0422633, 0.0100288, 0.0630097, 0.0329057, 0.0932071 kg (9 entries); lognormal variance with pedigree 0.0034, pedigree (2,3,2,5,1)
  (same comment as for hard coal)
- inert waste: -0.00110155, -0.127898 kg (2 entries); lognormal variance with pedigree 0.0058, pedigree (2,3,3,5,2)
  (same comment as for inert waste)
  production volume 8.87649e8 kg

## Inputs from nature
- Gangue, in ground [natural resource, in ground]: 1.38454 kg; lognormal variance with pedigree 0.0034, pedigree (2,3,2,5,1)
  Run of Mine, excluding chormium and iron that are inputted separately.
- Water, river [natural resource, in water]: 0.000544 m3; name water_surface; lognormal variance with pedigree 0.0058, pedigree (2,3,3,5,2)
  Surface water
- Chromium, in ground [natural resource, in ground]: 0.690011 kg; name Cr_in_ground; lognormal variance with pedigree 0.0058, pedigree (2,3,3,5,2)
  Chromium content in the Run of Mine
- Water, unspecified natural origin [natural resource, in water]: 0.00496 m3; name water_abstracted_recycled; lognormal variance with pedigree 0.0058, pedigree (2,3,3,5,2)
  Water either abstracted or recycled
- Water, well, in ground [natural resource, in water]: 0.00072 m3; name water_ground; lognormal variance with pedigree 0.0058, pedigree (2,3,3,5,2)
  ground water
- Iron, in ground [natural resource, in ground]: 0.463778 kg; lognormal variance with pedigree 0.0034, pedigree (2,3,2,5,1)
  Iron content in the Run of mine

## Emissions to nature
- Chromium VI [air, non-urban air or from high stacks]: 7.92e-5 kg; lognormal variance with pedigree 0.2046, pedigree (3,3,5,5,5)
  Value form the ferrochromiun production, high carbon, 68% Cr dataset
- Particulates, > 10 um [air, non-urban air or from high stacks]: 8.24e-5 kg; lognormal variance with pedigree 0.0058, pedigree (2,3,3,5,2)
  Particulates emission were given as Tot particulate. Calculated shares for the three groups:> 2,5 & <10, <2,5 and > 10 according to the emission from the Ferrochormium production, high carbon, 68% Cr on a mass basis.
- Carbon dioxide, fossil [air, non-urban air or from high stacks]: 1.91 kg; lognormal variance with pedigree 0.0058, pedigree (2,3,3,5,2)
  CO2 emission, Scope 1 from carbon reductans only. Merafe Integrate Report (2015). The figure given by the company report was of 2 kg CO2: from that the CO2 emission related to the diesel input, burned in building machine has been deducted.
- Dioxins, measured as 2,3,7,8-tetrachlorodibenzo-p-dioxin [air, non-urban air or from high stacks]: 1e-12 kg; lognormal variance with pedigree 0.4646, pedigree (3,3,5,5,5)
  Value form the ferrochromiun production, high carbon, 68% Cr dataset
- Cyanide [air, non-urban air or from high stacks]: 3.5e-5 kg; lognormal variance with pedigree 0.1946, pedigree (3,3,5,5,5)
  Value form the ferrochromiun production, high carbon, 68% Cr dataset
- Carbon monoxide, fossil [air, non-urban air or from high stacks]: 0.001 kg; lognormal variance with pedigree 0.8146, pedigree (3,3,5,5,5)
  Value form the ferrochromiun production, high carbon, 68% Cr dataset
- NMVOC, non-methane volatile organic compounds, unspecified origin [air, non-urban air or from high stacks]: 0.0017 kg; lognormal variance with pedigree 0.2046, pedigree (3,3,5,5,5)
  Value form the ferrochromiun production, high carbon, 68% Cr dataset
- Water [air, non-urban air or from high stacks]: 0.00093388 m3; = totWaterPA*fraction_PW_to_air; lognormal variance with pedigree 0.0058, pedigree (2,3,3,5,2)
  Water released to air
- Sulfur dioxide [air, non-urban air or from high stacks]: 0.00214 kg; lognormal variance with pedigree 0.0058, pedigree (2,3,3,5,2)
  SOx emission
- PAH, polycyclic aromatic hydrocarbons [water, surface water]: 6.5e-8 kg; lognormal variance with pedigree 13.6246, pedigree (3,3,5,5,5)
  Value form the ferrochromiun production, high carbon, 68% Cr dataset
- Particulates, < 2.5 um [air, non-urban air or from high stacks]: 0.000577 kg; lognormal variance with pedigree 0.0058, pedigree (2,3,3,5,2)
  (same comment as for Particulates, > 10 um)
- Dissolved solids [water, surface water]: 0.000375 kg; lognormal variance with pedigree 13.1046, pedigree (3,3,5,5,5)
  Value form the ferrochromiun production, high carbon, 68% Cr dataset
- Water [water, surface water]: 0.00529199 m3; = totWaterPA*(1-fraction_PW_to_air); lognormal variance with pedigree 0.0058, pedigree (2,3,3,5,2)
  Water relised to environment: surface water bodies
- Nitrogen oxides [air, non-urban air or from high stacks]: 0.000304 kg; lognormal variance with pedigree 0.0058, pedigree (2,3,3,5,2)
  NOx emissions
- Chromium, ion [water, surface water]: 7.71e-9 kg; lognormal variance with pedigree 13.1046, pedigree (3,3,5,5,5)
  Value form the ferrochromiun production, high carbon, 68% Cr dataset
- Chromium [air, non-urban air or from high stacks]: 0.00317 kg; lognormal variance with pedigree 0.2646, pedigree (3,3,5,5,5)
  Value form the ferrochromiun production, high carbon, 68% Cr dataset
- Particulates, > 2.5 um, and < 10um [air, non-urban air or from high stacks]: 0.000256 kg; lognormal variance with pedigree 0.0058, pedigree (2,3,3,5,2)
  (same comment as for Particulates, > 10 um)

## Sampling procedure
This dataset is a copy of the South African dataset for Ferrochromium production. It is, for now, the best available representative of the GLO sector. Data on production have been taken from International Chromium Development Association. Data for ZA is based on the Merafe-Glencore (ferrochrome producer) sustainability reports and the following other sources: Creamer, M., 2016. Ferrochrome price in sharp rise, s.l.: Mining Weekly.
Pistorius, P., 2002. Reductant selection in ferro-alloy production: The case for the importance of dissolution in the metal. The Journal of the South African Institue of Mining and Metallurgy , 102(1), pp. 33-36.
Visser, M., 2006. An overview of the history and current operational facilities of Samancor Chrome. Southern African Pyrometallurgy , pp. 285-296.
Xstrata, 2006. [Online] Available at: http://www.portsregulator.org/images/documents/XSTRATA_submission-Position_Paper_on_Beneficiation.pdf

## Extrapolations
The estimates for the global production of Ferrochrome, high carbon content (or Charge Chrome) were 10.594 Mtonnes in 2015 (International Chromium Development Association, www.icdacr.com).

## Review by Louis Brimacombe 2017-12-01
Happy with the data set with one caviat: The data provider was advised to remove the CO2 figure to avoid double counting. This is OK if heat (MJ) and electicity ( Kwh) are inputs to the unit boundary. But I am surprised that there are no other site CO2 emisions say from diesel vehicles on site, even though these may be small.
