# treatment of waste newspaper, municipal incineration

Dataset: EcoSpold 2, unit process
Geography: RoW
Time period: 2006-01-01 to 2019-12-31
Technology level: current
Classification: ISIC rev.4 ecoinvent: 3821:Treatment and disposal of non-hazardous waste
Synonyms: Kehrichtverbrennung; Siedlungsabfallverbrennung; municipal waste incineration
Scenario: Business-as-Usual
System model: Allocation at the point of substitution
Share of production covered: 1.8 %
Generated by: Gabor Doka
Published in: Doka G. 2013
Database: ecoinvent
isCopyrightProtected: true
accessRestrictedTo: 1

## General comment
This dataset represents the activity of waste disposal of waste newspaper in a municipal solid waste incinerator (MSWI) // Recommended use of this dataset: For newspaper, which goes to disposal as part of communal waste mixture. Larger amounts of separated newspaper will likely not be disposed in incinerators or landfills, but rather go to recycling. // // Waste composition (wet, in ppm): upper heating value 15.19 MJ/kg; lower heating value 14.11 MJ/kg; H2O 109440; O 386620; H 53858; C 408310; S 1631.1; N 678.41; P 12.167; B n.a.; Cl 1343.3; Br n.a.; F n.a.; I n.a.; Ag 0.47733; As n.a.; Ba 13.571; Cd 0.13891; Co 0.91253; Cr 10.31; Cu 29.989; Hg 0.081846; Mn 46.797; Mo n.a.; Ni 2.319; Pb 90.284; Sb n.a.; Se n.a.; Sn n.a.; V n.a.; Zn 55.563; Be n.a.; Sc n.a.; Sr n.a.; Ti n.a.; Tl n.a.; W n.a.; Si 20871; Fe 139.03; Ca n.a.; Al 12167; K 4679.7; Mg n.a.; Na n.a.; // Share of carbon in waste that is biogenic 100%. // Share of metals in waste not oxidised and bulk-recyclable (exclude very small or thin parts) Iron: 0%; Alu: 0%; Copper: 0%. // One kg of this waste produces 0.08324 kg of slag and 0.0157 kg of residues, which are landfilled. Additional solidification with 0.006278 kg of cement. // Net energy production: 1.74MJ/kg electric energy and 3.5MJ/kg thermal energy. // Recovery of metal scrap to recycling: 0g iron scrap, 0g aluminium scrap, 0g copper scrap.

## Included activities start
waste incineration from waste reception gate and delivery into waste bunker at incinerator plant site (without transports to the incinerator)

## Included activities end
Waste-specific short-term emissions to water from leachate. Long-term emissions from landfill to ground water.

## Geography
Specific to the technology mix encountered in Switzerland in 2010. Well applicable to modern incineration practices in Europe, North America or Japan.

## Technology
average Swiss MSWI plants in 2010 (grate incinerators) with electrostatic precipitator for fly ash (ESP), wet flue gas scrubber and 25% SNCR , 42.77% SCR-high dust , 32.68% SCR-low dust -DeNOx facilities and 0% without Denox (weighted according to mass of burnt waste, representing Swiss average). Efficiency of iron scrap separation from slag : 58%. Efficiency of non-ferrous scrap separation from slag : 31%. Gross electric efficiency technology mix 15.84% and Gross thermal efficiency technology mix 28.51%

## Time period
Waste composition as given in literature reference, theoretical data or other source. Transfer coefficients for modern MSWI.

## Reference product
- heat, for reuse in municipal waste incineration only: 1 MJ; name E_th_prod_MSWI; CPC 17300: Steam and hot water; By-product classification allocatable product; pedigree (1,1,1,1,1)
  Net electricity generated from this waste and used in internal MSWI plant energy redistribution.
  Uncertainty: uncertainty is calculated from uncertainties in waste composition and uncertainties in energy efficiency and the uncertainty in internal energy demand
  production volume 3.2111e10 MJ
    calculated in proportion to reference product waste input to incinerator
  property exergy 0.1842 MJ; name E_th_prod_MSWI_exergy
    This exergy property is based on the exergy content of the product.
  property true value relation 0.1842; name E_th_prod_MSWI_true_value_relation
    property to calculate "true value" from
  property price 0.0106 EUR2005; name E_th_prod_MSWI_price_EUR2005
    Average European district heat price from Ecoheatcool and Euroheat 2005-2006, Ecoheat Work package 1: The European heat market. Final report. 10.6 EUR/GJ i s the price of district heat. http://www.solarthermalworld.org/files/Ecoheatcool%20WP1%20Web.pdf?download
  property true value 0.0230618; name E_th_prod_MSWI_true_value
    allocation property applied in "true value" allocation // value calculated from true value relation
- electricity, for reuse in municipal waste incineration only: 0 kWh; name E_el_prod_MSWI; CPC 17100: Electrical energy; By-product classification allocatable product; pedigree (1,1,1,1,1)
  (same comment as for heat, for reuse in municipal waste incineration only)
  production volume 4.4407e9 kWh
    calculated in proportion to reference product waste input to incinerator
  property exergy 3.6 MJ; name E_el_prod_MSWI_exergy
    This exergy property is based on the exergy content of the product.
  property price 0.1 EUR2005; name E_el_prod_MSWI_price_EUR2005
    Estimated to be the same price as in case of electricity, medium voltage.
  property true value relation 3.6; name E_el_prod_MSWI_true_value_relation
    property to calculate "true value" from
  property true value 0.0623295; name E_el_prod_MSWI_true_value
    (same comment as for heat, for reuse in municipal waste incineration only)
- waste newspaper: 0 kg; CPC 39240: Waste and scrap of paper or paperboard; By-product classification Recyclable
  Main reference product of this activity (supply of disposal service).
  production volume 9.1866e9 kg
    based on estimate on MSW in WTE globally and share of sum paper+cardboard in MSW in top WTE countries (UNSD 2011) and share of printed paper in sum paper+cardboard in Swiss MSW
  property price 0.1 EUR2005
    For paper and board waste the price, in 2005, according to [http://ec.europa.eu/eurostat] is about 1 EUR/kg corresponding to a purchase price of 0.099 similar to the price of UN comodittie: Waste, scrap of paper, board, nes (including unsorted).
  property carbon content 0.458427
    carbon content on a dry matter basis (reserved; not for manual entry)
  property true value -0.1
    allocation property applied in "true value" allocation // value calculated from revenue
  properties: wet mass 1 kg, water content 0.172333, carbon content, fossil 0, dry mass 0.853 kg, water in wet mass 0.147 kg, carbon content, non-fossil 0.458427, carbon allocation 0.391038 kg

## Inputs from technosphere
- hydrochloric acid, without water, in 30% solution state: 0 kg; pedigree (1,1,1,1,1)
  Auxilliary inputs for the wastewater treatment stage of the incinerator plant.
  Uncertainty: uncertainty calculated from uncertainty in average HCl input, of transfer coefficients in the incinerator, and the uncertainty of the waste composition of this waste
  properties: dry mass 1 kg, wet mass 1 kg
- cement, unspecified: 0 kg; pedigree (1,1,1,1,1)
  Cement required for solidification of landfilled residual material.
  Uncertainty: Uncertainty calculated from uncertainty of the waste composition of this waste, of transfer coefficients in the incinerator and of the solidification recipe.
  properties: dry mass 1 kg, wet mass 1 kg
- process-specific burdens, slag landfill: 0 kg; pedigree (1,1,1,1,1)
  Mass-specific expenditures required for landfilling of bottom ash.
  Uncertainty: uncertainty is calculated from uncertainties in waste composition and transfer coefficients in incinerator
- chemical, inorganic: 5.44339e-6 kg; lognormal variance with pedigree 0.20508, pedigree (1,1,3,1,1)
  Auxilliary inputs for the wastewater treatment stage of the incinerator plant. Proxy for Polyelectrolyte.
  Uncertainty: uncertainty calculated from uncertainty in average Polyelectrolyte input, of transfer coefficients in the incinerator, and the uncertainty of the waste composition of this waste
  properties: carbon content, fossil 0.003, wet mass 1 kg, dry mass 1 kg
- transport, freight, lorry, unspecified: 0 metric ton*km; pedigree (1,1,1,1,1)
  Transport services to transport incineration residues to landfills.
  Uncertainty: uncertainty calculated from uncertainty of the waste composition of this waste, uncertainty of transfer coefficients and the uncertainty in generic transportation distances
- titanium dioxide: 0 kg; pedigree (1,1,1,1,1)
  Input to DeNOx stage (TiO2 catalyst carrier)
  Uncertainty: uncertainty calculated from uncertainty in average DeNOx input, uncertainty in the share of thermal NOx, uncertainty of nitrogen content in average municipal waste and the uncertainty in nitrogen content in *this* waste.
  properties: dry mass 1 kg, wet mass 1 kg
- chemical, organic: 1.07496e-7 kg; lognormal variance with pedigree 1.881, pedigree (1,1,3,1,1)
  Auxilliary inputs for the wastewater treatment stage of the incinerator plant. Proxy for (pure) Trisodium-trimercapto-s-triazine (CAS 17766-26-6), used as 15% diluted solution, aka TMT15.
  Uncertainty: uncertainty calculated from uncertainty in average TMT15 input, of transfer coefficients in the incinerator, and the uncertainty of the waste composition of this waste
  properties: dry mass 1 kg, carbon content, fossil 0.628, wet mass 1 kg
- process-specific burdens, residual material landfill: 0 kg; pedigree (1,1,1,1,1)
  Mass-specific expenditures required for landfilling of incineration residues.
  Uncertainty: uncertainty is calculated from uncertainties in waste composition and transfer coefficients in incinerator
- heat, district or industrial, natural gas: 0 MJ; pedigree (1,1,1,1,1)
  Input to DeNOx stage, to heat up flue gas in low-dust SCR.
  Uncertainty: uncertainty calculated from uncertainty in average DeNOx input, uncertainty in the share of thermal NOx, uncertainty of nitrogen content in average municipal waste and the uncertainty in nitrogen content in *this* waste.
- waste cement, hydrated: 0 kg; pedigree (1,1,1,1,1)
  Hydrated cement output for solidification of landfilled residual material.
  Uncertainty: Uncertainty calculated from uncertainty of the waste composition of this waste and transfer coefficients in the incinerator and of the solidification recipe.
  production volume 0 kg
    calculated in proportion to reference product waste input to incinerator
  properties: dry mass 1 kg, wet mass 1 kg
- quicklime, milled, packed: 0 kg; pedigree (1,1,1,1,1)
  Auxilliary inputs for the flue gas treatment stage of the incinerator plant.
  Uncertainty: uncertainty calculated from uncertainty in average CaO input, of transfer coefficients in the incinerator, and the uncertainty of the waste composition of this waste
  properties: water content 0.010101, wet mass 1 kg, dry mass 0.99 kg
- municipal waste incineration facility: 1.93157e-11 unit
  Demands per kilogram waste.
- water, decarbonised: 0 kg; pedigree (1,1,1,1,1)
  Incinerator process water used in flue gas scrubber stage.
  Uncertainty: uncertainty calculated from uncertainty in average water input, and the uncertainty of the waste composition of this waste
  properties: wet mass 1 kg
- chromium oxide, flakes: 4.48865e-8 kg; lognormal variance with pedigree 0.59589, pedigree (1,1,3,1,1)
  Input to DeNOx stage.
  Uncertainty: uncertainty calculated from uncertainty in average DeNOx input, uncertainty in the share of thermal NOx, uncertainty of nitrogen content in average municipal waste and the uncertainty in nitrogen content in *this* waste.
  properties: wet mass 1 kg, dry mass 1 kg
- slag landfill: 1.13213e-11 unit; lognormal variance with pedigree 0.036886, pedigree (1,1,3,1,1)
  Landfill infrastructure required for landfilling of bottom ash.
  Uncertainty: uncertainty is calculated from uncertainties in waste composition and transfer coefficients in incinerator
- ammonia, liquid: 0 kg; pedigree (1,1,1,1,1)
  Input to DeNOx stage (100% NH3).
  Uncertainty: uncertainty calculated from uncertainty in average DeNOx input, uncertainty in the share of thermal NOx, uncertainty of nitrogen content in average municipal waste and the uncertainty in nitrogen content in *this* waste.
  properties: dry mass 1 kg, wet mass 1 kg
- sodium hydroxide, without water, in 50% solution state: 5.41325e-5 kg; lognormal variance with pedigree 0.26247, pedigree (1,1,3,1,1)
  Auxilliary inputs for the flue gas treatment stage of the incinerator plant.
  Uncertainty: uncertainty calculated from uncertainty in average NaOH input, of transfer coefficients in the incinerator, and the uncertainty of the waste composition of this waste
  properties: wet mass 1 kg, dry mass 1 kg
- residual material landfill: 2.52641e-12 unit; lognormal variance with pedigree 0.031239, pedigree (1,1,3,1,1)
  Landfill infrastructure required for landfilling of incineration residues.
  Uncertainty: uncertainty is calculated from uncertainties in waste composition and transfer coefficients in incinerator
- iron (III) chloride, without water, in 40% solution state: 3.65908e-7 kg; lognormal variance with pedigree 0.37441, pedigree (1,1,3,1,1)
  Auxilliary inputs for the wastewater treatment stage of the incinerator plant.
  Uncertainty: uncertainty calculated from uncertainty in average FeCl3 input, of transfer coefficients in the incinerator, and the uncertainty of the waste composition of this waste
  properties: dry mass 1 kg, wet mass 1 kg
- hydrochloric acid, without water, in 30% solution state: 2.61579e-7, 1.16917e-6 kg (2 entries); lognormal variance with pedigree 0.20508, pedigree (1,1,3,1,1)
  (same comment as for hydrochloric acid, without water, in 30% solution state)
- cement, unspecified: 1.45375e-5, 1.06477e-6, 1.20508e-6, 3.03494e-6, 6.98681e-5, 6.86363e-5, 2.02017e-6, 2.21874e-5, 2.68443e-6, 0.000299832 kg (10 entries); lognormal variance with pedigree 0.040323, pedigree (1,1,3,1,1)
  (same comment as for cement, unspecified)
- process-specific burdens, slag landfill: 5.36006e-5, 0.00178624, 0.00452838 kg (3 entries); lognormal variance with pedigree 0.036886, pedigree (1,1,3,1,1)
  (same comment as for process-specific burdens, slag landfill)
- transport, freight, lorry, unspecified: 8.33242e-5, 1.49138e-5, 0.000204995 metric ton*km (3 entries); lognormal variance with pedigree 0.027502, pedigree (1,1,3,1,1)
  (same comment as for transport, freight, lorry, unspecified)
- titanium dioxide: 2.94784e-7, 1.90465e-6 kg (2 entries); lognormal variance with pedigree 0.59589, pedigree (1,1,3,1,1)
  (same comment as for titanium dioxide)
- process-specific burdens, residual material landfill: 1.02066e-5, 0.000340137, 0.000862294 kg (3 entries); lognormal variance with pedigree 0.031239, pedigree (1,1,3,1,1)
  (same comment as for process-specific burdens, residual material landfill)
- heat, district or industrial, natural gas: 8.17123e-5, 0.00186338, 0.00461961 MJ (3 entries); lognormal variance with pedigree 0.29221, pedigree (1,1,3,1,1)
  (same comment as for heat, district or industrial, natural gas)
- waste cement, hydrated: -1.02066e-5, -0.000340137, -0.000862294 kg (3 entries); lognormal variance with pedigree 0.040323, pedigree (1,1,3,1,1)
  (same comment as for waste cement, hydrated)
  production volume 1.4419e8 kg
- quicklime, milled, packed: 4.6572e-7, 5.48659e-5 kg (2 entries); lognormal variance with pedigree 0.6196, pedigree (1,1,3,1,1)
  (same comment as for quicklime, milled, packed)
- water, decarbonised: 0.000581866, 0.00151401, 9.4683e-7, 0.00610636, 0.00149114, 0.000300607, 0.000988453, 5.45685e-5, 0.000777589, 0.00181133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 kg (13 entries); lognormal variance with pedigree 0.37441, pedigree (1,1,3,1,1)
  (same comment as for water, decarbonised)
- ammonia, liquid: 3.59862e-6, 3.15072e-5 kg (2 entries); lognormal variance with pedigree 0.29221, pedigree (1,1,3,1,1)
  (same comment as for ammonia, liquid)

## Inputs from nature
- Oxygen [natural resource, in air]: 0.120321 kg; lognormal variance with pedigree 0.029039, pedigree (1,1,3,1,1)
  Oxygen from ambient air needed to combust and oxidise this waste. Net demand, i.e. without O2 leaving the plant in flue gas uncombusted.
  Uncertainty: uncertainty is calculated from uncertainties in waste composition and transfer coefficients to flue gas and soild residues in incinerator

## Emissions to nature
- TOC, Total Organic Carbon [water, surface water]: 1.61154e-5 kg; lognormal variance with pedigree 0.046687, pedigree (1,1,3,1,1)
  Emissions to water from waste composition and transfer coefficients in incinerator and landfills.
  Uncertainty: uncertainty is calculated from uncertainties in waste composition and transfer coefficients in incinerator and landfills
- Heat, waste [water, surface water]: 0.213237 MJ; lognormal variance with pedigree 0.05375, pedigree (1,1,3,1,1)
  Waste heat generated from heating value of this waste plus any electricity required to process it.
  Uncertainty: uncertainty is calculated from uncertainties in waste composition and uncertainties in energy efficiency and the uncertainty in internal energy demand
- Carbon dioxide, non-fossil [air, urban air close to ground]: 0.114967 kg; lognormal variance with pedigree 0.024566, pedigree (1,1,3,1,1)
  Emission to air from waste composition and transfer coefficients.
  Uncertainty: uncertainty is calculated from uncertainties in waste composition and transfer coefficients in incinerator
- Nickel, ion [water, surface water]: 1.20391e-10 kg; lognormal variance with pedigree 2.0054, pedigree (1,1,3,1,1)
  (same comment as for TOC, Total Organic Carbon)
- Zinc, ion [water, ground-, long-term]: 1.30551e-6 kg; lognormal variance with pedigree 3.1594, pedigree (1,1,3,1,1)
  Long-term emissions from landfilling of incineration residues.
  Uncertainty: uncertainty is calculated from uncertainties in waste composition and transfer coefficients in incinerator and landfills.
- Nitrate [water, ground-, long-term]: 1.88521e-6 kg; lognormal variance with pedigree 0.71553, pedigree (1,1,3,1,1)
  (same comment as for Zinc, ion)
- Silicon [water, ground-, long-term]: 0.00016287 kg; lognormal variance with pedigree 4.9315, pedigree (1,1,3,1,1)
  (same comment as for Zinc, ion)
- Copper, ion [water, ground-, long-term]: 2.06964e-6 kg; lognormal variance with pedigree 1.1048, pedigree (1,1,3,1,1)
  (same comment as for Zinc, ion)
- Chromium [air, urban air close to ground]: 6.95596e-10 kg; lognormal variance with pedigree 1.2894, pedigree (1,1,3,1,1)
  (same comment as for Carbon dioxide, non-fossil)
- Mercury [water, ground-, long-term]: 4.02755e-10 kg; lognormal variance with pedigree 3.4277, pedigree (1,1,3,1,1)
  (same comment as for Zinc, ion)
- Nitrate [water, surface water]: 6.68168e-7 kg; lognormal variance with pedigree 0.4975, pedigree (1,1,3,1,1)
  (same comment as for TOC, Total Organic Carbon)
- Copper, ion [water, surface water]: 3.00243e-10 kg; lognormal variance with pedigree 1.005, pedigree (1,1,3,1,1)
  (same comment as for TOC, Total Organic Carbon)
- COD, Chemical Oxygen Demand [water, ground-, long-term]: 0.000236903 kg; lognormal variance with pedigree 0.02614, pedigree (1,1,3,1,1)
  (same comment as for Zinc, ion)
- Nitrogen oxides [air, urban air close to ground]: 1.30705e-5 kg; lognormal variance with pedigree 0.33488, pedigree (1,1,3,1,1)
  Sum of fuel-Nox and thermal-NOx emitted to air after DeNOx stage.
  Uncertainty: uncertainty calculated from uncertainty in average N-emissions and uncertainty in the share of thermal NOx and the uncertainty in nitrogen content in *this* waste.
- Dioxins, measured as 2,3,7,8-tetrachlorodibenzo-p-dioxin [air, urban air close to ground]: 5.08311e-15 kg; lognormal variance with pedigree 0.42631, pedigree (1,1,3,1,1)
  Incomplete combustion product emitted to air.
  Uncertainty: uncertainty calculated from uncertainty in average operation emissions, and the uncertainty of the flue gas volume from this waste.
- TOC, Total Organic Carbon [water, ground-, long-term]: 9.37428e-5 kg; lognormal variance with pedigree 0.02614, pedigree (1,1,3,1,1)
  (same comment as for Zinc, ion)
- Benzene [air, urban air close to ground]: 2.54171e-9 kg; lognormal variance with pedigree 0.094914, pedigree (1,1,3,1,1)
  (same comment as for Dioxins, measured as 2,3,7,8-tetrachlorodibenzo-p-dioxin)
- Sulfate [water, ground-, long-term]: 0.000312126 kg; lognormal variance with pedigree 0.3368, pedigree (1,1,3,1,1)
  (same comment as for Zinc, ion)
- Iron [air, urban air close to ground]: 1.92515e-11 kg; lognormal variance with pedigree 0.98855, pedigree (1,1,3,1,1)
  (same comment as for Carbon dioxide, non-fossil)
- DOC, Dissolved Organic Carbon [water, surface water]: 1.61154e-5 kg; lognormal variance with pedigree 0.046687, pedigree (1,1,3,1,1)
  (same comment as for TOC, Total Organic Carbon)
- COD, Chemical Oxygen Demand [water, surface water]: 3.6903e-5 kg; lognormal variance with pedigree 0.046533, pedigree (1,1,3,1,1)
  (same comment as for TOC, Total Organic Carbon)
- Lead [air, urban air close to ground]: 5.7468e-10 kg; lognormal variance with pedigree 1.0106, pedigree (1,1,3,1,1)
  (same comment as for Carbon dioxide, non-fossil)
- Barium [water, surface water]: 1.41128e-10 kg; lognormal variance with pedigree 1.4874, pedigree (1,1,3,1,1)
  (same comment as for TOC, Total Organic Carbon)
- Sulfur dioxide [air, urban air close to ground]: 1.3402e-6 kg; lognormal variance with pedigree 0.608, pedigree (1,1,3,1,1)
  (same comment as for Carbon dioxide, non-fossil)
- Benzene, hexachloro- [air, urban air close to ground]: 5.31459e-12 kg; lognormal variance with pedigree 0.094914, pedigree (1,1,3,1,1)
  (same comment as for Dioxins, measured as 2,3,7,8-tetrachlorodibenzo-p-dioxin)
- Iron, ion [water, surface water]: 2.82395e-10 kg; lognormal variance with pedigree 1.1327, pedigree (1,1,3,1,1)
  (same comment as for TOC, Total Organic Carbon)
- Aluminium [water, surface water]: 1.01732e-7 kg; lognormal variance with pedigree 0.76958, pedigree (1,1,3,1,1)
  (same comment as for TOC, Total Organic Carbon)
- Water [water, surface water]: 3.64494e-5 m3; lognormal variance with pedigree 1.589, pedigree (1,1,3,1,1)
  Process water released to surface water.
  Uncertainty: uncertainty calculated from uncertainty in process water input and the uncertainty of fraction to surface water.
- Barium [air, urban air close to ground]: 4.11555e-9 kg; lognormal variance with pedigree 1.2455, pedigree (1,1,3,1,1)
  (same comment as for Carbon dioxide, non-fossil)
- Silver, ion [water, ground-, long-term]: 2.39846e-8 kg; lognormal variance with pedigree 1.6277, pedigree (1,1,3,1,1)
  (same comment as for Zinc, ion)
- Dinitrogen monoxide [air, urban air close to ground]: 7.81744e-7 kg; lognormal variance with pedigree 1.4844, pedigree (1,1,3,1,1)
  Nitrogen species emitted to air after DeNOx stage.
  Uncertainty: uncertainty calculated from uncertainty in average N-emissions and uncertainty in the share of thermal NOx and the uncertainty in nitrogen content in *this* waste.
- Mercury [air, urban air close to ground]: 1.79296e-10 kg; lognormal variance with pedigree 1.9307, pedigree (1,1,3,1,1)
  (same comment as for Carbon dioxide, non-fossil)
- Particulates, > 2.5 um, and < 10um [air, urban air close to ground]: 1.52493e-9 kg; lognormal variance with pedigree 0.20329, pedigree (1,1,3,1,1)
  (same comment as for Dioxins, measured as 2,3,7,8-tetrachlorodibenzo-p-dioxin)
- Cobalt [water, surface water]: 1.27738e-11 kg; lognormal variance with pedigree 1.8583, pedigree (1,1,3,1,1)
  (same comment as for TOC, Total Organic Carbon)
- Cobalt [air, urban air close to ground]: 1.28225e-10 kg; lognormal variance with pedigree 1.6, pedigree (1,1,3,1,1)
  (same comment as for Carbon dioxide, non-fossil)
- Lead [water, ground-, long-term]: 3.37259e-6 kg; lognormal variance with pedigree 4.1211, pedigree (1,1,3,1,1)
  (same comment as for Zinc, ion)
- Nickel [air, urban air close to ground]: 2.25082e-10 kg; lognormal variance with pedigree 1.478, pedigree (1,1,3,1,1)
  (same comment as for Carbon dioxide, non-fossil)
- Benzo(a)pyrene [air, urban air close to ground]: 5.65609e-14 kg; lognormal variance with pedigree 0.42631, pedigree (1,1,3,1,1)
  (same comment as for Dioxins, measured as 2,3,7,8-tetrachlorodibenzo-p-dioxin)
- Silver, ion [water, surface water]: 1.36863e-10 kg; lognormal variance with pedigree 1.6477, pedigree (1,1,3,1,1)
  (same comment as for TOC, Total Organic Carbon)
- Copper [air, urban air close to ground]: 2.12217e-10 kg; lognormal variance with pedigree 1.1576, pedigree (1,1,3,1,1)
  (same comment as for Carbon dioxide, non-fossil)
- Cadmium, ion [water, surface water]: 1.02868e-12 kg; lognormal variance with pedigree 1.5156, pedigree (1,1,3,1,1)
  (same comment as for TOC, Total Organic Carbon)
- Aluminium [air, urban air close to ground]: 7.66446e-10 kg; lognormal variance with pedigree 0.42074, pedigree (1,1,3,1,1)
  (same comment as for Carbon dioxide, non-fossil)
- Cyanide [air, urban air close to ground]: 1.67954e-7 kg; lognormal variance with pedigree 1.4844, pedigree (1,1,3,1,1)
  (same comment as for Dinitrogen monoxide)
- Potassium [air, urban air close to ground]: 1.78631e-6 kg; lognormal variance with pedigree 0.47553, pedigree (1,1,3,1,1)
  (same comment as for Carbon dioxide, non-fossil)
- Zinc, ion [water, surface water]: 3.87318e-10 kg; lognormal variance with pedigree 0.8544, pedigree (1,1,3,1,1)
  (same comment as for TOC, Total Organic Carbon)
- Barium [water, ground-, long-term]: 5.28059e-7 kg; lognormal variance with pedigree 2.4892, pedigree (1,1,3,1,1)
  (same comment as for Zinc, ion)
- Chloride [water, surface water]: 7.9681e-5 kg; lognormal variance with pedigree 0.50659, pedigree (1,1,3,1,1)
  (same comment as for TOC, Total Organic Carbon)
- BOD5, Biological Oxygen Demand [water, ground-, long-term]: 7.74945e-5 kg; lognormal variance with pedigree 0.02614, pedigree (1,1,3,1,1)
  (same comment as for Zinc, ion)
- Mercury [water, surface water]: 6.86765e-12 kg; lognormal variance with pedigree 1.4017, pedigree (1,1,3,1,1)
  (same comment as for TOC, Total Organic Carbon)
- Sulfate [water, surface water]: 6.39318e-5 kg; lognormal variance with pedigree 0.27782, pedigree (1,1,3,1,1)
  (same comment as for TOC, Total Organic Carbon)
- Cadmium [air, urban air close to ground]: 5.47043e-12 kg; lognormal variance with pedigree 1.8473, pedigree (1,1,3,1,1)
  (same comment as for Carbon dioxide, non-fossil)
- Lead [water, surface water]: 6.67256e-10 kg; lognormal variance with pedigree 0.8201, pedigree (1,1,3,1,1)
  (same comment as for TOC, Total Organic Carbon)
- Chromium, ion [water, surface water]: 6.18534e-11 kg; lognormal variance with pedigree 1.3016, pedigree (1,1,3,1,1)
  (same comment as for TOC, Total Organic Carbon)
- Potassium, ion [water, surface water]: 7.87075e-5 kg; lognormal variance with pedigree 0.27334, pedigree (1,1,3,1,1)
  (same comment as for TOC, Total Organic Carbon)
- Silicon [water, surface water]: 3.95369e-7 kg; lognormal variance with pedigree 0.58667, pedigree (1,1,3,1,1)
  (same comment as for TOC, Total Organic Carbon)
- NMVOC, non-methane volatile organic compounds, unspecified origin [air, urban air close to ground]: 1.1567e-7 kg; lognormal variance with pedigree 0.094914, pedigree (1,1,3,1,1)
  (same comment as for Dioxins, measured as 2,3,7,8-tetrachlorodibenzo-p-dioxin)
- Manganese [water, ground-, long-term]: 2.23057e-6 kg; lognormal variance with pedigree 2.0449, pedigree (1,1,3,1,1)
  (same comment as for Zinc, ion)
- Phenol, pentachloro- [air, urban air close to ground]: 1.10686e-12 kg; lognormal variance with pedigree 0.094914, pedigree (1,1,3,1,1)
  (same comment as for Dioxins, measured as 2,3,7,8-tetrachlorodibenzo-p-dioxin)
- Nickel, ion [water, ground-, long-term]: 1.71987e-7 kg; lognormal variance with pedigree 1.4303, pedigree (1,1,3,1,1)
  (same comment as for Zinc, ion)
- DOC, Dissolved Organic Carbon [water, ground-, long-term]: 9.37428e-5 kg; lognormal variance with pedigree 0.02614, pedigree (1,1,3,1,1)
  (same comment as for Zinc, ion)
- Hydrogen chloride [air, urban air close to ground]: 5.92265e-8 kg; lognormal variance with pedigree 0.64453, pedigree (1,1,3,1,1)
  (same comment as for Carbon dioxide, non-fossil)
- Particulates, < 2.5 um [air, urban air close to ground]: 3.03457e-7 kg; lognormal variance with pedigree 0.42631, pedigree (1,1,3,1,1)
  (same comment as for Dioxins, measured as 2,3,7,8-tetrachlorodibenzo-p-dioxin)
- Benzene, pentachloro- [air, urban air close to ground]: 1.3429e-11 kg; lognormal variance with pedigree 0.094914, pedigree (1,1,3,1,1)
  (same comment as for Dioxins, measured as 2,3,7,8-tetrachlorodibenzo-p-dioxin)
- Cobalt [water, ground-, long-term]: 5.74332e-8 kg; lognormal variance with pedigree 1.4965, pedigree (1,1,3,1,1)
  (same comment as for Zinc, ion)
- Chloride [water, ground-, long-term]: 2.40503e-5 kg; lognormal variance with pedigree 0.61813, pedigree (1,1,3,1,1)
  (same comment as for Zinc, ion)
- Phosphate [water, surface water]: 5.28508e-10 kg; lognormal variance with pedigree 0.88347, pedigree (1,1,3,1,1)
  (same comment as for TOC, Total Organic Carbon)
- Aluminium [water, ground-, long-term]: 0.000679811 kg; lognormal variance with pedigree 0.31196, pedigree (1,1,3,1,1)
  (same comment as for Zinc, ion)
- Carbon monoxide, non-fossil [air, urban air close to ground]: 4.32061e-6 kg; lognormal variance with pedigree 0.82429, pedigree (1,1,3,1,1)
  (same comment as for Dioxins, measured as 2,3,7,8-tetrachlorodibenzo-p-dioxin)
- Water [air, urban air close to ground]: 0.000111606 m3; lognormal variance with pedigree 1.2167, pedigree (1,1,3,1,1)
  Water vapour from waste humidity, hydrogen oxidation and part of the process water.
  Uncertainty: Uncertainty calculated from uncertainty in waste composition, process water input and the uncertainty of fraction to air.
- Heat, waste [air, urban air close to ground]: 0.864569 MJ; lognormal variance with pedigree 0.05375, pedigree (1,1,3,1,1)
  (same comment as for Heat, waste)
- Phosphate [water, ground-, long-term]: 1.25961e-7 kg; lognormal variance with pedigree 5.3834, pedigree (1,1,3,1,1)
  (same comment as for Zinc, ion)
- Silicon [air, urban air close to ground]: 2.51158e-9 kg; lognormal variance with pedigree 0.34749, pedigree (1,1,3,1,1)
  (same comment as for Carbon dioxide, non-fossil)
- Phosphorus [air, urban air close to ground]: 9.55353e-10 kg; lognormal variance with pedigree 1.2675, pedigree (1,1,3,1,1)
  (same comment as for Carbon dioxide, non-fossil)
- Manganese [air, urban air close to ground]: 6.90504e-10 kg; lognormal variance with pedigree 1.0915, pedigree (1,1,3,1,1)
  (same comment as for Carbon dioxide, non-fossil)
- Chromium VI [water, ground-, long-term]: 7.30735e-8 kg; lognormal variance with pedigree 1.7246, pedigree (1,1,3,1,1)
  (same comment as for Zinc, ion)
- Methane, non-fossil [air, urban air close to ground]: 3.8126e-8 kg; lognormal variance with pedigree 0.094914, pedigree (1,1,3,1,1)
  (same comment as for Dioxins, measured as 2,3,7,8-tetrachlorodibenzo-p-dioxin)
- BOD5, Biological Oxygen Demand [water, surface water]: 3.64286e-5 kg; lognormal variance with pedigree 0.047747, pedigree (1,1,3,1,1)
  (same comment as for TOC, Total Organic Carbon)
- Ammonia [air, urban air close to ground]: 4.12753e-8 kg; lognormal variance with pedigree 0.33488, pedigree (1,1,3,1,1)
  (same comment as for Dinitrogen monoxide)
- Potassium, ion [water, ground-, long-term]: 0.000281074 kg; lognormal variance with pedigree 0.22805, pedigree (1,1,3,1,1)
  (same comment as for Zinc, ion)
- Manganese [water, surface water]: 5.62812e-10 kg; lognormal variance with pedigree 0.91555, pedigree (1,1,3,1,1)
  (same comment as for TOC, Total Organic Carbon)
- Iron, ion [water, ground-, long-term]: 5.4192e-6 kg; lognormal variance with pedigree 1.0918, pedigree (1,1,3,1,1)
  (same comment as for Zinc, ion)
- Toluene [air, urban air close to ground]: 5.08342e-9 kg; lognormal variance with pedigree 0.094914, pedigree (1,1,3,1,1)
  (same comment as for Dioxins, measured as 2,3,7,8-tetrachlorodibenzo-p-dioxin)
- Chromium VI [water, surface water]: 2.22632e-8 kg; lognormal variance with pedigree 1.3372, pedigree (1,1,3,1,1)
  (same comment as for TOC, Total Organic Carbon)
- Zinc [air, urban air close to ground]: 2.87742e-9 kg; lognormal variance with pedigree 1.0621, pedigree (1,1,3,1,1)
  (same comment as for Carbon dioxide, non-fossil)
- Cadmium, ion [water, ground-, long-term]: 7.83134e-10 kg; lognormal variance with pedigree 7.277, pedigree (1,1,3,1,1)
  (same comment as for Zinc, ion)
