# transport, freight train, diesel

Dataset: EcoSpold 2, unit process
Geography: US
Time period: 2000-01-01 to 2019-12-31
Technology level: current
Classification: ISIC rev.4 ecoinvent: 4912:Freight rail transport
Classification: EcoSpold01Categories: transport systems/train
Scenario: Business-as-Usual
System model: Allocation at the point of substitution
Generated by: Frédéric Gindroz
Published in: Röder, A. 2007
Database: ecoinvent
isCopyrightProtected: true
accessRestrictedTo: 1

## General comment
The dataset represents the entire transport life cycle of a freight train in United States. The data of the energy use and operation emissions are based on "transport, freight train, diesel" dataset for RER and represents a diesel goods train with a weight of 1000 Gt. Variation in the geography of different countries have been taken into account by classifying 15 European countries into 3 regions (flat, hilly, mountain).
[This dataset is meant to replace the following datasets:
- transport, freight train, US, 2000 - 2000]

## Included activities start
The dataset starts with the production of a locomotive.

## Included activities end
The dataset ends with the service of transporting 1 ton over a distance of 1 km by a freight train. The dataset includes the production and the maintenance of the locomotive and the goods wagon, the construction of the railway track and the energy use and operation emission of a freight train using diesel.
The inventory includes as well the diesel consumption and diesel engine emissions for an average European diesel traction goods train (1000 Gt). In addition diesel consumption and emissions of shunting processes are accounted for.

## Geography
Average US diesel train freight transport; extrapolated from European data: European data refer to diesel freight train transport in Europe (EU 15: Austria, Belgium, Denmark, Finland, France, Germany, Greece, Ireland, Italy, Luxembourg, Netherlands, Portugal, Spain, Sweden and the UK).The data for rail infrastructure reflect Swiss conditions. Data for vehicle manufacturing and maintenance represents generic European data. Data of the energy use and operation emissions refers to average goods transport conditions in Europe (EU 15).

## Technology
Demand factors of various transport components required to fulfill the functional unit of one tkm fright transport are presented. In order to account for the fact that the same rail tracks are used for both passenger and goods transportation are applied allocation factors. For the USA, according to (Facanha & Horvath 2006) it can be assumed that US freight trains for coal transport are all operated using diesel engines. The new dataset “transport, freight train, diesel/US/tkm” (Tab. 7.80) is based on the existing European freight transport by train (“transport, freight train, diesel/RER/tkm”). Instead of the average European share of electric and diesel freight train transport, only diesel as fuel is used. Diesel traction

## Time period
Data for the determination of European average is based on statistical data from 1998

## Reference product
- transport, freight train: 1 metric ton*km; CPC 6512: Railway transport services of freight; By-product classification allocatable product
  EcoSpold01Location=US
  production volume 2.71751e12 metric ton*km
    UIC statistical synopsis 2005 http://www.uic.org/IMG/xls/synth2005-2.xls
  properties: price 0.026 EUR2005

## Inputs from technosphere
- maintenance, goods wagon: 4.59e-8 unit; lognormal variance with pedigree 0.06, pedigree (1,1,5,1,1)
  Calculated value, required to fulfill the functional unit of one tkm fright transport.
- diesel: 0.0107 kg; source Borken J. 2003; lognormal variance with pedigree 0.0401, pedigree (1,1,5,3,1)
  Literature value. Borken (2003), stated that the available energy data for diesel traction ranges between 2.6 and 9.7 g/Gtkm. For a train of 1000 Gt in a hilly country they proposed a specific energy consumption of approximately 5 g/Gtkm or 10g/tkm. The later value is used in this study.
  Data for the share of electricity and diesel traction in goods transportation, however, is available for the German rail company (DB), which is responsible for 30% of the total European goods transportation. Primary energy consumption is treated as a key indicator of the DB and accounts for the generation of electricity and fuels besides the utilizable final energy, which is required for this project. Thus, the share of final energy on the primary energy for both diesel and electricity has to be determined. As stated in DB (2000), the primary energy is derived using the TREMOD computer model Knörr et al. (2000). In a recent publication, the final energy consumption share of the primary energy is published J. Borken et al. (2003). In the absence of further information for the remaining European countries is employed the German values for the representation of goods transportation conditions in Europe. However, it should be bear in mind that the share of diesel and electricity may vary significantly in the various European countries.
  Further references:
  DB (2000) Die Bahn, Environmental Report. Deutsche Bahn AG, Berlin
  properties: carbon content, fossil 0.865, dry mass 1 kg, wet mass 1 kg
  note on carbon content, fossil: C-content of diesel is 86.5% (ecoinvent v2.2 report 6_IV, Tab 3.14)
- railway track: 9.3e-5 m*year; lognormal variance with pedigree 0.0621, pedigree (3,1,5,3,1)
  EcoSpold01Location=CH
  Calculated value, required to fulfill the functional unit of one tkm fright transport.
  Uncertainty: own estimation taken into account uncertainties in the infrastructure legth -transport performance ratio and further geographical uncertainties due to extrapolation
- locomotive: 7.11e-10 unit; lognormal variance with pedigree 0.0601, pedigree (1,1,5,3,1)
  EcoSpold01Location=RER
  Calculated value, required to fulfill the functional unit of one tkm fright transport.
- maintenance, locomotive: 7.11e-10 unit; lognormal variance with pedigree 0.06, pedigree (1,1,5,1,1)
  Calculated value, required to fulfill the functional unit of one tkm fright transport.
- goods wagon: 4.59e-8 unit; lognormal variance with pedigree 0.0601, pedigree (1,1,5,3,1)
  (same comment as for locomotive)

## Emissions to nature
All rows: lognormal variance with pedigree 0.0401, pedigree (1,1,5,3,1)
- Ammonia [air, unspecified]: 2.14e-7 kg; source INFRAS 1999
  Literature value. Average emission factors for Swiss heavy good vehicles (HGV) for urban traffic conditions in 2000 derived from INFRAS (1999).
  Energy use and operation emissions
- Particulates, > 2.5 um, and < 10um [air, unspecified]: 7.437e-6 kg
  Literature value. Particle size distributions of exhaust emissions and exhaust emission factors [g/kg] for diesel locomotives without particle filters from EU-Norm IIIa. Energy use and operation emissions
- Selenium [air, unspecified]: 1.07e-10 kg; source EEA 2000
  Literature value provided by Expert Panel on Heavy Metals and POPs of the UNECE Task Force on Emission Inventories EEA (2000). However, these emission factors have to be considered as preliminary estimates only. More measurements are needed in order to confirm these values. Energy use and operation emissions
- Cadmium [air, unspecified]: 1.07e-10 kg; source EEA 2000
  (same comment as for Selenium)
- Sulfur dioxide [air, unspecified]: 6.41e-6 kg
  Estimated value.In this project SO2 indice is estimated assuming that all sulphur in the fuel is transformed completely into SO2. In line with assumptions made for road transport is assumed a sulphur content of 300 ppm resulting in a emission index of 0.6 g/kg.
  Energy use and operation emissions
- Methane, fossil [air, unspecified]: 1.39e-6 kg; source INFRAS 1999
  (same comment as for Ammonia)
- Toluene [air, unspecified]: 4.27e-7 kg; source INFRAS 1999
  Literature value. Average emission factors for Swiss heavy good vehicles (HGV) for urban traffic conditions in 2000 derived from INFRAS (1999). Energy use and operation emissions
- NMVOC, non-methane volatile organic compounds, unspecified origin [air, unspecified]: 5.41e-5 kg; source INFRAS 1999
  Literature value. Average emission factors for Swiss heavy good vehicles (HGV) for urban traffic conditions in 2000 derived from INFRAS (1999). the presented figures of NMVOC emissions still contain emissions of Benzene, Toulol and Xylol. Energy use and operation emissions
- Mercury [air, unspecified]: 2.14e-13 kg; source Jungbluth N. 2003
  Literature value from Jungbluth (2003). Energy use and operation emissions
- Chromium [air, unspecified]: 5.34e-10 kg; source EEA 2000
  (same comment as for Selenium)
- Particulates, > 10 um [air, unspecified]: 1.6345e-5 kg
  (same comment as for Particulates, > 2.5 um, and < 10um)
- Nitrogen oxides [air, unspecified]: 0.000587 kg; source Knörr W. 2000
  Literature value. Figures represent shunting specific emission indices Knörr et al. (2000) and average emission indices for diesel traction J. Borken et al. (2003)
  Energy use and operation emissions
  Further references:
  Borken J., Patyk A. and Reinhardt G. A. (1999) Basisdaten für ökologische Bilanzierungen: Einsatz von Nutzfahrzeugen in Transport, Landwirtschaft und Bergbau. Vieweg, Braunschweig/Wiesbaden
- Particulates, < 2.5 um [air, unspecified]: 1.3728e-5 kg
  (same comment as for Particulates, > 2.5 um, and < 10um)
- Benzene [air, unspecified]: 1.07e-6 kg; source INFRAS 1999
  (same comment as for Ammonia)
- Carbon monoxide, fossil [air, unspecified]: 0.000169 kg; source Knörr W. 2000
  Literature value. Figures represent shunting specific emission indices from Knörr et al. (2000).
  Energy use and operation emissions
- Nickel [air, unspecified]: 7.47e-10 kg; source EEA 2000
  (same comment as for Selenium)
- Xylene [air, unspecified]: 4.27e-7 kg; source INFRAS 1999
  (same comment as for Toluene)
- Dinitrogen monoxide [air, unspecified]: 1.07e-6 kg; source INFRAS 1999
  (same comment as for Ammonia)
- Iron [soil, unspecified]: 6.02e-5 kg
  Estimated value. Abrasion (from braking lining, rail and wheel) is predominately composed of iron and mineral components BUWAL (2002). In this study is assumed that all non-airborne emissions are emitted as iron to soil. In consequence, is assumed a yearly load of 191.8 t/a iron emitted to soil. Emission of lubricates due to traction are not accounted for, since measures are in operation to avoid such emissions. Energy use and operation emissions
  Further references:
  BUWAL (2002) PM10-Emissionen des Verkehrs. Statusbericht; Teil Schienenverkehr. 144. Bundesamt fuer Umwelt, Wald und Landschaft, Bern
- Carbon dioxide, fossil [air, unspecified]: 0.0336 kg
  Estimated value. In this project CO2 indice is estimated assuming that all carbon in the fuel is transformed completely into CO2. For CO2 is employed an emission index of 73.5 g/MJ or 3146 g/kg.Energy use and operation emissions
- Lead [air, unspecified]: 1.17e-12 kg; source Jungbluth N. 2003
  Literature value from Jungbluth (2003). Energy use and operation emissions
- Zinc [air, unspecified]: 1.07e-8 kg; source EEA 2000
  (same comment as for Selenium)
- Copper [air, unspecified]: 1.82e-8 kg; source EEA 2000
  (same comment as for Selenium)

## Sampling procedure
literature and statistics

## Extrapolations
This dataset has been extrapolated from year 2000 to the year of the calculation (2019). The uncertainty has been adjusted accordingly.

## Review by Carl Vadenbo 2012-06-29
In preparation for the release of ecoinvent v3.0, the datasets 'operation, coal freight train, diesel RER' and 'transport, coal freight, rail, diesel US' in ecoinvent v2.2 were merged into the dataset 'transport, freight train, diesel, US 2000-2000'. The amounts of the exchanges were reviewed and were found to correspond to the disaggregated datasets. The uncertainty information need to be revised before subsequent releases of the database. Despite this shortcoming, the new dataset was accepted for inclusion into the ecoinvent database on 2012.07.05.
