# rolling mill production

Dataset: EcoSpold 2, unit process
Geography: RoW
Time period: 2002-01-01 to 2019-12-31
Technology level: current
Classification: EcoSpold01Categories: metals/processing
Classification: ISIC rev.4 ecoinvent: 2823:Manufacture of machinery for metallurgy
Tags: ConvertedDataset
Scenario: Business-as-Usual
System model: Allocation at the point of substitution
Share of production covered: 0 %
Generated by: Silvio Blaser
Published in: Werner F. 2007
Database: ecoinvent
isCopyrightProtected: true
accessRestrictedTo: 1

## General comment
The values for plant area were taken from a map recieved during the visit to a electro-steel manufacturing and forming plant in Gerlafingen, Switzerland. The output was 616000 tonnes of formed steel in 2002. The Lifetime is assumed to be 50 years for infrastructure like buildings and routes, and 25 years for machinery and furnaces
[This dataset was already contained in the ecoinvent database version 2. It was not individually updated during the transfer to ecoinvent version 3. Life Cycle Impact Assessment results may still have changed, as they are affected by changes in the supply chain, i.e. in other datasets. This dataset was generated following the ecoinvent quality guidelines for version 2. It may have been subject to central changes described in the ecoinvent version 3 change report (http://www.ecoinvent.org/database/ecoinvent-version-3/reports-of-changes/), and the results of the central updates were reviewed extensively. The changes added e.g. consistent water flows and other information throughout the database. The documentation of this dataset can be found in the ecoinvent reports of version 2, which are still available via the ecoinvent website. The change report linked above covers all central changes that were made during the conversion process.]

## Included activities end
Includes land occupation data for and land transformation data to buildings, asphalted and green surroundings; land transformation data from unknown; the buildings; company internal roads, parking lots etc.; the main material of which the machinery is composed and their disposal.

## Geography
The visited plant is in the range of size typicall for european union (about a quarter of the maximal size). Data-set is representative for European Union

## Technology
The visited plant produces hot rolled merchant bars, wire rod, concrete reinforcing bars, mats and cold rolled topar-S, topar-Rc and topar-Rs

## Reference product
- rolling mill: 1 unit; CPC 44310: Converters, ladles, ingot moulds and casting machines, of a kind used in metallurgy or in metal foundries; met[…]; By-product classification allocatable product
  EcoSpold01Location=RER
  production volume 2187 unit
    Estimated from 6E11 kg sheet rolled and 1.1E12 kg hot rolled and 1.5E11 kg wire drawn products and 1.62E-9 units per kg
  property price 1.65748e6 EUR2005
    Upscale from EU 27 to the world by PPP (0.8458 in 2003 and 0,8426 in 2004)
  property true value 1.65748e6
    allocation property applied in "true value" allocation // value calculated from revenue

## By-products
- heat, for reuse in municipal waste incineration only: 0 MJ; CPC 17300: Steam and hot water; By-product classification allocatable product; pedigree (1,1,1,1,1)
  Net electricity generated from this waste and used in internal MSWI plant energy redistribution.
  Uncertainty: uncertainty is calculated from uncertainties in waste composition and uncertainties in energy efficiency and the uncertainty in internal energy demand
  production volume 108.398 MJ
  property exergy 0.1842 MJ; name E_th_prod_MSWI_exergy
    This exergy property is based on the exergy content of the product.
  property price 0.0106 EUR2005; name E_th_prod_MSWI_price_EUR2005
    Average European district heat price from Ecoheatcool and Euroheat 2005-2006, Ecoheat Work package 1: The European heat market. Final report. 10.6 EUR/GJ i s the price of district heat. http://www.solarthermalworld.org/files/Ecoheatcool%20WP1%20Web.pdf?download
  property true value relation 0.1842; name E_th_prod_MSWI_true_value_relation
    property to calculate "true value" from
  property true value 0.000326035
    allocation property applied in "true value" allocation // value calculated from true value relation
- electricity, for reuse in municipal waste incineration only: 0 kWh; CPC 17100: Electrical energy; By-product classification allocatable product; pedigree (1,1,1,1,1)
  (same comment as for heat, for reuse in municipal waste incineration only)
  production volume 15.2653 kWh
  property true value relation 3.6; name E_el_prod_MSWI_true_value_relation
    property to calculate "true value" from
  property price 0.1 EUR2005; name E_el_prod_MSWI_price_EUR2005
    Estimated to be the same price as in case of electricity, medium voltage.
  property exergy 3.6 MJ; name E_el_prod_MSWI_exergy
    This exergy property is based on the exergy content of the product.
  property true value 0.000897354
    (same comment as for heat, for reuse in municipal waste incineration only)

## Inputs from technosphere
- concrete, normal: 0 m3; pedigree (1,1,1,1,1)
  EcoSpold01Location=CH
  properties: water content 0.086758, dry mass 2190 kg, wet mass 2380 kg
- steel, low-alloyed: 57700 kg; lognormal variance with pedigree 0.068, pedigree (4,5,5,5,1)
  EcoSpold01Location=RER
  properties: wet mass 1 kg, dry mass 1 kg, carbon content, fossil 0.005
  note on carbon content, fossil: Low alloyed steel composition given in Tab. 3.2 ecoinvent v2.2 report 10_partII. Steel assumed to have a C content of 0.5%
- building, hall, steel construction: 73.5 m2; lognormal variance with pedigree 0.368, pedigree (4,5,5,5,1)
  EcoSpold01Location=CH
- waste concrete, not reinforced: -57700 kg; lognormal variance with pedigree 0.068, pedigree (4,5,5,5,1)
  EcoSpold01Location=CH
  production volume 1.2619e8 kg
    Calculated from the production volume of rolling mill in proportion to the respective output amounts.
  properties: dry mass 1 kg, wet mass 1 kg
- building, multi-storey: 40 m3; lognormal variance with pedigree 0.368, pedigree (4,5,5,5,1)
  EcoSpold01Location=RER
- concrete, normal: 0.576296, 0.0600493, 0.486141, 0.273455, 1.158, 0.0390587, 22.507 m3 (7 entries); lognormal variance with pedigree 0.068, pedigree (4,5,5,5,1)
  EcoSpold01Location=CH

## Inputs from nature
- Transformation, from unspecified [natural resource, land]: 310 m2; lognormal variance with pedigree 0.188, pedigree (4,5,5,5,1)
- Occupation, industrial area [natural resource, land]: 15461 m2*year; lognormal variance with pedigree 0.108, pedigree (4,5,5,5,1)
- Transformation, to industrial area [natural resource, land]: 310.1 m2; lognormal variance with pedigree 0.188, pedigree (4,5,5,5,1)

## Sampling procedure
plant map and estimation

## Extrapolations
see technology and geography This dataset has been copied from an original dataset covering the geography RER. The uncertainty has been adjusted accordingly.

## Review by Roland Hischier 2003-06-17
Passed.
