# aluminium around steel bi-metal stranded cable production, 3x3.67mm external diameter wire

Dataset: EcoSpold 2, unit process
Geography: CA-QC
Time period: 2012-01-01 to 2019-12-31
Technology level: current
Classification: EcoSpold01Categories: metals/processing
Classification: ISIC rev.4 ecoinvent: 25:Manufacture of fabricated metal products, except machinery and equipment
Scenario: Business-as-Usual
System model: Allocation at the point of substitution
Share of production covered: 100 %
Generated by: Jean-Francois Menard
Database: ecoinvent
isCopyrightProtected: true
accessRestrictedTo: 1

## General comment
This dataset represents the production of an aluminium around steel bi-metal stranded cable. Typically, 3, 7, 19 or 37 aluminium around steel bi-metal wires are stranded together.
This dataset represents a 3 x 3.67 mm external diameter wire cable but the dataset is parameterized to the number and diameter of wires so new instances can be created for other numbers of wires.

## Included activities start
From the reception of the material inputs at the factory gate.

## Included activities end
This activity ends with the aluminium around steel bi-metal stranded cable.
This dataset only includes the length of aluminium around steel bi-metal wire necessary per m of stranded cable depending on the number of individual wires in the cable. No losses are accounted for during the stranding process.

## Geography
Data from one cable manufacturing company in the region of Québec.

## Parameters
- world gross domestic product 2011: 7e13 USD(2011); name worldGDP2011; lognormal variance with pedigree 0.0006, pedigree (1,1,1,1,1)
  World Gross domestic product for 2011, expressed in 2011 USD. Source: World Bank
- Quebec gross domestic product 2011: 3.11e11 USD(2011); name quebecGDP2011; lognormal variance with pedigree 0.0006, pedigree (1,1,1,1,1)
  Quebec Gross domestic product for 2011, expressed in 2011 USD. Source: Institut de la statistique du Québec. Converted from CAD to USD using a yearly average exchange rate of 0.989 CAD/USD (Source: bank of Canada)
- number of wire in cable: 3 dimensionless; name nb_of_wires
  Basic parameter used in the calculation of the exchanges. Number of wires in bi-metal cable. Typically 3, 7, 19 or 37.
- wire diameter: 3.67 mm; name wire_diameter
  Basic parameter used in the calculation of the reference flow exchange properties.
- wire linear mass density: 0.069663 kg/m; name wire_linear_mass_density; = (5.1964e-3 * wire_diameter^1.9964); lognormal variance with pedigree 0.098, pedigree (5,5,5,5,3)
  Calculated value. Power function relationship between the linear mass density (in kg/m) of the bi-metal wire and its diameter (in mm) derived from the mass-to-length data for the different diameters of wires manfuctured by the data providing company. The R² value of the regression is of 1,00. Taken from ecoinvent v3.2 dataset "aluminium around steel bi-metal wire production, 3.67 mm external diameter, CA-QC 2012". Used in the calculation of the reference flow exchange properties.
  Uncertainty: Calculated variable. Uncertainty should be determined from propagation of uncertainty factors of underlying variables, however no uncertainty could be generated for the terms of the power function. Uncertainty of actual relation between variables not accounted at this time, although this could be included in a future update.

## Reference product
- aluminium around steel bi-metal stranded cable, 3x3.67mm external diameter wire: 1 m; By-product classification allocatable product; CPC 4153: Semi-finished products of aluminium or aluminium alloys
  production volume 223742 m; = ParentValue * quebecGDP2011 / worldGDP2011
    Gross approximation of the Québec production volume using relative value of Québec GDP to world GDP.
  property wet mass 0.210758 kg; = cable_DM
  property dry mass 0.210758 kg; name cable_DM; = wireLength*wire_linear_mass_density
  property carbon content, fossil 0.00225
    Based on fossil carbon content (0.0025) indicated in ecoinvent v3.1 dataset "steel production, converter, unalloyed, GLO 2000" ("Unalloyed steels or carbon steels are those in which the level of an individual element in no case reaches or exceeds the limiting concentration given in Tab. 3.1 ecoinvent v2.2 report 10_partII. Assumed to have a C content of 0.25%") and carbon steel mass fraction in wire (0.9).
  property price 0.204517 EUR2005
    Calculated based on inputs: The price of the product has been calculated as a sum of the values of the material and energy inputs for this product. This value is therefore a rough estimation. It may underestimate the real price since there are additional expenses when producing any product. These expences can include for example labour costs, treatment of waste materials and profit for the producer. Please consider carefully whether this level of data quality is acceptable for your application.
  property carbon content 0.00225
    carbon content on a dry matter basis (reserved; not for manual entry)
  properties: water in wet mass 0 kg, water content 0, carbon content, non-fossil 0, carbon allocation 0.000474206 kg

## Inputs from technosphere
- aluminium around steel bi-metal wire, 3.67mm external diameter: 3.0254 m; name wireLength; = 0.0003*nb_of_wires^2+1.0077*nb_of_wires-0.0004; lognormal variance with pedigree 0.13, pedigree (5,5,5,5,4)
  Calculated value. Polynomial function relationship between the total length (in m) of bi-metal wire per m of cable and the number of wires (or strands) in the cable derived from the mass-to-length data for different cable and individual wire types manfuctured by the data providing company. The R² value of the regression is of 1.00. Gives an error of from less than 0,01% for a 3-wire cable to 0,12% for a 37-wire cable.
  Uncertainty: Calculated variable. Uncertainty should be determined from propagation of uncertainty factors of underlying variables, however no uncertainty could be generated for the terms of the polynomial function. Uncertainty of actual relation between variables not accounted at this time, although this could be included in a future update.
  property dry mass 0.069663 kg; name wire_DM; = wire_linear_mass_density
  properties: carbon content, fossil 0.00225, wet mass 0.069663 kg
  note on carbon content, fossil: Based on fossil carbon content (0.0025) indicated in ecoinvent v3.1 dataset "steel production, converter, unalloyed, GLO 2000" ("Unalloyed steels or carbon steels are those in which the level of an individual element in no case reaches or exceeds the limiting concentration given in Tab. 3.1 ecoinvent v2.2 report 10_partII. Assumed to have a C content of 0.25%") and carbon steel mass fraction in wire (0.9).

## Sampling procedure
Industry data from one manufacturing company in the region of Québec.

## Extrapolations
This dataset has been extrapolated from year 2012 to the year of the calculation (2019). The uncertainty has been adjusted accordingly.
