# plywood production, for indoor use

Dataset: EcoSpold 2, unit process
Geography: RER
Time period: 1996-01-01 to 2019-12-31
Technology level: current
Classification: ISIC rev.4 ecoinvent: 1621:Manufacture of veneer sheets and wood-based panels
Classification: EcoSpold01Categories: wooden materials/extraction
Tags: ConvertedDataset
Scenario: Business-as-Usual
System model: Allocation at the point of substitution
Generated by: Hans-Jörg Althaus
Published in: Werner F. 2007
Database: ecoinvent
isCopyrightProtected: true
accessRestrictedTo: 1

## General comment
This database represents the production of one m3 plywood. The input of wood is assumed to be roundwood beech (hardwood) from forest. The plywood is produced for indoor use.

The multi-output process "plywood, indoor use, production" delivers the two coproducts "plywood, indoor use, at plant" and "industrial residue wood, plywood prod., indoor use, hardwood, u=20%, at plant". Allocation is based on the over-all proceeds of the process.

The production takes place at a wooden board factory for organic bonded board; the data reflects a Swiss production site from 1996, which is assumed representative for Europe. Production data is mainly plant data from the production company. The type of plywood is unspecified.

Emission data are not comprehensive and based on weakly supported data.
The allocation correction exchanges were removed for eiv3.

## Included activities start
From reception of roundwood timber and urea-formaldehyde resin at the factory gate.

## Included activities end
This activity ends with plywood produced for indoor use at the factory gate. The dataset includes the inputs to the production processes, transports of those inputs and the available process emissions. The dataset does not include infrastructure.

## Geography
Production data for one plant in Switzerland used for central Europe

## Technology
Technology reflects a medium-sized Swiss enterprise from 1996. Plywood is made out of glued veneers. Veneers are thin sheets of wood obtained by sawing, cutting, or peeling. They are among the longest-known wood-based construction materials. Veneers are produced from cordwood or from specially divided blocks by using peeling and cutting machines or, less commonly, by sawing. The coated veneers are stacked either manually or by machine. To make transportation easier and reduce stack height, coated veneer stacks are frequently pre-compressed in an unheated one-daylight press. Hot pressing occurs in one- or multi-daylight presses but usually with a smaller size. Pressing conditions (temperature, time, and pressure) depend on the type of wood, the strength of the plywood, and the type of adhesive. Pressures of 0.6 2.5 N/mm2 and temperatures of 80 140 °C are usually applied. After gluing and sometimes climatisation, veneer plywood is sanded, cut to standard or ordered measurements, and graded according to quality.

Different types of plywood are available depending on the number and height of the layers; the type is not specified in this dataset. The most important adhesives for gluing wood are urea-formaldehyde resins. The use of UF resins to glue plywood was first described in 1929. Production of these wood adhesives has since developed enormously. Urea-formaldehyde resins are used for adhesion of wood materials used in the interior and have limited resistance to moisture. They can be readily adapted to operational requirements through the nature and dosage of curing aids and additives. Ammonium salts (e.g. NH4Cl) are generally used as curing aids. They lower the pH by reacting with formaldehyde. The rate of curing increases with increasing temperature and decreasing pH. The viscosity of the adhesive liquor is adapted to processing conditions by the addition of water, depending on the content of extenders and fillers. The pressing temperature is 80 120 °C.
Reference:
Kollmann F. F. P., Kuenzi E. W. and Stamm A. J. (1975) Principles of Wood Science and Technology. Springer-Verl., Berlin, Heidelberg, New York. AND Nimz H., Schmitt U., Schwab E., Wittmann O. and Wolf F. (1997) Wood. In: Ullmann's encyclopedia of indus-trial chemistry (ed. Anonymous). 5th edition on CD-ROM Edition. Wiley & Sons, London.

## Parameters
- fraction, cooling water, once-through system, to air: 0.004; name fraction_CW_OT_to_air; lognormal variance with pedigree 0.0413, pedigree (2,3,1,3,1)
  Calculated based on literature value (Scown, C.D., 2011, Water Footprint of U.S. Transportation Fuels and supplying information of the article) (Vionnet, S., Quantis Water Database - Technical Report, 2012).
- fraction, cooling water, to air: 0.3875; name fraction_CW_to_air; = (0.5*fraction_CW_OT_to_air)+(0.5*fraction_CW_R_to_air); lognormal variance with pedigree 0.092025, pedigree (4,4,3,2,4)
  Calculated value based on literature value (see comments of the other parametres present in this dataset) and expert opinion. In the case when no industry/literature data are available about the type of cooling or directly fraction, cooling water, to air specific for the process a default assumption is applied. It is assumed that the once-through cooling system is used in 50% of all cases and recirculating system is used in another 50% of all cases.
- fraction, cooling water, cooling pond system, to air: 0.032; name fraction_CW_CP_to_air; lognormal variance with pedigree 0.0413, pedigree (2,3,1,3,1)
  (same comment as for fraction, cooling water, once-through system, to air)
- fraction, cooling water, recirculating system, to air: 0.771; name fraction_CW_R_to_air; lognormal variance with pedigree 0.0413, pedigree (2,3,1,3,1)
  (same comment as for fraction, cooling water, once-through system, to air)

## Reference product
- wood chips, dry, measured as dry mass: 1 kg; name wood_chips; CPC 31230: Wood in chips or particles; By-product classification allocatable product
  Calculated Value. Since the fuel for the furnace is included in the input, the corresponding amount inventoried with the energy module is subtracted. Since the volume of the chips is bulked, it is higher than the difference of input and output volume.
  production volume 1.69189e9 kg; = plywood_apv*wood_chips
    Calculated from production volume of reference product using the relative outputs.
  property price 0.107 EUR2005
    Expert judgement (Urs Luginbühl, Swiss Sawmilling industry, personal communication in June 2014). Wood chips from softwood should have a price of 0.101 EUR/kg. Woodchips from hardwood should have a price of 0.112 EUR/kg. Average of these two values is used. Cross-reference; FAOSTAT database; http://faostat.fao.org/site/626/DesktopDefault.aspx?PageID=626#ancor; Average import/export prices of EU for 'chips and particles'. Price: 48.76 Euro/m3. The density of the wood chips is 650 kg/m3. The price is recalculated accordingly.
  property carbon content, non-fossil 0.494
    C content of dry mass is 0.494 kgC/kg dry wood (ecoinvent v2.2 report 9).
  property carbon content 0.494
    carbon content on a dry matter basis (reserved; not for manual entry)
  property true value 49.3484; name wood_chips_true_value
    allocation property applied in "true value" allocation // value calculated from revenue
  properties: water content 0.4, carbon content, fossil 0, water in wet mass 0.4 kg, dry mass 1 kg, wet mass 1.4 kg, carbon allocation 0.494 kg
- plywood, for indoor use: 0 m3; CPC 31450: Plywood, veneer panels and similar laminated wood of bamboo; By-product classification allocatable product
  Reference product. Plywood produced at a wooden board factory in Switzerland by processes representative for European average. The reference product is ready for delivery at the wooden board factory.
  A large number of materials can be produced with differing properties and areas of use. Typical uses are as construction plywood for wall, floor, and ceiling panels and also as panels for concrete shuttering, and decorative covering veneers in interior furnishings (e.g. wall panels or doors).
  EcoSpold01Location=RER
  production volume 3.66845e6 m3; name plywood_apv
    Unknown
    FAOSTAT ; Assumed an equal split between indoor and outdoor qualities
  property price 298 EUR2005
    (same comment as for wood chips, dry, measured as dry mass)
  property carbon content, non-fossil 0.424285
    Plywood is composed of wood and additives. The weight of the wood is assumed to be the DM kg minus 83.2 kg additives. C content of wood is 0.494 kgC/kg dry wood (ecoinvent v2.2 report 9)
  property carbon content 0.481999
    carbon content on a dry matter basis (reserved; not for manual entry)
  property true value 298
    allocation property applied in "true value" allocation // value calculated from revenue
  properties: carbon content, fossil 0.0577135, water content 0.0601214, wet mass 625 kg, water in wet mass 35.4449 kg, dry mass 589.555 kg, carbon allocation 284.165 kg

## By-products
- residual wood, dry: 0 m3; name residual_wood; CPC 39283: Non-agglomerated wood waste and scrap; By-product classification allocatable product
  EcoSpold01Location=RER
  Stoichiometric Calculation. Calculated by balance of dry wood mass. Estimation after Werner 2002, based on Gautschi 2001 (value increased by 1.61 based on wood with u=40% due to lower water content (after Vhe. Nr. 407 2002).
  production volume 4.84236e6 m3; = plywood_apv*residual_wood
    Unknown
    Calculated from output of main product (1.31 m3 / m3 plywood)
  property carbon content, non-fossil 0.494
    C content of dry mass is 0.494 kgC/kg dry wood (ecoinvent v2.2 report 9)
  property price 26.9 EUR2005
    Calculated based on inputs: The price of the product has been calculated as a sum of the values of the material and energy inputs for this product. This value is therefore a rough estimation. It may underestimate the real price since there are additional expenses when producing any product. These expences can include for example labour costs, treatment of waste materials and profit for the producer. Please consider carefully whether this level of data quality is acceptable for your application.
  property carbon content 0.494
    carbon content on a dry matter basis (reserved; not for manual entry)
  property true value 35.508; name residual_wood_true_value
    allocation property applied in "true value" allocation // value calculated from revenue
  properties: water content 0.2, water in wet mass 130 kg, carbon content, fossil 0, wet mass 780 kg, dry mass 650 kg, carbon allocation 321.1 kg
- electricity, for reuse in municipal waste incineration only: 0 kWh; CPC 17100: Electrical energy; By-product classification allocatable product; pedigree (1,1,1,1,1)
  Net electricity generated from this waste and used in internal MSWI plant energy redistribution.
  Uncertainty: uncertainty is calculated from uncertainties in waste composition and uncertainties in energy efficiency and the uncertainty in internal energy demand
  production volume 61036.3 kWh
  property exergy 3.6 MJ; name E_el_prod_MSWI_exergy
    This exergy property is based on the exergy content of the product.
  property true value relation 3.6; name E_el_prod_MSWI_true_value_relation
    property to calculate "true value" from
  property price 0.1 EUR2005; name E_el_prod_MSWI_price_EUR2005
    Estimated to be the same price as in case of electricity, medium voltage.
  property true value 0.00214371
    allocation property applied in "true value" allocation // value calculated from true value relation
- heat, for reuse in municipal waste incineration only: 0 MJ; CPC 17300: Steam and hot water; By-product classification allocatable product; pedigree (1,1,1,1,1)
  Net useful heat generated from this waste and used in internal MSWI plant energy redistribution.
  Uncertainty: uncertainty is calculated from uncertainties in waste composition and uncertainties in energy efficiency and the uncertainty in internal energy demand
  production volume 439290 MJ
  property true value relation 0.1842; name E_th_prod_MSWI_true_value_relation
    property to calculate "true value" from
  property exergy 0.1842 MJ; name E_th_prod_MSWI_exergy
    This exergy property is based on the exergy content of the product.
  property price 0.0106 EUR2005; name E_th_prod_MSWI_price_EUR2005
    Average European district heat price from Ecoheatcool and Euroheat 2005-2006, Ecoheat Work package 1: The European heat market. Final report. 10.6 EUR/GJ i s the price of district heat. http://www.solarthermalworld.org/files/Ecoheatcool%20WP1%20Web.pdf?download
  property true value 0.000789435
    (same comment as for electricity, for reuse in municipal waste incineration only)
- zinc concentrate: 0 kg; CPC 14290: Other non-ferrous metal ores and concentrates (other than uranium or thorium ores and concentrates); By-product classification allocatable product
  Calculated value from the knowledge of the properties of both products.
  production volume 0.346129 kg
  property price 0.38 EUR2005; name ByP_price_EUR2005
    Temporary price data. Calculated as 90% of purchasers price based on: Zinc content in concentrate 53%. Concentrate price per kg Zn 86.5% of refined Zn price (13.5% treatment charges according to CHR Metals Limited 2005: Dynamic cost curves. http://www.minecost.com/dynamic.pdf). 2004 zinc price from USGS (2007) Mineral commodity summaries 2007. <http://minerals.usgs.gov/minerals/pubs/mcs/2007/mcs2007.pdf> [Accessed 25 May 2010]
  property zinc content 0.53; name zinc_C_zinc_concentrate
    Zinc content on a dry matter basis. Value taken from teh "zinc mine operation" /GLO dataset.
  property dry mass 1 kg; name DM_zinc_concentrate
  property carbon content 0
    carbon content on a dry matter basis (reserved; not for manual entry)
  property true value 3.58541e-8
    allocation property applied in "true value" allocation // value calculated from revenue
  properties: wet mass 1 kg, water content 0, carbon content, non-fossil 0, carbon content, fossil 0, water in wet mass 0 kg, carbon allocation 0 kg

## Inputs from technosphere
- urea formaldehyde resin: 0.0232524 kg; lognormal variance with pedigree 0.0421, pedigree (1,4,5,3,1)
  Measured Value. Plant data, from "Hess & Co." AG Dönningen.
  EcoSpold01Location=RER
  properties: dry mass 1 kg, carbon content, fossil 0.408958, wet mass 1 kg
  note on carbon content, fossil: Chemical formula of the urea formaldehide monomer was assumed to be C3H8N2O
- wastewater from plywood production: -0.000514236 m3; name wastewater; lognormal variance with pedigree 0.0821, pedigree (1,4,5,3,1)
  EcoSpold01Location=CH
  Measured Value. Plant data, from "Hess & Co." AG Dönningen.
  production volume 6.74995e6 m3; = plywood_apv*wastewater
    Calculated from the production volume of plywood, for indoor use in proportion to the respective output amounts.
  properties: carbon content, non-fossil 0.897931, water content 2962.17, wet mass 1000 kg, dry mass 0.337476 kg
  note on carbon content, non-fossil: COD= 0.7 kg/m3 (Tab A.18, ecoinvent v2.2 report 13_I). COD was converted to TOC, using conversion factors in Tab 4.10 (ecoinvent v2.2 report 13_IV). TOC was considered as Total Carbon.
- sawlog and veneer log, hardwood, measured as solid wood under bark: 0 m3; pedigree (1,1,1,1,1)
  EcoSpold01Location=RER
  Measured Value. Plant data, from "Hess & Co." AG Dönningen. Volume including bark is 2.7*1.2 m3.
  properties: wet mass 1105 kg, carbon content, non-fossil 0.494, water content 0.7, dry mass 650 kg
  note on carbon content, non-fossil: C content of dry mass is 0.494 kgC/kg dry wood (ecoinvent v2.2 report 9)
- diesel, burned in building machine: 0.000894323 MJ; lognormal variance with pedigree 0.1621, pedigree (1,4,5,3,1)
  Measured Value. Plant data, from "Hess & Co." AG Dönningen.
  EcoSpold01Location=GLO
- electricity, medium voltage: 0.0855197 kWh; lognormal variance with pedigree 0.0421, pedigree (1,4,5,3,1)
  EcoSpold01Location=UCTE
  Measured Value. Plant data, from "Hess & Co." AG Dönningen.
- wooden board factory, organic bonded boards: 9.30655e-12 unit; lognormal variance with pedigree 0.4461, pedigree (4,5,5,3,4)
  Estimation.
  EcoSpold01Location=RER
- heat, central or small-scale, other than natural gas: 1.81324 MJ; lognormal variance with pedigree 0.0421, pedigree (1,4,5,3,1)
  heat produced on site
- sawlog and veneer log, hardwood, measured as solid wood under bark: 0.000698741, 5.58442e-5 m3 (2 entries); lognormal variance with pedigree 0.0421, pedigree (1,4,5,3,1)
  (same comment as for sawlog and veneer log, hardwood, measured as solid wood under bark)

## Inputs from nature
- Water, cooling, unspecified natural origin [natural resource, in water]: 0.000514236 m3; name water_cooling_UNO_input; lognormal variance with pedigree 0.0421, pedigree (1,4,5,3,1)
  Measured Value. Plant data, from "Hess & Co." AG Dönningen.

## Emissions to nature
- Formaldehyde [air, unspecified]: 2.32524e-5 kg; source Nimz H. 1997; lognormal variance with pedigree 0.408, pedigree (4,5,5,5,5)
  Literature Value.
- Water [air, unspecified]: 0.000199266 m3; name water_to_air_unspecified; = water_cooling_UNO_input*fraction_CW_to_air; lognormal variance with pedigree 0.130025, pedigree (4,4,5,2,4)
  Calculated value based on literature values and expert opinion. See comments in the parametres' comment field.
  property fraction, origin: fresh water 0; name fraction_origin_fresh_water
  property fraction, origin: salt water 0; name fraction_origin_salt_water
  property fraction, origin: unspecified 1; name fraction_origin_unspecified

## Sampling procedure
Literature

## Extrapolations
See Geography and Technology

## Review by Roberto Dones 2007-11-13
passed

## Review by Roland Hischier 2011-12-01
Transfer of documentation done.
