# treatment of poultry manure, drying, pelleting

Dataset: EcoSpold 2, unit process
Geography: RoW
Time period: 2001-01-01 to 2019-12-31
Technology level: current
Classification: EcoSpold01Categories: agricultural means of production/organic fertiliser
Classification: ISIC rev.4 ecoinvent: 3821:Treatment and disposal of non-hazardous waste
Tags: ConvertedDataset
Scenario: Business-as-Usual
System model: Allocation at the point of substitution
Generated by: Angelika Heil
Published in: Nemecek, T. 2004
Database: ecoinvent
isCopyrightProtected: true
accessRestrictedTo: 1

## General comment
Values originate from a single producer of dried poultry manure, which, however, can be considered as typical for the Swiss market.
[This dataset was already contained in the ecoinvent database version 2. It was not individually updated during the transfer to ecoinvent version 3. Life Cycle Impact Assessment results may still have changed, as they are affected by changes in the supply chain, i.e. in other datasets. This dataset was generated following the ecoinvent quality guidelines for version 2. It may have been subject to central changes described in the ecoinvent version 3 change report (http://www.ecoinvent.org/database/ecoinvent-version-3/reports-of-changes/), and the results of the central updates were reviewed extensively. The changes added e.g. consistent water flows and other information throughout the database. The documentation of this dataset can be found in the ecoinvent reports of version 2, which are still available via the ecoinvent website. The change report linked above covers all central changes that were made during the conversion process.]

## Included activities end
The inventory contains the energy demand required for further-processing of poultry manure to obtain a commercial fertiliser (i.e. drying and granulation). Process emissions were taken into account as well as waste production (including waste production related to packaging of the final product at the plant). Transports to poultry farms to the plant and from the plant to the regional storehouse were included. Infrastructure and land use were taken into account by means of proxy data.

## Geography
The values refer to the market situation in Switzerland.

## Technology
Values refer to a commonly used technology for this product.

## Time period
Years for which data of this inventory were collected.

## Reference product
- poultry manure, dried: 1 kg; name manure_dried; CPC 34654: Excreta of animals useful for manure/fertilizer and fuel preparation; By-product classification Recyclable
  production volume 3.6637e11 kg; name PV_RP; = 22906883000*0.032*1000*0.5
    Calculated based on literature data.
    2.29E+07 (1000heads) is the number of poultry being produced every year in the world (FAOSTAT, sum of item codes 1057 Chicken, 1079 Turkeys and 2029 Poultry birds, accessed 20151026).
    0.032 tons/year is the amount of manure produced by one animal each year (University of Wisconsin, http://learningstore.uwex.edu/Assets/pdfs/A3601.pdf, accessed 20151026 and World Bank, https://www.google.ch/url?sa=t&rct=j&q=&esrc=s&source=web&cd=10&cad=rja&uact=8&ved=0CE4QFjAJahUKEwiD_I_Cm-DIAhXh8HIKHZMdDLY&url=http%3A%2F%2Fsiteresources.worldbank.org%2FINTAPCFORUM%2FResources%2Fpart3.ppt&usg=AFQjCNGs7QNHFbEJyEG80btGpJtKy04C3A&sig2=1XdVmhpSsiSRhzx_XLP34Q&bvm=bv.105841590,d.bGQ, accessed 20151026).
    It is considered that 50% of the fresh manure is dried in this activity.
  property cadmium content 2.92e-7
    pg 36 Tab 7. Original values are given in kg/m3, but this is an error and it is mg/kg DM
  property copper content 4.38e-5
    pg 36 Tab 7. Original values are given in kg/m3, but this is an error and it is mg/kg DM
  property mercury content 2e-7
    pg 36 Tab 7. Original values are given in kg/m3, but this is an error and it is mg/kg DM
  property nickel content 4e-5
    pg 36 Tab 7. Original values are given in kg/m3, but this is an error and it is mg/kg DM
  property price 0.4 EUR2005; name manure_dried_price_EUR2005
    Temporary price data. Calculated as 90% of purchasers price based on: 2005 import prices (total trades (USD) divided by total weight (kg) in biggest economies of the world: EU27, USA, Brasil, China, India, Japan and Russia) from UN Commodity Trade Statistics Database (http://data.un.org/Explorer.aspxDatabase [Accessed 2011.06.23]). Commodity: Animal or vegetable fertilizers, in packs >10 kg
  property lead content 2.92e-6
    pg 36 Tab 7. Original values are given in kg/m3, but this is an error and it is mg/kg DM
  property zinc content 0.000349
    pg 36 Tab 7. Original values are given in kg/m3, but this is an error and it is mg/kg DM
  property carbon content 0.33389
    carbon content on a dry matter basis (reserved; not for manual entry)
  property true value 0.176476; name manure_dried_true_value
    allocation property applied in "true value" allocation // value calculated from revenue
  properties: carbon content, non-fossil 0.33389, carbon content, fossil 0, phosphorus content 0.0167, potassium content 0.024, wet mass 1 kg, water content 0.156069, water in wet mass 0.135 kg, dry mass 0.865 kg, nitrogen content 0.532, carbon allocation 0.288815 kg

## By-products
- heat, for reuse in municipal waste incineration only: 0 MJ; CPC 17300: Steam and hot water; By-product classification allocatable product; pedigree (1,1,1,1,1)
  Net electricity generated from this waste and used in internal MSWI plant energy redistribution.
  Uncertainty: uncertainty is calculated from uncertainties in waste composition and uncertainties in energy efficiency and the uncertainty in internal energy demand
  production volume 6.35536e8 MJ
  property exergy 0.1842 MJ; name E_th_prod_MSWI_exergy
    This exergy property is based on the exergy content of the product.
  property price 0.0106 EUR2005; name E_th_prod_MSWI_price_EUR2005
    Average European district heat price from Ecoheatcool and Euroheat 2005-2006, Ecoheat Work package 1: The European heat market. Final report. 10.6 EUR/GJ i s the price of district heat. http://www.solarthermalworld.org/files/Ecoheatcool%20WP1%20Web.pdf?download
  property true value relation 0.1842; name E_th_prod_MSWI_true_value_relation
    property to calculate "true value" from
  property true value 3.74803e-6
    allocation property applied in "true value" allocation // value calculated from true value relation
- electricity, for reuse in municipal waste incineration only: 0 kWh; CPC 17100: Electrical energy; By-product classification allocatable product; pedigree (1,1,1,1,1)
  (same comment as for heat, for reuse in municipal waste incineration only)
  production volume 9.0408e7 kWh
  property price 0.1 EUR2005; name E_el_prod_MSWI_price_EUR2005
    Estimated to be the same price as in case of electricity, medium voltage.
  property exergy 3.6 MJ; name E_el_prod_MSWI_exergy
    This exergy property is based on the exergy content of the product.
  property true value relation 3.6; name E_el_prod_MSWI_true_value_relation
    property to calculate "true value" from
  property true value 1.04203e-5
    (same comment as for heat, for reuse in municipal waste incineration only)

## Inputs from technosphere
- waste plastic, mixture: 0 kg; name waste_plastic; pedigree (1,1,1,1,1)
  EcoSpold01Location=CH
  production volume 0 kg
    Calculated from the production volume of poultry manure, dried in proportion to the respective output amounts.
  property price 0 EUR2005; name waste_plastic_price_EUR2005
  properties: dry mass 0.847 kg, water content 0.180638, wet mass 1 kg, carbon content, fossil 0.747344
  note on carbon content, fossil: C content in 1 kg DM was calculated using data in Tab A.2, ecoinvent v2.2 report 13_I
- building, hall: 7.36941e-6 m2; lognormal variance with pedigree 0.3532, pedigree (2,3,5,5,1)
  EcoSpold01Location=CH
- electricity, low voltage: 0 kWh; pedigree (1,1,1,1,1)
  EcoSpold01Location=CH
- heat, central or small-scale, other than natural gas: 0 MJ; pedigree (1,1,1,1,1)
  EcoSpold01Location=CH
- poultry manure, fresh: 2.26642 kg; lognormal variance with pedigree 0.0532, pedigree (2,3,5,5,1)
  properties: water content 1.63158, dry mass 0.38 kg, wet mass 1 kg, carbon content, non-fossil 0.33389
- waste plastic, mixture: -0.000222466, -1.48643e-5, -1.12416e-6, -6.13949e-6, -2.48028e-6, -5.83002e-6, -0.000189551, -0.00155738 kg (8 entries); lognormal variance with pedigree 0.0532, pedigree (2,3,5,5,1)
  EcoSpold01Location=CH
  production volume 7.32741e8 kg
- electricity, low voltage: 0.00117535, 0.000206141, 0.0046753, 0.0167621, 0.00338979, 0.0512635, 0.00844987, 0.0240692 kWh (8 entries); lognormal variance with pedigree 0.0532, pedigree (2,3,5,5,1)
  EcoSpold01Location=CH
- heat, central or small-scale, other than natural gas: 0.00728531, 0.509673 MJ (2 entries); lognormal variance with pedigree 0.0532, pedigree (2,3,5,5,1)
  EcoSpold01Location=CH

## Inputs from nature
- Occupation, construction site [natural resource, land]: 5.52956e-5 m2*year; lognormal variance with pedigree 0.0932, pedigree (2,3,5,5,1)
- Transformation, to industrial area [natural resource, land]: 2.75978e-5 m2; lognormal variance with pedigree 0.1732, pedigree (2,3,5,5,1)
- Transformation, from pasture, man made [natural resource, land]: 2.75978e-5 m2; lognormal variance with pedigree 0.1732, pedigree (2,3,5,5,1)
- Occupation, industrial area [natural resource, land]: 0.00137989 m2*year; lognormal variance with pedigree 0.0932, pedigree (2,3,5,5,1)

## Emissions to nature
- Ammonia [air, urban air close to ground]: 0.000105991 kg; lognormal variance with pedigree 0.0932, pedigree (2,3,5,5,1)

## Sampling procedure
Data retrieved from a Swiss manufacturer, they are typical for the Swiss market.

## Extrapolations
none This dataset has been copied from an original dataset covering the geography CH. The uncertainty has been adjusted accordingly.

## Review by Maggie Osses 2004-04-01
Passed.
