# batter wheat mix production

Dataset: EcoSpold 2, unit process
Geography: RoW
Time period: 2011-01-01 to 2019-12-31
Technology level: current
Classification: ISIC rev.4 ecoinvent: 1061:Manufacture of grain mill products
Scenario: Business-as-Usual
System model: Allocation at the point of substitution
Generated by: [System]
Published in: Vázquez-Rowe, I. 2013
Database: ecoinvent
isCopyrightProtected: true
accessRestrictedTo: 1

## General comment
This activity represents the production of wheat mix for batter to produce fish sticks, also named fish fingers. The wheat is then grinded at a milling plant in to produce wheat flour. The flour is then freighted by truck to an ingredient and food additiove processing plant. The composition of the final wheat mix produced is: a) 80% wheat flour arriving from the mill i; b) less than 10% wheat starch ; c) less than 10% salt; d) less than 5% sunflower oil; e) pH regulators ; and f) less than 1% vitamins A and C. Kraft paper is used for packaging.

## Included activities start
Provision of raw materials, transport to mill and activities at the mill, including use of energy.

## Included activities end
The transport from the mill to the fish stick processing factory are not included.

## Technology
The technology corresponds with the current available techniques for processing wheat.

## Time period
Data are from 2011 and were reported by the company per 1 metric ton of final product.

## Reference product
- wheat flour mix: 1 kg; By-product classification allocatable product
  production volume 0.7108 kg; name ProdVol
    Assuming that worldwide GDP = 1
  property price 0.437944 EUR2005
    Calculated based on inputs: The price of the product has been calculated as a sum of the values of the material and energy inputs for this product. This value is therefore a rough estimation. It may underestimate the real price since there are additional expenses when producing any product. These expences can include for example labour costs, treatment of waste materials and profit for the producer. Please consider carefully whether this level of data quality is acceptable for your application. Cross checked
  property carbon content, fossil 0
    Carbon content fossil is considered zero in all agricultural products and by-products.
  property carbon content, non-fossil 0.475
    Biogenic carbon content of vegetation and vegetation processed products on a dry mass basis (47.5% DM) derived from FAOSTAT.
    Reference: http://www.fao.org/forestry/17111/en
  property carbon content 0.475
    carbon content on a dry matter basis (reserved; not for manual entry)
  property true value 0.0098187
    allocation property applied in "true value" allocation // value calculated from revenue
  properties: dry mass 0.87 kg, water content 0.149425, water in wet mass 0.13 kg, wet mass 1 kg, carbon allocation 0.41325 kg

## By-products
- heat, for reuse in municipal waste incineration only: 0 MJ; CPC 17300: Steam and hot water; By-product classification allocatable product; pedigree (1,1,1,1,1)
  Net electricity generated from this waste and used in internal MSWI plant energy redistribution.
  Uncertainty: uncertainty is calculated from uncertainties in waste composition and uncertainties in energy efficiency and the uncertainty in internal energy demand
  production volume 0.0110311 MJ
  property exergy 0.1842 MJ; name E_th_prod_MSWI_exergy
    This exergy property is based on the exergy content of the product.
  property price 0.0106 EUR2005; name E_th_prod_MSWI_price_EUR2005
    Average European district heat price from Ecoheatcool and Euroheat 2005-2006, Ecoheat Work package 1: The European heat market. Final report. 10.6 EUR/GJ i s the price of district heat. http://www.solarthermalworld.org/files/Ecoheatcool%20WP1%20Web.pdf?download
  property true value relation 0.1842; name E_th_prod_MSWI_true_value_relation
    property to calculate "true value" from
  property true value 2.75629e-11
    allocation property applied in "true value" allocation // value calculated from true value relation
- electricity, for reuse in municipal waste incineration only: 0 kWh; CPC 17100: Electrical energy; By-product classification allocatable product; pedigree (1,1,1,1,1)
  (same comment as for heat, for reuse in municipal waste incineration only)
  production volume 0.00155361 kWh
  property price 0.1 EUR2005; name E_el_prod_MSWI_price_EUR2005
    Estimated to be the same price as in case of electricity, medium voltage.
  property exergy 3.6 MJ; name E_el_prod_MSWI_exergy
    This exergy property is based on the exergy content of the product.
  property true value relation 3.6; name E_el_prod_MSWI_true_value_relation
    property to calculate "true value" from
  property true value 7.58678e-11
    (same comment as for heat, for reuse in municipal waste incineration only)

## Inputs from technosphere
All rows: source Vázquez-Rowe, I. 2013
- wastewater from vegetable oil refinery: -1.20428e-5 m3; name wastewater; lognormal variance with pedigree 0.0426, pedigree (1,1,5,5,1)
  Wastewater generated at the processing plant and sent to an industrial wastewater treatment plant shared by several companies.
  Uncertainty: Data reported directly by the processing plant for activities in 2011.
  production volume 0.7108 m3
    Assuming that worldwide GDP = 1
  property price 0 EUR2005; name wastewater_price_EUR2005
  properties: wet mass 1000 kg, carbon content, non-fossil 0.993118, dry mass 0.871801 kg, water content 1146.05
- vegetable oil, refined: 0.0249777 kg; lognormal variance with pedigree 0.0432, pedigree (1,1,5,5,2)
  Amount of sunflower oil used in the production of the wheat mix.
  Uncertainty: Data reported directly by the processing plant for activities in 2011.
  properties: carbon content, non-fossil 0.768, dry mass 1 kg, wet mass 1 kg
- wheat flour: 0.800178 kg; lognormal variance with pedigree 0.0438, pedigree (2,1,5,5,2)
  Main raw material used in the production of the wheat flour mix.
  Uncertainty: Data reported directly by the processing plant for activities in 2011.
  properties: digestable energy content 15.12 MJ/kg, water content 0.149425, wet mass 1 kg, carbon content, non-fossil 0.475, dry mass 0.87 kg
  note on digestable energy content: Weighted average based on breakdown of different wheat products produced for human consumption in South Africa and properties of each product (i.e. cake flour, self-raising flour, white bread flour, brown bread flour, industrial flour, whole wheat meal, and semolina). Breakdown calculated from the production figures from the SAGIS monthly production tables, retrieved online and properties for US consumer products also retrieved online (USDA, 2017). Reference(s): SAGIS (2017) Wheaten Products Manufactured per Month since July 2015, South African Grain Information Service. Available at: www.sagis.org.za. (Accessed Sept 2017); USDA (2017) USDA National Nutrient Database, United States Department of Agriculture Agricultural Research Service, Available at: https://ndb.nal.usda.gov/ndb/search/list. (Accessed October 2017).
  note on carbon content, non-fossil: Biogenic carbon content of vegetation and vegetation processed products on a dry mass basis (47.5% DM) derived from FAOSTAT. Reference: http://www.fao.org/forestry/17111/en
- sodium chloride, powder: 0.0499554 kg; lognormal variance with pedigree 0.0438, pedigree (2,1,5,5,2)
  Additive used in the production of the wheat flour mix.
  Uncertainty: Data reported directly by the processing plant for activities in 2011.
  properties: dry mass 1 kg, wet mass 1 kg
- maize starch: 0.0700268 kg; lognormal variance with pedigree 0.0438, pedigree (2,1,5,5,2)
  It is assumed that maize starch is used in this process, although the proceesing plant actually uses wheat starch.
  Uncertainty: Data reported directly by the processing plant for activities in 2011.
  properties: water content 0.162791, wet mass 1 kg, dry mass 0.86 kg, carbon content, non-fossil 0.46
  note on carbon content, non-fossil: C-content of starch is considered 46% on dry mass basis (from "Evolutionary and Biochemical Aspects", A.D. Kay and T. Vrede (in Global Ecology, 2010, Elsevier B.V., S.E. Jørgensen Ed.)).
- tap water: 0 kg; pedigree (1,1,1,1,1)
  Tap water directly in the processing plant
  Uncertainty: Data reported directly by the processing plant for activities in 2011.
  properties: dry mass 0.000337476 kg, wet mass 1 kg, water content 2962.17, carbon content, fossil 0.00178991
  note on carbon content, fossil: Bicarbonate content is 2.93 mol/m3. CO2 content is 0.1 mol/m3 (ecoinvent v2.2 report 8, Tab 93.1).
- heat, central or small-scale, natural gas: 0.000400981 MJ; lognormal variance with pedigree 0.0426, pedigree (1,1,5,5,1)
  Heat from natural gas used at the processing plant.
  Uncertainty: Data reported directly by the processing plant for activities in 2011.
- electricity, medium voltage: 0 kWh; pedigree (1,1,1,1,1)
  Electricity used at the processing plant.
  Uncertainty: Data reported directly by the processing plant for activities in 2011.
- tap water: 0.000315074, 0.00261748, 0.000520712, 0.0131303, 0.000341581, 0.000971622, 0.150257 kg (7 entries); lognormal variance with pedigree 0.0426, pedigree (1,1,5,5,1)
  (same comment as for tap water)
- electricity, medium voltage: 0.00125536, 0.000228422, 0.00387369, 0.0561645, 0.0080382, 0.0263364 kWh (6 entries); lognormal variance with pedigree 0.0426, pedigree (1,1,5,5,1)
  (same comment as for electricity, medium voltage)

## Emissions to nature
- Water [air, unspecified]: 0.156111 m3; source Vázquez-Rowe, I. 2013; lognormal variance with pedigree 0.0506, pedigree (4,1,5,5,1)
  Evaporated water at plant
  Uncertainty: Data reported directly by the processing plant for activities in 2011.

## Sampling procedure
No sampling was undergone. The data were directly provided by company technical staff.

## Extrapolations
This dataset can be used for battering of a wide range of food products.
