# refractory production, fireclay, packed

Dataset: EcoSpold 2, unit process
Geography: DE
Time period: 1999-01-01 to 2019-12-31
Technology level: current
Classification: ISIC rev.4 ecoinvent: 2391:Manufacture of refractory products
Classification: EcoSpold01Categories: construction materials/bricks
Synonyms: ceramics; lining
Tags: ConvertedDataset
Scenario: Business-as-Usual
System model: Allocation at the point of substitution
Generated by: Tina Künniger
Published in: Kellenberger D. 2007
Database: ecoinvent
isCopyrightProtected: true
accessRestrictedTo: 1

## General comment
This dataset represents the production of 1 kg of refractory fireclay bricks.
Includes the whole manufacturing process, internal processes (transport, etc.), packing and infrastructure. No administration is included.
Refractory fireclay. Image source:http://www.northrefractories.com/wp-content/uploads/2012/11/general-fireclay-brick-blast-furnace.jpg

## Included activities start
From chamotte and clay, at the factory gate.

## Included activities end
The activity ends with the packed product, at factory. This dataset includes the whole manufacturing process, internal processes (transport, etc.), packing and infrastructure. This dataset doesn't include the administration.

## Geography
German, European and global modules used as proxy. Manufacturing data from Germany for German module

## Technology
The typical German technology for refractory fireclay production.
For the production of one ton of fireclay refractory 1.1 ton of chamotte and additionally 10% of clay (0.1 ton) is required. This results in a total amount of 1.2 kg clay for 1 kg of fireclay refractory. The raw materials are fractionated in different coarse size groups and one or several flour components. The grains and flours are mixed in a certain share and a fixing agent (lime milk) is added. The mixture is pressed to bricks, which are baked at 1200 to 1800°C.
Chamotte is burned and milled clay.

## Parameters
- fraction, cooling water, recirculating system, to air: 0.771; name fraction_CW_R_to_air; lognormal variance with pedigree 0.0413, pedigree (2,3,1,3,1)
  Calculated based on literature value (Scown, C.D., 2011, Water Footprint of U.S. Transportation Fuels and supplying information of the article) (Vionnet, S., Quantis Water Database - Technical Report, 2012).
- fraction, cooling water, once-through system, to air: 0.004; name fraction_CW_OT_to_air; lognormal variance with pedigree 0.0413, pedigree (2,3,1,3,1)
  (same comment as for fraction, cooling water, recirculating system, to air)
- fraction, cooling water, cooling pond system, to air: 0.032; name fraction_CW_CP_to_air; lognormal variance with pedigree 0.0413, pedigree (2,3,1,3,1)
  (same comment as for fraction, cooling water, recirculating system, to air)
- fraction, cooling water, to air: 0.3875; name fraction_CW_to_air; = (0.5*fraction_CW_OT_to_air)+(0.5*fraction_CW_R_to_air); lognormal variance with pedigree 0.092025, pedigree (4,4,3,2,4)
  Calculated value based on literature value (see comments of the other parametres present in this dataset) and expert opinion. In the case when no industry/literature data are available about the type of cooling or directly fraction, cooling water, to air specific for the process a default assumption is applied. It is assumed that the once-through cooling system is used in 50% of all cases and recirculating system is used in another 50% of all cases.

## Reference product
- refractory, fireclay, packed: 1 kg; source Routschka G. and Granitzki K.-E. 1997; CPC 373: Refractory products and structural non-refractory clay products; By-product classification allocatable product
  Fireclay bricks have an Al2O3 content of 10 - 45 % according to ISO 1109. They are manufactured from chamotte and bonding-clay mixtures. The limit of 45 % Al2O3 represents the maximum Al2O3 content of the clay mineral with aluminium oxide (i.e., ignited kaolinite). The amounts of bonding clay and added water vary a factor that largely determines both the subsequent forming process (plastic, semidry, dry shaping) and the properties of the resulting fired bricks. Low-aluminium oxide or siliceous fireclay bricks may contain as additives granular SiO2 raw materials. Variation of the clays, grogs, and grain sizes permits the production of numerous brick types. Fireclay bricks contain up to ca. 3 % Fe2O3 (for low-iron bricks, <1%), ca. 3 % TiO2, <1% CaO + MgO, and alkali oxides, mainly K2O (c. 3.5%) and Na2O (usually <0.25%). High-quality bricks include <0.5% Na2O + K2O.
  Mullite, cristobalite, and/or quartz and a glassy phase (composition: ca. 80% SiO2, 10% Al2O3, the rest fluxes, mainly alkalies) are the usual components of fireclay bricks. The mullite content is generally proportional to the Al2O3 content of the bricks. The amount of cristobalite (0 - 25%) and of the glassy phase (20 - 60%) depends largely on the content of alkali oxides, which can be deduced from the phase diagram Al2O3 - SiO2 - K2O. With rising temperature, cristobalite dissolves in the glassy phase, increasing the amount of melt. On cooling, the cristobalite again crystallises to a greater or lesser extent from the melt. The amount of residual quartz depends on the firing temperature and the grain size of the quartz.
  The resulting highly viscous melt enhances both sintering and densification of the brick texture on firing. A high firing temperature is necessary with a low alkali content to produce a low-porosity brick. Otherwise the glassy phase begins to soften at about 950 °C, imparting a wide softening range under load.
  Attack by slag on fireclay bricks normally occurs in relatively small reaction zones; wear progresses by erosion of the resulting highly viscosity reaction zone. In contact with glass melts, alkali migrates into the brick texture and the bricks are slowly dissolved in the glass melt. Other forms of damage include alkali bursting (for bricks with > ca. 35% Al2O3), CO disintegration, and thermal spalling (dense bricks).
  The main applications of fireclay refractory are general furnace constructions, blast furnaces and hot-blast stoves, foundries, furnaces for the non-ferrous-metal industry, coke ovens, glass industry, and cement industry.
  EcoSpold01Location=DE
  production volume 3.12465e8 kg; = 568118*1000*0.66/1.2
    Estimated value. Values for clay and kaolin production in Germany are retrieved from Eurostat (http://ec.europa.eu/eurostat, accessed 08.02.2016) for the year 2014. Following the commodities are listed with their Prodcom codes, Prodcom name and production volume for EU 28 in tons: 08122210 “Bentonite” 358844 tons (in Eurostat this values is confidential the estimate is from the European mineral statistics 2009-2013 (http://www.bgs.ac.uk/mineralsuk/statistics/europeanStatistics.html, accessed 08.02.2016), 08122230 “Fireclay” 568118 tons, 08122250 “Common clays and shales for construction use (excluding bentonite, fireclay, expanded clays, kaolin and kaolinic clays); andalusite, kyanite and sillimanite; mullite; chamotte or dinas earths” 3627503 tons, and 08122160 “Kaolinitic clays (ball and plastic clays)” 435353 tons. According to the European mineral statistics 2009-2013 (http://www.bgs.ac.uk/mineralsuk/statistics/europeanStatistics.html, accessed 08.02.2016), Europe (EU36) produces 9.1Mt of Kaolin, which is 34.5% of World production, of which 47.8% (16% of all World production) comes from Germany. The largest producer in 2013 was US with 23%, China represented the 12%, Brazil 8%, and Iran 6%. The European mineral statistics values are used for both Europe and the World estimates. The same source reports for EU36 Bentonite production of 2.73 Mt for 2013, which represents the 16.4% of World production. The values for Europe matches the values indicated from Eurostat. Germany produces 13.1% of Europe’s bentonite 358844 tons. The volume of produced clay is assigned to the different activities based on USGS (2015) estimates of uses in the USA (http://minerals.usgs.gov/minerals/pubs/commodity/clays/mcs-2015-clays.pdf, accessed 08.02.2016) and according to input of clay per reference product. Of common clay, 39% is used for brick (for which 50% is assumed to be used for clay bricks and 50% light clay bricks), 23% lightweight aggregate, 31% cement, and 7% other uses (USGS specifies that 9% of common clay is used for lightweight concrete block production in the 2013 Minerals yearbook http://minerals.usgs.gov/minerals/pubs/commodity/clays/myb1-2013-clays.pdf, accessed 08.02.2016). Of ball clay, 39% is used for floor and wall tiles, 17% sanitary ware, and 44% other uses. Of bentonite 26% absorbents, 24% drilling mud, 15% foundry sand bond (assumed to represent plaster clay), 11% iron ore pelletising, and 24% other uses. Of fire clay, 34% for heavy clay products, and 66% for refractory and other products. Of fuller’s earth, 70% absorbents, and 30% for other uses. The US produce 15 to 25 % of refined clays (without common clay and shale).
  property price 0.63 EUR2005
    UN import prices. From UN trade database. Category: 'Refractory bricks, etc with >50% Mg, Ca or Cr as oxid.'
  property carbon content 0
    carbon content on a dry matter basis (reserved; not for manual entry)
  property true value 0.63
    allocation property applied in "true value" allocation // value calculated from revenue
  properties: dry mass 1 kg, wet mass 1 kg, carbon content, non-fossil 0, water content 0, carbon content, fossil 0, water in wet mass 0 kg, carbon allocation 0 kg

## By-products
- heat, for reuse in municipal waste incineration only: 0 MJ; CPC 17300: Steam and hot water; By-product classification allocatable product; pedigree (1,1,1,1,1)
  Net electricity generated from this waste and used in internal MSWI plant energy redistribution.
  Uncertainty: uncertainty is calculated from uncertainties in waste composition and uncertainties in energy efficiency and the uncertainty in internal energy demand
  production volume 4.42582e6 MJ
  property exergy 0.1842 MJ; name E_th_prod_MSWI_exergy
    This exergy property is based on the exergy content of the product.
  property true value relation 0.1842; name E_th_prod_MSWI_true_value_relation
    property to calculate "true value" from
  property price 0.0106 EUR2005; name E_th_prod_MSWI_price_EUR2005
    Average European district heat price from Ecoheatcool and Euroheat 2005-2006, Ecoheat Work package 1: The European heat market. Final report. 10.6 EUR/GJ i s the price of district heat. http://www.solarthermalworld.org/files/Ecoheatcool%20WP1%20Web.pdf?download
  property true value 9.37769e-5
    allocation property applied in "true value" allocation // value calculated from true value relation
- iron scrap, sorted, pressed: 0 kg; By-product classification Recyclable; CPC 39310: Slag, dross, scalings and other waste from the manufacture of iron or steel; pedigree (1,1,1,1,1)
  Iron scrap recovered from this waste.
  Uncertainty: uncertainty calculated from uncertainty in waste composition, uncertainty of share of recyclable metal, uncertainty of transfer coefficient to bottom ash, uncertainty of the efficiency of scrap removal in MSWI plant.
  production volume 15202.9 kg
  property price 0.175 EUR2005
    Temporary price data. Calculated as 90% of purchasers price based on: 2005 import and export prices (total trades (USD) divided by total weight (kg) in biggest economies of the world: EU27, USA, Brasil, China, India, Japan and Russia) from UN Commodity Trade Statistics Database (http://data.un.org/Explorer.aspxDatabase [Accessed 2011.06.20]). Commodity: Waste or scrap, of cast iron
  property carbon content 0
    carbon content on a dry matter basis (reserved; not for manual entry)
  property true value 8.51456e-6
    allocation property applied in "true value" allocation // value calculated from revenue
  properties: dry mass 1 kg, water content 0, carbon content, non-fossil 0, water in wet mass 0 kg, carbon content, fossil 0, wet mass 1 kg, carbon allocation 0 kg
- electricity, for reuse in municipal waste incineration only: 0 kWh; CPC 17100: Electrical energy; By-product classification allocatable product; pedigree (1,1,1,1,1)
  (same comment as for heat, for reuse in municipal waste incineration only)
  production volume 599143 kWh
  property exergy 3.6 MJ; name E_el_prod_MSWI_exergy
    This exergy property is based on the exergy content of the product.
  property true value relation 3.6; name E_el_prod_MSWI_true_value_relation
    property to calculate "true value" from
  property price 0.1 EUR2005; name E_el_prod_MSWI_price_EUR2005
    Estimated to be the same price as in case of electricity, medium voltage.
  property true value 0.000248111
    (same comment as for heat, for reuse in municipal waste incineration only)
- iron scrap, unsorted: 0 kg; source European Aluminium Association 2008; CPC 39310: Slag, dross, scalings and other waste from the manufacture of iron or steel; By-product classification Recyclable; pedigree (1,1,1,1,1)
  production volume 2.14626 kg
  property price 0.149 EUR2005; name ironScrapAmount_price_EUR2005
    Temporary price data. Calculated as 90% of purchasers price based on: estimated at 85% of sorted scrap
  property carbon content 0
    carbon content on a dry matter basis (reserved; not for manual entry)
  property true value 1.02345e-9
    allocation property applied in "true value" allocation // value calculated from revenue
  properties: water in wet mass 0 kg, water content 0, carbon content, fossil 0, carbon content, non-fossil 0, dry mass 1 kg, wet mass 1 kg, carbon allocation 0 kg
- aluminium oxide, non-metallurgical: 0 kg; source European Aluminium Association 2008; CPC 41432: Alumina (aluminium oxide), except artificial corundum; By-product classification allocatable product; CAS 1344-28-1; pedigree (1,1,1,1,1)
  production volume 135.056 kg
  property carbon content, non-fossil 0; name C_content_non_fossil
  property price 0.28 EUR2005; name Al2O3Amount_price_EUR2005
    From UN trade database. http://data.un.org/ Import data from the largest economies of the world are used (Brazil, India, USA, China, Japan and EU-27).
  property dry mass 1 kg; name DM
  property water content 0; name water_content
  property wet mass 1 kg; name WM
  property water in wet mass 0 kg; name WWM
  property carbon content, fossil 0; name C_content_fossil
  property carbon content 0
    carbon content on a dry matter basis (reserved; not for manual entry)
  property true value 1.21024e-7
    allocation property applied in "true value" allocation // value calculated from revenue
  properties: carbon allocation 0 kg
- aluminium, cast alloy: 0 kg; source European Aluminium Association 2008; By-product classification allocatable product; CPC 41431: Unwrought aluminium; pedigree (1,1,1,1,1)
  EcoSpold01Location=RER
  production volume 1262.47 kg
  property price 1.3 EUR2005; name castAlloyAmount_price_EUR2005
    Temporary price data. Calculated as 90% of purchasers price based on: Source: London Metal Exchange, Aluminium alloy price for 2005
  property carbon content 0
    carbon content on a dry matter basis (reserved; not for manual entry)
  property true value 5.25248e-6
    allocation property applied in "true value" allocation // value calculated from revenue
  properties: water in wet mass 0 kg, carbon content, non-fossil 0, water content 0, dry mass 1 kg, carbon content, fossil 0, wet mass 1 kg, carbon allocation 0 kg
- aluminium, wrought alloy: 0 kg; source European Aluminium Association 2008; By-product classification allocatable product; CPC 4153: Semi-finished products of aluminium or aluminium alloys; pedigree (1,1,1,1,1)
  production volume 552.687 kg
  property price 1.44 EUR2005; name secondaryAluminiumOutput_price_EUR2005
    Estimated based on literature values and expert judgement. Aluminium ccast alloys are about 90% of the price of aluminium wrought alloys.
  property carbon content 0
    carbon content on a dry matter basis (reserved; not for manual entry)
  property true value 2.54707e-6
    allocation property applied in "true value" allocation // value calculated from revenue
  properties: wet mass 1 kg, water content 0, carbon content, fossil 0, water in wet mass 0 kg, carbon content, non-fossil 0, dry mass 1 kg, carbon allocation 0 kg
- copper: 0 kg; source Rentz O. 1999; By-product classification allocatable product; CPC 41413: Refined copper and copper alloys, unwrought; master alloys of copper
  Literature value. Copper uses: Before end-use copper is manufactured into semi fabricated products, such as shapes and ingots (known as 'semis'). These manufacturing processes are subdivided into hot working, cold working and, if necessary, process annealing. Few of the semis are ready for use as such. They more typically travel to first-stage manufacturers, who make metal rods, wire, and casting, and then to component manufacturers who produce such things as motors, valves, and insulated cables The components in turn are incorporated by final-stage manufacturers into a variety of finished products - automobiles, commercial buildings, residential housing, and so forth. These uses account for about 79% of the world-wide consumption of copper.
  production volume 146.066 kg
  property price 5.52 EUR2005
    Literature value (http://www.economist.com/news/business/21576714-mining-industry-has-enriched-chile-its-future-precarious-copper-solution). Average price between 20015 and 2013.
  property carbon content 0
    carbon content on a dry matter basis (reserved; not for manual entry)
  property true value 2.58039e-6
    allocation property applied in "true value" allocation // value calculated from revenue
  properties: dry mass 1 kg, water in wet mass 0 kg, wet mass 1 kg, carbon content, non-fossil 0, water content 0, carbon content, fossil 0, carbon allocation 0 kg
- zinc concentrate: 0 kg; CPC 14290: Other non-ferrous metal ores and concentrates (other than uranium or thorium ores and concentrates); By-product classification allocatable product
  Calculated value from the knowledge of the properties of both products.
  production volume 1.15936e-7 kg
  property price 0.38 EUR2005; name ByP_price_EUR2005
    Temporary price data. Calculated as 90% of purchasers price based on: Zinc content in concentrate 53%. Concentrate price per kg Zn 86.5% of refined Zn price (13.5% treatment charges according to CHR Metals Limited 2005: Dynamic cost curves. http://www.minecost.com/dynamic.pdf). 2004 zinc price from USGS (2007) Mineral commodity summaries 2007. <http://minerals.usgs.gov/minerals/pubs/mcs/2007/mcs2007.pdf> [Accessed 25 May 2010]
  property zinc content 0.53; name zinc_C_zinc_concentrate
    Zinc content on a dry matter basis. Value taken from teh "zinc mine operation" /GLO dataset.
  property dry mass 1 kg; name DM_zinc_concentrate
  property carbon content 0
    carbon content on a dry matter basis (reserved; not for manual entry)
  property true value 1.40994e-16
    allocation property applied in "true value" allocation // value calculated from revenue
  properties: wet mass 1 kg, water content 0, carbon content, non-fossil 0, carbon content, fossil 0, water in wet mass 0 kg, carbon allocation 0 kg

## Inputs from technosphere
- lubricating oil: 1.30925e-5 kg; source Bruck, M. 1996; lognormal variance with pedigree 0.138025, pedigree (1,5,5,2,4)
  EcoSpold01Location=RER
  Literature value. Data was obtained from the "brick production" dataset.
  properties: carbon content, fossil 0.75, wet mass 1 kg, dry mass 1 kg
  note on carbon content, fossil: Lubricating oil is produced from diesel. C-content/dry mass of fats and oils considered 75%, from: ecoinvent v2.2 report, n 15a, pg 40
- electricity, medium voltage: 0.238863 kWh; lognormal variance with pedigree 0.0526, pedigree (2,4,5,1,1)
  EcoSpold01Location=DE
  Estimation, based on personal communication from one company in Germany for the year 1999.
- diesel, burned in building machine: 1.99885 MJ; lognormal variance with pedigree 0.052625, pedigree (2,4,5,2,1)
  Estimation. Diesel is used for internal transports. As no data was available, the amount assumed was between the amount of the other refractory bricks datasets (high aluminium oxide refractory and basic refractory).
  EcoSpold01Location=GLO
- heat, district or industrial, natural gas: 10.2541 MJ; lognormal variance with pedigree 0.052625, pedigree (2,4,5,2,1)
  Estimation, based on personal communication from one company in Germany for the year 1999.
  EcoSpold01Location=RER
- municipal solid waste: -0.00499714 kg; lognormal variance with pedigree 0.0527, pedigree (2,4,5,3,1)
  Estimation. Primarily wood pallets and used oil are treated.
  EcoSpold01Location=CH
  production volume 1.56232e6 kg; = (Ref('fe65a3d9-6df6-4db6-80cf-6309f99ed6b9')*-1)* Ref('89defc35-c1cf-4714-a2a0-75c181e1e23b', 'ProductionVolume')/ABS( Ref('89defc35-c1cf-4714-a2a0-75c181e1e23b'))
    Calculated from the production volume of refractory, fireclay, packed in proportion to the respective output amounts.
  properties: carbon content, non-fossil 0.261655, carbon content, fossil 0.171549, wet mass 1 kg, dry mass 0.771 kg, water content 0.297017
  note on carbon content, non-fossil: MSW composition in tab 4.1, ecoinvent v2.2 report 13_I. C content referred to 1 kg DM
- clay pit infrastructure: 1.99885e-11 unit; lognormal variance with pedigree 0.4381, pedigree (1,5,5,3,4)
  EcoSpold01Location=CH
  Proxy. Clay pit infrastructure is used as proxy. The amount has been copied from land-use "brick production". A production volume of 1.000.000 kg/year and a production time of 50 years are assumed.
- lime, hydrated, packed: 0.0149914 kg; lognormal variance with pedigree 0.0527, pedigree (2,4,5,3,1)
  EcoSpold01Location=CH
  Estimation, based on personal communication from one company in Germany for the year 1999.
  properties: wet mass 1 kg, dry mass 0.997 kg, water content 0.00300903
- clay: 1.19931 kg; lognormal variance with pedigree 0.0527, pedigree (2,4,5,3,1)
  EcoSpold01Location=CH
  Proxy. Chamotte and clay are used as inputs. Chamotte is burned and milled clay, and clay is used as proxy.
  Estimation, based on personal communication from one company in Germany for the year 1999.
  properties: water content 0.0362694, dry mass 0.965 kg, wet mass 1 kg
- packing, clay product: 0.999427 kg; lognormal variance with pedigree 0.0507, pedigree (3,5,5,3,1)
  Estimation. The packing of 1 kg of product is considered.
  EcoSpold01Location=CH
- industrial machine, heavy, unspecified: 0.000166904 kg; lognormal variance with pedigree 0.422025, pedigree (5,4,5,2,1)
  EcoSpold01Location=RER
  Estimation. The infrastructure of all machines are considered. A production volume of 1.000.000 kg/year, a weight of 50t and a lifetime of 30 years are assumed.

## Inputs from nature
- Water, cooling, unspecified natural origin [natural resource, in water]: 1.99885e-5 m3; name water_cooling_UNO_input; lognormal variance with pedigree 0.052625, pedigree (2,4,5,2,1)
  Estimation, based on personal communication from one company in Germany for the year 1999. Process and cooling water is used in the process.

## Emissions to nature
- Water [air, unspecified]: 7.74556e-6 m3; name water_to_air_unspecified; = (water_cooling_UNO_input*fraction_CW_to_air); lognormal variance with pedigree 0.0807, pedigree (2,2,5,1,1)
  Calculated value based on literature values and expert opinion. See comments in the parametres' comment field.
  property fraction, origin: salt water 0; name fraction_origin_salt_water
  property fraction, origin: unspecified 1; name fraction_origin_unspecified
  property fraction, origin: fresh water 0; name fraction_origin_fresh_water
- Water [water, unspecified]: 1.2243e-5 m3; name water_to_water_unspecified; = water_cooling_UNO_input*(1-fraction_CW_to_air); lognormal variance with pedigree 0.0807, pedigree (2,2,5,1,1)
  (same comment as for Water)
  property fraction, origin: fresh water 0; name fraction_origin_fresh_water_Ww
  property fraction, origin: salt water 0; name fraction_origin_salt_water_Ww
  property water in wet mass 1000 kg; name WWM
  property dry mass 0 kg; name DM
  property fraction, origin: unspecified 1; name fraction_origin_unspecified_Ww
  property carbon content, fossil 0; name C_content_fossil
  property carbon content, non-fossil 0; name C_content_non_fossil
  property wet mass 1000 kg; name WM

## Sampling procedure
Measured data of one German plant

## Review by Roland Hischier 2011-09-22
Transfer of documentation done.

## Review by Roberto Dones 2003-08-06
passed
