# electricity production, hard coal

Dataset: EcoSpold 2, unit process
Geography: IN-JH
Time period: 1980-01-01 to 2019-12-31
Technology level: modern
Classification: ISIC rev.4 ecoinvent: 3510:Electric power generation, transmission and distribution
Classification: EcoSpold01Categories: hard coal/power plants
Synonyms: anthracite; coking coal; other bituminous coal
Tags: India; hard coal power; fossil fuels; coal power
Scenario: Business-as-Usual
System model: Allocation at the point of substitution
Generated by: Muhammed Noor Hossain
Published in: Hossain, Muhammed Noor 2016
Database: ecoinvent
isCopyrightProtected: true
accessRestrictedTo: 1

## General comment
This dataset represents the production of high voltage electricity in an average hard coal power plant in India - Jharkhand (a state/union territory in India) in 2012. 'Hard coal' includes anthracite, coking coal and other bituminous coal according to the definition of the IEA electricity information 2014. According to the Indian Energy Statistics, coals with a gross calorific value (moist, ash-free basis) which is not less than 24 MJ/kg or which is less than 24 MJ/kg provided that the coal has a vitrinite mean random reflectance greater than or equal to 0.6 per cent is considered as hard coal (CSO, 2015). This dataset is created as a child of the global dataset, i.e. some of the values are inherited from the global dataset and some are country-specific. Following values are edited, because they are country specific: the annual production volume, input of fuel, thermal efficiency of the power plant, emissions of CO2, CO, CH4, NO2, SO2, NMVOC, and Particulates.
Parameter data were used as an average value to represent a state/union territory. This average values are collected from Guttikunda and Jawahar 2014.
Comments on the inventory data of emissions:
Emission data, like parameter data, were used as an average value to represent a state/unioin territory. CO2, SOx, NOx, CO, CH4, VOC and Particulate Matter (PM) emission data were calculated using India specific parameter data (emission factor and input of fuel). All the other emissions were production-weighted averages of the figures in the datasets in ecoinvent version two, which are valid for the following 14 countries: AT, BE, ES, FR, IT, NL, PT, DE, CZ, HR, PL, SK, CN, US.
- The size distribution of particle emissions has been derived from German data.
- Halogene emissions have been estimated on the basis of the content of the species in the country-specific coal input mix, assuming average retention rates.
Indian hard coal electricity plants usually do not use De-SOx and De-NOx filter technologies. Therefore, the SOx retained and NOx retained exchanges in the inventory have been set to 0.
Emission of uranium and thorium radioactive isotopes were assumed proportional to the corresponding element emitted with particles; the other non-gaseous radioactive isotopes of the uranium and thorium decay chain were assumed proportional to the emitted U-238 or Th-232.
The emission of gaseous radon and K-40 are taken from the literature.
Sources:
IEA. 2014. Electricity Information 2014. ISBN 978-92-64-21692-1. International Energy Agency (IEA), Paris Cedex (FR)
European Environment Agency (1991) CORINAIR Inventory; VOC's Default Emission Factors
Guttikunda, S. K., & Jawahar, P. (2014). Atmospheric emissions and pollution from the coal-fired thermal power plants in India. Atmospheric Environment(92), 449-460
Dones, R., Bauer, C., Röder, A. (2007) Kohle. In: Dones, R. (Ed.) et al., Sachbilanzen von Energiesystemen: Grundlagen für den ökologischen Vergleich von Energiesystemen und den Einbezug von Energiesystemen in Ökobilanzen für die Schweiz. Final report ecoinvent No.
CSO (2015). Energy Statistics. Central Statistics Office, Government of India.
[This dataset is meant to replace the following datasets:
- electricity production, hard coal, IN, 1980 - 2015]

## Included activities start
From the constructed hard coal power plant ready to produce electricity.
From reception of hard coal and operating materials at power plant gate.

## Included activities end
This activity ends with 1kWh of high voltage electricity produced at the power plant and arrived at the busbar.

This dataset includes:
- all operation and maintenance activities and materials of the power plants.
- Use of fuel oil for startup
- Particle removal (dedusting of the flue gas)

- Desulfurisation and denitrification. These processes are described in separate modules; it can be decided by changing the values of NOx and SOx retained whether and how much DeNOx and DeSOx are installed.
- Cooling: It is assumed that all plants use wet cooling with a cooling tower. No cooling tower is included in this dataset (will be implemented in future versions)
- Loss of feed water

This dataset doesn't include
- raw materials extraction, decommissioning and waste treatment as these activities are already included in the infrastructure datasets
- transformation of the electricity produced
- The disposal of non-recycled ashes is modelled separately.

## Technology
POWER PLANT:
Hard coal power plant input is a market mix of 100MWe power plants (representing all power plants with a capacity <250MWe and 7% of the installed capacity) and 500MWe power plants (representing all power plants with a capacity >250MWe and 93% of the installed capacity). The plants are used for middle load with 4000 hours of operation at full capacity per year. The plants are assumed to operate 150000 hours during its lifetime.

## Time period
The Annual Production Volume data for the period 01.04.2012 - 31.03.2013.

## Parameters
- net calorific value: 19.259 MJ/kg; name net_cal_value; lognormal variance with pedigree 0.003325, pedigree (3,2,1,2,2)
  Literature Value. Net calorific value of hard coal is extracted from ( Indian Energy Statistics 2015). Energy Statistics. Central Statistics Office, Government of India, page 75 retrieved on Dec 7, 2016 from http://www.indiaenvironmentportal.org.in/files/file/Energy_stats_2015_0.pdf.
- gross electricity production: 2.00274e10 kWh; name gross_electricity; lognormal variance with pedigree 0.003325, pedigree (3,2,1,2,2)
  Literature and calculated value. Annual production volume data were extracted from the annual thermal electricity generation report of Central Electricity Authority, India (CEA, 2013). The Annual Production Volume is for the time period of 01.04.2012 - 31.03.2013 since CEA documents annual electricity production data for the mentioned time period.
  CEA. (2013). Region Wise, State Wise, Sector Wise, Type Wise, Station Wise, Unit Wise Generation Report For 31-Mar-2013. Central Electricity Authority (CEA). Retrieved from 04 December, 2016 http://cea.nic.in/reports/daily/dgr/2013/March/31/dgr2.pdf
- efficiency: 0.249234 dimensionless; = 3.6/ factor_MJ_kWh; lognormal variance with pedigree 0.003325, pedigree (3,2,1,2,2)
  Calculated value. Efficiency is calculated as 1*3.6/input of fuel for the production of 1 kWh.
- factor: input of MJ for the production of 1 kWh: 14.4443 MJ/kWh; name factor_MJ_kWh; = hard_coal* net_cal_value; undefined min 11.1801, max 11.1801, standardDeviation95 0, pedigree (3,2,1,2,2)
  Calculated value. Calculated as a product of hard coal consumption and net calorific value (19.259 MJ/kg) of the fuel. State/Union territory wise fuel consumption data were extracted from (Guttikunda and Jawahar 2014) and net alorific value of hard coal is extracted from ( Indian Energy Statistics 2015). Guttikunda, S. K., & Jawahar, P. (2014). Atmospheric emissions and pollution from the coal-fired thermal power plants in India. Atmospheric Environment (92), 449-460. CSO. 2015. Energy Statistics. Central Statistics Office, Government of India, page 75 retrieved on Dec 7, 2016 from http://www.indiaenvironmentportal.org.in/files/file/Energy_stats_2015_0.pdf.
- losses from gross electricity production: 0.08 dimensionless; name losses_gross_net; lognormal variance with pedigree 0.003225, pedigree (3,1,1,2,2)
  Literature value. Own use of electricity plants in this State/Union Territory in 2012. The default loss as described by the CEA CO2 Baseline Database for the Indian Power Sector is applied, which is 8%. CEA. (2014). CO2 Baseline Database for the Indian Power Sector. User Guide, Ministry of Power, Government of India, New Delhi. Retrieved 12 04, 2016, from http://cea.nic.in/reports/others/thermal/tpece/cdm_co2/user_guide_ver10.pdf
  Uncertainty: Generic IEA value used.
- fraction, water, completely softened, to air: 0.15; name fraction_WCS_to_air; = fraction_PW_to_air; lognormal variance with pedigree 0.092025, pedigree (4,4,3,2,4)
  Calculated value. See comment in the other parametres present in this dataset. Water, completely softened is considered to be always used as process water, thus process water fractions to air are applied to all water, completely softened input flows to calculate the amount of water consumed in the processes.
  nan
- fraction, water, decarbonised, to air: 0.0299662; name fraction_WDC_to_air; = fraction_CW_to_air; lognormal variance with pedigree 0.092025, pedigree (4,4,3,2,4)
  Calculated value. See comments in the other parametres present in this dataset. Decarbonised water is considered to be always used as cooling water, thus cooling water fractions to air are applied to all carbonised water input flows to calculate the amount of water consumed in the processes.
  nan
- once-through and cooling pond cooling systems as a fraction of all cooling syste: 0.625 dimensionless; name once_through_andCP_CS_fractio_from_allCS; lognormal variance with pedigree 0.092025, pedigree (4,4,3,2,4)
  Calculated as an average of data available for Europe (Floerke, 2008, Future changes of freshwater needs in the electricity production sector) and USA (NERL, 2011, Estimating freshwater needs to meet future thermoelectric generation requirements).
  nan
- water consumption, electricity production from hard coal, recirculating CS: 0.0018 m3/kWh; name WConsumption_EP_HC_recirculatingCS; lognormal variance with pedigree 0.092025, pedigree (4,4,3,2,4)
  Estimated based on literature (Scown, 2011, Water Footprint of U.S. Transportation Fuels, SI). The amount of water consumed while burning lignite and peat is assumed to be the same as in case of coal.
  nan
- water withdrawal, electricity production from hard coal, recirculating CS: 0.0021 m3/kWh; name WWithdrawal_EP_HC_recirculating_CS; lognormal variance with pedigree 0.092025, pedigree (4,4,3,2,4)
  Estimated based on literature (Scown, 2011, Water Footprint of U.S. Transportation Fuels, SI). The amount of water withdrawn while burning lignite and peat is assumed to be the same as in case of coal.
  nan
- fraction, cooling water, to air: 0.0299662; name fraction_CW_to_air; = (WConsumption_EP_HC_recirculatingCS*recirculating_CS_fraction_from_allCS+WConsumption_EP_HC_once_through_andCP_CS*once_through_andCP_CS_fractio_from_allCS)/(WWithdrawal_EP_HC_recirculating_CS*recirculating_CS_fraction_from_allCS+WWithdrawal_EP_HC_once_through_andCP_CS*once_through_andCP_CS_fractio_from_allCS); lognormal variance with pedigree 0.092025, pedigree (4,4,3,2,4)
  Calculated
  nan
- water withdrawal, electricity production from hard coal, once-through and coolin: 0.0815 m3/kWh; name WWithdrawal_EP_HC_once_through_andCP_CS; lognormal variance with pedigree 0.092025, pedigree (4,4,3,2,4)
  (same comment as for water withdrawal, electricity production from hard coal, recirculating)
- water consumption, electricity production from hard coal, once-through and cooli: 0.0014 m3/kWh; name WConsumption_EP_HC_once_through_andCP_CS; lognormal variance with pedigree 0.092025, pedigree (4,4,3,2,4)
  (same comment as for water consumption, electricity production from hard coal, recirculatin)
- recirculating cooling system as a fraction of all cooling systems: 0.375 dimensionless; name recirculating_CS_fraction_from_allCS; lognormal variance with pedigree 0.092025, pedigree (4,4,3,2,4)
  (same comment as for once-through and cooling pond cooling systems as a fraction of all coo)
- fraction, process water, to air: 0.15 dimensionless; name fraction_PW_to_air; lognormal variance with pedigree 0.092025, pedigree (4,4,3,2,4)
  Literature value. In case when no industry/process specific data are available, default evaporation fraction value is used. This value is 15% and is based on literature (Statistics Canada, 2007 & Shaffer, K.H., 2008, Consumptive water use in the Great Lakes Basin, USGS & Shiklomanov, 2003, World Water Resources at the Beginning of the 21st Century) and has been approved by an expert.
  nan

## Reference product
- electricity, high voltage: 1 kWh; name electricity; CPC 17100: Electrical energy; By-product classification allocatable product
  production volume 1.84252e10 kWh; name electricity_apv; = gross_electricity*(1- losses_gross_net)
    Literature and calculated value. Annual production volume data were extracted from the annual thermal electricity generation report of Central Electricity Authority, India (CEA, 2013). The Annual Production Volume is for the time period of 01.04.2012 - 31.03.2013 since CEA documents annual electricity production data for the mentioned time period.
  property price 0.0977 EUR2005
    Temporary price data. Calculated as 90% of purchasers price based on: 94% of the average price (to account for a 6% loss in transformation and transmission) for electricity for industrial consumersin 2005 (excluded taxes). From IEA.
  property true value 0.0977; name electricity_true_value
    allocation property applied in "true value" allocation // value calculated from revenue

## By-products
- heat, for reuse in municipal waste incineration only: 0 MJ; CPC 17300: Steam and hot water; By-product classification allocatable product; pedigree (1,1,1,1,1)
  Net electricity generated from this waste and used in internal MSWI plant energy redistribution.
  Uncertainty: uncertainty is calculated from uncertainties in waste composition and uncertainties in energy efficiency and the uncertainty in internal energy demand
  production volume 604.647 MJ
  property exergy 0.1842 MJ; name E_th_prod_MSWI_exergy
    This exergy property is based on the exergy content of the product.
  property price 0.0106 EUR2005; name E_th_prod_MSWI_price_EUR2005
    Average European district heat price from Ecoheatcool and Euroheat 2005-2006, Ecoheat Work package 1: The European heat market. Final report. 10.6 EUR/GJ i s the price of district heat. http://www.solarthermalworld.org/files/Ecoheatcool%20WP1%20Web.pdf?download
  property true value relation 0.1842; name E_th_prod_MSWI_true_value_relation
    property to calculate "true value" from
  property true value 2.15862e-10
    allocation property applied in "true value" allocation // value calculated from true value relation
- electricity, for reuse in municipal waste incineration only: 0 kWh; CPC 17100: Electrical energy; By-product classification allocatable product; pedigree (1,1,1,1,1)
  (same comment as for heat, for reuse in municipal waste incineration only)
  production volume 85.1572 kWh
  property true value relation 3.6; name E_el_prod_MSWI_true_value_relation
    property to calculate "true value" from
  property price 0.1 EUR2005; name E_el_prod_MSWI_price_EUR2005
    Estimated to be the same price as in case of electricity, medium voltage.
  property exergy 3.6 MJ; name E_el_prod_MSWI_exergy
    This exergy property is based on the exergy content of the product.
  property true value 5.94168e-10
    (same comment as for heat, for reuse in municipal waste incineration only)

## Inputs from technosphere
- water, decarbonised: 2.88885 kg; name water_decarbonised_user; = factor_MJ_kWh*0.2; lognormal variance with pedigree 0.054, pedigree (4,5,4,5,3)
  Literature value/calculated value. Cooling water, decarbonised, for the cooling water circuit lost when producing 1kWh of electricity from hard coal, based on the value for burning 1MJ of hard coal. Röder et al. 2007, Tab. 9.65 and Tab. 9.66, p. 160f. These tables give an amount of 0.15 kg/MJ burned, which is valid for the assumption of 75% wet cooling and 25% run-through cooling. However, this revised dataset assumes 100% wet cooling.
  properties: wet mass 1 kg
- hard coal ash: -0.108043 kg; name amount_ash; = (factor_MJ_kWh*0.00748)*-1; lognormal variance with pedigree 0.0986, pedigree (5,3,4,5,3)
  Literature value/calculated value. Hard coal ash produced when producing 1kWh of electricity from hard coal, based on the value for burning 1MJ of hard coal. Weighted average with electricity production data (Itten&Frischknecht 2012) and values of 12 countries
  (AT, BE, ES, FR, IT, NL, PT, DE, CZ, HR, PL, SK). These values were valid for the ash being disposed off. Now, total amount of ash has been calculated (disposed+recycled) with the data in Tab. 9.69 p. 165 in Röder et al. 2007. Globally, 74% of the lignite ash are recycled, 26% go to disposal.
  Source:
  Itten R. and Frischknecht R. (2012) Life Cycle Inventories of Electricity Mixes and Grid. ESU-services Ltd., Uster, Switzerland.
  production volume 1.99071e9 kg; = amount_ash/electricity*electricity_apv
    Calculated from the production volume of hard coal, burned in power plant in proportion to the respective output amounts.
  property price 0 EUR2005; name amount_ash_price_EUR2005
  properties: dry mass 1 kg, wet mass 1 kg
- NOx retained, by selective catalytic reduction: 0 kg; name nox_retained; source Chikkatur, A.P. 2011; uniform min 0, max 0, pedigree (3,1,3,2,2)
  No/negligible De-NOx filter installed in Indian power plants as in 2012.
  properties: wet mass 1 kg, dry mass 1 kg
- residue from cooling tower: -7.94434e-5 kg; name amount_residue; = (factor_MJ_kWh*0.000005*1.1)*-1; lognormal variance with pedigree 0.0812, pedigree (5,3,4,5,2)
  Literature value/calculated value. Amount of cooling tower needed for producing 1kWh of electricity from hard coal, based on the value for burning 1MJ of hard coal. Weighted average with electricity production data (Itten&Frischknecht 2012) and values of 14 countries
  (AT, BE, ES, FR, IT, NL, PT, DE, CZ, HR, PL, SK, CN, US) (Röder et al. 2007) .
  Country values calculated from mass balance.
  Source:
  Itten R. and Frischknecht R. (2012) Life Cycle Inventories of Electricity Mixes and Grid. ESU-services Ltd., Uster, Switzerland.
  production volume 1.46376e6 kg; = amount_residue/electricity*electricity_apv
    (same comment as for hard coal ash)
  property price 0 EUR2005; name amount_residue_price_EUR2005
  properties: wet mass 1 kg, water content 0.428571, carbon content, fossil 0.0544233, dry mass 0.7 kg
- water, completely softened: 0.0866655 kg; name water_completely_softened; = factor_MJ_kWh*0.006; lognormal variance with pedigree 0.054, pedigree (4,5,4,5,3)
  Literature value/calculated value. Feed water for the steam circuit lost when producing 1kWh of electricity from hard coal, based on the value for burning 1MJ of hard coal. Röder et al. 2007, Tab. 9.65 and Tab. 9.66, p. 160f.
  properties: wet mass 1 kg
- light fuel oil: 0.000245552 kg; name light_fuel_oil; = factor_MJ_kWh*0.000017; lognormal variance with pedigree 0.024, pedigree (3,4,4,5,1)
  Literature value/calculated value. Light fuel oil use per 1MJ of hard coal burned, use for start-up of the power plant after shut down. Weighted average with electricity production data (Itten&Frischknecht 2012) and ight fuel oil use values of 14 countries
  (AT, BE, ES, FR, IT, NL, PT, DE, CZ, HR, PL, SK, CN, US) (Röder et al. 2007)
  Country values are typical values for hard coal plants.
  Source:
  Itten R. and Frischknecht R. (2012) Life Cycle Inventories of Electricity Mixes and Grid. ESU-services Ltd., Uster, Switzerland.
  properties: carbon content, fossil 0.862, dry mass 1 kg, wet mass 1 kg
- SOx retained, in hard coal flue gas desulfurisation: 0 kg; name sox_retained; source Dharmadhikary, S. 2011; uniform min 0, max 0, pedigree (3,1,3,2,2)
  No/negligible De-SOx filter installed in Indian power plants as in 2012.
  properties: wet mass 1 kg, dry mass 1 kg
- hard coal: 0.75 kg; name hard_coal; source Central Statistics Office 2015; lognormal variance with pedigree 0.005225, pedigree (3,1,3,2,2)
  According to the Indian Energy Statistics, coals with a gross calorific value (moist, ash-free basis) which is not less than 24 MJ/kg or which is less than 24 MJ/kg provided that the coal has a vitrinite mean random reflectance greater than or equal to 0.6 per cent is considered as hard coal (CSO, 2015). The Indian state/union territory specific hard coal consumption data were extracted from (Guttikunda and Jawahar 2014). Guttikunda, S. K., & Jawahar, P. (2014). Atmospheric emissions and pollution from the coal-fired thermal power plants in India. Atmospheric Environment (92), 449-460.
  properties: wet mass 1 kg, water content 0.0638298, dry mass 0.94 kg, carbon content, fossil 0.845
  note on carbon content, fossil: C content 75-94% (specified in Tab 1.1, report 6, part VI). A mean content of 0.845 kg C/ kg dry hard coal was considered
- hard coal power plant: 1.33333e-11 unit; name hard_coal_power_plant; = 1/ (150000*500*1000); source Röder, A. 2007; lognormal variance with pedigree 0.3686, pedigree (5,3,4,5,3)
  Calculated value. At the moment, the hard coal power plant input consists of a market mix of a 100MWe power plant and a 500MWe power plant
  .
  For this calculation, 4000 load hours per year are assumed. It is assumed that a total of 150'000h is reached during the lifetime. A capacity of 500MW is taken for the calculation.
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
## Inputs from nature
- Water, cooling, unspecified natural origin [natural resource, in water]: 0.0660591 m3; name water_cooling_UNO_input; = ((recirculating_CS_fraction_from_allCS*WWithdrawal_EP_HC_recirculating_CS)+(once_through_andCP_CS_fractio_from_allCS*WWithdrawal_EP_HC_once_through_andCP_CS))/11.31*factor_MJ_kWh; lognormal variance with pedigree 0.098025, pedigree (4,4,4,2,4)
  Calculated based on literature data.

## Emissions to nature
- Cyanide [air, non-urban air or from high stacks]: 2.97552e-7 kg; name cyanide; = factor_MJ_kWh*0.0000000206; lognormal variance with pedigree 0.1786, pedigree (5,3,4,5,3)
  Literature value/calculated value. Emissions when producing 1kWh of electricity from hard coal, based on the value for burning 1MJ of hard coal. Weighted average with electricity production data (Itten&Frischknecht 2012) and emission values of 14 countries
  (AT, BE, ES, FR, IT, NL, PT, DE, CZ, HR, PL, SK, CN, US) (Röder et al. 2007)
  Source:
  Itten R. and Frischknecht R. (2012) Life Cycle Inventories of Electricity Mixes and Grid. ESU-services Ltd., Uster, Switzerland.
- Hydrocarbons, aliphatic, unsaturated [air, non-urban air or from high stacks]: 1.84886e-6 kg; name hydrocarbons_aliphatic_unsaturated; = factor_MJ_kWh*0.000000128; lognormal variance with pedigree 0.08, pedigree (3,5,4,5,1)
  Literature value/calculated value. Emissions when producing 1kWh of electricity from hard coal, based on the value for burning 1MJ of hard coal. Weighted average with electricity production data (Itten&Frischknecht 2012) and emission values of 14 countries
  (AT, BE, ES, FR, IT, NL, PT, DE, CZ, HR, PL, SK, CN, US) (Röder et al. 2007)
  Country emissions values based on literature.
  Source:
  Itten R. and Frischknecht R. (2012) Life Cycle Inventories of Electricity Mixes and Grid. ESU-services Ltd., Uster, Switzerland.
- Iodine [air, non-urban air or from high stacks]: 2.29664e-6 kg; name iodine; = factor_MJ_kWh*0.000000159; lognormal variance with pedigree 0.2186, pedigree (5,3,4,5,3)
  Literature value/calculated value. Emissions when producing 1kWh of electricity from hard coal, based on the value for burning 1MJ of hard coal. Weighted average with electricity production data (Itten&Frischknecht 2012) and emission values of 14 countries
  (AT, BE, ES, FR, IT, NL, PT, DE, CZ, HR, PL, SK, CN, US) (Röder et al. 2007)
  Country emissions values calculated from trace element balance, input uncertain
  Source:
  Itten R. and Frischknecht R. (2012) Life Cycle Inventories of Electricity Mixes and Grid. ESU-services Ltd., Uster, Switzerland.
- Hydrocarbons, chlorinated [air, non-urban air or from high stacks]: 2.41219e-8 kg; name hydrocarbons_chlorinated; = factor_MJ_kWh*0.00000000167; lognormal variance with pedigree 0.1786, pedigree (5,3,4,5,3)
  (same comment as for Hydrocarbons, aliphatic, unsaturated)
- NMVOC, non-methane volatile organic compounds, unspecified origin [air, non-urban air or from high stacks]: 0.000129998 kg; name nmvoc; = factor_MJ_kWh*0.000009; source Guttikunda, S. K. 2014; lognormal variance with pedigree 0.124625, pedigree (3,1,3,2,2)
  Calculated value. The emission is calculated as a product of input of fuel and corresponding emission factor (0.000009 kg/MJ).
- Ethane [air, non-urban air or from high stacks]: 3.50995e-7 kg; name ethane; = factor_MJ_kWh*0.0000000243; lognormal variance with pedigree 0.08, pedigree (3,5,4,5,1)
  (same comment as for Hydrocarbons, aliphatic, unsaturated)
- Hexane [air, non-urban air or from high stacks]: 8.01656e-9 kg; name hexane; = factor_MJ_kWh*0.000000000555; lognormal variance with pedigree 0.1786, pedigree (5,3,4,5,3)
  (same comment as for Hydrocarbons, aliphatic, unsaturated)
- Dinitrogen monoxide [air, non-urban air or from high stacks]: 1.90664e-5 kg; name dinitrogen_monoxide; = factor_MJ_kWh*0.00000132; lognormal variance with pedigree 0.074, pedigree (3,4,4,5,1)
  (same comment as for Hydrocarbons, aliphatic, unsaturated)
- Toluene [air, non-urban air or from high stacks]: 9.60543e-7 kg; name toluene; = factor_MJ_kWh*0.0000000665; lognormal variance with pedigree 0.08, pedigree (3,5,4,5,1)
  (same comment as for Hydrocarbons, aliphatic, unsaturated)
- Actinides, radioactive, unspecified [air, non-urban air or from high stacks]: 0.000246997 kBq; name actinides_radioactive_unspecified; = factor_MJ_kWh*0.0000171; lognormal variance with pedigree 0.3206, pedigree (3,3,4,5,3)
  (same comment as for Hydrocarbons, aliphatic, unsaturated)
- Sulfate [air, non-urban air or from high stacks]: 5.69103e-9 kg; name sulfate; = factor_MJ_kWh*0.000000000394; lognormal variance with pedigree 0.1786, pedigree (5,3,4,5,3)
  (same comment as for Hydrocarbons, aliphatic, unsaturated)
- Copper [air, non-urban air or from high stacks]: 1.18587e-7 kg; name copper; = factor_MJ_kWh*0.00000000821; lognormal variance with pedigree 0.7486, pedigree (5,3,4,5,3)
  (same comment as for Iodine)
- Benzene [air, non-urban air or from high stacks]: 2.00775e-6 kg; name benzene; = factor_MJ_kWh*0.000000139; lognormal variance with pedigree 0.088, pedigree (3,5,4,5,3)
  (same comment as for Hydrocarbons, aliphatic, unsaturated)
- Vanadium [air, non-urban air or from high stacks]: 2.13775e-7 kg; name vanadium; = factor_MJ_kWh*0.0000000148; lognormal variance with pedigree 0.7486, pedigree (5,3,4,5,3)
  (same comment as for Iodine)
- Ethane, 1,1,1-trichloro-, HCFC-140 [air, non-urban air or from high stacks]: 2.3833e-9 kg; name ethane_trichloro; = factor_MJ_kWh*0.000000000165; lognormal variance with pedigree 0.1406, pedigree (3,3,4,5,3)
  (same comment as for Hydrocarbons, aliphatic, unsaturated)
- Aldehydes, unspecified [air, non-urban air or from high stacks]: 1.13098e-7 kg; name aldehydes_unspecified; = factor_MJ_kWh*0.00000000783; lognormal variance with pedigree 0.1406, pedigree (3,3,4,5,3)
  (same comment as for Hydrocarbons, aliphatic, unsaturated)
- Methane, fossil [air, non-urban air or from high stacks]: 1.15554e-5 kg; name methane_fossil; = factor_MJ_kWh*0.0000008; source Guttikunda, S. K. 2014; lognormal variance with pedigree 0.064625, pedigree (3,1,3,2,2)
  Calculated value. The emission is calculated as a product of input of fuel and corresponding emission factor (0.0000008 kg/MJ).
- Uranium-234 [air, non-urban air or from high stacks]: 2.91774e-5 kBq; name uranium_234; = factor_MJ_kWh*0.00000202; lognormal variance with pedigree 0.3586, pedigree (5,3,4,5,3)
  (same comment as for Hydrocarbons, aliphatic, unsaturated)
- Ethene, tetrachloro- [air, non-urban air or from high stacks]: 5.11326e-9 kg; name ethene_tetrachloro; = factor_MJ_kWh*0.000000000354; lognormal variance with pedigree 0.1786, pedigree (5,3,4,5,3)
  (same comment as for Hydrocarbons, aliphatic, unsaturated)
- Hydrocarbons, aliphatic, alkanes, unspecified [air, non-urban air or from high stacks]: 1.94997e-6 kg; name hydrocarbons_al_al_unspec; = factor_MJ_kWh*0.000000135; lognormal variance with pedigree 0.08, pedigree (3,5,4,5,1)
  (same comment as for Hydrocarbons, aliphatic, unsaturated)
- Cobalt [air, non-urban air or from high stacks]: 4.82438e-8 kg; name cobalt; = factor_MJ_kWh*0.00000000334; lognormal variance with pedigree 0.7486, pedigree (5,3,4,5,3)
  (same comment as for Iodine)
- Thorium-230 [air, non-urban air or from high stacks]: 1.48776e-5 kBq; name thorium_230; = factor_MJ_kWh*0.00000103; lognormal variance with pedigree 0.3586, pedigree (5,3,4,5,3)
  (same comment as for Hydrocarbons, aliphatic, unsaturated)
- Dioxins, measured as 2,3,7,8-tetrachlorodibenzo-p-dioxin [air, non-urban air or from high stacks]: 1.53109e-13 kg; name dioxins; = factor_MJ_kWh*1.06E-14; lognormal variance with pedigree 0.34, pedigree (3,5,4,5,1)
  (same comment as for Hydrocarbons, aliphatic, unsaturated)
- Propane [air, non-urban air or from high stacks]: 2.98996e-7 kg; name propane; = factor_MJ_kWh*0.0000000207; lognormal variance with pedigree 0.08, pedigree (3,5,4,5,1)
  (same comment as for Hydrocarbons, aliphatic, unsaturated)
- Particulates, > 10 um [air, non-urban air or from high stacks]: 0.000148776 kg; name particulates_gt10; = (factor_MJ_kWh*0.000068+ factor_MJ_kWh*0.000138)*0.05; source Röder, A. 2007; lognormal variance with pedigree 0.005625, pedigree (3,1,3,2,2)
  Calculated value. The emission is calculated as a product of input of fuel and corresponding emission factor of particulates. However, emission factors were available only for particulates >10 um (0.000138 kg/MJ) and particulates <2.5 um (0.000068 kg/MJ). Total calculated particulate emission is again distributed among the three classes such as PM<2.5, PM 2.5-10, and PM>10 in the proportion of 85%, 10%, and 5% respectively according to the ecoinvent report “Kohle” for v2.2 (Röder, Bauer, & Dones). Guttikunda, S. K., & Jawahar, P. (2014). Atmospheric emissions and pollution from the coal-fired thermal power plants in India. Atmospheric Environment (92), 449-460.
- Hydrocarbons, aliphatic, alkanes, cyclic [air, non-urban air or from high stacks]: 6.88991e-8 kg; name hydrocarbons_al_al_cyclic; = factor_MJ_kWh*0.00000000477; lognormal variance with pedigree 0.1406, pedigree (3,3,4,5,3)
  (same comment as for Hydrocarbons, aliphatic, unsaturated)
- Zinc [air, non-urban air or from high stacks]: 6.00881e-7 kg; name zinc; = factor_MJ_kWh*0.0000000416; lognormal variance with pedigree 0.7486, pedigree (5,3,4,5,3)
  (same comment as for Iodine)
- Acenaphthene [air, non-urban air or from high stacks]: 6.06658e-11 kg; name acenaphthene; = factor_MJ_kWh*0.0000000000042; lognormal variance with pedigree 0.1406, pedigree (3,3,4,5,3)
  (same comment as for Hydrocarbons, aliphatic, unsaturated)
- Arsenic [air, non-urban air or from high stacks]: 1.44009e-7 kg; name arsenic; = factor_MJ_kWh*0.00000000997; lognormal variance with pedigree 0.7486, pedigree (5,3,4,5,3)
  (same comment as for Iodine)
- Chromium [air, non-urban air or from high stacks]: 1.18443e-7 kg; name chromium; = factor_MJ_kWh*0.0000000082; lognormal variance with pedigree 0.7486, pedigree (5,3,4,5,3)
  (same comment as for Iodine)
- Molybdenum [air, non-urban air or from high stacks]: 1.66109e-8 kg; name molybdenum; = factor_MJ_kWh*0.00000000115; lognormal variance with pedigree 0.7486, pedigree (5,3,4,5,3)
  (same comment as for Iodine)
- Nitrogen oxides [air, non-urban air or from high stacks]: 0.00272996 kg; name nitrogen_oxides; = factor_MJ_kWh*0.000189; source Guttikunda, S. K. 2014; lognormal variance with pedigree 0.005625, pedigree (3,1,3,2,2)
  Calculated value. The emission is calculated as a product of input of fuel and corresponding emission factor (0.000189 kg/MJ).
- Mercury [air, non-urban air or from high stacks]: 3.89995e-8 kg; name mercury; = factor_MJ_kWh*0.0000000027; lognormal variance with pedigree 0.7486, pedigree (5,3,4,5,3)
  (same comment as for Iodine)
- Hydrogen chloride [air, non-urban air or from high stacks]: 0.000382773 kg; name hydrogen_chloride; = factor_MJ_kWh*0.0000265; lognormal variance with pedigree 0.2186, pedigree (5,3,4,5,3)
  (same comment as for Iodine)
- PAH, polycyclic aromatic hydrocarbons [air, non-urban air or from high stacks]: 1.08187e-7 kg; name pah; = factor_MJ_kWh*0.00000000749; lognormal variance with pedigree 0.34, pedigree (3,5,4,5,1)
  (same comment as for Hydrocarbons, aliphatic, unsaturated)
- Antimony [air, non-urban air or from high stacks]: 1.73331e-8 kg; name antimony; = factor_MJ_kWh*0.0000000012; lognormal variance with pedigree 0.7486, pedigree (5,3,4,5,3)
  (same comment as for Iodine)
- Lead [air, non-urban air or from high stacks]: 5.35882e-7 kg; name lead; = factor_MJ_kWh*0.0000000371; lognormal variance with pedigree 0.7486, pedigree (5,3,4,5,3)
  (same comment as for Iodine)
- Radium-226 [air, non-urban air or from high stacks]: 0.00026433 kBq; name radium_226; = factor_MJ_kWh*0.0000183; lognormal variance with pedigree 0.3907, pedigree (3,3,5,3,3)
  (same comment as for Iodine)
- Thorium-234 [air, non-urban air or from high stacks]: 1.48776e-5 kBq; name thorium_234; = factor_MJ_kWh*0.00000103; lognormal variance with pedigree 0.3206, pedigree (3,3,4,5,3)
  (same comment as for Hydrocarbons, aliphatic, unsaturated)
- Radium-228 [air, non-urban air or from high stacks]: 8.53655e-5 kBq; name radium_228; = factor_MJ_kWh*0.00000591; lognormal variance with pedigree 0.3986, pedigree (5,3,4,5,3)
  (same comment as for Iodine)
- Nickel [air, non-urban air or from high stacks]: 2.88885e-7 kg; name nickel; = factor_MJ_kWh*0.00000002; lognormal variance with pedigree 0.7486, pedigree (5,3,4,5,3)
  (same comment as for Iodine)
- Selenium [air, non-urban air or from high stacks]: 2.3833e-7 kg; name selenium; = factor_MJ_kWh*0.0000000165; lognormal variance with pedigree 0.7486, pedigree (5,3,4,5,3)
  (same comment as for Iodine)
- Particulates, > 2.5 um, and < 10um [air, non-urban air or from high stacks]: 0.000297552 kg; name particulates_2_5_to_10; = (factor_MJ_kWh*0.000068+ factor_MJ_kWh*0.000138)*0.10; source Röder, A. 2007; lognormal variance with pedigree 0.005625, pedigree (3,1,3,2,2)
  (same comment as for Particulates, > 10 um)
- Furan [air, non-urban air or from high stacks]: 5.95103e-13 kg; name furan; = factor_MJ_kWh*4.12E-14; lognormal variance with pedigree 0.1406, pedigree (3,3,4,5,3)
  (same comment as for Hydrocarbons, aliphatic, unsaturated)
- Cumene [air, non-urban air or from high stacks]: 6.48547e-10 kg; name cumene; = factor_MJ_kWh*0.0000000000449; lognormal variance with pedigree 0.124, pedigree (1,1,3,5,1)
  (same comment as for Cyanide)
- Water [water, unspecified]: 0.0669555 m3; name water_to_water_unspecified; = (water_completely_softened/1000)*(1-fraction_WCS_to_air)+(water_decarbonised_user/1000)*(1-fraction_WDC_to_air)+water_cooling_UNO_input*(1-fraction_CW_to_air); lognormal variance with pedigree 0.098025, pedigree (4,4,4,2,4)
  Calculated value based on literature values and expert opinion. See comments in the parametres' comment field.
  property fraction, origin: unspecified 0.957054; name fraction_origin_unspecified_Ww
  property fraction, origin: salt water 0; name fraction_origin_salt_water_Ww
  property fraction, origin: fresh water 0.0429463; name fraction_origin_fresh_water_Ww
- Water [air, unspecified]: 0.00207911 m3; name water_to_air_unspecified; = (water_completely_softened/1000)*fraction_WCS_to_air+(water_decarbonised_user/1000)*fraction_WDC_to_air+water_cooling_UNO_input*fraction_CW_to_air; lognormal variance with pedigree 0.098025, pedigree (4,4,4,2,4)
  (same comment as for Water)
  property fraction, origin: fresh water 0.047882; name fraction_origin_fresh_water
  property fraction, origin: salt water 0; name fraction_origin_salt_water
  property fraction, origin: unspecified 0.952118; name fraction_origin_unspecified
- Thorium-232 [air, non-urban air or from high stacks]: 6.97657e-5 kBq; name thorium_232; = factor_MJ_kWh*0.00000483; lognormal variance with pedigree 0.3986, pedigree (5,3,4,5,3)
  (same comment as for Iodine)
- Protactinium-234 [air, non-urban air or from high stacks]: 1.48776e-5 kBq; name protactinium_234; = factor_MJ_kWh*0.00000103; lognormal variance with pedigree 0.3206, pedigree (3,3,4,5,3)
  (same comment as for Hydrocarbons, aliphatic, unsaturated)
- Magnesium [air, non-urban air or from high stacks]: 1.30865e-6 kg; name magnesium; = factor_MJ_kWh*0.0000000906; lognormal variance with pedigree 0.7086, pedigree (5,3,4,5,3)
  (same comment as for Hydrocarbons, aliphatic, unsaturated)
- Potassium-40 [air, non-urban air or from high stacks]: 0.000332218 kBq; name potassium_40; = factor_MJ_kWh*0.000023; lognormal variance with pedigree 0.3986, pedigree (5,3,4,5,3)
  (same comment as for Iodine)
- Phenol [air, non-urban air or from high stacks]: 1.90664e-9 kg; name phenol; = factor_MJ_kWh*0.000000000132; lognormal variance with pedigree 0.1406, pedigree (3,3,4,5,3)
  (same comment as for Hydrocarbons, aliphatic, unsaturated)
- Carbon dioxide, fossil [air, non-urban air or from high stacks]: 1.38376 kg; name carbon_dioxide_fossil; = factor_MJ_kWh*0.0958; source Guttikunda, S. K. 2014; lognormal variance with pedigree 0.004625, pedigree (3,1,3,2,2)
  Calculated value. The emission is calculated as a product of input of fuel and corresponding emission factor (0.0958 kg/MJ).
- Sulfur dioxide [air, non-urban air or from high stacks]: 0.0027733 kg; name sulfur_dioxide; = factor_MJ_kWh*0.000192; source Guttikunda, S. K. 2014; lognormal variance with pedigree 0.005625, pedigree (3,1,3,2,2)
  Calculated value. The emission is calculated as a product of input of fuel and corresponding emission factor (0.000192 kg/MJ).
- Benzene, ethyl- [air, non-urban air or from high stacks]: 1.11943e-8 kg; name benzene_ethyl; = factor_MJ_kWh*0.000000000775; lognormal variance with pedigree 0.1406, pedigree (3,3,4,5,3)
  (same comment as for Cyanide)
- Ethane, 1,2-dichloro- [air, non-urban air or from high stacks]: 4.75216e-9 kg; name ethane_dichloro; = factor_MJ_kWh*0.000000000329; lognormal variance with pedigree 0.1786, pedigree (5,3,4,5,3)
  (same comment as for Hydrocarbons, aliphatic, unsaturated)
- Beryllium [air, non-urban air or from high stacks]: 2.49886e-9 kg; name beryllium; = factor_MJ_kWh*0.000000000173; lognormal variance with pedigree 0.6706, pedigree (3,3,4,5,3)
  (same comment as for Cyanide)
- Radon-220 [air, non-urban air or from high stacks]: 0.00732323 kBq; name radon_220; = factor_MJ_kWh*0.000507; lognormal variance with pedigree 0.3986, pedigree (5,3,4,5,3)
  (same comment as for Iodine)
- Radon-222 [air, non-urban air or from high stacks]: 0.00719324 kBq; name radon_222; = factor_MJ_kWh*0.000498; lognormal variance with pedigree 0.3986, pedigree (5,3,4,5,3)
  (same comment as for Iodine)
- Lead-210 [air, non-urban air or from high stacks]: 0.00100099 kBq; name lead_210; = factor_MJ_kWh*0.0000693; lognormal variance with pedigree 0.3986, pedigree (5,3,4,5,3)
  (same comment as for Iodine)
- Styrene [air, non-urban air or from high stacks]: 2.94663e-9 kg; name styrene; = factor_MJ_kWh*0.000000000204; lognormal variance with pedigree 0.1406, pedigree (3,3,4,5,3)
  (same comment as for Hydrocarbons, aliphatic, unsaturated)
- Uranium-238 [air, non-urban air or from high stacks]: 0.000229664 kBq; name uranium_238; = factor_MJ_kWh*0.0000159; lognormal variance with pedigree 0.3986, pedigree (5,3,4,5,3)
  (same comment as for Iodine)
- Carbon monoxide, fossil [air, non-urban air or from high stacks]: 0.00144442 kg; name carbon_monoxide_fossil; = factor_MJ_kWh*0.0001; source Guttikunda, S. K. 2014; lognormal variance with pedigree 0.664625, pedigree (3,1,3,2,2)
  Calculated value. The emission is calculated as a product of input of fuel and corresponding emission factor (0.0001 kg/MJ).
- Polonium-210 [air, non-urban air or from high stacks]: 0.00177664 kBq; name polonium_210; = factor_MJ_kWh*0.000123; lognormal variance with pedigree 0.3986, pedigree (5,3,4,5,3)
  (same comment as for Iodine)
- Chromium VI [air, non-urban air or from high stacks]: 2.02219e-8 kg; name chromium_vi; = factor_MJ_kWh*0.0000000014; lognormal variance with pedigree 0.5006, pedigree (3,3,4,5,3)
  Literature value/calculated value. Emissions when producing 1kWh of electricity from hard coal, based on the value for burning 1MJ of hard coal. Weighted average with electricity production data (Itten&Frischknecht 2012) and emission values of 14 countries
  (AT, BE, ES, FR, IT, NL, PT, DE, CZ, HR, PL, SK, CN, US) (Röder et al. 2007)
  Country emissions values based on range of data.
  Source:
  Itten R. and Frischknecht R. (2012) Life Cycle Inventories of Electricity Mixes and Grid. ESU-services Ltd., Uster, Switzerland.
- Hydrogen fluoride [air, non-urban air or from high stacks]: 4.08772e-5 kg; name hydrogen_fluoride; = factor_MJ_kWh*0.00000283; lognormal variance with pedigree 0.2186, pedigree (5,3,4,5,3)
  (same comment as for Iodine)
- Propene [air, non-urban air or from high stacks]: 1.36787e-7 kg; name propene; = factor_MJ_kWh*0.00000000947; lognormal variance with pedigree 0.08, pedigree (3,5,4,5,1)
  (same comment as for Hydrocarbons, aliphatic, unsaturated)
- Manganese [air, non-urban air or from high stacks]: 5.17104e-7 kg; name manganese; = factor_MJ_kWh*0.0000000358; lognormal variance with pedigree 0.7486, pedigree (5,3,4,5,3)
  (same comment as for Iodine)
- Barium [air, non-urban air or from high stacks]: 9.37432e-7 kg; name barium; = factor_MJ_kWh*0.0000000649; lognormal variance with pedigree 0.7486, pedigree (5,3,4,5,3)
  (same comment as for Iodine)
- Benzo(a)pyrene [air, non-urban air or from high stacks]: 6.22547e-12 kg; name benzo_a_pyrene; = factor_MJ_kWh*0.000000000000431; lognormal variance with pedigree 0.08, pedigree (3,5,4,5,1)
  (same comment as for Hydrocarbons, aliphatic, unsaturated)
- Chloroform [air, non-urban air or from high stacks]: 1.1671e-8 kg; name chloroform; = factor_MJ_kWh*0.000000000808; lognormal variance with pedigree 0.1406, pedigree (3,3,4,5,3)
  (same comment as for Cyanide)
- Acrolein [air, non-urban air or from high stacks]: 3.45218e-8 kg; name acrolein; = factor_MJ_kWh*0.00000000239; lognormal variance with pedigree 0.3586, pedigree (5,3,4,5,3)
  (same comment as for Hydrocarbons, aliphatic, unsaturated)
- Particulates, < 2.5 um [air, non-urban air or from high stacks]: 0.00252919 kg; name particulates_lt2_5; = (factor_MJ_kWh*0.000068+ factor_MJ_kWh*0.000138)*0.85; source Guttikunda, S. K. 2014; lognormal variance with pedigree 0.005625, pedigree (3,1,3,2,2)
  (same comment as for Particulates, > 10 um)
- Butane [air, non-urban air or from high stacks]: 1.61776e-7 kg; name butane; = factor_MJ_kWh*0.0000000112; lognormal variance with pedigree 0.08, pedigree (3,5,4,5,1)
  (same comment as for Hydrocarbons, aliphatic, unsaturated)
- Strontium [air, non-urban air or from high stacks]: 8.551e-7 kg; name strontium; = factor_MJ_kWh*0.0000000592; lognormal variance with pedigree 0.7486, pedigree (5,3,4,5,3)
  (same comment as for Iodine)
- Bromine [air, non-urban air or from high stacks]: 4.52105e-6 kg; name bromine; = factor_MJ_kWh*0.000000313; lognormal variance with pedigree 0.1806, pedigree (3,3,4,5,3)
  (same comment as for Iodine)
- Carbon disulfide [air, non-urban air or from high stacks]: 1.54553e-8 kg; name carbon_disulfide; = factor_MJ_kWh*0.00000000107; lognormal variance with pedigree 0.3206, pedigree (3,3,4,5,3)
  (same comment as for Cyanide)
- Cadmium [air, non-urban air or from high stacks]: 1.5022e-8 kg; name cadmium; = factor_MJ_kWh*0.00000000104; lognormal variance with pedigree 0.7486, pedigree (5,3,4,5,3)
  (same comment as for Iodine)
- Xylene [air, non-urban air or from high stacks]: 7.88656e-6 kg; name xylene; = factor_MJ_kWh*0.000000546; lognormal variance with pedigree 0.08, pedigree (3,5,4,5,1)
  (same comment as for Hydrocarbons, aliphatic, unsaturated)
- Formaldehyde [air, non-urban air or from high stacks]: 5.24326e-7 kg; name formaldehyde; = factor_MJ_kWh*0.0000000363; lognormal variance with pedigree 0.08, pedigree (3,5,4,5,1)
  (same comment as for Hydrocarbons, aliphatic, unsaturated)
- Methane, dichloro-, HCC-30 [air, non-urban air or from high stacks]: 3.45218e-8 kg; name methane_dichloro; = factor_MJ_kWh*0.00000000239; lognormal variance with pedigree 0.1786, pedigree (5,3,4,5,3)
  (same comment as for Hydrocarbons, aliphatic, unsaturated)
- Thorium-228 [air, non-urban air or from high stacks]: 4.7666e-5 kBq; name throium_228; = factor_MJ_kWh*0.0000033; lognormal variance with pedigree 0.3986, pedigree (5,3,4,5,3)
  (same comment as for Iodine)
- Boron [air, non-urban air or from high stacks]: 5.53215e-6 kg; name boron; = factor_MJ_kWh*0.000000383; lognormal variance with pedigree 0.7486, pedigree (5,3,4,5,3)
  (same comment as for Iodine)
- Pentane [air, non-urban air or from high stacks]: 1.25665e-6 kg; name pentane; = factor_MJ_kWh*0.000000087; lognormal variance with pedigree 0.08, pedigree (3,5,4,5,1)
  (same comment as for Hydrocarbons, aliphatic, unsaturated)
- Methane, monochloro-, R-40 [air, non-urban air or from high stacks]: 6.31214e-8 kg; name methane_monochloro; = factor_MJ_kWh*0.00000000437; lognormal variance with pedigree 0.1406, pedigree (3,3,4,5,3)
  (same comment as for Hydrocarbons, aliphatic, unsaturated)

## Sampling procedure
The inventory is generated using statistical data, literature data and modelling.

## Extrapolations
Data from 1993 have been updated for the years 2000 (v1.0), and 2004-2005 (v2.0). Uncertainty was adjusted accordingly.

Most of the exchanges were extrapolated through production-weighted averages of the datasets of the following 14 countries: AT, BE, ES, FR, IT, NL, PT, DE, CZ, HR, PL, SK, CN, US.

The original data were valid for the burning of 1MJ of hard coal. In this dataset, the values are scaled to the net output of 1kWh of electricity, based on the electrical efficiency.The inventory is generated using statistical data, literature data and modelling.

## Review by Karin Treyer 2016-12-20
This dataset has been produced in a project on regionalisation of the Indian electricity mix on a states level. In general, only key parameters have been adjusted to region-specific conditions, such as the electrical efficiency, power plants own use of electricity (losses from gross to net electricity), hard coal input, and key emissions. Whenever more accurate data will be available e.g. on further emissions, these should be included in this dataset.

## Review by Carl Vadenbo 2015-06-15
The update of the whole electricity sector for the ecoinvent v3.2 database consist of hundreds of datasets. All these datasets have passed through a streamlined review processes where the underlying modelling of production volumes, technology shares and efficiencies was reviewed in detail prior to the datasets being submitted to the database.
