# packaging glass sorting facility construction

Dataset: EcoSpold 2, unit process
Geography: RER
Time period: 1994-01-01 to 2019-12-31
Technology level: current
Classification: EcoSpold01Categories: glass/packaging
Classification: ISIC rev.4 ecoinvent: 4290:Construction of other civil engineering projects
Tags: ConvertedDataset
Scenario: Business-as-Usual
System model: Allocation at the point of substitution
Generated by: Roland Hischier
Published in: Hischier R. 2007
Database: ecoinvent
isCopyrightProtected: true
accessRestrictedTo: 1

## General comment
A production site with a sorting capacity of 100 kt per year and a total life span of 50 a is assumed.
[This dataset was already contained in the ecoinvent database version 2. It was not individually updated during the transfer to ecoinvent version 3. Life Cycle Impact Assessment results may still have changed, as they are affected by changes in the supply chain, i.e. in other datasets. This dataset was generated following the ecoinvent quality guidelines for version 2. It may have been subject to central changes described in the ecoinvent version 3 change report (http://www.ecoinvent.org/database/ecoinvent-version-3/reports-of-changes/), and the results of the central updates were reviewed extensively. The changes added e.g. consistent water flows and other information throughout the database. The documentation of this dataset can be found in the ecoinvent reports of version 2, which are still available via the ecoinvent website. The change report linked above covers all central changes that were made during the conversion process.]
This dataset represents the infrastruction of packaging glass sorting facility from unknown land with an annual sorting capacity of 100'000 t.
It includes material for construction and dismantling of the different buildings and sorting machines, and land use. Data are based on information from three sorting sites in Switzerland. The functional unit is 1 kg of sorted glass cullets.

## Included activities start
From unknown land forseen for the packaging glass sorting factory.

## Included activities end
This activity ends with the dismanteling of the buildings and machines. The dataset includes the land-use as well as materials for machines and buildings and their dismantling.

## Geography
european sorting site, based on few information from different Swiss sorting sites

## Technology
Based on information from three sorting sites in Switzerland the following technology was considered:
- annual sorting capacity of 100'000 t;
- life-time of buildings of 50 years;
- built area of 5'700 m2 plus 10% of industrial area for vegetation;
- building halls with a hight of 10 m correspond to 80% of the built area.
- construction and dismanteling time of 1 year each;
- sorting machines with a total weight of 1000t and a life-time of 20 years consisting of chromium steel (50%), steel (45%), plastics (4%), and electronics (1%);
- foundation out of concrete with a weight of also 1000t and a life-time of 50 years;
- for the disposal of the machines, all metals are recycled, plastics incinerated and electronics is treated in its own dispsal module. The foundation ends up to 50% in recylcing and to 50% in final disposal.

## Reference product
- packaging glass sorting facility: 1 unit; By-product classification allocatable product; CPC 53290: Other civil engineering works
  production volume 1.32237 unit
    This is a placeholder value that does not reflect real-world production volumes. This dataset does not currently require a real-world production volume to work in the database framework, and no actual data were collected yet. This has no negative effect on the results of the ecoinvent database. The placeholder value of this activity was scaled according to the nominal GDP of 2005 (source: United Nations, http://data.un.org/Glossary.aspx?q=GDP+%28current+US%24%29, accessed 20130726) to reflect an appropriate share of the global production volume, which is also a placeholder value.
  property price 1.66936e7 EUR2005
    Convert from EU 27 price to the world by currency exchange rate.
  property true value 1.66936e7
    allocation property applied in "true value" allocation // value calculated from revenue

## By-products
- electricity, for reuse in municipal waste incineration only: 0 kWh; CPC 17100: Electrical energy; By-product classification allocatable product; pedigree (1,1,1,1,1)
  Net electricity generated from this waste and used in internal MSWI plant energy redistribution.
  Uncertainty: uncertainty is calculated from uncertainties in waste composition and uncertainties in energy efficiency and the uncertainty in internal energy demand
  production volume 1054.27 kWh
  property true value relation 3.6; name E_el_prod_MSWI_true_value_relation
    property to calculate "true value" from
  property exergy 3.6 MJ; name E_el_prod_MSWI_exergy
    This exergy property is based on the exergy content of the product.
  property price 0.1 EUR2005; name E_el_prod_MSWI_price_EUR2005
    Estimated to be the same price as in case of electricity, medium voltage.
  property true value 135.257
    allocation property applied in "true value" allocation // value calculated from true value relation
- heat, for reuse in municipal waste incineration only: 0 MJ; CPC 17300: Steam and hot water; By-product classification allocatable product; pedigree (1,1,1,1,1)
  Net useful heat generated from this waste and used in internal MSWI plant energy redistribution.
  Uncertainty: uncertainty is calculated from uncertainties in waste composition and uncertainties in energy efficiency and the uncertainty in internal energy demand
  production volume 7391.83 MJ
  property true value relation 0.1842; name E_th_prod_MSWI_true_value_relation
    property to calculate "true value" from
  property exergy 0.1842 MJ; name E_th_prod_MSWI_exergy
    This exergy property is based on the exergy content of the product.
  property price 0.0106 EUR2005; name E_th_prod_MSWI_price_EUR2005
    Average European district heat price from Ecoheatcool and Euroheat 2005-2006, Ecoheat Work package 1: The European heat market. Final report. 10.6 EUR/GJ i s the price of district heat. http://www.solarthermalworld.org/files/Ecoheatcool%20WP1%20Web.pdf?download
  property true value 48.5231
    (same comment as for electricity, for reuse in municipal waste incineration only)
- zinc concentrate: 0 kg; CPC 14290: Other non-ferrous metal ores and concentrates (other than uranium or thorium ores and concentrates); By-product classification allocatable product
  Calculated value from the knowledge of the properties of both products.
  production volume 0.0581893 kg
  property price 0.38 EUR2005; name ByP_price_EUR2005
    Temporary price data. Calculated as 90% of purchasers price based on: Zinc content in concentrate 53%. Concentrate price per kg Zn 86.5% of refined Zn price (13.5% treatment charges according to CHR Metals Limited 2005: Dynamic cost curves. http://www.minecost.com/dynamic.pdf). 2004 zinc price from USGS (2007) Mineral commodity summaries 2007. <http://minerals.usgs.gov/minerals/pubs/mcs/2007/mcs2007.pdf> [Accessed 25 May 2010]
  property zinc content 0.53; name zinc_C_zinc_concentrate
    Zinc content on a dry matter basis. Value taken from teh "zinc mine operation" /GLO dataset.
  property dry mass 1 kg; name DM_zinc_concentrate
  property carbon content 0
    carbon content on a dry matter basis (reserved; not for manual entry)
  property true value 0.0221119
    allocation property applied in "true value" allocation // value calculated from revenue
  properties: wet mass 1 kg, water content 0, carbon content, non-fossil 0, carbon content, fossil 0, water in wet mass 0 kg, carbon allocation 0 kg
- copper: 0 kg; By-product classification allocatable product; CPC 41413: Refined copper and copper alloys, unwrought; master alloys of copper
  production volume 214.97 kg
  property price 5.52 EUR2005
    Literature value (http://www.economist.com/news/business/21576714-mining-industry-has-enriched-chile-its-future-precarious-copper-solution). Average price between 20015 and 2013.
  property carbon content 0
    carbon content on a dry matter basis (reserved; not for manual entry)
  property true value 1186.63
    allocation property applied in "true value" allocation // value calculated from revenue
  properties: water in wet mass 0 kg, water content 0, carbon content, non-fossil 0, dry mass 1 kg, carbon content, fossil 0, wet mass 1 kg, carbon allocation 0 kg
- lead: 0 kg; CPC 41441: Lead, unwrought; By-product classification allocatable product
  EcoSpold01Location=SE
  production volume 5.60085 kg
  property price 0.744 EUR2005
    Temporary price data. Calculated as 90% of purchasers price based on: Source: ecoinvent v2 report 10-part IX, Tab 5.10 & 2.5
  property carbon content 0
    carbon content on a dry matter basis (reserved; not for manual entry)
  property true value 4.16703
    allocation property applied in "true value" allocation // value calculated from revenue
  properties: wet mass 1 kg, water content 0, carbon content, non-fossil 0, carbon content, fossil 0, dry mass 1 kg, water in wet mass 0 kg, carbon allocation 0 kg
- nickel, 99.5%: 0 kg; CPC 41422: Unwrought nickel; By-product classification allocatable product
  EcoSpold01Location=SE
  production volume 11.6916 kg
  property price 10.4 EUR2005
    Temporary price data. Calculated as 90% of purchasers price based on: 2004 nickel price from USGS (2007) Mineral commodity summaries 2007. <http://minerals.usgs.gov/minerals/pubs/mcs/2007/mcs2007.pdf> [Accessed 25 May 2010]
  property carbon content 0
    carbon content on a dry matter basis (reserved; not for manual entry)
  property true value 121.593
    allocation property applied in "true value" allocation // value calculated from revenue
  properties: water in wet mass 0 kg, wet mass 1 kg, carbon content, non-fossil 0, dry mass 1 kg, water content 0, carbon content, fossil 0, carbon allocation 0 kg
- silver: 0 kg; CPC 41310: Silver (including silver plated with gold or platinum), unwrought or in semi-manufactured forms, or in powder […]; By-product classification allocatable product; CAS 7440-22-4
  EcoSpold01Location=SE
  production volume 1.93075 kg
  property price 178 EUR2005
    (same comment as for lead)
  property carbon content 0
    carbon content on a dry matter basis (reserved; not for manual entry)
  property true value 343.674
    allocation property applied in "true value" allocation // value calculated from revenue
  properties: wet mass 1 kg, carbon content, non-fossil 0, dry mass 1 kg, water content 0, carbon content, fossil 0, water in wet mass 0 kg, carbon allocation 0 kg
- palladium: 0 kg; CPC 4160: Other non-ferrous metals and articles thereof (including waste and scrap of some metals); cermets and articles […]; By-product classification allocatable product
  EcoSpold01Location=SE
  production volume 0.10688 kg
  property price 5640 EUR2005
    Temporary price data. Calculated as 90% of purchasers price based on: 2004 price from USGS (2007) Mineral commodity summaries 2007. <http://minerals.usgs.gov/minerals/pubs/mcs/2007/mcs2007.pdf> [Accessed 25 May 2010]
  property carbon content 0
    carbon content on a dry matter basis (reserved; not for manual entry)
  property true value 602.802
    allocation property applied in "true value" allocation // value calculated from revenue
  properties: wet mass 1 kg, carbon content, fossil 0, water in wet mass 0 kg, water content 0, carbon content, non-fossil 0, dry mass 1 kg, carbon allocation 0 kg
- gold: 0 kg; CPC 41320: Gold (including gold plated with platinum), unwrought or in semi-manufactured forms, or in powder form; By-product classification allocatable product; CAS 7440-57-5
  EcoSpold01Location=SE
  production volume 0.0586125 kg
  property price 10600 EUR2005
    Temporary price data. Calculated as 90% of purchasers price based on: Source: ecoinvent v2 report 10-part IX, Tab 2.5
  property carbon content 0
    carbon content on a dry matter basis (reserved; not for manual entry)
  property true value 621.292
    allocation property applied in "true value" allocation // value calculated from revenue
  properties: wet mass 1 kg, carbon content, fossil 0, dry mass 1 kg, carbon content, non-fossil 0, water content 0, water in wet mass 0 kg, carbon allocation 0 kg
- iron scrap, sorted, pressed: 0 kg; By-product classification Recyclable; CPC 39310: Slag, dross, scalings and other waste from the manufacture of iron or steel; pedigree (1,1,1,1,1)
  Iron scrap recovered from this waste.
  production volume 1.16812 kg
  property price 0.175 EUR2005
    Temporary price data. Calculated as 90% of purchasers price based on: 2005 import and export prices (total trades (USD) divided by total weight (kg) in biggest economies of the world: EU27, USA, Brasil, China, India, Japan and Russia) from UN Commodity Trade Statistics Database (http://data.un.org/Explorer.aspxDatabase [Accessed 2011.06.20]). Commodity: Waste or scrap, of cast iron
  property carbon content 0
    carbon content on a dry matter basis (reserved; not for manual entry)
  property true value 0.20442
    allocation property applied in "true value" allocation // value calculated from revenue
  properties: water content 0, water in wet mass 0 kg, carbon content, fossil 0, dry mass 1 kg, carbon content, non-fossil 0, wet mass 1 kg, carbon allocation 0 kg

## Inputs from technosphere
- concrete, normal: 41.7923 m3; lognormal variance with pedigree 0.1921, pedigree (5,4,5,3,4)
  Estimation: foundation out of concrete estimated based on information from three sorting sites in Switzerland. It ends up 50% in recylcing and to 50% in final disposal.
  Uncertainty: o
  properties: water content 0.086758, wet mass 2380 kg, dry mass 2190 kg
- waste polyethylene: -9998.16 kg; lognormal variance with pedigree 0.1921, pedigree (5,4,5,3,4)
  Estimation: estimated based on information from three sorting sites in Switzerland.
  Uncertainty: o
  production volume 10000 kg
    Calculated from the production volume of packaging glass sorting facility in proportion to the respective output amounts.
  properties: carbon content, fossil 0.825301, water content 0.00401606, dry mass 0.996 kg, wet mass 1 kg
  note on carbon content, fossil: C content in 1 kg DM was calculated using data in Tab A.1, ecoinvent v2.2 report 13_I
- steel, chromium steel 18/8, hot rolled: 124977 kg; lognormal variance with pedigree 0.1921, pedigree (5,4,5,3,4)
  Estimation: sorting machines of 1000 t consisting of 50% out of chromium steel estimated based on information from three sorting sites in Switzerland.
  Uncertainty: o
  properties: carbon content, fossil 0.0008, wet mass 1 kg, dry mass 1 kg
  note on carbon content, fossil: Stainless steel model is the grade 304 steel (18/8 stainless, 18% chromium 8% nickel; max. 0.08% C)
- steel, low-alloyed, hot rolled: 111979 kg; lognormal variance with pedigree 0.1921, pedigree (5,4,5,3,4)
  Estimation: sorting machines of 1000 t consisting of 45% out of steel estimated based on information from three sorting sites in Switzerland.
  Uncertainty: o
  properties: carbon content, fossil 0.005, dry mass 1 kg, wet mass 1 kg
  note on carbon content, fossil: Low alloyed steel composition given in Tab. 3.2 ecoinvent v2.2 report 10_partII. Steel assumed to have a C content of 0.5%
- electronics scrap from control units: -2499.54 kg; lognormal variance with pedigree 0.1921, pedigree (5,4,5,3,4)
  Estimation: electronics from sorting machines. Estimated based on information from three sorting sites in Switzerland.
  Uncertainty: o
  production volume 2500 kg
    (same comment as for waste polyethylene)
  properties: carbon content, fossil 0.337146, carbon content, non-fossil 0.00013442, wet mass 1 kg, dry mass 1 kg
- polyethylene, high density, granulate: 9998.16 kg; lognormal variance with pedigree 0.1921, pedigree (5,4,5,3,4)
  Estimation: sorting machines of 1000 t consisting of 4% out of plastics (HDPE) estimated based on information from three sorting sites in Switzerland.
  Uncertainty: o
  properties: dry mass 1 kg, wet mass 1 kg, carbon content, fossil 0.857143
  note on carbon content, fossil: Polyethylene is formed out of a huge amount of ethylene monomers (C2H4) (ecoinvent v2.2 report 11_II). MW=28 g/mol
- building, hall, steel construction: 4559.16 m2; lognormal variance with pedigree 0.4921, pedigree (5,4,5,3,4)
  Estimation: 80% of built area for building halls with a hight of 10 m. Estimated based on information from three sorting sites in Switzerland.
  Uncertainty: o
- waste concrete, not reinforced: 0 kg; pedigree (1,1,1,1,1)
  Estimation: 50% of foundation out of concrete in final disposal. Estimated based on information from three sorting sites in Switzerland.
  Uncertainty: o
  production volume 0 kg
    (same comment as for waste polyethylene)
  properties: dry mass 1 kg, wet mass 1 kg
- electronics, for control units: 2499.54 kg; lognormal variance with pedigree 0.1921, pedigree (5,4,5,3,4)
  Estimation: sorting machines of 1000 t consisting of 1% out of electronics estimated based on information from three sorting sites in Switzerland.
  Uncertainty: o
  properties: carbon content, non-fossil 0.00013442, wet mass 1 kg, carbon content, fossil 0.337146, dry mass 1 kg
  note on carbon content, non-fossil: The control unit has a composition of 46% steel (housing), 32% plastics, 14% printed wiring boards and 8% cables (various types).;
- waste concrete, not reinforced: -98933.4, -1048.27 kg (2 entries); lognormal variance with pedigree 0.1921, pedigree (5,4,5,3,4)
  (same comment as for waste concrete, not reinforced)
  production volume 100000 kg

## Inputs from nature
- Occupation, industrial area [natural resource, land]: 313442 m2*year; lognormal variance with pedigree 0.0987, pedigree (4,3,5,3,1)
  Estimation: estimated based on information from three sorting sites in Switzerland.
  Uncertainty: b
- Transformation, from unspecified [natural resource, land]: 6268.85 m2; lognormal variance with pedigree 0.1787, pedigree (4,3,5,3,1)
  (same comment as for Occupation, industrial area)
- Transformation, to industrial area [natural resource, land]: 6268.85 m2; lognormal variance with pedigree 0.1787, pedigree (4,3,5,3,1)
  (same comment as for Occupation, industrial area)
- Occupation, construction site [natural resource, land]: 12497.7 m2*year; lognormal variance with pedigree 0.0987, pedigree (4,3,5,3,1)
  (same comment as for Occupation, industrial area)

## Review by Hans-Jörg Althaus 2003-08-20
passed

## Review by Roland Hischier 2011-11-29
Transfer of documentation done.
