# natural gas service station construction

Dataset: EcoSpold 2, unit process
Geography: CH
Time period: 2001-01-01 to 2019-12-31
Technology level: current
Classification: EcoSpold01Categories: natural gas/fuels
Classification: ISIC rev.4 ecoinvent: 4290:Construction of other civil engineering projects
Tags: ConvertedDataset
Scenario: Business-as-Usual
System model: Allocation at the point of substitution
Share of production covered: 0 %
Generated by: Mireille Faist Emmenegger (obsolete)
Published in: Jungbluth N. 2007
Database: ecoinvent
isCopyrightProtected: true
accessRestrictedTo: 1

## General comment
This data set includes land use for a natural gas service station as well as steel requirements for compressor and container. Data stems from a service station with 310'000 m3 gas (236'000 kg) sold per year (in 365 days). It is assumed that steel and concrete are recycled. A life span of 50 years is assumed.
[This dataset was already contained in the ecoinvent database version 2. It was not individually updated during the transfer to ecoinvent version 3. Life Cycle Impact Assessment results may still have changed, as they are affected by changes in the supply chain, i.e. in other datasets. This dataset was generated following the ecoinvent quality guidelines for version 2. It may have been subject to central changes described in the ecoinvent version 3 change report (http://www.ecoinvent.org/database/ecoinvent-version-3/reports-of-changes/), and the results of the central updates were reviewed extensively. The changes added e.g. consistent water flows and other information throughout the database. The documentation of this dataset can be found in the ecoinvent reports of version 2, which are still available via the ecoinvent website. The change report linked above covers all central changes that were made during the conversion process.]

## Included activities end
This data set includes land use for a natural gas service station as well as steel and concrete requirements for compressor and container.

## Geography
Data for Switzerland

## Technology
Service station with steel compressor.

## Time period
personal communication

## Reference product
- natural gas service station: 1 unit; CPC 53290: Other civil engineering works; By-product classification allocatable product
  production volume 0.0336675 unit
    This is a placeholder value that does not reflect real-world production volumes. This dataset does not currently require a real-world production volume to work in the database framework, and no actual data were collected yet. This has no negative effect on the results of the ecoinvent database. The placeholder value of this activity was scaled according to the nominal GDP of 2005 (source: United Nations, http://data.un.org/Glossary.aspx?q=GDP+%28current+US%24%29, accessed 20130726) to reflect an appropriate share of the global production volume, which is also a placeholder value.
  property price 241554 EUR2005
    EU27 I/O database(in the 'EU & DK Input Output Database' (available in SimaPro)); -79 Building, non-residential EU 27 (calculated to be 38.169 EUR2003/kg). Based on consumption of (_53 Iron basic, virgin, EU27;7.25517782294095E-3 kg/EUR building; 0.45 EUR2003 per kg DS), (_61 Iron, after first processing, EU27;5.8766830719783E-3kg/EUR building; 0.62 EUR2003 per kg DS), (_65 Fabricated metal products, except machinery, EU27; 8.9167022775554E-3 kg/EUR building; 3.63 EUR2003 per kg DS) and (_66 Machinery and equipment n.e.c., EU27;4.15071881936446E-3 kg/EUR building; 5.71 EUR2003 per kg DS) - 6377 kg
  property true value 241554
    allocation property applied in "true value" allocation // value calculated from revenue

## By-products
- iron scrap, sorted, pressed: 0 kg; By-product classification Recyclable; CPC 39310: Slag, dross, scalings and other waste from the manufacture of iron or steel; pedigree (1,1,1,1,1)
  Iron scrap recovered from this waste.
  Uncertainty: uncertainty calculated from uncertainty in waste composition, uncertainty of share of recyclable metal, uncertainty of transfer coefficient to bottom ash, uncertainty of the efficiency of scrap removal in MSWI plant.
  production volume 8.43043 kg
  property price 0.175 EUR2005
    Temporary price data. Calculated as 90% of purchasers price based on: 2005 import and export prices (total trades (USD) divided by total weight (kg) in biggest economies of the world: EU27, USA, Brasil, China, India, Japan and Russia) from UN Commodity Trade Statistics Database (http://data.un.org/Explorer.aspxDatabase [Accessed 2011.06.20]). Commodity: Waste or scrap, of cast iron
  property carbon content 0
    carbon content on a dry matter basis (reserved; not for manual entry)
  property true value 1.47532
    allocation property applied in "true value" allocation // value calculated from revenue
  properties: wet mass 1 kg, water in wet mass 0 kg, carbon content, non-fossil 0, carbon content, fossil 0, dry mass 1 kg, water content 0, carbon allocation 0 kg

## Inputs from technosphere
- waste reinforced concrete: -25999.8 kg; lognormal variance with pedigree 0.138, pedigree (5,5,5,1,1)
  Estimation
  Estimation
  production volume 26000 kg
    Calculated from the production volume of natural gas service station in proportion to the respective output amounts.
  properties: dry mass 0.99418 kg, wet mass 1 kg, water content 0.00585407
- reinforcing steel: 5079.97 kg; lognormal variance with pedigree 0.0526, pedigree (2,4,5,1,1)
  Expert data for one service station
  Expert data for one service station
  properties: wet mass 1 kg, carbon content, fossil 0.004, dry mass 1 kg
- concrete, normal: 11.4999 m3; lognormal variance with pedigree 0.0526, pedigree (2,4,5,1,1)
  Expert data for one service station
  Expert data for one service station
  properties: wet mass 2380 kg, dry mass 2190 kg, water content 0.086758
- building, hall: 35.4998 m2; lognormal variance with pedigree 0.438, pedigree (5,5,5,1,1)
  Estimation
  This exchange has an activity link directly to the producing activity because the product is primarily consumed in the same geographical area where it is produced.

## Inputs from nature
- Occupation, traffic area, road network [natural resource, land]: 5599.97 m2*year; lognormal variance with pedigree 0.0926, pedigree (2,4,5,1,1)
  Expert data for one service station
- Transformation, from unspecified [natural resource, land]: 141.999 m2; lognormal variance with pedigree 0.1726, pedigree (2,4,5,1,1)
  Expert data for one service station
- Transformation, to traffic area, road network [natural resource, land]: 105.999 m2; lognormal variance with pedigree 0.1726, pedigree (2,4,5,1,1)
  Expert data for one service station
- Occupation, industrial area [natural resource, land]: 1499.99 m2*year; lognormal variance with pedigree 0.178, pedigree (5,5,5,1,1)
  Estimation
- Transformation, to industrial area [natural resource, land]: 35.4998 m2; lognormal variance with pedigree 0.248, pedigree (5,5,5,1,1)
  Estimation

## Sampling procedure
data for one service station

## Review by Arnaud Dauriat 2005-12-02
passed.
