# treatment of wastewater, average, capacity 5E9l/year

Dataset: EcoSpold 2, unit process
Geography: CH
Time period: 1994-01-01 to 2019-12-31
Technology level: current
Classification: EcoSpold01Categories: waste management/wastewater treatment
Classification: ISIC rev.4 ecoinvent: 3700:Sewerage
Tags: ConvertedDataset; Treatment
Scenario: Business-as-Usual
System model: Allocation at the point of substitution
Generated by: Gabor Doka (obsolete)
Published in: Doka G. 2008
Database: ecoinvent
isCopyrightProtected: true
accessRestrictedTo: 1

## General comment
Wastewater purified in a medium size municipal wastewater treatment plant (capacity class 3), with an average capacity size of 24900 per-captia-equivalents PCE.
Wastewater contains (in kg/m3): COD: 0.1556 (GSD=122.5%); BOD: 0.1036 (GSD=122.5%); DOC: 0.04575 (GSD=122.5%); TOC: 0.0673 (GSD=122.5%); SO4-S: 0.044 (GSD=122.5%); S part.: 0.002 (GSD=122.5%); NH4-N: 0.01495 (GSD=122.5%); NO3-N: 0.00105 (GSD=122.5%); NO2-N: 0.0004 (GSD=122.5%); N part.: 0.003279 (GSD=122.5%); N org. solv.: 0.008392 (GSD=122.5%); PO4-P: 0.002459 (GSD=122.5%); P part.: 0.0006147 (GSD=122.5%); Cl: 0.03003 (GSD=224.1%); F: 0.00003277 (GSD=224.1%); As: 0.0000009 (GSD=224.1%); Cd: 0.0000002806 (GSD=223.8%); Co: 0.000001618 (GSD=223.8%); Cr: 0.00001223 (GSD=223.8%); Cu: 0.00003744 (GSD=223.8%); Hg: 0.0000002 (GSD=223.8%); Mn: 0.000053 (GSD=224.1%); Mo: 0.0000009574 (GSD=223.8%); Ni: 0.000006589 (GSD=223.8%); Pb: 0.000008631 (GSD=223.8%); Sn: 0.0000034 (GSD=224.1%); Zn: 0.0001094 (GSD=223.8%); Si: 0.003126 (GSD=224.1%); Fe: 0.007093 (GSD=224.1%); Ca: 0.05083 (GSD=224.1%); Al: 0.001038 (GSD=224.1%); K: 0.0003989 (GSD=224.1%); Mg: 0.005707 (GSD=224.1%); Na: 0.002186 (GSD=224.1%);
[This dataset was already contained in the ecoinvent database version 2. It was not individually updated during the transfer to ecoinvent version 3. Life Cycle Impact Assessment results may still have changed, as they are affected by changes in the supply chain, i.e. in other datasets. This dataset was generated following the ecoinvent quality guidelines for version 2. It may have been subject to central changes described in the ecoinvent version 3 change report (http://www.ecoinvent.org/database/ecoinvent-version-3/reports-of-changes/), and the results of the central updates were reviewed extensively. The changes added e.g. consistent water flows and other information throughout the database. The documentation of this dataset can be found in the ecoinvent reports of version 2, which are still available via the ecoinvent website. The change report linked above covers all central changes that were made during the conversion process.]

## Included activities end
Infrastructure materials for municipal wastewater treatment plant, transports, dismantling. Land use burdens.

## Geography
Specific to the technology mix encountered in Switzerland in 2000. Well applicable to modern treatment practices in Europe, North America or Japan.

## Technology
Three stage wastewater treatment (mechanical, biological, chemical) including sludge digestion (fermentation) according to the average technology in Switzerland

## Parameters
- fraction, process water, to air: 0.1 dimensionless; name fraction_PW_to_air; lognormal variance with pedigree 0.092025, pedigree (4,4,3,2,4)
  Literature value (Statistics Canada, 2007 & Shaffer, K.H., 2008, Consumptive water use in the Great Lakes Basin, USGS) (Vionnet, S., Quantis Water Database - Technical Report, 2012).

## Reference product
- wastewater, average: -1 m3; CPC 39920: Sewage sludge; By-product classification Waste
  production volume 6.969e7 m3
    (year 2000) source: ecoinvent v2, report 13IV p.2
  property price 0 EUR2005
    Waste products are assigned a price of zero as they are assumed to require further treatment.
  property carbon content, non-fossil 0.194039
    0.0673 kg TOC/m3 (Tab A.17, ecoinvent v2.2 report 13_I). TOC was considered as Total Carbon.
  property carbon content 0.194039
    carbon content on a dry matter basis (reserved; not for manual entry)
  properties: dry mass 0.346837 kg, wet mass 1000 kg, water content 2882.2, water in wet mass 999.653 kg, carbon content, fossil 0, carbon allocation 0.0673 kg

## By-products
- electricity, for reuse in municipal waste incineration only: 0 kWh; CPC 17100: Electrical energy; By-product classification allocatable product; pedigree (1,1,1,1,1)
  Net electricity generated from this waste and used in internal MSWI plant energy redistribution.
  Uncertainty: uncertainty is calculated from uncertainties in waste composition and uncertainties in energy efficiency and the uncertainty in internal energy demand
  property exergy 3.6 MJ; name E_el_prod_MSWI_exergy
    This exergy property is based on the exergy content of the product.
  property true value relation 3.6; name E_el_prod_MSWI_true_value_relation
    property to calculate "true value" from
  property price 0.1 EUR2005; name E_el_prod_MSWI_price_EUR2005
    Estimated to be the same price as in case of electricity, medium voltage.
- heat, for reuse in municipal waste incineration only: 0 MJ; CPC 17300: Steam and hot water; By-product classification allocatable product; pedigree (1,1,1,1,1)
  Net useful heat generated from this waste and used in internal MSWI plant energy redistribution.
  Uncertainty: uncertainty is calculated from uncertainties in waste composition and uncertainties in energy efficiency and the uncertainty in internal energy demand
  property true value relation 0.1842; name E_th_prod_MSWI_true_value_relation
    property to calculate "true value" from
  property exergy 0.1842 MJ; name E_th_prod_MSWI_exergy
    This exergy property is based on the exergy content of the product.
  property price 0.0106 EUR2005; name E_th_prod_MSWI_price_EUR2005
    Average European district heat price from Ecoheatcool and Euroheat 2005-2006, Ecoheat Work package 1: The European heat market. Final report. 10.6 EUR/GJ i s the price of district heat. http://www.solarthermalworld.org/files/Ecoheatcool%20WP1%20Web.pdf?download
- zinc concentrate: 0 kg; CPC 14290: Other non-ferrous metal ores and concentrates (other than uranium or thorium ores and concentrates); By-product classification allocatable product
  Calculated value from the knowledge of the properties of both products.
  property price 0.38 EUR2005; name ByP_price_EUR2005
    Temporary price data. Calculated as 90% of purchasers price based on: Zinc content in concentrate 53%. Concentrate price per kg Zn 86.5% of refined Zn price (13.5% treatment charges according to CHR Metals Limited 2005: Dynamic cost curves. http://www.minecost.com/dynamic.pdf). 2004 zinc price from USGS (2007) Mineral commodity summaries 2007. <http://minerals.usgs.gov/minerals/pubs/mcs/2007/mcs2007.pdf> [Accessed 25 May 2010]
  property zinc content 0.53; name zinc_C_zinc_concentrate
    Zinc content on a dry matter basis. Value taken from teh "zinc mine operation" /GLO dataset.
  property dry mass 1 kg; name DM_zinc_concentrate
  property carbon content 0
    carbon content on a dry matter basis (reserved; not for manual entry)
  properties: wet mass 1 kg, water content 0, carbon content, non-fossil 0, carbon content, fossil 0, water in wet mass 0 kg, carbon allocation 0 kg

## Inputs from technosphere
- process-specific burdens, slag landfill: 0.020463 kg; lognormal variance with pedigree 0.07, pedigree (1,1,5,1,1)
  burden from sludge incineration. Uncertainty calculated from wastewater composition and treatment model;activityLink introduced to establish a direct link to the corresponding regional supply of this product
- iron (III) chloride, without water, in 40% solution state: 0.015946 kg; lognormal variance with pedigree 0.1, pedigree (1,1,5,1,1)
  direct wastewater treatment plant burden plus burden from sludge incineration. Uncertainty calculated from wastewater composition and treatment model
  properties: wet mass 1 kg, dry mass 1 kg
- quicklime, milled, packed: 1.0865e-6 kg; lognormal variance with pedigree 0.08, pedigree (1,1,5,1,1)
  burden from sludge incineration. Uncertainty calculated from wastewater composition and treatment model
  properties: dry mass 0.99 kg, wet mass 1 kg, water content 0.010101
- chromium oxide, flakes: 3.6479e-8 kg; lognormal variance with pedigree 0.54, pedigree (1,1,5,1,1)
  (same comment as for quicklime, milled, packed)
  properties: dry mass 1 kg, wet mass 1 kg
- aluminium sulfate, powder: 0.0031512 kg; lognormal variance with pedigree 0.1, pedigree (1,1,5,1,1)
  direct wastewater treatment plant burden. Uncertainty calculated from wastewater composition and treatment model
  properties: wet mass 1 kg, dry mass 1 kg
- heat, district or industrial, natural gas: 0.00548082 MJ; lognormal variance with pedigree 0.22, pedigree (1,1,5,1,1)
  (same comment as for quicklime, milled, packed)
- slag landfill: 3.6379e-11 unit; lognormal variance with pedigree 0.07, pedigree (1,1,5,1,1)
  (same comment as for quicklime, milled, packed)
- chemical, organic: 4.5537e-7 kg; lognormal variance with pedigree 0.43, pedigree (1,1,5,1,1)
  (same comment as for quicklime, milled, packed)
  properties: carbon content, fossil 0.628, wet mass 1 kg, dry mass 1 kg
  note on carbon content, fossil: This dataset is an unweighted average of 20 organic substances (listed in Tab 88.1, ecoinvent v2.2 report 8, part II), being part of the top100 chemicals included in this database. The C-content has also been calculated as an unweighted average of the C content of the substances composing this dataset.
- electricity, low voltage: 0.20571 kWh; lognormal variance with pedigree 0.06, pedigree (1,1,5,1,1)
  (same comment as for aluminium sulfate, powder)
- sodium hydroxide, without water, in 50% solution state: 0.00030516 kg; lognormal variance with pedigree 0.09, pedigree (1,1,5,1,1)
  (same comment as for quicklime, milled, packed)
  properties: dry mass 1 kg, wet mass 1 kg
- wastewater treatment facility, capacity 5E9l/year: 5.6882e-9 unit; lognormal variance with pedigree 0.04, pedigree (1,1,5,1,1)
  uncertainty heeded in exchanges of the module
- ammonia, liquid: 6.2445e-5 kg; lognormal variance with pedigree 0.22, pedigree (1,1,5,1,1)
  (same comment as for quicklime, milled, packed)
  properties: dry mass 1 kg, wet mass 1 kg
- titanium dioxide: 1.7875e-6 kg; lognormal variance with pedigree 0.54, pedigree (1,1,5,1,1)
  (same comment as for quicklime, milled, packed)
  properties: dry mass 1 kg, wet mass 1 kg
- process-specific burdens, municipal waste incineration: 0.11237 kg; lognormal variance with pedigree 0.04, pedigree (1,1,5,1,1)
  (same comment as for process-specific burdens, slag landfill)
- liquid manure spreading, by vacuum tanker: 0.00039637 m3; lognormal variance with pedigree 0.04, pedigree (1,1,5,1,1)
  burden from sludge spreading. Uncertainty calculated from wastewater composition and treatment model
  This exchange has an activity link directly to the producing activity because the product is primarily consumed in the same geographical area where it is produced.
- chemical, inorganic: 5.7056e-7 kg; lognormal variance with pedigree 0.08, pedigree (1,1,5,1,1)
  (same comment as for quicklime, milled, packed)
  properties: carbon content, fossil 0.003, wet mass 1 kg, dry mass 1 kg
  note on carbon content, fossil: This dataset is an unweighted average of 20 inorganic substances (listed in Tab 88.1, ecoinvent v2.2 report 8, part II), being part of the top100 chemicals included in this database. The C-content has also been calculated as an unweighted average of the C content of the substances composing this dataset.
- cement, unspecified: 0.0012833 kg; lognormal variance with pedigree 0.08, pedigree (1,1,5,1,1)
  (same comment as for quicklime, milled, packed)
  properties: wet mass 1 kg, dry mass 1 kg
- waste cement, hydrated: -0.0032083 kg; lognormal variance with pedigree 0.08, pedigree (1,1,5,1,1)
  (same comment as for quicklime, milled, packed)
  production volume 223586 kg; = (Ref('df148f76-d3ad-49e7-96be-358e73937695')*-1)* Ref('b6d09289-3426-4da7-9209-34dd16f424ed', 'ProductionVolume')/ABS( Ref('b6d09289-3426-4da7-9209-34dd16f424ed'))
    Calculated from the production volume of sewage, average in proportion to the respective output amounts.
  properties: wet mass 1 kg, dry mass 1 kg
- municipal waste incineration facility: 2.8093e-11 unit; lognormal variance with pedigree 0.04, pedigree (1,1,5,1,1)
  (same comment as for quicklime, milled, packed)
- waste plastic, mixture: -0.0155 kg; lognormal variance with pedigree 0.04, pedigree (1,1,5,1,1)
  (same comment as for aluminium sulfate, powder)
  production volume 1.0802e6 kg; = (Ref('a53ef8ac-ff7c-4d40-94bf-1ac548ca8b31')*-1)* Ref('b6d09289-3426-4da7-9209-34dd16f424ed', 'ProductionVolume')/ABS( Ref('b6d09289-3426-4da7-9209-34dd16f424ed'))
    (same comment as for waste cement, hydrated)
  properties: wet mass 1 kg, carbon content, fossil 0.747344, dry mass 0.847 kg, water content 0.180638
  note on carbon content, fossil: C content in 1 kg DM was calculated using data in Tab A.2, ecoinvent v2.2 report 13_I
- electricity, high voltage: 0.016155 kWh; lognormal variance with pedigree 0.49, pedigree (1,1,5,1,1)
  (same comment as for quicklime, milled, packed)
- waste graphical paper: -0.0155 kg; lognormal variance with pedigree 0.04, pedigree (1,1,5,1,1)
  (same comment as for aluminium sulfate, powder)
  production volume 1.0802e6 kg; = (Ref('07718266-3409-4fbf-a1e3-1a1de2ac5965')*-1)* Ref('b6d09289-3426-4da7-9209-34dd16f424ed', 'ProductionVolume')/ABS( Ref('b6d09289-3426-4da7-9209-34dd16f424ed'))
    (same comment as for waste cement, hydrated)
  properties: wet mass 1 kg, carbon content, non-fossil 0.454955, water content 0.126126, dry mass 0.888 kg
- hydrochloric acid, without water, in 30% solution state: 3.4233e-7 kg; lognormal variance with pedigree 0.08, pedigree (1,1,5,1,1)
  (same comment as for quicklime, milled, packed)
  properties: dry mass 1 kg, wet mass 1 kg
- iron sulfate: 0.01166 kg; lognormal variance with pedigree 0.1, pedigree (1,1,5,1,1)
  (same comment as for aluminium sulfate, powder)
  properties: wet mass 1 kg, dry mass 1 kg
- process-specific burdens, residual material landfill: 0.0032083 kg; lognormal variance with pedigree 0.07, pedigree (1,1,5,1,1)
  (same comment as for process-specific burdens, slag landfill)
- sewer grid, 5E9l/year, 110 km: 2.1782e-7 km; lognormal variance with pedigree 0.04, pedigree (1,1,5,1,1)
  uncertainty heeded in exchanges of the module
- residual material landfill: 6.684e-12 unit; lognormal variance with pedigree 0.07, pedigree (1,1,5,1,1)
  (same comment as for quicklime, milled, packed)
- heat, district or industrial, other than natural gas: 0.094244 MJ; lognormal variance with pedigree 0.05, pedigree (1,1,5,1,1)
  (same comment as for quicklime, milled, packed)

## Emissions to nature
- Zinc, ion [water, surface water]: 3.3808e-5 kg; lognormal variance with pedigree 0.65, pedigree (1,1,5,1,1)
  sewer overload discharge plus direct wastewater treatment plant emission plus emission from sludge incineration. Uncertainty calculated from wastewater composition and treatment model
- Molybdenum [water, ground-, long-term]: 2.0729e-7 kg; lognormal variance with pedigree 0.71, pedigree (1,1,5,1,1)
  emission from sludge incineration. Uncertainty calculated from wastewater composition and treatment model
- Arsenic [air, urban air close to ground]: 2.5337e-10 kg; lognormal variance with pedigree 0.73, pedigree (1,1,5,1,1)
  direct digester gas emission plus emission from sludge incineration. Uncertainty calculated from wastewater composition and treatment model
- Magnesium [air, urban air close to ground]: 4.0971e-7 kg; lognormal variance with pedigree 0.73, pedigree (1,1,5,1,1)
  (same comment as for Arsenic)
- Calcium, ion [water, surface water]: 0.045857 kg; lognormal variance with pedigree 0.67, pedigree (1,1,5,1,1)
  (same comment as for Zinc, ion)
- Tin, ion [water, surface water]: 1.4223e-6 kg; lognormal variance with pedigree 0.66, pedigree (1,1,5,1,1)
  (same comment as for Zinc, ion)
- Cadmium, ion [water, ground-, long-term]: 7.3701e-10 kg; lognormal variance with pedigree 6.9, pedigree (1,1,5,1,1)
  (same comment as for Molybdenum)
- BOD5, Biological Oxygen Demand [water, surface water]: 0.0098229 kg; lognormal variance with pedigree 0.07, pedigree (1,1,5,1,1)
  (same comment as for Zinc, ion)
- Manganese [air, urban air close to ground]: 7.5533e-14 kg; lognormal variance with pedigree 0.83, pedigree (1,1,5,1,1)
  (same comment as for Arsenic)
- Nitrogen [water, surface water]: 0.00049 kg; lognormal variance with pedigree 0.08, pedigree (1,1,5,1,1)
  direct wastewater treatment plant emission. Uncertainty calculated from wastewater composition and treatment model
- Cadmium, ion [water, surface water]: 1.4245e-7 kg; lognormal variance with pedigree 0.66, pedigree (1,1,5,1,1)
  (same comment as for Zinc, ion)
- Tin [soil, agricultural]: 9.2667e-7 kg; lognormal variance with pedigree 0.71, pedigree (1,1,5,1,1)
  emission from sludge spreading. Uncertainty calculated from wastewater composition and treatment model
- COD, Chemical Oxygen Demand [water, ground-, long-term]: 0.00022677 kg; lognormal variance with pedigree 0.11, pedigree (1,1,5,1,1)
  (same comment as for Molybdenum)
- Cyanide [air, urban air close to ground]: 1.114e-6 kg; lognormal variance with pedigree 0.24, pedigree (1,1,5,1,1)
  (same comment as for Molybdenum)
- Cobalt [water, ground-, long-term]: 3.7072e-7 kg; lognormal variance with pedigree 0.71, pedigree (1,1,5,1,1)
  (same comment as for Molybdenum)
- Lead [soil, agricultural]: 3.5998e-6 kg; lognormal variance with pedigree 0.71, pedigree (1,1,5,1,1)
  (same comment as for Tin)
- Silicon [air, urban air close to ground]: 3.636e-6 kg; lognormal variance with pedigree 0.73, pedigree (1,1,5,1,1)
  (same comment as for Arsenic)
- Water [water, unspecified]: 0.9 m3; name water_to_water_unspecified; lognormal variance with pedigree 0.0807, pedigree (2,2,5,1,1)
  Calculated value based on water balance.
  property fraction, origin: salt water 0; name fraction_origin_salt_water_Ww
  property carbon content, non-fossil 0; name C_content_non_fossil
  property fraction, origin: fresh water 1; name fraction_origin_fresh_water_Ww
  property dry mass 0 kg; name DM
  property carbon content, fossil 0; name C_content_fossil
  property fraction, origin: unspecified 0; name fraction_origin_unspecified_Ww
  property water in wet mass 1000 kg; name WWM
  property wet mass 1000 kg; name WM
- Arsenic, ion [water, surface water]: 7.5206e-7 kg; lognormal variance with pedigree 0.61, pedigree (1,1,5,1,1)
  (same comment as for Zinc, ion)
- Nitrite [water, surface water]: 0.000644 kg; lognormal variance with pedigree 0.08, pedigree (1,1,5,1,1)
  (same comment as for Nitrogen)
- Water [air, unspecified]: 0.1 m3; name water_to_air_unspecified; lognormal variance with pedigree 0.0807, pedigree (2,2,5,1,1)
  Calculated value based on water balance.
  property fraction, origin: salt water 0; name fraction_origin_salt_water
  property fraction, origin: unspecified 1; name fraction_origin_unspecified
  property fraction, origin: fresh water 0; name fraction_origin_fresh_water
- NMVOC, non-methane volatile organic compounds, unspecified origin [air, urban air close to ground]: 2.2813e-6 kg; lognormal variance with pedigree 0.26, pedigree (1,1,5,1,1)
  direct digester gas emission. Uncertainty calculated from wastewater composition and treatment model
- Cadmium [soil, agricultural]: 6.4759e-8 kg; lognormal variance with pedigree 0.71, pedigree (1,1,5,1,1)
  (same comment as for Tin)
- Mercury [soil, agricultural]: 6.4759e-8 kg; lognormal variance with pedigree 0.71, pedigree (1,1,5,1,1)
  (same comment as for Tin)
- Chromium, ion [water, surface water]: 1.0204e-8 kg; lognormal variance with pedigree 0.72, pedigree (1,1,5,1,1)
  (same comment as for Molybdenum)
- Chloride [water, surface water]: 0.040484 kg; lognormal variance with pedigree 0.48, pedigree (1,1,5,1,1)
  (same comment as for Zinc, ion)
- DOC, Dissolved Organic Carbon [water, surface water]: 0.0075378 kg; lognormal variance with pedigree 0.08, pedigree (1,1,5,1,1)
  (same comment as for Zinc, ion)
- Nickel [air, urban air close to ground]: 5.9485e-14 kg; lognormal variance with pedigree 0.81, pedigree (1,1,5,1,1)
  (same comment as for Arsenic)
- Ammonia [air, urban air close to ground]: 0.00041569 kg; lognormal variance with pedigree 0.29, pedigree (1,1,5,1,1)
  direct digester gas emission plus emission from sludge incineration plus emission from sludge spreading. Uncertainty calculated from wastewater composition and treatment model
- Iron [air, urban air close to ground]: 2.3545e-7 kg; lognormal variance with pedigree 0.2, pedigree (1,1,5,1,1)
  (same comment as for Arsenic)
- Nitrogen oxides [air, urban air close to ground]: 0.00069387 kg; lognormal variance with pedigree 0.08, pedigree (1,1,5,1,1)
  (same comment as for Arsenic)
- TOC, Total Organic Carbon [water, ground-, long-term]: 8.9735e-5 kg; lognormal variance with pedigree 0.11, pedigree (1,1,5,1,1)
  (same comment as for Molybdenum)
- Cadmium [air, urban air close to ground]: 4.1068e-12 kg; lognormal variance with pedigree 0.73, pedigree (1,1,5,1,1)
  (same comment as for Arsenic)
- Silicon [water, surface water]: 0.00018783 kg; lognormal variance with pedigree 0.57, pedigree (1,1,5,1,1)
  (same comment as for Zinc, ion)
- Fluoride [water, surface water]: 3.2769e-5 kg; lognormal variance with pedigree 0.67, pedigree (1,1,5,1,1)
  (same comment as for Zinc, ion)
- Calcium [air, urban air close to ground]: 4.418e-6 kg; lognormal variance with pedigree 0.73, pedigree (1,1,5,1,1)
  (same comment as for Arsenic)
- Phosphate [water, ground-]: 1.7752e-5 kg; lognormal variance with pedigree 0.13, pedigree (1,1,5,1,1)
  (same comment as for Tin)
- Carbon dioxide, non-fossil [air, urban air close to ground]: 0.1874 kg; lognormal variance with pedigree 0.06, pedigree (1,1,5,1,1)
  direct wastewater treatment plant emission plus direct digester gas emission plus emission from sludge incineration. Uncertainty calculated from wastewater composition and treatment model
- Magnesium [water, surface water]: 0.0051483 kg; lognormal variance with pedigree 0.67, pedigree (1,1,5,1,1)
  (same comment as for Zinc, ion)
- Molybdenum [air, urban air close to ground]: 5.012e-10 kg; lognormal variance with pedigree 0.73, pedigree (1,1,5,1,1)
  (same comment as for Arsenic)
- Chromium [soil, agricultural]: 2.8227e-6 kg; lognormal variance with pedigree 0.71, pedigree (1,1,5,1,1)
  (same comment as for Tin)
- Arsenic [soil, agricultural]: 9.1004e-8 kg; lognormal variance with pedigree 0.71, pedigree (1,1,5,1,1)
  (same comment as for Tin)
- Manganese [water, ground-, long-term]: 1.1945e-5 kg; lognormal variance with pedigree 0.87, pedigree (1,1,5,1,1)
  (same comment as for Molybdenum)
- Chromium VI [water, surface water]: 6.3121e-6 kg; lognormal variance with pedigree 0.65, pedigree (1,1,5,1,1)
  (same comment as for Zinc, ion)
- Sulfur [soil, agricultural]: 0.00072107 kg; lognormal variance with pedigree 0.1, pedigree (1,1,5,1,1)
  (same comment as for Tin)
- DOC, Dissolved Organic Carbon [water, ground-, long-term]: 8.9735e-5 kg; lognormal variance with pedigree 0.11, pedigree (1,1,5,1,1)
  (same comment as for Molybdenum)
- Calcium [soil, agricultural]: 0.0023366 kg; lognormal variance with pedigree 0.71, pedigree (1,1,5,1,1)
  (same comment as for Tin)
- Ammonium, ion [water, surface water]: 0.011027 kg; lognormal variance with pedigree 0.06, pedigree (1,1,5,1,1)
  (same comment as for Nitrogen)
- Nitrate [water, ground-, long-term]: 4.4464e-5 kg; lognormal variance with pedigree 0.08, pedigree (1,1,5,1,1)
  (same comment as for Molybdenum)
- Nitrate [water, surface water]: 0.048302 kg; lognormal variance with pedigree 0.06, pedigree (1,1,5,1,1)
  (same comment as for Zinc, ion)
- Sulfate [water, ground-, long-term]: 0.0020512 kg; lognormal variance with pedigree 0.1, pedigree (1,1,5,1,1)
  (same comment as for Molybdenum)
- Molybdenum [soil, agricultural]: 2.2094e-7 kg; lognormal variance with pedigree 0.71, pedigree (1,1,5,1,1)
  (same comment as for Tin)
- Potassium, ion [water, surface water]: 0.0003989 kg; lognormal variance with pedigree 0.67, pedigree (1,1,5,1,1)
  (same comment as for Zinc, ion)
- Carbon [soil, agricultural]: 0.008102 kg; lognormal variance with pedigree 0.1, pedigree (1,1,5,1,1)
  (same comment as for Tin)
- Aluminium [air, urban air close to ground]: 1.223e-6 kg; lognormal variance with pedigree 0.47, pedigree (1,1,5,1,1)
  (same comment as for Arsenic)
- Zinc [air, urban air close to ground]: 6.5594e-10 kg; lognormal variance with pedigree 0.76, pedigree (1,1,5,1,1)
  (same comment as for Arsenic)
- Copper, ion [water, ground-, long-term]: 1.1913e-5 kg; lognormal variance with pedigree 0.73, pedigree (1,1,5,1,1)
  (same comment as for Molybdenum)
- Magnesium [soil, agricultural]: 0.00026233 kg; lognormal variance with pedigree 0.71, pedigree (1,1,5,1,1)
  (same comment as for Tin)
- Sodium, ion [water, surface water]: 0.002186 kg; lognormal variance with pedigree 0.67, pedigree (1,1,5,1,1)
  (same comment as for Zinc, ion)
- Aluminium [water, ground-, long-term]: 0.00057938 kg; lognormal variance with pedigree 0.46, pedigree (1,1,5,1,1)
  (same comment as for Molybdenum)
- Arsenic, ion [water, ground-, long-term]: 5.6685e-8 kg; lognormal variance with pedigree 0.71, pedigree (1,1,5,1,1)
  (same comment as for Molybdenum)
- Phosphate [water, surface water]: 0.002715 kg; lognormal variance with pedigree 0.08, pedigree (1,1,5,1,1)
  sewer overload discharge plus direct wastewater treatment plant emission plus emission from sludge incineration plus emission from sludge spreading. Uncertainty calculated from wastewater composition and treatment model
- Copper [soil, agricultural]: 1.2994e-5 kg; lognormal variance with pedigree 0.71, pedigree (1,1,5,1,1)
  (same comment as for Tin)
- Magnesium [water, ground-, long-term]: 0.00027466 kg; lognormal variance with pedigree 0.71, pedigree (1,1,5,1,1)
  (same comment as for Molybdenum)
- Nickel, ion [water, ground-, long-term]: 1.2904e-6 kg; lognormal variance with pedigree 0.71, pedigree (1,1,5,1,1)
  (same comment as for Molybdenum)
- Iron [soil, agricultural]: 0.006218 kg; lognormal variance with pedigree 0.16, pedigree (1,1,5,1,1)
  (same comment as for Tin)
- Iron, ion [water, ground-, long-term]: 0.0033035 kg; lognormal variance with pedigree 0.99, pedigree (1,1,5,1,1)
  (same comment as for Molybdenum)
- Lead [air, urban air close to ground]: 1.5184e-10 kg; lognormal variance with pedigree 0.75, pedigree (1,1,5,1,1)
  (same comment as for Arsenic)
- Aluminium [water, surface water]: 6.231e-5 kg; lognormal variance with pedigree 0.55, pedigree (1,1,5,1,1)
  (same comment as for Zinc, ion)
- TOC, Total Organic Carbon [water, surface water]: 0.0072993 kg; lognormal variance with pedigree 0.08, pedigree (1,1,5,1,1)
  (same comment as for Zinc, ion)
- Methane, non-fossil [air, urban air close to ground]: 0.00050234 kg; lognormal variance with pedigree 0.14, pedigree (1,1,5,1,1)
  (same comment as for Arsenic)
- Sulfur dioxide [air, urban air close to ground]: 0.00088561 kg; lognormal variance with pedigree 0.11, pedigree (1,1,5,1,1)
  (same comment as for Arsenic)
- Chromium VI [water, ground-, long-term]: 3.3892e-7 kg; lognormal variance with pedigree 1.09, pedigree (1,1,5,1,1)
  (same comment as for Molybdenum)
- Copper, ion [water, surface water]: 9.7124e-6 kg; lognormal variance with pedigree 0.65, pedigree (1,1,5,1,1)
  (same comment as for Zinc, ion)
- Zinc [soil, agricultural]: 3.54e-5 kg; lognormal variance with pedigree 0.71, pedigree (1,1,5,1,1)
  (same comment as for Tin)
- Tin, ion [water, ground-, long-term]: 5.2834e-7 kg; lognormal variance with pedigree 1.26, pedigree (1,1,5,1,1)
  (same comment as for Molybdenum)
- Sulfate [water, surface water]: 0.14483 kg; lognormal variance with pedigree 0.08, pedigree (1,1,5,1,1)
  (same comment as for Zinc, ion)
- Phosphate [water, ground-, long-term]: 0.000135 kg; lognormal variance with pedigree 4.25, pedigree (1,1,5,1,1)
  (same comment as for Molybdenum)
- BOD5, Biological Oxygen Demand [water, ground-, long-term]: 7.4177e-5 kg; lognormal variance with pedigree 0.11, pedigree (1,1,5,1,1)
  (same comment as for Molybdenum)
- Aluminium [soil, agricultural]: 0.00069025 kg; lognormal variance with pedigree 0.45, pedigree (1,1,5,1,1)
  (same comment as for Tin)
- Molybdenum [water, surface water]: 5.287e-7 kg; lognormal variance with pedigree 0.59, pedigree (1,1,5,1,1)
  (same comment as for Zinc, ion)
- Nickel [soil, agricultural]: 1.2152e-6 kg; lognormal variance with pedigree 0.71, pedigree (1,1,5,1,1)
  (same comment as for Tin)
- COD, Chemical Oxygen Demand [water, surface water]: 0.030152 kg; lognormal variance with pedigree 0.08, pedigree (1,1,5,1,1)
  (same comment as for Zinc, ion)
- Cobalt [soil, agricultural]: 3.7332e-7 kg; lognormal variance with pedigree 0.71, pedigree (1,1,5,1,1)
  (same comment as for Tin)
- Manganese [soil, agricultural]: 1.223e-5 kg; lognormal variance with pedigree 0.71, pedigree (1,1,5,1,1)
  (same comment as for Tin)
- Dinitrogen monoxide [air, urban air close to ground]: 0.00010637 kg; lognormal variance with pedigree 0.08, pedigree (1,1,5,1,1)
  direct wastewater treatment plant emission plus direct digester gas emission plus emission from sludge incineration plus emission from sludge spreading. Uncertainty calculated from wastewater composition and treatment model
- Silicon [soil, agricultural]: 0.001377 kg; lognormal variance with pedigree 0.71, pedigree (1,1,5,1,1)
  (same comment as for Tin)
- Zinc, ion [water, ground-, long-term]: 6.2251e-7 kg; lognormal variance with pedigree 5.51, pedigree (1,1,5,1,1)
  (same comment as for Molybdenum)
- Carbon monoxide, non-fossil [air, urban air close to ground]: 0.00016855 kg; lognormal variance with pedigree 0.15, pedigree (1,1,5,1,1)
  (same comment as for Arsenic)
- Tin [air, urban air close to ground]: 1.3946e-9 kg; lognormal variance with pedigree 0.73, pedigree (1,1,5,1,1)
  (same comment as for Arsenic)
- Lead [water, surface water]: 9.4871e-7 kg; lognormal variance with pedigree 0.6, pedigree (1,1,5,1,1)
  (same comment as for Zinc, ion)
- Copper [air, urban air close to ground]: 1.0879e-10 kg; lognormal variance with pedigree 0.76, pedigree (1,1,5,1,1)
  (same comment as for Arsenic)
- Chromium [air, urban air close to ground]: 2.3673e-13 kg; lognormal variance with pedigree 0.8, pedigree (1,1,5,1,1)
  (same comment as for Arsenic)
- Cobalt [water, surface water]: 8.2108e-7 kg; lognormal variance with pedigree 0.66, pedigree (1,1,5,1,1)
  (same comment as for Zinc, ion)
- Nickel, ion [water, surface water]: 3.9965e-6 kg; lognormal variance with pedigree 0.66, pedigree (1,1,5,1,1)
  (same comment as for Zinc, ion)
- Mercury [water, surface water]: 6.2619e-8 kg; lognormal variance with pedigree 0.64, pedigree (1,1,5,1,1)
  (same comment as for Zinc, ion)
- Lead [water, ground-, long-term]: 2.909e-7 kg; lognormal variance with pedigree 6.92, pedigree (1,1,5,1,1)
  (same comment as for Molybdenum)
- Mercury [water, ground-, long-term]: 3.8216e-9 kg; lognormal variance with pedigree 2.97, pedigree (1,1,5,1,1)
  (same comment as for Molybdenum)
- Calcium, ion [water, ground-, long-term]: 0.0023063 kg; lognormal variance with pedigree 0.71, pedigree (1,1,5,1,1)
  (same comment as for Molybdenum)
- Manganese [water, surface water]: 2.6898e-5 kg; lognormal variance with pedigree 0.66, pedigree (1,1,5,1,1)
  (same comment as for Zinc, ion)
- Cobalt [air, urban air close to ground]: 1.3444e-14 kg; lognormal variance with pedigree 0.81, pedigree (1,1,5,1,1)
  (same comment as for Arsenic)
- Mercury [air, urban air close to ground]: 3.3644e-13 kg; lognormal variance with pedigree 0.74, pedigree (1,1,5,1,1)
  (same comment as for Arsenic)
- Iron, ion [water, surface water]: 0.003602 kg; lognormal variance with pedigree 0.66, pedigree (1,1,5,1,1)
  (same comment as for Zinc, ion)
- Silicon [water, ground-, long-term]: 0.00013562 kg; lognormal variance with pedigree 5.46, pedigree (1,1,5,1,1)
  (same comment as for Molybdenum)
- Phosphorus [air, urban air close to ground]: 1.1527e-6 kg; lognormal variance with pedigree 0.1, pedigree (1,1,5,1,1)
  (same comment as for Arsenic)

## Extrapolations
This dataset has been extrapolated from year 2000 to the year of the calculation (2019). The uncertainty has been adjusted accordingly.

## Review by Niels Jungbluth 2009-01-22
passed.
