# fibre cement roof slate production

Dataset: EcoSpold 2, unit process
Geography: CH
Time period: 1991-01-01 to 2019-12-31
Technology level: current
Classification: ISIC rev.4 ecoinvent: 2395:Manufacture of articles of concrete, cement and plaster
Classification: EcoSpold01Categories: construction materials/coverings
Tags: ConvertedDataset
Scenario: Business-as-Usual
System model: Allocation at the point of substitution
Generated by: Daniel Kellenberger (obsolete)
Published in: Kellenberger D. 2004
Database: ecoinvent
isCopyrightProtected: true
accessRestrictedTo: 1

## General comment
This dataset represents the production of 1 kg of fibre cement roof slates. As there are filters in the productions, air emission data are lacking but emissions from the boilers are imported via the relevant modules. Moreover, a certain amount of CO2 produced by the boiler is bound in the waste water, which is inventoried with a negative value as an avoided emission. The total yearly production is assumed to be 20'000 tonnes.
[This dataset was already contained in the ecoinvent database version 2. It was not individually updated during the transfer to ecoinvent version 3. Life Cycle Impact Assessment results may still have changed, as they are affected by changes in the supply chain, i.e. in other datasets. This dataset was generated following the ecoinvent quality guidelines for version 2. It may have been subject to central changes described in the ecoinvent version 3 change report (http://www.ecoinvent.org/database/ecoinvent-version-3/reports-of-changes/), and the results of the central updates were reviewed extensively. The changes added e.g. consistent water flows and other information throughout the database. The documentation of this dataset can be found in the ecoinvent reports of version 2, which are still available via the ecoinvent website. The change report linked above covers all central changes that were made during the conversion process.]

## Included activities start
From the extraction of raw materials.

## Included activities end
The activity ends with the roof slates produced and the wastes treated. The dataset includes the whole manufacturing process to produce fibre cement products (raw material provision, raw material mixing, forming, post curing process coating process, and storage), transports to plant processes, and infrastructure. The dataset doesn't include dust emissions from the production process as they are collected in filters and reused in the process, and doesn't include emissions from fuel combustion processes, acid for neutralisation of the wastewater and energy requirements for administration.

## Geography
Data is based on a Swiss company.

## Technology
The dataset is based on the current Swiss technology. The raw materials are mixed with water to a homogeneous paste. Rotating sieving cylinders dip in this fibre cement mush which drain to the inside. Therefore the sieve surface gets covered with a layer of fleece of about 1mm which is transported with a conveyor belt. The produced endless mat is winded up on a format-cylinder until the demanded thickness is reached. With that process the fibres of the neighbour layers are interconnecting. After cutting up the mat cylinder the mat is detached from the format-cylinder and by punching and pressing automatically formed to small format slates, even and corrugated slabs.

## Parameters
- fraction, process water, to air: 0.15 dimensionless; name fraction_PW_to_air; lognormal variance with pedigree 0.092025, pedigree (4,4,3,2,4)
  Literature value. In case when no industry/process specific data are available, default evaporation fraction value is used. This value is 15% and is based on literature (Statistics Canada, 2007 & Shaffer, K.H., 2008, Consumptive water use in the Great Lakes Basin, USGS & Shiklomanov, 2003, World Water Resources at the Beginning of the 21st Century) and has been approved by an expert.
- fraction, tap water, to air: 0.15; name fraction_TW_to_air; = fraction_PW_to_air; lognormal variance with pedigree 0.092025, pedigree (4,4,3,2,4)
  Calculated value. See comment in the other parametres present in this dataset. Tap water is considered to be always used as process water, thus process water fractions to air are applied to all tap water input flows to calculate the amount of water consumed in the processes.

## Reference product
- fibre cement roof slate: 0 kg; CPC 37540: Tiles, flagstones, bricks and similar articles, of cement, concrete or artificial stone; By-product classification allocatable product
  Roof slates are used for roof covering tiles instead of clay roof tiles
  The technical specifications are:
  Bulk density rho [kg/m3]: 1800
  Thermal conductivity lamda [W/mK]: about 0.5
  Weight per area [kg/m2]: 23.7 - 24.6 (used: 24.2)
  Thickness [cm]: 1.34
  Maximum size [mm]: 600 * 300
  Further references:
  Weibel T. and Stritz A. (1995) Ökoinventare und Wirkungsbilanzen von Baumaterialien; Grundlagen für den ökologischen Vergleich von Hochbaukonstruktionen. In: ESU-Reihe Nr. 1/95. Laboratorium für Energiesysteme, Eidg. Technische Hochschule (ETH), Zürich.
  Starzner S. and Wurmer-Weiss P. (2000) ECOBIS 2000, ökologisches Baustoffinformationssystem.
  SIA building materials declaration:
  http://www.sia.ch/cf/oekoinfoliste.cfm?ID=2943702&Lang=d&Mfg=72&Grp=0&Produkt=, access date: Mai 2003
  Roof slates are used for roof covering tiles instead of clay roof tiles
  The technical specifications are:
  Bulk density rho [kg/m3]: 1800
  Thermal conductivity lamda [W/mK]: about 0.5
  Weight per area [kg/m2]: 23.7 - 24.6 (used: 24.2)
  Thickness [cm]: 1.34
  Maximum size [mm]: 600 * 300
  Further references:
  Weibel T. and Stritz A. (1995) Ökoinventare und Wirkungsbilanzen von Baumaterialien; Grundlagen für den ökologischen Vergleich von Hochbaukonstruktionen. In: ESU-Reihe Nr. 1/95. Laboratorium für Energiesysteme, Eidg. Technische Hochschule (ETH), Zürich.
  Starzner S. and Wurmer-Weiss P. (2000) ECOBIS 2000, ökologisches Baustoffinformationssystem.
  SIA building materials declaration:
  http://www.sia.ch/cf/oekoinfoliste.cfm?ID=2943702&Lang=d&Mfg=72&Grp=0&Produkt=, access date: Mai 2003
  production volume 0 kg
    This is a placeholder value that does not reflect real-world production volumes. This dataset does not currently require a real-world production volume to work in the database framework, and no actual data were collected yet. This has no negative effect on the results of the ecoinvent database. The placeholder value of this activity was scaled according to the nominal GDP of 2005 (source: United Nations, http://data.un.org/Glossary.aspx?q=GDP+%28current+US%24%29, accessed 20130726) to reflect an appropriate share of the global production volume, which is also a placeholder value.
  property carbon content, non-fossil 0.01288
    Tab 5.1, ecoinvent v2.2 report 7, part IX. Fibres (pulp) 2.8%. Fibres (polyvinyl alcohol) 2.6%. C-content/dry mass of natural fibres was considered 46% (from 'Evolutionary and Biochemical Aspects', A.D. Kay and T. Vrede (in Global Ecology, 2010, Elsevier B.V., S.E. Jørgensen Ed.)). C-content/dry mass of polyvinyl alcohol ((C2H4O)x) was considered =24/44.
  property carbon content, fossil 0.0141818
    Tab 5.1, ecoinvent v2.2 report 7, part IX. Fibres (pulp) 2.5%. Fibres (polyvinyl alcohol) 3.7%. C-content/dry mass of natural fibres was considered 46% (from 'Evolutionary and Biochemical Aspects', A.D. Kay and T. Vrede (in Global Ecology, 2010, Elsevier B.V., S.E. Jørgensen Ed.)). C-content/dry mass of polyvinyl alcohol ((C2H4O)x) was considered =24/44.
  property carbon content 0.0270618
    carbon content on a dry matter basis (reserved; not for manual entry)
  properties: water in wet mass 0 kg, price 1.77 EUR2005, wet mass 1 kg, dry mass 1 kg, water content 0, carbon allocation 0.0270618 kg
- waste paper, unsorted: 0 kg; CPC 39240: Waste and scrap of paper or paperboard; By-product classification Recyclable; pedigree (1,1,1,1,1)
  Estimation, based on legal requirements. It is used as a raw material and losses are neglected as they are assumed to be internally reused.
  Legal requirements:
  SIA building product declaration
  http://www.sia.ch/cf/oekoinfoliste.cfm?ID=2943702&Lang=d&Mfg=72&Grp=0&Produkt=, access date: Mai 2003
- fibre cement roof slate: 1 kg; CPC 37540: Tiles, flagstones, bricks and similar articles, of cement, concrete or artificial stone; By-product classification allocatable product
  (same comment as for fibre cement roof slate)
  production volume 0.0336675 kg

## By-products
- fibre cement roof slate: 0 kg; CPC 37540: Tiles, flagstones, bricks and similar articles, of cement, concrete or artificial stone; By-product classification allocatable product
  (same comment as for fibre cement roof slate)
  properties: carbon content, non-fossil 0.01288, water in wet mass 0 kg, price 1.77 EUR2005, wet mass 1 kg, dry mass 1 kg, carbon content, fossil 0.0141818, water content 0, carbon content 0.0270618, carbon allocation 0.0270618 kg
- electricity, for reuse in municipal waste incineration only: 0 kWh; CPC 17100: Electrical energy; By-product classification allocatable product; pedigree (1,1,1,1,1)
  Net electricity generated from this waste and used in internal MSWI plant energy redistribution.
  Uncertainty: uncertainty is calculated from uncertainties in waste composition and uncertainties in energy efficiency and the uncertainty in internal energy demand
  property exergy 3.6 MJ; name E_el_prod_MSWI_exergy
    This exergy property is based on the exergy content of the product.
  property true value relation 3.6; name E_el_prod_MSWI_true_value_relation
    property to calculate "true value" from
  property price 0.1 EUR2005; name E_el_prod_MSWI_price_EUR2005
    Estimated to be the same price as in case of electricity, medium voltage.
- heat, for reuse in municipal waste incineration only: 0 MJ; CPC 17300: Steam and hot water; By-product classification allocatable product; pedigree (1,1,1,1,1)
  Net useful heat generated from this waste and used in internal MSWI plant energy redistribution.
  Uncertainty: uncertainty is calculated from uncertainties in waste composition and uncertainties in energy efficiency and the uncertainty in internal energy demand
  property true value relation 0.1842; name E_th_prod_MSWI_true_value_relation
    property to calculate "true value" from
  property exergy 0.1842 MJ; name E_th_prod_MSWI_exergy
    This exergy property is based on the exergy content of the product.
  property price 0.0106 EUR2005; name E_th_prod_MSWI_price_EUR2005
    Average European district heat price from Ecoheatcool and Euroheat 2005-2006, Ecoheat Work package 1: The European heat market. Final report. 10.6 EUR/GJ i s the price of district heat. http://www.solarthermalworld.org/files/Ecoheatcool%20WP1%20Web.pdf?download
- zinc concentrate: 0 kg; CPC 14290: Other non-ferrous metal ores and concentrates (other than uranium or thorium ores and concentrates); By-product classification allocatable product
  Calculated value from the knowledge of the properties of both products.
  property price 0.38 EUR2005; name ByP_price_EUR2005
    Temporary price data. Calculated as 90% of purchasers price based on: Zinc content in concentrate 53%. Concentrate price per kg Zn 86.5% of refined Zn price (13.5% treatment charges according to CHR Metals Limited 2005: Dynamic cost curves. http://www.minecost.com/dynamic.pdf). 2004 zinc price from USGS (2007) Mineral commodity summaries 2007. <http://minerals.usgs.gov/minerals/pubs/mcs/2007/mcs2007.pdf> [Accessed 25 May 2010]
  property zinc content 0.53; name zinc_C_zinc_concentrate
    Zinc content on a dry matter basis. Value taken from teh "zinc mine operation" /GLO dataset.
  property dry mass 1 kg; name DM_zinc_concentrate
  property carbon content 0
    carbon content on a dry matter basis (reserved; not for manual entry)
  properties: wet mass 1 kg, water content 0, carbon content, non-fossil 0, carbon content, fossil 0, water in wet mass 0 kg, carbon allocation 0 kg

## Inputs from technosphere
- heat, district or industrial, natural gas: 0.0417256 MJ; lognormal variance with pedigree 0.0406, pedigree (2,1,5,1,1)
  (same comment as for waste paper, unsorted)
- heat, district or industrial, other than natural gas: 0 MJ; pedigree (1,1,1,1,1)
  Proxy. Rock wool plant is used as proxy.
- wastewater from concrete production: 0 m3; name wastewater_output; source Weibel T. and Stritz A. 1995; pedigree (1,1,1,1,1)
  Proxy, based on literature value.
  production volume 0 m3
    Calculated from the production volume of fibre cement roof slate in proportion to the respective output amounts.
  property price 0 EUR2005; name wastewater_output_price_EUR2005
  properties: dry mass 0.449139 kg, wet mass 1000 kg, water content 2225.48, carbon content, fossil 0.027074
  note on carbon content, fossil: TOC =0.01216 kg/m3 (Tab A.20, ecoinvent v2.2 report 13_I). TOC was considered as Total Carbon.
- lime, packed: 0 kg; pedigree (1,1,1,1,1)
  (same comment as for waste paper, unsorted)
  properties: carbon content, fossil 0.117492, wet mass 1 kg, water content 0.00200401, dry mass 0.998 kg
  note on carbon content, fossil: Table 3.1, ecoinvent v2.2 report 7, part VII, pg 3. MW CaCO3=100, MW MgCO3=84
- vinyl acetate: 0 kg; pedigree (1,1,1,1,1)
  (same comment as for waste paper, unsorted)
  properties: wet mass 1 kg, carbon content, fossil 0.55814, dry mass 1 kg
  note on carbon content, fossil: Vinyl acetate (CH3CO2CH=CH2) (ecoinvent v2.2 report 11_II), C4H6O2. MW=86 g/mol
- packing, fibre cement product: 0 kg; pedigree (1,1,1,1,1)
  Estimation.
- lubricating oil: 1.60117e-5 kg; source Weibel T. and Stritz A. 1995; lognormal variance with pedigree 0.0506, pedigree (2,1,5,1,1)
  Literature value.
  properties: wet mass 1 kg, carbon content, fossil 0.75, dry mass 1 kg
  note on carbon content, fossil: Lubricating oil is produced from diesel. C-content/dry mass of fats and oils considered 75%, from: ecoinvent v2.2 report, n 15a, pg 40
- tap water: 0.00329221 kg; name tap_water_input; source Weibel T. and Stritz A. 1995; lognormal variance with pedigree 0.0406, pedigree (2,1,5,1,1)
  Literature value.
  properties: carbon content, fossil 0.00178991, wet mass 1 kg, water content 2962.17, dry mass 0.000337476 kg
  note on carbon content, fossil: Bicarbonate content is 2.93 mol/m3. CO2 content is 0.1 mol/m3 (ecoinvent v2.2 report 8, Tab 93.1).
- cement, alternative constituents 21-35%: 0 kg; pedigree (1,1,1,1,1)
  (same comment as for waste paper, unsorted)
  property carbon content, non-fossil 0; name ceme_C_content_non_fossil
  property water in wet mass 0 kg; name ceme_WWM
  property wet mass 1 kg; name ceme_WM
  property carbon content, fossil 0; name ceme_C_content_fossil
  property water content 0; name ceme_water_content
  property dry mass 1 kg; name ceme_DM
- waste paper, unsorted: 0 kg; pedigree (1,1,1,1,1)
  (same comment as for waste paper, unsorted)
- wastewater, unpolluted: 0 m3; source Weibel T. and Stritz A. 1995; pedigree (1,1,1,1,1)
  Literature value.
  production volume 0 m3
    (same comment as for wastewater from concrete production)
  properties: carbon content, non-fossil 0.00178991, dry mass 0.337476 kg, carbon content, fossil 0.00178991, wet mass 1000 kg, water content 2962.17
  note on carbon content, fossil: Assumed to be like in tap water. Bicarbonate content is 2.93 mol/m3. CO2 content is 0.1 mol/m3 (ecoinvent v2.2 report 8, Tab 93.1).
- heat, central or small-scale, other than natural gas: 0 MJ; pedigree (1,1,1,1,1)
  (same comment as for waste paper, unsorted)
- acrylic varnish, without water, in 87.5% solution state: 1.03258e-5 kg; source Weibel T. and Stritz A. 1995; lognormal variance with pedigree 0.0406, pedigree (2,1,5,1,1)
  Literature value.
  properties: carbon content, fossil 0.674725, dry mass 1 kg, wet mass 1 kg
  note on carbon content, fossil: Isobornyl acrylate (C13H20O2) has been used as a representative example of acrylic varnish (Turpentines, Ullmann).The formulation of this specific varnish includes 50% acrylic binder
- waste emulsion paint: -7.44723e-6 kg; source Weibel T. and Stritz A. 1995; lognormal variance with pedigree 0.0506, pedigree (2,1,5,1,1)
  Literature value.
  production volume 0 kg
    (same comment as for wastewater from concrete production)
  properties: wet mass 1 kg, carbon content, fossil 0.27, dry mass 1 kg
  note on carbon content, fossil: Tab A.4, ecoinvent v2.2 report 13_I. C content has been calculated after data in the tables, and then referred to 1 kg DM
- conveyor belt: 8.4005e-10 m; lognormal variance with pedigree 0.48, pedigree (5,1,5,1,4)
  Estimation. The conveyor belt is assumed to have a length of 100m and a lifespan of 20 years. A yearly production amount of 20.000t is considered.
- electricity, medium voltage: 0 kWh; pedigree (1,1,1,1,1)
  (same comment as for waste paper, unsorted)
- decarbonising waste: 0 kg; source Weibel T. and Stritz A. 1995; pedigree (1,1,1,1,1)
  Stoichometric calculation, based on literature values. The produced amount of CaCO3 is included.
  The wastewater from the production process is usually very alkaline because of a high amount of calcium oxide (quicklime) from the cement, and has to be neutralised before being released to the public sewage system. The alkaline wastewater with pH 13.5 is corrected to pH 8.5. To neutralise the wastewater, an unspecified amount of acid is added, then CO2 emissions from combustion are scrubbed through the wastewater. Since no data concerning the type and amount of acid is available it is not included in the inventory.
  The CO2 binds with the calcium oxide to give lime (CaCO3) as shown in the following stoichiometric equation:.
  CaO + CO2 -> CaCO3
  56 Mol 44 Mol 100 Mol
  0.91 kg 0.72 kg 1.63 kg per m3 wastewater
  Stoichometric calculation, based on literature values. The produced amount of CaCO3 is included.
  The wastewater from the production process is usually very alkaline because of a high amount of calcium oxide (quicklime) from the cement, and has to be neutralised before being released to the public sewage system. The alkaline wastewater with pH 13.5 is corrected to pH 8.5. To neutralise the wastewater, an unspecified amount of acid is added, then CO2 emissions from combustion are scrubbed through the wastewater. Since no data concerning the type and amount of acid is available it is not included in the inventory.
  The CO2 binds with the calcium oxide to give lime (CaCO3) as shown in the following stoichiometric equation:.
  CaO + CO2 -> CaCO3
  56 Mol 44 Mol 100 Mol
  0.91 kg 0.72 kg 1.63 kg per m3 wastewater
  production volume 0 kg
    (same comment as for wastewater from concrete production)
  properties: wet mass 1 kg, dry mass 0.7 kg, water content 0.428571
- sulfate pulp, unbleached: 0 kg; pedigree (1,1,1,1,1)
  (same comment as for waste paper, unsorted)
  properties: wet mass 1 kg, water content 0.111111, price 0.355 EUR2005, carbon content, non-fossil 0.494, dry mass 0.9 kg
  note on carbon content, non-fossil: C content of dry mass of sulfate pulp is 0.494 kgC/kg dry wood (ecoinvent v2.2 report 6_IX & ecoinvent v2.2 report 9). No other C containing products in the formulation of the pulp.
- stone wool factory: 0 unit; pedigree (1,1,1,1,1)
  Proxy. Rockwool plant is used as proxy as no data about fibre cement plant was available.
  This exchange has an activity link directly to the producing activity because the product is primarily consumed in the same geographical area where it is produced.
- waste mineral oil: -1.84413e-5 kg; source Weibel T. and Stritz A. 1995; lognormal variance with pedigree 0.0506, pedigree (2,1,5,1,1)
  Literature value.
  production volume 0 kg
    (same comment as for wastewater from concrete production)
  properties: water content 0.111111, wet mass 1 kg, dry mass 0.9 kg, carbon content, fossil 0.864444
  note on carbon content, fossil: Tab A.6, ecoinvent v2.2 report 13_I. C content has been calculated after data in the tables, and then referred to 1 kg DM
- hazardous waste, for underground deposit: -0.00336317 kg; lognormal variance with pedigree 0.0032, pedigree (1,3,3,1,1)
  Amount and activity link based on primary data collected from participating companies.
  production volume 1.75109e6 kg
- light fuel oil: 0.000336299 kg; lognormal variance with pedigree 0.0032, pedigree (1,3,3,1,1)
  Amount and activity link based on primary data collected from participating companies. Emissions from fuel combustion included in dataset.
- copper: 4.69505e-6 kg; lognormal variance with pedigree 0.0032, pedigree (1,3,3,1,1)
  Amount and activity link based on primary data collected from participating companies.
- blasting: 8.89319e-6 kg; lognormal variance with pedigree 0.0032, pedigree (1,3,3,1,1)
  Amount and activity link based on primary data collected from participating companies.
- mine infrastructure, underground, non-ferrous metal: 1.23345e-12 unit; lognormal variance with pedigree 0.0887, pedigree (5,5,5,3,1)
  Estimation from author of 'zinc mine operation, GLO, 1994-2003' dataset. No primary data on infrastructure included.
- heat, district or industrial, other than natural gas: 7.41006e-5, 0.00217119, 0.000232845 MJ (3 entries); lognormal variance with pedigree 0.0032, pedigree (1,3,3,1,1)
  Amount and activity link based on primary data collected from participating companies.
- maize starch: 4.96251e-6 kg; lognormal variance with pedigree 0.0032, pedigree (1,3,3,1,1)
  Amount and activity link based on primary data collected from participating companies.
- electricity, medium voltage: 0.000792715, 0.102797, 0.000326136, 0.0344298, 0.00012432, 9.85483e-5, 0.143331, 0.0141852, 0.0049684, 0.0870987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 kWh (18 entries); lognormal variance with pedigree 0.0032, pedigree (1,3,3,1,1)
  Amount and activity link based on primary data collected from participating companies.
- zinc slag: -0.0626503 kg; lognormal variance with pedigree 0.0032, pedigree (1,3,3,1,1)
  Amount and activity link based on primary data collected from participating companies.
  production volume 2.1567e6 kg
- copper sulfate: 8.8642e-5 kg; lognormal variance with pedigree 0.0032, pedigree (1,3,3,1,1)
  Amount and activity link based on primary data collected from participating companies.
- heavy fuel oil: 3.12805e-6 kg; lognormal variance with pedigree 0.0032, pedigree (1,3,3,1,1)
  (same comment as for light fuel oil)
- electricity, high voltage: 0.000478836 kWh; lognormal variance with pedigree 0.0032, pedigree (1,3,3,1,1)
  Amount and activity link based on primary data collected from participating companies.
- diesel: 0.000646665, 0.000128346, 0.000127239 kg (3 entries); lognormal variance with pedigree 0.0032, pedigree (1,3,3,1,1)
  Amount and activity link based on primary data collected from participating companies. Emissions from diesel combustion included in dataset.
- tap water: 0.030529 kg; lognormal variance with pedigree 0.0032, pedigree (1,3,3,1,1)
  Amount and activity link based on primary data collected from participating companies.
- aluminium chloride: 6.87828e-10 kg; lognormal variance with pedigree 0.0032, pedigree (1,3,3,1,1)
  Amount and activity link based on primary data collected from participating companies.
- steel, low-alloyed: 1.29406e-5 kg; lognormal variance with pedigree 0.0032, pedigree (1,3,3,1,1)
  Amount and activity link based on primary data collected from participating companies.
- chemical, organic: 0.00418193 kg; lognormal variance with pedigree 0.0032, pedigree (1,3,3,1,1)
  Amount and activity link based on primary data collected from participating companies.
- concrete, normal: 1.9689e-8 m3; lognormal variance with pedigree 0.0032, pedigree (1,3,3,1,1)
  Amount and activity link based on primary data collected from participating companies.
- chemical, inorganic: 0.000129168 kg; lognormal variance with pedigree 0.0032, pedigree (1,3,3,1,1)
  Amount and activity link based on primary data collected from participating companies.
- waste wood, post-consumer: -1.38265e-7 kg; lognormal variance with pedigree 0.0032, pedigree (1,3,3,1,1)
  Amount and activity link based on primary data collected from participating companies.
  production volume 527319 kg
- acetic acid, without water, in 98% solution state: 1.84772e-5 kg; lognormal variance with pedigree 0.0032, pedigree (1,3,3,1,1)
  Amount and activity link based on primary data collected from participating companies.
- transport, freight, sea, bulk carrier for dry goods: 0.273117 metric ton*km; lognormal variance with pedigree 0.1226, pedigree (1,3,3,1,1)
  Inbound transport of materials to sites. Amount and activity link based on primary data collected from participating companies.
- cement, unspecified: 1.1917e-6 kg; lognormal variance with pedigree 0.0032, pedigree (1,3,3,1,1)
  Amount and activity link based on primary data collected from participating companies.
- sodium dichromate: 3.16685e-6 kg; lognormal variance with pedigree 0.0032, pedigree (1,3,3,1,1)
  Amount and activity link based on primary data collected from participating companies.
- polyacrylamide: 0.00024692 kg; lognormal variance with pedigree 0.0032, pedigree (1,3,3,1,1)
  Amount and activity link based on primary data collected from participating companies.
- used Li-ion battery: -7.88107e-9 kg; lognormal variance with pedigree 0.0032, pedigree (1,3,3,1,1)
  Amount and activity link based on primary data collected from participating companies.
  production volume 30057 kg
- sodium sulfide: 9.65372e-6 kg; lognormal variance with pedigree 0.0032, pedigree (1,3,3,1,1)
  Amount and activity link based on primary data collected from participating companies.
- sodium hydrogen sulfite: 4.89012e-7 kg; lognormal variance with pedigree 0.0032, pedigree (1,3,3,1,1)
  Amount and activity link based on primary data collected from participating companies.
- soda ash, dense: 0.00118031 kg; lognormal variance with pedigree 0.0032, pedigree (1,3,3,1,1)
  Amount and activity link based on primary data collected from participating companies.
- non-sulfidic overburden, off-site: -0.0874986 kg; lognormal variance with pedigree 0.0032, pedigree (1,3,3,1,1)
  Amount and activity link based on primary data collected from participating companies.
  production volume 3.33704e11 kg
- propane: 0.000236307 kg; lognormal variance with pedigree 0.0032, pedigree (1,3,3,1,1)
  Amount and activity link based on primary data collected from participating companies.
- pig iron: 0.000265976 kg; lognormal variance with pedigree 0.0032, pedigree (1,3,3,1,1)
  Amount and activity link based on primary data collected from participating companies.
- natural gas, high pressure: 0.024255, 0.000135465, 0.000330062, 0.00932055 m3 (4 entries); lognormal variance with pedigree 0.0032, pedigree (1,3,3,1,1)
  (same comment as for light fuel oil)
- petrol, unleaded: 7.17117e-6, 1.65677e-7, 6.84708e-7, 1.65139e-7, 6.17785e-7, 3.40173e-8, 1.9015e-5 kg (7 entries); lognormal variance with pedigree 0.0032, pedigree (1,3,3,1,1)
  Amount and activity link based on primary data collected from participating companies.
- inert waste: -0.000686462, -5.91228e-6, -0.000518807 kg (3 entries); lognormal variance with pedigree 0.0032, pedigree (1,3,3,1,1)
  Amount and activity link based on primary data collected from participating companies.
  production volume 9.14737e6 kg
- lubricating oil: 4.80314e-6 kg; lognormal variance with pedigree 0.0032, pedigree (1,3,3,1,1)
  Amount and activity link based on primary data collected from participating companies.
- lime, hydrated, packed: 8.11545e-6, 0.000956071 kg (2 entries); lognormal variance with pedigree 0.0032, pedigree (1,3,3,1,1)
  Amount and activity link based on primary data collected from participating companies.
- limestone, crushed, washed: 4.92817e-11, 5.77978e-9 kg (2 entries); lognormal variance with pedigree 0.0032, pedigree (1,3,3,1,1)
  Amount and activity link based on primary data collected from participating companies.
- bilge oil: -5.99124e-9, -1.56607e-10, -1.24585e-8 kg (3 entries); lognormal variance with pedigree 0.0032, pedigree (1,3,3,1,1)
  Amount and activity link based on primary data collected from participating companies.
  production volume 70961.3 kg
- lime: 1.27255e-7, 1.4734e-6 kg (2 entries); lognormal variance with pedigree 0.0032, pedigree (1,3,3,1,1)
  Amount and activity link based on primary data collected from participating companies.
- hazardous waste, for incineration: -0.000344941, -1.75654e-5, -0.000708711 kg (3 entries); lognormal variance with pedigree 0.0032, pedigree (1,3,3,1,1)
  Amount and activity link based on primary data collected from participating companies.
  production volume 6.58402e7 kg
- limestone, unprocessed: 0.000300803, 3.11407e-6, 0.00761572 kg (3 entries); lognormal variance with pedigree 0.0032, pedigree (1,3,3,1,1)
  Amount and activity link based on primary data collected from participating companies.
- hydrogen cyanide: 7.90303e-8, 1.73867e-7 kg (2 entries); lognormal variance with pedigree 0.0032, pedigree (1,3,3,1,1)
  Amount and activity link based on primary data collected from participating companies.
- sulfidic tailings, from zinc-lead mine operation: -0.0111825, -0.00157423, -0.00137881, -0.00292047, -0.000571066, -0.00378901, -0.0020085, -0.00643155 kg (8 entries); lognormal variance with pedigree 0.0032, pedigree (1,3,3,1,1)
  Amount and activity link based on primary data collected from participating companies.
  production volume 1.13556e11 kg
- iron sulfate: 4.30431e-5, 8.71569e-5 kg (2 entries); lognormal variance with pedigree 0.0032, pedigree (1,3,3,1,1)
  Amount and activity link based on primary data collected from participating companies.
- nylon 6: 2.28777e-8, 4.63245e-8 kg (2 entries); lognormal variance with pedigree 0.0032, pedigree (1,3,3,1,1)
  Amount and activity link based on primary data collected from participating companies.
- zinc monosulfate: 2.24172e-6, 1.18423e-5 kg (2 entries); lognormal variance with pedigree 0.0032, pedigree (1,3,3,1,1)
  Amount and activity link based on primary data collected from participating companies.
- concrete, 35MPa: 4.46827e-10, 2.7941e-12, 1.78592e-11, 3.68714e-9 m3 (4 entries); lognormal variance with pedigree 0.0032, pedigree (1,3,3,1,1)
  Amount and activity link based on primary data collected from participating companies.
- transport, freight, lorry 16-32 metric ton, EURO3: 0.00933787, 0.0121626 metric ton*km (2 entries); lognormal variance with pedigree 0.1226, pedigree (1,3,3,1,1)
  (same comment as for transport, freight, sea, bulk carrier for dry goods)
- acrylic acid: 1.83156e-8, 8.69464e-8 kg (2 entries); lognormal variance with pedigree 0.0032, pedigree (1,3,3,1,1)
  Amount and activity link based on primary data collected from participating companies.
- sulfuric acid: 0.0505955, 0.00526987 kg (2 entries); lognormal variance with pedigree 0.0032, pedigree (1,3,3,1,1)
  Amount and activity link based on primary data collected from participating companies.
- sulfur dioxide, liquid: 0.00043863, 2.20813e-6 kg (2 entries); lognormal variance with pedigree 0.0032, pedigree (1,3,3,1,1)
  Amount and activity link based on primary data collected from participating companies.
- waste paper, unsorted: -0.00031018, -0.0103511, -1.01065e-9 kg (3 entries); lognormal variance with pedigree 0.0032, pedigree (1,3,3,1,1)
  Amount and activity link based on primary data collected from participating companies.
  production volume 4446.2 kg
- sodium cyanide: 2.03905e-7, 4.12881e-7 kg (2 entries); lognormal variance with pedigree 0.0032, pedigree (1,3,3,1,1)
  Amount and activity link based on primary data collected from participating companies.
- waste mineral oil: -0.000384058, -0.000955131 kg (2 entries); lognormal variance with pedigree 0.0032, pedigree (1,3,3,1,1)
  Amount and activity link based on primary data collected from participating companies.
  production volume 1.91672e6 kg
- calcium chloride: 2.68905e-5, 9.31184e-5 kg (2 entries); lognormal variance with pedigree 0.0032, pedigree (1,3,3,1,1)
  Amount and activity link based on primary data collected from participating companies.
- municipal solid waste: -0.000258832, -1.96756e-7, -4.38728e-7, -9.15606e-9, -0.000386445 kg (5 entries); lognormal variance with pedigree 0.0032, pedigree (1,3,3,1,1)
  Amount and activity link based on primary data collected from participating companies.
  production volume 2.68043e7 kg
- quicklime, milled, loose: 0.0192712, 6.76348e-7 kg (2 entries); lognormal variance with pedigree 0.0032, pedigree (1,3,3,1,1)
  Amount and activity link based on primary data collected from participating companies.
- waste rubber, unspecified: -1.01496e-9, -4.26077e-11, -1.01496e-9 kg (3 entries); lognormal variance with pedigree 0.0032, pedigree (1,3,3,1,1)
  Amount and activity link based on primary data collected from participating companies.
  production volume 7904.23 kg
- polyol: 1.35593e-7, 2.74559e-7 kg (2 entries); lognormal variance with pedigree 0.0032, pedigree (1,3,3,1,1)
  Amount and activity link based on primary data collected from participating companies.
- scrap copper: -9.0713e-8, -4.25606e-9, -1.91004e-7 kg (3 entries); lognormal variance with pedigree 0.0032, pedigree (1,3,3,1,1)
  Amount and activity link based on primary data collected from participating companies.
  production volume 1.09065e6 kg
- quicklime, in pieces, loose: 3.32708e-8, 0.00201044 kg (2 entries); lognormal variance with pedigree 0.0032, pedigree (1,3,3,1,1)
  Amount and activity link based on primary data collected from participating companies.
- oxygen, liquid: 0.0883588, 3.35732e-9 kg (2 entries); lognormal variance with pedigree 0.0032, pedigree (1,3,3,1,1)
  Amount and activity link based on primary data collected from participating companies.
- green liquor dregs: -0.0182225 kg; lognormal variance with pedigree 0.0007, pedigree (1,2,1,1,1)
  EcoSpold01Location=CH
  Data provided by industry (EPIS) 2017
  production volume 1.48305e7 kg
- waste packaging paper: -0.000612257 kg; lognormal variance with pedigree 0.0007, pedigree (1,2,1,1,1)
  Data provided by industry (EPIS) 2017. Represents waste packaging such as corrugated containers, cartonboard etc. Can be also plastic or anything that is recyclable is separated and recycled, glass, metal, paper. Is produced in small side tasks of the overall pulp process in order to "keep the pulp site funktioning".
  production volume 146758 kg
- malusil: 0.00166789 kg; lognormal variance with pedigree 0.0061, pedigree (1,2,1,1,1)
  Data provided by industry (EPIS) 2017. Represents Talc or talcum (H2Mg3(SiO3)4 or Mg3Si4O10(OH)2)
- sodium hydroxide, without water, in 50% solution state: 0.0476462 kg; lognormal variance with pedigree 0.0007, pedigree (1,2,1,1,1)
  EcoSpold01Location=RER
  Data provided by industry (EPIS) 2017
- electricity, high voltage: 0.053815 kWh; lognormal variance with pedigree 0.0007, pedigree (1,2,1,1,1)
  Data provided by industry (EPIS) 2017
- sodium sulfate, anhydrite: 0.000979592 kg; lognormal variance with pedigree 0.0007, pedigree (1,2,1,1,1)
  Data provided by industry (EPIS) 2017
- transport, freight train: 0.620423 metric ton*km; lognormal variance with pedigree 0.0061, pedigree (1,2,1,1,1)
  Data provided by industry (EPIS) 2017
- hydrogen peroxide, without water, in 50% solution state: 0.0181626 kg; lognormal variance with pedigree 0.0007, pedigree (1,2,1,1,1)
  Data provided by industry (EPIS) 2017
  EcoSpold01Location=RER
- transport, freight, lorry >32 metric ton, EURO5: 0.54296 metric ton*km; lognormal variance with pedigree 0.0061, pedigree (1,2,1,1,1)
  Data provided by industry (EPIS) 2017
- transport, freight, inland waterways, barge: 0.101304 metric ton*km; lognormal variance with pedigree 0.0007, pedigree (1,2,1,1,1)
  Data provided by industry (EPIS) 2017
- light fuel oil: 0.00394768 kg; lognormal variance with pedigree 0.0007, pedigree (1,2,1,1,1)
  Data provided by industry (EPIS) 2017, indicated in energy content. Calculation into mass/volume was done by using the following conversion factor: Light fuel oil: MJ/kg 43.5. Source: http://www.fao.org/docrep/T0269e/t0269e0c.htm
- sand: 0.000272048 kg; lognormal variance with pedigree 0.0007, pedigree (1,2,1,1,1)
  Data provided by industry (EPIS) 2017
- sodium formate: 0.000925784 kg; lognormal variance with pedigree 0.0007, pedigree (1,2,1,1,1)
  Data provided by industry (EPIS) 2017
- wood chips, dry, measured as dry mass: 0.584564 kg; lognormal variance with pedigree 0.0007, pedigree (1,2,1,1,1)
  Data provided by industry (EPIS) 2017. Representing wood chips and lignin powder (scaled with heating value ratio)
- waste wood, untreated: -0.0312529 kg; lognormal variance with pedigree 0.0007, pedigree (1,2,1,1,1)
  Data provided by industry (EPIS) 2017. Represents bark and wood wastes
  production volume 1.86642e7 kg
- pulp factory: 8.39579e-11 unit; lognormal variance with pedigree 0.3021, pedigree (3,2,1,1,1)
  EcoSpold01Location=RER
  Own estimation with yearly production volume and a lifetime of a factory of 50 years;activityLink introduced to establish a direct link to the corresponding regional supply of this product
- EDTA, ethylenediaminetetraacetic acid: 0.000658837 kg; lognormal variance with pedigree 0.0007, pedigree (1,2,1,1,1)
  Data provided by industry (EPIS) 2017
- limestone residue: -0.0155171 kg; lognormal variance with pedigree 0.0007, pedigree (1,2,1,1,1)
  EcoSpold01Location=CH
  Data provided by industry (EPIS) 2017; including lime kiln ash, lime mud and lime sludge
  production volume 5.52053e6 kg
- calcium carbonate, precipitated: 0.0055171 kg; lognormal variance with pedigree 0.0007, pedigree (1,2,1,1,1)
  Data provided by industry (EPIS) 2017
- residual softwood, wet: 4.94178e-5 m3; lognormal variance with pedigree 0.0007, pedigree (1,2,1,1,1)
  Data provided by industry (EPIS) 2017. Represents saw mill residsues. Conversion factor 765 kg/m3 (ecoinvent exchange properties) used.
  EcoSpold01Location=RER
- digester sludge: -0.000312513 kg; lognormal variance with pedigree 0.0007, pedigree (1,2,1,1,1)
  Data provided by industry (EPIS) 2017
  production volume 130935 kg
- magnesium sulfate: 0.00340781 kg; lognormal variance with pedigree 0.0007, pedigree (1,2,1,1,1)
  EcoSpold01Location=RER
  Data provided by industry (EPIS) 2017
- heavy fuel oil: 0.0155687 kg; lognormal variance with pedigree 0.0007, pedigree (1,2,1,1,1)
  Data provided by industry (EPIS) 2017, indicated in energy content. Calculation into mass/volume was done by using the following conversion factor: Heavy fuel oil: MJ/kg 42.6. Source: http://www.fao.org/docrep/T0269e/t0269e0c.htm
  EcoSpold01Location=RER
- sodium chlorate, powder: 0.0222351 kg; lognormal variance with pedigree 0.0007, pedigree (1,2,1,1,1)
  Data provided by industry (EPIS) 2017
  EcoSpold01Location=RER
- methanol, from biomass: 0.00264713 kg; lognormal variance with pedigree 0.0007, pedigree (1,2,1,1,1)
  Data provided by industry (EPIS) 2017. Represents biofuel from bark and tall oil pitch. Calculated from energetic value with conversion factor 23 MJ/kg
- pulpwood, hardwood, measured as solid wood under bark: 0.00313037 m3; lognormal variance with pedigree 0.0061, pedigree (1,2,1,1,1)
  Data provided by industry (EPIS) 2017; Represents birch wood
- natural gas, high pressure: 0.000156603 m3; lognormal variance with pedigree 0.0007, pedigree (1,2,1,1,1)
  Data provided by industry (EPIS) 2017, indicated in energy content. Calculation into mass/volume was done by using the following conversion factor: Natural gas: MJ/m3 39. Source: Ecoinvent, during technical review.
  EcoSpold01Location=RER
- sludge from pulp and paper production: -0.00228997, -1.69347e-6 kg (2 entries); lognormal variance with pedigree 0.0007, pedigree (1,2,1,1,1)
  Data provided by industry (EPIS) 2017
  production volume 2.42978e6 kg
- sodium sulfite: 3.38591e-5 kg; lognormal variance with pedigree 0.0007, pedigree (1,2,1,1,1)
  Data provided by industry (EPIS) 2017
- sulfur: 6.60252e-5 kg; lognormal variance with pedigree 0.0007, pedigree (1,2,1,1,1)
  Data provided by industry (EPIS) 2017
- ozone, liquid: 3.04732e-5 kg; lognormal variance with pedigree 0.0007, pedigree (1,2,1,1,1)
  Data provided by industry (EPIS) 2017
  Uncertainty: average from KCL EcoData
- bark: -0.017837 kg; lognormal variance with pedigree 0.0007, pedigree (1,2,1,1,1)
  Data provided by industry (EPIS) 2017
  production volume 1.64362e8 kg
- methanol: 9.41163e-5 kg; lognormal variance with pedigree 0.0007, pedigree (1,2,1,1,1)
  Data provided by industry (EPIS) 2017
  EcoSpold01Location=GLO
- wood pellet, measured as dry mass: 0.00801058 kg; lognormal variance with pedigree 0.0007, pedigree (1,2,1,1,1)
  Data provided by industry (EPIS) 2017, indicated in energy content. Calculation into mass/volume was done by using the following conversion factor: Wood pallets: MJ/kg 16.75. Source: http://www.fao.org/docrep/T0269e/t0269e0c.htm
- sodium hypochlorite, without water, in 15% solution state: 0.000211814 kg; lognormal variance with pedigree 0.0007, pedigree (1,2,1,1,1)
  Data provided by industry (EPIS) 2017
- pulpwood, softwood, measured as solid wood under bark: 0.00229226 m3; lognormal variance with pedigree 0.0007, pedigree (1,2,1,1,1)
  Data provided by industry (EPIS) 2017; Represents wood sources explicitly: pine wood certified (major part) and pinus contorta certified
  EcoSpold01Location=RER
- pulpwood, softwood, measured as solid wood under bark: 0.00129849 m3; lognormal variance with pedigree 0.0007, pedigree (1,2,1,1,1)
  Data provided by industry (EPIS) 2017; Source explicitly spruce wood certified
- wood ash mixture, pure: -0.00172959, -3.53101e-5 kg (2 entries); lognormal variance with pedigree 0.0007, pedigree (1,2,1,1,1)
  Data provided by industry (EPIS) 2017; Represents 0.002058kg "fiber reject".
  EcoSpold01Location=CH
  production volume 1.6263e7 kg
- textile, woven cotton: 7.44723e-6 kg; lognormal variance with pedigree 0.0572, pedigree (4,3,4,1,4)
  Calculated value: average consumption of textiles in printing process of three companies (including the portion of textile within rubber blankets)
- acrylic dispersion, without water, in 65% solution state: 3.14263e-5 kg; lognormal variance with pedigree 0.0098, pedigree (2,3,4,1,1)
  Calculated value: average consumption of three companies
- ethylene glycol monoethyl ether: 1.38381e-5 kg; lognormal variance with pedigree 0.0098, pedigree (2,3,4,1,1)
  Calculated value: Average consumption of three companies
- white spirit: 8.05463e-5 kg; lognormal variance with pedigree 0.0112, pedigree (3,3,4,1,1)
  Calculate value: Average value for different petrol based cleaners of three companies. Only a portion is relied to the use of white spirit itself, the data set ist used also as estimate for the production of other petrol based mixtures. Except for mixtures containing VOCs with high boiling point all VOCs are assumed to be emitted to air. The less volatil content with high boiling VOCs is assumed to be delivered to a professional treatment. Heptan emissions represent emissions from white spirit. Methanol and Propylene oxide emissions represent the Methoxypropanol content and Toluol, Xylene and Ethylbenzol the content of solvent naphtha in furhter used mixtures.
- electricity, low voltage: 0.0189878 kWh; lognormal variance with pedigree 0.0098, pedigree (2,3,4,1,1)
  EcoSpold01Location=CH
  Calculated values: Average consumption of three companies
- paper, woodfree, coated: 0.036708 kg; lognormal variance with pedigree 0.0098, pedigree (2,3,4,1,1)
  Calculated value: Average paper consumption of three companies. Paper, woodfree, coated assumed for printing services.
- sheet rolling, aluminium: 0.000657575 kg; lognormal variance with pedigree 0.1767, pedigree (5,5,4,3,5)
  Estimate value: assumed processing for the production of printing plates
- spent solvent mixture: -3.96129e-5 kg; lognormal variance with pedigree 0.0113, pedigree (3,3,4,3,1)
  Estimate value: recovered solvent given declared only by one of tree companies. Recovery and professional waste treatment of 'non-voc wash' products assumed for the other companies.
  production volume 830.76 kg
- aluminium, wrought alloy: 0.00108342 kg; lognormal variance with pedigree 0.3093, pedigree (2,3,4,3,1)
  Calculated value: average consumption of printing plates of three companies. Product information indicating wrought alloy as material quality
- waste paperboard, unsorted: -0.00232924 kg
  production volume 48848.7 kg
- synthetic rubber: 4.72714e-6 kg; lognormal variance with pedigree 0.0512, pedigree (3,3,4,1,4)
  Calculated value: average consumption of rubber blankets of three companies. Assumptions on the portion of rubber and textile content derived from product declarations
- isopropanol: 5.75708e-5 kg; lognormal variance with pedigree 0.0098, pedigree (2,3,4,1,1)
  Calculated value: average Ispopropanol use of three companies (with low VOC consumption)
- printing ink, offset, without solvent, in 47.5% solution state: 0.000244808 kg; lognormal variance with pedigree 0.0098, pedigree (2,3,4,1,1)
  Calculated value: average ink consumption of three companies
- industrial machine, heavy, unspecified: 5.75708e-6 kg; lognormal variance with pedigree 0.0086, pedigree (1,1,4,1,1)
  Estimate value: Weight of offset printing equipment given by one of the companies indicating main material steal and furhter materials aluminium, rubber and electronics. Assumption comparable equipment weight in other companies and similar production as for industrial machines.
- corrugated board box: 0.00232924 kg; lognormal variance with pedigree 0.0098, pedigree (2,3,4,1,1)
  The
- thermoforming, with calendering: 1.05106e-5 kg; lognormal variance with pedigree 0.0967, pedigree (5,5,4,3,4)
  Estimate value: Assumed processing for rubber blankets.
- sodium percarbonate, powder: 5.8333e-6 kg; lognormal variance with pedigree 0.0059, pedigree (2,4,3,3,2)
  Estimated value. Measured/calculated value for Quebec is extrapolated for GLO.
- cast iron: 2.51435e-6 kg; lognormal variance with pedigree 0.0059, pedigree (2,4,3,3,2)
  Estimated value. Measured/calculated value for Quebec is extrapolated for GLO.
- scrap steel: -8.30099e-6 kg; lognormal variance with pedigree 0.21, pedigree (5,5,5,5,5)
  Estimated value. Same amount entering the dataset is estimated as by-product
  production volume 17009.5 kg
- carbon dioxide, liquid: 1.63936e-6 kg; lognormal variance with pedigree 0.0053, pedigree (2,4,3,3,1)
  Estimated value. Measured/calculated value for Quebec is extrapolated for GLO.
- nuclear power plant, pressure water reactor, 650MW: 2.90031e-11 unit; lognormal variance with pedigree 0.0059, pedigree (2,4,3,3,2)
  Calculated generic value, not country specific.The amount of infrastructure input is calculated based on the assumption of an average lifetime of 30 years for this type of power plant. An average load factor for nuclear power plants of 73% was applied (PRIS database, 2018).
  Reference(s): International Atomic Energy Agency. 2018. Power Reactor Information System (PRIS), World Statistics, Load Factor, accessible online athttps://pris.iaea.org/PRIS/WorldStatistics/WorldTrendinAverageLoadFactor.aspx, last accessed February 2018
- aluminium sulfate, powder: 4.98834e-5 kg; lognormal variance with pedigree 0.0059, pedigree (2,4,3,3,2)
  Estimated value. Measured/calculated value for Quebec is extrapolated for GLO.
- nitrogen, liquid: 2.04166e-6 kg; lognormal variance with pedigree 0.0059, pedigree (2,4,3,3,2)
  Estimated value. Measured/calculated value for Quebec is extrapolated for GLO.
- waste reinforced concrete: -0.0513934 kg; lognormal variance with pedigree 0.21, pedigree (5,5,5,5,5)
  Estimated value. Same amount entering the dataset is estimated as by-product
  production volume 1.0531e8 kg
- chlorine, liquid: 9.71099e-6 kg; lognormal variance with pedigree 0.0059, pedigree (2,4,3,3,2)
  Estimated value. Measured/calculated value for Quebec is extrapolated for GLO.
- diesel, burned in diesel-electric generating set, 10MW: 0.000260047 MJ; lognormal variance with pedigree 0.0059, pedigree (2,4,3,3,2)
  Estimated value. Measured/calculated value for Quebec is extrapolated for GLO.
- uranium hexafluoride: 8.5488e-5 kg; lognormal variance with pedigree 0.0059, pedigree (2,4,3,3,2)
  Estimated value. Measured/calculated value for Quebec is extrapolated for GLO.
  As CANDU reactors use natural uranium (unenriched UO2) but no data were collected for UO2 production (impurities removal from yellowcake, refining to UO3 and conversion to UO2) uranium hexafluoride is used as proxy (UO3 is used to produce both UO2 and UF6).
- cationic resin: 1.45993e-9 kg; lognormal variance with pedigree 0.0059, pedigree (2,4,3,3,2)
  Estimated value. Measured/calculated value for Quebec is extrapolated for GLO.
- transport, helicopter: 9.10071e-7 hour; lognormal variance with pedigree 0.1253, pedigree (2,4,3,3,2)
  Estimated value. Measured/calculated value for Quebec is extrapolated for GLO. This vehicle use corresponds to maintenance and operation services related to the operation of the whole company. Transports have been distributed among different activities (electricity production, transport and distribution) according to their respective use of these transports and, when the exact distribution was not available, according to the relative expenses of each activity.
- hydrogen, liquid: 4.65658e-6 kg; lognormal variance with pedigree 0.0059, pedigree (2,4,3,3,2)
  Estimated value. Measured/calculated value for Quebec is extrapolated for GLO.
- fly ash and scrubber sludge: -8.74995e-5 kg; lognormal variance with pedigree 0.0059, pedigree (2,4,3,3,2)
  Estimated value. Measured/calculated value for Quebec is extrapolated for GLO.
  production volume 179295 kg
- reinforcing steel: 2.51435e-6 kg; lognormal variance with pedigree 0.0059, pedigree (2,4,3,3,2)
  Estimated value. Measured/calculated value for Quebec is extrapolated for GLO.
- anionic resin: 3.6613e-9 kg; lognormal variance with pedigree 0.0059, pedigree (2,4,3,3,2)
  Estimated value. Measured/calculated value for Quebec is extrapolated for GLO.
- hydrazine: 1.23706e-6 kg; lognormal variance with pedigree 0.0059, pedigree (2,4,3,3,2)
  Estimated value. Measured/calculated value for Quebec is extrapolated for GLO.
- steel, low-alloyed, hot rolled: 5.78664e-6 kg; lognormal variance with pedigree 0.0059, pedigree (2,4,3,3,2)
  Estimated value. Measured/calculated value for Quebec is extrapolated for GLO.
- low level radioactive waste for final repository: -3.23849e-8 m3; lognormal variance with pedigree 0.0059, pedigree (2,4,3,3,2)
  Estimated value. Measured/calculated value for Quebec is extrapolated for GLO.
  production volume 66.3598 m3
- transport, passenger car: 0.000154594 km; lognormal variance with pedigree 0.0059, pedigree (2,4,3,3,2)
  (same comment as for transport, helicopter)
- transport, freight, lorry, unspecified: 0.000345709 metric ton*km; lognormal variance with pedigree 0.1253, pedigree (2,4,3,3,2)
  (same comment as for transport, helicopter)
- low level radioactive waste: -6.90945e-9 m3; lognormal variance with pedigree 0.0059, pedigree (2,4,3,3,2)
  Estimated value. Measured/calculated value for Quebec is extrapolated for GLO.
  production volume 14.1579 m3
- sodium hypochlorite, without water, in 15% solution state: 5.1438e-6 kg; lognormal variance with pedigree 0.0059, pedigree (2,4,3,3,2)
  Estimated value. Measured/calculated value for Quebec is extrapolated for GLO.
- spent nuclear fuel: -8.16997e-5 kg; lognormal variance with pedigree 0.0059, pedigree (2,4,3,3,2)
  Estimated value. Measured/calculated value for Quebec is extrapolated for GLO.Amount of spent fuel produced per year plus concrete of storage modules
  production volume 167411 kg
- chlorodifluoromethane: 1.04597e-7 kg; lognormal variance with pedigree 0.0059, pedigree (2,4,3,3,2)
  Estimated value. Measured/calculated value for Quebec is extrapolated for GLO.
- heavy water: 2.01148e-6 kg; lognormal variance with pedigree 0.0059, pedigree (2,4,3,3,2)
  Estimated value. Measured/calculated value for Quebec is extrapolated for GLO.
- helium: 1.77011e-6 kg; lognormal variance with pedigree 0.0059, pedigree (2,4,3,3,2)
  Estimated value. Measured/calculated value for Quebec is extrapolated for GLO.
- paper, woodfree, coated: 4.22411e-5 kg; lognormal variance with pedigree 0.002, pedigree (1,1,3,1,1)
  Estimated value. Measured/calculated value for Quebec is extrapolated for GLO.
  Uncertainty: Calculated variable. Uncertainty will be determined from propagation of uncertainty factors of underlying variables. Uncertainty of actual relation between variables not accounted at this time, although this could be included in a future update.
- tap water: 0.0370525, 0.00737109, 0.00483536, 0.0137541 kg (4 entries); lognormal variance with pedigree 0.0059, pedigree (2,4,3,3,2)
  Estimated value. Measured/calculated value for Quebec is extrapolated for GLO.
- transport, freight, light commercial vehicle: 7.52214e-6, 0.000175792 metric ton*km (2 entries); lognormal variance with pedigree 0.0059, pedigree (2,4,3,3,2)
  (same comment as for transport, helicopter)
- concrete, normal: 4.21688e-7, 1.39969e-5, 1.45846e-6, 6.64159e-6, 9.48648e-7 m3 (5 entries); lognormal variance with pedigree 0.0059, pedigree (2,4,3,3,2)
  Estimated value. Measured/calculated value for Quebec is extrapolated for GLO.
- municipal solid waste: -3.53974e-7, -1.03838e-6, -6.39102e-7, -1.12288e-6, -1.13375e-6, -1.08549e-6, -8.33913e-6, -1.06129e-6, -1.35505e-7, -7.10239e-6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 kg (35 entries); lognormal variance with pedigree 0.0059, pedigree (2,4,3,3,2)
  Estimated value. Measured/calculated value for Quebec is extrapolated for GLO.
  production volume 139307 kg
- ethylene glycol: 1.94658e-6 kg; lognormal variance with pedigree 0.0032, pedigree (1,3,3,1,1)
  Amount based on primary data collected from participating companies.
- heat, district or industrial, natural gas: 0.0390129 MJ; lognormal variance with pedigree 0.0032, pedigree (1,3,3,1,1)
  Amount and activity link based on primary data collected from participating companies.
- hard coal: 0.00322952 kg; lognormal variance with pedigree 0.0032, pedigree (1,3,3,1,1)
  Amount and activity link based on primary data collected from participating companies.
- ethoxylated alcohol (AE11): 1.89115e-6 kg; lognormal variance with pedigree 0.0032, pedigree (1,3,3,1,1)
  Amount based on primary data collected from participating companies.
- copper scrap, sorted, pressed: -3.74907e-6 kg; lognormal variance with pedigree 0.0032, pedigree (1,3,3,1,1)
  Amount based on primary data collected from participating companies.
  production volume 115293 kg
- aluminium scrap, post-consumer: -1.873e-6 kg; lognormal variance with pedigree 0.0032, pedigree (1,3,3,1,1)
  Amount based on primary data collected from participating companies.
  production volume 87573.2 kg
- copper cake: -0.00288302 kg; lognormal variance with pedigree 0.0032, pedigree (1,3,3,1,1)
  Amount based on primary data collected from participating companies.
  production volume 1.32394e8 kg
- aluminium scrap, new: -1.21277e-5 kg; lognormal variance with pedigree 0.2106, pedigree (5,5,5,5,5)
  Estimated value. This flow was added to the GLO dataset to make it consistent with the Peru (PE) regional one. As it is assumed not to be representative of the processes for which data was collected for this dataset, the amount was scaled down based on the ratio between the zinc production volumes of the PE and GLO datasets.
- zinc oxide: 0.0128304 kg; lognormal variance with pedigree 0.0032, pedigree (1,3,3,1,1)
  Amount based on primary data collected from participating companies.
- diesel, burned in building machine: 6.79878e-5 MJ; lognormal variance with pedigree 0.0032, pedigree (1,3,3,1,1)
  Amount based on primary data collected from participating companies.
- zinc concentrate: 0.499695 kg; lognormal variance with pedigree 0.0032, pedigree (1,3,3,1,1)
  Amount based on primary data collected from participating companies.
- coke: 0.186736 MJ; lognormal variance with pedigree 0.0032, pedigree (1,3,3,1,1)
  Amount and activity link based on primary data collected from participating companies.
- transport, freight, sea, container ship: 0.00961158 metric ton*km; lognormal variance with pedigree 0.1226, pedigree (1,3,3,1,1)
  Amount based on primary data collected from participating companies.
- urea, as N: 2.80821e-6 kg; lognormal variance with pedigree 0.0032, pedigree (1,3,3,1,1)
  Amount based on primary data collected from participating companies.
- zinc: 0.000778175 kg; lognormal variance with pedigree 0.0032, pedigree (1,3,3,1,1)
  Amount based on primary data collected from participating companies.
- transport, freight, lorry 3.5-7.5 metric ton, EURO3: 1.20931e-7 metric ton*km; lognormal variance with pedigree 0.1226, pedigree (1,3,3,1,1)
  Inbound transport of zinc concentrate and other materials to sites. Amount and activity link based on primary data collected from participating companies.
- transport, freight, lorry >32 metric ton, EURO3: 0.00077897 metric ton*km; lognormal variance with pedigree 0.1226, pedigree (1,3,3,1,1)
  (same comment as for transport, freight, lorry 3.5-7.5 metric ton, EURO3)
- sulfamic acid: 7.12875e-8 kg; lognormal variance with pedigree 0.0032, pedigree (1,3,3,1,1)
  Amount based on primary data collected from participating companies.
- anode, for metal electrolysis: 1.8107e-5 kg; lognormal variance with pedigree 0.0032, pedigree (1,3,3,1,1)
  Amount based on primary data collected from participating companies.
- transport, freight, lorry 16-32 metric ton, EURO4: 8.79774e-5 metric ton*km; lognormal variance with pedigree 0.1226, pedigree (1,3,3,1,1)
  (same comment as for transport, freight, lorry 3.5-7.5 metric ton, EURO3)
- butane: 1.00287e-5 kg; lognormal variance with pedigree 0.0032, pedigree (1,3,3,1,1)
  Amount based on primary data collected from participating companies.
- transport, freight train: 0.0021113 metric ton*km; lognormal variance with pedigree 0.1226, pedigree (1,3,3,1,1)
  (same comment as for transport, freight, lorry 3.5-7.5 metric ton, EURO3)
- antimony: 1.24584e-6 kg; lognormal variance with pedigree 0.0032, pedigree (1,3,3,1,1)
  Amount based on primary data collected from participating companies.
- sulfite pulp, bleached: 0.000145528 kg; lognormal variance with pedigree 0.0032, pedigree (1,3,3,1,1)
  Amount based on primary data collected from participating companies.
- ammonium chloride: 0.000263778 kg; lognormal variance with pedigree 0.0032, pedigree (1,3,3,1,1)
  Amount based on primary data collected from participating companies.
- strontium carbonate: 0.000113164 kg; lognormal variance with pedigree 0.0032, pedigree (1,3,3,1,1)
  Amount based on primary data collected from participating companies.
- barium carbonate: 3.20794e-5 kg; lognormal variance with pedigree 0.0032, pedigree (1,3,3,1,1)
  Amount based on primary data collected from participating companies.
- sodium silicate, without water, in 37% solution state: 5.22448e-6 kg; lognormal variance with pedigree 0.0032, pedigree (1,3,3,1,1)
  Amount based on primary data collected from participating companies.
- aluminium, cast alloy: 4.4157e-5 kg; lognormal variance with pedigree 0.0032, pedigree (1,3,3,1,1)
  Amount based on primary data collected from participating companies.
- silver: 2.67847e-7 kg; lognormal variance with pedigree 0.0032, pedigree (1,3,3,1,1)
  Amount based on primary data collected from participating companies.
- activated silica: 0.000980347 kg; lognormal variance with pedigree 0.0032, pedigree (1,3,3,1,1)
  Amount based on primary data collected from participating companies.
- sodium hydrosulfide: 0.00032037 kg; lognormal variance with pedigree 0.0032, pedigree (1,3,3,1,1)
  Amount based on primary data collected from participating companies.
- silica sand: 0.00612587 kg; lognormal variance with pedigree 0.0032, pedigree (1,3,3,1,1)
  Amount based on primary data collected from participating companies.
- waste plastic, mixture: -3.02682e-6 kg; lognormal variance with pedigree 0.0032, pedigree (1,3,3,1,1)
  Amount and activity link based on primary data collected from participating companies.
  production volume 141520 kg
- sodium chloride, powder: 7.20515e-5 kg; lognormal variance with pedigree 0.0032, pedigree (1,3,3,1,1)
  Amount based on primary data collected from participating companies.
- phosphoric acid, industrial grade, without water, in 85% solution state: 4.33764e-6 kg; lognormal variance with pedigree 0.0032, pedigree (1,3,3,1,1)
  Amount based on primary data collected from participating companies.
- potassium permanganate: 4.27865e-6 kg; lognormal variance with pedigree 0.0032, pedigree (1,3,3,1,1)
  Amount based on primary data collected from participating companies.
- waste glass: -1.87987e-6 kg; lognormal variance with pedigree 0.0032, pedigree (1,3,3,1,1)
  Amount and activity link based on primary data collected from participating companies.
  production volume 87894.3 kg
- petroleum coke: 1.07668e-5 kg; lognormal variance with pedigree 0.0032, pedigree (1,3,3,1,1)
  Amount based on primary data collected from participating companies.
- nitrogen, liquid: 0.00167199 kg; lognormal variance with pedigree 0.0032, pedigree (1,3,3,1,1)
  Amount and activity link based on primary data collected from participating companies.
- municipal solid waste: -0.0401533 kg; lognormal variance with pedigree 0.0032, pedigree (1,3,3,1,1)
  Amount and activity link based on primary data collected from participating companies.
  production volume 1.87739e9 kg
- manganese sulfate: 1.16255e-6 kg; lognormal variance with pedigree 0.0032, pedigree (1,3,3,1,1)
  Amount based on primary data collected from participating companies.
- municipal solid waste: -0.00891095 kg; lognormal variance with pedigree 0.0032, pedigree (1,3,3,1,1)
  Amount and activity link based on primary data collected from participating companies.
  production volume 4.16636e8 kg
- manganese dioxide: 0.000384713 kg; lognormal variance with pedigree 0.0032, pedigree (1,3,3,1,1)
  Amount based on primary data collected from participating companies.
- lead concentrate: 0.00559873 kg; lognormal variance with pedigree 0.0032, pedigree (1,3,3,1,1)
  Amount based on primary data collected from participating companies.
- iron(III) sulfate, without water, in 12.5% iron solution state: 7.84163e-5 kg; lognormal variance with pedigree 0.0032, pedigree (1,3,3,1,1)
  Amount based on primary data collected from participating companies.
- magnesium: 1.92034e-6 kg; lognormal variance with pedigree 0.0032, pedigree (1,3,3,1,1)
  Amount based on primary data collected from participating companies.
- iron(III) chloride, without water, in 14% iron solution state: 1.88188e-5 kg; lognormal variance with pedigree 0.0032, pedigree (1,3,3,1,1)
  Amount based on primary data collected from participating companies.
- lead: 0.00010713 kg; lognormal variance with pedigree 0.0032, pedigree (1,3,3,1,1)
  Amount based on primary data collected from participating companies.
- hydrogen, liquid: 0.000140263 kg; lognormal variance with pedigree 0.0032, pedigree (1,3,3,1,1)
  Amount based on primary data collected from participating companies.
- ferrite: 0.000216546 kg; lognormal variance with pedigree 0.0032, pedigree (1,3,3,1,1)
  Amount based on primary data collected from participating companies.
- ethanol, without water, in 99.7% solution state, from ethylene: 9.38245e-6, 2.08918e-5 kg (2 entries); lognormal variance with pedigree 0.0032, pedigree (1,3,3,1,1)
  Amount based on primary data collected from participating companies.
- water, deionised: 0.00146311, 0.406446, 1.31945 kg (3 entries); lognormal variance with pedigree 0.0032, pedigree (1,3,3,1,1)
  Amount based on primary data collected from participating companies.
- waste wood, untreated: -2.95702e-5, -3.67158e-6, -2.68434e-7, -1.03124e-5, -1.55795e-6, -2.46299e-6 kg (6 entries); lognormal variance with pedigree 0.0032, pedigree (1,3,3,1,1)
  Amount based on primary data collected from participating companies.
  production volume 4.40738e6 kg
- clinker: 0.000486051, 0.000109546, 2.54098e-5, 1.94957e-5, 3.25743e-5, 7.9303e-6, 0.00154459 kg (7 entries); lognormal variance with pedigree 0.0032, pedigree (1,3,3,1,1)
  Amount based on primary data collected from participating companies.
- chlorine, liquid: 1.15792e-7 kg; lognormal variance with pedigree 0.0032, pedigree (1,3,3,1,1)
  Amount based on primary data collected from participating companies.
- diesel: 0.000145103, 6.9757e-6, 0.000292851, 2.0513e-5, 2.96492e-5, 0.00289176 kg (6 entries); lognormal variance with pedigree 0.0032, pedigree (1,3,3,1,1)
  Amount based on primary data collected from participating companies. Emissions from diesel combustion included in dataset.
- tap water: 0.0108175, 0.00126592, 0.0144865 kg (3 entries); lognormal variance with pedigree 0.0032, pedigree (1,3,3,1,1)
  Amount based on primary data collected from participating companies.
- cement, unspecified: 4.08785e-5, 3.38862e-6, 8.53409e-6, 0.000196465, 0.000193001, 5.68059e-6, 6.23897e-5, 7.54845e-6, 0.00084311 kg (9 entries); lognormal variance with pedigree 0.0032, pedigree (1,3,3,1,1)
  Amount based on primary data collected from participating companies.
- ammonia, liquid: 0.000702132, 0.00614743 kg (2 entries); lognormal variance with pedigree 0.0032, pedigree (1,3,3,1,1)
  Amount based on primary data collected from participating companies.
- steam, in chemical industry: 4.29449e-7, 2.43573e-6 kg (2 entries); lognormal variance with pedigree 0.0032, pedigree (1,3,3,1,1)
  Amount based on primary data collected from participating companies.
- aluminium sulfate, powder: 2.85987e-6 kg; lognormal variance with pedigree 0.0032, pedigree (1,3,3,1,1)
  Amount based on primary data collected from participating companies.
- waste textile, soiled: -1.46598e-5, -0.000979445 kg (2 entries); lognormal variance with pedigree 0.0032, pedigree (1,3,3,1,1)
  Amount based on primary data collected from participating companies.
  production volume 4.64799e7 kg
- wastewater, average: -4.79392e-7, -4.43138e-6, -9.27139e-6 m3 (3 entries); lognormal variance with pedigree 0.0032, pedigree (1,3,3,1,1)
  Amount based on primary data collected from participating companies.
  production volume 663094 m3
- waste paperboard: -9.13646e-8, -1.39518e-8, -1.21996e-9, -5.04137e-8, -4.91575e-9, -9.09957e-9, -2.24379e-7, -1.69725e-6 kg (8 entries); lognormal variance with pedigree 0.0032, pedigree (1,3,3,1,1)
  Amount based on primary data collected from participating companies.
  production volume 97840.1 kg
- waste gypsum: -2.42765e-6, -5.13561e-5, -0.000167208 kg (3 entries); lognormal variance with pedigree 0.0032, pedigree (1,3,3,1,1)
  Amount based on primary data collected from participating companies.
  production volume 1.03326e7 kg
- waste glass: -1.55529e-6, -1.43348e-7, -3.25208e-9, -1.33742e-8, -2.03094e-8, -5.98444e-8, -2.95432e-6 kg (7 entries); lognormal variance with pedigree 0.0032, pedigree (1,3,3,1,1)
  Amount based on primary data collected from participating companies.
  production volume 221572 kg
- sludge, pig iron production: -3.4235e-6, -7.71752e-5, -0.000374396 kg (3 entries); lognormal variance with pedigree 0.0032, pedigree (1,3,3,1,1)
  Amount based on primary data collected from participating companies.
  production volume 2.12735e7 kg
- natural gas, high pressure: 1.48452e-5, 2.4713e-5, 0.000139303, 0.000473149 m3 (4 entries); lognormal variance with pedigree 0.0032, pedigree (1,3,3,1,1)
  Amount based on primary data collected from participating companies. Emissions from fuel combustion included in dataset.
- waste polyethylene terephthalate: -1.37761e-8, -9.20463e-10, -6.96131e-11, -3.80184e-10, -1.5359e-10, -3.6102e-10, -1.19395e-8, -9.644e-8 kg (8 entries); lognormal variance with pedigree 0.0032, pedigree (1,3,3,1,1)
  Amount based on primary data collected from participating companies.
  production volume 5799.57 kg
- meat and bone meal: 1.54789e-9, 9.18062e-7 kg (2 entries); lognormal variance with pedigree 0.0032, pedigree (1,3,3,1,1)
  Amount based on primary data collected from participating companies.
- liquefied petroleum gas: 2.19027e-6, 1.90859e-5, 7.77949e-6, 6.8758e-7, 1.53039e-7, 9.70672e-8, 3.2786e-5 kg (7 entries); lognormal variance with pedigree 0.0032, pedigree (1,3,3,1,1)
  Amount based on primary data collected from participating companies.
- light fuel oil: 7.46267e-6, 1.07624e-6, 1.50614e-5, 9.99459e-7, 1.44818e-6, 0.00015174 kg (6 entries); lognormal variance with pedigree 0.0032, pedigree (1,3,3,1,1)
  Amount based on primary data collected from participating companies.
- hydrochloric acid, without water, in 30% solution state: 1.26504e-5, 5.65429e-5 kg (2 entries); lognormal variance with pedigree 0.0032, pedigree (1,3,3,1,1)
  Amount based on primary data collected from participating companies.
- heavy fuel oil: 1.27953e-5, 3.33335e-6, 9.86796e-6, 1.94106e-6, 2.49009e-6, 0.000230678 kg (6 entries); lognormal variance with pedigree 0.0032, pedigree (1,3,3,1,1)
  Amount based on primary data collected from participating companies.
- hard coal: 0.000248967, 0.000669959, 0.000411338, 0.000403085, 9.5649e-5, 0.000313836, 0.000174926, 0.000888958 kg (8 entries); lognormal variance with pedigree 0.0032, pedigree (1,3,3,1,1)
  Amount based on primary data collected from participating companies.
- esterquat: 1.16558e-7, 2.32026e-7 kg (2 entries); lognormal variance with pedigree 0.0032, pedigree (1,3,3,1,1)
  Amount based on primary data collected from participating companies.

## Inputs from nature
All rows: lognormal variance with pedigree 0.0032, pedigree (1,3,3,1,1)
- Dolomite, in ground [natural resource, in ground]: 1.28239e-8 kg
  Amount and activity link based on primary data collected from participating companies.
- Water, lake [natural resource, in water]: 4.12982e-6 m3
  Amount and activity link based on primary data collected from participating companies.
- Sulfur, in ground [natural resource, in ground]: 3.97759e-5 kg
  Amount and activity link based on primary data collected from participating companies.
- Water, cooling, unspecified natural origin [natural resource, in water]: 0.613913 m3
  Amount and activity link based on primary data collected from participating companies.
- Water, unspecified natural origin [natural resource, in water]: 0.218048 m3
  Amount and activity link based on primary data collected from participating companies.
- Strontium, in ground [natural resource, in ground]: 1.62846e-7 kg
  Amount and activity link based on primary data collected from participating companies.
- Copper, in ground [natural resource, in ground]: 9.34995e-5 kg
  Amount and activity link based on primary data collected from participating companies.
- Aluminium, in ground [natural resource, in ground]: 1.20806e-5 kg
  Amount and activity link based on primary data collected from participating companies.
- Gangue, in ground [natural resource, in ground]: 0.113096 kg
  Amount and activity link based on primary data collected from participating companies.
- Gold, in ground [natural resource, in ground]: 7.77718e-6 kg
  Amount and activity link based on primary data collected from participating companies.
- Vanadium, in ground [natural resource, in ground]: 1.5453e-8 kg
  Amount and activity link based on primary data collected from participating companies.
- Zinc, in ground [natural resource, in ground]: 0.00338038 kg
  Amount and activity link based on primary data collected from participating companies.
- Titanium, in ground [natural resource, in ground]: 5.70539e-7 kg
  Amount and activity link based on primary data collected from participating companies.
- Sodium, in ground [natural resource, in ground]: 4.61973e-7 kg
  Amount and activity link based on primary data collected from participating companies.
- Nickel, in ground [natural resource, in ground]: 9.10085e-9 kg
  Amount and activity link based on primary data collected from participating companies.
- Silver, in ground [natural resource, in ground]: 1.23448e-6 kg
  Amount and activity link based on primary data collected from participating companies.
- Potassium, in ground [natural resource, in ground]: 1.51296e-5 kg
  Amount and activity link based on primary data collected from participating companies.
- Manganese, in ground [natural resource, in ground]: 8.73889e-7 kg
  Amount and activity link based on primary data collected from participating companies.
- Magnesium, in ground [natural resource, in ground]: 0.000239995 kg
  Amount and activity link based on primary data collected from participating companies.
- Phosphorus, in ground [natural resource, in ground]: 1.03251e-7 kg
  Amount and activity link based on primary data collected from participating companies.
- Iron, in ground [natural resource, in ground]: 1.51527e-5 kg
  Amount and activity link based on primary data collected from participating companies.
- Mercury, in ground [natural resource, in ground]: 1.23116e-10 kg
  Amount and activity link based on primary data collected from participating companies.
- Lead, in ground [natural resource, in ground]: 0.000722769 kg
  Amount and activity link based on primary data collected from participating companies.
- Sand, unspecified, in ground [natural resource, in ground]: 6.07389e-7 kg
  Amount and activity link based on primary data collected from participating companies.
- Cadmium, in ground [natural resource, in ground]: 3.97297e-7 kg
  Amount and activity link based on primary data collected from participating companies.
- Calcium, in ground [natural resource, in ground]: 0.000419842 kg
  Amount and activity link based on primary data collected from participating companies.
- Barium, in ground [natural resource, in ground]: 6.42145e-8 kg
  Amount and activity link based on primary data collected from participating companies.
- Water, well, in ground [natural resource, in water]: 0.000214472 m3
  Amount and activity link based on primary data collected from participating companies.
- Water, river [natural resource, in water]: 0.0727442 m3
  Amount and activity link based on primary data collected from participating companies.
- Chromium, in ground [natural resource, in ground]: 1.49217e-8 kg
  Amount and activity link based on primary data collected from participating companies.
## Emissions to nature
- Water [air, unspecified]: 0.0870094 m3; name water_to_air_unspecified; = (tap_water_input/1000*fraction_TW_to_air); lognormal variance with pedigree 0.0807, pedigree (2,2,5,1,1)
  Calculated value based on literature values and expert opinion. See comments in the parametres' comment field.
  property fraction, origin: fresh water 1; name fraction_origin_fresh_water
  property fraction, origin: salt water 0; name fraction_origin_salt_water
  property fraction, origin: unspecified 0; name fraction_origin_unspecified
- Hydrocarbons, chlorinated [air, unspecified]: 0 kg; pedigree (1,1,1,1,1)
  Calculation. The total amount of solvent emissions indicated in the SIA building materials declaration is assumed to be 90% NMVOC and 10% halogenated hydrocarbons.
  Further reference:
  SIA building materials declaration. http://www.sia.ch/cf/oekoinfoliste.cfm?ID=2943702&Lang=d&Mfg=72&Grp=0&Produkt=, access date: Mai 2003
- NMVOC, non-methane volatile organic compounds, unspecified origin [air, unspecified]: 2.81702e-6 kg; lognormal variance with pedigree 0.0806, pedigree (2,1,5,1,1)
  (same comment as for Hydrocarbons, chlorinated)
- Carbon dioxide, fossil [air, unspecified]: 0.0633974 kg; source Weibel T. and Stritz A. 1995
  Stoichometric calculation, based on literature values. The CO2 emissions from combustion included in the upstream processes must be corrected to take into account CO2 binding. The amount of CO2 bound in the wastewater is 0.72 kg/m3 and is included as a negative emission to compensate the emission inventoried in the energy production module. The amount is very small because the amount of wastewater is very small (0.068 kg/kg fibre cement roof slate).
  The wastewater from the production process is usually very alkaline because of a high amount of calcium oxide (quicklime) from the cement, and has to be neutralised before being released to the public sewage system. The alkaline wastewater with pH 13.5 is corrected to pH 8.5. To neutralise the wastewater, an unspecified amount of acid is added, then CO2 emissions from combustion are scrubbed through the wastewater. Since no data concerning the type and amount of acid is available it is not included in the inventory.
  The CO2 binds with the calcium oxide to give lime (CaCO3) as shown in the following stoichiometric equation:.
  CaO + CO2 -> CaCO3
  56 Mol 44 Mol 100 Mol
  0.91 kg 0.72 kg 1.63 kg per m3 wastewater
- Water [water, unspecified]: 0.152744 m3; name water_to_water_unspecified; = (tap_water_input/1000)*(1-fraction_TW_to_air)-0.00154-6.8E-6; lognormal variance with pedigree 0.0807, pedigree (2,2,5,1,1)
  (same comment as for Water)
  property wet mass 1000 kg; name WM
  property carbon content, fossil 0; name C_content_fossil
  property water in wet mass 1000 kg; name WWM
  property carbon content, non-fossil 0; name C_content_non_fossil
  property fraction, origin: fresh water 1; name fraction_origin_fresh_water_Ww
  property fraction, origin: salt water 0; name fraction_origin_salt_water_Ww
  property dry mass 0 kg; name DM
  property fraction, origin: unspecified 0; name fraction_origin_unspecified_Ww
- Lead [soil, industrial]: 1.139e-10 kg; lognormal variance with pedigree 0.0426, pedigree (1,3,3,1,1)
  Amount and activity link based on primary data collected from participating companies.
- Sulfur dioxide [air, unspecified]: 0.00117841 kg; lognormal variance with pedigree 0.0032, pedigree (1,3,3,1,1)
  Amount and activity link based on primary data collected from participating companies.
- Ammonia [air, unspecified]: 1.05163e-5 kg; lognormal variance with pedigree 0.0426, pedigree (1,3,3,1,1)
  Amount and activity link based on primary data collected from participating companies.
- Hydrogen chloride [air, unspecified]: 2.8807e-7 kg; lognormal variance with pedigree 0.0426, pedigree (1,3,3,1,1)
  Amount and activity link based on primary data collected from participating companies.
- Suspended solids, unspecified [water, ocean]: 8.14257e-7 kg; lognormal variance with pedigree 0.0426, pedigree (1,3,3,1,1)
  Amount and activity link based on primary data collected from participating companies.
- Ammonium, ion [water, surface water]: 6.63511e-6 kg; lognormal variance with pedigree 0.0426, pedigree (1,3,3,1,1)
  Amount and activity link based on primary data collected from participating companies.
- Hydrocarbons, unspecified [soil, unspecified]: 3.71361e-9 kg; lognormal variance with pedigree 0.0426, pedigree (1,3,3,1,1)
  Amount and activity link based on primary data collected from participating companies.
- Selenium [air, unspecified]: 1.80176e-10 kg; lognormal variance with pedigree 0.6526, pedigree (1,3,3,1,1)
  Amount and activity link based on primary data collected from participating companies.
- Antimony [water, surface water]: 2.57454e-7 kg; lognormal variance with pedigree 0.6526, pedigree (1,3,3,1,1)
  Amount and activity link based on primary data collected from participating companies.
- Fluoride [soil, industrial]: 7.4635e-9 kg; lognormal variance with pedigree 0.0426, pedigree (1,3,3,1,1)
  Amount and activity link based on primary data collected from participating companies.
- Sodium [soil, industrial]: 4.67277e-12 kg; lognormal variance with pedigree 0.0426, pedigree (1,3,3,1,1)
  Amount and activity link based on primary data collected from participating companies.
- Benzene [air, unspecified]: 9.511e-9 kg; lognormal variance with pedigree 0.0426, pedigree (1,3,3,1,1)
  Amount and activity link based on primary data collected from participating companies.
- Lead [air, unspecified]: 1.75719e-6 kg; lognormal variance with pedigree 0.6526, pedigree (1,3,3,1,1)
  Amount and activity link based on primary data collected from participating companies.
- Sulfate [soil, unspecified]: 7.95716e-11 kg; lognormal variance with pedigree 0.0426, pedigree (1,3,3,1,1)
  Amount and activity link based on primary data collected from participating companies.
- Aluminium [water, surface water]: 1.05608e-7 kg; lognormal variance with pedigree 0.6526, pedigree (1,3,3,1,1)
  Amount and activity link based on primary data collected from participating companies.
- Fluorine [air, unspecified]: 1.33955e-8 kg; lognormal variance with pedigree 0.0426, pedigree (1,3,3,1,1)
  Amount and activity link based on primary data collected from participating companies.
- Zinc [soil, industrial]: 3.26892e-8 kg; lognormal variance with pedigree 0.0426, pedigree (1,3,3,1,1)
  Amount and activity link based on primary data collected from participating companies.
- Sulfate [water, surface water]: 0.000370356 kg; lognormal variance with pedigree 0.0426, pedigree (1,3,3,1,1)
  Amount and activity link based on primary data collected from participating companies.
- Arsenic, ion [water, ocean]: 3.39086e-8 kg; lognormal variance with pedigree 0.6526, pedigree (1,3,3,1,1)
  Amount and activity link based on primary data collected from participating companies.
- Dissolved solids [water, surface water]: 2.67659e-5 kg; lognormal variance with pedigree 0.0426, pedigree (1,3,3,1,1)
  Amount and activity link based on primary data collected from participating companies.
- Zinc, ion [water, ocean]: 7.8272e-7 kg; lognormal variance with pedigree 0.6526, pedigree (1,3,3,1,1)
  Amount and activity link based on primary data collected from participating companies.
- Selenium [water, surface water]: 1.16434e-8 kg; lognormal variance with pedigree 0.6526, pedigree (1,3,3,1,1)
  Amount and activity link based on primary data collected from participating companies.
- Antimony [air, unspecified]: 2.35963e-8 kg; lognormal variance with pedigree 0.6526, pedigree (1,3,3,1,1)
  Amount and activity link based on primary data collected from participating companies.
- Fluoride [water, ocean]: 1.32132e-6 kg; lognormal variance with pedigree 0.0426, pedigree (1,3,3,1,1)
  Amount and activity link based on primary data collected from participating companies.
- Particulates, < 2.5 um [air, unspecified]: 0.000544301 kg; lognormal variance with pedigree 0.3026, pedigree (1,3,3,1,1)
  Amount and activity link based on primary data collected from participating companies.
- Fluoride [water, surface water]: 1.78069e-6 kg; lognormal variance with pedigree 0.0426, pedigree (1,3,3,1,1)
  Amount and activity link based on primary data collected from participating companies.
- TOC, Total Organic Carbon [water, surface water]: 0.00784907 kg; lognormal variance with pedigree 0.0426, pedigree (1,3,3,1,1)
  Amount and activity link based on primary data collected from participating companies.
- Particulates, > 2.5 um, and < 10um [air, unspecified]: 1.29448e-5 kg; lognormal variance with pedigree 0.1226, pedigree (1,3,3,1,1)
  Amount and activity link based on primary data collected from participating companies.
- Aldehydes, unspecified [air, unspecified]: 3.3356e-10 kg; lognormal variance with pedigree 0.0426, pedigree (1,3,3,1,1)
  Amount and activity link based on primary data collected from participating companies.
- Formaldehyde [air, unspecified]: 4.10702e-8 kg; lognormal variance with pedigree 0.0426, pedigree (1,3,3,1,1)
  Amount and activity link based on primary data collected from participating companies.
- Zinc, ion [water, surface water]: 3.80245e-6 kg; lognormal variance with pedigree 0.6526, pedigree (1,3,3,1,1)
  Amount and activity link based on primary data collected from participating companies.
- Phosphorus [water, surface water]: 2.18745e-5 kg; lognormal variance with pedigree 0.0426, pedigree (1,3,3,1,1)
  Amount and activity link based on primary data collected from participating companies.
- Copper, ion [water, surface water]: 1.50129e-7 kg; lognormal variance with pedigree 0.6526, pedigree (1,3,3,1,1)
  Amount and activity link based on primary data collected from participating companies.
- Sodium, ion [water, surface water]: 6.62714e-5 kg; lognormal variance with pedigree 0.0426, pedigree (1,3,3,1,1)
  Amount and activity link based on primary data collected from participating companies.
- Dioxins, measured as 2,3,7,8-tetrachlorodibenzo-p-dioxin [air, unspecified]: 1.2821e-15 kg; lognormal variance with pedigree 0.0426, pedigree (1,3,3,1,1)
  Amount and activity link based on primary data collected from participating companies.
- Potassium, ion [water, surface water]: 3.08318e-7 kg; lognormal variance with pedigree 0.0426, pedigree (1,3,3,1,1)
  Amount and activity link based on primary data collected from participating companies.
- Cyanide [water, surface water]: 5.8126e-10 kg; lognormal variance with pedigree 0.0426, pedigree (1,3,3,1,1)
  Amount and activity link based on primary data collected from participating companies.
- Particulates, > 10 um [air, unspecified]: 7.23503e-5 kg; lognormal variance with pedigree 0.0426, pedigree (1,3,3,1,1)
  Amount and activity link based on primary data collected from participating companies.
- COD, Chemical Oxygen Demand [water, ocean]: 3.23292e-6 kg; source Weidema B P 2013; lognormal variance with pedigree 0.25, pedigree (5,5,5,5,5)
  Calculated value. The amount of COD is assumed to be five times that of BOD5, based on the estimates provided in section 5.9.7 of Weidema et al. (2013).
- Copper, ion [water, ocean]: 1.07453e-8 kg; lognormal variance with pedigree 0.6526, pedigree (1,3,3,1,1)
  Amount and activity link based on primary data collected from participating companies.
- Nitrogen oxides [air, unspecified]: 0.00259792 kg; lognormal variance with pedigree 0.0426, pedigree (1,3,3,1,1)
  Amount and activity link based on primary data collected from participating companies.
- DOC, Dissolved Organic Carbon [water, surface water]: 0.00784907 kg; lognormal variance with pedigree 0.25, pedigree (5,5,5,5,5)
  Calculated value. The amount of DOC is assumed to be equal to the amount of TOC
- Cobalt [air, unspecified]: 5.1215e-9 kg; lognormal variance with pedigree 0.6526, pedigree (1,3,3,1,1)
  Amount and activity link based on primary data collected from participating companies.
- Nitrogen, organic bound [water, surface water]: 1.15415e-7 kg; lognormal variance with pedigree 0.0426, pedigree (1,3,3,1,1)
  Amount and activity link based on primary data collected from participating companies.
- DOC, Dissolved Organic Carbon [water, ocean]: 1.58526e-11 kg; lognormal variance with pedigree 0.25, pedigree (5,5,5,5,5)
  Calculated value. The amount of DOC is assumed to be equal to the amount of TOC
- Chromium VI [water, surface water]: 6.40088e-7 kg; lognormal variance with pedigree 0.6526, pedigree (1,3,3,1,1)
  Amount and activity link based on primary data collected from participating companies.
- Nitrogen [water, surface water]: 0.000239597 kg; lognormal variance with pedigree 0.0426, pedigree (1,3,3,1,1)
  Amount and activity link based on primary data collected from participating companies.
- TOC, Total Organic Carbon [water, ocean]: 1.58526e-11 kg; source Weidema B P 2013; lognormal variance with pedigree 0.25, pedigree (5,5,5,5,5)
  Calculated value. The relation between COD and TOC is assumed to be COD (g O2) = 2.7*TOC (g C), based on the estimates provided in section 5.9.7 of Weidema et al. (2013).
- Chromium [soil, industrial]: 2.09846e-13 kg; lognormal variance with pedigree 0.0426, pedigree (1,3,3,1,1)
  Amount and activity link based on primary data collected from participating companies.
- Nickel, ion [water, surface water]: 1.68838e-9 kg; lognormal variance with pedigree 0.6526, pedigree (1,3,3,1,1)
  Amount and activity link based on primary data collected from participating companies.
- Nitric acid [soil, industrial]: 2.49003e-10 kg; lognormal variance with pedigree 0.0426, pedigree (1,3,3,1,1)
  Amount and activity link based on primary data collected from participating companies.
- COD, Chemical Oxygen Demand [water, surface water]: 0.0215193 kg; lognormal variance with pedigree 0.0426, pedigree (1,3,3,1,1)
  Amount and activity link based on primary data collected from participating companies.
- Copper [soil, industrial]: 1.2655e-8 kg; lognormal variance with pedigree 0.0426, pedigree (1,3,3,1,1)
  Amount and activity link based on primary data collected from participating companies.
- PAH, polycyclic aromatic hydrocarbons [air, unspecified]: 5.40984e-11 kg; lognormal variance with pedigree 0.3026, pedigree (1,3,3,1,1)
  Amount and activity link based on primary data collected from participating companies.
- Chromium VI [air, unspecified]: 5.12956e-11 kg; lognormal variance with pedigree 0.6526, pedigree (1,3,3,1,1)
  Amount and activity link based on primary data collected from participating companies.
- Nickel [soil, industrial]: 4.88241e-11 kg; lognormal variance with pedigree 0.0426, pedigree (1,3,3,1,1)
  Amount and activity link based on primary data collected from participating companies.
- Chromium [air, unspecified]: 2.052e-9 kg; lognormal variance with pedigree 0.6526, pedigree (1,3,3,1,1)
  Amount and activity link based on primary data collected from participating companies.
- Nitrogen [soil, industrial]: 9.4664e-9 kg; lognormal variance with pedigree 0.0426, pedigree (1,3,3,1,1)
  Amount and activity link based on primary data collected from participating companies.
- Copper [air, unspecified]: 4.99321e-7 kg; lognormal variance with pedigree 0.6526, pedigree (1,3,3,1,1)
  Amount and activity link based on primary data collected from participating companies.
- Nickel [air, unspecified]: 6.29407e-9 kg; lognormal variance with pedigree 0.6526, pedigree (1,3,3,1,1)
  Amount and activity link based on primary data collected from participating companies.
- Ammonia [soil, industrial]: 3.0784e-9 kg; lognormal variance with pedigree 0.0426, pedigree (1,3,3,1,1)
  Amount and activity link based on primary data collected from participating companies.
- Carbon dioxide, non-fossil [air, unspecified]: 1.60823e-5 kg; lognormal variance with pedigree 0.0032, pedigree (1,3,3,1,1)
  Amount and activity link based on primary data collected from participating companies.
- Nitrate [water, surface water]: 1.01139e-5 kg; lognormal variance with pedigree 0.0426, pedigree (1,3,3,1,1)
  Amount and activity link based on primary data collected from participating companies.
- Chlorine [water, surface water]: 3.69862e-7 kg; lognormal variance with pedigree 0.0426, pedigree (1,3,3,1,1)
  Amount and activity link based on primary data collected from participating companies.
- Nickel, ion [water, ocean]: 2.78067e-9 kg; lognormal variance with pedigree 0.6526, pedigree (1,3,3,1,1)
  Amount and activity link based on primary data collected from participating companies.
- Carbon monoxide, fossil [air, unspecified]: 1.75578e-5 kg; lognormal variance with pedigree 0.6526, pedigree (1,3,3,1,1)
  Amount and activity link based on primary data collected from participating companies.
- Methane, fossil [air, unspecified]: 1.00377e-6 kg; lognormal variance with pedigree 0.0426, pedigree (1,3,3,1,1)
  Amount and activity link based on primary data collected from participating companies.
- Calcium, ion [water, surface water]: 2.4987e-5 kg; lognormal variance with pedigree 0.0426, pedigree (1,3,3,1,1)
  Amount and activity link based on primary data collected from participating companies.
- Methanol [air, unspecified]: 1.51237e-7 kg; lognormal variance with pedigree 0.0426, pedigree (1,3,3,1,1)
  Amount and activity link based on primary data collected from participating companies.
- Chloride [water, surface water]: 5.07663e-5 kg; lognormal variance with pedigree 0.0426, pedigree (1,3,3,1,1)
  Amount and activity link based on primary data collected from participating companies.
- Mercury [air, unspecified]: 1.168e-8 kg; lognormal variance with pedigree 0.6526, pedigree (1,3,3,1,1)
  Amount and activity link based on primary data collected from participating companies.
- BOD5, Biological Oxygen Demand [water, surface water]: 0.000522921 kg; lognormal variance with pedigree 0.0426, pedigree (1,3,3,1,1)
  Amount and activity link based on primary data collected from participating companies.
- Mercury [water, surface water]: 4.77636e-9 kg; lognormal variance with pedigree 0.6526, pedigree (1,3,3,1,1)
  Amount and activity link based on primary data collected from participating companies.
- Calcium [soil, industrial]: 1.40403e-10 kg; lognormal variance with pedigree 0.0426, pedigree (1,3,3,1,1)
  Amount and activity link based on primary data collected from participating companies.
- Mercury [soil, industrial]: 1.98188e-12 kg; lognormal variance with pedigree 0.0426, pedigree (1,3,3,1,1)
  Amount and activity link based on primary data collected from participating companies.
- Cadmium, ion [water, surface water]: 4.49765e-8 kg; lognormal variance with pedigree 0.6526, pedigree (1,3,3,1,1)
  Amount and activity link based on primary data collected from participating companies.
- Magnesium [water, surface water]: 4.15514e-5 kg; lognormal variance with pedigree 0.0426, pedigree (1,3,3,1,1)
  Amount and activity link based on primary data collected from participating companies.
- Beryllium [air, unspecified]: 1.37187e-10 kg; lognormal variance with pedigree 0.0426, pedigree (1,3,3,1,1)
  Amount and activity link based on primary data collected from participating companies.
- Manganese [soil, industrial]: 7.06364e-9 kg; lognormal variance with pedigree 0.0426, pedigree (1,3,3,1,1)
  Amount and activity link based on primary data collected from participating companies.
- Cadmium [air, unspecified]: 1.55051e-6 kg; lognormal variance with pedigree 0.6526, pedigree (1,3,3,1,1)
  Amount and activity link based on primary data collected from participating companies.
- Manganese [water, ocean]: 5.66584e-11 kg; lognormal variance with pedigree 0.6526, pedigree (1,3,3,1,1)
  Amount and activity link based on primary data collected from participating companies.
- BOD5, Biological Oxygen Demand [water, ocean]: 8.56042e-12 kg; lognormal variance with pedigree 0.0426, pedigree (1,3,3,1,1)
  Amount and activity link based on primary data collected from participating companies.
- Mercury [water, ocean]: 3.04312e-9 kg; lognormal variance with pedigree 0.6526, pedigree (1,3,3,1,1)
  Amount and activity link based on primary data collected from participating companies.
- Lead [water, surface water]: 1.75463e-7 kg; lognormal variance with pedigree 0.6526, pedigree (1,3,3,1,1)
  Amount and activity link based on primary data collected from participating companies.
- Cadmium [soil, industrial]: 4.88824e-11 kg; lognormal variance with pedigree 0.0426, pedigree (1,3,3,1,1)
  Amount and activity link based on primary data collected from participating companies.
- Manganese [air, unspecified]: 3.51213e-8 kg; lognormal variance with pedigree 0.6526, pedigree (1,3,3,1,1)
  Amount and activity link based on primary data collected from participating companies.
- Water [water, surface water]: 0.53361 m3; lognormal variance with pedigree 0.0426, pedigree (1,3,3,1,1)
  Amount and activity link based on primary data collected from participating companies.
- Arsenic [soil, industrial]: 1.357e-11 kg; lognormal variance with pedigree 0.0426, pedigree (1,3,3,1,1)
  Amount and activity link based on primary data collected from participating companies.
- Manganese [water, surface water]: 4.06422e-6 kg; lognormal variance with pedigree 0.6526, pedigree (1,3,3,1,1)
  Amount and activity link based on primary data collected from participating companies.
- VOC, volatile organic compounds, unspecified origin [air, unspecified]: 3.81697e-8 kg; lognormal variance with pedigree 0.0426, pedigree (1,3,3,1,1)
  Amount and activity link based on primary data collected from participating companies.
- Cadmium, ion [water, ocean]: 2.78417e-8 kg; lognormal variance with pedigree 0.6526, pedigree (1,3,3,1,1)
  Amount and activity link based on primary data collected from participating companies.
- Lead [water, ocean]: 2.47737e-8 kg; lognormal variance with pedigree 0.6526, pedigree (1,3,3,1,1)
  Amount and activity link based on primary data collected from participating companies.
- Suspended solids, unspecified [water, surface water]: 0.00130289 kg; lognormal variance with pedigree 0.0426, pedigree (1,3,3,1,1)
  Amount and activity link based on primary data collected from participating companies.
- Benzo(a)pyrene [air, unspecified]: 6.09567e-13 kg; lognormal variance with pedigree 0.3026, pedigree (1,3,3,1,1)
  Amount and activity link based on primary data collected from participating companies.
- Hydrogen fluoride [air, unspecified]: 8.95345e-10 kg; lognormal variance with pedigree 0.0426, pedigree (1,3,3,1,1)
  Amount and activity link based on primary data collected from participating companies.
- Sulfur oxides [air, unspecified]: 7.57881e-6 kg; lognormal variance with pedigree 0.0426, pedigree (1,3,3,1,1)
  Amount and activity link based on primary data collected from participating companies.
- Arsenic, ion [water, surface water]: 1.83014e-7 kg; lognormal variance with pedigree 0.6526, pedigree (1,3,3,1,1)
  Amount and activity link based on primary data collected from participating companies.
- Iron, ion [water, surface water]: 1.35399e-6 kg; lognormal variance with pedigree 0.6526, pedigree (1,3,3,1,1)
  Amount and activity link based on primary data collected from participating companies.
- Zinc [air, unspecified]: 1.5602e-5 kg; lognormal variance with pedigree 0.6526, pedigree (1,3,3,1,1)
  Amount and activity link based on primary data collected from participating companies.
- Arsenic [air, unspecified]: 7.52766e-8 kg; lognormal variance with pedigree 0.6526, pedigree (1,3,3,1,1)
  Amount and activity link based on primary data collected from participating companies.
- Magnesium [air, urban air close to ground]: 7.22958e-7 kg; lognormal variance with pedigree 0.7388, pedigree (2,5,2,1,4)
  Estimation based on fuel input data and emission factors from corresponding ecoinvent fuel combustion datasets (see "Extrapolations" comment). Apart from external fuel inputs, internal fuels such as bark, black liquor, sludge, tall oil pitch, wood pellets are generated during the process and supply considerable amounts of process energy. Emissions from some internal biofuels (bark, wood pellets) are approximated with the combustion of wood chips. black liquor, sludge and tall oil pitch were not included in the emissions calculations because no specific emission profiles, e.g. for the black liquor recovery process, were available. Emissions from these internal energy generation processes are therefore only reflected in the key emission factors provided by the industry, other emissions constitute a data gap. Biogas and methanol are approximated with the combustion of natural gas, whereby CO2, CO and CH4 emissions stemming from biogas were modeled as non-fossil.
  Uncertainty: estimation, based on industrial heating modules of energy carriers used
- Methanol [air, urban air close to ground]: 2.96224e-6 kg; lognormal variance with pedigree 0.1388, pedigree (2,5,2,1,4)
  (same comment as for Magnesium)
- Acetone [air, urban air close to ground]: 9.45237e-8 kg; lognormal variance with pedigree 0.1388, pedigree (2,5,2,1,4)
  (same comment as for Magnesium)
- Nickel [air, urban air close to ground]: 3.20826e-7 kg; lognormal variance with pedigree 0.7388, pedigree (2,5,2,1,4)
  (same comment as for Magnesium)
- Mercury [air, urban air close to ground]: 8.34964e-10 kg; lognormal variance with pedigree 0.7388, pedigree (2,5,2,1,4)
  (same comment as for Magnesium)
- Phenol, pentachloro- [air, urban air close to ground]: 1.62665e-11 kg; lognormal variance with pedigree 0.1388, pedigree (2,5,2,1,4)
  (same comment as for Magnesium)
- Copper [air, urban air close to ground]: 1.71271e-7 kg; lognormal variance with pedigree 0.7388, pedigree (2,5,2,1,4)
  (same comment as for Magnesium)
- Arsenic [air, urban air close to ground]: 1.02003e-8 kg; lognormal variance with pedigree 0.1388, pedigree (2,5,2,1,4)
  (same comment as for Magnesium)
- Propionic acid [air, urban air close to ground]: 3.62645e-8 kg; lognormal variance with pedigree 0.1388, pedigree (2,5,2,1,4)
  (same comment as for Magnesium)
- Molybdenum [air, urban air close to ground]: 5.04127e-9 kg; lognormal variance with pedigree 0.7388, pedigree (2,5,2,1,4)
  (same comment as for Magnesium)
- Nitrogen oxides [air, urban air close to ground]: 0.00280184 kg; lognormal variance with pedigree 0.0401, pedigree (1,2,1,1,1)
  Key emission provided by industry (EPIS) 2017
- Cadmium [air, urban air close to ground]: 1.40575e-9 kg; lognormal variance with pedigree 0.7388, pedigree (2,5,2,1,4)
  (same comment as for Magnesium)
- Hydrogen sulfide [air, urban air close to ground]: 9.32269e-5 kg; lognormal variance with pedigree 0.0401, pedigree (1,2,1,1,1)
  Key emission provided by industry (EPIS) 2017. Hydrogen sulfide is expressing the total of theTRS (Total Reduced Sulphur Compounds), namely H2S, CS2, COS, C2H6S, CH4S, C2H6S2,
- NMVOC, non-methane volatile organic compounds, unspecified origin [air, urban air close to ground]: 2.10863e-5 kg; lognormal variance with pedigree 0.1388, pedigree (2,5,2,1,4)
  (same comment as for Magnesium)
- Particulates, > 10 um [air, urban air close to ground]: 1.51238e-6 kg; lognormal variance with pedigree 0.0507, pedigree (1,3,1,3,1)
  Estimation based on fuel input data and emission factors from corresponding ecoinvent fuel combustion datasets (see "Extrapolations" comment). Apart from external fuel inputs, internal fuels such as bark, black liquor, sludge, tall oil pitch, wood pellets are generated during the process and supply considerable amounts of process energy. Emissions from some internal biofuels (bark, wood pellets) are approximated with the combustion of wood chips. black liquor, sludge and tall oil pitch were not included in the emissions calculations because no specific emission profiles, e.g. for the black liquor recovery process, were available. Emissions from these internal energy generation processes are therefore only reflected in the key emission factors provided by the industry, other emissions constitute a data gap. Biogas and methanol are approximated with the combustion of natural gas, whereby CO2, CO and CH4 emissions stemming from biogas were modeled as non-fossil.
  Uncertainty: average from CER of European producers
- Ethanol [air, urban air close to ground]: 1.89047e-7 kg; lognormal variance with pedigree 0.1388, pedigree (2,5,2,1,4)
  (same comment as for Magnesium)
- Hydrocarbons, aromatic [air, urban air close to ground]: 9.95384e-8 kg; lognormal variance with pedigree 0.1388, pedigree (2,5,2,1,4)
  (same comment as for Magnesium)
- Zinc [air, urban air close to ground]: 7.54132e-7 kg; lognormal variance with pedigree 0.7388, pedigree (2,5,2,1,4)
  (same comment as for Magnesium)
- Dinitrogen monoxide [air, urban air close to ground]: 5.80629e-6 kg; lognormal variance with pedigree 0.1388, pedigree (2,5,2,1,4)
  (same comment as for Magnesium)
- Benzo(a)pyrene [air, urban air close to ground]: 1.04457e-9 kg; lognormal variance with pedigree 0.1388, pedigree (2,5,2,1,4)
  (same comment as for Magnesium)
- Butane [air, urban air close to ground]: 1.32191e-6 kg; lognormal variance with pedigree 0.3988, pedigree (2,5,2,1,4)
  (same comment as for Magnesium)
- Carbon monoxide, non-fossil [air, urban air close to ground]: 0.00178729 kg; lognormal variance with pedigree 0.6501, pedigree (1,2,1,1,1)
  Key emission provided by industry (EPIS) 2017
- Benzene, hexachloro- [air, urban air close to ground]: 1.44591e-14 kg; lognormal variance with pedigree 0.1388, pedigree (2,5,2,1,4)
  (same comment as for Magnesium)
- m-Xylene [air, urban air close to ground]: 2.40986e-7 kg; lognormal variance with pedigree 0.1388, pedigree (2,5,2,1,4)
  (same comment as for Magnesium)
- Methane, non-fossil [air, urban air close to ground]: 9.32732e-6 kg; lognormal variance with pedigree 0.1388, pedigree (2,5,2,1,4)
  (same comment as for Magnesium)
- AOX, Adsorbable Organic Halogen as Cl [water, surface water]: 0.000150602 kg; lognormal variance with pedigree 0.0401, pedigree (1,2,1,1,1)
  Data provided by industry (EPIS) 2017
- Phosphorus [air, urban air close to ground]: 6.02465e-7 kg; lognormal variance with pedigree 0.1388, pedigree (2,5,2,1,4)
  (same comment as for Magnesium)
- Carbon dioxide, non-fossil [air, urban air close to ground]: 4.23178 kg; lognormal variance with pedigree 0.0007, pedigree (1,2,1,1,1)
  Key emission provided by industry (EPIS) 2017
- Formaldehyde [air, urban air close to ground]: 8.764e-7 kg; lognormal variance with pedigree 0.1388, pedigree (2,5,2,1,4)
  (same comment as for Magnesium)
- Benzene [air, urban air close to ground]: 2.55528e-6 kg; lognormal variance with pedigree 0.1388, pedigree (2,5,2,1,4)
  (same comment as for Magnesium)
- Carbon monoxide, fossil [air, urban air close to ground]: 8.58265e-6 kg; lognormal variance with pedigree 0.7388, pedigree (2,5,2,1,4)
  (same comment as for Magnesium)
- Manganese [air, urban air close to ground]: 3.41397e-7 kg; lognormal variance with pedigree 0.7388, pedigree (2,5,2,1,4)
  (same comment as for Magnesium)
- Ammonia [air, urban air close to ground]: 3.50559e-6 kg; lognormal variance with pedigree 0.1388, pedigree (2,5,2,1,4)
  (same comment as for Magnesium)
- Lead [air, urban air close to ground]: 1.41578e-7 kg; lognormal variance with pedigree 0.7388, pedigree (2,5,2,1,4)
  (same comment as for Magnesium)
- Acetaldehyde [air, urban air close to ground]: 2.18838e-7 kg; lognormal variance with pedigree 0.1388, pedigree (2,5,2,1,4)
  (same comment as for Magnesium)
- Calcium [air, urban air close to ground]: 1.18174e-5 kg; lognormal variance with pedigree 0.3988, pedigree (2,5,2,1,4)
  (same comment as for Magnesium)
- Hydrocarbons, aliphatic, alkanes, unspecified [air, urban air close to ground]: 2.2858e-6 kg; lognormal variance with pedigree 0.1388, pedigree (2,5,2,1,4)
  (same comment as for Magnesium)
- Iron [air, urban air close to ground]: 5.1673e-7 kg; lognormal variance with pedigree 0.7388, pedigree (2,5,2,1,4)
  (same comment as for Magnesium)
- Toluene [air, urban air close to ground]: 3.24961e-6 kg; lognormal variance with pedigree 0.1388, pedigree (2,5,2,1,4)
  (same comment as for Magnesium)
- Potassium [air, urban air close to ground]: 4.69923e-5 kg; lognormal variance with pedigree 0.7388, pedigree (2,5,2,1,4)
  (same comment as for Magnesium)
- Dioxins, measured as 2,3,7,8-tetrachlorodibenzo-p-dioxin [air, urban air close to ground]: 6.26679e-14 kg; lognormal variance with pedigree 0.1388, pedigree (2,5,2,1,4)
  (same comment as for Magnesium)
- Chromium VI [air, urban air close to ground]: 1.11837e-10 kg; lognormal variance with pedigree 0.7388, pedigree (2,5,2,1,4)
  (same comment as for Magnesium)
- Hydrogen fluoride [air, urban air close to ground]: 3.17519e-8 kg; lognormal variance with pedigree 0.1388, pedigree (2,5,2,1,4)
  (same comment as for Magnesium)
- Vanadium [air, urban air close to ground]: 6.30158e-7 kg; lognormal variance with pedigree 0.7388, pedigree (2,5,2,1,4)
  (same comment as for Magnesium)
- Fluorine [air, urban air close to ground]: 1.00411e-7 kg; lognormal variance with pedigree 0.1388, pedigree (2,5,2,1,4)
  (same comment as for Magnesium)
- Hydrocarbons, aliphatic, unsaturated [air, urban air close to ground]: 6.24438e-6 kg; lognormal variance with pedigree 0.1388, pedigree (2,5,2,1,4)
  (same comment as for Magnesium)
- Sodium [air, urban air close to ground]: 3.0833e-6 kg; lognormal variance with pedigree 0.7388, pedigree (2,5,2,1,4)
  (same comment as for Magnesium)
- Propane [air, urban air close to ground]: 3.84909e-7 kg; lognormal variance with pedigree 0.1388, pedigree (2,5,2,1,4)
  (same comment as for Magnesium)
- Carbon dioxide, fossil [air, urban air close to ground]: 0.134244 kg; lognormal variance with pedigree 0.0007, pedigree (1,2,1,1,1)
  Key emission provided by industry (EPIS) 2017
- Pentane [air, urban air close to ground]: 2.21098e-6 kg; lognormal variance with pedigree 0.1388, pedigree (2,5,2,1,4)
  (same comment as for Magnesium)
- Sulfur dioxide [air, urban air close to ground]: 0.000596719 kg; lognormal variance with pedigree 0.0007, pedigree (1,2,1,1,1)
  Key emission provided by industry (EPIS) 2017
- Benzene, ethyl- [air, urban air close to ground]: 2.61924e-6 kg; lognormal variance with pedigree 0.1388, pedigree (2,5,2,1,4)
  (same comment as for Magnesium)
- Hydrogen chloride [air, urban air close to ground]: 9.2314e-7 kg; lognormal variance with pedigree 0.1388, pedigree (2,5,2,1,4)
  (same comment as for Magnesium)
- Cobalt [air, urban air close to ground]: 2.07952e-8 kg; lognormal variance with pedigree 0.7388, pedigree (2,5,2,1,4)
  (same comment as for Magnesium)
- Acetic acid [air, urban air close to ground]: 6.50079e-7 kg; lognormal variance with pedigree 0.1388, pedigree (2,5,2,1,4)
  (same comment as for Magnesium)
- Chlorine [air, urban air close to ground]: 3.61479e-7 kg; lognormal variance with pedigree 0.3988, pedigree (2,5,2,1,4)
  (same comment as for Magnesium)
- Methane, fossil [air, urban air close to ground]: 5.39375e-6 kg; lognormal variance with pedigree 0.1388, pedigree (2,5,2,1,4)
  (same comment as for Magnesium)
- Chromium [air, urban air close to ground]: 1.10718e-8 kg; lognormal variance with pedigree 0.7388, pedigree (2,5,2,1,4)
  (same comment as for Magnesium)
- Bromine [air, urban air close to ground]: 1.20493e-7 kg; lognormal variance with pedigree 0.1388, pedigree (2,5,2,1,4)
  (same comment as for Magnesium)
- Selenium [air, urban air close to ground]: 7.5619e-9 kg; lognormal variance with pedigree 0.7388, pedigree (2,5,2,1,4)
  (same comment as for Magnesium)
- PAH, polycyclic aromatic hydrocarbons [air, urban air close to ground]: 4.08859e-8 kg; lognormal variance with pedigree 0.1388, pedigree (2,5,2,1,4)
  (same comment as for Magnesium)
- Propylene oxide [air, urban air close to ground]: 4.80637e-6 kg; lognormal variance with pedigree 0.0172, pedigree (4,3,4,1,1)
  Calculated, stochiometric value: Emissions from the use of ink solvent. Average of three companies calculated from the mass balance of product use and recovery for recycling/disposal. Portion of Methoxypropanol derived from product specifications and related emissions expressed by the portion of methanol and propylene oxide used for the production of Methoxypropanol.
- Heptane [air, urban air close to ground]: 2.50354e-5 kg; lognormal variance with pedigree 0.0112, pedigree (3,3,4,1,1)
  Calculated value: Emissions from the use of solvent Naphtha, white spirit and other petrol based derivates. Average of three companies calculated from the mass balance of product use and recovery for recycling. Heptane used for the portion of aliphatic hydrocarbons C7-C12 given in product specifications.
- Xylene [air, urban air close to ground]: 2.26058e-6 kg; lognormal variance with pedigree 0.0126, pedigree (3,4,4,1,1)
  Calculated value: Emissions from the use of solvent Naphtha, white spirit and other petrol based derivates. Average of three companies calculated from the mass balance of product use and recovery for recycling/disposal. Toluene and Xylene assumed main components of cyclic hydrocarbons, related content of cylcic hydrocarbons from product specifications expressed by 50% Xylene and 50% Toluene.
- 2-Propanol [air, urban air close to ground]: 5.75708e-5 kg; lognormal variance with pedigree 0.1306, pedigree (3,3,4,1,1)
  Calculated value: average from three companies calculated from the mass balance of solvent consumption and solvent recovery for recycling.
- Barium-140 [air, non-urban air or from high stacks]: 1.14648e-9 kBq; lognormal variance with pedigree 0.4706, pedigree (2,5,5,5,5)
  Estimated value. Value extrapolated from a different PWR technology.
- Antimony-124 [air, non-urban air or from high stacks]: 1.71791e-9 kBq; lognormal variance with pedigree 0.4706, pedigree (2,5,5,5,5)
  Estimated value. Value extrapolated from a different PWR technology.
- Iodine-131 [air, non-urban air or from high stacks]: 1.30746e-6 kBq; lognormal variance with pedigree 0.0059, pedigree (2,4,3,3,2)
  Estimated value. Measured/calculated value for Quebec is extrapolated for GLO.
- Tellurium-132 [water, surface water]: 3.04522e-7 kBq; lognormal variance with pedigree 0.4706, pedigree (2,5,5,5,5)
  Estimated value. Value extrapolated from a different PWR technology.
- Chromium-51 [water, surface water]: 2.73419e-5 kBq; lognormal variance with pedigree 0.4706, pedigree (2,5,5,5,5)
  Estimated value. Value extrapolated from a different PWR technology.
- Cesium-134 [water, surface water]: 0.000531032 kBq; lognormal variance with pedigree 0.0059, pedigree (2,4,3,3,2)
  Estimated value. Measured/calculated value for Quebec is extrapolated for GLO.
- Niobium-95 [water, surface water]: 1.11031e-5 kBq; lognormal variance with pedigree 0.4706, pedigree (2,5,5,5,5)
  Estimated value. Value extrapolated from a different PWR technology.
- Antimony-124 [water, surface water]: 0.0929305 kBq; lognormal variance with pedigree 0.3053, pedigree (2,4,3,3,2)
  Estimated value. Measured/calculated value for Quebec is extrapolated for GLO.
- Cobalt-60 [air, non-urban air or from high stacks]: 2.7378e-7 kBq; lognormal variance with pedigree 0.4706, pedigree (2,5,5,5,5)
  Estimated value. Value extrapolated from a different PWR technology.
- Iodine-131 [water, surface water]: 0.0181033 kBq; lognormal variance with pedigree 0.0059, pedigree (2,4,3,3,2)
  Estimated value. Measured/calculated value for Quebec is extrapolated for GLO.
- Noble gases, radioactive, unspecified [air, non-urban air or from high stacks]: 0.936712 kBq; lognormal variance with pedigree 0.4706, pedigree (2,5,5,5,5)
  Estimated value. Value extrapolated from a different PWR technology.
- Water [air, non-urban air or from high stacks]: 0.133361 m3; lognormal variance with pedigree 0.0073, pedigree (3,4,3,3,2)
  Estimated value. Estimation based on input of water. It is assumed that 20% of cooling water is evaporated and 80% is rejected to the river
- Technetium-99m [water, surface water]: 1.01628e-5 kBq; lognormal variance with pedigree 0.4706, pedigree (2,5,5,5,5)
  Estimated value. Value extrapolated from a different PWR technology.
- Hydrocarbons, unspecified [water, surface water]: 4.46549e-6 kg; lognormal variance with pedigree 0.0059, pedigree (2,4,3,3,2)
  Estimated value. Measured/calculated value for Quebec is extrapolated for GLO.
- Xenon-133 [air, non-urban air or from high stacks]: 2.18445 kBq; lognormal variance with pedigree 0.4706, pedigree (2,5,5,5,5)
  Estimated value. Value extrapolated from a different PWR technology.
- Zirconium-95 [air, non-urban air or from high stacks]: 2.09042e-7 kBq; lognormal variance with pedigree 0.4706, pedigree (2,5,5,5,5)
  Estimated value. Value extrapolated from a different PWR technology.
- Antimony-122 [water, surface water]: 3.26945e-6 kBq; lognormal variance with pedigree 0.4706, pedigree (2,5,5,5,5)
  Estimated value. Value extrapolated from a different PWR technology.
- Molybdenum-99 [water, surface water]: 2.16999e-8 kBq; lognormal variance with pedigree 0.3433, pedigree (2,2,5,5,2)
  Estimated value. Value extrapolated from a different PWR technology.
- Cobalt-58 [air, non-urban air or from high stacks]: 5.9313e-8 kBq; lognormal variance with pedigree 0.4706, pedigree (2,5,5,5,5)
  Estimated value. Value extrapolated from a different PWR technology.
- Iodine-133 [air, non-urban air or from high stacks]: 6.5823e-6 kBq; lognormal variance with pedigree 0.4706, pedigree (2,5,5,5,5)
  Estimated value. Value extrapolated from a different PWR technology.
- Radioactive species, other beta emitters [air, non-urban air or from high stacks]: 3.13563e-7 kBq; lognormal variance with pedigree 0.4706, pedigree (2,5,5,5,5)
  Estimated value. Value extrapolated from a different PWR technology.
- Carbon-14 [water, surface water]: 0.0103591 kBq; lognormal variance with pedigree 0.0059, pedigree (2,4,3,3,2)
  Estimated value. Measured/calculated value for Quebec is extrapolated for GLO.
- Ruthenium-103 [water, surface water]: 1.03074e-6 kBq; lognormal variance with pedigree 0.4706, pedigree (2,5,5,5,5)
  Estimated value. Value extrapolated from a different PWR technology.
- Krypton-85m [air, non-urban air or from high stacks]: 0.0356963 kBq; lognormal variance with pedigree 0.4706, pedigree (2,5,5,5,5)
  Estimated value. Value extrapolated from a different PWR technology.
- Zinc-65 [water, surface water]: 0.00663789 kBq; lognormal variance with pedigree 0.0059, pedigree (2,4,3,3,2)
  Estimated value. Measured/calculated value for Quebec is extrapolated for GLO.
- Radioactive species, alpha emitters [water, surface water]: 1.09223e-7 kBq; lognormal variance with pedigree 0.4706, pedigree (2,5,5,5,5)
  Estimated value. Value extrapolated from a different PWR technology.
- Tellurium-123m [water, surface water]: 5.67814e-6 kBq; lognormal variance with pedigree 0.4706, pedigree (2,5,5,5,5)
  Estimated value. Value extrapolated from a different PWR technology.
- Carbon-14 [air, non-urban air or from high stacks]: 8.89076e-5 kBq; lognormal variance with pedigree 0.3053, pedigree (2,4,3,3,2)
  Estimated value. Measured/calculated value for Quebec is extrapolated for GLO.
- Cobalt-58 [water, surface water]: 0.00412298 kBq; lognormal variance with pedigree 0.4706, pedigree (2,5,5,5,5)
  Estimated value. Value extrapolated from a different PWR technology.
- Cerium-141 [water, surface water]: 6.3653e-7 kBq; lognormal variance with pedigree 0.4706, pedigree (2,5,5,5,5)
  Estimated value. Value extrapolated from a different PWR technology.
- Cesium-136 [water, surface water]: 1.01628e-6 kBq; lognormal variance with pedigree 0.4706, pedigree (2,5,5,5,5)
  Estimated value. Value extrapolated from a different PWR technology.
- Silver-110 [water, surface water]: 1.60217e-5 kBq; lognormal variance with pedigree 0.4706, pedigree (2,5,5,5,5)
  Estimated value. Value extrapolated from a different PWR technology.
- Xenon-135 [air, non-urban air or from high stacks]: 0.600363 kBq; lognormal variance with pedigree 0.4706, pedigree (2,5,5,5,5)
  Estimated value. Value extrapolated from a different PWR technology.
- Zirconium-95 [water, surface water]: 0.0422411 kBq; lognormal variance with pedigree 0.3053, pedigree (2,4,3,3,2)
  Estimated value. Measured/calculated value for Quebec is extrapolated for GLO.
- Manganese-54 [water, surface water]: 4.73781e-5 kBq; lognormal variance with pedigree 0.4706, pedigree (2,5,5,5,5)
  Estimated value. Value extrapolated from a different PWR technology.
- Sodium-24 [water, surface water]: 3.60941e-5 kBq; lognormal variance with pedigree 0.4706, pedigree (2,5,5,5,5)
  Estimated value. Value extrapolated from a different PWR technology.
- Niobium-95 [air, non-urban air or from high stacks]: 0.103591 kBq; lognormal variance with pedigree 0.0059, pedigree (2,4,3,3,2)
  Estimated value. Measured/calculated value for Quebec is extrapolated for GLO.
- Cerium-144 [water, surface water]: 1.74322e-6 kBq; lognormal variance with pedigree 0.4706, pedigree (2,5,5,5,5)
  Estimated value. Value extrapolated from a different PWR technology.
- Cesium-137 [air, non-urban air or from high stacks]: 2.63292e-8 kBq; lognormal variance with pedigree 0.4706, pedigree (2,5,5,5,5)
  Estimated value. Value extrapolated from a different PWR technology.
- Aerosols, radioactive, unspecified [air, non-urban air or from high stacks]: 4.83762e-6 kBq; lognormal variance with pedigree 0.0059, pedigree (2,4,3,3,2)
  Estimated value. Measured/calculated value for Quebec is extrapolated for GLO.
- Antimony-125 [air, non-urban air or from high stacks]: 8.46295e-8 kBq; lognormal variance with pedigree 0.4706, pedigree (2,5,5,5,5)
  Estimated value. Value extrapolated from a different PWR technology.
- Cobalt-60 [water, surface water]: 0.00253447 kBq; lognormal variance with pedigree 0.0059, pedigree (2,4,3,3,2)
  Estimated value. Measured/calculated value for Quebec is extrapolated for GLO.
- Strontium-90 [water, surface water]: 4.70164e-6 kBq; lognormal variance with pedigree 0.4706, pedigree (2,5,5,5,5)
  Estimated value. Value extrapolated from a different PWR technology.
- Silver-110 [air, non-urban air or from high stacks]: 1.13201e-8 kBq; lognormal variance with pedigree 0.4706, pedigree (2,5,5,5,5)
  Estimated value. Value extrapolated from a different PWR technology.
- Iodine-133 [water, surface water]: 1.50453e-6 kBq; lognormal variance with pedigree 0.4706, pedigree (2,5,5,5,5)
  Estimated value. Value extrapolated from a different PWR technology.
- Cesium-137 [water, surface water]: 0.000748272 kBq; lognormal variance with pedigree 0.0059, pedigree (2,4,3,3,2)
  Estimated value. Measured/calculated value for Quebec is extrapolated for GLO.
- Cobalt-57 [water, surface water]: 3.22605e-5 kBq; lognormal variance with pedigree 0.4706, pedigree (2,5,5,5,5)
  Estimated value. Value extrapolated from a different PWR technology.
- Antimony-125 [water, surface water]: 0.000150814 kBq; lognormal variance with pedigree 0.4706, pedigree (2,5,5,5,5)
  Estimated value. Value extrapolated from a different PWR technology.
- Iron-59 [water, surface water]: 0.0844823 kBq; lognormal variance with pedigree 0.0059, pedigree (2,4,3,3,2)
  Estimated value. Measured/calculated value for Quebec is extrapolated for GLO.
- Strontium-89 [water, surface water]: 1.32008e-5 kBq; lognormal variance with pedigree 0.4706, pedigree (2,5,5,5,5)
  Estimated value. Value extrapolated from a different PWR technology.
- Lanthanum-140 [water, surface water]: 1.79024e-6 kBq; lognormal variance with pedigree 0.4706, pedigree (2,5,5,5,5)
  Estimated value. Value extrapolated from a different PWR technology.
- Hydrogen-3, Tritium [water, surface water]: 482.756 kBq; lognormal variance with pedigree 0.0059, pedigree (2,4,3,3,2)
  Estimated value. Measured/calculated value for Quebec is extrapolated for GLO.
- Molybdenum [air, unspecified]: 8.0831e-11 kg; lognormal variance with pedigree 0.6526, pedigree (1,3,3,1,1)
  Amount based on primary data collected from participating companies.
- Hydrocarbons, unspecified [air, non-urban air or from high stacks]: 7.99253e-7 kg; lognormal variance with pedigree 0.0426, pedigree (1,3,3,1,1)
  Amount based on primary data collected from participating companies.
- Iron, ion [water, ocean]: 1.45427e-7 kg; lognormal variance with pedigree 0.6526, pedigree (1,3,3,1,1)
  Amount based on primary data collected from participating companies.
- Thallium [water, ocean]: 8.69775e-9 kg; lognormal variance with pedigree 0.6526, pedigree (1,3,3,1,1)
  Amount based on primary data collected from participating companies.
- Sulfur [soil, industrial]: 0.00500909 kg; lognormal variance with pedigree 0.0426, pedigree (1,3,3,1,1)
  Amount based on primary data collected from participating companies.
- Cyanide [water, ocean]: 8.39707e-10 kg; lognormal variance with pedigree 0.0426, pedigree (1,3,3,1,1)
  Amount based on primary data collected from participating companies.
- Sulfuric acid [air, unspecified]: 9.39115e-6 kg; lognormal variance with pedigree 0.0426, pedigree (1,3,3,1,1)
  Amount based on primary data collected from participating companies.
- Chlorine [air, unspecified]: 2.55922e-8 kg; lognormal variance with pedigree 0.0426, pedigree (1,3,3,1,1)
  Amount based on primary data collected from participating companies.
- Phenol [water, surface water]: 6.41588e-10 kg; lognormal variance with pedigree 0.0426, pedigree (1,3,3,1,1)
  Amount based on primary data collected from participating companies.
- Cobalt [water, surface water]: 7.26594e-11 kg; lognormal variance with pedigree 0.6526, pedigree (1,3,3,1,1)
  Amount based on primary data collected from participating companies.
- Nitrogen [water, ocean]: 3.6701e-6 kg; lognormal variance with pedigree 0.0426, pedigree (1,3,3,1,1)
  Amount based on primary data collected from participating companies.
- Ammonium, ion [water, ocean]: 1.51571e-6 kg; lognormal variance with pedigree 0.0426, pedigree (1,3,3,1,1)
  Amount based on primary data collected from participating companies.
- Nitrate [water, ocean]: 1.88934e-7 kg; lognormal variance with pedigree 0.0426, pedigree (1,3,3,1,1)
  Amount based on primary data collected from participating companies.
- Nitrogen dioxide [water, surface water]: 1.06931e-8 kg; lognormal variance with pedigree 0.0426, pedigree (1,3,3,1,1)
  Amount based on primary data collected from participating companies.
- Acidity, unspecified [water, surface water]: 1.05358e-7 kg; lognormal variance with pedigree 0.0426, pedigree (1,3,3,1,1)
  Amount based on primary data collected from participating companies.
- Sulfuric acid [water, surface water]: 0.000299593 kg; lognormal variance with pedigree 0.0426, pedigree (1,3,3,1,1)
  Amount based on primary data collected from participating companies.

## Sampling procedure
Literature and 'ecological building material declaration' (a sort of environmental report)

## Extrapolations
See geography

## Review by Roberto Dones 2004-04-14
passed

## Review by Roland Hischier 2011-09-22
Transfer of documentation done.
