# wheat production, Swiss integrated production, extensive

Dataset: EcoSpold 2, unit process
Geography: CH
Time period: 1996-01-01 to 2019-12-31
Technology level: current
Classification: ISIC rev.4 ecoinvent: 0111:Growing of cereals (except rice), leguminous crops and oil seeds
Synonyms: Triticum aestivum L.
Tags: ConvertedDataset
Scenario: Business-as-Usual
System model: Allocation at the point of substitution
Share of production covered: 86 %
Generated by: Thomas Nemecek
Published in: Nemecek, T. 2007
Database: ecoinvent
isCopyrightProtected: true
accessRestrictedTo: 1

## General comment
This dataset represents the cultivation of wheat on an area of 1 ha producing the co-products wheat grain and straw. The yield of wheat grain is 5305 kg/ha at a moisture content at storage of 15%, the yield of straw is 3232 kg/ha at a moisture content of 15%.
[This dataset was already contained in the ecoinvent database version 2. It was not individually updated during the transfer to ecoinvent version 3. Life Cycle Impact Assessment results may still have changed, as they are affected by changes in the supply chain, i.e. in other datasets. This dataset was generated following the ecoinvent quality guidelines for version 2. It may have been subject to central changes described in the ecoinvent version 3 change report (http://www.ecoinvent.org/database/ecoinvent-version-3/reports-of-changes/), and the results of the central updates were reviewed extensively. The changes added e.g. consistent water flows and other information throughout the database. The documentation of this dataset can be found in the ecoinvent reports of version 2, which are still available via the ecoinvent website. The change report linked above covers all central changes that were made during the conversion process.]

## Included activities start
This activity starts after the harvest of the previous crop. The inputs of seeds, mineral fertilisers and pesticides are considered. Farm manure as an organic fertiliser is only accounted for in terms of direct field emissions; all pre-processes are included in the animal production systems.

## Included activities end
The dataset includes all machine operations and corresponding machine infrastructure and sheds. Machine operations are: soil cultivation, sowing, fertilisation, weed control, pest and pathogen control, combine-harvest, transport from field to regional processing centre (10 km) and drying of grains. Further, direct field emissions are included. This activity ends after drying of grains at the regional processing centre.

## Geography
Refers to an average production in the Swiss lowlands.

## Technology
Integrated production with extensive plant protection (no fungicides, insecticides and growth regulators)

## Time period
The yield data have been collected for the years 1996-2003.

## Parameters
- fraction, irrigation water, to ground water: 0.8; name fraction_IW_to_ground_water; lognormal variance with pedigree 0.0886, pedigree (4,3,1,1,4)
  Literature value (Döll, 2011) cross referenced with expert opinion.
- fraction, irrigation water, to air: 0.3353; name fraction_IW_to_air; lognormal variance with pedigree 0.0409, pedigree (2,2,2,1,1)
  Literature value (Siebert, 2010) (Vionnet, S., Quantis Water Database - Technical Report, 2012).
- fraction, irrigation water to surface water: 0.2; name fraction_IW_to_surface_water; lognormal variance with pedigree 0.0886, pedigree (4,3,1,1,4)
  Literature value (Döll, 2011) cross referenced with expert opinion.

## Reference product
- wheat grain, Swiss integrated production: 1 kg; name REF_PRODUCT; By-product classification allocatable product; CPC 01112: Wheat, other
  production volume 1.91026e8 kg
    CH prod of wheat: 528000t in 2004. % refers to fract of tot area in lowlands
    Area with wheat in 2004 85735 ha ; 42% extensive ; 5305 kg/ha
  property carbon content, non-fossil 0.464601; name REF_PRODUCT_C_content_non_fossil
    biogene carbon content on a dry matter basis
    Composition data obtained from Wheat, soft red winter, in (http://www.nal.usda.gov/fnic/foodcomp/search/). First, composition data were refered to 1 kg dry mass. Then, C-contents were calculated considering a C-content/dry mass of 46% in carbohydrates (including fibres), 53% in proteins and 75% in fats. All data from 'Evolutionary and Biochemical Aspects', A.D. Kay and T. Vrede (in Global Ecology, 2010, Elsevier B.V., S.E. Jørgensen Ed.).
  property dry mass 0.85 kg; name REF_PRODUCT_DM
  property carbon content, fossil 0; name REF_PRODUCT_C_content_fossil
    fossil carbon content on a dry matter basis
  property wet mass 1 kg; name REF_PRODUCT_WM
  property water content 0.176471; name REF_PRODUCT_water_content; = (1-REF_PRODUCT_DM)/REF_PRODUCT_DM
  property energy content 15.3935 MJ; name REF_PRODUCT_energy_content
    See chapter 'Product Properties' in '01_crop production - yields & inputs CH & Europe_v1.0.pdf', section 'AGRICULTURAL PRODUCTION IN SWITZERLAND' - pdf-document on the dedicated talk page of ecoinvent (www.ecoinvent.org/documentation)
  property water in wet mass 0.15 kg; name REF_PRODUCT_WWM; = 1-REF_PRODUCT_DM
  property price 0.131 EUR2005; name REF_PRODUCT_price_EUR2005
    Temporary price data. Calculated as 90% of purchasers price based on: 2004 prices for World import/export data (tonnes and US$) from FaoStat statistics (http://faostat.fao.org/site/535/default.aspx#ancor, TRADE)- [Accessed 24 May 2010].
  property carbon content 0.464601
    carbon content on a dry matter basis (reserved; not for manual entry)
  property true value 694.889; name REF_PRODUCT_true_value
    allocation property applied in "true value" allocation // value calculated from revenue
  properties: carbon allocation 0.394911 kg

## By-products
- straw: 0 kg; name BY_PRODUCT; CPC 01913: Cereal straw, husks, unprepared, ground, pressed, or in the form of pellets; By-product classification allocatable product
  production volume 1.1638e8 kg
    CH prod of wheat: 528000t in 2004. % refers to fract of tot area in lowlands
    Area with wheat in 2004 85735 ha ; 42% extensive ; 3232 kg/ha
  property water content 0.176471; name BY_PRODUCT_water_content; = (1-REF_PRODUCT_DM)/REF_PRODUCT_DM
  property dry mass 0.85 kg; name BY_PRODUCT_DM
  property energy content 17.459 MJ; name BY_PRODUCT_energy_content
    (same comment as for wheat grain, Swiss integrated production)
  property wet mass 1 kg; name BY_PRODUCT_WM
  property carbon content, non-fossil 0.437377; name BY_PRODUCT_C_content_non_fossil
    biogene carbon content on a dry matter basis
    Composition data obtained as the average of those of Rye straw (http://beefmagazine.com/images/2009%20feed%20table.pdf), and Barley straw and Wheat straw (http://www.uwex.edu/ces/crops/uwforage/StrawFOF.pdf). First, composition data were refered to 1 kg dry mass. Then, C-contents were calculated considering a C-content/dry mass of 46% in carbohydrates (including fibres), 53% in proteins and 75% in fats. All data from 'Evolutionary and Biochemical Aspects', A.D. Kay and T. Vrede (in Global Ecology, 2010, Elsevier B.V., S.E. Jørgensen Ed.).
  property water in wet mass 0.15 kg; name BY_PRODUCT_WWM; = 1-BY_PRODUCT_DM
  property price 0.012 EUR2005; name BY_PRODUCT_price_EUR2005
    Temporary price data. Calculated as 90% of purchasers price based on: Based on price allocation ratio from EcoInvent v2 report number 17, page 118.
  property carbon content 0.437377
    carbon content on a dry matter basis (reserved; not for manual entry)
  property true value 38.7888; name BY_PRODUCT_true_value
    allocation property applied in "true value" allocation // value calculated from revenue
  properties: carbon content, fossil 0, carbon allocation 0.37177 kg

## Inputs from technosphere
- phosphate fertiliser, as P2O5: 0.00622076 kg; lognormal variance with pedigree 0.0406, pedigree (2,1,5,1,1)
  See chapter 'Yields and Inputs of Arable Crop Production' in '01_crop production - yields & inputs CH & Europe_v1.0.pdf', section 'AGRICULTURAL PRODUCTION IN SWITZERLAND' - pdf-document on the dedicated talk page of ecoinvent (www.ecoinvent.org/documentation)
  See chapter 'Yields and Inputs of Arable Crop Production' in '01_crop production - yields & inputs CH & Europe_v1.0.pdf', section 'AGRICULTURAL PRODUCTION IN SWITZERLAND' - pdf-document on the dedicated talk page of ecoinvent (www.ecoinvent.org/documentation)
  properties: dry mass 1 kg, wet mass 1 kg
- solid manure loading and spreading, by hydraulic loader and spreader: 0.171767 kg; lognormal variance with pedigree 0.0406, pedigree (2,1,5,1,1)
  See chapter 'Yields and Inputs of Arable Crop Production' in '01_crop production - yields & inputs CH & Europe_v1.0.pdf', section 'AGRICULTURAL PRODUCTION IN SWITZERLAND' - pdf-document on the dedicated talk page of ecoinvent (www.ecoinvent.org/documentation)
  This exchange has an activity link directly to the producing activity because the product is primarily consumed in the same geographical area where it is produced.
- tillage, cultivating, chiselling: 0.000178552 ha; lognormal variance with pedigree 0.0406, pedigree (2,1,5,1,1)
  (same comment as for solid manure loading and spreading, by hydraulic loader and spreader)
- tillage, harrowing, by spring tine harrow: 0.000357105 ha; lognormal variance with pedigree 0.0406, pedigree (2,1,5,1,1)
  (same comment as for solid manure loading and spreading, by hydraulic loader and spreader)
- baling: 0.000829661 unit; lognormal variance with pedigree 0.0406, pedigree (2,1,5,1,1)
  (same comment as for solid manure loading and spreading, by hydraulic loader and spreader)
- irrigation: 0.0982329 m3; name water_irrigation_input; source Siebert, S. 2010; lognormal variance with pedigree 0.0427, pedigree (2,2,5,1,1)
  Calculated based on literature values (Döll, 2010) and partially modelled at ETH (Pfister, S.).
  property wet mass 1000 kg; name WM
  property carbon content, fossil 0; name C_content_fossil
  property water content 9089.91; name water_content
  property dry mass 0.11 kg; name DM
  property water in wet mass 999.89 kg; name WWM
  property carbon content, non-fossil 0; name C_content_non_fossil
- combine harvesting: 0.000178552 ha; lognormal variance with pedigree 0.0406, pedigree (2,1,5,1,1)
  (same comment as for solid manure loading and spreading, by hydraulic loader and spreader)
- bale loading: 0.00360729 unit; lognormal variance with pedigree 0.0406, pedigree (2,1,5,1,1)
  (same comment as for solid manure loading and spreading, by hydraulic loader and spreader)
- wheat seed, Swiss integrated production, for sowing: 0.0321394 kg; name SEED; lognormal variance with pedigree 0.0406, pedigree (2,1,5,1,1)
  (same comment as for phosphate fertiliser, as P2O5)
  property energy content 15.3935 MJ; name SEED_energy_content
  property carbon content, non-fossil 0.464601; name SEED_C_content_non_fossil
  property dry mass 0.85 kg; name SEED_DM
  properties: wet mass 1 kg, water content 0.176471
  note on energy content: See chapter 'Product Properties' in '01_crop production - yields & inputs CH & Europe_v1.0.pdf', section 'AGRICULTURAL PRODUCTION IN SWITZERLAND' - pdf-document on the dedicated talk page of ecoinvent (www.ecoinvent.org/documentation)
  note on carbon content, non-fossil: biogene carbon content on a dry matter basis Composition data obtained from Wheat, soft red winter, in (http://www.nal.usda.gov/fnic/foodcomp/search/). First, composition data were refered to 1 kg dry mass. Then, C-contents were calculated considering a C-content/dry mass of 46% in carbohydrates (including fibres), 53% in proteins and 75% in fats. All data from 'Evolutionary and Biochemical Aspects', A.D. Kay and T. Vrede (in Global Ecology, 2010, Elsevier B.V., S.E. Jørgensen Ed.).
- packaging, for fertilisers: 0.0627416 kg; lognormal variance with pedigree 0.0912, pedigree (4,3,5,5,4)
  Total amount of active substance/s of fertilisers needed for the production of 'wheat grain, Swiss integrated production' is calculated to be circa 1.76E+02 kg. Fertiliser/s used in this dataset is/are: 'ammonium nitrate, as N', 'ammonium sulfate, as N', 'nitrogen fertiliser, as N', 'phosphate fertiliser, as P2O5', 'phosphate rock, as P2O5, beneficiated, dry', 'potassium chloride, as K2O', 'potassium sulfate, as K2O', 'urea, as N'. The total amount of active substance/s is doubled in order to account for the packaging of the dilluted product of fertiliser/s that is/are applied. Therefore, 3.51E+02 kg of packaging for fertilisers is justified with this exchange.
  properties: price 0.0642 EUR2005, carbon content, fossil 0.825301, wet mass 1 kg, dry mass 1 kg
  note on carbon content, fossil: Considering a chemical formula (C2H4)n for polyethylene, carbon content-fossil is calculated to be 0.856286 kg of Carbon per kg of dry mass.
- application of plant protection product, by field sprayer: 0.000178552 ha; lognormal variance with pedigree 0.0406, pedigree (2,1,5,1,1)
  (same comment as for solid manure loading and spreading, by hydraulic loader and spreader)
- drying of bread grain, seed and legumes: 0.0112754 l; lognormal variance with pedigree 0.0406, pedigree (2,1,5,1,1)
  (same comment as for solid manure loading and spreading, by hydraulic loader and spreader)
- urea, as N: 0.00353552 kg; lognormal variance with pedigree 0.0406, pedigree (2,1,5,1,1)
  (same comment as for phosphate fertiliser, as P2O5)
  properties: dry mass 1 kg, wet mass 1 kg, carbon content, fossil 0.2
- [sulfonyl]urea-compound: 0.000128558 kg; lognormal variance with pedigree 0.0407, pedigree (2,2,5,1,1)
  (same comment as for phosphate fertiliser, as P2O5)
  properties: dry mass 1 kg, carbon content, fossil 0.540853, wet mass 1 kg
  note on carbon content, fossil: Approximated as an unweighted average of the C-content of the [sulfonyl]urea-compounds (Tab 2.25 Sutter, 2010) chlorotoluron, Diuron, Linuron and Isoproturon.
- phenoxy-compound: 6.24933e-5 kg; lognormal variance with pedigree 0.0407, pedigree (2,2,5,1,1)
  (same comment as for phosphate fertiliser, as P2O5)
  properties: carbon content, fossil 0.532559, wet mass 1 kg, dry mass 1 kg
  note on carbon content, fossil: An unweighted average of the C content in mCPA, mCPB, mecoprop, fluazifop-P-butyl, and 2,4-D. Those substances are classified as phenoxy-compounds in Tab 2.25, Sutter 2010
- potassium sulfate, as K2O: 0.000176572 kg; lognormal variance with pedigree 0.0406, pedigree (2,1,5,1,1)
  (same comment as for phosphate fertiliser, as P2O5)
  properties: dry mass 1 kg, wet mass 1 kg
- ammonium nitrate, as N: 0.0100673 kg; lognormal variance with pedigree 0.0406, pedigree (2,1,5,1,1)
  (same comment as for phosphate fertiliser, as P2O5)
  properties: wet mass 1 kg, dry mass 1 kg
- cyclic N-compound: 3.21394e-6 kg; lognormal variance with pedigree 0.0407, pedigree (2,2,5,1,1)
  (same comment as for phosphate fertiliser, as P2O5)
  properties: dry mass 1 kg, wet mass 1 kg, carbon content, fossil 0.641962
  note on carbon content, fossil: Calculated as an unweigthed average of the C content of the cyclic N-compounds where information was avaliable in Sutter, 2010, following the classification in Tab 2.25 in Sutter 2010: Difenoconazole (C19H17Cl2N3O3), Fenpropidin (C19H31N), Fenpropimorph (C20H33NO), Flusilazole (C16H15F2N3Si), Metconazole (C17H22ClN3O), Penconazole (C13H15Cl2N3), Propiconazole (C15H17Cl2N3O2), Tebuconazole (C16H22ClN3O)
- potassium chloride, as K2O: 0.00269203 kg; lognormal variance with pedigree 0.0406, pedigree (2,1,5,1,1)
  (same comment as for phosphate fertiliser, as P2O5)
  properties: dry mass 1 kg, wet mass 1 kg
- tillage, currying, by weeder: 0.000178552 ha; lognormal variance with pedigree 0.0406, pedigree (2,1,5,1,1)
  (same comment as for solid manure loading and spreading, by hydraulic loader and spreader)
- nitrile-compound: 3.57105e-5 kg; lognormal variance with pedigree 0.0407, pedigree (2,2,5,1,1)
  (same comment as for phosphate fertiliser, as P2O5)
  properties: carbon content, fossil 0.344995, dry mass 1 kg, wet mass 1 kg
  note on carbon content, fossil: An unweighted average of the C content in chlorothalonil, dichlobenil, bromoxynil, ioxynil, substances classified as nitrile-compounds in Tab 2.25, Sutter 2010
- liquid manure spreading, by vacuum tanker: 0.00147216 m3; lognormal variance with pedigree 0.0406, pedigree (2,1,5,1,1)
  (same comment as for solid manure loading and spreading, by hydraulic loader and spreader)
- sowing: 0.000178552 ha; lognormal variance with pedigree 0.0406, pedigree (2,1,5,1,1)
  (same comment as for solid manure loading and spreading, by hydraulic loader and spreader)
- fertilising, by broadcaster: 0.000714209 ha; lognormal variance with pedigree 0.0406, pedigree (2,1,5,1,1)
  (same comment as for solid manure loading and spreading, by hydraulic loader and spreader)
- packaging, for pesticides: 0.000459951 kg; lognormal variance with pedigree 0.0912, pedigree (4,3,5,5,4)
  Total amount of active substance/s of pesticides needed for the production of wheat grain, Swiss integrated production is calculated to be circa 1.29E+00 kg. Pesticide/s used in this dataset is/are: '[sulfonyl]urea-compound', 'cyclic N-compound', 'nitrile-compound', 'phenoxy-compound'. The total amount of active substance/s is doubled in order to account for the packaging of the dilluted product of pesticide/s that is/are applied. Therefore, 2.58E+00 kg of packaging for pesticides is justified with this exchange.
  properties: price 0.0642 EUR2005, dry mass 1 kg, wet mass 1 kg, carbon content, fossil 0.85714
- phosphate rock, as P2O5, beneficiated, dry: 0.00197033 kg; lognormal variance with pedigree 0.0406, pedigree (2,1,5,1,1)
  (same comment as for phosphate fertiliser, as P2O5)
  properties: wet mass 1 kg, dry mass 1 kg
- transport, tractor and trailer, agricultural: 0.00958416 metric ton*km; lognormal variance with pedigree 0.0406, pedigree (2,1,5,1,1)
  (same comment as for phosphate fertiliser, as P2O5)
- ammonium sulfate, as N: 0.000761812 kg; lognormal variance with pedigree 0.0406, pedigree (2,1,5,1,1)
  (same comment as for phosphate fertiliser, as P2O5)
  properties: wet mass 1 kg, dry mass 1 kg
- nitrogen fertiliser, as N: 0.00594647 kg; lognormal variance with pedigree 0.0406, pedigree (2,1,5,1,1)
  (same comment as for phosphate fertiliser, as P2O5)
  properties: wet mass 1 kg, dry mass 1 kg
- tillage, ploughing: 0.000178552 ha; lognormal variance with pedigree 0.0406, pedigree (2,1,5,1,1)
  (same comment as for solid manure loading and spreading, by hydraulic loader and spreader)

## Inputs from nature
- Transformation, from annual crop, non-irrigated, extensive [natural resource, land]: 1.26772 m2; lognormal variance with pedigree 0.0506, pedigree (2,1,5,1,1)
  Modelled, see chapter 'Land use' in '01_crop production_direct field emissions and natural resources_v1.0.pdf' - pdf-document on the dedicated talk page of ecoinvent (www.ecoinvent.org/documentation)
- Transformation, from pasture, man made, intensive [natural resource, land]: 0.517802 m2; lognormal variance with pedigree 0.0506, pedigree (2,1,5,1,1)
  (same comment as for Transformation, from annual crop, non-irrigated, extensive)
- Energy, gross calorific value, in biomass [natural resource, biotic]: 24.1617 MJ; lognormal variance with pedigree 0.0411891, pedigree (2,1,5,1,1)
- Transformation, to annual crop, non-irrigated, extensive [natural resource, land]: 1.78552 m2; lognormal variance with pedigree 0.0506, pedigree (2,1,5,1,1)
  (same comment as for Transformation, from annual crop, non-irrigated, extensive)
- Occupation, annual crop, non-irrigated, extensive [natural resource, land]: 1.41849 m2*year; lognormal variance with pedigree 0.0406, pedigree (2,1,5,1,1)
  (same comment as for Transformation, from annual crop, non-irrigated, extensive)
- Carbon dioxide, in air [natural resource, in air]: 2.11166 kg; = 44/12 * (REF_PRODUCT_C_content_non_fossil * REF_PRODUCT * REF_PRODUCT_DM + BY_PRODUCT_C_content_non_fossil * BY_PRODUCT * BY_PRODUCT_DM - SEED_C_content_non_fossil * SEED * SEED_DM); lognormal variance with pedigree 0.0406, pedigree (2,1,5,1,1)
  Modelled,see chapter 'CO2 binding' in '01_crop production_direct field emissions and natural resources_v1.0.pdf' - pdf-document on the dedicated talk page of ecoinvent (www.ecoinvent.org/documentation)

## Emissions to nature
- Phosphate [water, surface water]: 0.000140903 kg; lognormal variance with pedigree 0.0807, pedigree (2,2,5,1,1)
  Modelled, see chapter 'Emissions of phosphorous to the water' in '01_crop production_direct field emissions and natural resources_v1.0.pdf' - pdf-document on the dedicated talk page of ecoinvent (www.ecoinvent.org/documentation)
- Nickel [soil, agricultural]: 1.16834e-6 kg; lognormal variance with pedigree 0.0807, pedigree (2,2,5,1,1)
  Modelled, see chapter 'Emissions of heavy metals to agricultural soil, surface water and ground water' in '01_crop production_direct field emissions and natural resources_v1.0.pdf' - pdf-document on the dedicated talk page of ecoinvent (www.ecoinvent.org/documentation)
- Phosphate [water, ground-]: 3.94047e-5 kg; lognormal variance with pedigree 0.0807, pedigree (2,2,5,1,1)
  (same comment as for Phosphate)
- Cadmium [soil, agricultural]: 5.07696e-7 kg; lognormal variance with pedigree 0.0807, pedigree (2,2,5,1,1)
  (same comment as for Nickel)
- Lead [water, surface water]: 8.69925e-8 kg; lognormal variance with pedigree 0.1307, pedigree (2,2,5,1,1)
  (same comment as for Nickel)
- Copper [soil, agricultural]: -2.75846e-7 kg
  (same comment as for Nickel)
- Mercury [water, ground-]: 1.60319e-9 kg; lognormal variance with pedigree 0.1307, pedigree (2,2,5,1,1)
  (same comment as for Nickel)
- Chromium [soil, agricultural]: 6.24362e-6 kg; lognormal variance with pedigree 0.0807, pedigree (2,2,5,1,1)
  (same comment as for Nickel)
- Ioxynil [soil, agricultural]: 3.57105e-5 kg; lognormal variance with pedigree 0.0507, pedigree (2,2,5,1,1)
  Modelled, see chapter 'Emissions of pesticides to agricultural soil' in '01_crop production_direct field emissions and natural resources_v1.0.pdf' - pdf-document on the dedicated talk page of ecoinvent (www.ecoinvent.org/documentation)
- Cadmium, ion [water, surface water]: 4.63558e-9 kg; lognormal variance with pedigree 0.1307, pedigree (2,2,5,1,1)
  (same comment as for Nickel)
- Carbon dioxide, fossil [air, non-urban air or from high stacks]: 0.00555084 kg; lognormal variance with pedigree 0.0407, pedigree (2,2,5,1,1)
  Modelled, see chapter 'Release of fossil CO2 after urea applications' in '01_crop production_assessment methods of direct field emissions_v1.0.pdf' - pdf-document on the dedicated talk page of ecoinvent (www.ecoinvent.org/documentation)
- Ammonia [air, non-urban air or from high stacks]: 0.00192787 kg; lognormal variance with pedigree 0.0507, pedigree (2,2,5,1,1)
  Modelled with the 'AGRAMMON model' described in '01_crop production_direct field emissions and natural resources_v1.0.pdf' - pdf-document on the dedicated talk page of ecoinvent (www.ecoinvent.org/documentation)
- Nickel, ion [water, surface water]: 3.41981e-7 kg; lognormal variance with pedigree 0.1307, pedigree (2,2,5,1,1)
  (same comment as for Nickel)
- Mercury [water, surface water]: 1.32872e-9 kg; lognormal variance with pedigree 0.1307, pedigree (2,2,5,1,1)
  (same comment as for Nickel)
- Cadmium, ion [water, ground-]: 7.52777e-9 kg; lognormal variance with pedigree 0.1307, pedigree (2,2,5,1,1)
  (same comment as for Nickel)
- Lead [soil, agricultural]: 6.10238e-7 kg; lognormal variance with pedigree 0.0807, pedigree (2,2,5,1,1)
  (same comment as for Nickel)
- Copper, ion [water, ground-]: 5.84741e-7 kg; lognormal variance with pedigree 0.1307, pedigree (2,2,5,1,1)
  (same comment as for Nickel)
- Copper, ion [water, surface water]: 4.18866e-7 kg; lognormal variance with pedigree 0.1307, pedigree (2,2,5,1,1)
  (same comment as for Nickel)
- Lead [water, ground-]: 2.08638e-8 kg; lognormal variance with pedigree 0.1307, pedigree (2,2,5,1,1)
  (same comment as for Nickel)
- Isoproturon [soil, agricultural]: 0.000128558 kg; lognormal variance with pedigree 0.0507, pedigree (2,2,5,1,1)
  (same comment as for Ioxynil)
- Dinitrogen monoxide [air, non-urban air or from high stacks]: 0.000585652 kg; name N2O; lognormal variance with pedigree 0.0707, pedigree (2,2,5,1,1)
  Modelled, see chapter 'Emissions of N2O to the air' in '01_crop production_direct field emissions and natural resources_v1.0.pdf' - pdf-document on the dedicated talk page of ecoinvent (www.ecoinvent.org/documentation)
- Chromium, ion [water, ground-]: 3.57015e-6 kg; lognormal variance with pedigree 0.1307, pedigree (2,2,5,1,1)
  (same comment as for Nickel)
- Zinc [soil, agricultural]: 5.69993e-6 kg; lognormal variance with pedigree 0.0807, pedigree (2,2,5,1,1)
  (same comment as for Nickel)
- Zinc, ion [water, surface water]: 6.64411e-7 kg; lognormal variance with pedigree 0.1307, pedigree (2,2,5,1,1)
  (same comment as for Nickel)
- Mercury [soil, agricultural]: 2.50545e-8 kg; lognormal variance with pedigree 0.0807, pedigree (2,2,5,1,1)
  (same comment as for Nickel)
- Water [water, surface water]: 0.0130591 m3; name water_to_water_surface; = water_irrigation_input*(1-fraction_IW_to_air)*fraction_IW_to_surface_water; lognormal variance with pedigree 0.1286, pedigree (4,3,5,1,4)
  Calculated value. See the parameters and their comments to understand the calculation.
  property fraction, origin: salt water 0; name fraction_origin_salt_water_Wsw
  property fraction, origin: fresh water 1; name fraction_origin_fresh_water_Wsw
- Nitrate [water, ground-]: 0.052964 kg; lognormal variance with pedigree 0.0807, pedigree (2,2,5,1,1)
  Modelled with the 'SALCA-NO3 model' described in '01_crop production_direct field emissions and natural resources_v1.0.pdf' - pdf-document on the dedicated talk page of ecoinvent (www.ecoinvent.org/documentation)
- Water [water, ground-]: 0.0522363 m3; name water_to_water_ground; = water_irrigation_input*(1-fraction_IW_to_air)*fraction_IW_to_ground_water; lognormal variance with pedigree 0.1286, pedigree (4,3,5,1,4)
  Calculated value. See the parameters and their comments to understand the calculation.
  property fraction, origin: salt water 0; name fraction_origin_salt_water_Wgw
  property fraction, origin: fresh water 1; name fraction_origin_fresh_water_Wgw
  property fraction, origin: unspecified 0; name fraction_origin_unspecified_Wgw
- Mecoprop-P [soil, agricultural]: 6.24933e-5 kg; lognormal variance with pedigree 0.0507, pedigree (2,2,5,1,1)
  (same comment as for Ioxynil)
- Water [air, unspecified]: 0.0329375 m3; name water_to_air_unspecified; = (water_irrigation_input*fraction_IW_to_air); lognormal variance with pedigree 0.0807, pedigree (2,2,5,1,1)
  Calculated value based on literature values and expert opinion. See comments in the parametres' comment field.
  property fraction, origin: fresh water 1; name fraction_origin_fresh_water
  property fraction, origin: salt water 0; name fraction_origin_salt_water
  property fraction, origin: unspecified 0; name fraction_origin_unspecified
- Zinc, ion [water, ground-]: 3.44553e-6 kg; lognormal variance with pedigree 0.1307, pedigree (2,2,5,1,1)
  (same comment as for Nickel)
- Chromium, ion [water, surface water]: 5.20677e-7 kg; lognormal variance with pedigree 0.1307, pedigree (2,2,5,1,1)
  (same comment as for Nickel)
- Nitrogen oxides [air, non-urban air or from high stacks]: 0.000122987 kg; = 0.21 * N2O; lognormal variance with pedigree 0.0707, pedigree (2,2,5,1,1)
  Modelled, see chapter 'Emissions of NOx to the air' in '01_crop production_direct field emissions and natural resources_v1.0.pdf' - pdf-document on the dedicated talk page of ecoinvent (www.ecoinvent.org/documentation)
- Phosphorus [water, surface water]: 2.1762e-5 kg; lognormal variance with pedigree 0.0807, pedigree (2,2,5,1,1)
  (same comment as for Phosphate)
- Difenoconazole [soil, agricultural]: 3.21394e-6 kg; lognormal variance with pedigree 0.0507, pedigree (2,2,5,1,1)
  (same comment as for Ioxynil)

## Sampling procedure
Data were compiled from statistics, pilot network, fertilising recommendations, documents from extension services, information provided by retailers and expert knowledge. The production data were verified and adjusted by a group of experts.

## Review by Hans-Jörg Althaus 2009-01-22
passed
none
