# concrete production 45MPa

Dataset: EcoSpold 2, unit process
Geography: ZA
Time period: 2017-01-01 to 2019-12-31
Technology level: current
Classification: EcoSpold01Categories: construction materials/concrete
Classification: ISIC rev.4 ecoinvent: 2395:Manufacture of articles of concrete, cement and plaster
Synonyms: 45MPa ready mixed concrete; ready mixed concrete; ready-mix concrete
Scenario: Business-as-Usual
System model: Allocation at the point of substitution
Share of production covered: 35 %
Generated by: Rachel Muigai
Published in: Muigai, R. 2017
Database: ecoinvent
isCopyrightProtected: true
accessRestrictedTo: 1

## General comment
This dataset represents the production of South African 45MPa ready-mix concrete. Density: 2,260 kg/m³. The composition of concrete (for 1 m³) contains: Portland fly ash cement 464 kg, Water 147 kg, Gravel 1050kg, Sand 746 kg, Admixtures (air-entrainers and superplastisizers) 4.63kg.

[The amount of ingredients indicated here do not include the production waste amount of 24.5kg per 1m3 of concrete adopted from "concrete production, 50MPa, RNA only, GLO 2006" dataset [accessed on 2017/12/14 ]. The production waste volume is proportionally shared between the inputs: cement, sand and gravel. The adjusted input values are indicated in the exchange section. In addition, the amount of water included here refers to the batch water. Non-process water is adopted from "concrete production, 50MPa, RNA only, GLO 2006" dataset [accessed on 2017/12/14 ]]. 45 MPa concrete is High-strength concrete should be used for suspended structural beams and slabs, and pre-cast items such as flagstones and heavy-duty floors such as workshop floors.

Annual production volume of Ready-Mix concrete for South Africa is published in www.statssa.gov.za.
Distribution by Ready-Mix concrete for South Africa is estimated based on a sample of 1% of ready-mix producers in SA. Distribution by ready-mix strength class is estimate as: • 15MPa = 3.6% 20 MPa = 4 %
• 25 MPa = 32 %
• 30 MPa = 49%
• 35 MPa = 4 %
• 40 MPa = 6 %
• 45 MPa = 0.1 %
• 50 MPa = 1.3%

## Included activities start
From reception of raw materials at the ready-mix plant gate.

## Included activities end
This activity ends with the input of concrete in the mixing truck.
The dataset includes the whole manufacturing processes to produce ready-mixed concrete, internal processes (material handling and mixing) and infrastructure. The dataset does not include the transportation of concrete in the mixing truck. An average of 4.64 litres of diesel is used on average transportation of 1m3 concrete.

## Geography
South African data. For some exchanges RER-modules have been used as proxy. Data quality indicators adjusted accordingly.

## Technology
Typical technology for South Africa production.

## Parameters
- fraction, process water, to air: 0.15 dimensionless; name fraction_PW_to_air
  Rough estimation to represent water evaporation of process water. Adopted from "20MPa, RNA only, CA-QC 2006" dataset on 2017/11/05
- superplastisizer: 4.63 kg
  Estimated value from primary data collection
- fraction of 20 MPa concrete to overall concrete production: 0.04 dimensionless; name fraction_20MPa_concrete; lognormal variance with pedigree 0.0014, pedigree (2,2,1,3,1)
  For Annual production volume purpose. Calculated value based on primary data collection in South Africa. In South Africa, 20MPa concrete represents 4% of the overall ready-mix concrete production.
- fraction of 45MPa concrete to overall concrete production: 0.0001 dimensionless; name fraction_45MPa_concrete
  For Annual production volume purpose. Calculated value based on primary data collection in South Africa. In South Africa, 45MPa concrete represents 0.1% of the overall ready-mix concrete production.
- south africa concrete prod: 5.30815e6 m3; name PV_ready_mix_ZA
  Annual concrete production in South Africa
- fraction_01: 0.8 dimensionless; name fraction_ethylene_oxide
  Literature value. Superplastisizer assumed to be 80% ehtlyne oxide. 20 MPa mix admixtures. Source: Athena and morrison Hershfield (2012): Life Cycle Assessment of Precast Concrete Commerical Buildings Cradle-to-Grave. Adopted from "20MPa, RNA only, CA-QC 2006" dataset on 2017/11/05
- fraction_02: 0.2 dimensionless; name fraction_acetic_acid
  Literature value. Superplastisizer assumed to be 20% acetic acid. 20 MPa mix admixtures. Source: Athena and morrison Hershfield (2012): Life Cycle Assessment of Precast Concrete Commerical Buildings Cradle-to-Grave. Adopted from "20MPa, RNA only, CA-QC 2006" dataset on 2017/11/05

## Reference product
- concrete, 45MPa: 1 m3; name ref; By-product classification allocatable product
  45 MPa concrete is High-strength concrete should be used for suspended structural beams and slabs, and pre-cast items such as flagstones and heavy-duty floors such as workshop floors.
  production volume 530.815 m3; name PV_ref; = fraction_45MPa_concrete* PV_ready_mix_ZA
    (same comment as for concrete, 45MPa)
  property water in wet mass 147 kg; name ref_WWM; = batch_water
  property sand content 746 kg; name sand
    Calculated value. From primary data callection
  property price 185 EUR2005; name ref_price_EUR2005
    Calculated value based on data from United Nations Commodity Trade Statistics Database (comtrade.un.org). UN comtrade category: 681019 Tiles & flagstones of cement, concrete, artificial ston. Year 2005. Using exchange rate of 1EURO = 1.209 USD. Average of price of import into 5 main markets (EU, US, JP, IN and CN).
  property carbon content, fossil 1e-51; name ref_C_content_fossil
    Estimated value to zero, based on components properties.
  property dry mass 2260 kg; name ref_DM; = sand+gravel+cement
  property gravel content 1050 kg; name gravel
    Calculated value. From primary data callection
  property water content 0.0650442; name ref_water_content; = ref_WWM/ref_DM
  property wet mass 2407 kg; name ref_WM; = ref_WWM+ref_DM
  property cement content 464 kg; name cement
    Calculated value. From primary data callection
  property carbon content 1e-51
    carbon content on a dry matter basis (reserved; not for manual entry)
  property true value 185; name ref_true_value
    allocation property applied in "true value" allocation // value calculated from revenue
  properties: carbon allocation 2.26e-48 kg

## By-products
- heat, for reuse in municipal waste incineration only: 0 MJ; CPC 17300: Steam and hot water; By-product classification allocatable product; pedigree (1,1,1,1,1)
  Net electricity generated from this waste and used in internal MSWI plant energy redistribution.
  Uncertainty: uncertainty is calculated from uncertainties in waste composition and uncertainties in energy efficiency and the uncertainty in internal energy demand
  production volume 1.18546 MJ
  property exergy 0.1842 MJ; name E_th_prod_MSWI_exergy
    This exergy property is based on the exergy content of the product.
  property price 0.0106 EUR2005; name E_th_prod_MSWI_price_EUR2005
    Average European district heat price from Ecoheatcool and Euroheat 2005-2006, Ecoheat Work package 1: The European heat market. Final report. 10.6 EUR/GJ i s the price of district heat. http://www.solarthermalworld.org/files/Ecoheatcool%20WP1%20Web.pdf?download
  property true value relation 0.1842; name E_th_prod_MSWI_true_value_relation
    property to calculate "true value" from
  property true value 1.47237e-5
    allocation property applied in "true value" allocation // value calculated from true value relation
- electricity, for reuse in municipal waste incineration only: 0 kWh; CPC 17100: Electrical energy; By-product classification allocatable product; pedigree (1,1,1,1,1)
  (same comment as for heat, for reuse in municipal waste incineration only)
  production volume 0.164646 kWh
  property price 0.1 EUR2005; name E_el_prod_MSWI_price_EUR2005
    Estimated to be the same price as in case of electricity, medium voltage.
  property exergy 3.6 MJ; name E_el_prod_MSWI_exergy
    This exergy property is based on the exergy content of the product.
  property true value relation 3.6; name E_el_prod_MSWI_true_value_relation
    property to calculate "true value" from
  property true value 3.99666e-5
    (same comment as for heat, for reuse in municipal waste incineration only)

## Inputs from technosphere
- sand: 753.593 kg; = sand*(1+(Waste*-1)/Ref_WM); lognormal variance with pedigree 0.0002, pedigree (1,1,2,1,1)
  Primary data collected from ready mix plant plant. Sand content in 1 m3 of concrete. Value includes production waste.
  Uncertainty: Calculated variable. Uncertainty will be determined from propagation of uncertainty factors of underlying variables.
  properties: wet mass 1 kg, dry mass 1 kg
- diesel, burned in building machine: 15.6427 MJ; = diesel_input*1000*density_diesel*NHV_diesel; lognormal variance with pedigree 0.0002, pedigree (1,1,2,1,1)
  Ready mix plant data. Energy use in ready-mix plant. Adopted from "concrete production, 50MPa, RNA only, GLO 2006" dataset [accessed on 2017/12/14 ]
  Uncertainty: Calculated variable. Uncertainty will be determined from propagation of uncertainty factors of underlying variables.
  property net heating value 42.8 MJ/kg; name NHV_diesel
  property density 0.84 kg/l; name density_diesel
  property fuel input in physical units, m3 0.0004351 m3; name diesel_input; = 0.4351/1000
  note on net heating value: ecoinvent, report 1, table 4.6. Adopted from "20MPa, RNA only, CA-QC 2006" dataset on 2017/11/05
  note on density: ecoinvent report 1, table 4.6. Adopted from "20MPa, RNA only, CA-QC 2006" dataset on 2017/11/05
- steel, low-alloyed, hot rolled: 0.0238 kg; source Kellenberger D. 2007; lognormal variance with pedigree 0.0146, pedigree (2,1,3,5,1)
  Adopted value. From "concrete production, 50 MPa, RNA only, GLO" dataset. Accessed 20171213
  EcoSpold01Location=RER
  properties: wet mass 1 kg, dry mass 1 kg, carbon content, fossil 0.005
  note on carbon content, fossil: Low alloyed steel composition given in Tab. 3.2 ecoinvent v2.2 report 10_partII. Steel assumed to have a C content of 0.5%. Adopted from "20MPa, RNA only, CA-QC 2006" dataset on 2017/11/05
- cement, portland fly ash cement 21-35%: 468.723 kg; = cement*(1+ (Waste*-1)/ ref_WM); lognormal variance with pedigree 0.0033, pedigree (2,1,2,5,1)
  Primary data collected from ready mix plant plant. Portland fly ash cement content in 1 m3 of concrete. Value includes production waste.
  properties: dry mass 1 kg, wet mass 1 kg
- waste concrete: -24.5 kg; name Waste; source Marceau, M.L. 2007; lognormal variance with pedigree 0.0109, pedigree (2,1,2,3,1)
  Adopted from "concrete production, 50MPa, RNA only, GLO 2006" dataset [accessed on 2017/12/14 ] Solid waste consists of concrete and small amounts of paste (cement and water after aggregate has been reclaimed)
  EcoSpold01Location=CH
  production volume 13005 kg; = PV_ref*Waste/ref
    Calculated from the production volume of reference product, in proportion to the respective output amounts of 0.1% for 45MPa concrete.
  property price 0 EUR2005; name Waste_price_EUR2005
  properties: carbon content, fossil 1e-51, water content 0.0650442, dry mass 0.938928 kg, wet mass 1 kg
  note on carbon content, fossil: Adopted from "20MPa, RNA only, CA-QC 2006" dataset on 2017/11/05 .Tab A.3, ecoinvent v2.2 report 13_I
- gravel, round: 1060.69 kg; = gravel*(1+(Waste*-1)/Ref_WM); lognormal variance with pedigree 0.0002, pedigree (1,1,2,1,1)
  Primary data collected from ready mix plant plant. Gravel content in 1 m3 of concrete. Value includes production waste.
  EcoSpold01Location=CH
  Uncertainty: Calculated variable. Uncertainty will be determined from propagation of uncertainty factors of underlying variables.
  properties: wet mass 1 kg, dry mass 1 kg
- acetic acid, without water, in 98% solution state: 0.926 kg; name AA_Amount; = fraction_acetic_acid*superplastisizer; lognormal variance with pedigree 0.0002, pedigree (1,1,2,1,1)
  Superplastisizer. Primary data collection of superplasticizer (kg) per m3 of concrete
  Uncertainty: Calculated variable. Uncertainty will be determined from propagation of uncertainty factors of underlying variables.
  property carbon content, fossil 0.400016; name AA_C_content_fossil
  properties: dry mass 1 kg, wet mass 1 kg
  note on carbon content, fossil: Adopted from "20MPa, RNA only, CA-QC 2006" dataset on 2017/11/05
- concrete mixing factory: 4.57e-7 unit; source Kellenberger D. 2007; lognormal variance with pedigree 0.3246, pedigree (2,1,3,5,1)
  EcoSpold01Location=CH
  Adopted value. Adopted from "concrete production, 50MPa, RNA only, GLO 2006" dataset [accessed on 2017/12/14 ]
- wastewater from concrete production: -0.0348 m3; name WWater; source Marceau, M.L. 2007; lognormal variance with pedigree 0.0109, pedigree (2,1,2,3,1)
  Adopted from "concrete production, 20MPa, RNA only, GLO 2006" dataset [accessed on 2017/12/14 ]
  EcoSpold01Location=CH
  production volume 18.4724 m3; = PV_ref*WWater/ref
    (same comment as for waste concrete)
  property price 0 EUR2005; name WWater_price_EUR2005
  properties: water content 2225.48, dry mass 0.449139 kg, wet mass 1000 kg, carbon content, fossil 0.027074
  note on carbon content, fossil: TOC =0.01216 kg/m3 (Tab A.20, ecoinvent v2.2 report 13_I). TOC was considered as Total Carbon. Adopted from "20MPa, RNA only, CA-QC 2006" dataset on 2017/11/05
- electricity, medium voltage: 3.57 kWh; lognormal variance with pedigree 0.0183, pedigree (4,1,2,3,1)
  EcoSpold01Location=CH
  Primary data collected from ready mix plant plant. Energy use in ready-mix plant.
  Uncertainty: There is an important variability of energy consumption between plants
- tap water: 187.941 kg; = batch_water+non_process_water; lognormal variance with pedigree 0.0002, pedigree (1,1,2,1,1)
  EcoSpold01Location=CH
  Water use in ready-mix plant, assumed to be sourced from municipal water system. Primary data collected from ready mix plant plant. Consists of batch water and non-process water used in producing 1 m3 of concrete.
  Uncertainty: Calculated variable. Uncertainty will be determined from propagation of uncertainty factors of underlying variables.
  property batch water 147 kg; name batch_water
  property non-process water, net 40.9412 kg; name non_process_water; = (WWater*-1)*1000/(1- fraction_PW_to_air)
  properties: water content 2962.17, dry mass 0.000337476 kg, wet mass 1 kg, carbon content, fossil 0.00178991
  note on non-process water, net: The average water consumption (not including batch water) is 65 L/m3 of ready mixed concrete. The average amount of water disposed is 34,8 L/m3. Water not discarded is recycled back into the process or into other products. Source: Athena (2005):Cement and Structural Concrete: LCI Update 2005 An amount of 15% water evaporated to air was assumed, in order to calculate to non-process water input.: Adopted from "20MPa, RNA only, CA-QC 2006" dataset on 2017/11/05
  note on carbon content, fossil: Bicarbonate content is 2.93 mol/m3. CO2 content is 0.1 mol/m3 (ecoinvent v2.2 report 8, Tab 93.1). Adopted from "20MPa, RNA only, CA-QC 2006" dataset on 2017/11/05
- ethylene oxide: 3.704 kg; name EO_Amount; = fraction_ethylene_oxide*superplastisizer; lognormal variance with pedigree 0.0002, pedigree (1,1,2,1,1)
  Superplastisizer. Literature value
  Uncertainty: Calculated variable. Uncertainty will be determined from propagation of uncertainty factors of underlying variables.
  property carbon content, fossil 0.545455; name EO_C_content_fossil
  properties: wet mass 1 kg, dry mass 1 kg
- lubricating oil: 0.0119 kg; source Kellenberger D. 2007; lognormal variance with pedigree 0.0146, pedigree (2,1,3,5,1)
  Adopted value. Adopted from "concrete production, 50MPa, RNA only, GLO 2006" dataset [accessed on 2017/12/14 ]
  EcoSpold01Location=RER
  properties: wet mass 1 kg, carbon content, fossil 0.75, dry mass 1 kg
  note on carbon content, fossil: Lubricating oil is produced from diesel. C-content/dry mass of fats and oils considered 75%, from: ecoinvent v2.2 report, n 15a, pg 40. Adopted from "20MPa, RNA only, CA-QC 2006" dataset on 2017/11/05

## Emissions to nature
- Water [air, unspecified]: 0.00614117 m3; = non_process_water/1000*fraction_PW_to_air; lognormal variance with pedigree 0.0002, pedigree (1,1,2,1,1)
  Adopted value - non-process water. Adopted from "concrete production, 50 MPa, RNA only, GLO 2006" dataset [accessed on 2017/12/14 ]
  Uncertainty: Calculated variable. Uncertainty will be determined from propagation of uncertainty factors of underlying variables.
- Carbon dioxide, fossil [air, non-urban air or from high stacks]: 8.76619 kg; = ((AA_Amount* AA_C_content_fossil)+ (EO_Amount* EO_C_content_fossil))*44/12; lognormal variance with pedigree 0.0033, pedigree (2,1,2,5,1)
  Amount of carbon dioxide, fossil to the environment due to the use of superplasticizers in the concrete mix
- Oils, unspecified [water, unspecified]: 2.32e-7 kg; source Marceau, M.L. 2007; lognormal variance with pedigree 0.0015, pedigree (2,1,2,3,1)
  Adopted value. Adopted from "concrete production, 50MPa, RNA only, GLO 2006" dataset [accessed on 2017/12/14 ]
- Copper, ion [water, unspecified]: 1.55e-8 kg; source Marceau, M.L. 2007; lognormal variance with pedigree 0.0015, pedigree (2,1,2,3,1)
  Adopted from "concrete production, 20MPa, RNA only, GLO 2006" dataset [accessed on 2017/12/14 ]
- Iron, ion [water, unspecified]: 1.55e-8 kg; source Marceau, M.L. 2007; lognormal variance with pedigree 0.0015, pedigree (2,1,2,3,1)
  (same comment as for Oils, unspecified)
- Suspended solids, unspecified [water, unspecified]: 4.64e-7 kg; source Marceau, M.L. 2007; lognormal variance with pedigree 0.0015, pedigree (2,1,2,3,1)
  (same comment as for Oils, unspecified)
- Chlorides, unspecified [water, unspecified]: 3.09e-9 kg; source Marceau, M.L. 2007; lognormal variance with pedigree 0.0015, pedigree (2,1,2,3,1)
  (same comment as for Oils, unspecified)

## Sampling procedure
The data presented in this dataset is representative of ready-mix producers who represent 35% of the concrete production market in ZA.

## Extrapolations
This activity represents South Africa ready mix concrete production, Some of the data were taken from the "concrete production 50MPa, RNA only, GLO 2006" dataset [Accessed on 2017/12/14]. Whereas some of the values were calculated based on primary data collection in South Africa. The concrete constituents (cement, gravel, and sand), the electricity consumption and the acetic acid (superplasticizer) consumption were calculated based on primary data collection in South Africa.The uncertainty has been adjusted accordingly.
