# alkylbenzene production, linear

Dataset: EcoSpold 2, unit process
Geography: RER
Time period: 1995-01-01 to 2020-12-31
Technology level: current
Classification: ISIC rev.4 ecoinvent: 2023:Manufacture of soap and detergents, cleaning and polishing preparations, pe
Synonyms: Benzene C6-12-alkyl derivs.
Scenario: Business-as-Usual
System model: Allocation at the point of substitution
Generated by: Roland Hischier
Published in: Zah R. 2007
Database: ecoinvent
isCopyrightProtected: true
accessRestrictedTo: 1

## General comment
This dataset represents the production of 1 kg of liquid linear alkylbenzene (LAB). Usually, LAB are liquid at room temperature - having a melting point in the area of -50 °C and a boiling point in the area of 170°C. LAB is the most common raw material for the production of detergents. LAB is almost entirely used for the production of LAS (linear alkylate sulfonates), the worldwide most important synthetic surfactant.
The material and energy data are based on the ECOSOL study of the European Surfactant Industry, as well as estimations based on industrial data. The process emissions are based on estimations. The water exchanges are approximated based on data from a large chemical factory (Gendorf 2016).
References:
Kocal J. A., Vora B. V. and Imai T. (2001) Production of linear alkylbenzenes. In: Applied Catalysis A: General, 221, pp. 295 - 301.
SRI International (2003) Abstract of the CEH report 'Linear and Branched Alkylbenzenes'. Online document. Download of Mai 14, 2003 from http://ceh.sric.sri.com/Public/Reports/610.5000/Abstract.html.
UOP LLC (2001) UOP Linear Alkylbenzene (LAB) complex. UOP, Des Plaines, USA, Online-Version under: http://www.uop.com
Gendorf (2016) Umwelterklärung 2015, Werk Gendorf Industriepark, www.gendorf.de.

## Included activities start
From the reception of n-paraffins at the factory gate.

## Included activities end
This activity ends with 1 kg of linear alkylbenzene at the factory gate. The dataset includes the input materials, auxiliaries, energy uses, infrastructure and emissions.

## Geography
Data based on the European LAB production. Some values are based on data from a large chemical factory located in Germany. These are assumed to be valid for this geography.

## Technology
Several different production routes for the production of linear alkylbenzene can be distinguished:
- Chlorination of paraffins to monochloroparaffin and subsequent alkylation with benzene. As catalyst aluminium chloride is used within this reaction.
- Production of olefins (e.g. by chlorination of paraffins followed by dehydrochlorination, by wax cracking, by ethylene oligomerization etc.). These olefins are in a second step alkylated with benzene in the presence of hydrofluoric acid as catalyst.
- Dehydrogenation of linear paraffins to a mixture of linear olefins and subsequent alkylation with benzene. As catalyst again hydrofluoric acid is used within this reaction.
The last of the different mentioned production ways is by far the most important one. In 2000 this production route accounted for almost 90% of the worldwide LAB production. For this study here, only the latter process route is therefore taken into account and the dataset here represents LAB produced by dehydrogenation and subsequent HF catalysed alkylation.
A simply summary for the reaction is as follows:
n-Paraffin + Benzene + HF -> LAB + HF
Reference:
Kocal J. A., Vora B. V. and Imai T. (2001) Production of linear alkylbenzenes. In: Applied Catalysis A: General, 221, pp. 295 - 301.
Althaus H.-J., Chudacoff M., Hischier R., Jungbluth N., Osses M. and Primas A. (2007) Life Cycle Inventories of Chemicals. ecoinvent report No. 8, v2.0. EMPA Dübendorf, Swiss Centre for Life Cycle Inventories, Dübendorf, CH.

## Time period
Date of published literature. Some values are based on data published by the Gendorf factory that were collected between 2011 and 2015. The time period has been adjusted accordingly. For more details, see the comments of the exchanges.

## Reference product
- alkylbenzene, linear: 1 kg; name RP; source Häussinger P. 2000; By-product classification allocatable product; CPC 341: Basic organic chemicals; CAS 67774-74-7
  LAB is the most common raw material for the production of detergents. LAB is almost entirely used for the production of LAS (linear alkylate sulfonates), the worldwide most important synthetic surfactant. The worldwide LAB production is in the order of 2.4 kt.
  Usually, LAB are liquid at room temperature - having a melting point in the area of -50 °C and a boiling point in the area of 170°C.
  Additional references:
  Kocal J. A., Vora B. V. and Imai T. (2001) Production of linear alkylbenzenes. In: Applied Catalysis A: General, 221, pp. 295 - 301.
  SRI International (2003) Abstract of the CEH report 'Linear and Branched Alkylbenzenes'. Online document. Download of Mai 14, 2003 from http://ceh.sric.sri.com/Public/Reports/610.5000/Abstract.html.
  UOP LLC (2001) UOP Linear Alkylbenzene (LAB) complex. UOP, Des Plaines, USA, Online-Version under: http://www.uop.com
  production volume 6e8 kg; name RP_PV
    This is the Europan production capacity in 2000 (HERA, 2004). According to HERA about 400 million kg of those 600 million kg are consumed in Europe, the rest is exported. The global production is estimated to be 3 billion tonnes, whereby the shares among production technologies are distributed as follows: 80% HF, 10% AlCl3, and 10% fixed-bed (HERA, 2004).
    Reference(s):
    Human and Environmental Risk Assessment (HERA). 2004. LAS - Linear Alkylbenzene Sulphonate (CAS No. 68411-30-3), Version 2.0. pp. 8-9. Report retreived online from http://wko.at/up/enet/stellung/qualitaetszielstellbeilage2.pdf, 4 July 2017.
  property price 0.92 EUR2005
    From ICIS (http://www.icis.com/Articles/2004/03/04/560887/chemical-prices.html.). Commodity: 'Linear alkyl benzene (LAB), dlvd'. Year 2004.
  property carbon content, fossil 0.672414
    LAB is produced from paraffin and benzene. Molecular weight of LAB is estimated to be around 232g/mol. LAB was considered a C13 molecule
  property carbon content 0.672414
    carbon content on a dry matter basis (reserved; not for manual entry)
  property true value 0.92; name RP_true_value
    allocation property applied in "true value" allocation // value calculated from revenue
  properties: water content 0, wet mass 1 kg, water in wet mass 0 kg, dry mass 1 kg, carbon content, non-fossil 0, carbon allocation 0.672414 kg

## By-products
- heat, for reuse in municipal waste incineration only: 0 MJ; CPC 17300: Steam and hot water; By-product classification allocatable product; pedigree (1,1,1,1,1)
  Net electricity generated from this waste and used in internal MSWI plant energy redistribution.
  Uncertainty: uncertainty is calculated from uncertainties in waste composition and uncertainties in energy efficiency and the uncertainty in internal energy demand
  production volume 366.033 MJ
  property exergy 0.1842 MJ; name E_th_prod_MSWI_exergy
    This exergy property is based on the exergy content of the product.
  property price 0.0106 EUR2005; name E_th_prod_MSWI_price_EUR2005
    Average European district heat price from Ecoheatcool and Euroheat 2005-2006, Ecoheat Work package 1: The European heat market. Final report. 10.6 EUR/GJ i s the price of district heat. http://www.solarthermalworld.org/files/Ecoheatcool%20WP1%20Web.pdf?download
  property true value relation 0.1842; name E_th_prod_MSWI_true_value_relation
    property to calculate "true value" from
  property true value 1.16811e-9
    allocation property applied in "true value" allocation // value calculated from true value relation
- electricity, for reuse in municipal waste incineration only: 0 kWh; CPC 17100: Electrical energy; By-product classification allocatable product; pedigree (1,1,1,1,1)
  (same comment as for heat, for reuse in municipal waste incineration only)
  production volume 51.467 kWh
  property true value relation 3.6; name E_el_prod_MSWI_true_value_relation
    property to calculate "true value" from
  property price 0.1 EUR2005; name E_el_prod_MSWI_price_EUR2005
    Estimated to be the same price as in case of electricity, medium voltage.
  property exergy 3.6 MJ; name E_el_prod_MSWI_exergy
    This exergy property is based on the exergy content of the product.
  property true value 3.17451e-9
    (same comment as for heat, for reuse in municipal waste incineration only)
- zinc concentrate: 0 kg; CPC 14290: Other non-ferrous metal ores and concentrates (other than uranium or thorium ores and concentrates); By-product classification allocatable product
  Calculated value from the knowledge of the properties of both products.
  production volume 0.00696286 kg
  property price 0.38 EUR2005; name ByP_price_EUR2005
    Temporary price data. Calculated as 90% of purchasers price based on: Zinc content in concentrate 53%. Concentrate price per kg Zn 86.5% of refined Zn price (13.5% treatment charges according to CHR Metals Limited 2005: Dynamic cost curves. http://www.minecost.com/dynamic.pdf). 2004 zinc price from USGS (2007) Mineral commodity summaries 2007. <http://minerals.usgs.gov/minerals/pubs/mcs/2007/mcs2007.pdf> [Accessed 25 May 2010]
  property zinc content 0.53; name zinc_C_zinc_concentrate
    Zinc content on a dry matter basis. Value taken from teh "zinc mine operation" /GLO dataset.
  property dry mass 1 kg; name DM_zinc_concentrate
  property carbon content 0
    carbon content on a dry matter basis (reserved; not for manual entry)
  property true value 4.30488e-13
    allocation property applied in "true value" allocation // value calculated from revenue
  properties: wet mass 1 kg, water content 0, carbon content, non-fossil 0, carbon content, fossil 0, water in wet mass 0 kg, carbon allocation 0 kg

## Inputs from technosphere
- heat, district or industrial, natural gas: 1.45 MJ; source Berna, J. L.  1995; lognormal variance with pedigree 0.0362, pedigree (4,5,2,1,1)
  Estimation. Based on literature data.
  Uncertainty: e
- tap water: 0.026 kg; lognormal variance with pedigree 0.009825, pedigree (2,3,1,2,3)
  Calculated based on literature data published by the industry. This value is a 5-year average of data (2011 - 2015) published by the Gendorf factory (Gendorf, 2016, Umwelterklärung, www.gendorf.de), (Gendorf, 2015, Umwelterklärung, www.gendorf.de), (Gendorf, 2014, Umwelterklärung, www.gendorf.de). The amount of tap water per kg of chemical substance produced is calculated using literature data published by the Gendorf factory based in Germany, which produces a wide range of chemical substances. The factory produced 1657400 tonnes of chemical substances in the year 2015 (Gendorf, 2016, Umwelterklärung, www.gendorf.de) and 740000 tonnes of intermediate products. The amount of tap water consumed in the year 2015 was 55100 tonnes (Gendorf, 2016, Umwelterklärung, www.gendorf.de). The resulting amount of tap water is 0.023 kg/kg of chemical product produced. The 5-year average (2011 - 2015, weighted by production volume) is 0.026 kg/kg.
  properties: water content 2962.17, dry mass 0.000337476 kg, wet mass 1 kg, carbon content, fossil 0.00178991
  note on carbon content, fossil: Bicarbonate content is 2.93 mol/m3. CO2 content is 0.1 mol/m3 (ecoinvent v2.2 report 8, Tab 93.1).
- wastewater, average: 0 m3; name BP_wastewater_average; pedigree (1,1,1,1,1)
  Calculated based on literature data published by the industry. This value is a 5-year average of data (2011 - 2015) published by the Gendorf factory (Gendorf, 2016, Umwelterklärung, www.gendorf.de), (Gendorf, 2015, Umwelterklärung, www.gendorf.de), (Gendorf, 2014, Umwelterklärung, www.gendorf.de). The amount of wastewater (which is later on treated in the municipal WWTP) per kg of chemical substance produced is calculated using literature data published by the Gendorf factory based in Germany, which produces a wide range of chemical substances. The factory produced 1657400 tonnes of chemical substances in the year 2015 (Gendorf, 2016, Umwelterklärung, www.gendorf.de) and 740000 tonnes of intermediate products. The amount of wastewater which is later on treated in the municipal WWTP in the year 2015 was 1200 tonnes (Gendorf, 2016, Umwelterklärung, www.gendorf.de). The resulting amount of wastewater is 2.7E-06 m3/kg of chemical product produced.
  production volume 0 m3
    Calculated from the production volume of alkylbenzene, linear in proportion to the respective output amounts.
  property price 0 EUR2005; name BP_wastewater_average_price_EUR2005
  properties: wet mass 1000 kg, water content 2882.2, carbon content, non-fossil 0.194039, dry mass 0.346837 kg
  note on carbon content, non-fossil: 0.0673 kg TOC/m3 (Tab A.17, ecoinvent v2.2 report 13_I). TOC was considered as Total Carbon.
- electricity, medium voltage: 0.144 kWh; source Berna, J. L.  1995; lognormal variance with pedigree 0.0362, pedigree (4,5,2,1,1)
  Estimation. Based on literature data.
  Uncertainty: e
- paraffin: 0.77 kg; name paraffin_input_amount; lognormal variance with pedigree 0.1786, pedigree (4,5,5,5,5)
  Estimated value based on expert judgement.
  properties: wet mass 1 kg, dry mass 1 kg, carbon content, fossil 0.847059
  note on carbon content, fossil: An average composition of C12H26 (molecular weight of 170 g/mol) was assumed for n-parafins, after ecoinvent v2.2 report 8, part II, pg 398
- municipal solid waste: -0.0028 kg; name BP_municipal_solid_waste; source Berna, J. L.  1995; lognormal variance with pedigree 0.0188, pedigree (2,5,2,1,1)
  Literature value.
  Uncertainty: d
  production volume 1.68e6 kg; = RP_PV*BP_municipal_solid_waste/ABS(RP)
    (same comment as for wastewater, average)
  properties: dry mass 0.771 kg, wet mass 1 kg, water content 0.297017, carbon content, fossil 0.171549, carbon content, non-fossil 0.261655
  note on carbon content, fossil: MSW composition in tab 4.1, ecoinvent v2.2 report 13_I. C content referred to 1 kg DM
- chemical factory, organics: 4e-10 unit; lognormal variance with pedigree 0.309225, pedigree (2,3,1,2,3)
  Calculated based on literature data published by the industry. For this activity, no information was readily available concerning infrastructure and land-use. Therefore, the infrastructure is estimated based on data from two chemical factories, the BASF site of Ludwigshafen and the chemical factory in Gendorf (which are both located in Germany), which produce a wide range of chemical substances. Based on this data, the following assumptions are made: the built area amounts to about 4.2 ha, the plant has an average output of 50'000 t/a and a lifespan of fifty years. The estimated infrastructure amount is therefore 4.00 E-10 units per kg of produced chemical.
  References:
  Althaus H.-J., Chudacoff M., Hischier R., Jungbluth N., Osses M. and Primas A. (2007) Life Cycle Inventories of Chemicals. ecoinvent report No. 8, v2.0. EMPA Dübendorf, Swiss Centre for Life Cycle Inventories, Dübendorf, CH.
  Gendorf (2000) Umwelterklärung 2000, Werk Gendorf. Werk Gendorf, Burgkirchen.
- heat, district or industrial, other than natural gas: 3.207 MJ; source Berna, J. L.  1995; lognormal variance with pedigree 0.0362, pedigree (4,5,2,1,1)
  Estimation. Based on literature data.
  Uncertainty: e
- benzene: 0.33 kg; name benzene_input_amount; lognormal variance with pedigree 0.1786, pedigree (4,5,5,5,5)
  Estimated value based on expert judgement.
  properties: wet mass 1 kg, dry mass 1 kg, carbon content, fossil 0.923077
- wastewater, average: -2.43642e-6, -2.63575e-7 m3 (2 entries); lognormal variance with pedigree 0.009825, pedigree (2,3,1,2,3)
  (same comment as for wastewater, average)
  production volume 1620 m3

## Inputs from nature
- Water, well, in ground [natural resource, in water]: 0.00083 m3; lognormal variance with pedigree 0.009825, pedigree (2,3,1,2,3)
  Calculated based on literature data published by the industry. This value is a 5-year average of data (2011 - 2015) published by the Gendorf factory (Gendorf, 2016, Umwelterklärung, www.gendorf.de), (Gendorf, 2015, Umwelterklärung, www.gendorf.de), (Gendorf, 2014, Umwelterklärung, www.gendorf.de). The amount of groundwater and surface water (river) extracted per kg of chemical substance produced is calculated using literature data published by the Gendorf factory based in Germany, which produces a wide range of chemical substances. The factory produced 1657400 tonnes of chemical substances in the year 2015 (Gendorf, 2016, Umwelterklärung, www.gendorf.de) and 740000 tonnes of intermediate products. The amount of groundwater and surface water (river) extracted in the year 2015 was 19950000 tonnes and 21488100 tonnes respectively (Gendorf, 2016, Umwelterklärung, www.gendorf.de).
- Water, river [natural resource, in water]: 0.00086 m3; lognormal variance with pedigree 0.009825, pedigree (2,3,1,2,3)
  (same comment as for Water, well, in ground)
- Water, cooling, unspecified natural origin [natural resource, in water]: 0.0164 m3; lognormal variance with pedigree 0.009825, pedigree (2,3,1,2,3)
  Calculated based on literature data published by the industry. This value is a 5-year average of data (2011 - 2015) published by the Gendorf factory (Gendorf, 2016, Umwelterklärung, www.gendorf.de), (Gendorf, 2015, Umwelterklärung, www.gendorf.de), (Gendorf, 2014, Umwelterklärung, www.gendorf.de). The amount of water for cooling extracted per kg of chemical substance produced is calculated using literature data published by the Gendorf factory based in Germany, which produces a wide range of chemical substances. The factory produced 1657400 tonnes of chemical substances in the year 2015 (Gendorf, 2016, Umwelterklärung, www.gendorf.de) and 740000 tonnes of intermediate products. The reported amounts of water extracted as groundwater and surface water (river) are assumed to be used entirely for cooling purposes.

## Emissions to nature
- Benzene [water, surface water]: 0.002934 kg; = ((1-(RP/(benzene_input_amount+paraffin_input_amount)))*benzene_input_amount-benzene_to_air)*0.1; lognormal variance with pedigree 0.51, pedigree (5,5,5,5,4)
  Estimation. The remaining amount of unreacted raw materials was assumed to leave the production process with the wastewater. Further it was assumed that this wastewater is treated in an internal wastewater plant with an assumed removal efficiency of 90% for benzene. The carbon contained in the removed substances was accounted as CO2 emissions to air.
  Uncertainty: e
- DOC, Dissolved Organic Carbon [water, unspecified]: 0.0085341 kg; lognormal variance with pedigree 0.218, pedigree (4,5,5,5,5)
  Calculated value. The BOD, COD, TOC and BOD5 are calculated based on the amount and type of emissions released to water in the same activity.
- Benzene [air, urban air close to ground]: 0.00066 kg; name benzene_to_air; = benzene_input_amount*0.002; lognormal variance with pedigree 0.33, pedigree (5,5,5,5,5)
  Estimation. The air emissions occurring in the different stages of the production were estimated to a total of 0.2% of the raw material input of benzene.
  Uncertainty: e
- TOC, Total Organic Carbon [water, unspecified]: 0.0085341 kg; lognormal variance with pedigree 0.218, pedigree (4,5,5,5,5)
  (same comment as for DOC, Dissolved Organic Carbon)
- Water [water, unspecified]: 0.0167 m3; lognormal variance with pedigree 0.009825, pedigree (2,3,1,2,3)
  Calculated based on literature data published by the industry (Gendorf, 2016, Umwelterklärung, www.gendorf.de). The amount of water released back to the environment consists of the amount of process water treated in the internal WWTP and then released back to the environment and the amount of cooling water released back to the environment.
  property water in wet mass 1000 kg; name WWM
  property fraction, origin: unspecified 1; name fraction_origin_unspecified_Ww
  property fraction, origin: fresh water 0; name fraction_origin_fresh_water_Ww
  property wet mass 1000 kg; name WM
  property dry mass 0 kg; name DM
  property carbon content, fossil 0; name C_content_fossil
  property carbon content, non-fossil 0; name C_content_non_fossil
  property fraction, origin: salt water 0; name fraction_origin_salt_water_Ww
- Water [air, unspecified]: 0.0014 m3; lognormal variance with pedigree 0.009825, pedigree (2,3,1,2,3)
  Calculated to ensure the water balance. In general, in the case of recirculating cooling systems, 77% of the water input evaporates to air. In case of once-through cooling systems, 4% of the water input evaporates to air. The process water has in the chemical industry an average evaporation rate of 20.5%. In the specific case of the Gendorf factory, the calculated evaporation rate based on the data published is 6.3%. This matches the qualitative information, that the majority of the cooling systems in Gendorf are once-through and that the amount of cooling water used is significantly higher than the amount of process water used (Gendorf, 2016, Umwelterklärung, www.gendorf.de).
  property fraction, origin: unspecified 1; name fraction_origin_unspecified
  property fraction, origin: salt water 0; name fraction_origin_salt_water
  property fraction, origin: fresh water 0; name fraction_origin_fresh_water
- Paraffins [water, surface water]: 0.006846 kg; = ((1-(RP/(benzene_input_amount+paraffin_input_amount)))*paraffin_input_amount-paraffins_to_air)*0.1; lognormal variance with pedigree 0.51, pedigree (5,5,5,5,4)
  Estimation. The remaining amount of unreacted raw materials was assumed to leave the production process with the wastewater. Further it was assumed that this wastewater is treated in an internal wastewater plant with an assumed removal efficiency of 90% for n-paraffins. The carbon contained in the removed substances was accounted as CO2 emissions to air.
  Uncertainty: e
- BOD5, Biological Oxygen Demand [water, unspecified]: 0.0312808 kg; lognormal variance with pedigree 0.218, pedigree (4,5,5,5,5)
  (same comment as for DOC, Dissolved Organic Carbon)
- Paraffins [air, urban air close to ground]: 0.00154 kg; name paraffins_to_air; = paraffin_input_amount*0.002; lognormal variance with pedigree 0.33, pedigree (5,5,5,5,5)
  Estimation. The air emissions occurring in the different stages of the production were estimated to a total of 0.2% of the raw material input of paraffin.
  Uncertainty: e
- Carbon dioxide, fossil [air, urban air close to ground]: 0.177 kg; lognormal variance with pedigree 0.2, pedigree (5,5,5,5,4)
  Estimation. The remaining amount of unreacted raw materials were assumed to leave the production process with the wastewater. Further it was assumed that this wastewater is treated in an internal wastewater plant with an assumed removal efficiency of 90% for benzene and n-paraffins. The carbon contained in the removed substances was accounted for as CO2 emissions to air.
  Uncertainty: e
- COD, Chemical Oxygen Demand [water, unspecified]: 0.0312808 kg; lognormal variance with pedigree 0.218, pedigree (4,5,5,5,5)
  (same comment as for DOC, Dissolved Organic Carbon)

## Sampling procedure
Material and energy data out of ECOSOL study of European Surfactant Industry. Process emissions based on estimations. Some values are calculated based on data from a large chemical factory located in Germany. For more details, see the comments of the exchanges.

## Review by Emilia Moreno Ruiz 2017-08-07
This dataset was additionally reviewed in a separate review process by Eric Johnson of Atlantic Consulting as well as Emilia Moreno Ruiz and Gregor Wernet of ecoinvent.
