# chipper production, mobile, diesel

Dataset: EcoSpold 2, unit process
Geography: RER
Time period: 1996-01-01 to 2019-12-31
Technology level: current
Classification: EcoSpold01Categories: wooden materials/extraction
Classification: ISIC rev.4 ecoinvent: 2822:Manufacture of metal-forming machinery and machine tools
Tags: ConvertedDataset
Scenario: Business-as-Usual
System model: Allocation at the point of substitution
Generated by: Hans-Jörg Althaus
Published in: Werner F. 2007
Database: ecoinvent
isCopyrightProtected: true
accessRestrictedTo: 1

## General comment
This dataset represents the production of a mobile wood chopper running on diesel fuel.

The dataset covers the production of a carrier with chopper, excluding diesel consumption. The average lifetime of the chopper and carrier vehicle is assumed 10 and 20 years, respectively. The dataset reflects Swiss production figures, which are considered representative for central Europe.
The dataset can be used to model the infrastructure of mobile wood chopping of residual / industrial wood in the forest.

Several types of choppers exist. Here only one model is developed. Therefore, the uncertainty especially for energy consumption data is rather high.

## Included activities start
From reception of steel materials at the construction plant.

## Included activities end
This activity ends with a mobile wood chopper at the construction plant.The dataset includes the steel use and disposal and the transport required. The dataset does not include the infrastructure of steel, transportation and power.

## Geography
Data for Switzerland used for central Europe

## Technology
The dataset represents the Swiss production of carrier with chopper in 1996. This machine consists of a carrier vehicle of 20 t and of the chopper itself of 4 t. Total weight includes 6 rubber-tyres of 300 kg each and cutting knives made of low-alloyed steel with a to-tal weight of 60 kg. The rubber-tyres have a service life of 5 years; the steel content is about 16.8 % of total weight. The cutting knives are replaced every 4'500 piled m3. The average production of such a machine lies around 20'000 piled m3.
Reference:
Bollens U. and Grasser C. (1996) Teil IX Holz. In: Ökoinventare von Energiesystemen; Grundlagen für den ökologischen Vergleich von Energiesystemen und den Einbezug von Energiesystemen in Ökobilanzen für die Schweiz (ed. Frischknecht R., Suter P., Bollens U., Bosshart S., Ciot M., Ciseri L., Doka G., Hischier R., Martin A., Dones R. and Gantner U.). 3rd ed. Edition. pp. 1-66. Bundesamt für Energiewirtschaft (BEW), Bern.

## Reference product
- chipper, mobile, diesel: 1 unit; By-product classification allocatable product; CPC 441: Agricultural or forestry machinery and parts thereof
  EcoSpold01Location=RER
  Reference product. A mobile wood chopper running on diesel fuel. Several types of choppers exist but this dataset is developed for only one model produced in Switzerland. The mobile chopper is ready for distribution from production plant. The chopper is used in the production of wood chips from residual wood and/or industrial wood in the forest.
  production volume 1.32237 unit
    This is a placeholder value that does not reflect real-world production volumes. This dataset does not currently require a real-world production volume to work in the database framework, and no actual data were collected yet. This has no negative effect on the results of the ecoinvent database. The placeholder value of this activity was scaled according to the nominal GDP of 2005 (source: United Nations, http://data.un.org/Glossary.aspx?q=GDP+%28current+US%24%29, accessed 20130726) to reflect an appropriate share of the global production volume, which is also a placeholder value.
  property price 55630 EUR2005
    Calculated based on inputs: The price of the product has been calculated as a sum of the values of the material and energy inputs for this product. This value is therefore a rough estimation. It may underestimate the real price since there are additional expenses when producing any product. These expences can include for example labour costs, treatment of waste materials and profit for the producer. Please consider carefully whether this level of data quality is acceptable for your application.

## Inputs from technosphere
- heat, district or industrial, natural gas: 248900 MJ; source Frischknecht R. 1996; lognormal variance with pedigree 0.0707, pedigree (3,3,5,3,3)
  Literature Value
  EcoSpold01Location=RER
  Uncertainty: ;
- steel, low-alloyed, hot rolled: 26100 kg; source Frischknecht R. 1996; lognormal variance with pedigree 0.0707, pedigree (3,3,5,3,3)
  Literature Value
  EcoSpold01Location=RER
  Uncertainty: ;
  properties: wet mass 1 kg, carbon content, fossil 0.005, dry mass 1 kg
  note on carbon content, fossil: Low alloyed steel composition given in Tab. 3.2 ecoinvent v2.2 report 10_partII. Steel assumed to have a C content of 0.5%
- electricity, medium voltage: 24000 kWh; source Frischknecht R. 1996; lognormal variance with pedigree 0.0707, pedigree (3,3,5,3,3)
  EcoSpold01Location=UCTE
  Literature Value
  Uncertainty: ;

## Sampling procedure
Literature

## Extrapolations
This dataset has been extrapolated from year 2002 to the year of the calculation (2019). The uncertainty has been adjusted accordingly.

## Review by Roberto Dones 2005-07-19
passed

## Review by Roland Hischier 2011-10-11
Transfer of documentation done.
