# sodium hydrosulfide production

Dataset: EcoSpold 2, unit process
Geography: RER
Time period: 2010-01-01 to 2019-12-31
Technology level: current
Classification: ISIC rev.4 ecoinvent: 2011:Manufacture of basic chemicals
Synonyms: NaSH
Scenario: Business-as-Usual
System model: Allocation at the point of substitution
Share of production covered: 100 %
Generated by: Jürgen Sutter
Database: ecoinvent
isCopyrightProtected: true
accessRestrictedTo: 1

## General comment
The process “sodium hydrosulfide, at plant, RER” is modelled for the production of sodium hydrosulfide from hydrogen sulfide in Europe. Raw materials are modelled with a stoechiometric calculation. Emissions are estimated. Energy consumptions, infrastructure and transports are calculated with standard values.
Sodium hydrogensulfide (NaHS, sodium hydrosulfide), is a colorless to yellow solid. It is very soluble in water. Sodium hydrogensulfide is usually obtained by the action of hydrogen sulfide on sodium sulfide or sodium hydroxide solution. If hydrogen sulfide is passed over anhydrous high-percentage sodium sulfide at ca. 300 °C, high-percentage sodium hydrogensulfide is obtained. According to a patent, anhydrous sodium hydrogensulfide is obtained by the reaction of sodium metal with hydrogen sulfide in inert organic solvents, and high-percentage solid products can be obtained by the evaporation of aqueous solutions.
Hydrated products are obtained by reacting hydrogensulfide with solutions of sodium sulfide or sodium hydroxide (e.g., in spray towers). If sodium hydroxide solution is used, it should be noted that the sodium sulfide formed as an intermediate is less soluble than the end product. Problems arising from this can be avoided by a patented method. Another patent describes how the difference between the solubilities of sodium sulfide and sodium hydrogensulfide can be exploited by allowing hydrogen sulfide to react with sodium sulfide (60 % Na2S) in lump form in a tower, controlling the temperature so that the sodium hydrogensulfide runs off, leaving behind the sodium sulfide as a solid.
The hot solutions obtained using pure hydrogen sulfide can be converted to solid products by cooling without intermediate treatment. If the hydrogen sulfide contains carbon dioxide, Na2CO3 is formed in the solutions in addition to NaHS.
The anhydrous salt (95 – 98 % NaHS) is of minor importance. In industry, the following low-iron hydrated products are used:
1. Sodium hydrogensulfide solution (30 % NaHS)
2. Sodium hydrogensulfide flakes (70 % NaHS)
3. Sodium hydrogensulfide powder (95 % NaHS)
Frischknecht R., Jungbluth N., Althaus H.-J., Doka G., Dones R., Heck T., Hellweg S., Hischier R., Nemecek T., Rebitzer G. and Spielmann M. (2007) Overview and Methodology. Final report ecoinvent v2.0 No. 1. Swiss Centre for Life Cycle Inventories, Dübendorf, CH, retrieved from: www.ecoinvent.org.

Gendorf (2000) Umwelterklärung 2000, Werk Gendorf. Werk Gendorf, Burgkirchen as pdf-File under: http://www.gendorf.de/pdf/umwelterklaerung2000.pdf

Ludwig Lange/Wolfgang Triebel: Sulfides, Polysulfides, and Sulfanes. Published online: 2003. In: Ullmann's Encyclopedia of Industrial Chemistry, Seventh Edition, 2004 Electronic Release (ed. Fiedler E., Grossmann G., Kersebohm D., Weiss G. and Witte C.). 7 th Electronic Release Edition. Wiley InterScience, New York, Online-Version under: DOI: 10.1002/14356007.a25_443

## Included activities end
production of sodium hydrosulfide including materials, energy uses, infrastructure, and emissions

## Geography
The inventory is modelled for Europe.

## Technology
reaction of hydrogen sulfide and sodium hydroxide

## Time period
Time of publications

## Parameters
- fraction, cooling water, recirculating system, to air: 0.771; name fraction_CW_R_to_air; lognormal variance with pedigree 0.0413, pedigree (2,3,1,3,1)
  Calculated based on literature value (Scown, C.D., 2011, Water Footprint of U.S. Transportation Fuels and supplying information of the article) (Vionnet, S., Quantis Water Database - Technical Report, 2012).
- fraction, cooling water, once-through system, to air: 0.004; name fraction_CW_OT_to_air; lognormal variance with pedigree 0.0413, pedigree (2,3,1,3,1)
  (same comment as for fraction, cooling water, recirculating system, to air)
- fraction, cooling water, to air: 0.3875; name fraction_CW_to_air; = (0.5*fraction_CW_OT_to_air)+(0.5*fraction_CW_R_to_air); lognormal variance with pedigree 0.092025, pedigree (4,4,3,2,4)
  Calculated value based on literature value (see comments of the other parametres present in this dataset) and expert opinion. In the case when no industry/literature data are available about the type of cooling or directly fraction, cooling water, to air specific for the process a default assumption is applied. It is assumed that the once-through cooling system is used in 50% of all cases and recirculating system is used in another 50% of all cases.
- fraction, cooling water, cooling pond system, to air: 0.032; name fraction_CW_CP_to_air; lognormal variance with pedigree 0.0413, pedigree (2,3,1,3,1)
  (same comment as for fraction, cooling water, recirculating system, to air)

## Reference product
- sodium hydrosulfide: 1 kg; CPC 342: Basic inorganic chemicals n.e.c.; By-product classification allocatable product
  EcoSpold01Location=RER
  production volume 8.5e7 kg
    2006 (http://www.icis.com/Articles/2006/02/28/2012515/chemical-profile-sodium-hydrosulfide.html)
  property price 0.790417 EUR2005
    Calculated based on inputs: The price of the product has been calculated as a sum of the values of the material and energy inputs for this product. This value is therefore a rough estimation. It may underestimate the real price since there are additional expenses when producing any product. These expences can include for example labour costs, treatment of waste materials and profit for the producer. Please consider carefully whether this level of data quality is acceptable for your application. Cross-reference: The consumer price for sodium hydrosulfide is 75.3 EURO for 3kg. (http://www.sigmaaldrich.com/catalog/product/sial/161527?lang=de&region=DE&gclid=Cj0KEQjwoYi4BRDF_PHHu6rI7NMBEiQAKZ-JuLY-8Z2cQJVMcShpCKj9ZR2e6190hVZp9YUYwgoIs5IaAgxb8P8HAQ , accessed 20160421)
  property carbon content, fossil 0
    Calculated based on molecular structure. See tab "chemicals".
  property carbon content 0
    carbon content on a dry matter basis (reserved; not for manual entry)
  properties: carbon content, non-fossil 0, wet mass 1 kg, dry mass 1 kg, water in wet mass 0 kg, water content 0, carbon allocation 0 kg

## Inputs from technosphere
- heat, from steam, in chemical industry: 2 MJ; lognormal variance with pedigree 0.1786, pedigree (4,5,5,5,5)
  EcoSpold01Location=RER
  There was no information available on the amount of energy used for the production process. In order not to neglect the process energy demand those values were approximated with data from an large chemical plant site in Germany producing 2.05 Mt a-1 (intermediates included) of different chemicals (Gendorf (2000)). The values for the energy consumption per kg of product of this plant (3.2 MJ kg-1) were used as approximation for the energy consumption. This total energy demand contains a split of 50% natural gas, 38% electricity and 12% steam from external energy sources. For this inventory all energy used for heat or steam was assumed to be natural gas. For this inventory an amount of 2 MJ natural gas and 0.333 kW electricity per kg product was used.
  Uncertainty: Estimation
- sodium hydroxide, without water, in 50% solution state: 0.75188 kg; lognormal variance with pedigree 0.0335, pedigree (4,5,4,1,1)
  As there was no data available for the production of sodium hydrogensulfide, the values for the consumption of the raw materials are calculated with an assumed yield of 95 % (Frischknecht et al. 2007).
  EcoSpold01Location=RER
  Uncertainty: Stoechiometric calculation
  properties: dry mass 1 kg, wet mass 1 kg
- hydrogen sulfide: 0.6391 kg; lognormal variance with pedigree 0.0335, pedigree (4,5,4,1,1)
  (same comment as for sodium hydroxide, without water, in 50% solution state)
  properties: dry mass 1 kg, wet mass 1 kg
- chemical factory, organics: 4e-10 unit; lognormal variance with pedigree 0.3184, pedigree (4,5,5,5,5)
  No information was readily available about infrastructure and land-use of production plants. Therefore, in this study, the infrastructure is estimated based on the module "chemical plant, organics". This module assumes a built area of about 4.2 ha, an average output of 50'000 t/a, and plant life of fifty years. For this study, the estimated value is 4.00 E-10 units per kg of produced chemical.
  EcoSpold01Location=RER
  Uncertainty: Estimation
- electricity, medium voltage: 0.333 kWh; lognormal variance with pedigree 0.1786, pedigree (4,5,5,5,5)
  There was no information available on the amount of energy used for the production process. In order not to neglect the process energy demand those values were approximated with data from an large chemical plant site in Germany producing 2.05 Mt a-1 (intermediates included) of different chemicals (Gendorf (2000)). The values for the energy consumption per kg of product of this plant (3.2 MJ kg-1) were used as approximation for the energy consumption. This total energy demand contains a split of 50% natural gas, 38% electricity and 12% steam from external energy sources. For this inventory all energy used for heat or steam was assumed to be natural gas. For this inventory an amount of 2 MJ natural gas and 0.333 kW electricity per kg product was used.
  EcoSpold01Location=UCTE
  Uncertainty: Estimation
- hydrochloric acid, without water, in 30% solution state: 0.033835 kg; lognormal variance with pedigree 0.0335, pedigree (4,5,4,1,1)
  The unreacted sodium hydroxide is considered to be neutralized with hydrogen chloride.
  EcoSpold01Location=RER
  Uncertainty: Stoechiometric calculation
  properties: wet mass 1 kg, dry mass 1 kg

## Inputs from nature
- Water, cooling, unspecified natural origin [natural resource, in water]: 0.024 m3; name water_cooling_UNO_input; lognormal variance with pedigree 0.0335, pedigree (4,5,4,1,1)
  There was no information available on the amount of cooling water used within the plant. In order not to neglect the process cooling water demand this value was approximated with data from an large chemical plant site in Germany producing 2.05 Mt a-1 (intermediates included) of different chemicals (Gendorf 2000). In this plant in total an average 24 kg water per kg of product were used for. This value was used in this inventory as approximation for the cooling water consumption.
  Uncertainty: Estimation

## Emissions to nature
- Water [water, unspecified]: 0.0147 m3; name water_to_water_unspecified; = water_cooling_UNO_input*(1-fraction_CW_to_air); lognormal variance with pedigree 0.130025, pedigree (4,4,5,2,4)
  Calculated value based on literature values and expert opinion. See comments in the parametres' comment field.
  property fraction, origin: salt water 0; name fraction_origin_salt_water_Ww
  property fraction, origin: fresh water 0; name fraction_origin_fresh_water_Ww
  property fraction, origin: unspecified 1; name fraction_origin_unspecified_Ww
- Chloride [water, surface water]: 0.032895 kg; lognormal variance with pedigree 0.3184, pedigree (4,5,5,5,5)
  The unreacted sodium hydroxide is considered to be neutralized with hydrogen chloride. From this neutralization sodium and chloride emissions to water are calculated.
  Uncertainty: Estimation
- Sodium, ion [water, surface water]: 0.021617 kg; lognormal variance with pedigree 0.6642, pedigree (4,5,5,5,5)
  (same comment as for Chloride)
- Sulfate [water, surface water]: 0.086617 kg; lognormal variance with pedigree 0.1786, pedigree (4,5,5,5,5)
  The remaining amount of unreacted hydrogen sulfide is assumed to leave the production process with the waste water. It is accounted as sulfate emission.
  Uncertainty: Estimation
- Hydrogen sulfide [air, urban air close to ground]: 0.0012782 kg; lognormal variance with pedigree 0.1786, pedigree (4,5,5,5,5)
  There was no data available on process emissions to air for the sodium hydrogensulfide production. As approximation the air emissions occurring from the purge vent, the distillation vent and fugitive emission sources were estimated to 0.2% of the hydrogen sulfide input.
  Uncertainty: Estimation
- Water [air, unspecified]: 0.0093 m3; name water_to_air_unspecified; = water_cooling_UNO_input*fraction_CW_to_air; lognormal variance with pedigree 0.130025, pedigree (4,4,5,2,4)
  (same comment as for Water)
  property fraction, origin: unspecified 1; name fraction_origin_unspecified
  property fraction, origin: fresh water 0; name fraction_origin_fresh_water
  property fraction, origin: salt water 0; name fraction_origin_salt_water

## Sampling procedure
Literature data

## Extrapolations
This dataset has been extrapolated from year 2010 to the year of the calculation (2019). The uncertainty has been adjusted accordingly.

## Review by Roland Hischier 2011-04-12
automatic validation in Excel
none
