# absorption chiller production, 100kW

Dataset: EcoSpold 2, unit process
Geography: CH
Time period: 2000-01-01 to 2019-12-31
Technology level: current
Classification: EcoSpold01Categories: cooling/production of components
Classification: ISIC rev.4 ecoinvent: 2819:Manufacture of other general-purpose machinery
Tags: ConvertedDataset
Scenario: Business-as-Usual
System model: Allocation at the point of substitution
Generated by: Alex Primas
Published in: Primas A. 2007
Database: ecoinvent
isCopyrightProtected: true
accessRestrictedTo: 1

## General comment
The module reflects a absorption chiller with 100kW coling capacity and a air cooler for the waste heat. Inventory based on information from literature for future production based on manufacturer data. Life time for the total system assumed with 20 years.
[This dataset was already contained in the ecoinvent database version 2. It was not individually updated during the transfer to ecoinvent version 3. Life Cycle Impact Assessment results may still have changed, as they are affected by changes in the supply chain, i.e. in other datasets. This dataset was generated following the ecoinvent quality guidelines for version 2. It may have been subject to central changes described in the ecoinvent version 3 change report (http://www.ecoinvent.org/database/ecoinvent-version-3/reports-of-changes/), and the results of the central updates were reviewed extensively. The changes added e.g. consistent water flows and other information throughout the database. The documentation of this dataset can be found in the ecoinvent reports of version 2, which are still available via the ecoinvent website. The change report linked above covers all central changes that were made during the conversion process.]

## Included activities end
The module includes the most important materials used for production, the energy needed for production, planning and engineering. Also included is the transport of the raw materials.

## Geography
Process applicable in central European conditions.

## Technology
Single stage absorption chiller with water-ammonia cycle and 100 kW cooling capacity connected to a 250 kW hybrid air cooler. The unit includes 40m of piping between the chiller and the air cooler. Coefficient of performance between 0.4 and 0.7 depending on supply temperatures.

## Parameters
- fraction, process water, to air: 0.15 dimensionless; name fraction_PW_to_air; lognormal variance with pedigree 0.092025, pedigree (4,4,3,2,4)
  Literature value. In case when no industry/process specific data are available, default evaporation fraction value is used. This value is 15% and is based on literature (Statistics Canada, 2007 & Shaffer, K.H., 2008, Consumptive water use in the Great Lakes Basin, USGS & Shiklomanov, 2003, World Water Resources at the Beginning of the 21st Century) and has been approved by an expert.
- fraction, water, completely softened, to air: 0.15; name fraction_WCS_to_air; = fraction_PW_to_air; lognormal variance with pedigree 0.092025, pedigree (4,4,3,2,4)
  Calculated value. See comment in the other parametres present in this dataset. Water, completely softened is considered to be always used as process water, thus process water fractions to air are applied to all water, completely softened input flows to calculate the amount of water consumed in the processes.

## Reference product
- absorption chiller, 100kW: 1 unit; By-product classification allocatable product; CPC 43913: Refrigerating and freezing equipment and heat pumps, except household type equipment
  production volume 0.05 unit
    Unknown
    one unit only; lifetime 20 years
  property price 9112.34 EUR2005
    Calculated based on inputs: The price of the product has been calculated as a sum of the values of the material and energy inputs for this product. This value is therefore a rough estimation. It may underestimate the real price since there are additional expenses when producing any product. These expences can include for example labour costs, treatment of waste materials and profit for the producer. Please consider carefully whether this level of data quality is acceptable for your application.
  property true value 9112.34
    allocation property applied in "true value" allocation // value calculated from revenue

## By-products
- electricity, for reuse in municipal waste incineration only: 0 kWh; CPC 17100: Electrical energy; By-product classification allocatable product; pedigree (1,1,1,1,1)
  Net electricity generated from this waste and used in internal MSWI plant energy redistribution.
  Uncertainty: uncertainty is calculated from uncertainties in waste composition and uncertainties in energy efficiency and the uncertainty in internal energy demand
  production volume 11.2007 kWh
  property true value relation 3.6; name E_el_prod_MSWI_true_value_relation
    property to calculate "true value" from
  property exergy 3.6 MJ; name E_el_prod_MSWI_exergy
    This exergy property is based on the exergy content of the product.
  property price 0.1 EUR2005; name E_el_prod_MSWI_price_EUR2005
    Estimated to be the same price as in case of electricity, medium voltage.
  property true value 28.6928
    allocation property applied in "true value" allocation // value calculated from true value relation
- heat, for reuse in municipal waste incineration only: 0 MJ; CPC 17300: Steam and hot water; By-product classification allocatable product; pedigree (1,1,1,1,1)
  Net useful heat generated from this waste and used in internal MSWI plant energy redistribution.
  Uncertainty: uncertainty is calculated from uncertainties in waste composition and uncertainties in energy efficiency and the uncertainty in internal energy demand
  production volume 77.7406 MJ
  property true value relation 0.1842; name E_th_prod_MSWI_true_value_relation
    property to calculate "true value" from
  property exergy 0.1842 MJ; name E_th_prod_MSWI_exergy
    This exergy property is based on the exergy content of the product.
  property price 0.0106 EUR2005; name E_th_prod_MSWI_price_EUR2005
    Average European district heat price from Ecoheatcool and Euroheat 2005-2006, Ecoheat Work package 1: The European heat market. Final report. 10.6 EUR/GJ i s the price of district heat. http://www.solarthermalworld.org/files/Ecoheatcool%20WP1%20Web.pdf?download
  property true value 10.1897
    (same comment as for electricity, for reuse in municipal waste incineration only)
- zinc concentrate: 0 kg; CPC 14290: Other non-ferrous metal ores and concentrates (other than uranium or thorium ores and concentrates); By-product classification allocatable product
  Calculated value from the knowledge of the properties of both products.
  production volume 0.000728404 kg
  property price 0.38 EUR2005; name ByP_price_EUR2005
    Temporary price data. Calculated as 90% of purchasers price based on: Zinc content in concentrate 53%. Concentrate price per kg Zn 86.5% of refined Zn price (13.5% treatment charges according to CHR Metals Limited 2005: Dynamic cost curves. http://www.minecost.com/dynamic.pdf). 2004 zinc price from USGS (2007) Mineral commodity summaries 2007. <http://minerals.usgs.gov/minerals/pubs/mcs/2007/mcs2007.pdf> [Accessed 25 May 2010]
  property zinc content 0.53; name zinc_C_zinc_concentrate
    Zinc content on a dry matter basis. Value taken from teh "zinc mine operation" /GLO dataset.
  property dry mass 1 kg; name DM_zinc_concentrate
  property carbon content 0
    carbon content on a dry matter basis (reserved; not for manual entry)
  property true value 0.00553587
    allocation property applied in "true value" allocation // value calculated from revenue
  properties: wet mass 1 kg, water content 0, carbon content, non-fossil 0, carbon content, fossil 0, water in wet mass 0 kg, carbon allocation 0 kg
- copper: 0 kg; By-product classification allocatable product; CPC 41413: Refined copper and copper alloys, unwrought; master alloys of copper
  production volume 0.257964 kg
  properties: water in wet mass 0 kg, water content 0, carbon content, non-fossil 0, dry mass 1 kg, carbon content, fossil 0, price 5.52 EUR2005, wet mass 1 kg, carbon content 0, carbon allocation 0 kg, true value 28.4792
- lead: 0 kg; CPC 41441: Lead, unwrought; By-product classification allocatable product
  EcoSpold01Location=SE
  production volume 0.00672102 kg
  property price 0.744 EUR2005
    Temporary price data. Calculated as 90% of purchasers price based on: Source: ecoinvent v2 report 10-part IX, Tab 5.10 & 2.5
  property carbon content 0
    carbon content on a dry matter basis (reserved; not for manual entry)
  property true value 0.100009
    allocation property applied in "true value" allocation // value calculated from revenue
  properties: wet mass 1 kg, water content 0, carbon content, non-fossil 0, carbon content, fossil 0, dry mass 1 kg, water in wet mass 0 kg, carbon allocation 0 kg
- nickel, 99.5%: 0 kg; CPC 41422: Unwrought nickel; By-product classification allocatable product
  EcoSpold01Location=SE
  production volume 0.0140299 kg
  property price 10.4 EUR2005
    Temporary price data. Calculated as 90% of purchasers price based on: 2004 nickel price from USGS (2007) Mineral commodity summaries 2007. <http://minerals.usgs.gov/minerals/pubs/mcs/2007/mcs2007.pdf> [Accessed 25 May 2010]
  property carbon content 0
    carbon content on a dry matter basis (reserved; not for manual entry)
  property true value 2.91823
    allocation property applied in "true value" allocation // value calculated from revenue
  properties: water in wet mass 0 kg, wet mass 1 kg, carbon content, non-fossil 0, dry mass 1 kg, water content 0, carbon content, fossil 0, carbon allocation 0 kg
- silver: 0 kg; CPC 41310: Silver (including silver plated with gold or platinum), unwrought or in semi-manufactured forms, or in powder […]; By-product classification allocatable product; CAS 7440-22-4
  EcoSpold01Location=SE
  production volume 0.0023169 kg
  property price 178 EUR2005
    (same comment as for lead)
  property carbon content 0
    carbon content on a dry matter basis (reserved; not for manual entry)
  property true value 8.24818
    allocation property applied in "true value" allocation // value calculated from revenue
  properties: wet mass 1 kg, carbon content, non-fossil 0, dry mass 1 kg, water content 0, carbon content, fossil 0, water in wet mass 0 kg, carbon allocation 0 kg
- palladium: 0 kg; CPC 4160: Other non-ferrous metals and articles thereof (including waste and scrap of some metals); cermets and articles […]; By-product classification allocatable product
  EcoSpold01Location=SE
  production volume 0.000128256 kg
  property price 5640 EUR2005
    Temporary price data. Calculated as 90% of purchasers price based on: 2004 price from USGS (2007) Mineral commodity summaries 2007. <http://minerals.usgs.gov/minerals/pubs/mcs/2007/mcs2007.pdf> [Accessed 25 May 2010]
  property carbon content 0
    carbon content on a dry matter basis (reserved; not for manual entry)
  property true value 14.4673
    allocation property applied in "true value" allocation // value calculated from revenue
  properties: wet mass 1 kg, carbon content, fossil 0, water in wet mass 0 kg, water content 0, carbon content, non-fossil 0, dry mass 1 kg, carbon allocation 0 kg
- gold: 0 kg; CPC 41320: Gold (including gold plated with platinum), unwrought or in semi-manufactured forms, or in powder form; By-product classification allocatable product; CAS 7440-57-5
  EcoSpold01Location=SE
  production volume 7.0335e-5 kg
  property price 10600 EUR2005
    Temporary price data. Calculated as 90% of purchasers price based on: Source: ecoinvent v2 report 10-part IX, Tab 2.5
  property carbon content 0
    carbon content on a dry matter basis (reserved; not for manual entry)
  property true value 14.911
    allocation property applied in "true value" allocation // value calculated from revenue
  properties: wet mass 1 kg, carbon content, fossil 0, dry mass 1 kg, carbon content, non-fossil 0, water content 0, water in wet mass 0 kg, carbon allocation 0 kg
- iron scrap, sorted, pressed: 0 kg; By-product classification Recyclable; CPC 39310: Slag, dross, scalings and other waste from the manufacture of iron or steel; pedigree (1,1,1,1,1)
  Iron scrap recovered from this waste.
  production volume 0.00140174 kg
  property price 0.175 EUR2005
    Temporary price data. Calculated as 90% of purchasers price based on: 2005 import and export prices (total trades (USD) divided by total weight (kg) in biggest economies of the world: EU27, USA, Brasil, China, India, Japan and Russia) from UN Commodity Trade Statistics Database (http://data.un.org/Explorer.aspxDatabase [Accessed 2011.06.20]). Commodity: Waste or scrap, of cast iron
  property carbon content 0
    carbon content on a dry matter basis (reserved; not for manual entry)
  property true value 0.00490608
    allocation property applied in "true value" allocation // value calculated from revenue
  properties: water content 0, water in wet mass 0 kg, carbon content, fossil 0, dry mass 1 kg, carbon content, non-fossil 0, wet mass 1 kg, carbon allocation 0 kg

## Inputs from technosphere
- copper: 474.377 kg; lognormal variance with pedigree 0.078025, pedigree (4,4,5,2,3)
  Estimation based on few references
  Estimation based on few references
  properties: dry mass 1 kg, wet mass 1 kg
- heat, central or small-scale, other than natural gas: 5573.93 MJ; lognormal variance with pedigree 0.062, pedigree (3,4,5,1,3)
  Estimation based on specific energy demand of engineering hours
  Estimation based on specific energy demand of engineering hours
- wire drawing, copper: 474.377 kg; lognormal variance with pedigree 0.078025, pedigree (4,4,5,2,3)
  Based on material input
  Based on material input
- zinc coat, coils: 67.2034 m2; lognormal variance with pedigree 0.078025, pedigree (4,4,5,2,3)
  Based on material input
  Based on material input
- ammonia, liquid: 71.1565 kg; lognormal variance with pedigree 0.078025, pedigree (4,4,5,2,3)
  Estimation based on few references
  Estimation based on few references
  properties: dry mass 1 kg, wet mass 1 kg
- injection moulding: 39.5314 kg; lognormal variance with pedigree 0.078025, pedigree (4,4,5,2,3)
  Based on material input
  Based on material input
- steel, chromium steel 18/8, hot rolled: 474.377 kg; lognormal variance with pedigree 0.078025, pedigree (4,4,5,2,3)
  Estimation based on few references
  Estimation based on few references
  properties: wet mass 1 kg, carbon content, fossil 0.0008, dry mass 1 kg
  note on carbon content, fossil: Stainless steel model is the grade 304 steel (18/8 stainless, 18% chromium 8% nickel; max. 0.08% C)
- transport, passenger car: 1976.57 km; lognormal variance with pedigree 0.198, pedigree (4,4,5,1,3)
  Estimation
  Estimation
- building, multi-storey: 1.04758 m3; lognormal variance with pedigree 0.39, pedigree (4,4,5,5,3)
  Rough estimation based on company data of similar branch
  Rough estimation based on company data of similar branch
- sheet rolling, chromium steel: 474.377 kg; lognormal variance with pedigree 0.078025, pedigree (4,4,5,2,3)
  Based on material input
  Based on material input
- reinforcing steel: 3182.28 kg; lognormal variance with pedigree 0.078025, pedigree (4,4,5,2,3)
  Estimation based on few references
  Estimation based on few references
  properties: carbon content, fossil 0.004, dry mass 1 kg, wet mass 1 kg
- sheet rolling, steel: 3182.28 kg; lognormal variance with pedigree 0.078025, pedigree (4,4,5,2,3)
  Based on material input
  Based on material input
- electricity, low voltage: 790.628 kWh; lognormal variance with pedigree 0.062, pedigree (3,4,5,1,3)
  (same comment as for heat, central or small-scale, other than natural gas)
- electronics scrap from control units: -59.2971 kg; lognormal variance with pedigree 0.078025, pedigree (4,4,5,2,3)
  Disposal of electronic parts material
  Disposal of electronic parts material
  production volume 3 kg
    Calculated from the production volume of absorption chiller, 100kW in proportion to the respective output amounts.
  properties: dry mass 1 kg, carbon content, non-fossil 0.00013442, carbon content, fossil 0.337146, wet mass 1 kg
- sheet rolling, aluminium: 415.08 kg; lognormal variance with pedigree 0.078025, pedigree (4,4,5,2,3)
  Based on material input
  Based on material input
- waste mineral wool: -69.1799 kg; lognormal variance with pedigree 0.078025, pedigree (4,4,5,2,3)
  Disposal of heat insulation material
  Disposal of heat insulation material
  production volume 3.5 kg
    (same comment as for electronics scrap from control units)
  properties: wet mass 1 kg, dry mass 1 kg
- stone wool, packed: 69.1799 kg; lognormal variance with pedigree 0.078025, pedigree (4,4,5,2,3)
  Estimation for heat insulation
  Estimation for heat insulation
  properties: dry mass 1 kg, wet mass 1 kg, carbon content, fossil 0.015401
  note on carbon content, fossil: The chemical composition of the glass fibres used in the rock wool production is similar to the composition of naturally cooled volcano basalt and has a composition listed in Tab. 3.1 and 3.2 in ecoinvent v2.2 report 16, part XIV. Rock wool contains: a minimum of 96% mineral fibres,between 0.5 and 3.0 weight percent of phenolic resin depending on the specific product characteristics, and about 0.2 percent mineral oil (ecoinvent v2.2 report 16, part XIV). An average composition of 1.8% phenolic resin, 0.2% mineral oil, and 98% mineral fibres has been assumed and used to calculate C content of the rock wool
- waste polyethylene/polypropylene product: -128.477 kg; lognormal variance with pedigree 0.078025, pedigree (4,4,5,2,3)
  Disposal of plastic material
  Disposal of plastic material
  production volume 6.5 kg
    (same comment as for electronics scrap from control units)
  properties: dry mass 0.847 kg, water content 0.180638, wet mass 1 kg, carbon content, fossil 0.748045
  note on carbon content, fossil: Mixed various plastics was used to estimate the C content of this waste (Tab A.2, ecoinvent v2.2 report 13_I)
- water, completely softened: 622.62 kg; name water_softened_input; lognormal variance with pedigree 0.078025, pedigree (4,4,5,2,3)
  Estimation based on few references
  Estimation based on few references
  properties: wet mass 1 kg
- heat carrier liquid, 40% C3H8O2: -0.370607 m3; lognormal variance with pedigree 0.078025, pedigree (4,4,5,2,3)
  Disposal of insulation material
  Disposal of insulation material
  production volume 0.01875 m3
    (same comment as for electronics scrap from control units)
  properties: dry mass 6.31366 kg, wet mass 1000 kg, water content 157.387, carbon content, fossil 3, price 1.08656 EUR2005
  note on carbon content, fossil: The composition of the product was used to estimate its carbon content: 40% (w/v) C3H8O2.
- electronics, for control units: 59.2971 kg; lognormal variance with pedigree 0.078025, pedigree (4,4,5,2,3)
  Estimation for control electronic based on few references
  Estimation for control electronic based on few references
  properties: carbon content, fossil 0.337146, wet mass 1 kg, carbon content, non-fossil 0.00013442, dry mass 1 kg
  note on carbon content, fossil: The control unit has a composition of 46% steel (housing), 32% plastics, 14% printed wiring boards and 8% cables (various types).;
- wastewater, from residence: -5.90994 m3; lognormal variance with pedigree 0.140025, pedigree (4,4,5,2,4)
  Approximation for waste water treatment
  Approximation for waste water treatment
  production volume 0.299 m3
    (same comment as for electronics scrap from control units)
  properties: water content 2962.17, wet mass 1000 kg, carbon content, non-fossil 0.199421, dry mass 0.337476 kg
  note on carbon content, non-fossil: 0.0673 kg TOC/m3 (Tab A.17, ecoinvent v2.2 report 13_I). TOC was considered as Total Carbon.
- ethylene glycol: 148.243 kg; lognormal variance with pedigree 0.078025, pedigree (4,4,5,2,3)
  Estimation based on few references
  Estimation based on few references
  properties: dry mass 1 kg, wet mass 1 kg, carbon content, fossil 0.387097
- polyethylene, high density, granulate: 39.5314 kg; lognormal variance with pedigree 0.078025, pedigree (4,4,5,2,3)
  Estimation for plastic material based on few references
  Estimation for plastic material based on few references
  properties: dry mass 1 kg, carbon content, fossil 0.857143, wet mass 1 kg
  note on carbon content, fossil: Polyethylene is formed out of a huge amount of ethylene monomers (C2H4) (ecoinvent v2.2 report 11_II). MW=28 g/mol
- heat, district or industrial, natural gas: 891.927 MJ; lognormal variance with pedigree 0.122625, pedigree (2,4,5,2,4)
  Approximation with company data of similar branch
  Approximation with company data of similar branch
- aluminium, wrought alloy: 415.08 kg; lognormal variance with pedigree 0.078025, pedigree (4,4,5,2,3)
  Estimation based on few references
  Estimation based on few references
  properties: dry mass 1 kg, wet mass 1 kg
- electricity, medium voltage: 131.442 kWh; lognormal variance with pedigree 0.122625, pedigree (2,4,5,2,4)
  (same comment as for heat, district or industrial, natural gas)
- building, hall, steel construction: 0.174926 m2; lognormal variance with pedigree 0.39, pedigree (4,4,5,5,3)
  Rough estimation based on company data of similar branch
  This exchange has an activity link directly to the producing activity because the product is primarily consumed in the same geographical area where it is produced.
- tube insulation, elastomere: 88.9456 kg; lognormal variance with pedigree 0.078025, pedigree (4,4,5,2,3)
  Estimation based on few references
  Estimation based on few references
  properties: wet mass 1 kg, dry mass 1 kg, carbon content, fossil 0.837817
  note on carbon content, fossil: The main raw material (93%) is synthetic rubber (Ethylene propylene diene monomer (EPDM)), that is used together with PVC (ecoinvent v2.2 report 7_XV), C2H3Cl

## Inputs from nature
- Transformation, from unspecified [natural resource, land]: 0.627561 m2; lognormal variance with pedigree 0.2, pedigree (4,4,5,5,3)
  Rough estimation based on company data of similar branch
- Occupation, industrial area [natural resource, land]: 31.4275 m2*year; lognormal variance with pedigree 0.12, pedigree (4,4,5,5,3)
  Rough estimation based on company data of similar branch
- Water, unspecified natural origin [natural resource, in water]: 5.90994 m3; name water_UNO_input; lognormal variance with pedigree 0.122625, pedigree (2,4,5,2,4)
  Approximation with company data of similar branch
- Transformation, to industrial area [natural resource, land]: 0.627561 m2; lognormal variance with pedigree 0.2, pedigree (4,4,5,5,3)
  Rough estimation based on company data of similar branch

## Emissions to nature
- Water [air, unspecified]: 0.979885 m3; name water_to_air_unspecified; = (water_softened_input/1000*fraction_WCS_to_air)+(water_UNO_input*fraction_PW_to_air); lognormal variance with pedigree 0.0807, pedigree (2,2,5,1,1)
  Calculated value based on literature values and expert opinion. See comments in the parametres' comment field.
  property fraction, origin: unspecified 0.90469; name fraction_origin_unspecified
  property fraction, origin: salt water 0; name fraction_origin_salt_water
  property fraction, origin: fresh water 0.0953101; name fraction_origin_fresh_water

## Sampling procedure
Literature data and manufacturer information

## Review by Rolf Frischknecht 2007-09-25
passed
none
