# energy and auxilliary inputs, metal working machine, with process heat from light fuel oil

Dataset: EcoSpold 2, unit process
Geography: RER
Time period: 2006-01-01 to 2019-12-31
Technology level: current
Classification: ISIC rev.4 ecoinvent: 25:Manufacture of fabricated metal products, except machinery and equipment
Classification: EcoSpold01Categories: metals/general manufacturing
Tags: ConvertedDataset
Scenario: Business-as-Usual
System model: Allocation at the point of substitution
Share of production covered: 0 %
Generated by: Roland Steiner
Published in: Steiner, R. 2007
Database: ecoinvent
isCopyrightProtected: true
accessRestrictedTo: 1

## General comment
1 kg of this process is needed to produce 1 kg of final product. The data is an estimation based on the average consumption of factories separated into process specific (included here) and ancillary processes (included in metal working factory operation).
[This dataset was already contained in the ecoinvent database version 2. It was not individually updated during the transfer to ecoinvent version 3. Life Cycle Impact Assessment results may still have changed, as they are affected by changes in the supply chain, i.e. in other datasets. This dataset was generated following the ecoinvent quality guidelines for version 2. It may have been subject to central changes described in the ecoinvent version 3 change report (http://www.ecoinvent.org/database/ecoinvent-version-3/reports-of-changes/), and the results of the central updates were reviewed extensively. The changes added e.g. consistent water flows and other information throughout the database. The documentation of this dataset can be found in the ecoinvent reports of version 2, which are still available via the ecoinvent website. The change report linked above covers all central changes that were made during the conversion process.]

## Included activities end
This dataset includes the materials, energies and emissions related to the machines used for machining metal products. This is mainly electricity, compressed air and solvents. Process heat is from light fuel oil.

## Geography
Average data from several local to global sized companies. The main focus is on Germany and Europe.

## Technology
The companies are expected to cover the whole range of metal working.

## Reference product
- energy and auxilliary inputs, metal working machine: 1 kg; By-product classification allocatable product; CPC 4421: Machine-tools for working metal; machine-tools for working any material by laser or similar process
  EcoSpold01Location=RER
  production volume 6.6912e10 kg
    Unknown
    Share of fuel type from ecoinvent v2 report 23; total metal consumption in Europe estimated at 2E11 kg; 60% assumed to be machined in metal products, machinery or transport equipment industries
  property price 0.17795 EUR2005
    Calculated based on inputs: The price of the product has been calculated as a sum of the values of the material and energy inputs for this product. This value is therefore a rough estimation. It may underestimate the real price since there are additional expenses when producing any product. These expences can include for example labour costs, treatment of waste materials and profit for the producer. Please consider carefully whether this level of data quality is acceptable for your application.

## Inputs from technosphere
- solvent, organic: 0.0014 kg; lognormal variance with pedigree 0.0586, pedigree (1,3,5,1,3)
  Average of 8 companies
  EcoSpold01Location=GLO
  Uncertainty: average of 8 companies
  properties: dry mass 1 kg, wet mass 1 kg, carbon content, fossil 0.63072
  note on carbon content, fossil: Mixture of 15 of the most often used solvents (list in ecoinvent v2.2 report 11-III, pg 293). C content was calculated as an unweighted average of C content of the different solvents
- waste mineral oil: 0 kg; pedigree (1,1,1,1,1)
  Assumption for disposal route
  EcoSpold01Location=CH
  Uncertainty: assumption for disposal route
  production volume 0 kg
    Calculated from the production volume of energy and auxilliary inputs, metal working machine in proportion to the respective output amounts.
  properties: dry mass 0.9 kg, water content 0.111111, carbon content, fossil 0.864444, wet mass 1 kg
  note on carbon content, fossil: Tab A.6, ecoinvent v2.2 report 13_I. C content has been calculated after data in the tables, and then referred to 1 kg DM
- electricity, low voltage: 1.15 kWh; lognormal variance with pedigree 0.0586, pedigree (1,3,5,1,3)
  Average of 8 companies
  EcoSpold01Location=UCTE
  Uncertainty: average of 8 companies
- heat, district or industrial, other than natural gas: 4.4365 MJ; lognormal variance with pedigree 0.0586, pedigree (1,3,5,1,3)
  Average of 8 companies
  EcoSpold01Location=RER
  Uncertainty: average of 8 companies
- lubricating oil: 0.000867 kg; lognormal variance with pedigree 0.0586, pedigree (1,3,5,1,3)
  Average of 8 companies
  EcoSpold01Location=RER
  Uncertainty: average of 8 companies
  properties: wet mass 1 kg, carbon content, fossil 0.75, dry mass 1 kg
  note on carbon content, fossil: Lubricating oil is produced from diesel. C-content/dry mass of fats and oils considered 75%, from: ecoinvent v2.2 report, n 15a, pg 40
- compressed air, 700 kPa gauge: 0.291 m3; lognormal variance with pedigree 0.0586, pedigree (1,3,5,1,3)
  Average of 8 companies
  EcoSpold01Location=RER
  Uncertainty: average of 8 companies
- waste mineral oil: -0.000847392, -1.96078e-5 kg (2 entries); lognormal variance with pedigree 0.0766, pedigree (4,3,5,1,3)
  (same comment as for waste mineral oil)
  production volume 5.80127e7 kg

## Emissions to nature
- Ethene, tetrachloro- [air, urban air close to ground]: 7.51e-5 kg; lognormal variance with pedigree 0.0986, pedigree (1,3,5,1,3)
  Average of 8 companies
  Uncertainty: average of 8 companies
- Hydrocarbons, aliphatic, alkanes, unspecified [air, urban air close to ground]: 0.000558 kg; lognormal variance with pedigree 0.0986, pedigree (1,3,5,1,3)
  Average of 8 companies
  Uncertainty: average of 8 companies
- Water [air, urban air close to ground]: 0.00112 m3; lognormal variance with pedigree 0.0986, pedigree (1,3,5,1,3)
  Average of 8 companies
  Uncertainty: average of 8 companies

## Extrapolations
This dataset has been extrapolated from year 2007 to the year of the calculation (2019). The uncertainty has been adjusted accordingly.

## Review by Sébastien Humbert 2007-09-05
passed
none
