# concrete production, 25MPa, ready-mix, with cement blast furnace slag 6-34%

Dataset: EcoSpold 2, unit process
Geography: RoW
Time period: 2015-10-25 to 2019-10-25
Technology level: current
Classification: ISIC rev.4 ecoinvent: 2395:Manufacture of articles of concrete, cement and plaster
Classification: EcoSpold01Categories: construction materials/concrete
Synonyms: ready-mix concrete; ready mixed concrete
Scenario: Business-as-Usual
System model: Allocation at the point of substitution
Generated by: [System]
Published in: Silva, F. B. 2017
Database: ecoinvent
isCopyrightProtected: true
accessRestrictedTo: 1

## General comment
This dataset is a copy of the corresponding BR dataset. The dataset is therefore not representative of the GLO geography. The production volume is set equal to the BR datast in order for the RoW not to be created.

## Included activities start
From reception of raw materials at the ready-mix plant gate.

## Included activities end
This activity ends before the delivery of concrete at the construction site.
The dataset includes the whole manufacturing processes to produce ready-mixed concrete, internal processes (material handling and mixing) and infrastructure. Water used for cleaning the truck and waste water were also accounted for.

## Geography
Brazilian data. For some exchanges GLO values have been used as proxy. Data quality indicators adjusted accordingly.

## Technology
Typical technology for average Brazilian production.

## Time period
Literature data are from 2015 and mix designs were provided in 2017

## Parameters
- losses: 0.038 dimensionless; lognormal variance with pedigree 0, pedigree (1,1,1,1,1)
  Literature value. Losses due to returned concrete from construction sites.

## Reference product
- concrete, 25MPa: 1 m3; name ref; By-product classification allocatable product; CPC 37510: Non-refractory mortars and concretes
  25 MPa concrete is intended for building structures in general, not expposed to freeze-thaw, including residential, commercial and industrial uses.
  production volume 1.08195e7 m3; name PV
    The global production volume was calculated as follows:
    1) The total production volume of each country was calculated
    2) The production volume was scaled based construction output (*)
    3) The average of the results was assumed to be the GLO PV
    4) The share of each different technology per country was calculated
    5) The weighted average of the shares for each country was used to split the GLO PV into different technologies
    (*)
    Construction output assumed per country
    Country Share
    ZA 0.50%
    BR 2.01%
    CH 0.36%
    CO 0.58%
    IN 9.67%
    PE 0.31%
    CA-QC 0.37%
    RNA without CA-QC 9.03%
    Source:
    OECD. 2018. Input-Output Tables. http://www.oecd.org/trade/input-outputtables.htm.
    United Nations Statistics Division. 2019. UN data. A world of information. http://data.un.org/.
    Timmer, M.P., E. Dietzenbacher, B. Los, R. Stehrer, and G.J. de Vries. 2015. An Illustrated User Guide to the World Input-Output Database: the Case of Global Automotive Production. Review of International Economics 23(3): 575-605. http://doi.wiley.com/10.1111/roie.12178.
    The data was adjusted based on PPP, data from:
    The World Bank. 2019. World Bank Open Data. https://data.worldbank.org/
  property sand content 472 kg; name sand
  property gravel content 1509 kg; name gravel
  property price 185 EUR2005; name ref_price_EUR2005
    Estimated to be the same price as in case of concrete, normal (Data are not easily available. Therefore, an average price of products supplied by the activities in the same ISIC 3 code has been applied.This price is obtained as '_49 Concrete, asphalt and other mineral products, EU27 virgin, EU27' in the 'EU & DK Input Output Database' (available in SimaPro). The price is assumed to be valid for both RER2003, RER 2004, world 2003 and world 2004. Multiplied by density.).
  property cement content 234 kg; name cement
  property wet mass 2390 kg; name concrete_density
  property carbon content 0
    carbon content on a dry matter basis (reserved; not for manual entry)
  property true value 185; name ref_true_value
    allocation property applied in "true value" allocation // value calculated from revenue
  properties: water content 0.0523998, water in wet mass 119 kg, carbon content, fossil 0, dry mass 2271 kg, carbon content, non-fossil 0, carbon allocation 0 kg

## By-products
- electricity, for reuse in municipal waste incineration only: 0 kWh; CPC 17100: Electrical energy; By-product classification allocatable product; pedigree (1,1,1,1,1)
  Net electricity generated from this waste and used in internal MSWI plant energy redistribution.
  Uncertainty: uncertainty is calculated from uncertainties in waste composition and uncertainties in energy efficiency and the uncertainty in internal energy demand
  production volume 714089 kWh
  property exergy 3.6 MJ; name E_el_prod_MSWI_exergy
    This exergy property is based on the exergy content of the product.
  property true value relation 3.6; name E_el_prod_MSWI_true_value_relation
    property to calculate "true value" from
  property price 0.1 EUR2005; name E_el_prod_MSWI_price_EUR2005
    Estimated to be the same price as in case of electricity, medium voltage.
  property true value 0.00448125
    allocation property applied in "true value" allocation // value calculated from true value relation
- heat, for reuse in municipal waste incineration only: 0 MJ; CPC 17300: Steam and hot water; By-product classification allocatable product; pedigree (1,1,1,1,1)
  Net useful heat generated from this waste and used in internal MSWI plant energy redistribution.
  Uncertainty: uncertainty is calculated from uncertainties in waste composition and uncertainties in energy efficiency and the uncertainty in internal energy demand
  production volume 5.02922e6 MJ
  property true value relation 0.1842; name E_th_prod_MSWI_true_value_relation
    property to calculate "true value" from
  property exergy 0.1842 MJ; name E_th_prod_MSWI_exergy
    This exergy property is based on the exergy content of the product.
  property price 0.0106 EUR2005; name E_th_prod_MSWI_price_EUR2005
    Average European district heat price from Ecoheatcool and Euroheat 2005-2006, Ecoheat Work package 1: The European heat market. Final report. 10.6 EUR/GJ i s the price of district heat. http://www.solarthermalworld.org/files/Ecoheatcool%20WP1%20Web.pdf?download
  property true value 0.00161817
    (same comment as for electricity, for reuse in municipal waste incineration only)
- zinc concentrate: 0 kg; CPC 14290: Other non-ferrous metal ores and concentrates (other than uranium or thorium ores and concentrates); By-product classification allocatable product
  Calculated value from the knowledge of the properties of both products.
  production volume 464.764 kg
  property price 0.38 EUR2005; name ByP_price_EUR2005
    Temporary price data. Calculated as 90% of purchasers price based on: Zinc content in concentrate 53%. Concentrate price per kg Zn 86.5% of refined Zn price (13.5% treatment charges according to CHR Metals Limited 2005: Dynamic cost curves. http://www.minecost.com/dynamic.pdf). 2004 zinc price from USGS (2007) Mineral commodity summaries 2007. <http://minerals.usgs.gov/minerals/pubs/mcs/2007/mcs2007.pdf> [Accessed 25 May 2010]
  property zinc content 0.53; name zinc_C_zinc_concentrate
    Zinc content on a dry matter basis. Value taken from teh "zinc mine operation" /GLO dataset.
  property dry mass 1 kg; name DM_zinc_concentrate
  property carbon content 0
    carbon content on a dry matter basis (reserved; not for manual entry)
  property true value 9.10004e-7
    allocation property applied in "true value" allocation // value calculated from revenue
  properties: wet mass 1 kg, water content 0, carbon content, non-fossil 0, carbon content, fossil 0, water in wet mass 0 kg, carbon allocation 0 kg
- iron scrap, sorted, pressed: 0 kg; By-product classification Recyclable; CPC 39310: Slag, dross, scalings and other waste from the manufacture of iron or steel; pedigree (1,1,1,1,1)
  Iron scrap recovered from this waste.
  Uncertainty: uncertainty calculated from uncertainty in waste composition, uncertainty of share of recyclable metal, uncertainty of transfer coefficient to bottom ash, uncertainty of the efficiency of scrap removal in MSWI plant.
  production volume 28588.6 kg
  property price 0.175 EUR2005
    Temporary price data. Calculated as 90% of purchasers price based on: 2005 import and export prices (total trades (USD) divided by total weight (kg) in biggest economies of the world: EU27, USA, Brasil, China, India, Japan and Russia) from UN Commodity Trade Statistics Database (http://data.un.org/Explorer.aspxDatabase [Accessed 2011.06.20]). Commodity: Waste or scrap, of cast iron
  property carbon content 0
    carbon content on a dry matter basis (reserved; not for manual entry)
  property true value 1.27971e-5
    allocation property applied in "true value" allocation // value calculated from revenue
  properties: wet mass 1 kg, water in wet mass 0 kg, carbon content, non-fossil 0, carbon content, fossil 0, dry mass 1 kg, water content 0, carbon allocation 0 kg

## Inputs from technosphere
- lubricating oil: 0.0498984 kg; name lub_oil; lognormal variance with pedigree 0.2994, pedigree (2,3,2,5,1)
  EcoSpold01Location=RER
  Calculated value. Weighted average amount from 34 concrete plants,
  Uncertainty: Variance of logtransformed data calculated based on the sample's coefficient of variation.
  properties: wet mass 1 kg, dry mass 1 kg
- concrete mixing factory: 4.56985e-7 unit; source Kellenberger D. 2007; lognormal variance with pedigree 0.3326, pedigree (2,5,3,5,1)
  EcoSpold01Location=CH
  Literature value. From ecoinvent dataset "concrete production, 25 MPa, RNA only, GLO, 2006-2006" Access date 10.10.2017
  Uncertainty: Basic uncertainty from original dataset, completeness score adjusted
- cement, blast furnace slag 6-34%: 242.884 kg; lognormal variance with pedigree 0.0044, pedigree (2,3,2,5,1)
  Calculated value, Weighted average from 17 concrete mix designs. Losses considered.
  Uncertainty: Variance of logtransformed data calculated based on the sample's coefficient of variation.
  properties: dry mass 1 kg, wet mass 1 kg
- steel, low-alloyed, hot rolled: 0.0237992 kg; name steel; source Kellenberger D. 2007; lognormal variance with pedigree 0.0226, pedigree (2,5,3,5,1)
  EcoSpold01Location=RER
  Literature value. From ecoinvent dataset "concrete production, 25 MPa, RNA only, GLO, 2006-2006l". Access date: 10.10.2017.
  Uncertainty: Basic uncertainty from original dataset, completeness score adjusted
  properties: dry mass 1 kg, wet mass 1 kg
- scrap steel: 0 kg; name scrap; pedigree (1,1,1,1,1)
  Literature value. From ecoinvent dataset "concrete production, 25 MPa, RNA only, GLO, 2006-2006l". Access date: 10.10.2017.
  Uncertainty: Basic uncertainty from original dataset, completeness score adjusted
  production volume 0 kg
    Calculated based on the relationship with the reference product.
  property price 0 EUR2005; name scrap_price_EUR2005
  properties: dry mass 1 kg, wet mass 1 kg
- tap water: 0 kg; pedigree (1,1,1,1,1)
  Calculated value. Water for concrete mix. Includes water from aggregates. Weighted average from 17 concrete mix designs. Losses considered.
  EcoSpold01Location=CH
  Uncertainty: Variance of logtransformed data calculated based on the sample's coefficient of variation.
  properties: wet mass 1 kg
- gravel, crushed: 0 kg; pedigree (1,1,1,1,1)
  Calculated value = amount of artificial sand (crushed gravel is used as a proxy in this case) + amount of gravel, Weighted average from 17 concrete mix designs. Losses considered.
  Uncertainty: Variance of logtransformed data calculated based on the sample's coefficient of variation.
  properties: dry mass 1 kg, wet mass 1 kg
- electricity, medium voltage: 0 kWh; pedigree (1,1,1,1,1)
  Calculated value, Weighted average amount from 29 concrete plants.
  EcoSpold01Location=CH
  Uncertainty: Variance of logtransformed data calculated based on the sample's coefficient of variation.
- waste mineral oil: 0 kg; name oil; pedigree (1,1,1,1,1)
  Calculated value.
  Uncertainty: Variance of logtransformed data calculated based on the sample's coefficient of variation.
  production volume 0 kg
    Calculated based on the relationship with the reference product.
  property price 0 EUR2005; name oil_price_EUR2005
  properties: carbon content, fossil 0.864444, dry mass 0.9 kg, wet mass 1 kg, water content 0.111111
  note on carbon content, fossil: Tab A.6, ecoinvent v2.2 report 13_I. C content has been calculated after data in the tables, and then referred to 1 kg DM
- wastewater from concrete production: -0.160995 m3; name wastewater; lognormal variance with pedigree 0.3704, pedigree (2,3,2,5,1)
  Calculated value. Based on weighted average amount from 26 concrete plants, referring to water used for washing the concrete trucks and the internal circulation area in the ready-mix facility.
  EcoSpold01Location=CH
  Uncertainty: Variance of logtransformed data calculated based on the sample's coefficient of variation.
  production volume 1.74194e6 m3; = wastewater*PV/abs(ref)
    Calculated based on the relationship with the reference product.
  property price 0 EUR2005; name wastewater_price_EUR2005
  property dry mass 0.44914 kg; name was_water_DM
  properties: water content 2225.48, carbon content, fossil 0.027074, wet mass 1000 kg
- synthetic rubber: 0.0344989 kg; name rub; lognormal variance with pedigree 0.7234, pedigree (2,3,2,5,1)
  Calculated value. Weighted average amount from 34 concrete plants
  EcoSpold01Location=RER
  Uncertainty: Variance of logtransformed data calculated based on the sample's coefficient of variation.
  properties: wet mass 1 kg, dry mass 1 kg
- chemical, organic: 1.88391 kg; lognormal variance with pedigree 0.0054, pedigree (2,3,2,5,1)
  Calculated value. Value for polyfunctional admixture. Weighted average from 17 concrete mix designs. Losses considered.
  Uncertainty: Variance of logtransformed data calculated based on the sample's coefficient of variation.
  properties: dry mass 1 kg, bulk density 1140 kg/m3, wet mass 1 kg
- waste rubber, unspecified: 0 kg; name rubber; pedigree (1,1,1,1,1)
  (same comment as for waste mineral oil)
  production volume 0 kg
    Calculated based on the relationship with the reference product.
  property price 0 EUR2005; name rubber_price_EUR2005
  properties: dry mass 1 kg, wet mass 1 kg, carbon content, fossil 0.853
- sand: 0 kg; pedigree (1,1,1,1,1)
  (same comment as for cement, blast furnace slag 6-34%)
  properties: wet mass 1 kg, dry mass 1 kg
- waste concrete: 0 kg; name was_concrete; source Alessandra Castro 2015; pedigree (1,1,1,1,1)
  Literature value.
  Uncertainty: Value for variance extrapolated from table 10.3 of ecoinvent data quality guidelines
  production volume 0 kg
    Calculated based on the relationship with the reference product.
  property price 0 EUR2005; name was_concrete_price_EUR2005
  property carbon content, fossil 0; name was_concrete_C_content_fossil
  properties: dry mass 0.9499 kg, water content 0.0527424, wet mass 1 kg
- diesel, burned in building machine: 5.00983 MJ; source Alessandra Castro 2015; lognormal variance with pedigree 0.0054, pedigree (2,4,2,5,1)
  Literature value. Diesel used in internal transportation equipment.
  Uncertainty: Value for variance extrapolated from table 10.3 of ecoinvent data quality guidelines
  property net heating value 42.8 MJ/kg; name NHV_diesel
  property density 0.84 kg/l; name density_diesel
- scrap steel: -3.00501e-5, -0.0237692 kg (2 entries); lognormal variance with pedigree 0.0226, pedigree (2,5,3,5,1)
  (same comment as for scrap steel)
  production volume 257504 kg
- tap water: 0.204886, 72.9615, 0.338608, 8.53836, 0.222123, 0.631826, 97.7087 kg (7 entries); lognormal variance with pedigree 0.0044, pedigree (2,3,2,5,1)
  (same comment as for tap water)
- gravel, crushed: 322.303, 0.42554, 6.44538, 1237.12 kg (4 entries); lognormal variance with pedigree 0.0174, pedigree (2,3,2,5,1)
  (same comment as for gravel, crushed)
- electricity, medium voltage: 0.0337027, 0.00613247, 0.141555, 0.103997, 1.50785, 0.489606, 0.707056 kWh (7 entries); lognormal variance with pedigree 0.2374, pedigree (2,3,2,5,1)
  (same comment as for electricity, medium voltage)
- waste mineral oil: -0.00112848, -0.0487699 kg (2 entries); lognormal variance with pedigree 0.2994, pedigree (2,3,2,5,1)
  (same comment as for waste mineral oil)
  production volume 539893 kg
- waste rubber, unspecified: -0.00138991, -0.033109 kg (2 entries); lognormal variance with pedigree 0.7234, pedigree (2,3,2,5,1)
  (same comment as for waste mineral oil)
  production volume 373273 kg
- sand: 0.0390739, 0.090116, 489.791 kg (3 entries); lognormal variance with pedigree 0.0824, pedigree (2,3,2,5,1)
  (same comment as for cement, blast furnace slag 6-34%)
- waste concrete: -0.319962, -90.497 kg (2 entries); source Alessandra Castro 2015; lognormal variance with pedigree 0.0054, pedigree (2,4,2,5,1)
  (same comment as for waste concrete)
  production volume 9.82627e8 kg

## Inputs from nature
- Water, unspecified natural origin [natural resource, in water]: 0.160995 m3; name was_water; lognormal variance with pedigree 0.3704, pedigree (2,3,2,5,1)
  Calculated value. Weighted average amount from 26 concrete plants. Water used for washing the concrete trucks and the internal circulation area in the ready-mix facility.
  Uncertainty: Variance of logtransformed data calculated based on the sample's coefficient of variation.

## Sampling procedure
Data on concrete mixes are a weighted average of 17 concrete ready mix facilities, of 2 different companies. For other flows, the weighted average was calculated from several different concrete plants (26 for process water, 34 for rubber parts and lubricating oil, 29 for electricity), belonging to one of the 7 concrete making companies that provided data. Basic uncertainty was calculated from the coefficient of variation of the sample.
Diesel consumption and waste generation values were taken from a published paper. For other materials used for maintenance (steel parts) and infrastructure, data were extrapolated from the dataset "concrete production, 25 MPa, RNA only, GLO, 2006-2009" (accessed 10.10.2017).
No conversion to the geometric mean of the lognormal distribution was done, for consistency reasons with other ecoinvent datasets.

Representativeness is of 3,33% based on the number of companies that provided concrete mix data (2) divided by the total number of ready-mix concrete production companies in Brazil (60), which is the number of respondant companies in the national survey carried out by ABCP in 2013.

## Extrapolations
Data from a relatively small sample concentrated mostly in the Southeastern region of Brazil, with some facilities spread out in the South, Northeast and Center-west regions, are used to represent the Brazilian concrete production. Some flows have been kept as in the dataset "concrete production, 25 MPa, RNA only, GLO, 2006-2006", but uncertainties were adjusted accordingly. This dataset is a copy of the corresponding BR dataset. The production volume is set equal to the BR datast in order for the RoW not to be created. This dataset is a copy of the corresponding BR dataset.
