# steam generation system construction, solar tower power plant, 20 MW

Dataset: EcoSpold 2, unit process
Geography: RoW
Time period: 2010-01-01 to 2020-01-01
Technology level: current
Classification: ISIC rev.4 ecoinvent: 4220a: Construction of utility projects for electricity production, except for liquid fuels
Tags: CSP; Concentrated Solar Power
Scenario: Business-as-Usual
System model: Allocation at the point of substitution
Generated by: Karin Treyer
Published in: Telsnig, Thomas 2015
Database: ecoinvent
isCopyrightProtected: true
accessRestrictedTo: 1

## General comment
This activity represents the construction of various heat exchangers used in the steam generator to generate process steam in Upington, South Africa. The heat exchanger surfaces for the preheater, superheater, intermediate superheater and evaporator are calculated over their total area and the average pipe diameter.
In the final system, hot salt is pumped to the steam generating system when power is needed from the plant. These hot salts produce superheated steam for a conventional Rankine-cycle turbine generator system.
This dataset is entirely based on the detailed life cycle inventory as presented in the dissertation report by
Telsnig, Thomas. 2015. Standortabhängige Analyse und Bewertung solarthermischer Kraftwerke am Beispiel Südafrikas. Forschungsbericht. Band 123. ISSN 0938-1228. Institut für Energiewirtschaft und Rationelle Energieanwendung, Universität Stuttgart, Germany.

## Included activities start
This activity starts with the manufacturing of the heat exchangers and the steam generating system.

## Included activities end
The activity concludes with the decommissioning of the plant with the construction materials sent for recycling and disposal according to their treatment methods.

## Geography
This dataset has been extrapolated from a dataset modelled for the location Upington, South Africa. Uncertainty has not been adjusted as it is assumed that the modelled 20 MW solar tower power plant would be very similar in other parts of the world.

## Technology
Extended shaft turbine pump, 1 stage,stainless steel 11300gpm, 2725lbm/sec, 200ft total developed head 1250 bhp motor variable speed drive

## Reference product
- steam generation system, solar tower power plant, 20 MW: 1 unit; CPC 53262: Power plants; By-product classification allocatable product; pedigree (1,1,1,1,1)
  Reference product unit used fpr constructing a stea, generation system for a 20MW solar tower plant
  production volume 1 unit
    Data about concentrating solar power plants in operation, construction and development globally are available from SolarPACES (https://solarpaces.nrel.gov/, accessed April 2019). On average 2 solar tower concentrating solar power plants per year went in operation worldwide between 2010 and 2019. This includes plants with an installed capacity other than 20MW and is used as approximate annual production volume for this dataset.
  property lifetime 30 year
    The economic lifetime of the plant is assumed to be 30 years.
  property price 298523 EUR2005
    Calculated based on inputs: The price of the product has been calculated as a sum of the values of the material and energy inputs for this product. This value is therefore a rough estimation. It may underestimate the real price since there are additional expenses when producing any product. These expences can include for example labour costs, treatment of waste materials and profit for the producer. Please consider carefully whether this level of data quality is acceptable for your application. No investment cost available for this component of a solar tower plant in Telsnig (2015). Telsnig, Thomas. 2015. Standortabhängige Analyse und Bewertung solarthermischer Kraftwerke am Beispiel Südafrikas. Forschungsbericht. Band 123. ISSN 0938-1228. Institut für Energiewirtschaft und Rationelle Energieanwendung, Universität Stuttgart, Germany.)
  property true value 298523
    allocation property applied in "true value" allocation // value calculated from revenue

## By-products
- electricity, for reuse in municipal waste incineration only: 0 kWh; CPC 17100: Electrical energy; By-product classification allocatable product; pedigree (1,1,1,1,1)
  Net electricity generated from this waste and used in internal MSWI plant energy redistribution.
  Uncertainty: uncertainty is calculated from uncertainties in waste composition and uncertainties in energy efficiency and the uncertainty in internal energy demand
  production volume 3.1176 kWh
  property exergy 3.6 MJ; name E_el_prod_MSWI_exergy
    This exergy property is based on the exergy content of the product.
  property true value relation 3.6; name E_el_prod_MSWI_true_value_relation
    property to calculate "true value" from
  property price 0.1 EUR2005; name E_el_prod_MSWI_price_EUR2005
    Estimated to be the same price as in case of electricity, medium voltage.
  property true value 0.328283
    allocation property applied in "true value" allocation // value calculated from true value relation
- heat, for reuse in municipal waste incineration only: 0 MJ; CPC 17300: Steam and hot water; By-product classification allocatable product; pedigree (1,1,1,1,1)
  Net useful heat generated from this waste and used in internal MSWI plant energy redistribution.
  Uncertainty: uncertainty is calculated from uncertainties in waste composition and uncertainties in energy efficiency and the uncertainty in internal energy demand
  production volume 23.1053 MJ
  property true value relation 0.1842; name E_th_prod_MSWI_true_value_relation
    property to calculate "true value" from
  property exergy 0.1842 MJ; name E_th_prod_MSWI_exergy
    This exergy property is based on the exergy content of the product.
  property price 0.0106 EUR2005; name E_th_prod_MSWI_price_EUR2005
    Average European district heat price from Ecoheatcool and Euroheat 2005-2006, Ecoheat Work package 1: The European heat market. Final report. 10.6 EUR/GJ i s the price of district heat. http://www.solarthermalworld.org/files/Ecoheatcool%20WP1%20Web.pdf?download
  property true value 0.124465
    (same comment as for electricity, for reuse in municipal waste incineration only)
- zinc concentrate: 0 kg; CPC 14290: Other non-ferrous metal ores and concentrates (other than uranium or thorium ores and concentrates); By-product classification allocatable product
  Calculated value from the knowledge of the properties of both products.
  production volume 0.000639892 kg
  property price 0.38 EUR2005; name ByP_price_EUR2005
    Temporary price data. Calculated as 90% of purchasers price based on: Zinc content in concentrate 53%. Concentrate price per kg Zn 86.5% of refined Zn price (13.5% treatment charges according to CHR Metals Limited 2005: Dynamic cost curves. http://www.minecost.com/dynamic.pdf). 2004 zinc price from USGS (2007) Mineral commodity summaries 2007. <http://minerals.usgs.gov/minerals/pubs/mcs/2007/mcs2007.pdf> [Accessed 25 May 2010]
  property zinc content 0.53; name zinc_C_zinc_concentrate
    Zinc content on a dry matter basis. Value taken from teh "zinc mine operation" /GLO dataset.
  property dry mass 1 kg; name DM_zinc_concentrate
  property carbon content 0
    carbon content on a dry matter basis (reserved; not for manual entry)
  property true value 1.4663e-5
    allocation property applied in "true value" allocation // value calculated from revenue
  properties: wet mass 1 kg, water content 0, carbon content, non-fossil 0, carbon content, fossil 0, water in wet mass 0 kg, carbon allocation 0 kg
- iron scrap, sorted, pressed: 0 kg; By-product classification Recyclable; CPC 39310: Slag, dross, scalings and other waste from the manufacture of iron or steel; pedigree (1,1,1,1,1)
  Iron scrap recovered from this waste.
  Uncertainty: uncertainty calculated from uncertainty in waste composition, uncertainty of share of recyclable metal, uncertainty of transfer coefficient to bottom ash, uncertainty of the efficiency of scrap removal in MSWI plant.
  production volume 4699.85 kg
  property price 0.175 EUR2005
    Temporary price data. Calculated as 90% of purchasers price based on: 2005 import and export prices (total trades (USD) divided by total weight (kg) in biggest economies of the world: EU27, USA, Brasil, China, India, Japan and Russia) from UN Commodity Trade Statistics Database (http://data.un.org/Explorer.aspxDatabase [Accessed 2011.06.20]). Commodity: Waste or scrap, of cast iron
  property carbon content 0
    carbon content on a dry matter basis (reserved; not for manual entry)
  property true value 11.1457
    allocation property applied in "true value" allocation // value calculated from revenue
  properties: wet mass 1 kg, water in wet mass 0 kg, carbon content, non-fossil 0, carbon content, fossil 0, dry mass 1 kg, water content 0, carbon allocation 0 kg
- copper: 0 kg; source Rentz O. 1999; By-product classification allocatable product; CPC 41413: Refined copper and copper alloys, unwrought; master alloys of copper
  Literature value. Copper uses: Before end-use copper is manufactured into semi fabricated products, such as shapes and ingots (known as 'semis'). These manufacturing processes are subdivided into hot working, cold working and, if necessary, process annealing. Few of the semis are ready for use as such. They more typically travel to first-stage manufacturers, who make metal rods, wire, and casting, and then to component manufacturers who produce such things as motors, valves, and insulated cables The components in turn are incorporated by final-stage manufacturers into a variety of finished products - automobiles, commercial buildings, residential housing, and so forth. These uses account for about 79% of the world-wide consumption of copper.
  production volume 37.8626 kg
  properties: dry mass 1 kg, water in wet mass 0 kg, wet mass 1 kg, carbon content, non-fossil 0, water content 0, price 5.52 EUR2005, carbon content, fossil 0, carbon content 0, carbon allocation 0 kg, true value 104.501

## Inputs from technosphere
- wire drawing, copper: 79.9689 kg; lognormal variance with pedigree 0.0137, pedigree (4,4,3,3,2)
  Process used to draw wires for field wiring, cables etc from available copper
- steel, low-alloyed: 1090.58 kg; name lowsteel; lognormal variance with pedigree 0.0137, pedigree (4,4,3,3,2)
  Material composition of boilers recircopperlation pumps etc
  properties: carbon content, fossil 0.005, dry mass 1 kg, wet mass 1 kg
- waste concrete: 0 kg; pedigree (1,1,1,1,1)
  Disposal of concrete. The density is assumed to be 2200kg/m3.
  production volume 0 kg
    Calculated from production volume of reference product using the relative outputs.
  properties: dry mass 0.5 kg, wet mass 1 kg, water content 1
- concrete, normal: 0 m3; name concrete; pedigree (1,1,1,1,1)
  Concrete used for embeding metals in steam generator heat exchangers, nitrate salt heaters
  properties: wet mass 2380 kg, water content 0.086758, dry mass 2190 kg
- expanded perlite: 40258.3 kg; name expandedperilite; lognormal variance with pedigree 0.0137, pedigree (4,4,3,3,2)
  Insulation
  properties: dry mass 1 kg, wet mass 1 kg
- hazardous waste, for incineration: 0 kg; pedigree (1,1,1,1,1)
  Disposal of the oil used for the initial filling and during operation of the pumps and transformers. Calculated based on the environmental product declarations for pumps as provided by Sulzer and for transformers as provided by ABB.
  Sulzer EPDs: https://www.sulzer.com/en/shared/about-us/2017/08/10/13/22/environmental-product-declarations (accessed May 2019)
  ABB library: https://library.abb.com/en/ (accessed May 2019)
  production volume 0 kg
    Calculated from production volume of reference product using the relative outputs.
  properties: dry mass 0.75 kg, water content 0.333333, carbon content, fossil 0.554667, wet mass 1 kg
  note on carbon content, fossil: Tab A.6, ecoinvent v2.2 report 13_I. C content has been calculated after data in the tables, and then referred to 1 kg DM
- copper: 79.9689 kg; lognormal variance with pedigree 0.0137, pedigree (4,4,3,3,2)
  Copper supplied for field wiring purposes
  properties: wet mass 1 kg, dry mass 1 kg
- welding, arc, steel: 115.955 m; lognormal variance with pedigree 0.0137, pedigree (4,4,3,3,2)
  Process of arc welding the steel
- wastewater, unpolluted: -8.64564 m3; = (water/1000)*-1; lognormal variance with pedigree 0.0137, pedigree (4,4,3,3,2)
  The amount of tap water input stems from the water consumption reported in the EPDs of the modelled pumps (Sulzer EPDs). It is stated in the EPDs that the water is used for testing purposes. Therefore, it is assumed to be discharged to the sewer system without pollution. Sulzer EPDs: https://www.sulzer.com/en/shared/about-us/2017/08/10/13/22/environmental-product-declarations (accessed May 2019)
  production volume 8.649 m3; = Ref('c9bbb94d-74e5-43f9-8bf9-62a3dae36529', 'ProductionVolume') * ((Ref('2cb7b61a-4674-4282-a7e5-a3a2fa6f916d')*-1) / Ref('c9bbb94d-74e5-43f9-8bf9-62a3dae36529'))
    Calculated from production volume of reference product using the relative outputs.
  properties: wet mass 1000 kg, dry mass 0.337476 kg, water content 2962.17, carbon content, fossil 0.00178991, carbon content, non-fossil 0.00178991
  note on carbon content, fossil: Assumed to be like in tap water. Bicarbonate content is 2.93 mol/m3. CO2 content is 0.1 mol/m3 (ecoinvent v2.2 report 8, Tab 93.1).
- excavation, hydraulic digger: 4.99806 m3; lognormal variance with pedigree 0.0137, pedigree (4,4,3,3,2)
  Excavation and backfilling. The digger is a removable unit. All the soil dislocated for initial construction is put back. Hence no end of life calculation is needed.
- drawing of pipe, steel: 24017.7 kg; lognormal variance with pedigree 0.0137, pedigree (4,4,3,3,2)
  Process done to draw pipes from steel.
- reinforcing steel: 198959 kg; name steel; lognormal variance with pedigree 0.0137, pedigree (4,4,3,3,2)
  Used for constructionof heat exchangers, piping
  properties: dry mass 1 kg, carbon content, fossil 0.004, wet mass 1 kg
- alkyd paint, white, without solvent, in 60% solution state: 24.9903 kg; name paint; lognormal variance with pedigree 0.0137, pedigree (4,4,3,3,2)
  Painting the structural steel to prevent rust
  properties: carbon content, fossil 0.140367, wet mass 1 kg, carbon content, non-fossil 0.199629, dry mass 1 kg
  note on carbon content, fossil: C content was calculated as an addition of C content in the raw materials.
- tap water: 0 kg; name water; pedigree (1,1,1,1,1)
  Used in the manufacturing process of pumps
  properties: dry mass 0.000337476 kg, water content 2962.17, wet mass 1 kg, carbon content, fossil 0.00178991
  note on carbon content, fossil: Bicarbonate content is 2.93 mol/m3. CO2 content is 0.1 mol/m3 (ecoinvent v2.2 report 8, Tab 93.1).
- cast iron: 1920.25 kg; name castiron; lognormal variance with pedigree 0.0137, pedigree (4,4,3,3,2)
  Used for constructionof hot and cold salt pumps, motors, boilers and valves
  properties: wet mass 1 kg, dry mass 1 kg, carbon content, fossil 0.04
  note on carbon content, fossil: Cast iron is made by remelting pig iron in small furnaces (e.g. cupola furnaces or electric arc furnaces) and poured into moulds to make castings. It usually contains 2% to 6% carbon (ecoinvent v2.2 report 10_partII). An average content of 4% was considered
- waste reinforcement steel: 0 kg; pedigree (1,1,1,1,1)
  All steel masses combined.
  production volume 0 kg
    Calculated from production volume of reference product using the relative outputs.
  properties: dry mass 1 kg, wet mass 1 kg
- iron-nickel-chromium alloy: 8850.56 kg; name alloy; lognormal variance with pedigree 0.0137, pedigree (4,4,3,3,2)
  Cables and piping of hot and cold water pumps
  properties: dry mass 1 kg, wet mass 1 kg
- silicone product: 5.99767 kg; name silicone_product; lognormal variance with pedigree 0.0137, pedigree (4,4,3,3,2)
  Used in hot and cold salt pumps to prevent leakage
  properties: wet mass 1 kg, dry mass 1 kg, carbon content, fossil 0.324324
- waste paint: 0 kg; pedigree (1,1,1,1,1)
  Inert materials in alkyd solvent 60% are disposed in landfill
  production volume 0 kg
    Calculated from production volume of reference product using the relative outputs.
  properties: dry mass 1 kg, wet mass 1 kg, carbon content, fossil 0.65
- transformer, high voltage use: 52.9794 kg; lognormal variance with pedigree 0.0137, pedigree (4,4,3,3,2)
  Transformer setup including substations and primary power distribution sources.
  properties: dry mass 1 kg, wet mass 1 kg, carbon content, fossil 0.262798
- steel, chromium steel 18/8, hot rolled: 767.701 kg; name chromesteel; lognormal variance with pedigree 0.0137, pedigree (4,4,3,3,2)
  Material composition of boilers recirculation pumps etc
  properties: wet mass 1 kg, carbon content, fossil 0.0008, dry mass 1 kg
  note on carbon content, fossil: Stainless steel model is the grade 304 steel (18/8 stainless, 18% chromium 8% nickel; max. 0.08% C)
- scrap copper: 0 kg; pedigree (1,1,1,1,1)
  Scrap copper disposal
  production volume 0 kg
    Calculated from production volume of reference product using the relative outputs.
  properties: wet mass 1 kg, dry mass 1 kg
- waste concrete: -193.747, -54798.9 kg (2 entries); lognormal variance with pedigree 0.0137, pedigree (4,4,3,3,2)
  Disposal of concrete. The density is assumed to be 2200kg/m3.
  production volume 55014 kg
- concrete, normal: 0.00463674, 0.153905, 0.0160367, 0.129829, 0.0730286, 0.309256, 6.0107 m3 (7 entries); lognormal variance with pedigree 0.0137, pedigree (4,4,3,3,2)
  Concrete used for embeding metals in steam generator heat exchangers, nitrate salt heaters
- hazardous waste, for incineration: -0.152782, -5.84489 kg (2 entries); lognormal variance with pedigree 0.0137, pedigree (4,4,3,3,2)
  (same comment as for hazardous waste, for incineration)
  production volume 6 kg
- tap water: 9.75015, 3472.1, 80.9994, 16.1137, 406.324, 10.5704, 4649.78 kg (7 entries); lognormal variance with pedigree 0.0137, pedigree (4,4,3,3,2)
  Used in the manufacturing process of pumps
- waste reinforcement steel: -146.815, -211441 kg (2 entries); lognormal variance with pedigree 0.0137, pedigree (4,4,3,3,2)
  All steel masses combined.
  production volume 423340 kg
- waste paint: -0.0579652, -24.9323 kg (2 entries); lognormal variance with pedigree 0.0137, pedigree (4,4,3,3,2)
  Inert materials in alkyd solvent 60% are disposed in landfill
  production volume 25 kg
- scrap copper: -3.58382, -76.3851 kg (2 entries); lognormal variance with pedigree 0.0137, pedigree (4,4,3,3,2)
  Scrap copper disposal
  production volume 80 kg

## Sampling procedure
This dataset is entirely based on the detailed life cycle inventory as presented in the dissertation report by
Telsnig, Thomas. 2015. Standortabhängige Analyse und Bewertung solarthermischer Kraftwerke am Beispiel Südafrikas. Forschungsbericht. Band 123. ISSN 0938-1228. Institut für Energiewirtschaft und Rationelle Energieanwendung, Universität Stuttgart, Germany.

Further, data in Telsnig 2015 are not shown explicitely for the downscaled 20 MW solar tower power plant. This gap is filled in the ecoinvent report.

## Extrapolations
This dataset has been extrapolated from a dataset modelled for the location Upington, South Africa. The original data modelling a 440 MW power plant have been scaled down with parameter specific linear and non-linear equations to represent a 20 MW plant design. Uncertainty has not been adjusted as it is assumed that the modelled 20 MW solar tower power plant would be very similar in other parts of the world.

## Review by Christopher Oberschelp 2017-03-13
Very detailed, structured and well-documented datasets. Main exchanges have been checked and make sense.
