# treatment of pollutant from rail ballast, residual material landfill

Dataset: EcoSpold 2, unit process
Geography: RoW
Time period: 1994-01-01 to 2019-12-31
Technology level: current
Classification: EcoSpold01Categories: waste management/residual material landfill
Classification: ISIC rev.4 ecoinvent: 3822:Treatment and disposal of hazardous waste
Synonyms: inorganic pollutant residue removed in cleaning from used rail track material
Tags: ConvertedDataset; Treatment
Scenario: Business-as-Usual
System model: Allocation at the point of substitution
Generated by: Gabor Doka (obsolete)
Published in: Doka G. 2009
Database: ecoinvent
isCopyrightProtected: true
accessRestrictedTo: 1

## General comment
Inventoried waste contains 100% polluted rail ballast residue; .
waste composition (wet, in ppm): H2O n.a.; O n.a.; H n.a.; C n.a.; S n.a.; N n.a.; P n.a.; B n.a.; Cl n.a.; Br n.a.; F n.a.; I n.a.; Ag n.a.; As 37.722; Ba n.a.; Cd 2.5148; Co n.a.; Cr 3655; Cu 4525.3; Hg 1.2574; Mn n.a.; Mo n.a.; Ni 1102.3; Pb 205.09; Sb n.a.; Se n.a.; Sn n.a.; V n.a.; Zn 1195.4; Be n.a.; Sc n.a.; Sr n.a.; Ti n.a.; Tl n.a.; W n.a.; Si 989280; Fe n.a.; Ca n.a.; Al n.a.; K n.a.; Mg n.a.; Na n.a.;
Share of carbon in waste that is biogenic 60.4%.
Additional solidification with 0.4 kg of cement.
[This dataset was already contained in the ecoinvent database version 2. It was not individually updated during the transfer to ecoinvent version 3. Life Cycle Impact Assessment results may still have changed, as they are affected by changes in the supply chain, i.e. in other datasets. This dataset was generated following the ecoinvent quality guidelines for version 2. It may have been subject to central changes described in the ecoinvent version 3 change report (http://www.ecoinvent.org/database/ecoinvent-version-3/reports-of-changes/), and the results of the central updates were reviewed extensively. The changes added e.g. consistent water flows and other information throughout the database. The documentation of this dataset can be found in the ecoinvent reports of version 2, which are still available via the ecoinvent website. The change report linked above covers all central changes that were made during the conversion process.]

## Included activities end
Waste-specific short-term emissions to water from leachate. Long-term emissions from landfill to ground water. Expenditures for solidificalion with cement (user-specified option)

## Geography
Technology encountered in Switzerland in 2000. Landfill includes base seal and leachate collection system.

## Technology
Swiss residual material landfill for polluted, inorganic waste. With base seal and leachate collection system. Recultivation after closure.

## Time period
Waste composition as given in literature reference, theoretical data or other source. Transfer coefficients from prospective model.

## Reference product
- pollutant from rail ballast: -1 kg; CPC 39990: Other wastes n.e.c.; By-product classification Waste
  EcoSpold01Location=CH
  production volume 3.96633 kg
    This is a placeholder value that does not reflect real-world production volumes. This dataset does not currently require a real-world production volume to work in the database framework, and no actual data were collected yet. This has no negative effect on the results of the ecoinvent database.
  property price 0 EUR2005
    Waste products are assigned a price of zero as they are assumed to require further treatment.
  property carbon content 0
    carbon content on a dry matter basis (reserved; not for manual entry)
  properties: carbon content, fossil 0, carbon content, non-fossil 0, wet mass 1 kg, water content 0, water in wet mass 0 kg, dry mass 1 kg, carbon allocation 0 kg

## Inputs from technosphere
- residual material landfill: 2.0833e-9 unit; lognormal variance with pedigree 0.042, pedigree (1,1,5,5,1)
  demands per kilogram waste. uncertainty is heeded in the module
  EcoSpold01Location=CH
- waste cement, hydrated: 0 kg; pedigree (1,1,1,1,1)
  Hydrated cement for solidification of residual material waste. Uncertainty in mass from solidification recipe.
  EcoSpold01Location=CH
  production volume 0 kg
    Calculated from the production volume of pollutant from rail ballast, 0% water in proportion to the respective output amounts.
  properties: dry mass 1 kg, wet mass 1 kg
- process-specific burdens, residual material landfill: 0 kg; pedigree (1,1,1,1,1)
  demands per kilogram waste. uncertainty is heeded in the module
  EcoSpold01Location=CH
- cement, unspecified: 0 kg; pedigree (1,1,1,1,1)
  Cement for solidification of residual material waste. Uncertainty in mass from solidification recipe.
  EcoSpold01Location=CH
  properties: dry mass 1 kg, wet mass 1 kg
- waste cement, hydrated: -0.282874, -0.717126 kg (2 entries); lognormal variance with pedigree 0.052, pedigree (1,1,5,5,1)
  (same comment as for waste cement, hydrated)
  production volume 3 kg
- process-specific burdens, residual material landfill: 0.282874, 0.717126 kg (2 entries); lognormal variance with pedigree 0.042, pedigree (1,1,5,5,1)
  demands per kilogram waste. uncertainty is heeded in the module
  EcoSpold01Location=CH
- cement, unspecified: 0.0120178, 0.00088022, 0.00250892, 0.0577583, 0.05674, 0.00167002, 0.0183418, 0.00221915, 0.247864 kg (9 entries); lognormal variance with pedigree 0.052, pedigree (1,1,5,5,1)
  (same comment as for cement, unspecified)

## Emissions to nature
- Mercury [water, ground-, long-term]: 5.9352e-8 kg; lognormal variance with pedigree 3.912, pedigree (1,1,5,5,1)
  uncertainty is calculated from uncertainties in waste composition and transfer coefficients in incinerator and landfills.
- Arsenic, ion [water, surface water]: 3.7722e-5 kg; lognormal variance with pedigree 1.132, pedigree (1,1,5,5,1)
  uncertainty is calculated from uncertainties in waste composition and transfer coefficients in residual landfill
- Zinc, ion [water, ground-, long-term]: 1.4651e-5 kg; lognormal variance with pedigree 5.522, pedigree (1,1,5,5,1)
  (same comment as for Mercury)
- Cadmium, ion [water, ground-, long-term]: 1.7073e-8 kg; lognormal variance with pedigree 7.722, pedigree (1,1,5,5,1)
  (same comment as for Mercury)
- Silicon [water, surface water]: 0.0022248 kg; lognormal variance with pedigree 0.592, pedigree (1,1,5,5,1)
  (same comment as for Arsenic, ion)
- Chromium VI [water, surface water]: 0.00021971 kg; lognormal variance with pedigree 0.702, pedigree (1,1,5,5,1)
  (same comment as for Arsenic, ion)
- Copper, ion [water, ground-, long-term]: 0.0001742 kg; lognormal variance with pedigree 3.162, pedigree (1,1,5,5,1)
  (same comment as for Mercury)
- Mercury [water, surface water]: 9.9085e-11 kg; lognormal variance with pedigree 2.572, pedigree (1,1,5,5,1)
  (same comment as for Arsenic, ion)
- Nickel, ion [water, ground-, long-term]: 0.00039908 kg; lognormal variance with pedigree 0.942, pedigree (1,1,5,5,1)
  (same comment as for Mercury)
- Arsenic, ion [water, ground-, long-term]: 3.7722e-14 kg; lognormal variance with pedigree 1.162, pedigree (1,1,5,5,1)
  (same comment as for Mercury)
- Cadmium, ion [water, surface water]: 2.8502e-11 kg; lognormal variance with pedigree 2.732, pedigree (1,1,5,5,1)
  (same comment as for Arsenic, ion)
- Copper, ion [water, surface water]: 2.9081e-7 kg; lognormal variance with pedigree 1.522, pedigree (1,1,5,5,1)
  (same comment as for Arsenic, ion)
- Lead [water, ground-, long-term]: 1.0638e-6 kg; lognormal variance with pedigree 7.832, pedigree (1,1,5,5,1)
  (same comment as for Mercury)
- Zinc, ion [water, surface water]: 2.446e-8 kg; lognormal variance with pedigree 1.842, pedigree (1,1,5,5,1)
  (same comment as for Arsenic, ion)
- Nickel, ion [water, surface water]: 6.6624e-7 kg; lognormal variance with pedigree 1.402, pedigree (1,1,5,5,1)
  (same comment as for Arsenic, ion)
- Lead [water, surface water]: 1.776e-9 kg; lognormal variance with pedigree 2.192, pedigree (1,1,5,5,1)
  (same comment as for Arsenic, ion)
- Chromium VI [water, ground-, long-term]: 0.00069404 kg; lognormal variance with pedigree 0.542, pedigree (1,1,5,5,1)
  (same comment as for Mercury)
- Silicon [water, ground-, long-term]: 0.98705 kg; lognormal variance with pedigree 0.042, pedigree (1,1,5,5,1)
  (same comment as for Mercury)

## Sampling procedure
Landfill model based on observed leachate concentrations in literature. Extrapolated to 60'000 years heeding chemical characteristics. Initial waste composition from various literature sources.

## Extrapolations
This dataset has been copied from an original dataset covering the geography CH. The uncertainty has been adjusted accordingly.

## Review by Niels Jungbluth 2009-02-15
passed.
