# manual dismantling of used electric passenger car

Dataset: EcoSpold 2, unit process
Geography: GLO
Time period: 2005-01-01 to 2019-12-31
Technology level: current
Classification: EcoSpold01Categories: waste management/recycling
Classification: ISIC rev.4 ecoinvent: 3830:Materials recovery
Tags: Treatment
Scenario: Business-as-Usual
System model: Allocation at the point of substitution
Share of production covered: 100 %
Generated by: Andrea Del Duce
Published in: Hischier R. 2007
Database: ecoinvent
isCopyrightProtected: true
accessRestrictedTo: 1

## General comment
This dataset describes the manual dismantling of a used electric passenger car. One unit of service treats of 1 kg of car. The data was derived for a compact size car of approximately 1200kg, but the waste fractions are calculated without considering the weight of the battery. The treatment involves the manual dismantling of the car into its various modules (glider and drivetrain). The treatment of the used glider and drivetrain is described in the respective datasets with the exception of rubber from the tyres, glass and oil which are considered here. Information on the materialisation of the dismatled vehicle are in F. Habermacher "Modeling material inventories and environmental impacts of electric passenger cars", Master Thesis, Department of Environmental Sciences, ETH Zurich, 2011.
[This dataset was already contained in the ecoinvent database version 2. It was not individually updated during the transfer to ecoinvent version 3. Life Cycle Impact Assessment results may still have changed, as they are affected by changes in the supply chain, i.e. in other datasets. This dataset was generated following the ecoinvent quality guidelines for version 2. It may have been subject to central changes described in the ecoinvent version 3 change report (http://www.ecoinvent.org/database/ecoinvent-version-3/reports-of-changes/), and the results of the central updates were reviewed extensively. The changes added e.g. consistent water flows and other information throughout the database. The documentation of this dataset can be found in the ecoinvent reports of version 2, which are still available via the ecoinvent website. The change report linked above covers all central changes that were made during the conversion process.]

## Included activities start
The dataset takes as input the used car and describes its manual dismantling, including the treatment facility, which has been modelled with infrastructure and efforts from the electronics waste industry.

## Included activities end
The waste fractions of the materials (rubber, glass and waste oil) produced in the dismantling are accounted for in the vehicle production.

## Geography
data of situation in Switzerland

## Technology
current manual dismantling activities in Switzerland for electronic waste.

## Reference product
- manual dismantling of used electric passenger car: 1 unit; CPC 894: Materials recovery (recycling) services, on a fee or contract basis; By-product classification allocatable product
  production volume 45000 unit
    Very rough estimate of 45000 pure battery electric passenger cars produced in 2012 based on the projection for the USA shown in http://www1.eere.energy.gov/vehiclesandfuels/pdfs/1_million_electric_vehicles_rpt.pdf. This value has been taken as annual production volume.
  property price 0.00333178 EUR2005
    Calculated based on inputs: The price of the product has been calculated as a sum of the values of the material and energy inputs for this product. This value is therefore a rough estimation. It may underestimate the real price since there are additional expenses when producing any product. These expences can include for example labour costs, treatment of waste materials and profit for the producer. Please consider carefully whether this level of data quality is acceptable for your application.

## Inputs from technosphere
- manual treatment facility, waste electric and electronic equipment: 1.6e-8 unit; source Hischier R. 2007; lognormal variance with pedigree 0.578, pedigree (4,5,5,5,5)
  Value taken from manual dismantling of electronic waste. Pedigree matrix changed accordingly. Original comment:rough estimation of infrastructure.
  EcoSpold01Location=GLO
  Uncertainty: rough estimation of infrastructure

## Sampling procedure
Literature.

## Extrapolations
This dataset has been extrapolated from year 2005 to the year of the calculation (2019). The uncertainty has been adjusted accordingly.

## Review by Christian Bauer 2012-09-11
passed
