# cattle for slaughtering, live weight to generic market for red meat, live weight

Dataset: EcoSpold 2, unit process
Geography: GLO
Time period: 2014-01-01 to 2019-12-31
Technology level: current
Classification: ISIC rev.4 ecoinvent: 0141:Raising of cattle and buffaloes
Scenario: Business-as-Usual
System model: Allocation at the point of substitution
Generated by: Emilia Moreno Ruiz
Database: ecoinvent
isCopyrightProtected: true
accessRestrictedTo: 1

## General comment
This activity links the specific "market for cattle for slaughtering, live weight" to the generic "market for red meat". It has been arbitrarily decided that 10% of the cow meat produced feeds the generic market for red meat instead of the specific one for cow meat.

## Included activities start
The activity starts with the entry of the "cattle for slaughtering, live weight"

## Included activities end
It finishes with the output of "red meat" for the generic market.

## Reference product
- red meat, live weight: 1 kg; By-product classification allocatable product; CPC 2111: Meat of mammals, fresh or chilled
  production volume 1.26577e10 kg; = 63288582000.09*2*0.1
    Global production 6.33 million metric ton of cattle meat (carcass weight) in 2012 (FAOSTAT, accessed 2014.04.23). Conversion factor 2 from carcass weight to live weight based on information in ecoinvent v2 report 15.
    10% of this Production Volume is attributed to this activity.
  property price 4.8 EUR2005
    Calculated value based on data from United Nations Commodity Trade Statistics Database (comtrade.un.org). UN comtrade category: 0201 Meat of bovine animals, fresh or chilled. Year 2007. Using exchange rate of 1EURO = 1.209 USD. Average of price of import into 5 main markets (EU, US, JP, IN and CN).
  property energy content 14.937 MJ
    "Energy content calculated from animal fat and protein composition and energy content for animal fat and protein of 39.3 and 23.6 MJ/kg, respectively.
    Johnson, I.R. et al. (2012). J. Anim. Sci. 90(13):4741-475.
    Williams, C.B. (2005). J. Anim. Sci. 83(6):1262-1266."
  property carbon content, non-fossil 0.4928
    "Calculated from live weight empty body composition in fat and protein (
    Johnson, I.R. et al. (2012). J. Anim. Sci. 90(13):4741-475 ; Williams, C.B. (2005). J. Anim. Sci. 83(6):1262-1266) and from C content of nutrients (protein, fat) according to A.D. Kay and T. Vrede (Evolutionary and Biochemical Aspects"", in Global Ecology, 2010, Elsevier B.V., S.E. Jørgensen Ed.)."""
  property carbon content 0.4928
    carbon content on a dry matter basis (reserved; not for manual entry)
  properties: water in wet mass 0.4 kg, wet mass 1 kg, water content 0.66667, dry mass 0.6 kg, carbon content, fossil 0, carbon allocation 0.29568 kg

## Inputs from technosphere
- cattle for slaughtering, live weight: 0, 0.00962901, 0.110529, 0.879842 kg (4 entries)
  It is considered that a ration 1:1 applies between the live weight of cattle and that of red meat
  properties: energy content 14.9367 MJ, carbon content, non-fossil 0.4928, water content 0.666667, dry mass 0.6 kg, wet mass 1 kg
  note on energy content: Energy content calculated from animal fat and protein composition and energy content for animal fat and protein of 39.3 and 23.6 MJ/kg, respectively. Johnson, I.R. et al. (2012). J. Anim. Sci. 90(13):4741-475. Williams, C.B. (2005). J. Anim. Sci. 83(6):1262-1266.
  note on carbon content, non-fossil: Calculated from live weight empty body composition in fat and protein ( Johnson, I.R. et al. (2012). J. Anim. Sci. 90(13):4741-475 ; Williams, C.B. (2005). J. Anim. Sci. 83(6):1262-1266) and from C content of nutrients (protein, fat) according to A.D. Kay and T. Vrede ("Evolutionary and Biochemical Aspects", in Global Ecology, 2010, Elsevier B.V., S.E. Jørgensen Ed.).

## Extrapolations
This dataset has been extrapolated from year 2014 to the year of the calculation (2019). The uncertainty has been adjusted accordingly.
