# electricity production, hydro, pumped storage

Dataset: EcoSpold 2, unit process
Geography: IN-WB
Time period: 1945-01-01 to 2019-12-31
Technology level: modern
Classification: ISIC rev.4 ecoinvent: 3510:Electric power generation, transmission and distribution
Tags: hydro power
Scenario: Business-as-Usual
System model: Allocation at the point of substitution
Generated by: Muhammed Noor Hossain
Published in: Hossain, Muhammed Noor 2016
Database: ecoinvent
isCopyrightProtected: true
accessRestrictedTo: 1

## General comment
This dataset represents the production of high voltage electricity in a pumped storage power plant unit in India - West Bengal (a state/union territory in India) in 2012. The calculation of this dataset is based on data of reservoir hydro power plant units. For this, a representative sample of various types of dams in Switzerland is taken into account, i.e. 52 reservoir power plants with an annual gross production output of 17.8 TWh and an installed capacity of 9130 MW. Reservoir power plants and pumped storage power plants are dealt with together due to the fact that the construction efforts are related. Lifetime is assumed to be 150 years for the dam and 80 years for the rest of materials. The data refers to plant operation of a mix of types of dams built between 1945 and 1970; therefore they might not be representative for more modern construction, for an individual type and for small-scale and smallest-scale plants. This dataset is created as a child of the global dataset. All values except the annaul production volume are directly inherited from the global dataset. The annual production volume value is taken from India- specific source.
[This dataset is meant to replace the following datasets:
- electricity production, hydro, pumped storage, IN, 1945 - 2015]

## Included activities start
From water pumped up from a lower to an upper reservoir.

## Included activities end
The activity ends with 1 kWh of high voltage electricity produced at the power plant and arrived at the busbar.

The dataset includes the use of pump energy (electricity, high voltage), lubricant oil, the volume of the reservoir, the mass of water passing through the turbines and an estimation of greenhouse gas emissions out of the water reservoir.

The dataset doesn't include an analysis of net greenhouse gas emissions (due to a lack of respective information) and the hydrological and biological impacts are only rudimentary included via land use (occupation and transformation) data.

## Geography
Data represent the average of a characteristic sample of Swiss reservoir hydropower plants, valid for pumped storage hydro power plants.

## Technology
Definition of pumped storage in this dataset: The water is not being pumped for circulation reasons, but for increasing the inflow of a reservoir. Net production is the gross production minus about 1% losses. Additionally there is energy needed for pumping. The efficiency of a pumped storage hydropower plant is around 70% (p.14 in Bauer et al. 2007).

## Time period
The Annual Production Volume is for the time period of 01.04.2012 - 31.03.2013. Central Electricity Authority (CEA), India documents annual electricity production data for the mentioned time period.

## Parameters
- gross electricity production: 7.9935e8 kWh; name gross_electricity; lognormal variance with pedigree 0.0018, pedigree (2,1,1,1,2)
  Literature and calculated value. Annual production volume data were extracted from the annual thermal electricity generation report of Central Electricity Authority, India (CEA, 2013). The Annual Production Volume is for the time period of 01.04.2012 - 31.03.2013 since CEA documents annual electricity production data for the mentioned time period.
  CEA. (2013). Region Wise, State Wise, Sector Wise, Type Wise, Station Wise, Unit Wise Generation Report For 31-Mar-2013. Central Electricity Authority (CEA). Retrieved from 04 December, 2016 http://cea.nic.in/reports/daily/dgr/2013/March/31/dgr2.pdf
- losses from gross electricity production: 0.005 dimensionless; name losses_gross_net; lognormal variance with pedigree 0.0018, pedigree (2,1,1,1,2)
  Literature value. Own use of electricity plants in this State/Union Territory in 2012. The default loss as described by the CEA CO2 Baseline Database for the Indian Power Sector is applied, which is 0.5%. CEA. (2014). CO2 Baseline Database for the Indian Power Sector. User Guide, Ministry of Power, Government of India, New Delhi. Retrieved 12 04, 2016, from http://cea.nic.in/reports/others/thermal/tpece/cdm_co2/user_guide_ver10.pdf
  Uncertainty: Generic assumption
- lifetime: 150 year; lognormal variance with pedigree 0.0014, pedigree (2,2,1,3,1)
  Estimation based on experiences.
  nan

## Reference product
- electricity, high voltage: 1 kWh; CPC 17100: Electrical energy; By-product classification allocatable product
  Estimation. This dataset is based on data of Swiss reservoir power plants. Due to the fact that pumped storage power plants do not produce hydro-electricity, the amount of electricity provided is assigned to a separate module. The creation of such a module was not possible, because no differentiation between reservoir and pumped storage power plant was made in the considered power plant sample. Separating the expenditures for the construction of the power plant is neither possible nor reasonable; therefore the same infrastructure module is used as for the construction of a reservoir power plant. As reference factor the net energy production of the reservoir power plant is used.
  production volume 7.95353e8 kWh; name apv_electricity; = gross_electricity*(1-losses_gross_net)
    Literature and calculated value. Annual production volume data were extracted from the annual thermal electricity generation report of Central Electricity Authority, India (CEA, 2013). The Annual Production Volume is for the time period of 01.04.2012 - 31.03.2013 since CEA documents annual electricity production data for the mentioned time period.
  property price 0.0977 EUR2005
    Temporary price data. Calculated as 90% of purchasers price based on: 94% of the average price (to account for a 6% loss in transformation and transmission) for electricity for industrial consumersin 2005 (excluded taxes). From IEA.

## Inputs from technosphere
- waste mineral oil: -7.56e-6 kg; name waste_oil; = (lubricating_oil)*-1; lognormal variance with pedigree 0.108, pedigree (1,1,4,5,3)
  Estimation. This dataset is based on data of Swiss reservoir power plants. The lubricating oil is in a closed loop system (i.e. cannot get into the turbined water system) and is disposed annualy as waste oil in a hazardous waste treatment plant. The information given is based on own assumptions.
  production volume 6012.87 kg; = apv_electricity* waste_oil
    Calculated from the production volume of electricity, high voltage in proportion to the respective output amounts.
  property price 0 EUR2005; name waste_oil_price_EUR2005
  properties: water content 0.111111, dry mass 0.9 kg, carbon content, fossil 0.864444, wet mass 1 kg
  note on carbon content, fossil: Tab A.6, ecoinvent v2.2 report 13_I. C content has been calculated after data in the tables, and then referred to 1 kg DM
- hydropower plant, reservoir, alpine region: 2.10199e-13 unit; lognormal variance with pedigree 0.211, pedigree (5,5,5,5,5)
  Literature value/calculated value. The needed amount of infrastructure per kWh produced is calculated with the lifetime and the annual net energy production (16500GWh/a). The global value represents a weighted average of alpine and non-alpine reservoir pumped storage plants.
- lubricating oil: 7.56e-6 kg; name lubricating_oil; = 0.000009*0.84; source Vögtlin H. J. 2002, p. Tab. 5.3 p.44 in Bolliger 2007; lognormal variance with pedigree 0.1, pedigree (1,1,4,5,1)
  Estimation. This exchange has been taken over from a dataset for a Swiss reservoir power plant without pumping. For the consumption of lubricating oil during plant operation no data was available. It is assumed that both turbines and run-of-river plants need the same amount of oil hence the information about lubricating oil consumption of run-of-rivers is adopted. A consumption of lubricating oil for turbines of 9 liters per GWh is estimated. With an oil density of 0.84 kg/l this amounts to 0.007 g/kWh. The lubricating oil is in a closed loop system (i.e. cannot get into the turbined water system) and is disposed annualy as waste oil in a hazardous waste treatment plant.
  properties: carbon content, fossil 0.75, wet mass 1 kg, dry mass 1 kg
  note on carbon content, fossil: Lubricating oil is produced from diesel. C-content/dry mass of fats and oils considered 75%, from: ecoinvent v2.2 report, n 15a, pg 40
- hydropower plant, reservoir, non-alpine regions: 1.93841e-13 unit; lognormal variance with pedigree 0.211, pedigree (5,5,5,5,5)
  (same comment as for hydropower plant, reservoir, alpine region)
- electricity, high voltage: 1.43 kWh; source Bolliger, R. 2007, p. Tab. 4.3, p.41 +Tab. 5.3 p.44; lognormal variance with pedigree 0.018, pedigree (1,1,4,5,3)
  Estimation. The electricity source for pumping is not known. Hence the electricity mix of this geography is assumed to be used as pump electricity.

## Inputs from nature
- Volume occupied, reservoir [natural resource, in water]: 0.15 m3*year; source Eidg. Amt für Wasserwirtschaft (BWW) 1991; lognormal variance with pedigree 0.138, pedigree (1,1,4,5,3)
  Calculated value. This exchange has been taken over from a dataset for a Swiss reservoir power plant without pumping. The usable capacity of reservoirs is an important figure both for significant water supply regions and for the definition of ecological relevant indices. First of all the usable capacity is a measurement for the rearrangement of the runoff regime over time, i.e. the amount of water detracted temporarily from the natural water cycle and returned to the surface waters with delay. Depending on the type of reservoir (daily, monthly, annual reservoir) the delay takes less or more time. Second, the usable capacity of reservoirs is a measurement for the occupied volume of reservoirs. Thereby, the volume of the fluctuation area is considered, i.e. not the total reservoir volume.
  Standard values for landuse are assumed.
  Based on data of BWW, a total usable capacity of 3413 Mio m3 for all Swiss reservoir power plants can be calculated. Referred to the annual net production potential, the specific usable capacity amounts to 0.17 m3a/kWh. Based on the sample of reservoir power plants an usable capacity of 2200 Mio m3 with a specific usable capacity of 0.15 m3a/kWh can be calculated. The difference between the two values can be explained by the fact that the reservoir power plants considered in the sample are located at higher altitudes (i.e. means deeper reservoirs) than the averaged Swiss power plants. This fact results in a higher energy production and a lower specific usable capacity, considering a given amount of turbined water and a given useable capacity. However, the difference with an error of 6% can be neglected.
- Occupation, lake, artificial [natural resource, land]: 0.018 m2*year; = transformation_from*lifetime; lognormal variance with pedigree 0.058, pedigree (1,1,4,5,3)
  Calculated value
- Water, turbine use, unspecified natural origin [natural resource, in water]: 4.3 m3; name water_turbine_use_UNO_input; lognormal variance with pedigree 0.018, pedigree (1,1,4,5,3)
  Calculated value. This exchange has been taken over from a dataset for a Swiss alpine reservoir power plant without pumping for the alpine type pumped storage plants. For non-alpine type plants, the amount is multiplied by a factor 10. The amount of turbined water equates to the used water amount (i.e. the water amount detracted from the river) less small losses like the evaporation of reservoirs. With respect to the ecological importance the following has to be considered: the turbined amount of water is via physical laws related to the produced amount of electricity, i.e. the turbined amount of water does not provide independent, ecological relevant information. The specific turbined amount of water (in m3/kWh) represents a value that is inversely proportional to the average net head. However, the turbined amount of water is an ecological relevant measurement in terms of representing the water amount that is in parts detracted from the natural water cycle. Based on the Swiss sample the specific turbined water amount accounts for 0.81 m3/kWh.
  Standard values for resources are assumed. The global value is calculated as production weighted average.
- Transformation, to lake, artificial [natural resource, land]: 0.00011878 m2; = transformation_from-transformation_to_industrial; source Bolliger, R. 2007, p. Tab. 4.3, p.41 +Tab. 5.3 p.44; lognormal variance with pedigree 0.138, pedigree (1,1,4,5,3)
  Standard values for landuse are assumed.
  The original state before setting up the reservoir has to be classified as module 'transformation, from unspecified' due to the fact that various types of flooded ground can be distinguished. The flooded area partly consisted of alpine meadows and grazing land, rarely also villages had to be resettled; often impassable, rocky alpine valleys and gorges were filled with water, where only marginal vegetation and no agricultural use was possible. The definition of the character and the environmental value (e.g. forest, areas with rare mushrooms, moorlands, etc.) of the affected areas were not possible, due to the lack of information.
  Literature value/calculated value. This exchange amount is taken over from datasets for both alpine (2.3E-5) and non-alpine (2.3E-4) reservoirs. For the global dataset, the amount is calculated as weighted average of pumped storage plants alpine/non-alpine type. Regarding reservoir power stations, land (i.e. meadows, moorlands, gravel areas etc.) is mainly occupied by reservoirs. Averaged over the investigated sample and distributed over life time the specific land use amounts to 0.0035 m2a/kWh; the transformation of land amounts to 0.000023 m2/kWh (alpine reservoirs). These values are multiplied by a factor 10 for non-alpine reservoirs..
- Transformation, to industrial area [natural resource, land]: 1.22e-6 m2; name transformation_to_industrial; lognormal variance with pedigree 0.138, pedigree (1,1,4,5,3)
  Literature value/calculated value. This exchange amount is taken over from datasets for both alpine (2.3E-7) and non-alpine (2.3E-6) reservoirs. For the global dataset, the amount is calculated as weighted average of pumped storage plants alpine/non-alpine type. Regarding reservoir power stations, land (i.e. meadows, moorlands, gravel areas etc.) is mainly occupied by reservoirs. Averaged over the investigated sample and distributed over life time the specific land use amounts to 0.0035 m2a/kWh; the transformation of land amounts to 0.000023 m2/kWh (alpine reservoirs). These values are multiplied by a factor 10 for non-alpine reservoirs..
  The original state before setting up the reservoir has to be classified as module 'transformation, from unspecified' due to the fact that various types of flooded ground can be distinguished. The flooded area partly consisted of alpine meadows and grazing land, rarely also villages had to be resettled; often impassable, rocky alpine valleys and gorges were filled with water, where only marginal vegetation and no agricultural use was possible. The definition of the character and the environmental value (e.g. forest, areas with rare mushrooms, moorlands, etc.) of the affected areas were not possible, due to the lack of information.
  Standard values for landuse are assumed.
- Transformation, from unspecified [natural resource, land]: 0.00012 m2; name transformation_from; source Bolliger, R. 2007, p. Tab. 4.3, p.41 +Tab. 5.3 p.44; lognormal variance with pedigree 0.138, pedigree (1,1,4,5,3)
  Standard values for landuse are assumed.
  The original state before setting up the reservoir has to be classified as module 'transformation, from unspecified' due to the fact that various types of flooded ground can be distinguished. The flooded area partly consisted of alpine meadows and grazing land, rarely also villages had to be resettled; often impassable, rocky alpine valleys and gorges were filled with water, where only marginal vegetation and no agricultural use was possible. The definition of the character and the environmental value (e.g. forest, areas with rare mushrooms, moorlands, etc.) of the affected areas were not possible, due to the lack of information.
  Standard values for landuse are assumed.
  The original state before setting up the reservoir has to be classified as module 'transformation, from unspecified' due to the fact that various types of flooded ground can be distinguished. The flooded area partly consisted of alpine meadows and grazing land, rarely also villages had to be resettled; often impassable, rocky alpine valleys and gorges were filled with water, where only marginal vegetation and no agricultural use was possible. The definition of the character and the environmental value (e.g. forest, areas with rare mushrooms, moorlands, etc.) of the affected areas were not possible, due to the lack of information.
  Literature value/calculated value. This exchange amount is taken over from datasets for both alpine (2.3E-5) and non-alpine (2.3E-4) reservoirs. For the global dataset, the amount is calculated as weighted average of pumped storage plants alpine/non-alpine type. Regarding reservoir power stations, land (i.e. meadows, moorlands, gravel areas etc.) is mainly occupied by reservoirs. Averaged over the investigated sample and distributed over life time the specific land use amounts to 0.0035 m2a/kWh; the transformation of land amounts to 0.000023 m2/kWh (alpine reservoirs). These values are multiplied by a factor 10 for non-alpine reservoirs..

## Emissions to nature
- Water [air, unspecified]: 0.000292217 m3; name water_to_air_unspecified; = 0.0292216783849254*0.01; lognormal variance with pedigree 0.0427, pedigree (2,2,3,1,1)
  Calculated value based on literature values and expert opinion. See comments in the parametres' comment field.
  property fraction, origin: unspecified 0; name fraction_origin_unspecified_Ww
  property fraction, origin: fresh water 1; name fraction_origin_fresh_water_Ww
  property fraction, origin: salt water 0; name fraction_origin_salt_water_Ww
- Carbon dioxide, from soil or biomass stock [air, non-urban air or from high stacks]: 0.0188137 kg; lognormal variance with pedigree 0.0992, pedigree (5,3,5,4,3)
  Hertwich, E.G. 2013. Addressing Biogenic Greenhouse Gas Emissions from Hydropower in LCA. Environmental Sciency&Technology, 47, 9604-9611
  Literature value/calculated value. Hertwich 2013 provides an analysis of greenhouse gas emissions from hydropower plants. 89 data points are available for temperate non-alpine plants, from which the average CO2 and CH4 emissions are calculated. Only 10 data points are available for temperate alpine plants which seem not to be representative, so that the greenhouse gas emissions from version 3.1 are kept. The value in the global dataset for pumped hydrpower is calculated as production volume weighted average of alpine and non-alpine type pumped storage plants.
  Hertwich, E.G. 2013. Addressing Biogenic Greenhouse Gas Emissions from Hydropower in LCA. Environmental Sciency&Technology, 47, 9604-9611
- Methane, non-fossil [air, non-urban air or from high stacks]: 0.00011 kg; lognormal variance with pedigree 0.0992, pedigree (5,3,5,4,3)
  Hertwich, E.G. 2013. Addressing Biogenic Greenhouse Gas Emissions from Hydropower in LCA. Environmental Sciency&Technology, 47, 9604-9611
  Hertwich, E.G. 2013. Addressing Biogenic Greenhouse Gas Emissions from Hydropower in LCA. Environmental Sciency&Technology, 47, 9604-9611
  Literature value/calculated value. Hertwich 2013 provides an analysis of greenhouse gas emissions from hydropower plants. 89 data points are available for temperate non-alpine plants, from which the average CO2 and CH4 emissions are calculated. Only 10 data points are available for temperate alpine plants which seem not to be representative, so that the greenhouse gas emissions from version 3.1 are kept. The value in the global dataset for pumped hydrpower is calculated as production volume weighted average of alpine and non-alpine type pumped storage plants.
- Water [water, unspecified]: 4.29971 m3; name water_to_water_unspecified; = water_turbine_use_UNO_input-water_to_air_unspecified; lognormal variance with pedigree 0.098025, pedigree (4,4,4,2,4)
  (same comment as for Water)
  property fraction, origin: unspecified 0; name fraction_origin_unspecified
  property fraction, origin: salt water 0; name fraction_origin_salt_water
  property fraction, origin: fresh water 1; name fraction_origin_fresh_water
- Dinitrogen monoxide [air, non-urban air or from high stacks]: 4.0059e-8 kg; source Dones R. 1996, p. Tab. 4.3, p.41; lognormal variance with pedigree 0.108, pedigree (1,1,4,5,3)
  Calculated value. This exchange has been taken from a dataset for a Swiss alpine reservoir power plant without pumping. Total emissions of greenhouse gases are assumed to be 0.3 CO2equivalents per kWh. Dinitrogen monoxide emissions (N2O) emerge from nitrification and denitrification processes. Based on measurements of Swiss natural lakes, gross dinitrogen monoxide emissions amount to 8-16 umol per m2 and per day. Because of the limited nitrification and denitrification processes at reservoirs in Switzerland, a maximum value of N2O-emissions ranging from 0.24 to 2.4 umol/m2 can be estimated. As a result N2O-emissions between 1.4.10^-5 and 1.4.10^-4 g N2/kWh, respectively 0.004 - 0.04 g CO2-equivalent/kWh with an average value of 7.7.10^-5 g/kWh of N2O are calculated.
  The global value is calculated as production weighted average of all pumped storage alpine and non-alpine reservoirs in ev3.2.
  Regarding net emissions, there is no data available. Hence, it is possible that the calculated and assumed emissions are overestimated, but the approximation is reasonable because emissions emerging from reservoirs make just a small contribution to the total greenhouse gas emissions. Due to the lack of information, direct CO2-emissions emerging from reservoirs in alpine regions are not taken into account. Once further measurements are done, this data can be implemented in the calculation. Due to the variability of the characteristics of Swiss reservoirs, the overall balance is expected neither to be severely overestimated nor to be severely underestimated.

## Sampling procedure
The inventory is generated using statistical data, literature data and modelling.

## Extrapolations
This dataset has been extrapolated from year 2015 to the year of the calculation (2019). The uncertainty has been adjusted accordingly.

## Review by Karin Treyer 2017-01-05
This dataset has been produced in a project on regionalisation of the Indian electricity mix on a states level.
In general, only key parameters have been adjusted to region-specific conditions, such as the electrical efficiency or power plants own use of electricity (losses from gross to net electricity). Whenever more accurate data will be available on e.g. region-specific emissions from power plants, these should be included in this dataset.

## Review by Carl Vadenbo 2015-04-17
[This dataset has passed through a streamlined review process where the underlying modelling of production volumes and technology shares was reviewed in detail prior to the dataset being submitted to the ecoinvent database.]
