# palm date production, conditioned and dried

Dataset: EcoSpold 2, unit process
Geography: GLO
Time period: 2012-01-01 to 2019-12-31
Technology level: current
Classification: ISIC rev.4 ecoinvent: 1030:Processing and preserving of fruit and vegetables
Scenario: Business-as-Usual
System model: Allocation at the point of substitution
Generated by: Kenza Benabderrazik
Database: ecoinvent
isCopyrightProtected: true
accessRestrictedTo: 1

## General comment
This dataset represents 1 kg of palm date fruit conditioned and dried in Tunisia. All the exchanges are calculated per kg of palm date and are based on field data from the main industrial palm date exporter in Tunisia. The inventory includes the following activities: sorting, washing, fumigating, cooling, heating, drying and glucosing. The packaging has not been taking into account.Regarding waste management, palm date kernel are recovered as animal feed. The annual productivity of the plant is 13000 tons of palm dates Deglet Noor (97% of the plam dates are conventionals). The cultivar of the dates studies is Deglet Noor. Tunisia is the world's largest exporter of Deglet Noor.

## Included activities start
The activity starts when palm date fruit arrives to the plant in order to be conditioned.

## Included activities end
The activity ends when the fruit has undergone all processing steps. The palm date is then ready to be packed and send to the importing country. The facility, the infrastructures and the machineries has not been taking into account.

## Geography
The inventory is an extrapolation modeled for Tunisia and is based on field data from one of the main exporter of the Country. Tunisia is the world's largest exporter of Deglet Noor. The conditioning takes place in a plant located in Beni Khalled (in northern tunisia).

## Parameters
- unit conversion kcal to mj: 0.004184 MJ/kcal; name kcal_mj

## Reference product
- palm date, conditioned and dried: 0 kg; name rpc; By-product classification allocatable product; CPC 21419: Other dried fruit, n.e.c.; pedigree (1,1,1,1,1)
  production volume 5.57412e6 kg; name rppvc
    It represents the total production of conventional palm date produced.
    Accordingto the FAOSTAT, the global production of palm dates is 7'548'918. Tunisia has 2.5% of the global production of Dates, and produced 190'000 t in 2012.
    We supposed that 1/13th of the production is organic palm dates. This ratio is an extrapolation from the tunisian dataset. Also we supposed that the annual production volume of conditionned palm date is 19 % less important than raw dates, this is also an extrapolation of the tunisian values.
  property price 0.612093 EUR2005; name rpc_price_EUR2005
    Calculated based on inputs: The price of the product has been calculated as a sum of the values of the material and energy inputs for this product. This value is therefore a rough estimation. It may underestimate the real price since there are additional expenses when producing any product. These expences can include for example labour costs, treatment of waste materials and profit for the producer. Please consider carefully whether this level of data quality is acceptable for your application.
  property carbon content 0.367
    carbon content on a dry matter basis (reserved; not for manual entry)
  property true value 0.612093; name rpc_true_value
    allocation property applied in "true value" allocation // value calculated from revenue
  properties: carbon content, non-fossil 0.367, carbon content, fossil 0, wet mass 1 kg, water content 0.176471, dry mass 0.85 kg, calcium content 0.0001, protein content 0.024, carbohydrates content 0.806 kg, water in wet mass 0.15 kg, fat (total lipid) content 0.0038 kg, carbon allocation 0.31195 kg
- energy feed, gross: 1 MJ; name efc; CPC 23319: Preparations used in animal feeding n.e.c.; By-product classification allocatable product; pedigree (1,1,1,1,1)
  Palm date pits and organic waste are recovered for animal feed. The energetic value of the pits are 450 kcal / 100g. 1 kcal is equivalent to 0.004184 MJ. The amount of palm date organic waste is 0.12 kg per kg of dates
  production volume 1.25919e7 MJ; = efc/rpc*rppvc
    Calculated from production volume of reference product using the relative outputs.
  property price 0.0108 EUR2005; name efc_price_EUR2005
    Based on energy feed, gross content in soybean meal and prices per kg of soybean meal. Assumed soybean meal is the most used feed. Soybean meal 2004 prices for World import/export data (tonnes and US$) from FaoStat statistics (http://faostat.fao.org/site/535/default.aspx#ancor, TRADE)- [Accessed 24 May 2010]. See calculations for protein /energy content
  property carbon content 0
    carbon content on a dry matter basis (reserved; not for manual entry)
  property true value 0.0243972; name efc_true_value
    allocation property applied in "true value" allocation // value calculated from revenue
  properties: dry mass 0 kg, wet mass 0 kg, carbon content, non-fossil 0, water content 0, water in wet mass 0 kg, carbon content, fossil 0, carbon allocation 0 kg

## By-products
- protein feed, 100% crude: 0 kg; name pfc; By-product classification allocatable product; CPC 23319: Preparations used in animal feeding n.e.c.; pedigree (1,1,1,1,1)
  The palm date pits and other organic wastes are recovered into animal feed. The protein content of date pits is up to 7%. ( www.fao.org/docrep/t0681e/t0681e00.htm ). The total amount of organic waste recovered is 0.12 kg per kg of dates
  production volume 668895 kg; = pfc/rpc*rppvc
    Calculated from production volume of reference product using the relative outputs.
  property price 0.424 EUR2005; name pfc_price_EUR2005
    Based on protein content and energy feed, gross content in soybean meal and prices per kg of soybean meal. Assumed soybean meal is the most used feed. Soybean meal 2004 prices for World import/export data (tonnes and US$) from FaoStat statistics (http://faostat.fao.org/site/535/default.aspx#ancor, TRADE)- [Accessed 24 May 2010]. See calculations for protein /energy content
  property carbon content 0.53
    carbon content on a dry matter basis (reserved; not for manual entry)
  property true value 0.05088; name pfc_true_value
    allocation property applied in "true value" allocation // value calculated from revenue
  properties: dry mass 1 kg, carbon content, fossil 0, wet mass 1 kg, water content 0, water in wet mass 0 kg, carbon content, non-fossil 0.53, carbon allocation 0.53 kg
- heat, for reuse in municipal waste incineration only: 0 MJ; CPC 17300: Steam and hot water; By-product classification allocatable product; pedigree (1,1,1,1,1)
  Net electricity generated from this waste and used in internal MSWI plant energy redistribution.
  Uncertainty: uncertainty is calculated from uncertainties in waste composition and uncertainties in energy efficiency and the uncertainty in internal energy demand
  production volume 2056.4 MJ
  property exergy 0.1842 MJ; name E_th_prod_MSWI_exergy
    This exergy property is based on the exergy content of the product.
  property price 0.0106 EUR2005; name E_th_prod_MSWI_price_EUR2005
    Average European district heat price from Ecoheatcool and Euroheat 2005-2006, Ecoheat Work package 1: The European heat market. Final report. 10.6 EUR/GJ i s the price of district heat. http://www.solarthermalworld.org/files/Ecoheatcool%20WP1%20Web.pdf?download
  property true value relation 0.1842; name E_th_prod_MSWI_true_value_relation
    property to calculate "true value" from
  property true value 5.07486e-7
    allocation property applied in "true value" allocation // value calculated from true value relation
- electricity, for reuse in municipal waste incineration only: 0 kWh; CPC 17100: Electrical energy; By-product classification allocatable product; pedigree (1,1,1,1,1)
  (same comment as for heat, for reuse in municipal waste incineration only)
  production volume 288.224 kWh
  property true value relation 3.6; name E_el_prod_MSWI_true_value_relation
    property to calculate "true value" from
  property price 0.1 EUR2005; name E_el_prod_MSWI_price_EUR2005
    Estimated to be the same price as in case of electricity, medium voltage.
  property exergy 3.6 MJ; name E_el_prod_MSWI_exergy
    This exergy property is based on the exergy content of the product.
  property true value 1.37468e-6
    (same comment as for heat, for reuse in municipal waste incineration only)
- zinc concentrate: 0 kg; CPC 14290: Other non-ferrous metal ores and concentrates (other than uranium or thorium ores and concentrates); By-product classification allocatable product
  Calculated value from the knowledge of the properties of both products.
  production volume 0.0314807 kg
  property price 0.38 EUR2005; name ByP_price_EUR2005
    Temporary price data. Calculated as 90% of purchasers price based on: Zinc content in concentrate 53%. Concentrate price per kg Zn 86.5% of refined Zn price (13.5% treatment charges according to CHR Metals Limited 2005: Dynamic cost curves. http://www.minecost.com/dynamic.pdf). 2004 zinc price from USGS (2007) Mineral commodity summaries 2007. <http://minerals.usgs.gov/minerals/pubs/mcs/2007/mcs2007.pdf> [Accessed 25 May 2010]
  property zinc content 0.53; name zinc_C_zinc_concentrate
    Zinc content on a dry matter basis. Value taken from teh "zinc mine operation" /GLO dataset.
  property dry mass 1 kg; name DM_zinc_concentrate
  property carbon content 0
    carbon content on a dry matter basis (reserved; not for manual entry)
  property true value 7.25437e-11
    allocation property applied in "true value" allocation // value calculated from revenue
  properties: wet mass 1 kg, water content 0, carbon content, non-fossil 0, carbon content, fossil 0, water in wet mass 0 kg, carbon allocation 0 kg

## Inputs from technosphere
- palm date: 0.0193886 kg; lognormal variance with pedigree 0.0132, pedigree (4,4,3,1,2)
  1.234 kg of palm date from the farm is conditioned to produce 1 kg of palm date conditioned and dried. 0.120 kg becomes organic waste (who is recovered for animal feed) and 0.114 kg is the amount of water that is lost during the drying process
  properties: carbohydrates content 0.549 kg, carbon content, non-fossil 0.251, protein content 0.015, fat (total lipid) content 0.0014 kg, wet mass 1 kg, dry mass 0.79114 kg, water content 0.263999
- heat, district or industrial, natural gas: 3.59805e-6 MJ; lognormal variance with pedigree 0.0052, pedigree (1,4,3,1,2)
  During the drying , natural gas is used to heat the fruits
- electricity, low voltage: 0.00208169 kWh; lognormal variance with pedigree 0.0132, pedigree (4,4,3,1,2)
  Represent the amount of electricity needed for the conditioning of the palm dates. It includs the fumigating, the cooling, the drying, the heating and the washing of the fruits
- wastewater, average: 0 m3; name wwtc; pedigree (1,1,1,1,1)
  The water used for the washin is treated with tunisian average treatment for wastewater.
  production volume 0 m3
    Calculated from production volume of reference product using the relative outputs.
  property price 0 EUR2005; name wwtc_price_EUR2005
  properties: water content 2882.2, dry mass 0.346837 kg, wet mass 1000 kg, carbon content, non-fossil 0.194039
  note on carbon content, non-fossil: 0.0673 kg TOC/m3 (Tab A.17, ecoinvent v2.2 report 13_I). TOC was considered as Total Carbon.
- tap water: 0.0188544 kg; lognormal variance with pedigree 0.0146, pedigree (4,4,3,1,2)
  Water used to clean and wash the palm dates at the arrival
  properties: dry mass 0.000337476 kg, water content 2962.17, carbon content, fossil 0.00178991, wet mass 1 kg
  note on carbon content, fossil: Bicarbonate content is 2.93 mol/m3. CO2 content is 0.1 mol/m3 (ecoinvent v2.2 report 8, Tab 93.1).
- sugar, from sugar beet: 0.000628481 kg; lognormal variance with pedigree 0.0058, pedigree (2,4,3,1,2)
  Syrup for the glucosage process, in order to add sugar to the fruits.
  properties: carbon content, non-fossil 0.44, wet mass 1 kg, dry mass 1 kg
- chlorodifluoromethane: 0 kg; pedigree (1,1,1,1,1)
  This represent the amount af refrigerant R22 used to freeze and stock the fruits. 155.2 kg are used each year for the organic palm dates. It represents 97% of 10 bottles ( 16 kg/bottles).
  properties: wet mass 1 kg, carbon content, fossil 0.139535, dry mass 1 kg
- wastewater, average: -6.45095e-6, -6.97872e-7, -1.34968e-5 m3 (3 entries); lognormal variance with pedigree 0.014625, pedigree (4,4,3,2,2)
  The water used for the washin is treated with tunisian average treatment for wastewater.
  production volume 7324.39 m3
- chlorodifluoromethane: 2.20557e-8, 1.5439e-7 kg (2 entries); lognormal variance with pedigree 0.0132, pedigree (4,4,3,1,2)
  (same comment as for chlorodifluoromethane)

## Emissions to nature
- Water [air, urban air close to ground]: 1.86816e-6 m3; lognormal variance with pedigree 0.0132, pedigree (4,4,3,1,2)
  Water emitted to the air from drying.
- Methane, bromo-, Halon 1001 [air, urban air close to ground]: 6.77581e-6 kg; lognormal variance with pedigree 0.0132, pedigree (4,4,3,1,2)
  Methyle bromide is now used to sanitize the fruit, during the process of fumigation. This pesticide is now forbidden by the Montreal Protocole on Ozone depleting substances. The entreprise is planneing to used phostoxin starting 2015. The worst case scenario is modelized, where all the bromomethane is released to the athmosphere. This product is only used for the conventional palm dates, as a subsitute to the freezing process.

## Sampling procedure
The main palm date conditioning is located in the north of Tunisia. The value were collected from one of the main exporter of Deglet Noor in Tunisia (13'000 tons each year). It has been validated and complemented by literature data. The values are not average data from many exporter.
