# treatment of steel in car shredder residue, municipal incineration with fly ash extraction

Dataset: EcoSpold 2, unit process
Geography: CH
Time period: 2006-01-01 to 2019-12-31
Technology level: current
Classification: ISIC rev.4 ecoinvent: 3821:Treatment and disposal of non-hazardous waste
Synonyms: Siedlungsabfallverbrennung; municipal waste incineration; Kehrichtverbrennung
Scenario: Business-as-Usual
System model: Allocation at the point of substitution
Share of production covered: 100 %
Generated by: Gabor Doka
Published in: Doka G. 2015
Database: ecoinvent
isCopyrightProtected: true
accessRestrictedTo: 1

## General comment
This dataset represents the activity of waste disposal of steel in car shredder residue in a municipal solid waste incinerator (MSWI) // Recommended use of this dataset: For disposal of rather fine or dusty steel, which goes to incineration as part of Automotive Shredder Residue (ASR). Due to fine grain size of the particles, 50% burnability is assumed, therefore not suited for less fine steel parts in waste. Pure, isolated steel fractions will not be disposed in incinerators, but rather go to recycling. // Inventoried waste contains 50% Fe in ASR burnable; 50% Fe in ASR inert; . // Waste composition (wet, in ppm): H2O n.a.; O 121260; H n.a.; C n.a.; S 760; N n.a.; P 800; B n.a.; Cl 750; Br n.a.; F n.a.; I n.a.; Ag n.a.; As n.a.; Ba n.a.; Cd 3; Co n.a.; Cr 1200; Cu 13570; Hg n.a.; Mn 2400; Mo n.a.; Ni 1050; Pb 380; Sb 210; Se n.a.; Sn 670; V 250; Zn 202; Be n.a.; Sc n.a.; Sr n.a.; Ti n.a.; Tl n.a.; W n.a.; Si 30950; Fe 815330; Ca n.a.; Al 10220; K n.a.; Mg n.a.; Na n.a.; // Share of carbon in waste that is biogenic 60.4%. // Share of metals in waste not oxidised and bulk-recyclable (exclude very small or thin parts) Iron: 50%; Alu: 0%; Copper: 0%. // Recovery of metal scrap from bottom ash to recycling: 232.84g iron scrap, 0g aluminium scrap, 0g copper scrap. From this waste, the FLUWA process in the technology mix recovers 0.000196kg (DM) of a hydroxide sludge to be recycled in zinc furnaces. // Ultimately one kg of this waste produces 1.059 kg of bottom ash (can include some washed ash) and 0.01395 kg of residues, which are landfilled (technology mix). Additional solidification of residues with 0.005582 kg of cement.Net energy production: 0MJ/kg electric energy and 0MJ/kg thermal energy. //

## Included activities start
waste incineration from waste reception gate and delivery into waste bunker at incinerator plant site (without transports to the incinerator)

## Included activities end
Waste-specific short-term emissions to water from leachate. Long-term emissions from landfill to ground water.

## Geography
Specific to the technology mix encountered in Switzerland in 2012.

## Technology
average Swiss MSWI plants in 2010 (grate incinerators) with electrostatic precipitator for fly ash (ESP), wet flue gas scrubber and 25% SNCR , 42.77% SCR-high dust , 32.68% SCR-low dust -DeNOx facilities and 0% without Denox (weighted according to mass of burnt waste, representing Swiss average). Efficiency of iron scrap separation from slag : 58%. Efficiency of non-ferrous scrap separation from slag : 31%. The technology mix for this dataset includes a filter ash treatment (FLUWA) of a share of 46.22%. Gross electric efficiency technology mix 15.84% and Gross thermal efficiency technology mix 28.51%

## Time period
Waste composition as given in literature reference, theoretical data or other source. Transfer coefficients for modern MSWI.

## Reference product
- steel in car shredder residue: 0 kg; By-product classification Waste; CPC 39310: Slag, dross, scalings and other waste from the manufacture of iron or steel; CAS 7439-89-6
  Main reference product of this activity (supply of disposal service).
  production volume 0 kg
    based on corresponding global production volume of MSW fraction in conventional MSWI (wo fly ash extraction) and scaled down to annual Swiss incinerated MSW mass of 3.02 mio. tonnes.
  property price 0 EUR2005
    Waste products are assigned a price of zero as they are assumed to require further treatment.
  properties: iron content 0.81533, wet mass 1 kg, zinc content 0.000202, silicon content 0.03095, dry mass 1 kg, aluminium content 0.01022, chromium content 0.0012, cadmium content 3e-6, phosphorus content 0.0008, vanadium content 0.00025, copper content 0.01357, antimony content 0.00021, nickel content 0.00105, sulfur content 0.00076, tin content 0.00067, lead content 0.00038, manganese content 0.0024, chlorine content 0.00075, oxygen content 0.12126
- iron scrap, sorted, pressed: 1 kg; By-product classification Recyclable; CPC 39310: Slag, dross, scalings and other waste from the manufacture of iron or steel; pedigree (1,1,1,1,1)
  Iron scrap recovered from this waste.
  Uncertainty: uncertainty calculated from uncertainty in waste composition, uncertainty of share of recyclable metal, uncertainty of transfer coefficient to bottom ash, uncertainty of the efficiency of scrap removal in MSWI plant.
  production volume 147530 kg

## By-products
- iron scrap, sorted, pressed: 0 kg; By-product classification Recyclable; CPC 39310: Slag, dross, scalings and other waste from the manufacture of iron or steel; pedigree (1,1,1,1,1)
  (same comment as for iron scrap, sorted, pressed)
  production volume 0 kg
    calculated in proportion to reference product waste input to incinerator
  property price 0.175 EUR2005
    Temporary price data. Calculated as 90% of purchasers price based on: 2005 import and export prices (total trades (USD) divided by total weight (kg) in biggest economies of the world: EU27, USA, Brasil, China, India, Japan and Russia) from UN Commodity Trade Statistics Database (http://data.un.org/Explorer.aspxDatabase [Accessed 2011.06.20]). Commodity: Waste or scrap, of cast iron
  property carbon content 0
    carbon content on a dry matter basis (reserved; not for manual entry)
  properties: carbon content, non-fossil 0, water in wet mass 0 kg, wet mass 1 kg, carbon content, fossil 0, dry mass 1 kg, water content 0, carbon allocation 0 kg
- zinc concentrate: 0 kg; CPC 14290: Other non-ferrous metal ores and concentrates (other than uranium or thorium ores and concentrates); By-product classification allocatable product
  Calculated value from the knowledge of the properties of both products.
  property price 0.38 EUR2005; name ByP_price_EUR2005
    Temporary price data. Calculated as 90% of purchasers price based on: Zinc content in concentrate 53%. Concentrate price per kg Zn 86.5% of refined Zn price (13.5% treatment charges according to CHR Metals Limited 2005: Dynamic cost curves. http://www.minecost.com/dynamic.pdf). 2004 zinc price from USGS (2007) Mineral commodity summaries 2007. <http://minerals.usgs.gov/minerals/pubs/mcs/2007/mcs2007.pdf> [Accessed 25 May 2010]
  property zinc content 0.53; name zinc_C_zinc_concentrate
    Zinc content on a dry matter basis. Value taken from teh "zinc mine operation" /GLO dataset.
  property dry mass 1 kg; name DM_zinc_concentrate
  property carbon content 0
    carbon content on a dry matter basis (reserved; not for manual entry)
  properties: wet mass 1 kg, water content 0, carbon content, non-fossil 0, carbon content, fossil 0, water in wet mass 0 kg, carbon allocation 0 kg

## Inputs from technosphere
- iron (III) chloride, without water, in 40% solution state: 0 kg; pedigree (1,1,1,1,1)
  Auxilliary inputs for the wastewater treatment stage of the incinerator plant.
  Uncertainty: uncertainty calculated from uncertainty in average FeCl3 input, of transfer coefficients in the incinerator, and the uncertainty of the waste composition of this waste
  properties: dry mass 1 kg, wet mass 1 kg
- titanium dioxide: 0 kg; pedigree (1,1,1,1,1)
  Input to DeNOx stage (TiO2 catalyst carrier)
  Uncertainty: uncertainty calculated from uncertainty in average DeNOx input, uncertainty in the share of thermal NOx, uncertainty of nitrogen content in average municipal waste and the uncertainty in nitrogen content in *this* waste.
  properties: wet mass 1 kg, dry mass 1 kg
- residual material landfill: 0 unit; pedigree (1,1,1,1,1)
  Landfill infrastructure required for landfilling of incineration residues.
  Uncertainty: uncertainty is calculated from uncertainties in waste composition and transfer coefficients in incinerator
- hydrochloric acid, without water, in 30% solution state: 0.000253901 kg; lognormal variance with pedigree 0.0104118, pedigree (1,1,3,1,1)
  Auxilliary inputs for the wastewater treatment stage of the incinerator plant.
  Uncertainty: uncertainty calculated from uncertainty in average HCl input, of transfer coefficients in the incinerator, and the uncertainty of the waste composition of this waste
  properties: wet mass 1 kg, dry mass 1 kg
- ammonia, liquid: 0 kg; pedigree (1,1,1,1,1)
  Input to DeNOx stage (100% NH3).
  Uncertainty: uncertainty calculated from uncertainty in average DeNOx input, uncertainty in the share of thermal NOx, uncertainty of nitrogen content in average municipal waste and the uncertainty in nitrogen content in *this* waste.
  properties: wet mass 1 kg, dry mass 1 kg
- water, decarbonised: 0 kg; pedigree (1,1,1,1,1)
  Incinerator process water used in flue gas scrubber stage.
  Uncertainty: uncertainty calculated from uncertainty in average water input, and the uncertainty of the waste composition of this waste
  properties: wet mass 1 kg
- sodium hydroxide, without water, in 50% solution state: 0 kg; pedigree (1,1,1,1,1)
  Auxilliary inputs for the flue gas treatment stage of the incinerator plant, and partially in the filter ash treatment (FLUWA).
  Uncertainty: uncertainty calculated from uncertainty in average NaOH input, of transfer coefficients in the incinerator, and the uncertainty of the waste composition of this waste
  properties: dry mass 1 kg, wet mass 1 kg
- transport, freight, lorry, unspecified: 0 metric ton*km; pedigree (1,1,1,1,1)
  Transport services to transport incineration residues to landfills and filter ash to external treatments (FLUWA).
  Uncertainty: uncertainty calculated from uncertainty of the waste composition of this waste, uncertainty of transfer coefficients and the uncertainty in generic transportation distances
- process-specific burdens, residual material landfill: 0 kg; pedigree (1,1,1,1,1)
  Mass-specific expenditures required for landfilling of incineration residues.;activityLink introduced to establish a direct link to the corresponding regional supply of this product
  Uncertainty: uncertainty is calculated from uncertainties in waste composition and transfer coefficients in incinerator
- heat, for reuse in municipal waste incineration only: 0 MJ; name E_th_prod_MSWI; pedigree (1,1,1,1,1)
  Net heat required to incinerate this waste (subsidiesed from high-calorific waste fractions).
  Uncertainty: uncertainty is calculated from uncertainties in waste composition and uncertainties in energy efficiency and the uncertainty in internal energy demand
- metalliferous hydroxide sludge: 0 kg; pedigree (1,1,1,1,1)
  Metalliferous hydroxide sludge from filter ash leaching (FLUWA).
  Uncertainty: uncertainty is calculated from uncertainties in waste composition and transfer coefficients to filter ash in incinerator and the uncertainty of the transfer coefficients of the FLUWA process.
  production volume 0 kg
    calculated in proportion to reference product waste input to incinerator
  properties: water content 3, wet mass 1 kg, dry mass 0.25 kg, iron content 0.22989, lead content 0.01753, zinc content 0.09104, chromium content 0.014697, copper content 0.014407, oxygen content 0.39833, chlorine content 0.046206, phosphorus content 0.040127, sulfur content 0.11943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
- waste cement, hydrated: 0 kg; pedigree (1,1,1,1,1)
  Hydrated cement output for solidification of landfilled residual material.
  Uncertainty: Uncertainty calculated from uncertainty of the waste composition of this waste and transfer coefficients in the incinerator and of the solidification recipe.
  production volume 0 kg
    calculated in proportion to reference product waste input to incinerator
  properties: wet mass 1 kg, dry mass 1 kg
- process-specific burdens, slag landfill: 0 kg; pedigree (1,1,1,1,1)
  Mass-specific expenditures required for landfilling of bottom ash.;activityLink introduced to establish a direct link to the corresponding regional supply of this product
  Uncertainty: uncertainty is calculated from uncertainties in waste composition and transfer coefficients in incinerator
- electricity, for reuse in municipal waste incineration only: 0 kWh; name E_el_prod_MSWI; pedigree (1,1,1,1,1)
  Net electricity required to incinerate this waste (subsidiesed from high-calorific waste fractions).
  Uncertainty: uncertainty is calculated from uncertainties in waste composition and uncertainties in energy efficiency and the uncertainty in internal energy demand
- cement, unspecified: 0 kg; pedigree (1,1,1,1,1)
  Cement required for solidification of landfilled residual material.
  Uncertainty: Uncertainty calculated from uncertainty of the waste composition of this waste, of transfer coefficients in the incinerator and of the solidification recipe.
  properties: dry mass 1 kg, wet mass 1 kg
- hydrogen peroxide, without water, in 50% solution state: 0.00200692 kg; lognormal variance with pedigree 0.010693, pedigree (1,1,3,1,1)
  Auxilliary oxidising agent for filter ash treatment (FLUWA).
  Uncertainty: uncertainty calculated from uncertainty in of transfer coefficients in the incinerator, and the uncertainty of the waste composition of this waste
  properties: dry mass 1 kg, wet mass 1 kg
- chemical, inorganic: 1.73361e-8 kg; lognormal variance with pedigree 0.085199, pedigree (1,1,3,1,1)
  Auxilliary inputs for the wastewater treatment stage of the incinerator plant. Proxy for Polyelectrolyte.
  Uncertainty: uncertainty calculated from uncertainty in average Polyelectrolyte input, of transfer coefficients in the incinerator, and the uncertainty of the waste composition of this waste
  properties: wet mass 1 kg, dry mass 1 kg, carbon content, fossil 0.003
- chromium oxide, flakes: 0 kg; pedigree (1,1,1,1,1)
  Input to DeNOx stage. Active component in SCR catalyst (vanadium pentoxide, V2O5), here approximated with the available chromium trioxide.
  Uncertainty: uncertainty calculated from uncertainty in average DeNOx input, uncertainty in the share of thermal NOx, uncertainty of nitrogen content in average municipal waste and the uncertainty in nitrogen content in *this* waste.
  properties: wet mass 1 kg, dry mass 1 kg
- slag landfill: 0 unit; pedigree (1,1,1,1,1)
  Landfill infrastructure required for landfilling of bottom ash.
  Uncertainty: uncertainty is calculated from uncertainties in waste composition and transfer coefficients in incinerator
- chemical, organic: 0 kg; pedigree (1,1,1,1,1)
  Auxilliary inputs for the wastewater treatment stage of the incinerator plant. Proxy for (pure) Trisodium-trimercapto-s-triazine (CAS 17766-26-6), used as 15% diluted solution, aka TMT15.
  Uncertainty: uncertainty calculated from uncertainty in average TMT15 input, of transfer coefficients in the incinerator, and the uncertainty of the waste composition of this waste
  properties: dry mass 1 kg, wet mass 1 kg, carbon content, fossil 0.628
- heat, district or industrial, natural gas: 0 MJ; pedigree (1,1,1,1,1)
  Input to DeNOx stage, to heat up flue gas in low-dust SCR.
  Uncertainty: uncertainty calculated from uncertainty in average DeNOx input, uncertainty in the share of thermal NOx, uncertainty of nitrogen content in average municipal waste and the uncertainty in nitrogen content in *this* waste.
- municipal waste incineration facility: 0 unit
  Demands per kilogram waste.
- kraft paper, bleached: 1.86168e-6 kg; lognormal variance with pedigree 0.04, pedigree (1,1,5,1,1)
  EcoSpold01Location=RER
  calculated from max value assuming lognormal distribution
- rolling mill: 1.88495e-9 unit; lognormal variance with pedigree 0.344, pedigree (3,4,5,1,1)
  EcoSpold01Location=RER
  activityLink introduced to establish a direct link to the corresponding regional supply of this product
- silicon carbide: 0.00116567 kg; lognormal variance with pedigree 0.07, pedigree (1,1,5,1,1)
  EcoSpold01Location=RER
  calculated from max value assuming lognormal distribution
- lubricating oil: 0.00681314 kg; lognormal variance with pedigree 0.16, pedigree (1,1,5,1,1)
  EcoSpold01Location=RER
  calculated from max value assuming lognormal distribution
- steel in car shredder residue: -0.0161083 kg; lognormal variance with pedigree 0.16, pedigree (1,1,5,1,1)
  calculated from max value assuming lognormal distribution
  EcoSpold01Location=CH
  production volume 0.0079 kg
- lime, hydrated, loose weight: 5.95012e-5 kg; lognormal variance with pedigree 0.05, pedigree (1,1,5,1,1)
  calculated from max value assuming lognormal distribution
  EcoSpold01Location=CH
- steel, chromium steel 18/8, hot rolled: 0.0270384 kg; lognormal variance with pedigree 0.066, pedigree (4,5,5,1,1)
  EcoSpold01Location=RER
- heat, district or industrial, natural gas: 0.656283 MJ; lognormal variance with pedigree 0.04, pedigree (1,1,5,1,1)
  EcoSpold01Location=RER
  calculated from max value assuming lognormal distribution
- steel, low-alloyed: 0.00719084 kg; lognormal variance with pedigree 0.04, pedigree (1,1,5,1,1)
  EcoSpold01Location=RER
  calculated from max value assuming lognormal distribution
- electricity, medium voltage: 0.382113 kWh; lognormal variance with pedigree 0.04, pedigree (1,1,5,1,1)
  EcoSpold01Location=UCTE
  calculated from max value assuming lognormal distribution
- kraft paper, unbleached: 3.11831e-5 kg; lognormal variance with pedigree 0.34, pedigree (1,1,5,1,1)
  calculated from max value assuming lognormal distribution
  EcoSpold01Location=RER
- heat, district or industrial, other than natural gas: 0.0563722 MJ; lognormal variance with pedigree 0.04, pedigree (1,1,5,1,1)
- wood preservative, inorganic salt, containing Cr: 7.86e-5 kg; lognormal variance with pedigree 0.04, pedigree (1,1,5,1,1)
  calculated from max value assuming lognormal distribution
  EcoSpold01Location=RER
- hydrogen fluoride: 0.00226892 kg; lognormal variance with pedigree 0.11, pedigree (1,1,5,1,1)
  EcoSpold01Location=GLO
  calculated from max value assuming lognormal distribution
- packaging film, low density polyethylene: 9.87854e-5 kg; lognormal variance with pedigree 0.04, pedigree (1,1,5,1,1)
  calculated from max value assuming lognormal distribution
  EcoSpold01Location=RER
- sludge from steel rolling: -0.0220774 kg; lognormal variance with pedigree 0.0986, pedigree (2,5,5,1,1)
  EcoSpold01Location=CH
  production volume 0.0176 kg
- sawnwood, softwood, raw, dried (u=20%): 2.15257e-6 m3; lognormal variance with pedigree 0.04, pedigree (1,1,5,1,1)
  calculated from max value assuming lognormal distribution
  EcoSpold01Location=RER
- dust, unalloyed electric arc furnace steel: -7.2836e-5 kg; lognormal variance with pedigree 0.06, pedigree (1,1,5,1,1)
  EcoSpold01Location=CH
  calculated from max value assuming lognormal distribution
  production volume 0.000139 kg
- sheet rolling, steel: 0.000123664 kg; lognormal variance with pedigree 0.04, pedigree (1,1,5,1,1)
  EcoSpold01Location=RER
  calculated from max value assuming lognormal distribution
- nitric acid, without water, in 50% solution state: 0.00401908 kg; lognormal variance with pedigree 0.13, pedigree (1,1,5,1,1)
  calculated from max value assuming lognormal distribution
  EcoSpold01Location=RER
- municipal solid waste: -0.000416551 kg; lognormal variance with pedigree 0.0586, pedigree (2,5,5,1,1)
  EcoSpold01Location=CH
  production volume 0.000358 kg
- water, deionised: 0.175312, 0.000631081 kg (2 suppliers, which the file names only by identifier); sum of these 0.175943 kg; lognormal variance with pedigree 0.86, pedigree (1,1,5,1,1)
  EcoSpold01Location=CH
  calculated from max value assuming lognormal distribution
- waste mineral oil: -0.00106262, -2.45879e-5 kg (2 suppliers, which the file names only by identifier); sum of these -0.0010872 kg; lognormal variance with pedigree 0.06, pedigree (1,1,5,1,1)
  EcoSpold01Location=CH
  calculated from max value assuming lognormal distribution
  production volume 0.000991 kg
- steel, unalloyed: 0.0546815 kg; lognormal variance with pedigree 0.066, pedigree (4,5,5,1,1)
  EcoSpold01Location=RER
- sodium dichromate: 9.59325e-5 kg; lognormal variance with pedigree 0.04, pedigree (1,1,5,1,1)
  calculated from max value assuming lognormal distribution
  EcoSpold01Location=RER
- sulfuric acid: 0.00267332 kg; lognormal variance with pedigree 0.05, pedigree (1,1,5,1,1)
  EcoSpold01Location=RER
  calculated from max value assuming lognormal distribution
- basic oxygen furnace waste: -0.000123433 kg; lognormal variance with pedigree 0.06, pedigree (1,1,5,1,1)
  calculated from max value assuming lognormal distribution
  EcoSpold01Location=CH
  production volume 2.7599e7 kg
- agricultural trailer: 0.000779291 kg; lognormal variance with pedigree 1.30152, pedigree (3,3,4,1,3)
  Corresponds to 79.9 kg/ha related to the life time (20 years). Calculations base on tyre trailers of 1500 kg weight, 1200 hours useful life and 0.22 repair factor.
- shed, large, wood, non-insulated, fire-unprotected: 2.94811e-6 m2; lognormal variance with pedigree 0.0969451, pedigree (3,3,4,1,3)
  Storrage of diverse material related to the trellis system. Corresponds to 0.302 m2/ha related to the life time of the trellissystem (20 years).
- sawlog and veneer log, softwood, measured as solid wood under bark: 0.000133882 m3; lognormal variance with pedigree 0.0887633, pedigree (2,3,4,2,2)
- heat, district or industrial, other than natural gas: 0.0723765 MJ; lognormal variance with pedigree 0.0872491, pedigree (1,3,4,1,2)
  Heat used for tar impragnation of wooden poles. Corresponds to 371 MJ/ha related to the life time (20 years)
- wood preservation, pressure vessel, creosote, outdoor use, ground contact: 0.0153964 kg; lognormal variance with pedigree 0.0881633, pedigree (1,3,4,2,2)
  Tar oil used for impragnation of the wooden poles. Corresponds to 1579 kg/ha related to the life time (20 years).
- diesel, burned in agricultural machinery: 0.497871 MJ; lognormal variance with pedigree 0.0969451, pedigree (3,3,4,1,3)
  Corresponds to 1134 MJ/ha related to the life time (20 years). 45 MJ = 1 kg Diesel
- waste wood, post-consumer: -0.110818 kg; lognormal variance with pedigree 0.0878491, pedigree (2,3,4,1,2)
  Disposal of wooden poles. Corresponds to 11364.08 kg/ha related to the life time (20 years).
  production volume 2.49913e7 kg
- residual softwood, wet: 1.09784e-5 m3; lognormal variance with pedigree 0.0881633, pedigree (1,3,4,2,2)
  From manuafacturing poles from raw round wood under bark. Corresponds to 1.126 m3/ha related to the life time (20 years)
- tractor, 4-wheel, agricultural: 0.000945302 kg; lognormal variance with pedigree 1.30152, pedigree (3,3,4,1,3)
  Corresponds to 96.9 kg/ha related to the life time (20 years). Culationsfor were made based on a tractor of 3000 kg, with a useful life of 7000 hours and a repair factor of 0.74.

## Inputs from nature
- Oxygen [natural resource, in air]: 0 kg; pedigree (1,1,1,1,1)
  Oxygen from ambient air needed to combust and oxidise this waste. Net demand, i.e. without O2 leaving the plant in flue gas uncombusted.
  Uncertainty: uncertainty is calculated from uncertainties in waste composition and transfer coefficients to flue gas and soild residues in incinerator
- Water, cooling, unspecified natural origin [natural resource, in water]: 0.015805 m3; source Byers, W. 2003; lognormal variance with pedigree 0.0593, pedigree (2,3,5,3,3)
  Calculated based on literature, (Vionnet, S., Quantis Water Database - Technical Report, 2012). Assumed to have same or very similar water use as "sheet rolling, steel". Water is used for chromium conditioning, which basically means it is directly sprayed on the hot metal to cool it down. In this case the water comes into contact with the product, i.e. It is treated as process water, not cooling water. It includes the processes: hot rolling, acid pockling, cold rolling and finishing. The process ends when finished, rolled metal sheets leaves the plant.

## Emissions to nature
- Nickel, ion [water, ground-, long-term]: 0 kg; pedigree (1,1,1,1,1)
  Long-term emissions from landfilling of incineration residues.
  Uncertainty: uncertainty is calculated from uncertainties in waste composition and transfer coefficients in incinerator and landfills.
- Vanadium, ion [water, ground-, long-term]: 0 kg; pedigree (1,1,1,1,1)
  (same comment as for Nickel, ion)
- Cadmium, ion [water, ground-, long-term]: 0 kg; pedigree (1,1,1,1,1)
  (same comment as for Nickel, ion)
- Manganese [water, ground-, long-term]: 0 kg; pedigree (1,1,1,1,1)
  (same comment as for Nickel, ion)
- Chromium, ion [water, surface water]: 0 kg; pedigree (1,1,1,1,1)
  Emissions to water from waste composition and transfer coefficients in incinerator and landfills.
  Uncertainty: uncertainty is calculated from uncertainties in waste composition and transfer coefficients in incinerator and landfills
- Mercury [water, ground-, long-term]: 0 kg; pedigree (1,1,1,1,1)
  (same comment as for Nickel, ion)
- Copper, ion [water, ground-, long-term]: 0 kg; pedigree (1,1,1,1,1)
  (same comment as for Nickel, ion)
- Chromium [air, urban air close to ground]: 0 kg; pedigree (1,1,1,1,1)
  Emission to air from waste composition and transfer coefficients.
  Uncertainty: uncertainty is calculated from uncertainties in waste composition and transfer coefficients in incinerator
- Cadmium [air, urban air close to ground]: 0 kg; pedigree (1,1,1,1,1)
  (same comment as for Chromium)
- Manganese [air, urban air close to ground]: 0 kg; pedigree (1,1,1,1,1)
  (same comment as for Chromium)
- Hydrogen chloride [air, urban air close to ground]: 0 kg; pedigree (1,1,1,1,1)
  (same comment as for Chromium)
- Phosphorus [air, urban air close to ground]: 0 kg; pedigree (1,1,1,1,1)
  (same comment as for Chromium)
- Particulates, < 2.5 um [air, urban air close to ground]: 0 kg; pedigree (1,1,1,1,1)
  Incomplete combustion product emitted to air.
  Uncertainty: uncertainty calculated from uncertainty in average operation emissions, and the uncertainty of the flue gas volume from this waste.
- Silicon [water, ground-, long-term]: 0 kg; pedigree (1,1,1,1,1)
  (same comment as for Nickel, ion)
- Ammonia [air, urban air close to ground]: 0 kg; pedigree (1,1,1,1,1)
  Nitrogen species emitted to air after DeNOx stage.
  Uncertainty: uncertainty calculated from uncertainty in average N-emissions and uncertainty in the share of thermal NOx and the uncertainty in nitrogen content in *this* waste.
- Antimony [water, ground-, long-term]: 0 kg; pedigree (1,1,1,1,1)
  (same comment as for Nickel, ion)
- Nitrogen oxides [air, urban air close to ground]: 0 kg; pedigree (1,1,1,1,1)
  Sum of fuel-Nox and thermal-NOx emitted to air after DeNOx stage.
  Uncertainty: uncertainty calculated from uncertainty in average N-emissions and uncertainty in the share of thermal NOx and the uncertainty in nitrogen content in *this* waste.
- Calcium, ion [water, surface water]: 0 kg; pedigree (1,1,1,1,1)
  (same comment as for Chromium, ion)
- Sulfur dioxide [air, urban air close to ground]: 0 kg; pedigree (1,1,1,1,1)
  (same comment as for Chromium)
- Methane, fossil [air, urban air close to ground]: 0 kg; pedigree (1,1,1,1,1)
  (same comment as for Particulates, < 2.5 um)
- Methane, non-fossil [air, urban air close to ground]: 0 kg; pedigree (1,1,1,1,1)
  (same comment as for Particulates, < 2.5 um)
- Iron [air, urban air close to ground]: 0 kg; pedigree (1,1,1,1,1)
  (same comment as for Chromium)
- Carbon monoxide, fossil [air, urban air close to ground]: 0 kg; pedigree (1,1,1,1,1)
  (same comment as for Particulates, < 2.5 um)
- Carbon monoxide, non-fossil [air, urban air close to ground]: 0 kg; pedigree (1,1,1,1,1)
  (same comment as for Particulates, < 2.5 um)
- Water [water, surface water]: 0 m3; pedigree (1,1,1,1,1)
  Process water released to surface water.
  Uncertainty: uncertainty calculated from uncertainty in process water input and the uncertainty of fraction to surface water.
- Silicon [water, surface water]: 0 kg; pedigree (1,1,1,1,1)
  (same comment as for Chromium, ion)
- Aluminium [water, ground-, long-term]: 0 kg; pedigree (1,1,1,1,1)
  (same comment as for Nickel, ion)
- Zinc, ion [water, ground-, long-term]: 0 kg; pedigree (1,1,1,1,1)
  (same comment as for Nickel, ion)
- Thallium [water, surface water]: 0 kg; pedigree (1,1,1,1,1)
  (same comment as for Chromium, ion)
- Heat, waste [air, urban air close to ground]: 0 MJ; pedigree (1,1,1,1,1)
  Waste heat generated from heating value of this waste plus any electricity required to process it.
  Uncertainty: uncertainty is calculated from uncertainties in waste composition and uncertainties in energy efficiency and the uncertainty in internal energy demand
- Cobalt [water, ground-, long-term]: 0 kg; pedigree (1,1,1,1,1)
  (same comment as for Nickel, ion)
- Zinc, ion [water, surface water]: 0 kg; pedigree (1,1,1,1,1)
  (same comment as for Chromium, ion)
- Water [air, urban air close to ground]: 0 m3; pedigree (1,1,1,1,1)
  Water vapour from waste humidity, hydrogen oxidation and part of the process water.
  Uncertainty: Uncertainty calculated from uncertainty in waste composition, process water input and the uncertainty of fraction to air.
- Vanadium, ion [water, surface water]: 0 kg; pedigree (1,1,1,1,1)
  (same comment as for Chromium, ion)
- Heat, waste [water, surface water]: 0 MJ; pedigree (1,1,1,1,1)
  (same comment as for Heat, waste)
- Tin, ion [water, surface water]: 0 kg; pedigree (1,1,1,1,1)
  (same comment as for Chromium, ion)
- Benzo(a)pyrene [air, urban air close to ground]: 0 kg; pedigree (1,1,1,1,1)
  (same comment as for Particulates, < 2.5 um)
- Antimony [water, surface water]: 0 kg; pedigree (1,1,1,1,1)
  (same comment as for Chromium, ion)
- Phenol, pentachloro- [air, urban air close to ground]: 0 kg; pedigree (1,1,1,1,1)
  (same comment as for Particulates, < 2.5 um)
- Nickel [air, urban air close to ground]: 0 kg; pedigree (1,1,1,1,1)
  (same comment as for Chromium)
- Lead [water, surface water]: 0 kg; pedigree (1,1,1,1,1)
  (same comment as for Chromium, ion)
- Benzene, hexachloro- [air, urban air close to ground]: 0 kg; pedigree (1,1,1,1,1)
  (same comment as for Particulates, < 2.5 um)
- Chloride [water, ground-, long-term]: 0 kg; pedigree (1,1,1,1,1)
  (same comment as for Nickel, ion)
- Copper, ion [water, surface water]: 0 kg; pedigree (1,1,1,1,1)
  (same comment as for Chromium, ion)
- Manganese [water, surface water]: 0 kg; pedigree (1,1,1,1,1)
  (same comment as for Chromium, ion)
- Iron, ion [water, ground-, long-term]: 0 kg; pedigree (1,1,1,1,1)
  (same comment as for Nickel, ion)
- Tin, ion [water, ground-, long-term]: 0 kg; pedigree (1,1,1,1,1)
  (same comment as for Nickel, ion)
- Sulfate [water, ground-, long-term]: 0 kg; pedigree (1,1,1,1,1)
  (same comment as for Nickel, ion)
- Benzene [air, urban air close to ground]: 0 kg; pedigree (1,1,1,1,1)
  (same comment as for Particulates, < 2.5 um)
- Arsenic, ion [water, ground-, long-term]: 0 kg; pedigree (1,1,1,1,1)
  (same comment as for Nickel, ion)
- Aluminium [water, surface water]: 0 kg; pedigree (1,1,1,1,1)
  (same comment as for Chromium, ion)
- Dioxins, measured as 2,3,7,8-tetrachlorodibenzo-p-dioxin [air, urban air close to ground]: 0 kg; pedigree (1,1,1,1,1)
  (same comment as for Particulates, < 2.5 um)
- Nickel, ion [water, surface water]: 0 kg; pedigree (1,1,1,1,1)
  (same comment as for Chromium, ion)
- Chromium VI [water, surface water]: 0 kg; pedigree (1,1,1,1,1)
  (same comment as for Chromium, ion)
- Particulates, > 2.5 um, and < 10um [air, urban air close to ground]: 0 kg; pedigree (1,1,1,1,1)
  (same comment as for Particulates, < 2.5 um)
- Cobalt [water, surface water]: 0 kg; pedigree (1,1,1,1,1)
  (same comment as for Chromium, ion)
- Lead [air, urban air close to ground]: 0 kg; pedigree (1,1,1,1,1)
  (same comment as for Chromium)
- Cadmium, ion [water, surface water]: 0 kg; pedigree (1,1,1,1,1)
  (same comment as for Chromium, ion)
- NMVOC, non-methane volatile organic compounds, unspecified origin [air, urban air close to ground]: 0 kg; pedigree (1,1,1,1,1)
  (same comment as for Particulates, < 2.5 um)
- Copper [air, urban air close to ground]: 0 kg; pedigree (1,1,1,1,1)
  (same comment as for Chromium)
- Arsenic, ion [water, surface water]: 0 kg
  Emissions to water from waste composition and transfer coefficients in incinerator and landfills.
- Chloride [water, surface water]: 0 kg; pedigree (1,1,1,1,1)
  (same comment as for Chromium, ion)
- Phosphate [water, surface water]: 0 kg; pedigree (1,1,1,1,1)
  (same comment as for Chromium, ion)
- Toluene [air, urban air close to ground]: 0 kg; pedigree (1,1,1,1,1)
  (same comment as for Particulates, < 2.5 um)
- Benzene, pentachloro- [air, urban air close to ground]: 0 kg; pedigree (1,1,1,1,1)
  (same comment as for Particulates, < 2.5 um)
- Sulfate [water, surface water]: 0 kg; pedigree (1,1,1,1,1)
  (same comment as for Chromium, ion)
- Lead [water, ground-, long-term]: 0 kg; pedigree (1,1,1,1,1)
  (same comment as for Nickel, ion)
- Chromium VI [water, ground-, long-term]: 0 kg; pedigree (1,1,1,1,1)
  (same comment as for Nickel, ion)
- Aluminium [air, urban air close to ground]: 0 kg; pedigree (1,1,1,1,1)
  (same comment as for Chromium)
- Phosphate [water, ground-, long-term]: 0 kg; pedigree (1,1,1,1,1)
  (same comment as for Nickel, ion)
- Iron, ion [water, surface water]: 0 kg; pedigree (1,1,1,1,1)
  (same comment as for Chromium, ion)
- Thallium [water, ground-, long-term]: 0 kg; pedigree (1,1,1,1,1)
  (same comment as for Nickel, ion)
- Mercury [water, surface water]: 0 kg; pedigree (1,1,1,1,1)
  (same comment as for Chromium, ion)
- Silicon [air, urban air close to ground]: 0 kg; pedigree (1,1,1,1,1)
  (same comment as for Chromium)
- Zinc [air, urban air close to ground]: 0 kg; pedigree (1,1,1,1,1)
  (same comment as for Chromium)
- Vanadium [air, urban air close to ground]: 0 kg; pedigree (1,1,1,1,1)
  (same comment as for Chromium)
- Tin [air, urban air close to ground]: 0 kg; pedigree (1,1,1,1,1)
  (same comment as for Chromium)
- Antimony [air, urban air close to ground]: 0 kg; pedigree (1,1,1,1,1)
  (same comment as for Chromium)
- Calcium, ion [water, ground-, long-term]: 0 kg; pedigree (1,1,1,1,1)
  (same comment as for Nickel, ion)
- NMVOC, non-methane volatile organic compounds, unspecified origin [air, unspecified]: 5.48419e-5 kg; lognormal variance with pedigree 0.05, pedigree (1,1,5,1,1)
  calculated from max value assuming lognormal distribution
- Nitrogen oxides [air, unspecified]: 0.000128523 kg; lognormal variance with pedigree 3.28, pedigree (1,1,5,1,1)
  calculated from max value assuming lognormal distribution
- Copper, ion [water, unspecified]: 3.18566e-7 kg; lognormal variance with pedigree 0.1486, pedigree (2,5,5,1,1)
- Nickel, ion [water, unspecified]: 9.31786e-7 kg; lognormal variance with pedigree 0.1486, pedigree (2,5,5,1,1)
- Chromium VI [water, unspecified]: 3.29677e-8 kg; lognormal variance with pedigree 0.1486, pedigree (2,5,5,1,1)
- TOC, Total Organic Carbon [water, unspecified]: 8.60872e-6 kg; lognormal variance with pedigree 0.42, pedigree (5,5,5,5,5)
- DOC, Dissolved Organic Carbon [water, unspecified]: 8.63911e-6 kg; lognormal variance with pedigree 0.28, pedigree (5,5,5,5,5)
- Chromium [air, unspecified]: 4.86364e-9 kg; lognormal variance with pedigree 0.708, pedigree (1,5,5,1,1)
- Iron [soil, unspecified]: 0.00290043 kg; lognormal variance with pedigree 0.29, pedigree (1,1,5,1,1)
  calculated from max value assuming lognormal distribution
- Aluminium [water, unspecified]: 1.55792e-6 kg; lognormal variance with pedigree 0.1486, pedigree (2,5,5,1,1)
- COD, Chemical Oxygen Demand [water, unspecified]: 4.53298e-5 kg; lognormal variance with pedigree 0.0986, pedigree (2,5,5,1,1)
- Chromium, ion [water, unspecified]: 5.92685e-7 kg; lognormal variance with pedigree 0.1486, pedigree (2,5,5,1,1)
- Particulates, > 2.5 um, and < 10um [air, unspecified]: 4.54529e-5 kg; lognormal variance with pedigree 0.07, pedigree (1,1,5,1,1)
  calculated from max value assuming lognormal distribution
- Hydrogen fluoride [air, unspecified]: 4.323e-7 kg; lognormal variance with pedigree 0.54, pedigree (1,1,5,1,1)
  calculated from max value assuming lognormal distribution
- Suspended solids, unspecified [water, unspecified]: 0.000174524 kg; lognormal variance with pedigree 0.0986, pedigree (2,5,5,1,1)
- Sulfur dioxide [air, unspecified]: 2.23262e-5 kg; lognormal variance with pedigree 0.0986, pedigree (2,5,5,1,1)
- Lead [water, unspecified]: 3.29677e-7 kg; lognormal variance with pedigree 0.1486, pedigree (2,5,5,1,1)
- Manganese [water, unspecified]: 6.71745e-7 kg; lognormal variance with pedigree 0.1486, pedigree (2,5,5,1,1)
- Water [air, unspecified]: 0.00615963 m3; lognormal variance with pedigree 0.0807, pedigree (2,2,5,1,1)
  Calculated value based on literature values and expert opinion. See comments in the parametres' comment field.
- BOD5, Biological Oxygen Demand [water, unspecified]: 2.7278e-5 kg; lognormal variance with pedigree 0.25, pedigree (5,5,5,5,5)
- Water [water, unspecified]: 0.00982132 m3; lognormal variance with pedigree 0.0807, pedigree (2,2,5,1,1)
  (same comment as for Water)
- Zinc, ion [water, unspecified]: 2.45963e-7 kg; lognormal variance with pedigree 0.1486, pedigree (2,5,5,1,1)
- Iron, ion [water, unspecified]: 5.10659e-6 kg; lognormal variance with pedigree 0.1486, pedigree (2,5,5,1,1)
- Chloride [water, unspecified]: 1.47008e-6 kg; lognormal variance with pedigree 0.0986, pedigree (2,5,5,1,1)
- Oils, unspecified [soil, industrial]: 2.0174e-5 kg; lognormal variance with pedigree 0.04, pedigree (1,1,5,1,1)
  calculated from max value assuming lognormal distribution
- Cadmium, ion [water, unspecified]: 1.64577e-7 kg; lognormal variance with pedigree 0.1486, pedigree (2,5,5,1,1)
- Hydrocarbons, unspecified [water, unspecified]: 2.07335e-6 kg; lognormal variance with pedigree 0.3686, pedigree (2,5,5,1,1)
- Particulates, > 10 um [air, unspecified]: 4.51331e-5 kg; lognormal variance with pedigree 0.07, pedigree (1,1,5,1,1)
  calculated from max value assuming lognormal distribution
- Mercury [water, unspecified]: 3.29677e-8 kg; lognormal variance with pedigree 0.1486, pedigree (2,5,5,1,1)
- Oils, unspecified [soil, unspecified]: 2.46227e-5 kg; lognormal variance with pedigree 0.04, pedigree (1,1,5,1,1)
  calculated from max value assuming lognormal distribution
- Hydrogen [air, unspecified]: 4.64953e-10 kg; lognormal variance with pedigree 0.07, pedigree (1,1,5,1,1)
  calculated from max value assuming lognormal distribution
- Sulfate [air, unspecified]: 2.21284e-8 kg; lognormal variance with pedigree 0.07, pedigree (1,1,5,1,1)
  calculated from max value assuming lognormal distribution
- Hydrogen chloride [air, unspecified]: 8.2502e-8 kg; lognormal variance with pedigree 0.178, pedigree (1,5,5,1,1)
- Heat, waste [air, non-urban air or from high stacks]: 0.00208217 MJ; lognormal variance with pedigree 0.0872491, pedigree (1,3,4,1,2)
  Heat used from tar impragnation of wooden poles. Corresponds to 213 MJ/ha related to the life time (20 years)
