# asparagus seedling production, for planting

Dataset: EcoSpold 2, unit process
Geography: FR
Time period: 2009-01-01 to 2019-12-31
Technology level: current
Classification: ISIC rev.4 ecoinvent: 0130:Plant propagation
Tags: WFLDB
Scenario: Business-as-Usual
System model: Allocation at the point of substitution
Generated by: Eliane Riedener
Published in: Nemecek T. 2015
Database: ecoinvent
isCopyrightProtected: true
accessRestrictedTo: 1

## General comment
This dataset represents the production of 1 asparagus seedling (crown) raised in a nursery during one year. From an asparagus nursery of 1 ha, seedlings for 10 ha productive asparagus fields can be obtained, i.e. a total of 250'000 seedlings are obtained from 1 ha nursery.
PEF-Quality: data quality rating (DQR) =1.17 (i.e. excellent quality). This dataset refers to an average situation; for specific situations exchanges might differ substantially due to site specific parameters

## Included activities start
The activity starts with soil cultivation of the field where after an establishing phase of two years seelings will be harvested for 7 years.

## Included activities end
The inventory includes all activites of an average year in the productive phase of an asparagus field, i.e. soil cultivation, pesticide application, fertilisation and harvesting (manually). Machine infrastructure including a shed for shelter and fuel use are also considered as well as transport on farm. Inputs of fertilisers, pesticides, irrigation water are included. Direct field emissions from crop production activities (e.g. fertiliser and pesticide use) and land use change are considered. Also regarded are the first two years of the non-productive phase, i.e.planting (manually), soil cultivation (plough), fertilisation (manure) and PE foil.
From a mint nursery of 1 ha, seedlings for 12.5 ha productive mint fields can be obtained, i.e. a total of 1'388'887.5 seedlings are obtained from 1 ha nursery. Transport from the nursery to the farm is not included.
The activity ends with harvesting asparagus seedlings (crowns).

## Parameters
- LUC_crop_specific: 1
  This parameter allows to switch between a 'crop specific' and a 'country specific' approach when calculating the LUC of a crop. By default, the chosen approach is 'crop specific', so the value of the parameter is 1. If you want to apply a 'country specific' approach, turn the parameter to 0.
- heavyMetalUptakeSwitch: 1

## Reference product
- asparagus seedling, for planting: 1 unit; By-product classification allocatable product; CPC 01961: Live plants; bulbs, tubers and roots; cuttings and slips; mushroom spawn
  Reference flow: Yield = 250000 seedlings/ha
  production volume 1.70171e7 unit
    Source: FAOSTAT. Average, 2009-2012. Calculation method: crop production volume [kg] / crop productivity [kg/ha] * planting density [units/ha] = units
  property price 0.00201405 EUR2005
    Calculated based on inputs: The price of the product has been calculated as a sum of the values of the material and energy inputs for this product. This value is therefore a rough estimation. It may underestimate the real price since there are additional expenses when producing any product. These expences can include for example labour costs, treatment of waste materials and profit for the producer. Please consider carefully whether this level of data quality is acceptable for your application.
  property carbon content, non-fossil 0.439481
    calculation: C-content of components according to ecoinvent report No. 15a. Source of composition: https://ndb.nal.usda.gov/ndb/search/. Unspecific seedling used as proxy.
  property carbon content 0.439481
    carbon content on a dry matter basis (reserved; not for manual entry)
  properties: dry mass 0.578035 kg, wet mass 1 kg, water content 0.73, water in wet mass 0.421965 kg, carbon content, fossil 0, carbon allocation 0.254036 kg

## Inputs from technosphere
- fertilising, by broadcaster: 1.2e-5 ha; source Roy G.  2015; lognormal variance with pedigree 0.118177, pedigree (2,1,3,1,1)
  Literature value or expert estimation (Personal written communication, Gregory Roy, Ctifl, 2015).
- packaging, for pesticides: 4.52753e-5 kg; lognormal variance with pedigree 0.0532, pedigree (4,3,3,5,4)
  Total amount of active substance/s of pesticides needed for the production of asparagus seedling, for planting is calculated to be circa 2.26E-05 kg. Pesticide/s used in this dataset is/are: '[thio]carbamate-compound', 'acetamide-anillide-compound, unspecified', 'cyclic N-compound', 'dinitroaniline-compound', 'diphenylether-compound', 'dithiocarbamate-compound', 'nitrile-compound', 'organophosphorus-compound, unspecified', 'pyrethroid-compound', 'triazine-compound, unspecified'. The total amount of active substance/s is doubled in order to account for the packaging of the dilluted product of pesticide/s that is/are applied. Therefore, 4.53E-05 kg of packaging for pesticides is justified with this exchange.
  properties: dry mass 1 kg, price 0.0642 EUR2005, wet mass 1 kg, carbon content, fossil 0.85714
- application of plant protection product, by field sprayer: 4.8e-5 ha; source Roy G.  2015; lognormal variance with pedigree 0.118664, pedigree (2,2,3,1,1)
  (same comment as for fertilising, by broadcaster)
- liquid manure spreading, by vacuum tanker: 7.784e-7 m3; source Roy G.  2015; lognormal variance with pedigree 0.118177, pedigree (2,1,3,1,1)
  This amount corresponds to the input of liquid manure. Personal written communication, Gregory Roy, Ctifl, 2015
- transport, tractor and trailer, agricultural: 3.33044e-5 metric ton*km; lognormal variance with pedigree 0.156439, pedigree (4,1,3,1,1)
  On-farm transport: Yield (in tonnes) multiplied by the average distance from field to farm. The distance was assumed to be 2 km (proxy).
- [thio]carbamate-compound: 1.13518e-6 kg; source Roy G.  2015; lognormal variance with pedigree 0.00784984, pedigree (2,2,3,1,1)
  (same comment as for fertilising, by broadcaster)
  properties: carbon content, fossil 0.626349, dry mass 1 kg, wet mass 1 kg
- acetamide-anillide-compound, unspecified: 4.52379e-6 kg; source Roy G.  2015; lognormal variance with pedigree 0.00784984, pedigree (2,2,3,1,1)
  (same comment as for fertilising, by broadcaster)
  properties: wet mass 1 kg, carbon content, fossil 0.659175, dry mass 1 kg
- cyclic N-compound: 9.33138e-7 kg; source Roy G.  2015; lognormal variance with pedigree 0.00784984, pedigree (2,2,3,1,1)
  (same comment as for fertilising, by broadcaster)
  properties: carbon content, fossil 0.641962, dry mass 1 kg, wet mass 1 kg
- ammonium nitrate, as N: 0.00022 kg; source Marc Lambert 2015; lognormal variance with pedigree 0.118177, pedigree (2,1,3,1,1)
  Calculated based on literature values or expert estimation: The total amount of nutrient (Personal written communication, Gregory Roy, Ctifl, 2015) multiplied by the share of fertiliser type (Personal written communication, Marc Lambert, Yara, 2015). See supporting documentation 'WFLDB-Documentation.pdf' chapter 'Fertiliser application' for L3 and L4 data (https://ecoquery.ecoinvent.org/File/Reports).
  Corresponds to 55.0 kg/ha
  properties: dry mass 1 kg, wet mass 1 kg
- dinitroaniline-compound: 2.7651e-6 kg; source Roy G.  2015; lognormal variance with pedigree 0.00784984, pedigree (2,2,3,1,1)
  (same comment as for fertilising, by broadcaster)
  properties: carbon content, fossil 0.55516, wet mass 1 kg, dry mass 1 kg
- nitrogen fertiliser, as N: 0.00022 kg; source Marc Lambert 2015; lognormal variance with pedigree 0.118177, pedigree (2,1,3,1,1)
  Calculated based on literature values or expert estimation: The total amount of nutrient (Personal written communication, Gregory Roy, Ctifl, 2016) multiplied by the share of fertiliser type (Personal written communication, Marc Lambert, Yara, 2015). See supporting documentation 'WFLDB-Documentation.pdf' chapter 'Fertiliser application' for L3 and L4 data (https://ecoquery.ecoinvent.org/File/Reports).
  Corresponds to 55.0 kg/ha
  properties: dry mass 1 kg, wet mass 1 kg
- dithiocarbamate-compound: 1.58841e-6 kg; source Roy G.  2015; lognormal variance with pedigree 0.00784984, pedigree (2,2,3,1,1)
  (same comment as for fertilising, by broadcaster)
  properties: carbon content, fossil 0.179339, dry mass 1 kg, wet mass 1 kg
- potassium chloride, as K2O: 0.0006 kg; source Marc Lambert 2015; lognormal variance with pedigree 0.118177, pedigree (2,1,3,1,1)
  Calculated based on literature values or expert estimation: The total amount of nutrient (Personal written communication, Gregory Roy, Ctifl, 2019) multiplied by the share of fertiliser type (Personal written communication, Marc Lambert, Yara, 2015). See supporting documentation 'WFLDB-Documentation.pdf' chapter 'Fertiliser application' for L3 and L4 data (https://ecoquery.ecoinvent.org/File/Reports).
  Corresponds to 150.0 kg/ha
  properties: dry mass 1 kg, wet mass 1 kg
- nitrile-compound: 1.85315e-6 kg; source Roy G.  2015; lognormal variance with pedigree 0.00784984, pedigree (2,2,3,1,1)
  (same comment as for fertilising, by broadcaster)
  properties: dry mass 1 kg, carbon content, fossil 0.344995, wet mass 1 kg
- manure, liquid, cattle: 0.000669415 kg; source Marc Lambert 2015; lognormal variance with pedigree 0.118177, pedigree (2,1,3,1,1)
  Calculated based on literature values: The total amount of manure (Personal written communication, Marc Lambert, Yara, 2015) multiplied by the country-share of manure per animal category (FAOSTAT 2015). See supporting documentation 'WFLDB-Documentation.pdf' chapter 'Fertiliser application' (https://ecoquery.ecoinvent.org/File/Reports).
  Corresponds to 0.167 m3/ha
  properties: dry mass 0.075 kg, wet mass 1 kg, carbon content, non-fossil 0.68, water content 12.333
- organophosphorus-compound, unspecified: 8.47152e-6 kg; source Roy G.  2015; lognormal variance with pedigree 0.00784984, pedigree (2,2,3,1,1)
  (same comment as for fertilising, by broadcaster)
  properties: wet mass 1 kg, carbon content, fossil 0.260898, dry mass 1 kg
- manure, liquid, swine: 0.000100462 kg; source Marc Lambert 2015; lognormal variance with pedigree 0.118177, pedigree (2,1,3,1,1)
  Calculated based on literature values: The total amount of manure (Personal written communication, Marc Lambert, Yara, 2015) multiplied by the country-share of manure per animal category (FAOSTAT 2015). See supporting documentation 'WFLDB-Documentation.pdf' chapter 'Fertiliser application' (https://ecoquery.ecoinvent.org/File/Reports).
  Corresponds to 0.0251 m3/ha
  properties: dry mass 0.05 kg, wet mass 1 kg, carbon content, non-fossil 0.64, water content 19
- triazine-compound, unspecified: 7.54812e-7 kg; source Roy G.  2015; lognormal variance with pedigree 0.00784984, pedigree (2,2,3,1,1)
  (same comment as for fertilising, by broadcaster)
  properties: wet mass 1 kg, carbon content, fossil 0.475616, dry mass 1 kg
- poultry manure, fresh: 4.2614e-6 kg; source Marc Lambert 2015; lognormal variance with pedigree 0.118177, pedigree (2,1,3,1,1)
  Calculated based on literature values: The total amount of manure (Personal written communication, Marc Lambert, Yara, 2015) multiplied by the country-share of manure per animal category (FAOSTAT 2015). See supporting documentation 'WFLDB-Documentation.pdf' chapter 'Fertiliser application' (https://ecoquery.ecoinvent.org/File/Reports).
  Corresponds to 0.00213 m3/ha
  properties: dry mass 0.38 kg, carbon content, non-fossil 0.33389, wet mass 1 kg, water content 1.63158
- diphenylether-compound: 5.95633e-7 kg; source Roy G.  2015; lognormal variance with pedigree 0.00784984, pedigree (2,2,3,1,1)
  (same comment as for fertilising, by broadcaster)
  properties: carbon content, fossil 0.560061, wet mass 1 kg, dry mass 1 kg
- manure, solid, cattle: 0.000521995 kg; source Marc Lambert 2015; lognormal variance with pedigree 0.118177, pedigree (2,1,3,1,1)
  Calculated based on literature values: The total amount of manure (Personal written communication, Marc Lambert, Yara, 2015) multiplied by the country-share of manure per animal category (FAOSTAT 2015). See supporting documentation 'WFLDB-Documentation.pdf' chapter 'Fertiliser application' (https://ecoquery.ecoinvent.org/File/Reports).
  Corresponds to 130.0 kg/ha
  properties: carbon content, non-fossil 0.441, water content 3.5454, wet mass 1 kg, dry mass 0.22 kg
- pyrethroid-compound: 1.69007e-8 kg; source Roy G.  2015; lognormal variance with pedigree 0.00784984, pedigree (2,2,3,1,1)
  (same comment as for fertilising, by broadcaster)
  properties: carbon content, fossil 0.623, wet mass 1 kg, dry mass 1 kg
- poultry manure, dried: 9.53246e-5 kg; source Marc Lambert 2015; lognormal variance with pedigree 0.118177, pedigree (2,1,3,1,1)
  Calculated based on literature values: The total amount of manure (Personal written communication, Marc Lambert, Yara, 2015) multiplied by the country-share of manure per animal category (FAOSTAT 2015). See supporting documentation 'WFLDB-Documentation.pdf' chapter 'Fertiliser application' (https://ecoquery.ecoinvent.org/File/Reports).
  properties: copper content 4.38e-5, lead content 2.92e-6, nickel content 4e-5, zinc content 0.000349, water content 0.156069, carbon content, non-fossil 0.33389, cadmium content 2.92e-7, dry mass 0.865 kg, wet mass 1 kg, mercury content 2e-7, potassium content 0.024, phosphorus content 0.0167, nitrogen content 0.532
- horticultural fleece: 0.0057144 m2; source Blanke M. 2012; lognormal variance with pedigree 0.118177, pedigree (2,1,3,1,1)
  Literature value or expert estimation (Blanke et al. 2012).
  properties: dry mass 1 kg, wet mass 1 kg, carbon content, fossil 0.85714
  note on carbon content, fossil: Polypropylene is formed by the polymerisation of propylene, C3H6
- tillage, harrowing, by spring tine harrow: 4e-6 ha; lognormal variance with pedigree 0.118177, pedigree (2,1,3,1,1)
  Estimation based on a modified MEXALCA-approach (Roches et al. 2010; Nemecek et al. 2012): See supporting documentation 'WFLDB-Documentation.pdf' chapter 'Machinery processes' for L2 data (https://ecoquery.ecoinvent.org/File/Reports).
- irrigation: 0.008 m3; source Roy G.  2015; lognormal variance with pedigree 0.118177, pedigree (2,1,3,1,1)
  Calculated value: The total amount of water used for irrigation (Personal written communication, Gregory Roy, Ctifl, 2015) multiplied by the country-share of irrigation technique (Personal written communication, Gregory Roy, Ctifl, 2015). See supporting documentation 'WFLDB-Documentation.pdf' chapter 'Water use for irrigation' (https://ecoquery.ecoinvent.org/File/Reports). Total amount of irrigation: 4000 m3/ha*year. Only 50% of the fields are irrigated, leading to 2000 m3/ha*year on average at the country-level.
  properties: wet mass 1000 kg, water content 9089.91, dry mass 0.11 kg
- tillage, ploughing: 5.7144e-7 ha; source Blanke M. 2012; lognormal variance with pedigree 0.118177, pedigree (2,1,3,1,1)
  Literature value or expert estimation (Blanke et al. 2012).
- phosphate fertiliser, as P2O5: 0.0002 kg; source Marc Lambert 2015; lognormal variance with pedigree 0.118177, pedigree (2,1,3,1,1)
  Calculated based on literature values or expert estimation: The total amount of nutrient (Personal written communication, Gregory Roy, Ctifl, 2017) multiplied by the share of fertiliser type (Personal written communication, Marc Lambert, Yara, 2015). See supporting documentation 'WFLDB-Documentation.pdf' chapter 'Fertiliser application' for L3 and L4 data (https://ecoquery.ecoinvent.org/File/Reports).
  Corresponds to 25.0 kg/ha
  properties: wet mass 1 kg, dry mass 1 kg
- solid manure loading and spreading, by hydraulic loader and spreader: 0.00061732 kg; source Roy G.  2015; lognormal variance with pedigree 0.118177, pedigree (2,1,3,1,1)
  This amount corresponds the input of solid manure. Personal written communication, Gregory Roy, Ctifl, 2015
- packaging, for fertilisers: 0.00248 kg; lognormal variance with pedigree 0.0532, pedigree (4,3,3,5,4)
  Total amount of active substance/s of fertilisers needed for the production of 'asparagus seedling, for planting' is calculated to be circa 1.24E-03 kg. Fertiliser/s used in this dataset is/are: 'ammonium nitrate, as N', 'nitrogen fertiliser, as N', 'phosphate fertiliser, as P2O5', 'potassium chloride, as K2O'. The total amount of active substance/s is doubled in order to account for the packaging of the dilluted product of fertiliser/s that is/are applied. Therefore, 2.48E-03 kg of packaging for fertilisers is justified with this exchange.
  properties: dry mass 1 kg, price 0.0642 EUR2005, wet mass 1 kg, carbon content, fossil 0.825301
  note on carbon content, fossil: Considering a chemical formula (C2H4)n for polyethylene, carbon content-fossil is calculated to be 0.856286 kg of Carbon per kg of dry mass.

## Inputs from nature
- Transformation, to arable land, unspecified use [natural resource, land]: 0.04 m2; lognormal variance with pedigree 0.0382144, pedigree (2,1,3,1,1)
  10000 m2 divided by the life time of the crop.
- Carbon dioxide, in air [natural resource, in air]: 0.0023202 kg; lognormal variance with pedigree 0.00784984, pedigree (2,2,3,1,1)
  CO2 uptake by biomass
- Energy, gross calorific value, in biomass [natural resource, biotic]: 0.0245788 MJ; lognormal variance with pedigree 0.00784984, pedigree (2,2,3,1,1)
  Gross energy content is related to MJ/kg dry matter of product. Source: ecoinvent data.
- Occupation, annual crop [natural resource, land]: 0.040108 m2*year; lognormal variance with pedigree 0.0140616, pedigree (2,1,3,1,1)
  Related to the duration from harvest date of previous crop to harvest date of main crop.
- Transformation, from arable land, unspecified use [natural resource, land]: 0.04 m2; lognormal variance with pedigree 0.0382144, pedigree (2,1,3,1,1)
  10000 m2 divided by the life time of the crop.

## Emissions to nature
- Clomazone [soil, agricultural]: 6.30379e-8 kg; lognormal variance with pedigree 0.0387216, pedigree (2,2,3,1,1)
  Calculated value - 100% emission in soil. See 'WFLDB-Guidelines.pdf', available at https://ecoquery.ecoinvent.org/File/Reports.
- Cycloxydim [soil, agricultural]: 6.18018e-7 kg; lognormal variance with pedigree 0.0387216, pedigree (2,2,3,1,1)
  (same comment as for Clomazone)
- Lead [water, surface water]: 4.9912e-9 kg; source Freiermuth R.  2006; lognormal variance with pedigree 0.350938, pedigree (2,2,3,1,1)
  Calculated value - Freiermuth (2006). See 'WFLDB-Guidelines.pdf', available at https://ecoquery.ecoinvent.org/File/Reports.
- Fluazifop [soil, agricultural]: 5.79372e-7 kg; lognormal variance with pedigree 0.0387216, pedigree (2,2,3,1,1)
  (same comment as for Clomazone)
- Deltamethrin [soil, agricultural]: 1.02591e-8 kg; lognormal variance with pedigree 0.0387216, pedigree (2,2,3,1,1)
  (same comment as for Clomazone)
- Chromium, ion [water, ground-]: 8.1112e-8 kg; source Freiermuth R.  2006; lognormal variance with pedigree 0.350938, pedigree (2,2,3,1,1)
  (same comment as for Lead)
- Glufosinate [soil, agricultural]: 6.18018e-6 kg; lognormal variance with pedigree 0.0387216, pedigree (2,2,3,1,1)
  (same comment as for Clomazone)
- Copper, ion [water, ground-]: 1.33128e-8 kg; source Freiermuth R.  2006; lognormal variance with pedigree 0.350938, pedigree (2,2,3,1,1)
  (same comment as for Lead)
- Dimethoate [soil, agricultural]: 2.06006e-6 kg; lognormal variance with pedigree 0.0387216, pedigree (2,2,3,1,1)
  (same comment as for Clomazone)
- Cadmium, ion [water, ground-]: 1.82244e-10 kg; source Freiermuth R.  2006; lognormal variance with pedigree 0.350938, pedigree (2,2,3,1,1)
  (same comment as for Lead)
- Oryzalin [soil, agricultural]: 2.68962e-6 kg; lognormal variance with pedigree 0.0387216, pedigree (2,2,3,1,1)
  (same comment as for Clomazone)
- Copper, ion [water, surface water]: 2.90936e-8 kg; source Freiermuth R.  2006; lognormal variance with pedigree 0.350938, pedigree (2,2,3,1,1)
  (same comment as for Lead)
- Ammonia [air, non-urban air or from high stacks]: 5.0128e-5 kg; source EEA 2013; lognormal variance with pedigree 0.0387216, pedigree (2,2,3,1,1)
  Calculated value - EMEP/EEA (2013). See 'WFLDB-Guidelines.pdf', available at https://ecoquery.ecoinvent.org/File/Reports.
- Acetamiprid [soil, agricultural]: 3.2961e-7 kg; lognormal variance with pedigree 0.0387216, pedigree (2,2,3,1,1)
  (same comment as for Clomazone)
- Nickel, ion [water, surface water]: 1.44644e-8 kg; source Freiermuth R.  2006; lognormal variance with pedigree 0.350938, pedigree (2,2,3,1,1)
  (same comment as for Lead)
- Nitrogen oxides [air, non-urban air or from high stacks]: 1.74928e-5 kg; source EEA 2013; lognormal variance with pedigree 0.118664, pedigree (2,2,3,1,1)
  Calculated value - EEA/EMEP (2013). See 'WFLDB-Guidelines.pdf', available at https://ecoquery.ecoinvent.org/File/Reports.
- Zinc, ion [water, ground-]: 7.584e-8 kg; source Freiermuth R.  2006; lognormal variance with pedigree 0.350938, pedigree (2,2,3,1,1)
  (same comment as for Lead)
- Lambda-cyhalothrin [soil, agricultural]: 6.18018e-9 kg; lognormal variance with pedigree 0.0387216, pedigree (2,2,3,1,1)
  (same comment as for Clomazone)
- Water [air, non-urban air or from high stacks]: 0.00487 m3; lognormal variance with pedigree 0.118177, pedigree (2,1,3,1,1)
  Calculated value - Emission calculated from water balance. See 'WFLDB-Guidelines.pdf', available at https://ecoquery.ecoinvent.org/File/Reports.
- Water [water, surface water]: 0.00250388 m3; lognormal variance with pedigree 0.118177, pedigree (2,1,3,1,1)
  (same comment as for Water)
- Zinc, ion [water, surface water]: 3.23328e-8 kg; source Freiermuth R.  2006; lognormal variance with pedigree 0.350938, pedigree (2,2,3,1,1)
  (same comment as for Lead)
- Chromium, ion [water, surface water]: 2.07332e-8 kg; source Freiermuth R.  2006; lognormal variance with pedigree 0.350938, pedigree (2,2,3,1,1)
  (same comment as for Lead)
- Water [water, ground-]: 0.00062596 m3; lognormal variance with pedigree 0.118177, pedigree (2,1,3,1,1)
  (same comment as for Water)
- Dinitrogen monoxide [air, non-urban air or from high stacks]: 1.0255e-5 kg; source IPCC 2006; lognormal variance with pedigree 0.118664, pedigree (2,2,3,1,1)
  Calculated value - IPCC (2006). See 'WFLDB-Guidelines.pdf', available at https://ecoquery.ecoinvent.org/File/Reports.
- Cadmium, ion [water, surface water]: 2.2458e-10 kg; source Freiermuth R.  2006; lognormal variance with pedigree 0.350938, pedigree (2,2,3,1,1)
  (same comment as for Lead)
- Phosphorus [water, surface water]: 5.5212e-7 kg; source Prasuhn V.  2006; lognormal variance with pedigree 0.169866, pedigree (2,2,3,1,1)
  Calculated value - Prasuhn (2006) and SQCB-Erosion. See 'WFLDB-Guidelines.pdf', available at https://ecoquery.ecoinvent.org/File/Reports.
- Cadmium [soil, agricultural]: 2.73391e-8 kg; = 2.74744e-08 + ( - 1.352675264e-10)*heavyMetalUptakeSwitch; source Freiermuth R.  2006
  Comment on mathematicalRelation:
  2.74744e-08 from Calculated value - Freiermuth (2006). See 'WFLDB-Guidelines.pdf', available at https://ecoquery.ecoinvent.org/File/Reports.
  -1.352675264e-10 from Crop, default, heavy metals uptake model
  Heavy metal uptake can be excluded by setting the parameter heavyMetalUptakeSwitch to zero.
- Chromium [soil, agricultural]: 1.99622e-7 kg; = 2.00348e-07 + ( - 7.260272e-10)*heavyMetalUptakeSwitch; source Freiermuth R.  2006
  Comment on mathematicalRelation:
  2.00348e-07 from Calculated value - Freiermuth (2006). See 'WFLDB-Guidelines.pdf', available at https://ecoquery.ecoinvent.org/File/Reports.
  -7.260272e-10 from Crop, default, heavy metals uptake model
  Heavy metal uptake can be excluded by setting the parameter heavyMetalUptakeSwitch to zero.
- Lead [soil, agricultural]: 1.84908e-8 kg; = 1.92112e-08 + ( - 7.203921632e-10)*heavyMetalUptakeSwitch; source Freiermuth R.  2006
  Comment on mathematicalRelation:
  1.92112e-08 from Calculated value - Freiermuth (2006). See 'WFLDB-Guidelines.pdf', available at https://ecoquery.ecoinvent.org/File/Reports.
  -7.203921632e-10 from Crop, default, heavy metals uptake model
  Heavy metal uptake can be excluded by setting the parameter heavyMetalUptakeSwitch to zero.
- Nitrate [water, ground-]: 0.000522655 kg; source Richner W. 2014; lognormal variance with pedigree 0.169866, pedigree (2,2,3,1,1)
- Copper [soil, agricultural]: 6.21959e-8 kg; = 7.1024e-08 + ( - 8.828091104e-09)*heavyMetalUptakeSwitch; source Freiermuth R.  2006
  Comment on mathematicalRelation:
  7.1024e-08 from Calculated value - Freiermuth (2006). See 'WFLDB-Guidelines.pdf', available at https://ecoquery.ecoinvent.org/File/Reports.
  -8.828091104e-09 from Crop, default, heavy metals uptake model
  Heavy metal uptake can be excluded by setting the parameter heavyMetalUptakeSwitch to zero.
- Boscalid [soil, agricultural]: 4.40029e-6 kg; lognormal variance with pedigree 0.0387216, pedigree (2,2,3,1,1)
  (same comment as for Clomazone)
- Lead [water, ground-]: 5.9924e-10 kg; source Freiermuth R.  2006; lognormal variance with pedigree 0.350938, pedigree (2,2,3,1,1)
  (same comment as for Lead)
- Phosphate [water, ground-]: 8.6064e-7 kg; source Prasuhn V.  2006; lognormal variance with pedigree 0.377166, pedigree (5,5,5,5,5)
- Mercury [water, ground-]: 3.42912e-12 kg; source Freiermuth R.  2006; lognormal variance with pedigree 0.350938, pedigree (2,2,3,1,1)
  (same comment as for Lead)
- Zinc [soil, agricultural]: 3.36316e-7 kg; = 3.78976e-07 + ( - 4.265975968e-08)*heavyMetalUptakeSwitch; source Freiermuth R.  2006
  Comment on mathematicalRelation:
  -4.265975968e-08 from Crop, default, heavy metals uptake model
  Heavy metal uptake can be excluded by setting the parameter heavyMetalUptakeSwitch to zero.
- Azoxystrobin [soil, agricultural]: 1.80255e-6 kg; lognormal variance with pedigree 0.0387216, pedigree (2,2,3,1,1)
  (same comment as for Clomazone)
- Nickel [soil, agricultural]: 4.17444e-8 kg; = 4.3136e-08 + ( - 1.391574336e-09)*heavyMetalUptakeSwitch; source Freiermuth R.  2006
  Comment on mathematicalRelation:
  4.3136e-08 from Calculated value - Freiermuth (2006). See 'WFLDB-Guidelines.pdf', available at https://ecoquery.ecoinvent.org/File/Reports.
  -1.391574336e-09 from Crop, default, heavy metals uptake model
  Heavy metal uptake can be excluded by setting the parameter heavyMetalUptakeSwitch to zero.
- Metribuzin [soil, agricultural]: 7.34206e-7 kg; lognormal variance with pedigree 0.0387216, pedigree (2,2,3,1,1)
  (same comment as for Clomazone)
- Difenoconazole [soil, agricultural]: 5.15015e-7 kg; lognormal variance with pedigree 0.0387216, pedigree (2,2,3,1,1)
  (same comment as for Clomazone)
- Mercury [water, surface water]: 4.0764e-11 kg; source Freiermuth R.  2006; lognormal variance with pedigree 0.350938, pedigree (2,2,3,1,1)
  (same comment as for Lead)
- Mancozeb [soil, agricultural]: 1.54505e-6 kg; lognormal variance with pedigree 0.0387216, pedigree (2,2,3,1,1)
  (same comment as for Clomazone)
- Mercury [soil, agricultural]: 2.85969e-10 kg; = 3.39996e-10 + ( - 5.402708096e-11)*heavyMetalUptakeSwitch; source Freiermuth R.  2006
  Comment on mathematicalRelation:
  -5.402708096e-11 from Crop, default, heavy metals uptake model
  Heavy metal uptake can be excluded by setting the parameter heavyMetalUptakeSwitch to zero.
- Pyraclostrobin (prop) [soil, agricultural]: 1.10419e-6 kg; lognormal variance with pedigree 0.0387216, pedigree (2,2,3,1,1)
  (same comment as for Clomazone)

## Sampling procedure
Asparagus has a lifetime of 9 years and 7 years in the productive phase (2 years of establishment, non-productive phase) . The dataset regards an average year of the productive phase of the nursery including also the inventories of the two establishement years (non-productive phase). The nursery is irrigated with 4000 m3/ha is applied on 50% of the fields. This results in a total amount water of 2000 m3/ha.
Data collection and direct field emissions follow the WFLDB Methodological Guidelines for the Life Cycle Inventory of Agricultural Products in the latest version, available at: (Report section: https://v30.ecoquery.ecoinvent.org/File/Reports).
Input data sources were categorised from level 0 (L0) to level (L4) as follows: L0 = estimate, proxy; L1 = statistical data (e.g. FAOSTAT); L2 = L1 adapted to crop or country; L3 = literature data or approved L1 L2 by experts; medium detailing (i.e. kg of total N-fertiliser); L4 = L3 data of high detailing (i.e. portion N-fertiliser types).In this dataset data were obtained for yield: L3; Fertilisers: L4; Pesticides: L4; Machinery: L4; Irrigation: L3. Detailed information about the sources used for data sampling can be taken from WFLDB 3.0 - Documentation, available at: (Report section: https://v30.ecoquery.ecoinvent.org/File/Reports).

## Extrapolations
This dataset has been extrapolated from year 2012 to the year of the calculation (2019). The uncertainty has been adjusted accordingly.

## Review by Assumpció ANTON 2016-05-30
Be aware that the use of statistics in input calculations could provide some specific inputs not common for specific crops, this should be corrected if better information is available and better reflexed in DQR . Currently, I would dissent for some of good marks provided, being a revision of criteria applied advisable.

Pesticides will need to be amended periodically checking for update of pesticides' ban.
