# treatment of waste polyethylene terephthalate, open dump, hyperarid infiltration class (-250mm)

Dataset: EcoSpold 2, unit process
Geography: GLO
Time period: 2006-01-01 to 2019-12-31
Technology level: current
Classification: ISIC rev.4 ecoinvent: 3821:Treatment and disposal of non-hazardous waste
Synonyms: municipal waste landfill
Scenario: Business-as-Usual
System model: Allocation at the point of substitution
Share of production covered: 1 %
Generated by: Avraam Symeonidis
Database: ecoinvent
isCopyrightProtected: true
accessRestrictedTo: 1

## General comment
This dataset represents the activity of waste disposal of waste polyethylene terephtalate in a open dump. Recommended use of this dataset: For PET, which goes to disposal as part of unmanaged communal waste mixture. Larger amounts of clean, *already separated* PET could go to recycling, depending on country-specific situation. // Waste composition (wet, in ppm): upper heating value 23.13 MJ/kg; lower heating value 22.95 MJ/kg; H2O 2000; O 368750; H 63380; C 553640; S 147.87; N 6456.8; P n.a.; B n.a.; Cl 788.62; Br 69.004; F 11.829; I n.a.; Ag n.a.; As 1.873; Ba 49.289; Cd 3.2531; Co 31.052; Cr 5.4218; Cu 11.829; Hg 0.08872; Mn 17.744; Mo n.a.; Ni 3.9431; Pb 5.5203; Sb 159.2; Se 2.0701; Sn 0.98577; V 1281.5; Zn 68.676; Be 0.49289; Sc n.a.; Sr 87.241; Ti 985.77; Tl 0.39431; W n.a.; Si n.a.; Fe 98.577; Ca 295.73; Al 197.15; K n.a.; Mg n.a.; Na 1444.7; . // Share of carbon in waste that is biogenic 0%. Share of metals in waste not oxidised and bulk-recyclable (exclude very small or thin parts) Iron: 0%; Alu: 0%; Copper: 0%. Overall degradability of waste during 100 years: 1%.

## Included activities start
from final waste deposition (without transports to the site)

## Included activities end
Waste-specific short-term emissions to air via landfill gas and landfill leachate. Waste-specific long-term emissions from landfill.

## Geography
Given name of landfill location is 'infiltration class 1 hyperarid (2018)'. Landfill site with mean annual temperature (MAT) of 8 degC, mean annual precipitation (MAP) of 350 mm/year, and net infiltration of -250 mm/year. Negative infiltration means that leachate flow is reversed and flows upward to the surface, where water is evaporated and dissolved solids become solid evaporites.
Climate adjustments result in an alpha t (temperature) for permafrost areas of 0.999. Total climate adjustments with alpha pt of 0.999.

## Technology
This is an inventory for an open, uncontrolled waste dump for municipal solid waste. Ultimate average landfill height is 7 meters. Operation phase duration is 15 years.Percentage of landfill gas directly emitted is 100w%. A Methane Correction Factor (MCF) for landfill air emissions of 0.7057 is employed.
Leachate of the landfill is not treated. Leachate flow is upward to the surface due to net negative infiltration. No leachate treatment can be performed. Based on average waste composition and climate data the end of carbonate phase is estimated to be reached 3171 years after waste deposition. Arid conditions at this location prompt formation of evaporites from landfill contents which are partially eroded by wind. It is assumed that 10% of these evaporites are eroded by wind and airborne. Initial decay in the first 100 years of this waste results in a wind erosion rate corresponding to 7.284 g/m2.year and long-term decay corresponds to wind erosion of 11.79 g/m2.year.

## Reference product
- waste polyethylene terephthalate: -1 kg; By-product classification Waste; CPC 39270: Waste, parings and scrap of plastics; CAS 25038-59-9; pedigree (1,1,1,1,1)
  main reference product of this activity (supply of disposal service).
  Uncertainty: Uncertainty is not adjusted, as this is the refence product
  production volume 1 kg
    The amount of the annual production volume is a placeholder value. The contribution of this technology to the different local markets can be found in the markets themselves.
  property price 0 EUR2005
    Waste products are assigned a price of zero as they are assumed to require further treatment.
  property carbon content 0.55475
    carbon content on a dry matter basis (reserved; not for manual entry)
  properties: sodium content 0.0014475, calcium content 0.00029632, beryllium content 4.9387e-7, aluminium content 0.00019755, water content 0.002004, selenium content 2.0743e-6, water in wet mass 0.002 kg, thallium content 3.951e-7, mercury content 8.8897e-8, copper content 1.1853e-5, titanium content 0.00098775, strontium content 8.7416e-5, chromium content 5.4326e-6, manganese content 1.7779e-5, dry mass 0.998 kg, tin content 9.8775e-7, vanadium content 0.0012841, nickel content 3.951e-6, cobalt content 3.1114e-5, iron content 9.8775e-5, cadmium content 3.2596e-6, carbon content, fossil 0.55475, antimony content 0.00015952, zinc content 6.8813e-5, wet mass 1 kg, lead content 5.5314e-6, arsenic content 1.8767e-6, nitrogen content 0.0064698, sulfur content 0.00014816, fluorine content 1.1853e-5, heating value, net 22.947 MJ, bromine content 6.9142e-5, chlorine content 0.0007902, oxygen content 0.36949, barium content 4.9387e-5, hydrogen content 0.063507, heating value, gross 23.126 MJ, carbon allocation 0.55364 kg

## Emissions to nature
- Chromium [air, low population density, long-term]: 1.7589e-9 kg; lognormal variance with pedigree 2.3918, pedigree (1,1,3,1,1)
  burden from windblown long-term leachate evaporite in arid climates.
  Uncertainty: Uncertainty calculated from unertainty of the waste composition of this waste, uncertainty in waste decomposition and short-term leaching in landfill
- Carbon [soil, industrial]: 0.49344 kg; lognormal variance with pedigree 0.0045838, pedigree (1,1,3,1,1)
  burden from leachate evaporite in arid climates deposited on landflill surface.
  Uncertainty: Uncertainty calculated from unertainty of the waste composition of this waste, uncertainty in waste decomposition and short-term leaching in landfill
- Cobalt [air, low population density, long-term]: 3.0952e-6 kg; lognormal variance with pedigree 0.28142, pedigree (1,1,3,1,1)
  (same comment as for Chromium)
- Sulfur [soil, industrial]: 0.00013299 kg; lognormal variance with pedigree 0.22809, pedigree (1,1,3,1,1)
  (same comment as for Carbon)
- Hydrogen fluoride [air, low population density, long-term]: 1.1776e-6 kg; lognormal variance with pedigree 0.31342, pedigree (1,1,3,1,1)
  (same comment as for Chromium)
- Heat, waste [water, ground-, long-term]: 22.895 MJ; lognormal variance with pedigree 0.014651, pedigree (1,1,3,1,1)
  burden from long-term decomposition of waste (>100a).
  Uncertainty: Uncertainty calculated from unertainty of the waste composition of this waste, uncertainty in waste decomposition and short-term leaching in landfill
- Barium [air, low population density, long-term]: 4.8725e-6 kg; lognormal variance with pedigree 0.26606, pedigree (1,1,3,1,1)
  (same comment as for Chromium)
- Sodium [air, non-urban air or from high stacks]: 5.986e-6 kg; lognormal variance with pedigree 0.20466, pedigree (1,1,3,1,1)
  burden from direct release or incineration of landfill biogas; or windblown leachate evaporite in arid climates.
  Uncertainty: Uncertainty calculated from unertainty of the waste composition of this waste, uncertainty in waste decomposition and short-term leaching in landfill
- Arsenic [air, low population density, long-term]: 1.8696e-7 kg; lognormal variance with pedigree 0.37397, pedigree (1,1,3,1,1)
  (same comment as for Chromium)
- Aluminium [air, non-urban air or from high stacks]: 9.8678e-9 kg; lognormal variance with pedigree 0.40409, pedigree (1,1,3,1,1)
  (same comment as for Sodium)
- Hydrogen chloride [air, low population density, long-term]: 7.6851e-5 kg; lognormal variance with pedigree 0.17418, pedigree (1,1,3,1,1)
  (same comment as for Chromium)
- Iron [air, non-urban air or from high stacks]: 1.3557e-9 kg; lognormal variance with pedigree 0.46962, pedigree (1,1,3,1,1)
  (same comment as for Sodium)
- Bromine [air, low population density, long-term]: 6.7244e-6 kg; lognormal variance with pedigree 0.25487, pedigree (1,1,3,1,1)
  (same comment as for Chromium)
- Calcium [air, non-urban air or from high stacks]: 3.8556e-8 kg; lognormal variance with pedigree 0.35958, pedigree (1,1,3,1,1)
  (same comment as for Sodium)
- Nitrate [air, low population density, long-term]: 0.0027881 kg; lognormal variance with pedigree 0.10713, pedigree (1,1,3,1,1)
  (same comment as for Chromium)
- Titanium [air, non-urban air or from high stacks]: 4.9339e-8 kg; lognormal variance with pedigree 0.35113, pedigree (1,1,3,1,1)
  (same comment as for Sodium)
- Sulfate [air, low population density, long-term]: 4.4166e-5 kg; lognormal variance with pedigree 0.2295, pedigree (1,1,3,1,1)
  (same comment as for Chromium)
- Thallium [air, non-urban air or from high stacks]: 2.2953e-11 kg; lognormal variance with pedigree 0.60332, pedigree (1,1,3,1,1)
  (same comment as for Sodium)
- Particulates, > 2.5 um, and < 10um [air, low population density, long-term]: 0.030259 kg; lognormal variance with pedigree 0.078299, pedigree (1,1,3,1,1)
  (same comment as for Chromium)
- Beryllium [air, non-urban air or from high stacks]: 2.8692e-11 kg; lognormal variance with pedigree 0.59616, pedigree (1,1,3,1,1)
  (same comment as for Sodium)
- Particulates, < 2.5 um [air, low population density, long-term]: 0.020173 kg; lognormal variance with pedigree 0.1237, pedigree (1,1,3,1,1)
  (same comment as for Chromium)
- Strontium [air, non-urban air or from high stacks]: 5.0784e-9 kg; lognormal variance with pedigree 0.42623, pedigree (1,1,3,1,1)
  (same comment as for Sodium)
- Particulates, > 10 um [air, low population density, long-term]: 0.050432 kg; lognormal variance with pedigree 0.058545, pedigree (1,1,3,1,1)
  (same comment as for Chromium)
- Zinc [air, non-urban air or from high stacks]: 3.2566e-9 kg; lognormal variance with pedigree 0.44106, pedigree (1,1,3,1,1)
  (same comment as for Sodium)
- Sodium [soil, industrial]: 0.0013002 kg; lognormal variance with pedigree 0.14448, pedigree (1,1,3,1,1)
  (same comment as for Carbon)
- Tin [air, non-urban air or from high stacks]: 5.8162e-12 kg; lognormal variance with pedigree 0.6493, pedigree (1,1,3,1,1)
  (same comment as for Sodium)
- Calcium [soil, industrial]: 0.00026616 kg; lognormal variance with pedigree 0.20599, pedigree (1,1,3,1,1)
  (same comment as for Carbon)
- Selenium [air, non-urban air or from high stacks]: 2.1858e-10 kg; lognormal variance with pedigree 0.53036, pedigree (1,1,3,1,1)
  (same comment as for Sodium)
- Iron [soil, industrial]: 8.872e-5 kg; lognormal variance with pedigree 0.24292, pedigree (1,1,3,1,1)
  (same comment as for Carbon)
- Vanadium [air, non-urban air or from high stacks]: 1.3531e-7 kg; lognormal variance with pedigree 0.31834, pedigree (1,1,3,1,1)
  (same comment as for Sodium)
- Aluminium [soil, industrial]: 0.00017744 kg; lognormal variance with pedigree 0.21973, pedigree (1,1,3,1,1)
  (same comment as for Carbon)
- Nickel [air, non-urban air or from high stacks]: 2.2953e-10 kg; lognormal variance with pedigree 0.52867, pedigree (1,1,3,1,1)
  (same comment as for Sodium)
- Titanium [soil, industrial]: 0.0008872 kg; lognormal variance with pedigree 0.16669, pedigree (1,1,3,1,1)
  (same comment as for Carbon)
- Lead [air, non-urban air or from high stacks]: 3.2595e-11 kg; lognormal variance with pedigree 0.59251, pedigree (1,1,3,1,1)
  (same comment as for Sodium)
- Thallium [soil, industrial]: 3.5488e-7 kg; lognormal variance with pedigree 0.424, pedigree (1,1,3,1,1)
  (same comment as for Carbon)
- Antimony [air, non-urban air or from high stacks]: 1.681e-8 kg; lognormal variance with pedigree 0.3869, pedigree (1,1,3,1,1)
  (same comment as for Sodium)
- Beryllium [soil, industrial]: 4.436e-7 kg; lognormal variance with pedigree 0.41684, pedigree (1,1,3,1,1)
  (same comment as for Carbon)
- Copper [air, non-urban air or from high stacks]: 5.8021e-11 kg; lognormal variance with pedigree 0.57384, pedigree (1,1,3,1,1)
  (same comment as for Sodium)
- Zinc [soil, industrial]: 6.1808e-5 kg; lognormal variance with pedigree 0.25479, pedigree (1,1,3,1,1)
  (same comment as for Carbon)
- Manganese [air, non-urban air or from high stacks]: 2.0348e-8 kg; lognormal variance with pedigree 0.38548, pedigree (1,1,3,1,1)
  (same comment as for Sodium)
- Strontium [soil, industrial]: 7.8517e-5 kg; lognormal variance with pedigree 0.24679, pedigree (1,1,3,1,1)
  (same comment as for Carbon)
- Sodium [air, low population density, long-term]: 0.00013849 kg; lognormal variance with pedigree 0.15449, pedigree (1,1,3,1,1)
  (same comment as for Chromium)
- Chromium [air, non-urban air or from high stacks]: 6.1879e-11 kg; lognormal variance with pedigree 0.57185, pedigree (1,1,3,1,1)
  (same comment as for Sodium)
- Selenium [soil, industrial]: 3.9482e-7 kg; lognormal variance with pedigree 0.51987, pedigree (1,1,3,1,1)
  (same comment as for Carbon)
- Calcium [air, low population density, long-term]: 2.9535e-5 kg; lognormal variance with pedigree 0.20649, pedigree (1,1,3,1,1)
  (same comment as for Chromium)
- Mercury [air, non-urban air or from high stacks]: 3.0349e-11 kg; lognormal variance with pedigree 0.60147, pedigree (1,1,3,1,1)
  (same comment as for Sodium)
- Vanadium [soil, industrial]: 0.00025285 kg; lognormal variance with pedigree 0.30142, pedigree (1,1,3,1,1)
  (same comment as for Carbon)
- Thallium [air, low population density, long-term]: 3.9408e-8 kg; lognormal variance with pedigree 0.42434, pedigree (1,1,3,1,1)
  (same comment as for Chromium)
- Arsenic [air, non-urban air or from high stacks]: 3.831e-10 kg; lognormal variance with pedigree 0.45874, pedigree (1,1,3,1,1)
  (same comment as for Sodium)
- Tin [soil, industrial]: 8.872e-7 kg; lognormal variance with pedigree 0.39478, pedigree (1,1,3,1,1)
  (same comment as for Carbon)
- Iron [air, low population density, long-term]: 9.8564e-6 kg; lognormal variance with pedigree 0.24298, pedigree (1,1,3,1,1)
  (same comment as for Chromium)
- Cobalt [air, non-urban air or from high stacks]: 9.9934e-9 kg; lognormal variance with pedigree 0.40564, pedigree (1,1,3,1,1)
  (same comment as for Sodium)
- Antimony [soil, industrial]: 1.058e-5 kg; lognormal variance with pedigree 0.65215, pedigree (1,1,3,1,1)
  (same comment as for Carbon)
- Aluminium [air, low population density, long-term]: 1.9706e-5 kg; lognormal variance with pedigree 0.21994, pedigree (1,1,3,1,1)
  (same comment as for Chromium)
- Cadmium [air, non-urban air or from high stacks]: 6.0982e-10 kg; lognormal variance with pedigree 0.46689, pedigree (1,1,3,1,1)
  (same comment as for Sodium)
- Nickel [soil, industrial]: 3.5488e-6 kg; lognormal variance with pedigree 0.34931, pedigree (1,1,3,1,1)
  (same comment as for Carbon)
- Zinc [air, low population density, long-term]: 6.8643e-6 kg; lognormal variance with pedigree 0.25501, pedigree (1,1,3,1,1)
  (same comment as for Chromium)
- Barium [air, non-urban air or from high stacks]: 5.6522e-8 kg; lognormal variance with pedigree 0.3516, pedigree (1,1,3,1,1)
  (same comment as for Sodium)
- Lead [soil, industrial]: 4.9683e-6 kg; lognormal variance with pedigree 0.33853, pedigree (1,1,3,1,1)
  (same comment as for Carbon)
- Strontium [air, low population density, long-term]: 8.719e-6 kg; lognormal variance with pedigree 0.24705, pedigree (1,1,3,1,1)
  (same comment as for Chromium)
- Bromine [air, non-urban air or from high stacks]: 1.9789e-7 kg; lognormal variance with pedigree 0.27257, pedigree (1,1,3,1,1)
  (same comment as for Sodium)
- Copper [soil, industrial]: 1.0646e-5 kg; lognormal variance with pedigree 0.31339, pedigree (1,1,3,1,1)
  (same comment as for Carbon)
- Titanium [air, low population density, long-term]: 9.8528e-5 kg; lognormal variance with pedigree 0.16687, pedigree (1,1,3,1,1)
  (same comment as for Chromium)
- Nitrate [air, non-urban air or from high stacks]: 6.6739e-5 kg; lognormal variance with pedigree 0.17383, pedigree (1,1,3,1,1)
  burden from windblown leachate evaporite in arid climates.
  Uncertainty: Uncertainty calculated from unertainty of the waste composition of this waste, uncertainty in waste decomposition and short-term leaching in landfill
- Chromium [soil, industrial]: 1.6386e-8 kg; lognormal variance with pedigree 2.3914, pedigree (1,1,3,1,1)
  (same comment as for Carbon)
- Beryllium [air, low population density, long-term]: 4.926e-8 kg; lognormal variance with pedigree 0.41718, pedigree (1,1,3,1,1)
  (same comment as for Chromium)
- Hydrogen chloride [air, non-urban air or from high stacks]: 2.2694e-6 kg; lognormal variance with pedigree 0.1995, pedigree (1,1,3,1,1)
  (same comment as for Sodium)
- Mercury [soil, industrial]: 7.9826e-8 kg; lognormal variance with pedigree 0.48204, pedigree (1,1,3,1,1)
  (same comment as for Carbon)
- Selenium [air, low population density, long-term]: 4.3651e-8 kg; lognormal variance with pedigree 0.52209, pedigree (1,1,3,1,1)
  (same comment as for Chromium)
- Hydrogen fluoride [air, non-urban air or from high stacks]: 4.7963e-8 kg; lognormal variance with pedigree 0.42603, pedigree (1,1,3,1,1)
  (same comment as for Sodium)
- Cobalt [soil, industrial]: 2.7947e-5 kg; lognormal variance with pedigree 0.28003, pedigree (1,1,3,1,1)
  (same comment as for Carbon)
- Tin [air, low population density, long-term]: 9.8572e-8 kg; lognormal variance with pedigree 0.39482, pedigree (1,1,3,1,1)
  (same comment as for Chromium)
- Nitrogen oxides [air, non-urban air or from high stacks]: 8.8447e-8 kg; lognormal variance with pedigree 0.26606, pedigree (1,1,3,1,1)
  burden from direct release or incineration of landfill biogas.
  Uncertainty: Uncertainty calculated from unertainty of the waste composition of this waste, uncertainty in waste decomposition and short-term leaching in landfill
- Manganese [soil, industrial]: 1.5969e-5 kg; lognormal variance with pedigree 0.29531, pedigree (1,1,3,1,1)
  (same comment as for Carbon)
- Vanadium [air, low population density, long-term]: 2.796e-5 kg; lognormal variance with pedigree 0.30316, pedigree (1,1,3,1,1)
  (same comment as for Chromium)
- Sulfate [air, non-urban air or from high stacks]: 1.6499e-7 kg; lognormal variance with pedigree 0.35081, pedigree (1,1,3,1,1)
  (same comment as for Nitrate)
- Cadmium [soil, industrial]: 2.9277e-6 kg; lognormal variance with pedigree 0.35504, pedigree (1,1,3,1,1)
  (same comment as for Carbon)
- Lead [air, low population density, long-term]: 5.52e-7 kg; lognormal variance with pedigree 0.33857, pedigree (1,1,3,1,1)
  (same comment as for Chromium)
- Sulfur dioxide [air, non-urban air or from high stacks]: 1.9273e-7 kg; lognormal variance with pedigree 0.40664, pedigree (1,1,3,1,1)
  (same comment as for Nitrogen oxides)
- Arsenic [soil, industrial]: 1.6856e-6 kg; lognormal variance with pedigree 0.37304, pedigree (1,1,3,1,1)
  (same comment as for Carbon)
- Antimony [air, low population density, long-term]: 1.1588e-6 kg; lognormal variance with pedigree 0.65606, pedigree (1,1,3,1,1)
  (same comment as for Chromium)
- Carbon dioxide, fossil [air, non-urban air or from high stacks]: 0.011913 kg; lognormal variance with pedigree 0.097511, pedigree (1,1,3,1,1)
  (same comment as for Nitrogen oxides)
- Barium [soil, industrial]: 4.436e-5 kg; lognormal variance with pedigree 0.26167, pedigree (1,1,3,1,1)
  (same comment as for Carbon)
- Nickel [air, low population density, long-term]: 3.9408e-7 kg; lognormal variance with pedigree 0.34962, pedigree (1,1,3,1,1)
  (same comment as for Chromium)
- Particulates, > 10 um [air, non-urban air or from high stacks]: 5.2028e-5 kg; lognormal variance with pedigree 0.14716, pedigree (1,1,3,1,1)
  (same comment as for Sodium)
- Bromine [soil, industrial]: 6.2082e-5 kg; lognormal variance with pedigree 0.24596, pedigree (1,1,3,1,1)
  (same comment as for Carbon)
- Mercury [air, low population density, long-term]: 8.8635e-9 kg; lognormal variance with pedigree 0.48245, pedigree (1,1,3,1,1)
  (same comment as for Chromium)
- Methane, fossil [air, non-urban air or from high stacks]: 0.0028262 kg; lognormal variance with pedigree 0.10764, pedigree (1,1,3,1,1)
  (same comment as for Nitrogen oxides)
- Fluoride [soil, industrial]: 1.0606e-5 kg; lognormal variance with pedigree 0.31305, pedigree (1,1,3,1,1)
  (same comment as for Carbon)
- Manganese [air, low population density, long-term]: 1.7541e-6 kg; lognormal variance with pedigree 0.3, pedigree (1,1,3,1,1)
  (same comment as for Chromium)
- Particulates, > 2.5 um, and < 10um [air, non-urban air or from high stacks]: 3.1217e-5 kg; lognormal variance with pedigree 0.16691, pedigree (1,1,3,1,1)
  (same comment as for Sodium)
- Chloride [soil, industrial]: 0.00070951 kg; lognormal variance with pedigree 0.16725, pedigree (1,1,3,1,1)
  (same comment as for Carbon)
- Copper [air, low population density, long-term]: 1.1829e-6 kg; lognormal variance with pedigree 0.31342, pedigree (1,1,3,1,1)
  (same comment as for Chromium)
- Particulates, < 2.5 um [air, non-urban air or from high stacks]: 2.0811e-5 kg; lognormal variance with pedigree 0.21232, pedigree (1,1,3,1,1)
  (same comment as for Sodium)
- Heat, waste [soil, industrial]: 0.18634 MJ; lognormal variance with pedigree 0.058531, pedigree (1,1,3,1,1)
  burden from short-term decomposition of waste (0-100a).
  Uncertainty: Uncertainty calculated from unertainty of the waste composition of this waste, uncertainty in waste decomposition and short-term leaching in landfill
- Cadmium [air, low population density, long-term]: 3.2473e-7 kg; lognormal variance with pedigree 0.35593, pedigree (1,1,3,1,1)
  (same comment as for Chromium)
- Occupation, dump site [natural resource, land]: 0.0035714 m2*year; lognormal variance with pedigree 0.082256, pedigree (1,1,3,1,1)
  for landfill operation phase and spontaneous renaturation.
  Uncertainty: Uncertainty calculated from uncertainty in base parameters.
- Nitrogen [soil, industrial]: 0.0058018 kg; lognormal variance with pedigree 0.10269, pedigree (1,1,3,1,1)
  (same comment as for Carbon)

## Extrapolations
This dataset has been extrapolated from year 2012 to the year of the calculation (2019). The uncertainty has been adjusted accordingly.
