# treatment of used Ni-metal hydride battery, pyrometallurgical treatment

Dataset: EcoSpold 2, unit process
Geography: GLO
Time period: 2005-01-01 to 2019-12-31
Technology level: current
Classification: EcoSpold01Categories: waste management/recycling
Classification: ISIC rev.4 ecoinvent: 3830:Materials recovery
Tags: ConvertedDataset
Scenario: Business-as-Usual
System model: Allocation at the point of substitution
Generated by: Roland Hischier
Published in: Hischier R. 2007
Database: ecoinvent
isCopyrightProtected: true
accessRestrictedTo: 1

## General comment
The multioutput-process " pyrometallurgical treatment NiMH batteries " delivers the co-products "disposal, NiMH batteries” and " Ni-Co-Fe residues, pyrometallurgical processing NiMH batteries, at plant ". The latter has been replaced by "iron scrap" and is intented to enter the steel production process for secondary steel.
[This dataset was already contained in the ecoinvent database version 2. It was not individually updated during the transfer to ecoinvent version 3. Life Cycle Impact Assessment results may still have changed, as they are affected by changes in the supply chain, i.e. in other datasets. This dataset was generated following the ecoinvent quality guidelines for version 2. It may have been subject to central changes described in the ecoinvent version 3 change report (http://www.ecoinvent.org/database/ecoinvent-version-3/reports-of-changes/), and the results of the central updates were reviewed extensively. The changes added e.g. consistent water flows and other information throughout the database. The documentation of this dataset can be found in the ecoinvent reports of version 2, which are still available via the ecoinvent website. The change report linked above covers all central changes that were made during the conversion process.]

## Included activities end
This dataset represents the treatment of NiMH batteries from electric and electronic devices by a pyrometallurgical process.. It includes energy & auxiliary consumption, waste production, emission (to air/to water) production and rough estimations of the efforts for infrastructure & transportation.

## Geography
Data from a European recycling company - used as global average data.

## Technology
Dismantling, separation of plastic covers, treatment in a static pyrolysis oven.

## Parameters
- fraction, process water, to air: 0.15 dimensionless; name fraction_PW_to_air; lognormal variance with pedigree 0.092025, pedigree (4,4,3,2,4)
  Literature value. In case when no industry/process specific data are available, default evaporation fraction value is used. This value is 15% and is based on literature (Statistics Canada, 2007 & Shaffer, K.H., 2008, Consumptive water use in the Great Lakes Basin, USGS & Shiklomanov, 2003, World Water Resources at the Beginning of the 21st Century) and has been approved by an expert.

## Reference product
- used Ni-metal hydride battery: 0 kg; CPC 39990: Other wastes n.e.c.; By-product classification Waste
  EcoSpold01Location=GLO
  production volume 0 kg
    This is a placeholder value that does not reflect real-world production volumes. This dataset does not currently require a real-world production volume to work in the database framework, and no actual data were collected yet. This has no negative effect on the results of the ecoinvent database.
  property price 0 EUR2005
    Waste products are assigned a price of zero as they are assumed to require further treatment.
  property carbon content 0.0949631
    carbon content on a dry matter basis (reserved; not for manual entry)
  properties: EcoSpold01Allocation_undefined_1 100, EcoSpold01Allocation_undefined_2 100, carbon content, non-fossil 0, dry mass 1 kg, carbon content, fossil 0.0949631, water in wet mass 0 kg, wet mass 1 kg, water content 0, carbon allocation 0.0949631 kg
- iron scrap, sorted, pressed: 1 kg; By-product classification Recyclable; CPC 39310: Slag, dross, scalings and other waste from the manufacture of iron or steel; pedigree (1,1,1,1,1)
  this flow replaces the output "Ni-Co-Fe residues from Ni-metal hydride battery, pyrometallurgical processing"
  Uncertainty: data of 1 European plant - reported in Fisher (2006)
  production volume 2.92 kg

## By-products
- iron scrap, sorted, pressed: 0 kg; By-product classification Recyclable; CPC 39310: Slag, dross, scalings and other waste from the manufacture of iron or steel; pedigree (1,1,1,1,1)
  (same comment as for iron scrap, sorted, pressed)
  production volume 0 kg; = Ref('179f4323-f5fd-4039-b5b5-54733e8ebfbc', 'ProductionVolume') * (Ref('96410129-e84b-4150-846a-429f5d295f4d') / Ref('179f4323-f5fd-4039-b5b5-54733e8ebfbc'))*-1
    Calculated from the production volume of used Ni-metal hydride battery in proportion to the respective output amounts.
  property wet mass 1 kg; name WM
  property carbon content, fossil 0; name C_content_fossil
  property carbon content, non-fossil 0; name C_content_non_fossil
  property water content 0; name water_content
  property dry mass 1 kg; name DM
  property price 0.175 EUR2005
    Temporary price data. Calculated as 90% of purchasers price based on: 2005 import and export prices (total trades (USD) divided by total weight (kg) in biggest economies of the world: EU27, USA, Brasil, China, India, Japan and Russia) from UN Commodity Trade Statistics Database (http://data.un.org/Explorer.aspxDatabase [Accessed 2011.06.20]). Commodity: Waste or scrap, of cast iron
  property water in wet mass 0 kg; name WWM
  property carbon content 0
    carbon content on a dry matter basis (reserved; not for manual entry)
  properties: carbon allocation 0 kg
- heat, for reuse in municipal waste incineration only: 0 MJ; CPC 17300: Steam and hot water; By-product classification allocatable product; pedigree (1,1,1,1,1)
  Net electricity generated from this waste and used in internal MSWI plant energy redistribution.
  Uncertainty: uncertainty is calculated from uncertainties in waste composition and uncertainties in energy efficiency and the uncertainty in internal energy demand
  property exergy 0.1842 MJ; name E_th_prod_MSWI_exergy
    This exergy property is based on the exergy content of the product.
  property price 0.0106 EUR2005; name E_th_prod_MSWI_price_EUR2005
    Average European district heat price from Ecoheatcool and Euroheat 2005-2006, Ecoheat Work package 1: The European heat market. Final report. 10.6 EUR/GJ i s the price of district heat. http://www.solarthermalworld.org/files/Ecoheatcool%20WP1%20Web.pdf?download
  property true value relation 0.1842; name E_th_prod_MSWI_true_value_relation
    property to calculate "true value" from
- electricity, for reuse in municipal waste incineration only: 0 kWh; CPC 17100: Electrical energy; By-product classification allocatable product; pedigree (1,1,1,1,1)
  (same comment as for heat, for reuse in municipal waste incineration only)
  property price 0.1 EUR2005; name E_el_prod_MSWI_price_EUR2005
    Estimated to be the same price as in case of electricity, medium voltage.
  property exergy 3.6 MJ; name E_el_prod_MSWI_exergy
    This exergy property is based on the exergy content of the product.
  property true value relation 3.6; name E_el_prod_MSWI_true_value_relation
    property to calculate "true value" from

## Inputs from technosphere
- electricity, medium voltage: 1.20379e-6 kWh; lognormal variance with pedigree 0.0521, pedigree (1,4,5,3,1)
  Data of 1 European plant - reported in Fisher (2006)
  EcoSpold01Location=UCTE
  Uncertainty: data of 1 European plant - reported in Fisher (2006)
- carbon black: 0 kg; pedigree (1,1,1,1,1)
  EcoSpold01Location=GLO
  Data of 1 European plant - reported in Fisher (2006)
  Uncertainty: data of 1 European plant - reported in Fisher (2006)
  properties: dry mass 1 kg, carbon content, fossil 0.85, wet mass 1 kg
- blister-copper conversion facility: 0 unit; pedigree (1,1,1,1,1)
  Rough estimation of infrastructure
  EcoSpold01Location=SE
  Uncertainty: rough estimation of infrastructure
- waste plastic, mixture: 0 kg; pedigree (1,1,1,1,1)
  EcoSpold01Location=CH
  Data of 1 European plant - reported in Fisher (2006)
  Uncertainty: data of 1 European plant - reported in Fisher (2006)
  production volume 0 kg
    (same comment as for iron scrap, sorted, pressed)
  properties: water content 0.180638, dry mass 0.847 kg, carbon content, fossil 0.747344, wet mass 1 kg
  note on carbon content, fossil: C content in 1 kg DM was calculated using data in Tab A.2, ecoinvent v2.2 report 13_I
- liquefied petroleum gas: 0 kg; pedigree (1,1,1,1,1)
  Data of 1 European plant - reported in Fisher (2006)
  EcoSpold01Location=RER
  Uncertainty: data of 1 European plant - reported in Fisher (2006)
  properties: dry mass 1 kg, carbon content, fossil 0.821863, wet mass 1 kg
- waste plastic, mixture: 0 kg; pedigree (1,1,1,1,1)
  (same comment as for waste plastic, mixture)
- waste plastic, mixture: -6.67514e-6, -2.75707e-6, -2.6181e-6, -9.99031e-5, -1.11383e-6, -5.0483e-7, -0.000699377 kg (7 entries); lognormal variance with pedigree 0.0521, pedigree (1,4,5,3,1)
  (same comment as for waste plastic, mixture)
- printed wiring board, mounted mainboard, desktop computer, Pb containing: 2.53298e-9 kg; lognormal variance with pedigree 0.0701, pedigree (1,4,5,3,3)
  EcoSpold01Location=GLO
  Measured Value.
- steel, chromium steel 18/8, hot rolled: 3.85889e-7 kg; lognormal variance with pedigree 0.0701, pedigree (1,4,5,3,3)
  Measured Value.
  EcoSpold01Location=RER
- printed wiring board, surface mounted, unspecified, Pb free: 9.86696e-8 kg; lognormal variance with pedigree 0.0701, pedigree (1,4,5,3,3)
  Measured Value. This original value from production mix has been replaced by 2 flows. Pb-containing has a share of 0.3, Pb-free has a share of 0.7.
- printed wiring board, for surface mounting, Pb containing surface: 6.55168e-11 m2; lognormal variance with pedigree 0.0701, pedigree (1,4,5,3,3)
  Measured Value.
  This original value from production mix has been replaced by 2 flows. Each has 50% share in the production mix.
- disk drive, CD/DVD, ROM, for desktop computer: 1.67992e-8 unit; lognormal variance with pedigree 0.0701, pedigree (1,4,5,3,3)
  EcoSpold01Location=GLO
  Measured Value.
- cable, network cable, category 5, without plugs: 1.58791e-7 m; lognormal variance with pedigree 0.0701, pedigree (1,4,5,3,3)
  EcoSpold01Location=GLO
  Measured Value.
- sheet rolling, steel: 0.00232226 kg; lognormal variance with pedigree 0.0701, pedigree (1,4,5,3,3)
  EcoSpold01Location=RER
  Measured Value.
- acrylonitrile-butadiene-styrene copolymer: 5.35894e-10 kg; lognormal variance with pedigree 0.0701, pedigree (1,4,5,3,3)
  Measured Value.
  EcoSpold01Location=RER
- powder coat, steel: 6.68103e-9 m2; lognormal variance with pedigree 0.0701, pedigree (1,4,5,3,3)
  Measured Value.
  EcoSpold01Location=RER
- steel, low-alloyed, hot rolled: 0.00215138 kg; lognormal variance with pedigree 0.0701, pedigree (1,4,5,3,3)
  EcoSpold01Location=RER
  Measured Value.
- plug, inlet and outlet, for network cable: 7.11628e-7 unit; lognormal variance with pedigree 0.0701, pedigree (1,4,5,3,3)
  EcoSpold01Location=GLO
  Measured Value.
- battery, Li-ion, rechargeable, prismatic: 1.89737e-7 kg; lognormal variance with pedigree 0.0701, pedigree (1,4,5,3,3)
  EcoSpold01Location=GLO
  Measured Value.
- polymer foaming: 2.68787e-9 kg; source Atlantic Consulting 1998; lognormal variance with pedigree 0.0701, pedigree (1,4,5,3,3)
  Literature Value.
  EcoSpold01Location=RER
- aluminium, cast alloy: 0.00082403 kg; lognormal variance with pedigree 0.0701, pedigree (1,4,5,3,3)
  Measured Value.
  EcoSpold01Location=RER
- printed wiring board, surface mounted, unspecified, Pb containing: 4.2287e-8 kg; lognormal variance with pedigree 0.0701, pedigree (1,4,5,3,3)
  (same comment as for printed wiring board, surface mounted, unspecified, Pb free)
- hot rolling, steel: 5.37573e-10 kg; lognormal variance with pedigree 0.0701, pedigree (1,4,5,3,3)
  Measured Value.
  EcoSpold01Location=RER
- power supply unit, for desktop computer: 1.67992e-8 unit; lognormal variance with pedigree 0.0701, pedigree (1,4,5,3,3)
  EcoSpold01Location=CN
  Measured Value.
- integrated circuit, memory type: 2.51988e-10 kg; lognormal variance with pedigree 0.0701, pedigree (1,4,5,3,3)
  EcoSpold01Location=GLO
  Measured Value.
- copper: 0.000116029 kg; lognormal variance with pedigree 0.0701, pedigree (1,4,5,3,3)
  EcoSpold01Location=RER
  Measured Value.
- section bar extrusion, aluminium: 0.000719732 kg; lognormal variance with pedigree 0.0701, pedigree (1,4,5,3,3)
  Measured Value.
  EcoSpold01Location=RER
- aluminium, wrought alloy: 0.00175107 kg; lognormal variance with pedigree 0.0701, pedigree (1,4,5,3,3)
  Measured Value.
  EcoSpold01Location=RER
- polypropylene, granulate: 0.00126174 kg; source Atlantic Consulting 1998; lognormal variance with pedigree 0.0701, pedigree (1,4,5,3,3)
  EcoSpold01Location=RER
  Measured and literature Value.
  Further references:
  Hewlett Packard (2002) Environmental Profile: Embedded & Personal Systems. Download of 070213 from <http://www.hp.com/hpinfo/globalcitizenship/environment/productdata/edsembedded--.html>.
- hard disk drive, for desktop computer: 1.67992e-8 unit; lognormal variance with pedigree 0.0701, pedigree (1,4,5,3,3)
  Measured Value.
  EcoSpold01Location=GLO
- plug, inlet and outlet, for computer cable: 1.67992e-8 unit; lognormal variance with pedigree 0.0701, pedigree (1,4,5,3,3)
  Measured Value.
  EcoSpold01Location=GLO
- cable, ribbon cable, 20-pin, with plugs: 8.50038e-10 kg; lognormal variance with pedigree 0.0701, pedigree (1,4,5,3,3)
  Measured Value.
  EcoSpold01Location=GLO
- printed wiring board, for surface mounting, Pb free surface: 6.55168e-11 m2; lognormal variance with pedigree 0.0701, pedigree (1,4,5,3,3)
  (same comment as for printed wiring board, for surface mounting, Pb containing surface)
- photovoltaic cell factory: 2.13329e-14 unit; lognormal variance with pedigree 0.3701, pedigree (1,4,5,3,3)
  EcoSpold01Location=DE
  Proxy, due to a lack of data of the infrastructure for the computer production the photovoltaic cell factory was used. It was assumed a life-time of 25 years, and a annual production volume of 3’000’000 pieces.
- cable, connector for computer, without plugs: 4.19979e-8 m; lognormal variance with pedigree 0.0701, pedigree (1,4,5,3,3)
  EcoSpold01Location=GLO
  Measured Value.
- stretch blow moulding: 1.70495e-9 kg; lognormal variance with pedigree 0.0701, pedigree (1,4,5,3,3)
  Measured Value.
  EcoSpold01Location=RER
- tap water: 0.00115284 kg; source Fujitsu L. 2003; lognormal variance with pedigree 0.0701, pedigree (1,4,5,3,3)
  Estimation, based on literature.
  EcoSpold01Location=RER
- polyethylene, high density, granulate: 0.00441924 kg; lognormal variance with pedigree 0.0701, pedigree (1,4,5,3,3)
  Measured Value.
  EcoSpold01Location=RER
- wire drawing, copper: 5.80101e-5 kg; lognormal variance with pedigree 0.0701, pedigree (1,4,5,3,3)
  EcoSpold01Location=RER
  Measured Value.
- used desktop computer: -1.89831e-7 kg; lognormal variance with pedigree 0.0701, pedigree (1,4,5,3,3)
  Measured Value.
  EcoSpold01Location=CH
  production volume 11.3 kg
- corrugated board box: 1.2768e-7, 5.70868e-9, 4.84973e-7 kg (3 entries); source Atlantic Consulting 1998; lognormal variance with pedigree 0.0701, pedigree (1,4,5,3,3)
  Literature Value.
  EcoSpold01Location=RER
- waste polypropylene: -2.5872e-10, -1.99458e-11, -8.23832e-12, -7.82306e-12, -2.98517e-10, -3.32819e-12, -1.50847e-12, -2.08979e-9 kg (8 entries); source Atlantic Consulting 1998; lognormal variance with pedigree 0.0701, pedigree (1,4,5,3,3)
  Literature Value. Disposed of via a municipal incineration plant.
  EcoSpold01Location=CH
  production volume 0.16 kg
- wastewater, unpolluted: -9.22269e-9, -1.14361e-6 m3 (2 entries); source Fujitsu L. 2003; lognormal variance with pedigree 0.0701, pedigree (1,4,5,3,3)
  EcoSpold01Location=CH
  Estimation, based on literature.
  production volume 1.62 m3
- power adapter, for laptop: 6.94828e-7 unit; source von Geibler J. 2003; lognormal variance with pedigree 0.0701, pedigree (1,4,5,3,3)
  Literature Value.
  EcoSpold01Location=GLO
- hard disk drive, for laptop computer: 6.94828e-7 unit; source von Geibler J. 2003; lognormal variance with pedigree 0.0701, pedigree (1,4,5,3,3)
  Literature Value.
  EcoSpold01Location=GLO
- magnesium-alloy, AZ91, diecast: 1.96775e-7 kg; source von Geibler J. 2003; lognormal variance with pedigree 0.0701, pedigree (1,4,5,3,3)
  EcoSpold01Location=RER
  Literature Value.
- magnesium-alloy, AZ91: 1.96775e-7 kg; source von Geibler J. 2003; lognormal variance with pedigree 0.0707, pedigree (2,4,5,3,3)
  EcoSpold01Location=RER
  Literature Value.
- printed wiring board, mounted mainboard, laptop computer, Pb containing: 2.97665e-8 kg; source von Geibler J. 2003; lognormal variance with pedigree 0.0701, pedigree (1,4,5,3,3)
  Literature Value.
  EcoSpold01Location=GLO
- polystyrene foam slab: 6.18397e-8 kg; source von Geibler J. 2003; lognormal variance with pedigree 0.0701, pedigree (1,4,5,3,3)
  EcoSpold01Location=RER
  Literature Value.
- liquid crystal display, unmounted: 2.27904e-7 kg; source von Geibler J. 2003; lognormal variance with pedigree 0.0701, pedigree (1,4,5,3,3)
  Literature Value.
  EcoSpold01Location=GLO
- packaging film, low density polyethylene: 3.54363e-8 kg; source von Geibler J. 2003; lognormal variance with pedigree 0.0701, pedigree (1,4,5,3,3)
  Literature Value.
  EcoSpold01Location=RER
- extrusion, plastic pipes: 2.94573e-7 kg; source von Geibler J. 2003; lognormal variance with pedigree 0.0701, pedigree (1,4,5,3,3)
  Literature Value.
  EcoSpold01Location=RER
- disk drive, CD/DVD, ROM, for laptop computer: 6.94828e-7 unit; source von Geibler J. 2003; lognormal variance with pedigree 0.0701, pedigree (1,4,5,3,3)
  EcoSpold01Location=GLO
  Literature Value.
- used laptop computer: -2.16786e-6 kg; lognormal variance with pedigree 0.0701, pedigree (1,4,5,3,3)
  EcoSpold01Location=CH
  Measured Value.
  production volume 3.12 kg
- polystyrene, high impact: 2.94573e-7 kg; source von Geibler J. 2003; lognormal variance with pedigree 0.0701, pedigree (1,4,5,3,3)
  EcoSpold01Location=RER
  Literature Value.
- battery, NiMH, rechargeable, prismatic: 5.55863e-9 kg; source von Geibler J. 2003; lognormal variance with pedigree 0.0701, pedigree (1,4,5,3,3)
  Literature Value.
  EcoSpold01Location=GLO
- sheet rolling, copper: 9.38018e-9 kg; source von Geibler J. 2003; lognormal variance with pedigree 0.0701, pedigree (1,4,5,3,3)
  Literature Value.
  EcoSpold01Location=RER
- sheet rolling, aluminium: 1.96775e-7 kg; source von Geibler J. 2003; lognormal variance with pedigree 0.0701, pedigree (1,4,5,3,3)
  EcoSpold01Location=RER
  Literature Value.
- waste polystyrene: -5.95236e-9, -4.58892e-10, -1.89539e-10, -1.79985e-10, -6.86798e-9, -7.65716e-11, -3.47053e-11, -4.80797e-8 kg (8 entries); source von Geibler J. 2003; lognormal variance with pedigree 0.0701, pedigree (1,4,5,3,3)
  Literature Value.
  EcoSpold01Location=CH
  production volume 0.089 kg
- waste polyethylene: -3.41091e-9, -2.62961e-10, -1.08612e-10, -1.03137e-10, -3.93559e-9, -4.38781e-11, -1.98873e-11, -2.75513e-8 kg (8 entries); source von Geibler J. 2003; lognormal variance with pedigree 0.0701, pedigree (1,4,5,3,3)
  EcoSpold01Location=CH
  Literature Value.
  production volume 0.051 kg
- lead: 0.0013943 kg; lognormal variance with pedigree 0.0341, pedigree (4,2,4,1,3)
  Estimation: 2 batteries per 50000km
  EcoSpold01Location=RER
  Uncertainty: Estimation: 2 batteries per 50000km
- aluminium alloy, AlMg3: 0.00143651 kg; lognormal variance with pedigree 0.0267, pedigree (2,2,4,1,3)
  EcoSpold01Location=RER
  Estimation:5% of aluminium parts replaced
  Uncertainty: Estimation:5% of aluminium parts replaced
- synthetic rubber: 0.045678 kg; lognormal variance with pedigree 0.0267, pedigree (2,2,4,1,3)
  EcoSpold01Location=RER
  Estimation: 3.75 (bike)/3 (scooter) tyre-sets use in life-time
  Uncertainty: Estimation: 3.75 (bike)/3 (scooter) tyre-sets use in life-time
- section bar extrusion, aluminium: 0.000716899 kg; lognormal variance with pedigree 0.0961, pedigree (4,2,4,1,4)
  Assumption for pipe drawing
  EcoSpold01Location=RER
  Uncertainty: Assumption for pipe drawing
- injection moulding: 0.00220793 kg; lognormal variance with pedigree 0.0961, pedigree (4,2,4,1,4)
  EcoSpold01Location=RER
  Assumption
  Uncertainty: Assumption
- used Ni-metal hydride battery: -0.000726767 kg; lognormal variance with pedigree 0.0267, pedigree (2,2,4,1,3)
  EcoSpold01Location=GLO
  Amount of S-Pb batteries replaced
  Uncertainty: Amount of S-Pb batteries replaced
  production volume 0.341561 kg
- waste plastic, mixture: -0.00089469 kg; lognormal variance with pedigree 0.0341, pedigree (4,2,4,1,3)
  Plastics to municipal incineration
  EcoSpold01Location=CH
  Uncertainty: plastics to municipal incineration
  production volume 1.872 kg
- waste rubber, unspecified: -0.0112716 kg; lognormal variance with pedigree 0.0341, pedigree (4,2,4,1,3)
  50% of tyres to municipal incineration
  EcoSpold01Location=CH
  Uncertainty: 50% of tyres to municipal incineration
  production volume 23.584 kg
- chromium steel removed by turning, average, conventional: 0.000506083 kg; lognormal variance with pedigree 0.0961, pedigree (4,2,4,1,4)
  Assumption
  EcoSpold01Location=RER
  Uncertainty: Assumption
- used Li-ion battery: -0.00059482 kg; lognormal variance with pedigree 0.0267, pedigree (2,2,4,1,3)
  Amount of S-Pb batteries replaced
  EcoSpold01Location=GLO
  Uncertainty: Amount of S-Pb batteries replaced
  production volume 0.341561 kg
- sulfuric acid: 4.28294e-5 kg; lognormal variance with pedigree 0.0341, pedigree (4,2,4,1,3)
  (same comment as for lead)
- tap water: 0.01646 kg; lognormal variance with pedigree 0.0092, pedigree (2,3,4,1,1)
  EcoSpold01Location=RER
  Assumption based on: Cherry, C.R. 2007, 1488 liters waste water for all production phases (incl. Battery manufacturing --> 50%)
  Uncertainty: Assumption based on: Cherry, C.R. 2007, 1488 liters waste water for all production phases (incl. Battery manufacturing --> 50%)
- alkyd paint, white, without solvent, in 60% solution state: 3.57063e-5 kg; lognormal variance with pedigree 0.1287, pedigree (4,3,5,3,4)
  EcoSpold01Location=RER
  Uncertainty: weight ratio scooter:passenger car
- reinforcing steel: 0.00764768 kg; lognormal variance with pedigree 0.0446, pedigree (4,3,4,1,3)
  EcoSpold01Location=RER
  Uncertainty: 5% of passenger car
- palladium: 3.44601e-9 kg; lognormal variance with pedigree 0.1287, pedigree (4,3,5,3,4)
  EcoSpold01Location=RER
  Uncertainty: weight ratio scooter:passenger car
- chromium: 2.75677e-5 kg; lognormal variance with pedigree 0.1287, pedigree (4,3,5,3,4)
  EcoSpold01Location=RER
  Uncertainty: weight ratio scooter:passenger car
- polyvinylchloride, suspension polymerised: 0.000359401 kg; lognormal variance with pedigree 0.0446, pedigree (4,3,4,1,3)
  EcoSpold01Location=RER
  Uncertainty: 15% of passenger car
- tap water: 0.0184935 kg; lognormal variance with pedigree 0.1287, pedigree (4,3,5,3,4)
  EcoSpold01Location=RER
  Uncertainty: weight ratio scooter:passenger car
- platinum: 1.83785e-8 kg; lognormal variance with pedigree 0.1287, pedigree (4,3,5,3,4)
  EcoSpold01Location=RER
  Uncertainty: weight ratio scooter:passenger car
- road vehicle factory: 1.67133e-12 unit; lognormal variance with pedigree 0.4287, pedigree (4,3,5,3,4)
  activityLink introduced to establish a direct link to the corresponding regional supply of this product
  Uncertainty: weight ratio scooter:passenger car
- used motor scooter: -0.000171665 unit; lognormal variance with pedigree 0.3086, pedigree (2,1,4,1,1)
  Uncertainty: Estimation: Scooter 50'000km
  production volume 1.32237 unit
- wire drawing, copper: 5.80091e-5 kg; lognormal variance with pedigree 0.1287, pedigree (4,3,5,3,4)
  (same comment as for road vehicle factory)
- heat, district or industrial, natural gas: 0.00886758 MJ; lognormal variance with pedigree 0.0346, pedigree (4,3,4,1,3)
  EcoSpold01Location=RER
  Uncertainty: 50% of Environmental report Honda, 2008
- section bar rolling, steel: 0.00116595 kg; lognormal variance with pedigree 0.1287, pedigree (4,3,5,3,4)
  (same comment as for road vehicle factory)
- polyvinylchloride, emulsion polymerised: 5.25954e-5 kg; lognormal variance with pedigree 0.0446, pedigree (4,3,4,1,3)
  EcoSpold01Location=RER
  Uncertainty: 15% of passenger car
- nickel, 99.5%: 1.60816e-5 kg; lognormal variance with pedigree 0.1287, pedigree (4,3,5,3,4)
  EcoSpold01Location=GLO
  Uncertainty: weight ratio scooter:passenger car
- electricity, medium voltage: 0.00154499 kWh; lognormal variance with pedigree 0.0346, pedigree (4,3,4,1,3)
  EcoSpold01Location=JP
  Uncertainty: 50% of Environmental report Honda, 2008
- zinc: 6.76584e-5 kg; lognormal variance with pedigree 0.1287, pedigree (4,3,5,3,4)
  EcoSpold01Location=RER
  Uncertainty: weight ratio scooter:passenger car
- heat, district or industrial, other than natural gas: 0.000327795 MJ; lognormal variance with pedigree 0.0346, pedigree (4,3,4,1,3)
  EcoSpold01Location=RER
  Uncertainty: 50% of Environmental report Honda, 2008
- ethylene, average: 0.000106252 kg; lognormal variance with pedigree 0.1287, pedigree (4,3,5,3,4)
  EcoSpold01Location=RER
  Uncertainty: weight ratio scooter:passenger car
- sheet rolling, steel: 0.00232177 kg; lognormal variance with pedigree 0.0446, pedigree (4,3,4,1,3)
  activityLink introduced to establish a direct link to the corresponding regional supply of this product
  Uncertainty: 5% of passenger car
- section bar rolling, steel: 0.00116595 kg; lognormal variance with pedigree 0.1306, pedigree (4,3,5,5,4)
  EcoSpold01Location=RER
  Uncertainty: weight ratio scooter:passenger car
- injection moulding: 0.00221131 kg; lognormal variance with pedigree 0.1306, pedigree (4,3,5,5,4)
  EcoSpold01Location=RER
  Uncertainty: All HDPE
- alkyd paint, white, without solvent, in 60% solution state: 3.57063e-5 kg; lognormal variance with pedigree 0.1306, pedigree (4,3,5,5,4)
  EcoSpold01Location=RER
  Uncertainty: weight ratio scooter:passenger car
- sulfuric acid: 4.29739e-5 kg; lognormal variance with pedigree 0.1306, pedigree (4,3,5,5,4)
  EcoSpold01Location=RER
  Uncertainty: weight ratio scooter:passenger car
- road vehicle factory: 1.67133e-12 unit; lognormal variance with pedigree 0.4306, pedigree (4,3,5,5,4)
  EcoSpold01Location=RER
  Uncertainty: weight ratio scooter:passenger car
- heat, district or industrial, natural gas: 0.000154125, 0.00871345 MJ (2 entries); lognormal variance with pedigree 0.0366, pedigree (4,3,4,5,3)
  EcoSpold01Location=RER
  Uncertainty: 50% of Environmental report Honda, 2008
- heat, district or industrial, other than natural gas: 1.46886e-7, 0.000327648 MJ (2 entries); lognormal variance with pedigree 0.0366, pedigree (4,3,4,5,3)
  EcoSpold01Location=RER
  Uncertainty: 50% of Environmental report Honda, 2008
- tap water: 5.32357e-5, 0.000442256, 8.79808e-5, 0.00221853, 5.77145e-5, 0.000164168, 0.0253877 kg (7 entries); lognormal variance with pedigree 0.1306, pedigree (4,3,5,5,4)
  EcoSpold01Location=RER
  Uncertainty: weight ratio scooter:passenger car
- electricity, medium voltage: 2.0225e-5, 3.6801e-6, 6.24089e-5, 0.000904864, 0.000129503, 0.000424305 kWh (6 entries); lognormal variance with pedigree 0.0366, pedigree (4,3,4,5,3)
  EcoSpold01Location=JP
  Uncertainty: 50% of Environmental report Honda, 2008
- ethylene, average: 1.67787e-6, 0.000104574 kg (2 entries); lognormal variance with pedigree 0.1306, pedigree (4,3,5,5,4)
  EcoSpold01Location=RER
  Uncertainty: weight ratio scooter:passenger car
- chromium steel removed by turning, average, conventional: 0.000507996 kg; lognormal variance with pedigree 0.0981, pedigree (4,2,4,5,4)
  Assumption
  EcoSpold01Location=RER
  Uncertainty: Assumption
- waste plastic, mixture: -8.51221e-5 kg; lognormal variance with pedigree 0.0361, pedigree (4,2,4,5,3)
  (same comment as for waste plastic, mixture)
  production volume 5.616 kg
- waste rubber, unspecified: -0.00565708, -0.00565708 kg (2 entries); lognormal variance with pedigree 0.0361, pedigree (4,2,4,5,3)
  EcoSpold01Location=CH
  50% of tyres to municipal incineration
  Uncertainty: 50% of tyres to municipal incineration
  production volume 70.752 kg
- tap water: 0.00660407 kg; lognormal variance with pedigree 0.0112, pedigree (2,3,4,5,1)
  Assumption based on: Cherry, C.R. 2007, 1488 liters waste water for all production phases (incl. Battery manufacturing --> 50%)
  EcoSpold01Location=RER
  Uncertainty: Assumption based on: Cherry, C.R. 2007, 1488 liters waste water for all production phases (incl. Battery manufacturing --> 50%)

## Inputs from nature
- Water, unspecified natural origin [natural resource, in water]: 0 m3; name water_UNO_input; pedigree (1,1,1,1,1)
  Data of 1 European plant - reported in Fisher (2006)
  Uncertainty: data of 1 European plant - reported in Fisher (2006)

## Emissions to nature
- Oils, unspecified [water, surface water]: 0 kg; pedigree (1,1,1,1,1)
  (same comment as for Water, unspecified natural origin)
- DOC, Dissolved Organic Carbon [water, surface water]: 8.21068e-7 kg; lognormal variance with pedigree 0.0921, pedigree (1,4,5,3,1)
  Calculated as equal to TOC.
  Uncertainty: data of 1 European plant - reported in Fisher (2006)
- TOC, Total Organic Carbon [water, surface water]: 8.21068e-7 kg; lognormal variance with pedigree 0.0921, pedigree (1,4,5,3,1)
  Calculated by default as TOC (gC) = COD/2.7 (COD measured in g O2). Should more correctly be calculated from the carbon content of the specified emissions to water.
  Uncertainty: data of 1 European plant - reported in Fisher (2006)
- Particulates, < 2.5 um [air, urban air close to ground]: 0 kg; pedigree (1,1,1,1,1)
  (same comment as for Water, unspecified natural origin)
- Water [air, unspecified]: 1.05657e-5 m3; name water_to_air_unspecified; = (water_UNO_input*fraction_PW_to_air); lognormal variance with pedigree 0.0807, pedigree (2,2,5,1,1)
  Calculated value based on literature values and expert opinion. See comments in the parametres' comment field.
  property fraction, origin: salt water 0; name fraction_origin_salt_water
  property fraction, origin: fresh water 0; name fraction_origin_fresh_water
  property fraction, origin: unspecified 1; name fraction_origin_unspecified
- Suspended solids, unspecified [water, surface water]: 0 kg; pedigree (1,1,1,1,1)
  (same comment as for Water, unspecified natural origin)
- COD, Chemical Oxygen Demand [water, surface water]: 2.21688e-6 kg; lognormal variance with pedigree 0.0921, pedigree (1,4,5,3,1)
  (same comment as for Water, unspecified natural origin)
- Water [water, unspecified]: 5.94738e-5 m3; name water_to_water_unspecified; = water_UNO_input*(1-fraction_PW_to_air); lognormal variance with pedigree 0.0807, pedigree (2,2,5,1,1)
  (same comment as for Water)
  property fraction, origin: fresh water 0; name fraction_origin_fresh_water_Ww
  property fraction, origin: unspecified 1; name fraction_origin_unspecified_Ww
  property fraction, origin: salt water 0; name fraction_origin_salt_water_Ww
- Particulates, > 2.5 um, and < 10um [air, urban air close to ground]: 0 kg; pedigree (1,1,1,1,1)
  (same comment as for Water, unspecified natural origin)
- NMVOC, non-methane volatile organic compounds, unspecified origin [air, urban air close to ground]: 0 kg; pedigree (1,1,1,1,1)
  (same comment as for Water, unspecified natural origin)
- Nitrogen oxides [air, urban air close to ground]: 0 kg; pedigree (1,1,1,1,1)
  (same comment as for Water, unspecified natural origin)
- Nickel, ion [water, surface water]: 0 kg; pedigree (1,1,1,1,1)
  (same comment as for Water, unspecified natural origin)
- Sulfur dioxide [air, urban air close to ground]: 0 kg; pedigree (1,1,1,1,1)
  (same comment as for Water, unspecified natural origin)
- Zinc, ion [water, surface water]: 0 kg; pedigree (1,1,1,1,1)
  (same comment as for Water, unspecified natural origin)
- Mercury [air, urban air close to ground]: 0 kg; pedigree (1,1,1,1,1)
  (same comment as for Water, unspecified natural origin)
- BOD5, Biological Oxygen Demand [water, surface water]: 2.98663e-7 kg; lognormal variance with pedigree 0.0921, pedigree (1,4,5,3,1)
  (same comment as for Water, unspecified natural origin)
- Particulates, > 10 um [air, urban air close to ground]: 0 kg; pedigree (1,1,1,1,1)
  (same comment as for Water, unspecified natural origin)
- Phosphate [water, surface water]: 1.14868e-8 kg; lognormal variance with pedigree 0.1287, pedigree (4,3,5,3,4)
  Uncertainty: weight ratio scooter:passenger car
- NMVOC, non-methane volatile organic compounds, unspecified origin [air, unspecified]: 5.51371e-5 kg; lognormal variance with pedigree 0.1287, pedigree (4,3,5,3,4)
  Uncertainty: weight ratio scooter:passenger car

## Sampling procedure
Company information & own estimation

## Extrapolations
see Geography & Technology

## Review by Jürgen Sutter 2007-08-31
passed.
