# building operation, budget hotel

Dataset: EcoSpold 2, unit process
Geography: BR
Time period: 2017-01-01 to 2019-12-31
Technology level: current
Classification: ISIC rev.4 ecoinvent: 5510:Short term accommodation activities
Synonyms: 3 star hotel; budget hotel
Tags: single enterprise data
Scenario: Business-as-Usual
System model: Allocation at the point of substitution
Generated by: Marina Santa Rosa Rocha
Published in: Filimonau, V 2018
Database: ecoinvent
isCopyrightProtected: true
accessRestrictedTo: 1

## General comment
This dataset represents the operation of a tourist accommodation facility classed as a budget hotel (comfort category 3*), located in Rio de Janeiro, RJ, Brazil. It was first opened in 1982 as a brand new urban hotel. The hotel has capacity to host 108 people and offers rooms of the following types (total number of rooms is given in brackets): suites (16) and double (40). The hotel has 9 floors which host a lobby, a restaurant, a meeting room and a small parking lot behind the building exclusively for employees.The laundry is outsourced. The hotel occupies a total area of 826,67 m2. The average annual occupancy of the hotel is estimated to be 50% which is equal to 20440 guest nights per year.

## Included activities start
This dataset is modelled to represent the service of operating the hotel. It includes: energy and water consumption, furniture and in-room textiles (such as bed linen, bed mattrasses and curtains), electric and electronic equipment used in guest rooms and on hotel premises (including bulbs), cleaning and in-room consumables. Activities include hotel operations and infrastructure based on 1 guest night stay and the lifeframe of the hotel building of 75 years. The case study hotel uses services of an outsourced laundry. To account for its impacts, a separate laundry dataset has been added. The input to the laundry dataset is based on the number of linen pieces sent to laundry by the hotel. The transportation of linen to/from laundry facility was excluded due to data availability. Although the case study hotel has a restaurant on site, the inputs of food items have been excluded due to data availability. The energy and water consumption attributed to restaurant operations have been included. Any waste generated in restaurant operations has been included.

## Included activities end
Activities end with guest departure from hotel premises. Due to data availability, the following processes have been excluded: room equipment (lamp, telephone, in-room safe, door lock), kitchen equipment (blender, iron, deep fryer) and insect killer. Parking is also an outsourced service for guests and, due to unavailable data, it was excluded from this dataset.

## Geography
The hotel is based in the city of Rio de Janeiro, RJ, Brazil.

## Technology
Technology in use is considered current.

## Time period
The survey was done in the year 2017 with the data provided covering the operational year 2016-2017.

## Parameters
- occupancy rate/year: 0.5 dimensionless; name occupancy_y
  The average annual occupancy of the hotel is estimated to be 50%, based on survey.

## Reference product
- building operation, budget hotel: 1 guest night; name RP; By-product classification allocatable product; CPC 63111: Room or unit accommodation services for visitors, with daily housekeeping services
  production volume 2.54478e7 guest night; name RP_PV; = ((lifetime_guests*occupancy_y)/lifetime)*1245
    Annual production volume is estimated based on the number of hotel guests in the case study hotel (data from hotel survey) multiplied by the number of budget hotels in Brazil. The case study hotel reported the annual production volume of 20440 guest nights (maximum capacity of 112 guests per night considering an occupancy rate of 50%). In 2017 it was estimate that there were 10314 hotels in Brazil (Source: JLL, FOHB and ABR. Lodging Industry in Numbers - Brazil 2017. Available from: http://www.jll.com.br/brazil/pt-br/relatorios/175/hotelaria-em-numeros-2017) Accessed 27 March 2018. A study from the Brazilian Institute of Geography and Statistics (IBGE, 2012) showed that 46,9% of tourism accomodations in main urban areas in Brazil are hotels and 25,8% of these hotels are consider tourist/medium comfort hotels. (Source: IBGE, 2012. Pesquisa de Serviços de Hospedagem 2011- Municípios das Capitais, Regiões Metropolitanas das Capitais e Regiões Integradas Available from: ftp://ftp.ibge.gov.br/Comercio_e_Servicos/Pesquisa_Servicos_de_Hospedagem/2011/psh2011.pdf. Accessed 27 March 2018). These percentages are used as a proxy to calculate the total amount of luxury hotels in Brazil: 10314*0,469*0,258 = 1245 budget hotels. Assuming the annual production is fairly equal across all luxury Brazilian hotels, the annual production volume for the whole destination can be estimated as 20440*1245 = 25447800.
  property price 5.89866 EUR2005; name RP_price_EUR2005
    Calculated based on inputs: The price of the product has been calculated as a sum of the values of the material and energy inputs for this product. This value is therefore a rough estimation. It may underestimate the real price since there are additional expenses when producing any product. These expences can include for example labour costs, treatment of waste materials and profit for the producer. Please consider carefully whether this level of data quality is acceptable for your application.
  property true value 5.89866; name RP_true_value
    allocation property applied in "true value" allocation // value calculated from revenue

## By-products
- heat, for reuse in municipal waste incineration only: 0 MJ; CPC 17300: Steam and hot water; By-product classification allocatable product; pedigree (1,1,1,1,1)
  Net electricity generated from this waste and used in internal MSWI plant energy redistribution.
  Uncertainty: uncertainty is calculated from uncertainties in waste composition and uncertainties in energy efficiency and the uncertainty in internal energy demand
  production volume 2.10219e7 MJ
  property true value relation 0.1842; name E_th_prod_MSWI_true_value_relation
    property to calculate "true value" from
  property exergy 0.1842 MJ; name E_th_prod_MSWI_exergy
    This exergy property is based on the exergy content of the product.
  property price 0.0106 EUR2005; name E_th_prod_MSWI_price_EUR2005
    Average European district heat price from Ecoheatcool and Euroheat 2005-2006, Ecoheat Work package 1: The European heat market. Final report. 10.6 EUR/GJ i s the price of district heat. http://www.solarthermalworld.org/files/Ecoheatcool%20WP1%20Web.pdf?download
  property true value 0.00546746
    allocation property applied in "true value" allocation // value calculated from true value relation
- electricity, for reuse in municipal waste incineration only: 0 kWh; CPC 17100: Electrical energy; By-product classification allocatable product; pedigree (1,1,1,1,1)
  (same comment as for heat, for reuse in municipal waste incineration only)
  production volume 2.85139e6 kWh
  property exergy 3.6 MJ; name E_el_prod_MSWI_exergy
    This exergy property is based on the exergy content of the product.
  property true value relation 3.6; name E_el_prod_MSWI_true_value_relation
    property to calculate "true value" from
  property price 0.1 EUR2005; name E_el_prod_MSWI_price_EUR2005
    Estimated to be the same price as in case of electricity, medium voltage.
  property true value 0.0144938
    (same comment as for heat, for reuse in municipal waste incineration only)
- iron scrap, sorted, pressed: 0 kg; By-product classification Recyclable; CPC 39310: Slag, dross, scalings and other waste from the manufacture of iron or steel; pedigree (1,1,1,1,1)
  Iron scrap recovered from this waste.
  Uncertainty: uncertainty calculated from uncertainty in waste composition, uncertainty of share of recyclable metal, uncertainty of transfer coefficient to bottom ash, uncertainty of the efficiency of scrap removal in MSWI plant.
  production volume 322293 kg
  property price 0.175 EUR2005
    Temporary price data. Calculated as 90% of purchasers price based on: 2005 import and export prices (total trades (USD) divided by total weight (kg) in biggest economies of the world: EU27, USA, Brasil, China, India, Japan and Russia) from UN Commodity Trade Statistics Database (http://data.un.org/Explorer.aspxDatabase [Accessed 2011.06.20]). Commodity: Waste or scrap, of cast iron
  property carbon content 0
    carbon content on a dry matter basis (reserved; not for manual entry)
  property true value 0.00221635
    allocation property applied in "true value" allocation // value calculated from revenue
  properties: dry mass 1 kg, water content 0, carbon content, non-fossil 0, water in wet mass 0 kg, carbon content, fossil 0, wet mass 1 kg, carbon allocation 0 kg
- iron scrap, unsorted: 0 kg; source European Aluminium Association 2008; CPC 39310: Slag, dross, scalings and other waste from the manufacture of iron or steel; By-product classification Recyclable; pedigree (1,1,1,1,1)
  production volume 9.16959 kg
  property price 0.149 EUR2005; name ironScrapAmount_price_EUR2005
    Temporary price data. Calculated as 90% of purchasers price based on: estimated at 85% of sorted scrap
  property carbon content 0
    carbon content on a dry matter basis (reserved; not for manual entry)
  property true value 5.36891e-8
    allocation property applied in "true value" allocation // value calculated from revenue
  properties: water in wet mass 0 kg, water content 0, carbon content, fossil 0, carbon content, non-fossil 0, dry mass 1 kg, wet mass 1 kg, carbon allocation 0 kg
- aluminium oxide, non-metallurgical: 0 kg; source European Aluminium Association 2008; CPC 41432: Alumina (aluminium oxide), except artificial corundum; By-product classification allocatable product; CAS 1344-28-1; pedigree (1,1,1,1,1)
  production volume 577.008 kg
  property carbon content, non-fossil 0; name C_content_non_fossil
  property price 0.28 EUR2005; name Al2O3Amount_price_EUR2005
    From UN trade database. http://data.un.org/ Import data from the largest economies of the world are used (Brazil, India, USA, China, Japan and EU-27).
  property dry mass 1 kg; name DM
  property water content 0; name water_content
  property wet mass 1 kg; name WM
  property water in wet mass 0 kg; name WWM
  property carbon content, fossil 0; name C_content_fossil
  property carbon content 0
    carbon content on a dry matter basis (reserved; not for manual entry)
  property true value 6.34877e-6
    allocation property applied in "true value" allocation // value calculated from revenue
  properties: carbon allocation 0 kg
- aluminium, cast alloy: 0 kg; source European Aluminium Association 2008; By-product classification allocatable product; CPC 41431: Unwrought aluminium; pedigree (1,1,1,1,1)
  EcoSpold01Location=RER
  production volume 5393.74 kg
  property price 1.3 EUR2005; name castAlloyAmount_price_EUR2005
    Temporary price data. Calculated as 90% of purchasers price based on: Source: London Metal Exchange, Aluminium alloy price for 2005
  property carbon content 0
    carbon content on a dry matter basis (reserved; not for manual entry)
  property true value 0.000275539
    allocation property applied in "true value" allocation // value calculated from revenue
  properties: water in wet mass 0 kg, carbon content, non-fossil 0, water content 0, dry mass 1 kg, carbon content, fossil 0, wet mass 1 kg, carbon allocation 0 kg
- aluminium, wrought alloy: 0 kg; source European Aluminium Association 2008; By-product classification allocatable product; CPC 4153: Semi-finished products of aluminium or aluminium alloys; pedigree (1,1,1,1,1)
  production volume 2361.28 kg
  property price 1.44 EUR2005; name secondaryAluminiumOutput_price_EUR2005
    Estimated based on literature values and expert judgement. Aluminium ccast alloys are about 90% of the price of aluminium wrought alloys.
  property carbon content 0
    carbon content on a dry matter basis (reserved; not for manual entry)
  property true value 0.000133616
    allocation property applied in "true value" allocation // value calculated from revenue
  properties: wet mass 1 kg, water content 0, carbon content, fossil 0, water in wet mass 0 kg, carbon content, non-fossil 0, dry mass 1 kg, carbon allocation 0 kg
- copper: 0 kg; source Rentz O. 1999; By-product classification allocatable product; CPC 41413: Refined copper and copper alloys, unwrought; master alloys of copper
  Literature value. Copper uses: Before end-use copper is manufactured into semi fabricated products, such as shapes and ingots (known as 'semis'). These manufacturing processes are subdivided into hot working, cold working and, if necessary, process annealing. Few of the semis are ready for use as such. They more typically travel to first-stage manufacturers, who make metal rods, wire, and casting, and then to component manufacturers who produce such things as motors, valves, and insulated cables The components in turn are incorporated by final-stage manufacturers into a variety of finished products - automobiles, commercial buildings, residential housing, and so forth. These uses account for about 79% of the world-wide consumption of copper.
  production volume 10258.6 kg
  property price 5.52 EUR2005
    Literature value (http://www.economist.com/news/business/21576714-mining-industry-has-enriched-chile-its-future-precarious-copper-solution). Average price between 20015 and 2013.
  property carbon content 0
    carbon content on a dry matter basis (reserved; not for manual entry)
  property true value 0.00222524
    allocation property applied in "true value" allocation // value calculated from revenue
  properties: dry mass 1 kg, water in wet mass 0 kg, wet mass 1 kg, carbon content, non-fossil 0, water content 0, carbon content, fossil 0, carbon allocation 0 kg
- zinc concentrate: 0 kg; CPC 14290: Other non-ferrous metal ores and concentrates (other than uranium or thorium ores and concentrates); By-product classification allocatable product
  Calculated value from the knowledge of the properties of both products.
  production volume 8.14254e-6 kg
  property price 0.38 EUR2005; name ByP_price_EUR2005
    Temporary price data. Calculated as 90% of purchasers price based on: Zinc content in concentrate 53%. Concentrate price per kg Zn 86.5% of refined Zn price (13.5% treatment charges according to CHR Metals Limited 2005: Dynamic cost curves. http://www.minecost.com/dynamic.pdf). 2004 zinc price from USGS (2007) Mineral commodity summaries 2007. <http://minerals.usgs.gov/minerals/pubs/mcs/2007/mcs2007.pdf> [Accessed 25 May 2010]
  property zinc content 0.53; name zinc_C_zinc_concentrate
    Zinc content on a dry matter basis. Value taken from teh "zinc mine operation" /GLO dataset.
  property dry mass 1 kg; name DM_zinc_concentrate
  property carbon content 0
    carbon content on a dry matter basis (reserved; not for manual entry)
  property true value 1.21589e-13
    allocation property applied in "true value" allocation // value calculated from revenue
  properties: wet mass 1 kg, water content 0, carbon content, non-fossil 0, carbon content, fossil 0, water in wet mass 0 kg, carbon allocation 0 kg

## Inputs from technosphere
- mattress: 0.0010913 unit; = (112)*(lifetime/5)/(lifetime_guests*occupancy_y); lognormal variance with pedigree 0.303425, pedigree (2,4,2,2,2)
  Calculated value. The amount of exchange is calculated as: amount of input product * (lifetime of the hotel/lifetime of the product) / (number of guests during the lifetime of the hotel * hotel occupancy rate). The hotel reports 56 double matresses, the input represents a single mattress. Average service life of a mattress is assumed to be equal to 5 years. Source: Traveller 2017. How often do hotels change their mattresses? Available from: http://www.traveller.com.au/everyone-asks-how-often-do-hotels-change-their-mattresses-guv2kt Accessed 16 March 2018.
  property wet mass 20.128 kg; name mat_WM
  properties: carbon content, non-fossil 0.29026, carbon content, fossil 5.18548, dry mass 20.1278 kg
  note on carbon content, non-fossil: Calculated value. The value of the mattress non fossil carbon content is the sum of all non fossil carbon content of input materials to the mattress manufacture extracted from Lanoe et al (2013).
  note on carbon content, fossil: Calculated value. The value of the mattress fossil carbon content is the sum of all fossil carbon content of input materials to the mattress manufacture extracted from Lanoe et al (2013).
- soap: 0.0526357 kg; = (262,8+817,6)*(lifetime)/(lifetime_guests*occupancy_y); lognormal variance with pedigree 0.303425, pedigree (2,4,2,2,2)
  Calculated value. The amount of exchange is calculated as: amount of input product * (lifetime of the hotel) / (number of guests during the lifetime of the hotel * hotel occupancy rate). In terms of outputs assumed to have gone to wastewater. Represents here soap, shampoo, shower gel and body lotion.
  properties: wet mass 1 kg, water content 0.149425, dry mass 0.87 kg, carbon content, non-fossil 0.692237
- hair dryer: 0.000909416 unit; = 56*(lifetime/3)/(lifetime_guests*occupancy_y); lognormal variance with pedigree 0.303425, pedigree (2,4,2,2,2)
  Calculated value. The amount of exchange is calculated as: amount of input product * (lifetime of the hotel) / (number of guests during the lifetime of the hotel * hotel occupancy rate). Assumed average service life of a hair dryer is 3 years. Source: Ashby 2009. Materials and the Environment: Eco-Informed Material Choice. Elsevier, Burlington, USA
  properties: lifetime 3 year, wet mass 0.89 kg, dry mass 0.89 kg, carbon content, fossil 0.411805
- water, completely softened: 0.000415163 kg; = 9,863013699*0.864*(lifetime)/(lifetime_guests*occupancy_y); lognormal variance with pedigree 0.0454, pedigree (2,4,2,5,4)
  Calculated value. From the dataset for "cleaning consumables production" GLO 2011-2013, on average cleaning products contain 86% of water. Based on the literature source Golsteijn (2015) the dataset used to represent the water flow is "water, completely softened, at plant", version 2 dataset which corresponds to ecoinvent version 3 dataset "water, completely softened, from decarbonised waterm at user". The amount of water needed is therefore calculated based on the vale of 86% calculated based on Golsteijn (2015) and the amount of cleaning consumable which are expressed as 100% active substance.
  Laura Golsteijn, 2015, A compilation of life cycle studies for six household detergent product categories in Europe: the basis for product-specific A.I.S.E. Charter Advanced Sustainability Profiles
  properties: wet mass 1 kg
- building, budget hotel: 6.49583e-7 unit; = 1/(lifetime_guests*occupancy_y); lognormal variance with pedigree 0.303425, pedigree (2,4,2,2,2)
  Calculated value. The amount of infrastructure required is calculated based on the lifetime capacity (see properties).;activityLink introduced to establish a direct link to the corresponding regional supply of this product
  property lifetime capacity 3.066e6 guest night; name lifetime_guests; = 112*365*lifetime
  property lifetime 75 year; name lifetime
  note on lifetime capacity: Lifetime capacity represents the maximum capacity of the hotel during the building lifetime.
  note on lifetime: Estimated value. The lifetime of a hotel building is assumed to be equal to 75 years which is an average of the 50-100 years' estimates available in the literature. Source: Filimonau et al. 2011. Reviewing the carbon footprint analysis of hotels: Life Cycle Energy Analysis (LCEA) as a holistic method for carbon impact appraisal of tourist accommodation. Journal of Cleaner Production, 19, 1917-1930.
- washing, drying and finishing laundry: 1.45815 kg; = ((328/4)*365)*lifetime/(lifetime_guests*occupancy_y); lognormal variance with pedigree 0.0454, pedigree (2,4,2,5,4)
  Calculated value from the total number of linen unitsper guests per night. The amount of exchange is calculated as: amount of input product per year * (lifetime of the hotel) / (number of guests during the lifetime of the hotel * hotel occupancy rate). It is assumed that, on average, 4 linen units make 1 kg in weight. Source: Filimonau et al. 2011. Reviewing the carbon footprint analysis of hotels: Life Cycle Energy Analysis (LCEA) as a holistic method for carbon impact appraisal of tourist accommodation. Journal of Cleaner Production, 19, 1917-1930.
- tissue paper: 0.149372 kg; = (306600*0.01)*(lifetime)/(lifetime_guests*occupancy_y); lognormal variance with pedigree 0.303425, pedigree (2,4,2,2,2)
  Calculated value. The amount of exchange is calculated as: amount of input product * (lifetime of the hotel) / (number of guests during the lifetime of the hotel * hotel occupancy rate). Conversion from meters to kg has been made assuming a roll of 25 meters weights 250 g, so 1 kg of tissue paper is equal to 100 meters. Source: Sainsburys 2018. Andrex Toilet Paper. Available from: https://www.sainsburys.co.uk/webapp/wcs/stores/servlet/gb/groceries/andrex-toilet-tissue--classic-white-16x241-sheets?langId=44&storeId=10151&krypto=6KE3AoChB8jlwzzYGlgparsN%2BBruZBOjUaSVm%2BCnwAT0LLJPLAalDm9DhCtUDzK5uFGmUkJJ%2FMIaDVx%2BGRGKIHdBUxaNbCTzmIQiBcpr497qZYrRt4Kvvy%2BLLO40d8j3%2BY4eQ%2Fk%2BK4BXsq0FOjWLrDLelOp5CVxrDysmNwGM26k%3D&ddkey=https%3Agb%2Fgroceries%2Fandrex-toilet-tissue--classic-white-16x241-sheets Accessed 16 January 2018. In terms of outputs, assumed to have gone to wastewater.
  properties: water content 0.0582011, carbon content, non-fossil 0.36169, carbon content, fossil 2.22e-5, dry mass 0.945 kg, wet mass 1 kg
- computer, laptop: 9.74374e-6 unit; = (2*lifetime/10)/(lifetime_guests*occupancy_y); lognormal variance with pedigree 0.303425, pedigree (2,4,2,2,2)
  Calculated value. The amount of exchange is calculated as: amount of input product * (lifetime of the hotel) / (number of guests during the lifetime of the hotel * hotel occupancy rate). Assumed a service life of 10 years.
  properties: carbon content, non-fossil 1.2662e-5, dry mass 3.15 kg, wet mass 3.15 kg, carbon content, fossil 0.257799
- furniture, wooden: 0.0409627 kg; name furniture_w; = (56*25)*(lifetime/15)/(lifetime_guests*occupancy_y)+(1*37)*(lifetime/15)/(lifetime_guests*occupancy_y)+(258*23)*(lifetime/15)/(lifetime_guests*occupancy_y)+(7*293)*(lifetime/15)/(lifetime_guests*occupancy_y)+(55*58)*(lifetime/15)/(lifetime_guests*occupancy_y); lognormal variance with pedigree 0.303425, pedigree (2,4,2,2,2)
  Estimated value. The amount of exchange is calculated as: amount of input product * (lifetime of the hotel/lifetime of the product) / (number of guests during the lifetime of the hotel * hotel occupancy rate). Assumed average service life of all pieces of furniture is 15 years. This represents service life of an average piece of furniture. Source: European Commission 2013. BACKGROUND REPORT. Revision of Ecolabel and Green Public Procurement criteria for the product group Wooden Furniture. September 2013. Available from: http://susproc.jrc.ec.europa.eu/furniture/docs/Background_report_Furniture_September_2013.pdf Accessed 19 March 2018.
  This exchange represents the following: Double bed (unit) is assumed to have a weight of 25 kg, no headboard, Furniture re-use Network, 2009. Average weights. Available from: http://democracy.york.gov.uk/documents/s2116/Annex%20C%20REcycling%20Report%20frnweights2005.pdf Accessed 13 January 2018. Sofas (unit) Sofa is assumed to have a weight of 37 kg, two seater, Furniture re-use Network, 2009. Average weights. Available from: http://democracy.york.gov.uk/documents/s2116/Annex%20C%20REcycling%20Report%20frnweights2005.pdf Accessed 13 January 2018. Tables/Desks (unit) Table is assumed to have a weight of 23 kg, medium, Furniture re-use Network, 2009. Average weights. Available from: http://democracy.york.gov.uk/documents/s2116/Annex%20C%20REcycling%20Report%20frnweights2005.pdf Accessed 13 January 2018. Chairs (unit) Chair is assumed to have a weight of 7 kg, Furniture re-use Network, 2009. Average weights. Available from: http://democracy.york.gov.uk/documents/s2116/Annex%20C%20REcycling%20Report%20frnweights2005.pdf Accessed 13 January 2018. Wardrobe (unit) is assumed to have a weight of 55 kg (double wardrobe), Furniture re-use Network, 2009. Average weights. Available from: http://democracy.york.gov.uk/documents/s2116/Annex%20C%20REcycling%20Report%20frnweights2005.pdf Accessed 13 January 2018
  property lifetime 15 year; name furniture_w_lifetime
  note on lifetime: Source: JRC (2013) Wooden Furniture. BACKGROUND REPORT. Revision of Ecolabel and Green Public Procurement criteria for the product group. Retrieved from: http://susproc.jrc.ec.europa.eu/furniture/docs/Background_report_Furniture_September_2013.pdf, accessed 9Feb2018
- waste textile, soiled: -0.0175777 kg; name waste_text; = (cotton)*-1; lognormal variance with pedigree 0.004025, pedigree (2,4,2,2,2)
  The amount of waste material is assumed to be equal to the amount of respective input material, textile, knit cotton.
  production volume 449196 kg; = waste_text*RP_PV/RP
    Calculated from production volume of reference product using the relative outputs.
  property price 0 EUR2005; name waste_text_price_EUR2005
  properties: wet mass 1 kg, water content 0.333333, dry mass 0.75 kg, carbon content, non-fossil 0.570519
- tap water: 370.561 kg; name tap_water; = 7606,1255*1000*(lifetime)/(lifetime_guests*occupancy_y); lognormal variance with pedigree 0.303425, pedigree (2,4,2,2,2)
  Calculated value based on consumption data from the hotel survey provided in m3. Assuming 1 m3 of water is equal to1000 kg of water. The amount of exchange is calculated as: amount of input product * (lifetime of the hotel) / (number of guests during the lifetime of the hotel * hotel occupancy rate).
  properties: water content 2962.17, dry mass 0.000337476 kg, wet mass 1 kg, carbon content, fossil 0.00178991
  note on carbon content, fossil: Bicarbonate content is 2.93 mol/m3. CO2 content is 0.1 mol/m3 (ecoinvent v2.2 report 8, Tab 93.1).
- television: 0.000282568 unit; = 58*(lifetime/10)/(lifetime_guests*occupancy_y); lognormal variance with pedigree 0.303425, pedigree (2,4,2,2,2)
  Calculated value. The amount of exchange is calculated as: amount of input product * (lifetime of the hotel/lifetime of the product) / (number of guests during the lifetime of the hotel * hotel occupancy rate). Average service life of a television is assumed to be equal to 10 years. Source: Feng and Ma 2009. The energy consumption and environmental impacts of a color TV set in China. Journal of Cleaner Production, 17,13-25.
  properties: lifetime 10 year
  note on lifetime: As proposed by Dodbiba et al. 2008. Source: 2008, Dodbiba, G., Takahashi, K., Sadaki, J., Fujita, T., The recycling of plastic wastes from discarded TV sets: comparing energy recovery with mechanical recycling in the context of life cycle assessment, Journal of Cleaner Production, 16, 458-470, 0 - Undefined
- electricity, low voltage: 0.836034 kWh; = 16960*(lifetime)/(lifetime_guests*occupancy_y)+(2/3.6*cotton); lognormal variance with pedigree 0.303425, pedigree (2,4,2,2,2)
  Calculated data. The amount of exchange is calculated as: amount of input product * (lifetime of the hotel) / (number of guests during the lifetime of the hotel * hotel occupancy rate). The amount also includes electricity requirements to produce cotton textile products from raw cotton. It is estimated that 2 MJ of electricity is required to produce 1 kg of cotton textile product. This accounts for 10% fabric loss in the cotton textile manufacturing process. Source: Baydar, G., Ciliz, N., and Mammadov, A., 2015. Life cycle assessment of cotton textile products in Turkey. Journal of Cleaner Production, 104(A), 213-223.
- coffee maker: 9.74374e-6 unit; = 1*(lifetime/5)/(lifetime_guests*occupancy_y); lognormal variance with pedigree 0.303425, pedigree (2,4,2,2,2)
  Calculated value. The amount of exchange is calculated as: amount of input product * (lifetime of the hotel/lifetime of the product) / (number of guests during the lifetime of the hotel * hotel occupancy rate). Assumed average service life of a coffee maker is 5 years. Source: Ashby 2009. Materials and the Environment: Eco-Informed Material Choice. Elsevier, Burlington, USA
  properties: wet mass 1.9 kg, dry mass 1.9 kg, lifetime 5 year, carbon content, fossil 0.857611
- nylon 6: 0.00272825 kg; name nylon; = (5*56*2)*(lifetime/10)/(lifetime_guests*occupancy_y); lognormal variance with pedigree 0.303425, pedigree (2,4,2,2,2)
  Estimated value. Represents here curtains made of nylon. Assuming each room has two windows.An average curtain is assumed to have a weight of 5 kg. Source: Furniture re-use Network, 2009. Average weights. Available from: http://democracy.york.gov.uk/documents/s2116/Annex%20C%20REcycling%20Report%20frnweights2005.pdf Accessed 13 January 2018. Average service life of a curtain is assumed to be equal to average service life of a carpet which is 10 years. Source: Greenspec 2018. Whole life costing: carpets. Available from: http://www.greenspec.co.uk/building-design/carpets/ Accessed 16 March 2018. In terms of outputs assumed to have gone to waste polyethylene.
  properties: dry mass 1 kg, wet mass 1 kg, carbon content, fossil 0.637168
  note on carbon content, fossil: It is a chain of caprolactam molecules, originating from aminocarboxylic acids - here caproic acid or caprolactam. The structure of nylon 6 is -(NH-(CH2)5-CO)n-, C6H11NO (ecoinvent v2.2 report 11_II). MW=113 g/mol
- vacuum cleaner: 2.43593e-5 unit; = 4*(lifetime/8)/(lifetime_guests*occupancy_y); lognormal variance with pedigree 0.303425, pedigree (2,4,2,2,2)
  Estimated value. No data on the number of vacuum cleaners in use was provided by the case study hotel. Hence, data from the upmarket hotel, Peru, was used as proxy. According to the upmarket hotel, Peru, 1 vacuum cleaner is required to clean 2 hotel floors. Given the case study hotel has 9 floors, the number of vacuum cleaners in use was estimated as 9/2=4.5, rounded to 4 vacuum cleaners. The amount of exchange is calculated as: amount of input product * (lifetime of the hotel/lifetime of the product) / (number of guests during the lifetime of the hotel * hotel occupancy rate). Assumed average service life of a vacuum cleaner is 8 years. Source: Gallego-Schmid et al. 2016. Life cycle environmental impacts of vacuum cleaners and the effects of European regulation. Science of the Total Environment, 559, 192-203.
  properties: dry mass 4.45 kg, wet mass 4.45 kg, lifetime 8 year, carbon content, fossil 2.59
- textile, knit cotton: 0.0175777 kg; name cotton; = (328*1,1/4)*(lifetime/0,25)/(lifetime_guests*occupancy_y); lognormal variance with pedigree 0.303425, pedigree (2,4,2,2,2)
  Calculated value from the total number of linen units used by the hotel. The amount of exchange is calculated as: amount of input product * (lifetime of the hotel/lifetime of the product) / (number of guests during the lifetime of the hotel * hotel occupancy rate). It is assumed that, on average, 4 linen units make 1 kg in weight. Source: Filimonau et al. 2011. Reviewing the carbon footprint analysis of hotels: Life Cycle Energy Analysis (LCEA) as a holistic method for carbon impact appraisal of tourist accommodation. Journal of Cleaner Production, 19, 1917-1930. Assumed average service life is 0.25 years. Source: TRSA 2015. Hospitality Textile Life, Loss and Replacement. Available from: http://www.laundrycompliance.com/wp-content/uploads/2016/02/trsa-hospitality-hotel-linen-loss.pdf Accessed 16 March 2018. The amount accounts for 10% fabric loss in the cotton textile manufacturing process. Source: Baydar, G., Ciliz, N., and Mammadov, A., 2015. Life cycle assessment of cotton textile products in Turkey. Journal of Cleaner Production, 104(A), 213-223.
  properties: wet mass 1 kg, carbon content, non-fossil 0.46, dry mass 1 kg
- cleaning consumables, without water, in 13.6% solution state: 6.53498e-5 kg; name clean; = 9,863013699*0.136*(lifetime)/(lifetime_guests*occupancy_y); lognormal variance with pedigree 0.303425, pedigree (2,4,2,2,2)
  Calculated value. The amount of exchange is calculated as: amount of input product * (lifetime of the hotel) / (number of guests during the lifetime of the hotel * hotel occupancy rate). Combined of all instances of use across the hotel operations. In terms of outputs assumed to have gone to wastewater. As the product "cleaning consumables" is expressed as 100% active substance, the amount of cleaning consumables is multiplied by the average concentration of active substance. According to Golsteijn (2015) the average water content of cleaning consumables is 86.4%, the necessary water input is accounted for with the flow "water, compeltely softened, from decarbonised water, at user". For more information on how the cleaning consumables dataset was created please refer to the relevant dataset in ecoinvent.
  2015, Laura Golsteijn, A compilation of life cycle studies for six household detergent product categories in Europe: the basis for product-specific A.I.S.E. Charter Advanced Sustainability Profiles
  property wet mass 1 kg; name clean_WM
  property carbon content, non-fossil 0; name clean_C_content_non_fossil
  property carbon content, fossil 0; name clean_C_content_fossil
  properties: dry mass 1 kg
- wastewater, average: -0.370561 m3; name wastewater; = (tap_water/1000 )*-1; lognormal variance with pedigree 0.004025, pedigree (2,4,2,2,2)
  The amount of waste material is assumed to be equal to the amount of respective input material, tap water, with conversion from kg to m3. 1 m3 of water is assumed to be equal to 1000 kg of water.
  production volume 9.46963e6 m3; = wastewater*RP_PV/RP
    Calculated from production volume of reference product using the relative outputs.
  property price 0 EUR2005; name wastewater_price_EUR2005
  properties: water content 2882.2, wet mass 1000 kg, carbon content, non-fossil 0.194039, dry mass 0.346837 kg
  note on carbon content, non-fossil: 0.0673 kg TOC/m3 (Tab A.17, ecoinvent v2.2 report 13_I). TOC was considered as Total Carbon.
- municipal solid waste: -4.09705 kg; name msw; = ((175,2*480)*(lifetime)/(lifetime_guests*occupancy_y) )*-1; lognormal variance with pedigree 0.0454, pedigree (3,4,2,4,4)
  Calculated value. The amount of municipal solid waste was calculated based on the amount generated by year (74,88 m3) multiplied by its densisty assuming garbage, household rubbish, weigh(s) 0.48 gram per (cubic centimeter), https://www.aqua-calc.com/calculate/volume-to-weightmaterial
  production volume 1.047e8 kg; = msw*RP_PV/RP
    Calculated from primary data collection with the hostel.
  property price 0 EUR2005; name msw_price_EUR2005
  properties: carbon content, fossil 0.171549, water content 0.297017, carbon content, non-fossil 0.261655, dry mass 0.771 kg, wet mass 1 kg
  note on carbon content, fossil: MSW composition in tab 4.1, ecoinvent v2.2 report 13_I. C content referred to 1 kg DM
- compact fluorescent bulb: 0.00695349 unit; = 157*(lifetime/1,1)/(lifetime_guests*occupancy_y); lognormal variance with pedigree 0.303425, pedigree (2,4,2,2,2)
  Calculated value. The amount of exchange is calculated as: amount of input product * (lifetime of the hotel/lifetime of the product) / (number of guests during the lifetime of the hotel * hotel occupancy rate). Average service life of a bulb is assumed to be equal to 1.1 year. Source: Elijošiutė et al. 2012. Life Cycle Assessment of Compact Fluorescent and Incandescent Lamps: Comparative Analysis. Environmental Research, Engineering and Management, 3(61), 65-72.
  properties: wet mass 0.075 kg, carbon content, fossil 0.009542, dry mass 0.075 kg, lifetime 1 year
  note on lifetime: Calculated from Elijosiute et al. 2012 who estimate the life time of a bulb to be eqaul to 10000 hours which equates to circa 1 year.
- heat, district or industrial, natural gas: 1.06583 MJ; = 1216*4300*0,004184*(lifetime)/(lifetime_guests*occupancy_y); lognormal variance with pedigree 0.303425, pedigree (2,4,2,2,2)
  Calculated value with conversion made from m3 to kcal to MJ of natural canalized gas. Assuming 1 m3 of natural gas is equal to 4300 kcal (Source: http://www.investidorpetrobras.com.br/pt/destaques-operacionais/formulas-de-conversao). The amount of exchange is calculated as: amount of input product * (lifetime of the hotel) / (number of guests during the lifetime of the hotel * hotel occupancy rate).
- cookstove: 3.24791e-6 unit; = 1*(lifetime/15)/(lifetime_guests*occupancy_y); lognormal variance with pedigree 0.303425, pedigree (2,4,2,2,2)
  Calculated value. The amount of exchange is calculated as: amount of input product * (lifetime of the hotel/lifetime of the product) / (number of guests during the lifetime of the hotel * hotel occupancy rate). Assumed average service life of a cookstove is 15 years. Source: Jungbluth 1997. Life-Cycle-Assessment for Stoves and Ovens. UNS Working Paper No. 16, August 1997.
  properties: dry mass 57.9 kg, wet mass 57.9 kg, carbon content, fossil 3.22, lifetime 15 year
- dishwasher: 3.8975e-6 unit; = 1*(lifetime/12,5)/(lifetime_guests*occupancy_y); lognormal variance with pedigree 0.303425, pedigree (2,4,2,2,2)
  Calculated value. The amount of exchange is calculated as: amount of input product * (lifetime of the hotel/lifetime of the product) / (number of guests during the lifetime of the hotel * hotel occupancy rate). Assumed average service life of a dishwasher is 12.5 years. Source: Fulvio and Peiró 2015. Environmental Footprint and Material Efficiency Support for Product Policy. Report on benefits and impacts/costs of options for different potential material efficiency requirements for Dishwashers. JRC Science and Policy Report, March 2015.
  properties: carbon content, fossil 5.28, lifetime 12.5 year, wet mass 50 kg, dry mass 50 kg
- refrigerator: 0.0003118 unit; = 64*(lifetime/10)/(lifetime_guests*occupancy_y); lognormal variance with pedigree 0.303425, pedigree (2,4,2,2,2)
  Calculated value. The amount of exchange is calculated as: amount of input product * (lifetime of the hotel/lifetime of the product) / (number of guests during the lifetime of the hotel * hotel occupancy rate). Assumed average service life of a refrigerator is 10 years. Source: Xiao et al. 2015. A life-cycle assessment of household refrigerators in China. Journal of Cleaner Production, 95, 301-310
  properties: lifetime 10 year
  note on lifetime: Source: Xiao, R. et al. 2015, 2015, Xiao, R., Zhang, Y., Liu, X., and Yuan, Z., A life-cycle assessment of household refrigerators in China, Journal of Cleaner Production, 95, 301-310, 1 - Article
- waste polyethylene: -0.00272825 kg; = (nylon)*-1; lognormal variance with pedigree 0.004025, pedigree (2,4,2,2,2)
  Calculated value. Represents here waste nylon 6.
  production volume 69720 kg; = nylon*RP_PV/RP
    Calculated from production volume of reference product using the relative outputs.
  properties: carbon content, fossil 0.825301, wet mass 1 kg, water content 0.00401606, dry mass 0.996 kg
  note on carbon content, fossil: C content in 1 kg DM was calculated using data in Tab A.1, ecoinvent v2.2 report 13_I

## Sampling procedure
Primary data from the hotel supplemented with literature-based calculations and estimates, where appropriate.

## Extrapolations
In terms of operations, energy and water consumption are aggregate and represent the case study hotel as a whole, rather than its specific operational areas (e.g. guest rooms, restaurant and bar). The comments to respective processes explain this in detail.
