# ventilation components factory construction

Dataset: EcoSpold 2, unit process
Geography: RER
Time period: 1998-01-01 to 2019-12-31
Technology level: current
Classification: EcoSpold01Categories: ventilation/production of components
Classification: ISIC rev.4 ecoinvent: 4290:Construction of other civil engineering projects
Tags: ConvertedDataset
Scenario: Business-as-Usual
System model: Allocation at the point of substitution
Generated by: Alex Primas
Published in: Hässig, W. 2007
Database: ecoinvent
isCopyrightProtected: true
accessRestrictedTo: 1

## General comment
This infrastructure module represents an approximation for the infrastructure of an company producing metal parts an components for ventilation systems. Due to the approximation with data of only few companies this inventory has a high uncertainty.
[This dataset was already contained in the ecoinvent database version 2. It was not individually updated during the transfer to ecoinvent version 3. Life Cycle Impact Assessment results may still have changed, as they are affected by changes in the supply chain, i.e. in other datasets. This dataset was generated following the ecoinvent quality guidelines for version 2. It may have been subject to central changes described in the ecoinvent version 3 change report (http://www.ecoinvent.org/database/ecoinvent-version-3/reports-of-changes/), and the results of the central updates were reviewed extensively. The changes added e.g. consistent water flows and other information throughout the database. The documentation of this dataset can be found in the ecoinvent reports of version 2, which are still available via the ecoinvent website. The change report linked above covers all central changes that were made during the conversion process.]

## Included activities end
Process for building and production machine includes construction and disposal processes. Land use for plant included.

## Geography
Data for production in western Europe used.

## Technology
Building halls in steel construction for 70% of the built up area and 10 m high multi-storey buildings for 30% of the built up area of 50000 m2 assumed. The life time of the tanks was assumed to be 50 years. The production machines have an assumed life time of 25 years. The yearly production is 5000 t/a. Land use derived from environmental reports of different similar companies.

## Time period
Time of literature publication.

## Reference product
- ventilation components factory: 1 unit; CPC 53269: Other constructions for manufacturing; By-product classification allocatable product
  EcoSpold01Location=RER
  production volume 1.32237 unit
    This is a placeholder value that does not reflect real-world production volumes. This dataset does not currently require a real-world production volume to work in the database framework, and no actual data were collected yet. This has no negative effect on the results of the ecoinvent database. The placeholder value of this activity was scaled according to the nominal GDP of 2005 (source: United Nations, http://data.un.org/Glossary.aspx?q=GDP+%28current+US%24%29, accessed 20130726) to reflect an appropriate share of the global production volume, which is also a placeholder value.
  property price 2.68273e7 EUR2005
    Calculated based on inputs: The price of the product has been calculated as a sum of the values of the material and energy inputs for this product. This value is therefore a rough estimation. It may underestimate the real price since there are additional expenses when producing any product. These expences can include for example labour costs, treatment of waste materials and profit for the producer. Please consider carefully whether this level of data quality is acceptable for your application.

## Inputs from technosphere
- industrial machine, heavy, unspecified: 4.13e6 kg; lognormal variance with pedigree 0.094025, pedigree (4,5,5,2,3)
  Approximation with data of one company
  EcoSpold01Location=RER
  Uncertainty: Approximation with data of one company
- building, hall, steel construction: 35000 m2; lognormal variance with pedigree 0.094025, pedigree (4,5,5,2,3)
  EcoSpold01Location=CH
  Approximation with data of one company
  Uncertainty: Approximation with data of one company
- road, company, internal: 1.75e6 m2*year; lognormal variance with pedigree 0.102025, pedigree (3,4,5,2,3)
  EcoSpold01Location=CH
  Approximation with data of similar companies
  Uncertainty: Approximation with data of similar companies
- building, multi-storey: 150000 m3; lognormal variance with pedigree 0.07, pedigree (1,1,5,1,1)
  4,5,1,2,3,5; Approximation with data of one company
  EcoSpold01Location=RER

## Inputs from nature
- Occupation, construction site [natural resource, land]: 100000 m2*year; lognormal variance with pedigree 0.100625, pedigree (2,4,5,2,3)
  Approximation with data of similar companies
  Uncertainty: Approximation with data of similar companies
- Transformation, from unspecified [natural resource, land]: 100000 m2; lognormal variance with pedigree 0.180625, pedigree (2,4,5,2,3)
  (same comment as for Occupation, construction site)
- Occupation, industrial area [natural resource, land]: 5e6 m2*year; lognormal variance with pedigree 0.100625, pedigree (2,4,5,2,3)
  (same comment as for Occupation, construction site)
- Transformation, to industrial area [natural resource, land]: 100000 m2; lognormal variance with pedigree 0.180625, pedigree (2,4,5,2,3)
  (same comment as for Occupation, construction site)

## Sampling procedure
Approximation with data from environmental reports and information of similar companies.

## Extrapolations
This dataset has been extrapolated from year 2003 to the year of the calculation (2019). The uncertainty has been adjusted accordingly.

## Review by Rolf Frischknecht 2007-08-16
passed
none
