# treatment of wastewater from soft fibreboard production, capacity 5E9l/year

Dataset: EcoSpold 2, unit process
Geography: CH
Time period: 2007-01-01 to 2019-12-31
Technology level: current
Classification: EcoSpold01Categories: waste management/wastewater treatment
Classification: ISIC rev.4 ecoinvent: 3821:Treatment and disposal of non-hazardous waste
Tags: Treatment; ConvertedDataset
Scenario: Business-as-Usual
System model: Allocation at the point of substitution
Generated by: Frank Werner (obsolete)
Published in: Hischier, R. 2009
Database: ecoinvent
isCopyrightProtected: true
accessRestrictedTo: 1

## General comment
wastewater purified in a medium size municipal wastewater treatment plant (capacity class 3), with an average capacity size of 24900 per-captia-equivalents PCE. Average data from two production sites
[This dataset was already contained in the ecoinvent database version 2. It was not individually updated during the transfer to ecoinvent version 3. Life Cycle Impact Assessment results may still have changed, as they are affected by changes in the supply chain, i.e. in other datasets. This dataset was generated following the ecoinvent quality guidelines for version 2. It may have been subject to central changes described in the ecoinvent version 3 change report (http://www.ecoinvent.org/database/ecoinvent-version-3/reports-of-changes/), and the results of the central updates were reviewed extensively. The changes added e.g. consistent water flows and other information throughout the database. The documentation of this dataset can be found in the ecoinvent reports of version 2, which are still available via the ecoinvent website. The change report linked above covers all central changes that were made during the conversion process.]

## Included activities end
infrastructure materials for municipal wastewater treatment plant, transports, dismantling. Land use burdens.

## Geography
specific to the technology mix encountered in Switzerland in 2000. Well applicable to modern treatment practices in Europe, North America or Japan.

## Technology
three stage wastewater treatment (mechanical, biological, chemical) including sludge digestion (fermentation) according to the average technology in Switzerland

## Parameters
- fraction, process water, to air: 0.1 dimensionless; name fraction_PW_to_air; lognormal variance with pedigree 0.092025, pedigree (4,4,3,2,4)
  Literature value (Statistics Canada, 2007 & Shaffer, K.H., 2008, Consumptive water use in the Great Lakes Basin, USGS) (Vionnet, S., Quantis Water Database - Technical Report, 2012).

## Reference product
- wastewater from soft fibreboard production: -1 m3; By-product classification Waste; CPC 39920: Sewage sludge
  EcoSpold01Location=CH
  production volume 0.0336675 m3
    This is a placeholder value that does not reflect real-world production volumes. This dataset does not currently require a real-world production volume to work in the database framework, and no actual data were collected yet. This has no negative effect on the results of the ecoinvent database. The placeholder value of this activity was scaled according to the nominal GDP of 2005 (source: United Nations, http://data.un.org/Glossary.aspx?q=GDP+%28current+US%24%29, accessed 20130726) to reflect an appropriate share of the global production volume, which is also a placeholder value.
  property price 0 EUR2005
    Waste products are assigned a price of zero as they are assumed to require further treatment.
  property carbon content, non-fossil 0.999914
    COD= 100 kg/m3 (Tab A.17, ecoinvent v2.2 report 13_I). COD was converted to TOC, using conversion factors in Tab 4.10 (ecoinvent v2.2 report 13_IV). TOC was considered as Total Carbon.
  property carbon content 0.999914
    carbon content on a dry matter basis (reserved; not for manual entry)
  properties: carbon content, fossil 0, wet mass 1000 kg, water in wet mass 956.706 kg, dry mass 43.2938 kg, water content 22.098, carbon allocation 43.29 kg

## By-products
- electricity, for reuse in municipal waste incineration only: 0 kWh; CPC 17100: Electrical energy; By-product classification allocatable product; pedigree (1,1,1,1,1)
  Net electricity generated from this waste and used in internal MSWI plant energy redistribution.
  Uncertainty: uncertainty is calculated from uncertainties in waste composition and uncertainties in energy efficiency and the uncertainty in internal energy demand
  property exergy 3.6 MJ; name E_el_prod_MSWI_exergy
    This exergy property is based on the exergy content of the product.
  property true value relation 3.6; name E_el_prod_MSWI_true_value_relation
    property to calculate "true value" from
  property price 0.1 EUR2005; name E_el_prod_MSWI_price_EUR2005
    Estimated to be the same price as in case of electricity, medium voltage.
- heat, for reuse in municipal waste incineration only: 0 MJ; CPC 17300: Steam and hot water; By-product classification allocatable product; pedigree (1,1,1,1,1)
  Net useful heat generated from this waste and used in internal MSWI plant energy redistribution.
  Uncertainty: uncertainty is calculated from uncertainties in waste composition and uncertainties in energy efficiency and the uncertainty in internal energy demand
  property true value relation 0.1842; name E_th_prod_MSWI_true_value_relation
    property to calculate "true value" from
  property exergy 0.1842 MJ; name E_th_prod_MSWI_exergy
    This exergy property is based on the exergy content of the product.
  property price 0.0106 EUR2005; name E_th_prod_MSWI_price_EUR2005
    Average European district heat price from Ecoheatcool and Euroheat 2005-2006, Ecoheat Work package 1: The European heat market. Final report. 10.6 EUR/GJ i s the price of district heat. http://www.solarthermalworld.org/files/Ecoheatcool%20WP1%20Web.pdf?download
- zinc concentrate: 0 kg; CPC 14290: Other non-ferrous metal ores and concentrates (other than uranium or thorium ores and concentrates); By-product classification allocatable product
  Calculated value from the knowledge of the properties of both products.
  property price 0.38 EUR2005; name ByP_price_EUR2005
    Temporary price data. Calculated as 90% of purchasers price based on: Zinc content in concentrate 53%. Concentrate price per kg Zn 86.5% of refined Zn price (13.5% treatment charges according to CHR Metals Limited 2005: Dynamic cost curves. http://www.minecost.com/dynamic.pdf). 2004 zinc price from USGS (2007) Mineral commodity summaries 2007. <http://minerals.usgs.gov/minerals/pubs/mcs/2007/mcs2007.pdf> [Accessed 25 May 2010]
  property zinc content 0.53; name zinc_C_zinc_concentrate
    Zinc content on a dry matter basis. Value taken from teh "zinc mine operation" /GLO dataset.
  property dry mass 1 kg; name DM_zinc_concentrate
  property carbon content 0
    carbon content on a dry matter basis (reserved; not for manual entry)
  properties: wet mass 1 kg, water content 0, carbon content, non-fossil 0, carbon content, fossil 0, water in wet mass 0 kg, carbon allocation 0 kg

## Inputs from technosphere
- chromium oxide, flakes: 4.7993e-9 kg; lognormal variance with pedigree 0.508, pedigree (1,1,4,1,1)
  EcoSpold01Location=RER
  burden from sludge incineration. Uncertainty calculated from wastewater composition and treatment model
  properties: wet mass 1 kg, dry mass 1 kg
- titanium dioxide: 2.3517e-7 kg; lognormal variance with pedigree 0.508, pedigree (1,1,4,1,1)
  burden from sludge incineration. Uncertainty calculated from wastewater composition and treatment model
  EcoSpold01Location=RER
  properties: wet mass 1 kg, dry mass 1 kg
- heat, district or industrial, natural gas: 0.000721071 MJ; lognormal variance with pedigree 0.188, pedigree (1,1,4,1,1)
  (same comment as for chromium oxide, flakes)
- process-specific burdens, residual material landfill: 0.0018272 kg; lognormal variance with pedigree 0.038, pedigree (1,1,4,1,1)
  EcoSpold01Location=CH
  burden from sludge incineration. Uncertainty calculated from wastewater composition and treatment model;activityLink introduced to establish a direct link to the corresponding regional supply of this product
- quicklime, milled, packed: 8.9959e-8 kg; lognormal variance with pedigree 0.058, pedigree (1,1,4,1,1)
  EcoSpold01Location=CH
  burden from sludge incineration. Uncertainty calculated from wastewater composition and treatment model
  properties: dry mass 0.99 kg, wet mass 1 kg, water content 0.010101
- heat, district or industrial, other than natural gas: 1.9666 MJ; lognormal variance with pedigree 0.018, pedigree (1,1,4,1,1)
  burden from sludge incineration. Uncertainty calculated from wastewater composition and treatment model
  EcoSpold01Location=CH
- iron sulfate: 0.00024479 kg; lognormal variance with pedigree 0.068, pedigree (1,1,4,1,1)
  direct wastewater treatment plant burden. Uncertainty calculated from wastewater composition and treatment model
  EcoSpold01Location=RER
  properties: wet mass 1 kg, dry mass 1 kg
- electricity, high voltage: 0.33711 kWh; lognormal variance with pedigree 0.458, pedigree (1,1,4,1,1)
  (same comment as for heat, district or industrial, other than natural gas)
- residual material landfill: 3.8068e-12 unit; lognormal variance with pedigree 0.038, pedigree (1,1,4,1,1)
  (same comment as for quicklime, milled, packed)
- wastewater treatment facility, capacity 5E9l/year: 5.6882e-9 unit; lognormal variance with pedigree 0.008, pedigree (1,1,4,1,1)
  uncertainty heeded in exchanges of the module
  EcoSpold01Location=CH
- iron (III) chloride, without water, in 40% solution state: 0.00033469 kg; lognormal variance with pedigree 0.068, pedigree (1,1,4,1,1)
  EcoSpold01Location=CH
  direct wastewater treatment plant burden plus burden from sludge incineration. Uncertainty calculated from wastewater composition and treatment model
  properties: dry mass 1 kg, wet mass 1 kg
- municipal waste incineration facility: 5.862e-10 unit; lognormal variance with pedigree 0.018, pedigree (1,1,4,1,1)
  (same comment as for quicklime, milled, packed)
- ammonia, liquid: 8.2155e-6 kg; lognormal variance with pedigree 0.188, pedigree (1,1,4,1,1)
  (same comment as for heat, district or industrial, other than natural gas)
  properties: wet mass 1 kg, dry mass 1 kg
- process-specific burdens, slag landfill: 0.004224 kg; lognormal variance with pedigree 0.038, pedigree (1,1,4,1,1)
  (same comment as for process-specific burdens, residual material landfill)
- electricity, low voltage: 0.83184 kWh; lognormal variance with pedigree 0.018, pedigree (1,1,4,1,1)
  EcoSpold01Location=CH
  direct wastewater treatment plant burden. Uncertainty calculated from wastewater composition and treatment model
- aluminium sulfate, powder: 6.616e-5 kg; lognormal variance with pedigree 0.068, pedigree (1,1,4,1,1)
  EcoSpold01Location=RER
  direct wastewater treatment plant burden. Uncertainty calculated from wastewater composition and treatment model
  properties: dry mass 1 kg, wet mass 1 kg
- sodium hydroxide, without water, in 50% solution state: 4.9618e-7 kg; lognormal variance with pedigree 0.058, pedigree (1,1,4,1,1)
  (same comment as for chromium oxide, flakes)
  properties: dry mass 1 kg, wet mass 1 kg
- chemical, inorganic: 3.846e-8 kg; lognormal variance with pedigree 0.058, pedigree (1,1,4,1,1)
  burden from sludge incineration. Uncertainty calculated from wastewater composition and treatment model
  EcoSpold01Location=GLO
  properties: carbon content, fossil 0.003, dry mass 1 kg, wet mass 1 kg
  note on carbon content, fossil: This dataset is an unweighted average of 20 inorganic substances (listed in Tab 88.1, ecoinvent v2.2 report 8, part II), being part of the top100 chemicals included in this database. The C-content has also been calculated as an unweighted average of the C content of the substances composing this dataset.
- sewer grid, 5E9l/year, 110 km: 2.1782e-7 km; lognormal variance with pedigree 0.008, pedigree (1,1,4,1,1)
  uncertainty heeded in exchanges of the module
  EcoSpold01Location=CH
- cement, unspecified: 0.0007309 kg; lognormal variance with pedigree 0.048, pedigree (1,1,4,1,1)
  (same comment as for heat, district or industrial, other than natural gas)
  properties: dry mass 1 kg, wet mass 1 kg
- process-specific burdens, municipal waste incineration: 2.3448 kg; lognormal variance with pedigree 0.018, pedigree (1,1,4,1,1)
  burden from sludge incineration. Uncertainty calculated from wastewater composition and treatment model;activityLink introduced to establish a direct link to the corresponding regional supply of this product
  EcoSpold01Location=CH
- hydrochloric acid, without water, in 30% solution state: 2.3076e-8 kg; lognormal variance with pedigree 0.058, pedigree (1,1,4,1,1)
  (same comment as for chromium oxide, flakes)
  properties: dry mass 1 kg, wet mass 1 kg
- residential sewer grid, 0.087 km: 2.8713e-7 km; lognormal variance with pedigree 0.008, pedigree (1,1,4,1,1)
  uncertainty heeded in exchanges of the module
  EcoSpold01Location=CH
- waste graphical paper: -0.0155 kg; lognormal variance with pedigree 0.008, pedigree (1,1,4,1,1)
  (same comment as for electricity, low voltage)
  production volume 0.000521847 kg; = (Ref('187aa013-3539-425c-8fbb-b5a4a0769484')*-1)* Ref('8c56bc91-b791-4657-852d-00810631f73b', 'ProductionVolume')
    Calculated from the production volume of wastewater from soft fibreboard production in proportion to the respective output amounts.
  properties: water content 0.126126, dry mass 0.888 kg, wet mass 1 kg, carbon content, non-fossil 0.454955
- slag landfill: 7.5094e-12 unit; lognormal variance with pedigree 0.038, pedigree (1,1,4,1,1)
  (same comment as for quicklime, milled, packed)
- waste cement, hydrated: -0.0018272 kg; lognormal variance with pedigree 0.048, pedigree (1,1,4,1,1)
  (same comment as for heat, district or industrial, other than natural gas)
  production volume 6.15173e-5 kg; = (Ref('d4066579-f658-4f65-b560-1d77048a6986')*-1)* Ref('8c56bc91-b791-4657-852d-00810631f73b', 'ProductionVolume')
    (same comment as for waste graphical paper)
  properties: wet mass 1 kg, dry mass 1 kg
- waste plastic, mixture: -0.0155 kg; lognormal variance with pedigree 0.008, pedigree (1,1,4,1,1)
  (same comment as for electricity, low voltage)
  production volume 0.000521847 kg; = (Ref('4a588fc7-c35f-4262-8aa3-7f871a213aa5')*-1)* Ref('8c56bc91-b791-4657-852d-00810631f73b', 'ProductionVolume')
    (same comment as for waste graphical paper)
  properties: wet mass 1 kg, dry mass 0.847 kg, carbon content, fossil 0.747344, water content 0.180638
  note on carbon content, fossil: C content in 1 kg DM was calculated using data in Tab A.2, ecoinvent v2.2 report 13_I

## Emissions to nature
- Iron [air, urban air close to ground]: 6.8532e-9 kg; lognormal variance with pedigree 0.638, pedigree (1,1,4,1,1)
  direct digester gas emission plus emission from sludge incineration. Uncertainty calculated from wastewater composition and treatment model
- TOC, Total Organic Carbon [water, ground-, long-term]: 0.0050538 kg; lognormal variance with pedigree 0.078, pedigree (1,1,4,1,1)
  emission from sludge incineration. Uncertainty calculated from wastewater composition and treatment model
- Chloride [water, surface water]: 0.00021945 kg; lognormal variance with pedigree 0.628, pedigree (1,1,4,1,1)
  sewer overload discharge plus direct wastewater treatment plant emission plus emission from sludge incineration. Uncertainty calculated from wastewater composition and treatment model
- Iron, ion [water, ground-, long-term]: 9.6154e-5 kg; lognormal variance with pedigree 1.428, pedigree (1,1,4,1,1)
  (same comment as for TOC, Total Organic Carbon)
- Nitrite [water, surface water]: 4.5028e-5 kg; lognormal variance with pedigree 0.048, pedigree (1,1,4,1,1)
  direct wastewater treatment plant emission. Uncertainty calculated from wastewater composition and treatment model
- Nitrate [water, ground-, long-term]: 5.8499e-6 kg; lognormal variance with pedigree 0.048, pedigree (1,1,4,1,1)
  (same comment as for TOC, Total Organic Carbon)
- BOD5, Biological Oxygen Demand [water, ground-, long-term]: 0.0041776 kg; lognormal variance with pedigree 0.078, pedigree (1,1,4,1,1)
  (same comment as for TOC, Total Organic Carbon)
- Aluminium [water, ground-, long-term]: 7.7306e-6 kg; lognormal variance with pedigree 0.678, pedigree (1,1,4,1,1)
  (same comment as for TOC, Total Organic Carbon)
- Carbon monoxide, non-fossil [air, urban air close to ground]: 0.0049024 kg; lognormal variance with pedigree 0.118, pedigree (1,1,4,1,1)
  (same comment as for Iron)
- COD, Chemical Oxygen Demand [water, surface water]: 0.88293 kg; lognormal variance with pedigree 0.048, pedigree (1,1,4,1,1)
  (same comment as for Chloride)
- Dinitrogen monoxide [air, urban air close to ground]: 9.7289e-6 kg; lognormal variance with pedigree 0.048, pedigree (1,1,4,1,1)
  direct wastewater treatment plant emission plus direct digester gas emission plus emission from sludge incineration plus emission from sludge spreading. Uncertainty calculated from wastewater composition and treatment model
- NMVOC, non-methane volatile organic compounds, unspecified origin [air, urban air close to ground]: 6.828e-5 kg; lognormal variance with pedigree 0.228, pedigree (1,1,4,1,1)
  direct digester gas emission. Uncertainty calculated from wastewater composition and treatment model
- COD, Chemical Oxygen Demand [water, ground-, long-term]: 0.012772 kg; lognormal variance with pedigree 0.078, pedigree (1,1,4,1,1)
  (same comment as for TOC, Total Organic Carbon)
- Phosphorus [air, urban air close to ground]: 3.5083e-8 kg; lognormal variance with pedigree 0.078, pedigree (1,1,4,1,1)
  (same comment as for Iron)
- Ammonia [air, urban air close to ground]: 5.2136e-6 kg; lognormal variance with pedigree 0.068, pedigree (1,1,4,1,1)
  direct digester gas emission plus emission from sludge incineration plus emission from sludge spreading. Uncertainty calculated from wastewater composition and treatment model
- DOC, Dissolved Organic Carbon [water, surface water]: 0.22097 kg; lognormal variance with pedigree 0.048, pedigree (1,1,4,1,1)
  (same comment as for Chloride)
- Nitrate [water, surface water]: 0.0033782 kg; lognormal variance with pedigree 0.028, pedigree (1,1,4,1,1)
  (same comment as for Chloride)
- Phosphate [water, surface water]: 5.5693e-5 kg; lognormal variance with pedigree 0.048, pedigree (1,1,4,1,1)
  sewer overload discharge plus direct wastewater treatment plant emission plus emission from sludge incineration plus emission from sludge spreading. Uncertainty calculated from wastewater composition and treatment model
- BOD5, Biological Oxygen Demand [water, surface water]: 0.28952 kg; lognormal variance with pedigree 0.038, pedigree (1,1,4,1,1)
  (same comment as for Chloride)
- Cyanide [air, urban air close to ground]: 1.4656e-7 kg; lognormal variance with pedigree 0.208, pedigree (1,1,4,1,1)
  (same comment as for TOC, Total Organic Carbon)
- TOC, Total Organic Carbon [water, surface water]: 0.23656 kg; lognormal variance with pedigree 0.048, pedigree (1,1,4,1,1)
  (same comment as for Chloride)
- Carbon dioxide, non-fossil [air, urban air close to ground]: 6.119 kg; lognormal variance with pedigree 0.028, pedigree (1,1,4,1,1)
  direct wastewater treatment plant emission plus direct digester gas emission plus emission from sludge incineration. Uncertainty calculated from wastewater composition and treatment model
- Ammonium, ion [water, surface water]: 0.00077097 kg; lognormal variance with pedigree 0.028, pedigree (1,1,4,1,1)
  (same comment as for Nitrite)
- Water [water, unspecified]: 0.9 m3; name water_to_water_unspecified; lognormal variance with pedigree 0.0487, pedigree (2,2,4,1,1)
  Calculated value based on water balance.
  property fraction, origin: unspecified 0; name fraction_origin_unspecified_Ww
  property dry mass 0 kg; name DM
  property carbon content, non-fossil 0; name C_content_non_fossil
  property water in wet mass 1000 kg; name WWM
  property carbon content, fossil 0; name C_content_fossil
  property wet mass 1000 kg; name WM
  property fraction, origin: fresh water 1; name fraction_origin_fresh_water_Ww
  property fraction, origin: salt water 0; name fraction_origin_salt_water_Ww
- Aluminium [water, surface water]: 8.6922e-10 kg; lognormal variance with pedigree 0.518, pedigree (1,1,4,1,1)
  (same comment as for Chloride)
- Water [air, unspecified]: 0.1 m3; name water_to_air_unspecified; lognormal variance with pedigree 0.0487, pedigree (2,2,4,1,1)
  Calculated value based on water balance.
  property fraction, origin: unspecified 1; name fraction_origin_unspecified
  property fraction, origin: fresh water 0; name fraction_origin_fresh_water
  property fraction, origin: salt water 0; name fraction_origin_salt_water
- Phosphate [water, ground-, long-term]: 4.1087e-6 kg; lognormal variance with pedigree 4.238, pedigree (1,1,4,1,1)
  (same comment as for TOC, Total Organic Carbon)
- Methane, non-fossil [air, urban air close to ground]: 0.015031 kg; lognormal variance with pedigree 0.108, pedigree (1,1,4,1,1)
  (same comment as for Iron)
- DOC, Dissolved Organic Carbon [water, ground-, long-term]: 0.0050538 kg; lognormal variance with pedigree 0.078, pedigree (1,1,4,1,1)
  (same comment as for TOC, Total Organic Carbon)
- Sulfate [water, surface water]: 0.00021047 kg; lognormal variance with pedigree 0.048, pedigree (1,1,4,1,1)
  (same comment as for Chloride)
- Aluminium [air, urban air close to ground]: 1.6319e-8 kg; lognormal variance with pedigree 0.678, pedigree (1,1,4,1,1)
  (same comment as for Iron)
- Iron, ion [water, surface water]: 7.0249e-8 kg; lognormal variance with pedigree 0.628, pedigree (1,1,4,1,1)
  (same comment as for Chloride)
- Nitrogen [water, surface water]: 3.426e-5 kg; lognormal variance with pedigree 0.048, pedigree (1,1,4,1,1)
  (same comment as for Nitrite)
- Nitrogen oxides [air, urban air close to ground]: 5.0942e-5 kg; lognormal variance with pedigree 0.048, pedigree (1,1,4,1,1)
  (same comment as for Iron)

## Extrapolations
This dataset has been extrapolated from year 2008 to the year of the calculation (2019). The uncertainty has been adjusted accordingly.

## Review by Hans-Jörg Althaus 2009-02-05
passed
none
