# aluminium production, primary, liquid, Söderberg

Dataset: EcoSpold 2, unit process
Geography: RNA
Time period: 2015-01-01 to 2019-12-31
Technology level: current
Classification: ISIC rev.4 ecoinvent: 2420:Manufacture of basic precious and other non-ferrous metals
Classification: EcoSpold01Categories: metals/extraction
Scenario: Business-as-Usual
System model: Allocation at the point of substitution
Generated by: Linlin Wu
Published in: International Aluminium Insitute 2015
Database: ecoinvent
isCopyrightProtected: false
accessRestrictedTo: 1

## General comment
This dataset represents the production of 1kg of liquid primary aluminium. Primary aluminium is produced by the The Hall-Héroult process, developed in 1886, and the sole industrial method for the smelting of primary aluminium. It involves passing a large electric current through a molten mixture of cryolite, alumina and aluminium fluoride to obtain pure, liquid aluminium metal. Direct current (DC) is fed into a line of electrolytic cells connected in series (a “potline”). While these cells, or “pots” and potlines vary in size and configuration from one plant to another, the fundamental electrochemical process is identical. Each pot is a large carbon-lined metal container, forming the negative electrode (cathode) in the cell. The cell contains an electrolytic bath of molten cryolite (Na3AlF6), maintained at a temperature of around 960 – 980°C, in which alumina powder (Al2O3) is dissolved. Aluminium fluoride (AlF3) is added to the solution to maintain optimal chemistry and lower the electrolyte’s freezing point. Large carbon blocks are suspended in the solution and serve as the positive electrode (anode). The electrical current passes from the carbon anodes via the bath to the carbon cathode cell lining. The current then passes to the anode of the next pot in series. As the electrical current passes through the solution, the dissolved alumina is split into molten aluminium (Al) and oxygen (O2). The oxygen consumes the carbon in the anode blocks to form carbon dioxide. The electrolytic reaction can be expressed as:

2Al2O3 + 3C → 4Al + 3CO2

There are two main types of aluminium smelting technology: Søderberg and prebake. The principal difference between the two is the type of anode used. Søderberg technology uses a continuous anode which is delivered to the pot in the form of a paste, and which bakes in the cell itself.
[This dataset is meant to replace the following datasets:Unable to replace dataset! Dataset not found by activity index entry id 'cd586942-9ef2-410c-a509-ec2231f4e86d'.
- aluminium production, primary, liquid, Söderberg, IAI Area, North America, without Quebec, 2012 - 2012]

## Included activities start
Unit process starts with the unloading of process materials to their storage areas on site.

## Included activities end
Includes:
* Recovery, preparation and handling of process materials
* Manufacture of major process equipment and infrastructure
* Process control activities (metal, bath, heat)
* maintenance and repair of plant and equipment
* treatment of process air, liquids and solids
The output of this unit process is hot metal transported to an ingot casting facility.

## Geography
Data mostly from global surveys by IAI.

## Reference product
- aluminium, primary, liquid: 1 kg; name aluminiumPrimaryLiquidSöderbergAmount; CPC 41431: Unwrought aluminium; By-product classification allocatable product; pedigree (1,1,1,1,1)
  production volume 4.4685e7 kg; name aluminiumPrimaryLiquidSöderbProdVolume
    2015 IAI data.
  property price 3.67 EUR2005; name aluminiumPrimaryLiquidSöderbergAmount_pr
    Calculated from EU prices by use of exchange rates.
  property carbon content 0
    carbon content on a dry matter basis (reserved; not for manual entry)
  property true value 3.67; name aluminiumPrimaryLiquidSöder_true_value_0
    allocation property applied in "true value" allocation // value calculated from revenue
  properties: dry mass 1 kg, water in wet mass 0 kg, water content 0, carbon content, non-fossil 0, carbon content, fossil 0, wet mass 1 kg, carbon allocation 0 kg

## By-products
- heat, for reuse in municipal waste incineration only: 0 MJ; CPC 17300: Steam and hot water; By-product classification allocatable product; pedigree (1,1,1,1,1)
  Net electricity generated from this waste and used in internal MSWI plant energy redistribution.
  Uncertainty: uncertainty is calculated from uncertainties in waste composition and uncertainties in energy efficiency and the uncertainty in internal energy demand
  production volume 90.4153 MJ
  property exergy 0.1842 MJ; name E_th_prod_MSWI_exergy
    This exergy property is based on the exergy content of the product.
  property price 0.0106 EUR2005; name E_th_prod_MSWI_price_EUR2005
    Average European district heat price from Ecoheatcool and Euroheat 2005-2006, Ecoheat Work package 1: The European heat market. Final report. 10.6 EUR/GJ i s the price of district heat. http://www.solarthermalworld.org/files/Ecoheatcool%20WP1%20Web.pdf?download
  property true value relation 0.1842; name E_th_prod_MSWI_true_value_relation
    property to calculate "true value" from
  property true value 1.33097e-8
    allocation property applied in "true value" allocation // value calculated from true value relation
- electricity, for reuse in municipal waste incineration only: 0 kWh; CPC 17100: Electrical energy; By-product classification allocatable product; pedigree (1,1,1,1,1)
  (same comment as for heat, for reuse in municipal waste incineration only)
  production volume 12.7338 kWh
  property true value relation 3.6; name E_el_prod_MSWI_true_value_relation
    property to calculate "true value" from
  property price 0.1 EUR2005; name E_el_prod_MSWI_price_EUR2005
    Estimated to be the same price as in case of electricity, medium voltage.
  property exergy 3.6 MJ; name E_el_prod_MSWI_exergy
    This exergy property is based on the exergy content of the product.
  property true value 3.6635e-8
    (same comment as for heat, for reuse in municipal waste incineration only)

## Inputs from technosphere
- cryolite: 0.0016 kg; source International Aluminium Institute 2007; lognormal variance with pedigree 0.0033, pedigree (2,2,3,1,1)
  EcoSpold01Location=RER
  properties: wet mass 1 kg, dry mass 1 kg
- cathode, for aluminium electrolysis: 0.00734 kg; source International Aluminium Insitute 2015; lognormal variance with pedigree 0.0032, pedigree (1,3,3,1,1)
  properties: wet mass 1 kg, carbon content, fossil 0.163928, dry mass 1 kg
- aluminium fluoride: 0.0207 kg; source International Aluminium Insitute 2015; lognormal variance with pedigree 0.0032, pedigree (1,3,3,1,1)
  EcoSpold01Location=RER
  properties: wet mass 1 kg, dry mass 1 kg
- electricity, medium voltage, aluminium industry: 16.951 kWh; source International Aluminium Insitute 2015; lognormal variance with pedigree 0.0026, pedigree (1,1,3,1,1)
  EcoSpold01Location=GLO
  data collected in IAI energy survey. http://www.world-aluminium.org/statistics/
- pitch: 0.00191 kg; source International Aluminium Institute 2013; lognormal variance with pedigree 0.0414, pedigree (2,2,5,3,1)
  Total carbon value taken from IAI (2007), but split between coke and bitumen based on older European mix in ecoinvent v2 dataset
  Uncertainty: Total carbon value quality high, but split between coke and bitumen based on older European mix in ecoinvent v2 dataset
  properties: dry mass 1 kg, carbon content, fossil 0.83, wet mass 1 kg
- refractory, fireclay, packed: 0.003395 kg; source International Aluminium Insitute 2015; lognormal variance with pedigree 0.0032, pedigree (1,3,3,1,1)
  Reported as refractory material in IAI survey.
  properties: dry mass 1 kg, wet mass 1 kg
- filter dust from Al electrolysis: -0.018 kg; name scrubberSludgeAmount; source International Aluminium Insitute 2015; lognormal variance with pedigree 0.0032, pedigree (1,3,3,1,1)
  Used as a weak proxy for treatment of scrubber sludges
  production volume 804330 kg; = aluminiumPrimaryLiquidSöderbProdVolume * scrubberSludgeAmount / aluminiumPrimaryLiquidSöderbergAmount
    Calculated from production volume of reference product using the relative outputs.
  property price 0 EUR2005; name scrubberSludgeAmount_price_EUR2005
  properties: carbon content, fossil 0.11586, wet mass 1 kg, dry mass 1 kg
- coke: 0.127 MJ; source International Aluminium Institute 2007; lognormal variance with pedigree 0.0414, pedigree (2,2,5,3,1)
  (same comment as for pitch)
  properties: dry mass 0.0328671 kg, wet mass 0.034965 kg, carbon content, fossil 0.869149, water content 0.0638298
  note on carbon content, fossil: 81.7% C and 6% water in wet mass (ecoinvent v2.1 report 6_VI Table 7.1)
- aluminium oxide, metallurgical: 2.105 kg; source International Aluminium Insitute 2015; lognormal variance with pedigree 0.0032, pedigree (1,3,3,1,1)
  properties: wet mass 1 kg, dry mass 1 kg
- scrap steel: -0.00564 kg; name wasteSteelAmount; source International Aluminium Insitute 2015; lognormal variance with pedigree 0.0032, pedigree (1,3,3,1,1)
  production volume 252023 kg; = aluminiumPrimaryLiquidSöderbProdVolume*wasteSteelAmount/aluminiumPrimaryLiquidSöderbergAmount
    Calculated from the production volume of primary aluminium and output of waste per reference flow.
  property price 0 EUR2005; name wasteSteelAmount_price_EUR2005
  properties: wet mass 1 kg, dry mass 1 kg
- blasting: 0.000402 kg; source Classen M. 2008; lognormal variance with pedigree 0.0414, pedigree (2,2,5,3,1)
  Value taken from cathode production process
- aluminium electrolysis facility: 1.5385e-10 unit; source Classen M. 2008; lognormal variance with pedigree 0.5, pedigree (5,5,5,5,5)
  EcoSpold01Location=RER
  Rough guess
  Uncertainty: rough guess
- inert waste: -0.01877 kg; name inertWasteAmount; source International Aluminium Insitute 2015; lognormal variance with pedigree 0.0032, pedigree (1,3,3,1,1)
  Used as a proxy for waste alumina
  production volume 838737 kg; = aluminiumPrimaryLiquidSöderbProdVolume*inertWasteAmount/aluminiumPrimaryLiquidSöderbergAmount
    (same comment as for scrap steel)
  property price 0 EUR2005; name inertWasteAmount_price_EUR2005
  properties: wet mass 1 kg, dry mass 1 kg
- reinforcing steel: 0.0049 kg; source International Aluminium Insitute 2015; lognormal variance with pedigree 0.0032, pedigree (1,3,3,1,1)
  properties: dry mass 1 kg, wet mass 1 kg, carbon content, fossil 0.004
- cast iron: 0.000804 kg; source Classen M. 2008; lognormal variance with pedigree 0.0414, pedigree (2,2,5,3,1)
  Value taken from cathode production process
  properties: carbon content, fossil 0.04, wet mass 1 kg, dry mass 1 kg
  note on carbon content, fossil: Cast iron is made by remelting pig iron in small furnaces (e.g. cupola furnaces or electric arc furnaces) and poured into moulds to make castings. It usually contains 2% to 6% carbon (ecoinvent v2.2 report 10_partII). An average content of 4% was considered
- refractory spent pot liner from Al electrolysis: -0.0265 kg; name SPLAmount; source International Aluminium Insitute 2015; lognormal variance with pedigree 0.0032, pedigree (1,3,3,1,1)
  Amount includes recycled SPL and landfilled SPL
  EcoSpold01Location=CH
  production volume 1.18415e6 kg; = aluminiumPrimaryLiquidSöderbProdVolume*SPLAmount/aluminiumPrimaryLiquidSöderbergAmount
    (same comment as for scrap steel)
  property price 0 EUR2005; name SPLAmount_price_EUR2005
  properties: dry mass 1 kg, wet mass 1 kg
- waste asphalt: -0.0454 kg; name wasteCarbonAmount; = (wasteCarbonAmo_recycledSPLCarbonAmount_0 +wasteCarbo_landfilledWasteCarbonAmount_0)*-1; source International Aluminium Insitute 2015; lognormal variance with pedigree 0.002, pedigree (1,1,3,1,1)
  Proxy for treatment of waste carbon. Reported as "SPL carbon for external recycling" and "Waste carbon or mix" in IAI report. Currently, no recycling process exists in ecoinvent for waste carbon, and hence these are modelled as sent to landfill.
  Uncertainty: Uncertainty calculated from underlying parameters.
  production volume 2.0287e6 kg; = aluminiumPrimaryLiquidSöderbProdVolume*wasteCarbonAmount/aluminiumPrimaryLiquidSöderbergAmount
    (same comment as for scrap steel)
  property price 0 EUR2005; name wasteCarbonAmount_price_EUR2005
  property landfilled waste carbon 0.0253 kg; name wasteCarbo_landfilledWasteCarbonAmount_0
  property recycled spent pot liner carbon 0.0201 kg; name wasteCarbonAmo_recycledSPLCarbonAmount_0
  properties: carbon content, fossil 0.0440796, wet mass 1 kg, water content 0.001001, dry mass 0.999 kg
  note on carbon content, fossil: The waste contains 94.7% inert material (see Tab A.5 for details) 5.3% bitumen (see Tab A.6 for details), ecoinvent v2.2 report 13_I
- inert waste, for final disposal: -0.001854 kg; name refractoryWasteAmount; = (refracto_refractoryWasteToRecyclingAmo_0 +refracto_refractoryWasteToLandfillAmou_0)*-1; source International Aluminium Insitute 2015; lognormal variance with pedigree 0.002, pedigree (1,1,3,1,1)
  EcoSpold01Location=CH
  Amount includes both non-SPL refractory waste sent to landfill and recycled refractory waste. Currently, no recycling process exists in ecoinvent for refractory material, and hence these are modelled as sent to landfill.
  Uncertainty: Uncertainty calculated from underlying parameters.
  production volume 82846 kg; = aluminiumPrimaryLiquidSöderbProdVolume*refractoryWasteAmount
    (same comment as for scrap steel)
  property amount of refractory material sent to recycling 0.000927 kg; name refracto_refractoryWasteToRecyclingAmo_0
  property amount of refractory material sent to landfill 0.000927 kg; name refracto_refractoryWasteToLandfillAmou_0
  property price 0 EUR2005; name refractoryWasteAmount_price_EUR2005
  properties: water content 0.00502513, dry mass 0.995 kg, wet mass 1 kg
- anode, paste, for aluminium electrolysis: 0.515 kg; source International Aluminium Insitute 2015; lognormal variance with pedigree 0.0026, pedigree (1,1,3,1,1)
  properties: carbon content, fossil 0.868686, wet mass 1 kg, dry mass 1 kg

## Inputs from nature
- Water, unspecified natural origin [natural resource, in water]: 0.02796 m3; source International Aluminium Insitute 2015; lognormal variance with pedigree 0.0032, pedigree (1,3,3,1,1)
- Water, salt, ocean [natural resource, in water]: 0 m3; source International Aluminium Insitute 2015; pedigree (1,1,1,1,1)

## Emissions to nature
- Hydrogen fluoride [air, unspecified]: 0.0011 kg; source International Aluminium Insitute 2015; lognormal variance with pedigree 0.0426, pedigree (1,3,3,1,1)
  Reported as F in IAI survey, including both Particulate fluoride and gaseous fluoride
- PAH, polycyclic aromatic hydrocarbons [water, unspecified]: 6.68e-6 kg; source International Aluminium Insitute 2015; lognormal variance with pedigree 0.0426, pedigree (1,3,3,1,1)
  Reported as PAH (6 Borneff components)
- Particulates, < 2.5 um [air, unspecified]: 0.0008856 kg; = PM_total_1* PM2_5; source International Aluminium Insitute 2015; lognormal variance with pedigree 0.002, pedigree (1,1,3,1,1)
  IAI 2015 survey total particulates, weighted by split found in ecoinvent 2.0 dataset
  Uncertainty: Uncertainty based on that of underlying parameters.
  property total particulates 0.00246 kg; name PM_total_1
  property ratio of total particulates less than 2.5 microns 0.36; name PM2_5; = 1.44/4
- PAH, polycyclic aromatic hydrocarbons [air, unspecified]: 0.000277 kg; = totalPAH-BaPAmount; source International Aluminium Insitute 2015; lognormal variance with pedigree 0.3021, pedigree (1,2,3,1,1)
  property total PAH emission to air 0.00028 kg; name totalPAH
- Suspended solids, unspecified [water, unspecified]: 0.002 kg; source International Aluminium Insitute 2015; lognormal variance with pedigree 0.0426, pedigree (1,3,3,1,1)
- Sulfur dioxide [air, unspecified]: 0.00836 kg; source International Aluminium Insitute 2015; lognormal variance with pedigree 0.0027, pedigree (1,2,3,1,1)
- Oils, unspecified [water, unspecified]: 1.7e-5 kg; source International Aluminium Institute 2013; lognormal variance with pedigree 0.0426, pedigree (1,3,3,1,1)
  No reporting in 2015 IAI survey
- Water [water, ocean]: 0 m3; source International Aluminium Insitute 2015; pedigree (1,1,1,1,1)
- Benzo(a)pyrene [air, unspecified]: 3e-6 kg; name BaPAmount; source International Aluminium Insitute 2015; lognormal variance with pedigree 0.3021, pedigree (1,2,3,1,1)
- Particulates, > 2.5 um, and < 10um [air, unspecified]: 0.0010824 kg; = PM_total_3 * PM_btw_2_5_and_10um; source International Aluminium Insitute 2015; lognormal variance with pedigree 0.002, pedigree (1,1,3,1,1)
  (same comment as for Particulates, < 2.5 um)
  property ratio of particulates between 2.5 and 10 microns 0.44; name PM_btw_2_5_and_10um; = (3.2-1.44)/4
  property total particulates 0.00246 kg; name PM_total_3
- Carbon dioxide, fossil [air, unspecified]: 1.4965 kg; source Classen M. 2008; lognormal variance with pedigree 0.042, pedigree (1,1,5,5,1)
- Carbon monoxide, fossil [air, unspecified]: 0.091708 kg; source Classen M. 2008; lognormal variance with pedigree 0.692, pedigree (1,1,5,5,1)
- Fluoride [water, unspecified]: 0.00135 kg; source International Aluminium Insitute 2015; lognormal variance with pedigree 0.0426, pedigree (1,3,3,1,1)
- Water [water, surface water]: 0.06722 m3; source International Aluminium Insitute 2015; lognormal variance with pedigree 0.0032, pedigree (1,3,3,1,1)
  property water in wet mass 1000 kg; name WWM
  property carbon content, fossil 0; name C_content_fossil
  property carbon content, non-fossil 0; name C_content_non_fossil
  property wet mass 1000 kg; name WM
  property dry mass 0 kg; name DM
- Particulates, > 10 um [air, unspecified]: 0.000492 kg; = PM_total_2 *PM_greater_10um; source International Aluminium Insitute 2015; lognormal variance with pedigree 0.002, pedigree (1,1,3,1,1)
  (same comment as for Particulates, < 2.5 um)
  property ratio pf particulates greater than 10 microns 0.2; name PM_greater_10um; = (4-3.2)/4
  property total particulates 0.00246 kg; name PM_total_2
- Methane, tetrafluoro-, R-14 [air, unspecified]: 0.000149 kg; source International Aluminium Insitute 2015; lognormal variance with pedigree 0.0426, pedigree (1,3,3,1,1)
  Data collected in IAI Anode effect survey. http://www.world-aluminium.org/statistics/
- Nitrogen oxides [air, unspecified]: 0.00039 kg; source International Aluminium Insitute 2015; lognormal variance with pedigree 0.0321, pedigree (1,2,3,1,1)
- Water [air, unspecified]: 0.00071 m3; source International Aluminium Insitute 2015; lognormal variance with pedigree 0.2106, pedigree (5,5,5,5,5)
  IAI data reported as "Fresh Water Consumption"
- Ethane, hexafluoro-, HFC-116 [air, unspecified]: 7.87e-6 kg; source International Aluminium Insitute 2015; lognormal variance with pedigree 0.0426, pedigree (1,3,3,1,1)
  Data collected in IAI Anode effect survey. http://www.world-aluminium.org/statistics/

## Sampling procedure
Most flows are based on IAI 2015 survey data.
A number of flows not covered by the surveys were inherited from the ecoinvent 2.2 dataset.
About 2% of global soderberg production is from this region. Therefore, weighted averages from global reported facilities are adopted here.

## Extrapolations
Survey global in scope.
