# treatment of bagasse, from sugarcane, in heat and power co-generation unit, 6400kW thermal

Dataset: EcoSpold 2, unit process
Geography: BR-Mid-western grid
Time period: 2014-01-01 to 2019-12-31
Technology level: current
Classification: EcoSpold01Categories: waste management/others
Classification: ISIC rev.4 ecoinvent: 3530:Steam and air conditioning supply
Tags: with true value
Scenario: Business-as-Usual
System model: Allocation at the point of substitution
Generated by: Henrique Rogerio Antunes de Souza Junior
Published in: Bauer, C. 2007
Database: ecoinvent
isCopyrightProtected: true
accessRestrictedTo: 1

## General comment
Treatment of bagasse, from sugarcane by combustion in a heat and power cogeneration unit. Emission factors have been used from dataset "heat and power co-generation, wood chips, 6400kW thermal" . Emissions of CO2 and CO are based on carbon content of bagasse. Electricity and heat generation are based on lower heating value of bagasse and efficiency of the cogen unit.
The production volume of this activity is calculated based on the amount of electricity produced from bagasse and other biomass in 2015 according to the Ministry of Mines and Energy of Brazil (MME, 2016), minus the amount of electricity produced from sugarcane processing (see datasets: sugarcane processing, modern annexed plant, BR, 2014; sugarcane processing, modern autonomous plant, BR; 2014). The ratio kg/KWh of the original dataset, “treatment of bagasse, from sugarcane, in heat and power co-generation unit, 6400kW thermal, GLO, 2001” was maintained.
MME (2016). Matrizes Elétricas Estaduais: Ano Referência 2015. Edição de 23 de novembro de 2016. Ministério De Minas E Energia – MME. Secretaria De Planejamento E Desenvolvimento Energético. Núcleo De Estudos Estratégicos De Energia. Accessible online: http://www.mme.gov.br/documents/10584/3580498/03+-+Matrizes+El%C3%A9tricas+Estaduais+2016+-+ano+ref.+2015+%28PDF%29/ddfaad8c-a436-4aa8-b619-f95dd2cf689c?version=1.0, February 2019
The original ecoinvent dataset used as a basis was 'treatment of bagasse, from sugarcane, in heat and power co-generation unit, 6400kW thermal, GLO, 2000 - 2001' and it has been copied in '12/2017'
[This dataset is meant to replace the following datasets:
- treatment of bagasse, from sugarcane, in heat and power co-generation unit, 6400kW thermal, GLO, 2000 - 2001]

## Included activities start
From reception of bagasse at the cogeneration plant

## Included activities end
This module describes the combustion of bagasse, from sugarcane. Included are the infrastructure, the bagasse input, the emissions to air and the disposal of the ashes. Also included are substances needed for operation: lubricating oil, ammonia, organic chemicals, sodium chloride, chlorine and decarbonized water.

## Geography
based on geography of dataset for cane sugar production with ethanol by-product, that also includes burning of bagasse

## Technology
based on the dataset "treatment of bagasse, from sugarcane, in heat and power co-generation unit, 6400kW thermal" GLO, 2001

## Time period
based on dataset wood chips, burned in cogen 6400 kWh

## Parameters
- fraction, cooling water, recirculating system, to air: 0.771; name fraction_CW_R_to_air; lognormal variance with pedigree 0.0413, pedigree (2,3,1,3,1)
  Calculated based on literature value (Scown, C.D., 2011, Water Footprint of U.S. Transportation Fuels and supplying information of the article) (Vionnet, S., Quantis Water Database - Technical Report, 2012).
- fraction, water, decarbonised, to air: 0.3875; name fraction_WDC_to_air; = fraction_CW_to_air; lognormal variance with pedigree 0.092025, pedigree (4,4,3,2,4)
  Calculated value. See comments in the other parametres present in this dataset. Decarbonised water is considered to be always used as cooling water, thus cooling water fractions to air are applied to all carbonised water input flows to calculate the amount of water consumed in the processes.
- fraction, cooling water, to air: 0.3875; name fraction_CW_to_air; = (0.5*fraction_CW_OT_to_air)+(0.5*fraction_CW_R_to_air); lognormal variance with pedigree 0.092025, pedigree (4,4,3,2,4)
  Calculated value based on literature value (see comments of the other parametres present in this dataset) and expert opinion. In the case when no industry/literature data are available about the type of cooling or directly fraction, cooling water, to air specific for the process a default assumption is applied. It is assumed that the once-through cooling system is used in 50% of all cases and recirculating system is used in another 50% of all cases.
- fraction, cooling water, once-through system, to air: 0.004; name fraction_CW_OT_to_air; lognormal variance with pedigree 0.0413, pedigree (2,3,1,3,1)
  (same comment as for fraction, cooling water, recirculating system, to air)
- fraction, cooling water, cooling pond system, to air: 0.032; name fraction_CW_CP_to_air; lognormal variance with pedigree 0.0413, pedigree (2,3,1,3,1)
  (same comment as for fraction, cooling water, recirculating system, to air)

## Reference product
- bagasse, from sugarcane: 0 kg; name bagasse_input; CPC 39141: Bagasse; By-product classification allocatable product
  production volume 0 kg; name bagasse_input_annual_production; = (7913342222.22222/2131291668.10864)*electricity_annual_production
    The production volume of sugarcane bagasse treated in this activity is calculated based on the production volume of electricity generated by the same activity. (See production volume comment of electricity for the same activity.)
  property low calorific value 15.4 MJ/kg; name bagasse_input_calorific_value
    value obtained from Jungbluth, 2007 report on bioenergy
  property dry mass 0.787 kg; name bagasse_input_DM
  property price 0.01 EUR2005; name bagasse_input_price_EUR2005
    Temporary price data. Calculated as 90% of purchasers price based on: Source: ecoinvent report 17, page 380
  property carbon content, non-fossil 0.443; name bagasse_input_C_content_non_fossil
    biogene carbon content on a dry matter basis
    C content (dry matter basis) is 44.3% (Tab 16.24, ecoinvent v2.2 report 17)
  property carbon content 0.443
    carbon content on a dry matter basis (reserved; not for manual entry)
  properties: wet mass 1 kg, water content 0.270648, water in wet mass 0.213 kg, carbon content, fossil 0, carbon allocation 0.348641 kg
- heat, district or industrial, other than natural gas: 1 MJ; source Bauer, C. 2007; CPC 17300: Steam and hot water; By-product classification allocatable product; pedigree (1,1,1,1,1)
  Heat production is calculated based on heat efficiency of cogen unit (77%), lower calorific value of bagasse (15.4 MJ/kg dry mass) and dry mass of bagasse (0.787 w/w)
  production volume 1.51642e11 MJ

## By-products
- heat, district or industrial, other than natural gas: 0 MJ; name heat_output; = bagasse_input*(-1)*15.4*0.787*(77/100); source Bauer, C. 2007; CPC 17300: Steam and hot water; By-product classification allocatable product; pedigree (1,1,1,1,1)
  (same comment as for heat, district or industrial, other than natural gas)
  production volume 0 MJ; = bagasse_input_annual_production * heat_output
    Calculated from production volume of reference product using the relative outputs.
  property true value relation 0.169678; name heat_output_true_value_relation
    property to calculate "true value" from
  property exergy 0.169678 MJ; name heat_output_exergy
    allocation factor for electricity (=1) vs. heat, where heat is calculated as the termodynamic mean temperature Tm = (Tfeed-Treturn)/ln(Tfeed/Treturn), relative to the application temperature (Tu, typically = 293 K), i.e. (Tm-Tu)/Tm
  property price 0.0106 EUR2005; name heat_output_price_EUR2005
    Average European district heat price from Ecoheatcool and Euroheat 2005-2006, Ecoheat Work package 1: The European heat market. Final report. 10.6 EUR/GJ i s the price of district heat. http://www.solarthermalworld.org/files/Ecoheatcool%20WP1%20Web.pdf?download
- electricity, high voltage: 0 kWh; name electricity_output; = bagasse_input*0.787*15.4*(1/3.6)*(8/100)*(-1); source Bauer, C. 2007; CPC 17100: Electrical energy; By-product classification allocatable product; pedigree (1,1,1,1,1)
  Electricity production is calculated based on lower calorific value of bagasse (15.4 MJ/kg dry matter), the dry matter content (0.787kg DM/kg fresh bagasse) and the electric efficiency of the cogen unit (8%).
  Note: 1 kWh= 3.6 MJ
  The electric effiency of the specific cogen unit can be found in the report for wood energy (see source).
  production volume 0 kWh; name electricity_annual_production; = 65576000000*(0.12+0.03)-(4.44E+09+1.02E+09)
    The production volume of electricity as product of the treatment of sugarcane bagasse in heat and power co-generation unit the Brazilian Mid-western grid was calculated as follows:
    The Brazilian Ministry of Energy and Mining (MME, 2016) reports a total electricity production in the Mid-western grid area in 2015 of 65576 GWh, of which 12% are generated from bagasse and 3% from other biomass. Electricity generation from other biomass was approximated with electricity from bagasse, i.e. 15% of 65576 GWh is assumed from bagasse (9836.4 GWh). Of those 9836.4 GWh, a part is supplied by sugarcane processing (see datasets: sugarcane processing, modern annexed plant, BR, 2014; sugarcane processing, modern autonomous plant, BR; 2014). The calculation of electricity production volumes from sugarcane processing is described in the respective datasets.
    The balance between electricity supplied from the sugarcane processing datasets and the MME statistics was here used as production volume of electricity from treatment of sugarcane bagasse in heat and power co-generation.
  property true value relation 3.6; name electricity_output_true_value_relation
    property to calculate "true value" from
  property exergy 3.6 MJ; name electricity_output_exergy
    (same comment as for heat, district or industrial, other than natural gas)
  property price 0.0977 EUR2005; name electricity_output_price_EUR2005
    Temporary price data. Calculated as 90% of purchasers price based on: 94% of the average price (to account for a 6% loss in transformation and transmission) for electricity for industrial consumersin 2005 (excluded taxes). From IEA.
- electricity, for reuse in municipal waste incineration only: 0 kWh; CPC 17100: Electrical energy; By-product classification allocatable product; pedigree (1,1,1,1,1)
  Net electricity generated from this waste and used in internal MSWI plant energy redistribution.
  Uncertainty: uncertainty is calculated from uncertainties in waste composition and uncertainties in energy efficiency and the uncertainty in internal energy demand
  property exergy 3.6 MJ; name E_el_prod_MSWI_exergy
    This exergy property is based on the exergy content of the product.
  property true value relation 3.6; name E_el_prod_MSWI_true_value_relation
    property to calculate "true value" from
  property price 0.1 EUR2005; name E_el_prod_MSWI_price_EUR2005
    Estimated to be the same price as in case of electricity, medium voltage.
- iron scrap, sorted, pressed: 0 kg; By-product classification Recyclable; CPC 39310: Slag, dross, scalings and other waste from the manufacture of iron or steel; pedigree (1,1,1,1,1)
  Iron scrap recovered from this waste.
  Uncertainty: uncertainty calculated from uncertainty in waste composition, uncertainty of share of recyclable metal, uncertainty of transfer coefficient to bottom ash, uncertainty of the efficiency of scrap removal in MSWI plant.
  property price 0.175 EUR2005
    Temporary price data. Calculated as 90% of purchasers price based on: 2005 import and export prices (total trades (USD) divided by total weight (kg) in biggest economies of the world: EU27, USA, Brasil, China, India, Japan and Russia) from UN Commodity Trade Statistics Database (http://data.un.org/Explorer.aspxDatabase [Accessed 2011.06.20]). Commodity: Waste or scrap, of cast iron
  property carbon content 0
    carbon content on a dry matter basis (reserved; not for manual entry)
  properties: dry mass 1 kg, water content 0, carbon content, non-fossil 0, water in wet mass 0 kg, carbon content, fossil 0, wet mass 1 kg, carbon allocation 0 kg
- heat, for reuse in municipal waste incineration only: 0 MJ; CPC 17300: Steam and hot water; By-product classification allocatable product; pedigree (1,1,1,1,1)
  (same comment as for electricity, for reuse in municipal waste incineration only)
  property exergy 0.1842 MJ; name E_th_prod_MSWI_exergy
    This exergy property is based on the exergy content of the product.
  property true value relation 0.1842; name E_th_prod_MSWI_true_value_relation
    property to calculate "true value" from
  property price 0.0106 EUR2005; name E_th_prod_MSWI_price_EUR2005
    (same comment as for heat, district or industrial, other than natural gas)
- iron scrap, unsorted: 0 kg; source European Aluminium Association 2008; CPC 39310: Slag, dross, scalings and other waste from the manufacture of iron or steel; By-product classification Recyclable; pedigree (1,1,1,1,1)
  property price 0.149 EUR2005; name ironScrapAmount_price_EUR2005
    Temporary price data. Calculated as 90% of purchasers price based on: estimated at 85% of sorted scrap
  property carbon content 0
    carbon content on a dry matter basis (reserved; not for manual entry)
  properties: water in wet mass 0 kg, water content 0, carbon content, fossil 0, carbon content, non-fossil 0, dry mass 1 kg, wet mass 1 kg, carbon allocation 0 kg
- aluminium oxide, non-metallurgical: 0 kg; source European Aluminium Association 2008; CPC 41432: Alumina (aluminium oxide), except artificial corundum; By-product classification allocatable product; CAS 1344-28-1; pedigree (1,1,1,1,1)
  property carbon content, non-fossil 0; name C_content_non_fossil
  property price 0.28 EUR2005; name Al2O3Amount_price_EUR2005
    From UN trade database. http://data.un.org/ Import data from the largest economies of the world are used (Brazil, India, USA, China, Japan and EU-27).
  property dry mass 1 kg; name DM
  property water content 0; name water_content
  property wet mass 1 kg; name WM
  property water in wet mass 0 kg; name WWM
  property carbon content, fossil 0; name C_content_fossil
  property carbon content 0
    carbon content on a dry matter basis (reserved; not for manual entry)
  properties: carbon allocation 0 kg
- aluminium, cast alloy: 0 kg; source European Aluminium Association 2008; By-product classification allocatable product; CPC 41431: Unwrought aluminium; pedigree (1,1,1,1,1)
  EcoSpold01Location=RER
  property price 1.3 EUR2005; name castAlloyAmount_price_EUR2005
    Temporary price data. Calculated as 90% of purchasers price based on: Source: London Metal Exchange, Aluminium alloy price for 2005
  property carbon content 0
    carbon content on a dry matter basis (reserved; not for manual entry)
  properties: water in wet mass 0 kg, carbon content, non-fossil 0, water content 0, dry mass 1 kg, carbon content, fossil 0, wet mass 1 kg, carbon allocation 0 kg
- aluminium, wrought alloy: 0 kg; source European Aluminium Association 2008; By-product classification allocatable product; CPC 4153: Semi-finished products of aluminium or aluminium alloys; pedigree (1,1,1,1,1)
  property price 1.44 EUR2005; name secondaryAluminiumOutput_price_EUR2005
    Estimated based on literature values and expert judgement. Aluminium ccast alloys are about 90% of the price of aluminium wrought alloys.
  property carbon content 0
    carbon content on a dry matter basis (reserved; not for manual entry)
  properties: wet mass 1 kg, water content 0, carbon content, fossil 0, water in wet mass 0 kg, carbon content, non-fossil 0, dry mass 1 kg, carbon allocation 0 kg
- copper: 0 kg; source Rentz O. 1999; By-product classification allocatable product; CPC 41413: Refined copper and copper alloys, unwrought; master alloys of copper
  Literature value. Copper uses: Before end-use copper is manufactured into semi fabricated products, such as shapes and ingots (known as 'semis'). These manufacturing processes are subdivided into hot working, cold working and, if necessary, process annealing. Few of the semis are ready for use as such. They more typically travel to first-stage manufacturers, who make metal rods, wire, and casting, and then to component manufacturers who produce such things as motors, valves, and insulated cables The components in turn are incorporated by final-stage manufacturers into a variety of finished products - automobiles, commercial buildings, residential housing, and so forth. These uses account for about 79% of the world-wide consumption of copper.
  property price 5.52 EUR2005
    Literature value (http://www.economist.com/news/business/21576714-mining-industry-has-enriched-chile-its-future-precarious-copper-solution). Average price between 20015 and 2013.
  property carbon content 0
    carbon content on a dry matter basis (reserved; not for manual entry)
  properties: dry mass 1 kg, water in wet mass 0 kg, wet mass 1 kg, carbon content, non-fossil 0, water content 0, carbon content, fossil 0, carbon allocation 0 kg
- zinc concentrate: 0 kg; CPC 14290: Other non-ferrous metal ores and concentrates (other than uranium or thorium ores and concentrates); By-product classification allocatable product
  Calculated value from the knowledge of the properties of both products.
  property price 0.38 EUR2005; name ByP_price_EUR2005
    Temporary price data. Calculated as 90% of purchasers price based on: Zinc content in concentrate 53%. Concentrate price per kg Zn 86.5% of refined Zn price (13.5% treatment charges according to CHR Metals Limited 2005: Dynamic cost curves. http://www.minecost.com/dynamic.pdf). 2004 zinc price from USGS (2007) Mineral commodity summaries 2007. <http://minerals.usgs.gov/minerals/pubs/mcs/2007/mcs2007.pdf> [Accessed 25 May 2010]
  property zinc content 0.53; name zinc_C_zinc_concentrate
    Zinc content on a dry matter basis. Value taken from teh "zinc mine operation" /GLO dataset.
  property dry mass 1 kg; name DM_zinc_concentrate
  property carbon content 0
    carbon content on a dry matter basis (reserved; not for manual entry)
  properties: wet mass 1 kg, water content 0, carbon content, non-fossil 0, carbon content, fossil 0, water in wet mass 0 kg, carbon allocation 0 kg

## Inputs from technosphere
- municipal solid waste: 0 kg; name municipal_waste_output; = (3.28E-06* heat_output)/0.767; pedigree (1,1,1,1,1)
  value adapted from dataset "wood chips, burned in cogen 6400kWh".
  In the original dataset, 3.28E-6 kg of municipal solid waste are produced for 0.767MJ end heat.
  EcoSpold01Location=CH
  Uncertainty: Adapted from the dataset 'wood chips, in cogen 6400kWth, wood', according to actual water, carbon and energy content of the fuel (wood chips u=40%)
  production volume 0 kg; = municipal_waste_output* bagasse_input_annual_production
    Calculated from production volume of reference product using the relative outputs.
  property price 0 EUR2005; name municipal_waste_output_price_EUR2005
  properties: carbon content, non-fossil 0.261655, wet mass 1 kg, water content 0.297017, carbon content, fossil 0.171549, dry mass 0.771 kg
  note on carbon content, non-fossil: MSW composition in tab 4.1, ecoinvent v2.2 report 13_I. C content referred to 1 kg DM
- chemical, organic: 8.10479e-9 kg; = (5.74E-06* heat_output)/0.767; source Bauer, C. 2007; lognormal variance with pedigree 0.0328, pedigree (2,4,2,5,3)
  value adapted from dataset "wood chips, burned in cogen 6400kWh".
  In the original dataset, 5.74E-6 kg of chemical, organic are used to produce 0.767MJ end heat.
  EcoSpold01Location=GLO
  Uncertainty: etha+ project Alcosuisse, industrial data
  properties: wet mass 1 kg, carbon content, fossil 0.628, dry mass 1 kg
  note on carbon content, fossil: This dataset is an unweighted average of 20 organic substances (listed in Tab 88.1, ecoinvent v2.2 report 8, part II), being part of the top100 chemicals included in this database. The C-content has also been calculated as an unweighted average of the C content of the substances composing this dataset.
- heat and power co-generation unit, 6400kW thermal, common components for heat+electricity: 0 unit; = heat_output/(0.85*20*4.68E7); source Bauer, C. 2007; pedigree (1,1,1,1,1)
  EcoSpold01Location=CH
  The demanded infrastructure is calculated as:
  demanded infrastrucutre (unit/MJend) = MJend energy (MJ)/(capacity utilzation rate * Lifetime (y) * capacity (MJ/unit*y)
  The capacity for the cogen unit is 4,67E7 MJ/y. The lifetime is 20 years. The capacity utilization rate is 0.85.
  Uncertainty: Adapted from the dataset 'wood chips, in cogen 6400kWth, wood', according to actual water, carbon and energy content of the fuel (wood chips u=40%)
- waste mineral oil: 0 kg; name waste_oil_output; = (3.28E-06* heat_output)/0.767; pedigree (1,1,1,1,1)
  value adapted from dataset "wood chips, burned in cogen 6400kWh".
  In the original dataset, 3.28E-6 kg of waste mineral oil are produced for 0.767MJ end heat.
  EcoSpold01Location=CH
  Uncertainty: Adapted from the dataset 'wood chips, in cogen 6400kWth, wood', according to actual water, carbon and energy content of the fuel (wood chips u=40%)
  production volume 0 kg; = municipal_waste_output* bagasse_input_annual_production
    Calculated from production volume of reference product using the relative outputs.
  property price 0 EUR2005; name waste_oil_output_price_EUR2005
  properties: dry mass 0.9 kg, water content 0.111111, wet mass 1 kg, carbon content, fossil 0.864444
  note on carbon content, fossil: Tab A.6, ecoinvent v2.2 report 13_I. C content has been calculated after data in the tables, and then referred to 1 kg DM
- sodium chloride, powder: 0 kg; = (4.1E-06* heat_output)/0.767; source Bauer, C. 2007; pedigree (1,1,1,1,1)
  value adapted from dataset "wood chips, burned in cogen 6400kWh".
  In the original dataset, 4.1E-6 kg of water are used to produce 0.767MJ end heat.
  EcoSpold01Location=RER
  Uncertainty: Adapted from the dataset 'wood chips, in cogen 6400kWth, wood', according to actual water, carbon and energy content of the fuel (wood chips u=40%)
  properties: dry mass 1 kg, wet mass 1 kg
- heat and power co-generation unit, 6400kW thermal, building: 0 unit; = heat_output/(0.85*80*4.68E7); source Bauer, C. 2007; pedigree (1,1,1,1,1)
  The demanded infrastructure is calculated as:
  demanded infrastrucutre (unit/MJend) = MJend energy (MJ)/(capacity utilzation rate * Lifetime (y) * capacity (MJ/unit*y)
  The capacity for the cogen unit is 4,67E7 MJ/y. The lifetime is 80 years. The capacity utilization rate is 0.85.
  EcoSpold01Location=CH
  Uncertainty: Adapted from the dataset 'wood chips, in cogen 6400kWth, wood', according to actual water, carbon and energy content of the fuel (wood chips u=40%)
- heat and power co-generation unit, 6400kW thermal, components for electricity only: 0 unit; = heat_output/(0.85*20*4.68E7); source Bauer, C. 2007; pedigree (1,1,1,1,1)
  The demanded infrastructure is calculated as:
  demanded infrastrucutre (unit/MJend) = MJend energy (MJ)/(capacity utilzation rate * Lifetime (y) * capacity (MJ/unit*y)
  The capacity for the cogen unit is 4,67E7 MJ/y. The lifetime is 20 years. The capacity utilization rate is 0.85.
  EcoSpold01Location=CH
  Uncertainty: Adapted from the dataset 'wood chips, in cogen 6400kWth, wood', according to actual water, carbon and energy content of the fuel (wood chips u=40%)
- water, decarbonised: 0 kg; name water_decarbonised_input; = (0.000787* heat_output)/0.767; source Bauer, C. 2007; pedigree (1,1,1,1,1)
  value adapted from dataset "wood chips, burned in cogen 6400kWh".
  In the original dataset, 0.000787 kg of water are used to produce 0.767MJ end heat.
  value adapted from dataset "wood chips, burned in cogen 6400kWh".
  In the original dataset, 0.000787 kg of water are used to produce 0.767MJ end heat.
  EcoSpold01Location=RER
  Uncertainty: Adapted from the dataset 'wood chips, in cogen 6400kWth, wood', according to actual water, carbon and energy content of the fuel (wood chips u=40%)
  properties: wet mass 1 kg
- chlorine, liquid: 0 kg; = (3.28E-07* heat_output)/0.767; source Bauer, C. 2007; pedigree (1,1,1,1,1)
  EcoSpold01Location=RER
  value adapted from dataset "wood chips, burned in cogen 6400kWh".
  In the original dataset, 3.28E-7 kg of chlorine are used to produce 0.767MJ end heat.
  Uncertainty: Adapted from the dataset 'wood chips, in cogen 6400kWth, wood', according to actual water, carbon and energy content of the fuel (wood chips u=40%)
  properties: dry mass 1 kg, wet mass 1 kg
- wood ash mixture, pure: 0 kg; name wood_ash_output; = (1/100)* bagasse_input*(-1)*0.787; pedigree (1,1,1,1,1)
  for wood chips it is estimated that 1% of the dry mass is converted in ash. This is also assumed for bagasse.
  production volume 0 kg; = bagasse_input_annual_production * wood_ash_output
    Calculated from production volume of reference product using the relative outputs.
  property price 0 EUR2005; name wood_ash_output_price_EUR2005
  property carbon content, non-fossil 0.012; name wood_ash_output_C_content_non_fossil
  properties: dry mass 1 kg, wet mass 1 kg
  note on carbon content, non-fossil: biogene carbon content on a dry matter basis Tab A.9, ecoinvent v2.2 report 13_I.
- hydrochloric acid, without water, in 30% solution state: 1.00048e-8 kg; source Mateus F. Chagas 2015; lognormal variance with pedigree 0.0033, pedigree (2,2,3,1,1)
  Chemicals used for the water treatment in a typical Brazilian sugarcane processing plant (LDC Bioenergia, 2010). Treatment of captured water and recycled water in closed circuits (parameterized by water catchment) were considered.
- sodium hydroxide, without water, in 50% solution state: 4.48037e-8 kg; source Mateus F. Chagas 2015; lognormal variance with pedigree 0.0033, pedigree (2,2,3,1,1)
  (same comment as for hydrochloric acid, without water, in 30% solution state)
- acetic acid, without water, in 98% solution state: 2.75509e-8 kg; source Mateus F. Chagas 2015; lognormal variance with pedigree 0.0033, pedigree (2,2,3,1,1)
  (same comment as for hydrochloric acid, without water, in 30% solution state)
- sodium hypochlorite, without water, in 15% solution state: 6.11107e-6 kg; source Mateus F. Chagas 2015; lognormal variance with pedigree 0.0033, pedigree (2,2,3,1,1)
  (same comment as for hydrochloric acid, without water, in 30% solution state)
- chemical, inorganic: 4.80436e-8 kg; source Mateus F. Chagas 2015; lognormal variance with pedigree 0.0033, pedigree (2,2,3,1,1)
  Antibiotic for fermentation process. Based on computer simulation of the process validated using literature and industry data.
- iron (III) chloride, without water, in 40% solution state: 7.18197e-7 kg; source Mateus F. Chagas 2015; lognormal variance with pedigree 0.0033, pedigree (2,2,3,1,1)
  (same comment as for hydrochloric acid, without water, in 30% solution state)
- building, hall, steel construction: 4.86823e-9 m2; source Mateus F. Chagas 2015; lognormal variance with pedigree 0.3106, pedigree (3,3,4,1,1)
  Economic investment was used to estimate the amount of equipment and infrastructure. Baseline values were taken from Macedo et al. (2004) and Macedo et al. (2008), using a scaling factor to adjust plant capacity.
- magnesium sulfate: 2.60798e-9 kg; source Mateus F. Chagas 2015; lognormal variance with pedigree 0.0033, pedigree (2,2,3,1,1)
  (same comment as for hydrochloric acid, without water, in 30% solution state)
- aluminium sulfate, powder: 8.22019e-7 kg; source Mateus F. Chagas 2015; lognormal variance with pedigree 0.0033, pedigree (2,2,3,1,1)
  (same comment as for hydrochloric acid, without water, in 30% solution state)
- sodium sulfate, anhydrite: 8.30132e-6 kg; source Mateus F. Chagas 2015; lognormal variance with pedigree 0.0033, pedigree (2,2,3,1,1)
  (same comment as for hydrochloric acid, without water, in 30% solution state)
- phosphane: 4.44025e-8 kg; source Mateus F. Chagas 2015; lognormal variance with pedigree 0.0033, pedigree (2,2,3,1,1)
  (same comment as for hydrochloric acid, without water, in 30% solution state)
- soda ash, dense: 8.70663e-7 kg; source Mateus F. Chagas 2015; lognormal variance with pedigree 0.0033, pedigree (2,2,3,1,1)
  (same comment as for hydrochloric acid, without water, in 30% solution state)
- quicklime, milled, packed: 6.67038e-5 kg; source Mateus F. Chagas 2015; lognormal variance with pedigree 0.0033, pedigree (2,2,3,1,1)
  Quicklime used for juice treatment. Based on computer simulation of the process validated using literature and industry data.
- sodium metasilicate pentahydrate, 58% active substance, powder: 3.40705e-8 kg; source Mateus F. Chagas 2015; lognormal variance with pedigree 0.0033, pedigree (2,2,3,1,1)
  (same comment as for hydrochloric acid, without water, in 30% solution state)
- paraffin: 3.82102e-7 kg; source Mateus F. Chagas 2015; lognormal variance with pedigree 0.0033, pedigree (2,2,3,1,1)
  Flocculating polymer used for juice treatment and water treatment. Based on computer simulation of the process validated using literature and industry data. Treatment of captured water and recycled water in closed circuits (parameterized by water catchment) were considered.
- formaldehyde: 1.82971e-9 kg; source Mateus F. Chagas 2015; lognormal variance with pedigree 0.0033, pedigree (2,2,3,1,1)
  (same comment as for hydrochloric acid, without water, in 30% solution state)
- sugarcane: 0.0901337 kg; source Mateus F. Chagas 2015; lognormal variance with pedigree 0.0033, pedigree (2,2,3,1,1)
  Processed sugarcane. Based on computer simulation of the process validated using literature and industry data.
- dithiocarbamate-compound: 1.25584e-7 kg; source Mateus F. Chagas 2015; lognormal variance with pedigree 0.0033, pedigree (2,2,3,1,1)
  (same comment as for hydrochloric acid, without water, in 30% solution state)
- pesticide, unspecified: 2.60798e-9 kg; source Mateus F. Chagas 2015; lognormal variance with pedigree 0.0033, pedigree (2,2,3,1,1)
  Chemicals (biocides) used for the water treatment in a typical Brazilian sugarcane processing plant (LDC Bioenergia, 2010). Treatment of captured water and recycled water in closed circuits (parameterized by water catchment) were considered.
- dimethylamine: 4.70498e-8 kg; source Mateus F. Chagas 2015; lognormal variance with pedigree 0.0033, pedigree (2,2,3,1,1)
  (same comment as for hydrochloric acid, without water, in 30% solution state)
- lubricating oil: 1.17174e-6 kg; source Mateus F. Chagas 2015; lognormal variance with pedigree 0.0033, pedigree (2,2,3,1,1)
  Lubrication oil for reception, preparation and milling equipments. Based on computer simulation of the process validated using literature and industry data.
- monoethanolamine: 2.47424e-8 kg; source Mateus F. Chagas 2015; lognormal variance with pedigree 0.0033, pedigree (2,2,3,1,1)
  (same comment as for hydrochloric acid, without water, in 30% solution state)
- cyclohexane: 7.70489e-7 kg; source Mateus F. Chagas 2015; lognormal variance with pedigree 0.0033, pedigree (2,2,3,1,1)
  Replacement of cyclohexane in dehydration system. Based on computer simulation of the process validated using literature and industry data.
- sulfuric acid: 4.05172e-5 kg; source Mateus F. Chagas 2015; lognormal variance with pedigree 0.0033, pedigree (2,2,3,1,1)
  Sulphuric acid used for yeast treatment in fermentation process and water treatment. Based on computer simulation of the process validated using literature and industry data. Treatment of captured water and recycled water in closed circuits (parameterized by water catchment) were considered.
- phosphoric acid, industrial grade, without water, in 85% solution state: 3.13306e-5 kg; source Mateus F. Chagas 2015; lognormal variance with pedigree 0.0033, pedigree (2,2,3,1,1)
  Phosphoric acid used for juice treatment. Based on computer simulation of the process validated using literature and industry data.
- sodium dichromate: 7.85068e-8 kg; source Mateus F. Chagas 2015; lognormal variance with pedigree 0.0033, pedigree (2,2,3,1,1)
  (same comment as for hydrochloric acid, without water, in 30% solution state)
- metal working, average for chromium steel product manufacturing: 1.01511e-6 kg; source Mateus F. Chagas 2015; lognormal variance with pedigree 0.3106, pedigree (3,3,4,1,1)
  (same comment as for building, hall, steel construction)
- bagasse, from sugarcane: -0.0113961 kg; source Mateus F. Chagas 2015
  Surplus bagasse generated in traditional annexed plants in Brazil.
  production volume 1.62967e10 kg
- concrete, normal: 1.56833e-8 m3; source Mateus F. Chagas 2015; lognormal variance with pedigree 0.3106, pedigree (3,3,4,1,1)
  (same comment as for building, hall, steel construction)
- metal working, average for steel product manufacturing: 1.73865e-5 kg; source Mateus F. Chagas 2015; lognormal variance with pedigree 0.3106, pedigree (3,3,4,1,1)
  (same comment as for building, hall, steel construction)
- calcium chloride: 6.04797e-8 kg; source Mateus F. Chagas 2015; lognormal variance with pedigree 0.0033, pedigree (2,2,3,1,1)
  (same comment as for hydrochloric acid, without water, in 30% solution state)
- aluminium sulfate, powder: 3.97712e-7 kg; source Mateus F. Chagas 2015; lognormal variance with pedigree 0.0053, pedigree (2,2,3,5,1)
  (same comment as for hydrochloric acid, without water, in 30% solution state)
- dimethylamine: 2.27638e-8 kg; source Mateus F. Chagas 2015; lognormal variance with pedigree 0.0053, pedigree (2,2,3,5,1)
  (same comment as for hydrochloric acid, without water, in 30% solution state)
- sodium sulfate, anhydrite: 4.01636e-6 kg; source Mateus F. Chagas 2015; lognormal variance with pedigree 0.0053, pedigree (2,2,3,5,1)
  (same comment as for hydrochloric acid, without water, in 30% solution state)
- sodium hypochlorite, without water, in 15% solution state: 2.95667e-6 kg; source Mateus F. Chagas 2015; lognormal variance with pedigree 0.0053, pedigree (2,2,3,5,1)
  (same comment as for hydrochloric acid, without water, in 30% solution state)
- sodium metasilicate pentahydrate, 58% active substance, powder: 1.64841e-8 kg; source Mateus F. Chagas 2015; lognormal variance with pedigree 0.0053, pedigree (2,2,3,5,1)
  (same comment as for hydrochloric acid, without water, in 30% solution state)
- calcium chloride: 2.92615e-8 kg; source Mateus F. Chagas 2015; lognormal variance with pedigree 0.0053, pedigree (2,2,3,5,1)
  (same comment as for hydrochloric acid, without water, in 30% solution state)
- lubricating oil: 5.66914e-7 kg; source Mateus F. Chagas 2015; lognormal variance with pedigree 0.0053, pedigree (2,2,3,5,1)
  (same comment as for lubricating oil)
- sulfuric acid: 1.60916e-5 kg; source Mateus F. Chagas 2015; lognormal variance with pedigree 0.0053, pedigree (2,2,3,5,1)
  (same comment as for sulfuric acid)
- sugarcane: 0.0436087 kg; source Mateus F. Chagas 2015; lognormal variance with pedigree 0.0053, pedigree (2,2,3,5,1)
  (same comment as for sugarcane)
- formaldehyde: 8.85257e-10 kg; source Mateus F. Chagas 2015; lognormal variance with pedigree 0.0053, pedigree (2,2,3,5,1)
  (same comment as for hydrochloric acid, without water, in 30% solution state)
- quicklime, milled, packed: 3.70674e-5 kg; source Mateus F. Chagas 2015; lognormal variance with pedigree 0.0053, pedigree (2,2,3,5,1)
  (same comment as for quicklime, milled, packed)
- hydrochloric acid, without water, in 30% solution state: 4.84057e-9 kg; source Mateus F. Chagas 2015; lognormal variance with pedigree 0.0053, pedigree (2,2,3,5,1)
  (same comment as for hydrochloric acid, without water, in 30% solution state)
- concrete, normal: 5.38143e-12, 1.5068e-10, 8.47576e-11, 3.58924e-10, 1.21063e-11, 6.97607e-9 m3 (6 suppliers, which the file names only by identifier); sum of these 7.58792e-9 m3; source Mateus F. Chagas 2015; lognormal variance with pedigree 0.3126, pedigree (3,3,4,5,1)
  (same comment as for building, hall, steel construction)

## Inputs from nature
- Water, well, in ground [natural resource, in water]: 0.000200614 m3; source Mateus F. Chagas 2015; lognormal variance with pedigree 0.0033, pedigree (2,2,3,1,1)
  Water catchment. Based on computer simulation of the process validated using literature and industry data.
- Transformation, from arable land, unspecified use [natural resource, land]: 8.55952e-9 m2; source Mateus F. Chagas 2015; lognormal variance with pedigree 0.1306, pedigree (3,3,4,1,1)
  Transformation of area occupied by the industrial plant based on data from MACEDO et al., 2008. The occupation was calculated considering a life span of 25 years.
- Transformation, to industrial area [natural resource, land]: 8.55952e-9 m2; source Mateus F. Chagas 2015; lognormal variance with pedigree 0.1306, pedigree (3,3,4,1,1)
  (same comment as for Transformation, from arable land, unspecified use)
- Occupation, industrial area [natural resource, land]: 4.36e-7 m2*year; source Mateus F. Chagas 2015; lognormal variance with pedigree 0.0506, pedigree (3,3,4,1,1)
  Industrial area plant based on data from MACEDO et al., 2008.

## Emissions to nature
- Mercury [air, urban air close to ground]: 0 kg; = 3.53E-10* bagasse_input*(-1)*15.4*0.787; source Bauer, C. 2007; pedigree (1,1,1,1,1)
  calculated from the emission factor (kg/MJ input) given for cogen 6400kW.
  Uncertainty: Adapted from the dataset 'wood chips, in cogen 6400kWth, wood', according to actual water, carbon and energy content of the fuel (wood chips u=40%)
- Dinitrogen monoxide [air, urban air close to ground]: 0 kg; = 2.71E-06* bagasse_input*(-1)*15.4*0.787; source Bauer, C. 2007; pedigree (1,1,1,1,1)
  (same comment as for Mercury)
- Magnesium [air, urban air close to ground]: 0 kg; = 4.24E-07* bagasse_input*(-1)*15.4*0.787; source Bauer, C. 2007; pedigree (1,1,1,1,1)
  (same comment as for Mercury)
- Zinc [air, urban air close to ground]: 0 kg; = 3.53E-07* bagasse_input*(-1)*15.4*0.787; source Bauer, C. 2007; pedigree (1,1,1,1,1)
  (same comment as for Mercury)
- Sulfur dioxide [air, urban air close to ground]: 0 kg; = 2.49E-06* bagasse_input*(-1)*15.4*0.787; source Bauer, C. 2007; pedigree (1,1,1,1,1)
  calculated from the emission factor (kg/MJ input) given for cogen 6400kW.
  Uncertainty: Adapted from the dataset 'wood chips, in cogen 6400kWth, wood', according to actual water, carbon and energy content of the fuel (pressed sorghum bagasse)
- Potassium [air, urban air close to ground]: 0 kg; = 2.75E-05* bagasse_input*(-1)*15.4*0.787; source Bauer, C. 2007; pedigree (1,1,1,1,1)
  (same comment as for Mercury)
- Fluorine [air, urban air close to ground]: 0 kg; = 5.88E-08* bagasse_input*(-1)*15.4*0.787; source Bauer, C. 2007; pedigree (1,1,1,1,1)
  (same comment as for Sulfur dioxide)
- Water [air, unspecified]: 0 m3; name water_to_air_unspecified; = (water_decarbonised_input/1000)*fraction_WDC_to_air; pedigree (1,1,1,1,1)
  Calculated value based on literature values and expert opinion. See comments in the parametres' comment field.
  property fraction, origin: salt water 0; name fraction_origin_salt_water
  property fraction, origin: unspecified 0; name fraction_origin_unspecified
  property fraction, origin: fresh water 1; name fraction_origin_fresh_water
- Chlorine [air, urban air close to ground]: 0 kg; = 2.12E-07* bagasse_input*(-1)*15.4*0.787; source Bauer, C. 2007; pedigree (1,1,1,1,1)
  (same comment as for Sulfur dioxide)
- Water [water, unspecified]: 0 m3; name water_to_water_unspecified; = (water_decarbonised_input/1000)*(1-fraction_WDC_to_air); pedigree (1,1,1,1,1)
  (same comment as for Water)
  property fraction, origin: fresh water 1; name fraction_origin_fresh_water_Ww
  property fraction, origin: unspecified 0; name fraction_origin_unspecified_Ww
  property fraction, origin: salt water 0; name fraction_origin_salt_water_Ww
- Benzene, hexachloro- [air, urban air close to ground]: 0 kg; = 8.47E-15* bagasse_input*(-1)*15.4*0.787; source Bauer, C. 2007; pedigree (1,1,1,1,1)
  (same comment as for Mercury)
- Phenol, pentachloro- [air, urban air close to ground]: 0 kg; = 9.53E-12* bagasse_input*(-1)*15.4*0.787; source Bauer, C. 2007; pedigree (1,1,1,1,1)
  (same comment as for Mercury)
- Carbon monoxide, non-fossil [air, urban air close to ground]: 0 kg; name carbon_monoxide; = 7E-06*15.4*0.787*(77/100); source Bauer, C. 2007; pedigree (1,1,1,1,1)
  It is assumed that 7 mg of CO are produced per MJend. To calculate this, the calorific value of bagasse, the dry matter content and calorific efficiency of the cogen are used.
  Uncertainty: Adapted from the dataset 'wood chips, in cogen 6400kWth, wood', according to actual water, carbon and energy content of the fuel (wood chips u=40%)
  property molecular weight 28 g/mol; name carbon_monoxide_MW
- Benzene [air, urban air close to ground]: 0 kg; = 1.07E-6* bagasse_input*(-1)*15.4*0.787; source Bauer, C. 2007; pedigree (1,1,1,1,1)
  (same comment as for Mercury)
- Phosphorus [air, urban air close to ground]: 0 kg; = 3.53E-07* bagasse_input*(-1)*15.4*0.787; source Bauer, C. 2007; pedigree (1,1,1,1,1)
  (same comment as for Mercury)
- Hydrocarbons, aliphatic, alkanes, unspecified [air, urban air close to ground]: 0 kg; = 1.07E-06* bagasse_input*(-1)*15.4*0.787; source Bauer, C. 2007; pedigree (1,1,1,1,1)
  (same comment as for Sulfur dioxide)
- Hydrocarbons, aliphatic, unsaturated [air, urban air close to ground]: 0 kg; = 3.65E-06* bagasse_input*(-1)*15.4*0.787; source Bauer, C. 2007; pedigree (1,1,1,1,1)
  (same comment as for Mercury)
- Sodium [air, urban air close to ground]: 0 kg; = 1.53E-06* bagasse_input*(-1)*15.4*0.787; source Bauer, C. 2007; pedigree (1,1,1,1,1)
  (same comment as for Mercury)
- Benzene, ethyl- [air, urban air close to ground]: 0 kg; = 3.53E-08* bagasse_input*(-1)*15.4*0.787; source Bauer, C. 2007; pedigree (1,1,1,1,1)
  (same comment as for Mercury)
- Chromium [air, urban air close to ground]: 0 kg; = 4.66E-09* bagasse_input*(-1)*15.4*0.787; source Bauer, C. 2007; pedigree (1,1,1,1,1)
  (same comment as for Mercury)
- Bromine [air, urban air close to ground]: 0 kg; = 7.06E-08* bagasse_input*(-1)*15.4*0.787; source Bauer, C. 2007; pedigree (1,1,1,1,1)
  (same comment as for Mercury)
- Nickel [air, urban air close to ground]: 0 kg; = 7.06E-09* bagasse_input*(-1)*15.4*0.787; source Bauer, C. 2007; pedigree (1,1,1,1,1)
  (same comment as for Mercury)
- Chromium VI [air, urban air close to ground]: 0 kg; = 4.71E-11* bagasse_input*(-1)*15.4*0.787; source Bauer, C. 2007; pedigree (1,1,1,1,1)
  (same comment as for Mercury)
- Dioxins, measured as 2,3,7,8-tetrachlorodibenzo-p-dioxin [air, urban air close to ground]: 0 kg; = 3.65E-14* bagasse_input*(-1)*15.4*0.787; source Bauer, C. 2007; pedigree (1,1,1,1,1)
  (same comment as for Mercury)
- NMVOC, non-methane volatile organic compounds, unspecified origin [air, urban air close to ground]: 0 kg; = 7.06E-07* bagasse_input*(-1)*15.4*0.787; source Bauer, C. 2007; pedigree (1,1,1,1,1)
  (same comment as for Mercury)
- Calcium [air, urban air close to ground]: 0 kg; = 6.88E-06* bagasse_input*(-1)*15.4*0.787; source Bauer, C. 2007; pedigree (1,1,1,1,1)
  (same comment as for Mercury)
- Manganese [air, urban air close to ground]: 0 kg; = 4.24E-07* bagasse_input*(-1)*15.4*0.787; source Bauer, C. 2007; pedigree (1,1,1,1,1)
  (same comment as for Mercury)
- Cadmium [air, urban air close to ground]: 0 kg; = 8.24E-10* bagasse_input*(-1)*15.4*0.787; source Bauer, C. 2007; pedigree (1,1,1,1,1)
  (same comment as for Sulfur dioxide)
- Formaldehyde [air, urban air close to ground]: 0 kg; = 1.53E-07* bagasse_input*(-1)*15.4*0.787; source Bauer, C. 2007; pedigree (1,1,1,1,1)
  calculated from the emission factor (kg/MJ input) given for cogen 6400kW.
- PAH, polycyclic aromatic hydrocarbons [air, urban air close to ground]: 0 kg; = 1.31E-08* bagasse_input*(-1)*15.4*0.787; source Bauer, C. 2007; pedigree (1,1,1,1,1)
  (same comment as for Mercury)
- Arsenic [air, urban air close to ground]: 0 kg; = 1.18E-09* bagasse_input*(-1)*15.4*0.787; source Bauer, C. 2007; pedigree (1,1,1,1,1)
  (same comment as for Mercury)
- Benzo(a)pyrene [air, urban air close to ground]: 0 kg; = 5.88E-10* bagasse_input*(-1)*15.4*0.787; source Bauer, C. 2007; pedigree (1,1,1,1,1)
  (same comment as for Mercury)
- Ammonia [air, urban air close to ground]: 0 kg; = 2.04E-06* bagasse_input*(-1)*15.4*0.787; source Bauer, C. 2007; pedigree (1,1,1,1,1)
  (same comment as for Mercury)
- Acetaldehyde [air, urban air close to ground]: 0 kg; = 7.18E-08* bagasse_input*(-1)*15.4*0.787; source Bauer, C. 2007; pedigree (1,1,1,1,1)
  (same comment as for Mercury)
- Nitrogen oxides [air, urban air close to ground]: 0 kg; = 1.14E-04* bagasse_input*(-1)*15.4*0.787; source Bauer, C. 2007; pedigree (1,1,1,1,1)
  (same comment as for Mercury)
- Methane, non-fossil [air, urban air close to ground]: 0 kg; = 4.71E-07* bagasse_input*(-1)*15.4*0.787; source Bauer, C. 2007; pedigree (1,1,1,1,1)
  (same comment as for Mercury)
- Lead [air, urban air close to ground]: 0 kg; = 2.49E-08* bagasse_input*(-1)*15.4*0.787; source Bauer, C. 2007; pedigree (1,1,1,1,1)
  (same comment as for Mercury)
- m-Xylene [air, urban air close to ground]: 0 kg; = 1.41E-07* bagasse_input*(-1)*15.4*0.787; source Bauer, C. 2007; pedigree (1,1,1,1,1)
  (same comment as for Mercury)
- Carbon dioxide, non-fossil [air, urban air close to ground]: 0 kg; name carbon_dioxide; = ((0.34864* bagasse_input*-1) - ( carbon_monoxide*(12/28))-(0.0012*wood_ash_output))*( carbon_dioxide_MW/12); pedigree (1,1,1,1,1)
  It is assumed that all carbon content in bagasse leaves the system as emissions (CO and CO2) and ash (wood ash). The CO2 emissions are calculated by substracting the amount of C in the bagasse to the amount of carbon that leaves the system as CO (7mg/MJend) and ash (1.2E-3kg/kg ash). The rest of C is assumed to leave the system as CO2. The calculations are done using the molecular weight (MW) and carbon content with the following steps:
  mass of C in input bagasse=(0.34864kgC/1kg bagasse)* mass input bagasse
  mass of C as CO = output emissions CO (kg) * MWC / MWCO
  mass of C as ash = carbon content in ash (kg/kg) * output ash (kg)
  emissions of C as CO2= mass of C in input bagasse - mass of C as CO - mass of C in ash
  emissions of CO2=emissions of C as CO2 * (MW CO2/MW C)
  Note: molecular weight of C is 12 g/mol
  Uncertainty: Adapted from the dataset 'wood chips, in cogen 6400kWth, wood', according to actual water, carbon and energy content of the fuel (wood chips u=40%)
  property molecular weight 44 g/mol; name carbon_dioxide_MW
- Particulates, < 2.5 um [air, urban air close to ground]: 0 kg; = 7.18E-05* bagasse_input*(-1)*15.4*0.787; source Bauer, C. 2007; pedigree (1,1,1,1,1)
  (same comment as for Mercury)
- Copper [air, urban air close to ground]: 0 kg; = 2.59E-08* bagasse_input*(-1)*15.4*0.787; source Bauer, C. 2007; pedigree (1,1,1,1,1)
  (same comment as for Mercury)
- Toluene [air, urban air close to ground]: 0 kg; = 3.53E-07* bagasse_input*(-1)*15.4*0.787; source Bauer, C. 2007; pedigree (1,1,1,1,1)
  (same comment as for Mercury)
- NMVOC, non-methane volatile organic compounds, unspecified origin [air, non-urban air or from high stacks]: 8.07007e-7 kg; source Mateus F. Chagas 2015; lognormal variance with pedigree 0.0446, pedigree (3,3,3,1,1)
  Emissions from sugarcane bagasse combustion and from sugar drying process. Emissions from combustion in the boilers of cogeneration units were estimated according to GREET (2010) emission factors, except carbon dioxide emissions, which are based on process simulation results. Emissions from sugar drying processos were based on process simulation results.
- Carbon monoxide, non-fossil [air, non-urban air or from high stacks]: 1.15864e-5 kg; source Mateus F. Chagas 2015; lognormal variance with pedigree 0.0446, pedigree (3,3,3,1,1)
  Emissions from sugarcane bagasse combustion in the boilers of cogeneration units were estimated according to GREET (2010) emission factors, except carbon dioxide emissions, which are based on process simulation results.
- Carbon dioxide, non-fossil [air, non-urban air or from high stacks]: 0.0314386 kg; source Mateus F. Chagas 2015; lognormal variance with pedigree 0.0033, pedigree (2,2,3,1,1)
  Emissions from sugarcane bagasse combustion, from fermentation and distillation process. Emissions from sugarcane bagasse combustion in the boilers of cogeneration units were estimated according to GREET (2010) emission factors, except carbon dioxide emissions, which are based on process simulation results. Emissions from fermentation and distillation process were based on process simulation results.
- Ethanol [air, non-urban air or from high stacks]: 1.31477e-5 kg; source Mateus F. Chagas 2015; lognormal variance with pedigree 0.0427, pedigree (2,2,3,1,1)
  Emissions from distillation process, based on process simulation results.
- Dinitrogen monoxide [air, non-urban air or from high stacks]: 6.38139e-7 kg; source Mateus F. Chagas 2015; lognormal variance with pedigree 0.0446, pedigree (3,3,3,1,1)
  (same comment as for Carbon monoxide, non-fossil)
- Particulates, < 2.5 um [air, non-urban air or from high stacks]: 6.54304e-6 kg; source Mateus F. Chagas 2015; lognormal variance with pedigree 0.3046, pedigree (3,3,3,1,1)
  (same comment as for Carbon monoxide, non-fossil)
- Methane, non-fossil [air, non-urban air or from high stacks]: 4.77935e-6 kg; source Mateus F. Chagas 2015; lognormal variance with pedigree 0.0446, pedigree (3,3,3,1,1)
  (same comment as for Carbon monoxide, non-fossil)
- Phosphoric acid [air, non-urban air or from high stacks]: 5.26794e-12 kg; source Mateus F. Chagas 2015; lognormal variance with pedigree 0.0446, pedigree (3,3,3,1,1)
  Emissions from sugar drying process, based on process simulation results.
- Particulates, > 10 um [air, non-urban air or from high stacks]: 1.77924e-7 kg; source Mateus F. Chagas 2015; lognormal variance with pedigree 0.0446, pedigree (3,3,3,1,1)
  Emissions from sugar drying process, based on process simulation results.
- Nitrogen oxides [air, non-urban air or from high stacks]: 1.15515e-5 kg; source Mateus F. Chagas 2015; lognormal variance with pedigree 0.0446, pedigree (3,3,3,1,1)
  (same comment as for Carbon monoxide, non-fossil)
- Sulfur oxides [air, unspecified]: 6.19298e-7 kg; source Mateus F. Chagas 2015; lognormal variance with pedigree 0.0446, pedigree (3,3,3,1,1)
  (same comment as for Carbon monoxide, non-fossil)
- Particulates, > 2.5 um, and < 10um [air, non-urban air or from high stacks]: 1.30958e-5 kg; source Mateus F. Chagas 2015; lognormal variance with pedigree 0.1246, pedigree (3,3,3,1,1)
  (same comment as for NMVOC, non-methane volatile organic compounds, unspecified origin)

## Extrapolations
The original dataset is valid is based on measures from one cogen unit in Switzerland and has been extrapolated to a global dataset

The dataset was updated for energy production from biomass
Updated data for regionalization of Brazil (2014-2017):
- Production Volume
- Biomass input (Bagasse (12%) and Other Bioenergies (3%): includes firewood, bleach, rice hulls, biogas, wood, vegetable oils, etc.)

## Review by Christopher Oberschelp 2017-11-30
Dataset seems appropriately documented and key exchanges look reasonable. Individual deviations may be spotted by comparison with reference datasets (as there have been some back-and-forth changes of exchanges).
