# power distribution unit production, for electric passenger car

Dataset: EcoSpold 2, unit process
Geography: GLO
Time period: 2005-01-01 to 2019-12-31
Technology level: modern
Classification: ISIC rev.4 ecoinvent: 2651:Manufacture of measuring, testing, navigating and control equipment
Scenario: Business-as-Usual
System model: Allocation at the point of substitution
Generated by: F. Habermacher
Published in: F. Habermacher 2011
Database: ecoinvent
isCopyrightProtected: true
accessRestrictedTo: 1

## General comment
This dataset describes a power distribution unit used in the power electronics of the drivetrain for an electric passenger car. It is based on direct informatino frmo the Swiss manufacturer Brusa. The entries are given as a function of kg device. The specific power distribution unit which was used for this dataset weights 3.9 kg and is suitable for a 100kW electric drivetrain.

## Included activities start
The dataset starts with reception of the electronic components used in the inverter, the efforts needed for the production of the components as well as the assembly of the converter.

## Included activities end
The activity returns the fully assmebled power distribution unit.

## Technology
This dataset is based on current, high-level standard.

## Reference product
- power distribution unit, for electric passenger car: 1 kg; source F. Habermacher 2011; By-product classification allocatable product; CPC 4613: Parts for the goods of classes 4611 and 4612
  This dataset is based on direct information from the Swiss manufacturer Brusa.
  production volume 35100 kg
    Based on a rough estimate of a total production of about 9000 electric passenger cars.
  property price 187 EUR2005
    Calculated based on assumptions and data from the producer. The producer states, that the price of a power train is around 21000 euro (Bursa, http://www.brusa.biz/fileadmin/Diverses/Download/Flyer/Flyer_Drivetrain_Sets_inkl_Preis.pdf, accessed 20130725). It is estimated, that the market price=basic price + basic price*0.4. The total value (basic price) of the powertrain (21000/(1+0.4)=) 16150 euro is divided between the separate parts of the power train by their weight. The resulting price per kilogram is thus assumed to be the same for all the different parts of the power train (inverter, charger, motor, converter, etc.).
  property true value 729.3
    allocation property applied in "true value" allocation // value calculated from revenue

## By-products
- iron scrap, unsorted: 0 kg; source F. Habermacher 2011; CPC 39310: Slag, dross, scalings and other waste from the manufacture of iron or steel; By-product classification Recyclable; pedigree (1,1,1,1,1)
  Steel scrap from production process.
  production volume 565.203 kg; = Ref('dae74d33-0f20-4902-8999-75d69c5c0e66', 'ProductionVolume') * (Ref('9ee4ca14-7adc-469d-9eb3-48fea8effc42') / Ref('dae74d33-0f20-4902-8999-75d69c5c0e66'))
    Calculated from production volume of reference product using the relative outputs.
  property price 0.149 EUR2005
    Temporary price data. Calculated as 90% of purchasers price based on: estimated at 85% of sorted scrap
  property carbon content 0
    carbon content on a dry matter basis (reserved; not for manual entry)
  property true value 0.00929465
    allocation property applied in "true value" allocation // value calculated from revenue
  properties: carbon content, fossil 0, wet mass 1 kg, carbon content, non-fossil 0, water in wet mass 0 kg, dry mass 1 kg, water content 0, carbon allocation 0 kg
- aluminium, cast alloy: 0 kg; source European Aluminium Association 2008; By-product classification allocatable product; CPC 41431: Unwrought aluminium; pedigree (1,1,1,1,1)
  EcoSpold01Location=RER
  production volume 4236.73 kg
  property price 1.3 EUR2005; name castAlloyAmount_price_EUR2005
    Temporary price data. Calculated as 90% of purchasers price based on: Source: London Metal Exchange, Aluminium alloy price for 2005
  property carbon content 0
    carbon content on a dry matter basis (reserved; not for manual entry)
  property true value 0.290749
    allocation property applied in "true value" allocation // value calculated from revenue
  properties: carbon content, fossil 0, dry mass 1 kg, wet mass 1 kg, water content 0, water in wet mass 0 kg, carbon content, non-fossil 0, carbon allocation 0 kg
- aluminium oxide, non-metallurgical: 0 kg; source European Aluminium Association 2008; CPC 41432: Alumina (aluminium oxide), except artificial corundum; By-product classification allocatable product; CAS 1344-28-1; pedigree (1,1,1,1,1)
  production volume 453.234 kg
  property dry mass 1 kg; name DM
  property wet mass 1 kg; name WM
  property carbon content, fossil 0; name C_content_fossil
  property water in wet mass 0 kg; name WWM
  property water content 0; name water_content
  property price 0.28 EUR2005; name Al2O3Amount_price_EUR2005
  property carbon content, non-fossil 0; name C_content_non_fossil
  properties: carbon content 0, carbon allocation 0 kg, true value 0.00669922
- heat, for reuse in municipal waste incineration only: 0 MJ; CPC 17300: Steam and hot water; By-product classification allocatable product; pedigree (1,1,1,1,1)
  Net electricity generated from this waste and used in internal MSWI plant energy redistribution.
  Uncertainty: uncertainty is calculated from uncertainties in waste composition and uncertainties in energy efficiency and the uncertainty in internal energy demand
  production volume 1131.74 MJ
  property exergy 0.1842 MJ; name E_th_prod_MSWI_exergy
    This exergy property is based on the exergy content of the product.
  property true value relation 0.1842; name E_th_prod_MSWI_true_value_relation
    property to calculate "true value" from
  property price 0.0106 EUR2005; name E_th_prod_MSWI_price_EUR2005
    Average European district heat price from Ecoheatcool and Euroheat 2005-2006, Ecoheat Work package 1: The European heat market. Final report. 10.6 EUR/GJ i s the price of district heat. http://www.solarthermalworld.org/files/Ecoheatcool%20WP1%20Web.pdf?download
  property true value 0.000391508
    allocation property applied in "true value" allocation // value calculated from true value relation
- electricity, for reuse in municipal waste incineration only: 0 kWh; CPC 17100: Electrical energy; By-product classification allocatable product; pedigree (1,1,1,1,1)
  (same comment as for heat, for reuse in municipal waste incineration only)
  production volume 163.136 kWh
  property exergy 3.6 MJ; name E_el_prod_MSWI_exergy
    This exergy property is based on the exergy content of the product.
  property true value relation 3.6; name E_el_prod_MSWI_true_value_relation
    property to calculate "true value" from
  property price 0.1 EUR2005; name E_el_prod_MSWI_price_EUR2005
    Estimated to be the same price as in case of electricity, medium voltage.
  property true value 0.00110295
    (same comment as for heat, for reuse in municipal waste incineration only)
- aluminium, wrought alloy: 0 kg; source European Aluminium Association 2008; By-product classification allocatable product; CPC 4153: Semi-finished products of aluminium or aluminium alloys; pedigree (1,1,1,1,1)
  production volume 3599.92 kg
  property price 1.44 EUR2005; name secondaryAluminiumOutput_price_EUR2005
  properties: dry mass 1 kg, wet mass 1 kg, carbon content, fossil 0, water content 0, carbon content, non-fossil 0, water in wet mass 0 kg, carbon content 0, carbon allocation 0 kg, true value 0.305479
- copper: 0 kg; By-product classification allocatable product; CPC 41413: Refined copper and copper alloys, unwrought; master alloys of copper; pedigree (1,1,1,1,1)
  Measured value. Based on reported copper waste send to recycling.
  production volume 6.52969e-6 kg
  property price 5.52 EUR2005; name copper_price_EUR2005
  properties: dry mass 1 kg, carbon content, non-fossil 0, water in wet mass 0 kg, water content 0, carbon content, fossil 0, wet mass 1 kg, carbon content 0, carbon allocation 0 kg, true value 3.53268e-9
- aluminium alloy, AlLi: 0 kg; By-product classification allocatable product; CPC 41431: Unwrought aluminium
  reference flow
  production volume 0.767261 kg
  property price 3.6 EUR2005; name ref_price_EUR2005
    Literature value (http://www.economist.com/news/business/21576714-mining-industry-has-enriched-chile-its-future-precarious-copper-solution). Average price between 20015 and 2013.
  property carbon content 0
    carbon content on a dry matter basis (reserved; not for manual entry)
  property true value 0.000270719
    allocation property applied in "true value" allocation // value calculated from revenue
  properties: carbon content, non-fossil 0, carbon content, fossil 0, dry mass 1 kg, wet mass 1 kg, water in wet mass 0 kg, carbon allocation 0 kg
- ground granulated blast furnace slag: 0 kg; By-product classification allocatable product; CPC 37440: Portland cement, aluminous cement, slag cement and similar hydraulic cements, except in the form of clinkers
  Functional unit of LCI by Marceau & VanGeem (2003) was 1 short ton of slag cement (GGBFS) output which was converted to 907.18 kg for the present inventory.
  production volume 0.0878686 kg
  property water content 0; name GGBFS_water_content
  property carbon content, non-fossil 0; name GGBFS_C_content_non_fossil
  property water in wet mass 0 kg; name GGBFS_WWM
  property carbon content, fossil 0; name GGBFS_C_content_fossil
    Industry value; Arcelor Mittal, chemical composition of blast furnace slag (http://www.cst.com.br/english/products/co_products/catalog_products/blast_slag/blast_slag.asp, accessed: 20121003).
  property price 0.0615 EUR2005; name GGBFS_price_EUR2005
    2005 import and export prices (total trades (USD) divided by total weight (kg) in China, India, USA, Japan, Russia and Europe, major producers and consumers (http://www.cementchina.net/freport/showfre.asp?id=749) from UN Commodity Trade Statistics Database (http://data.un.org/Explorer.aspxDatabase [Accessed 2 July 2010]). Commodity: Cement (portland, aluminious, slag or hydraulic)
  property carbon content 0
    carbon content on a dry matter basis (reserved; not for manual entry)
  property true value 5.29641e-7
    allocation property applied in "true value" allocation // value calculated from revenue
  properties: wet mass 1 kg, dry mass 1 kg, carbon allocation 0 kg
- zinc concentrate: 0 kg; CPC 14290: Other non-ferrous metal ores and concentrates (other than uranium or thorium ores and concentrates); By-product classification allocatable product
  Calculated value from the knowledge of the properties of both products.
  production volume 1.34918e-8 kg
  property price 0.38 EUR2005; name ByP_price_EUR2005
    Temporary price data. Calculated as 90% of purchasers price based on: Zinc content in concentrate 53%. Concentrate price per kg Zn 86.5% of refined Zn price (13.5% treatment charges according to CHR Metals Limited 2005: Dynamic cost curves. http://www.minecost.com/dynamic.pdf). 2004 zinc price from USGS (2007) Mineral commodity summaries 2007. <http://minerals.usgs.gov/minerals/pubs/mcs/2007/mcs2007.pdf> [Accessed 25 May 2010]
  property zinc content 0.53; name zinc_C_zinc_concentrate
    Zinc content on a dry matter basis. Value taken from teh "zinc mine operation" /GLO dataset.
  property dry mass 1 kg; name DM_zinc_concentrate
  property carbon content 0
    carbon content on a dry matter basis (reserved; not for manual entry)
  property true value 5.0249e-13
    allocation property applied in "true value" allocation // value calculated from revenue
  properties: wet mass 1 kg, water content 0, carbon content, non-fossil 0, carbon content, fossil 0, water in wet mass 0 kg, carbon allocation 0 kg
- granulated blast furnace slag: 0 kg; By-product classification allocatable product
  production volume 0.363766 kg
  property wet mass 1 kg; name GBFS_WM
  property dry mass 1 kg; name GBFS_DM
  property price 0.0615 EUR2005; name GBFS_price_EUR2005
    (same comment as for ground granulated blast furnace slag)
  property water in wet mass 0 kg; name GBFS_WWM
  property carbon content, non-fossil 0; name GBFS_C_content_non_fossil
    biogene carbon content on a dry matter basis
  property carbon content, fossil 0; name GBFS_C_content_fossil
    fossil carbon content on a dry matter basis
  property water content 0; name GBFS_water_content
  property carbon content 0
    carbon content on a dry matter basis (reserved; not for manual entry)
  property true value 2.19265e-6
    allocation property applied in "true value" allocation // value calculated from revenue
  properties: carbon allocation 0 kg
- aluminium alloy, metal matrix composite: 0 kg; CPC 41431: Unwrought aluminium; By-product classification allocatable product
  reference flow
  production volume 0.62033 kg
  property water content 0; name Al_MMC_water_content
  property carbon content, non-fossil 0; name Al_MMC_C_content_non_fossil
    biogene carbon content on a dry matter basis
  property price 6.2 EUR2005; name ref_price_EUR2005
    (same comment as for aluminium alloy, AlLi)
  property carbon content, fossil 0.0475; name Al_MMC_C_content_fossil
    fossil carbon content on a dry matter basis
  property dry mass 1 kg; name Al_MMC_DM
  property water in wet mass 0 kg; name Al_MMC_WWM
  property wet mass 1 kg; name Al_MMC_WM
  property carbon content 0.0475
    carbon content on a dry matter basis (reserved; not for manual entry)
  property true value 0.000376953
    allocation property applied in "true value" allocation // value calculated from revenue
  properties: carbon allocation 0.0475 kg
- aluminium, primary, cast alloy slab from continuous casting: 0 kg; CPC 41431: Unwrought aluminium; By-product classification allocatable product
  reference flow
  production volume 39.7518 kg
  property price 3.67 EUR2005; name ref_price_EUR2005
    Estimated to be the same as in case of aluminium, primary, liquid.
  property carbon content 0
    carbon content on a dry matter basis (reserved; not for manual entry)
  property true value 0.0142987
    allocation property applied in "true value" allocation // value calculated from revenue
  properties: wet mass 1 kg, carbon content, fossil 0, water content 0, carbon content, non-fossil 0, water in wet mass 0 kg, dry mass 1 kg, carbon allocation 0 kg

## Inputs from technosphere
All rows: source F. Habermacher 2011
- heat, central or small-scale, other than natural gas: 1.3888 MJ; lognormal variance with pedigree 0.0058, pedigree (1,4,3,4,2)
  This dataset is based on direct information from the Swiss manufacturer Brusa.
- aluminium scrap, new: 0 kg; pedigree (1,1,1,1,1)
  Aluminium scrap from production process.
  production volume 0 kg
    Calculated from production volume of reference product using the relative outputs.
  properties: price 0.806 EUR2005, dry mass 1 kg, wet mass 1 kg
- copper: 0.226728 kg; lognormal variance with pedigree 0.0058, pedigree (1,4,3,4,2)
  This dataset is based on direct information from the Swiss manufacturer Brusa.
  properties: dry mass 1 kg, wet mass 1 kg
- wire drawing, copper: 0.226728 kg; lognormal variance with pedigree 0.0058, pedigree (1,4,3,4,2)
  This dataset is based on direct information from the Swiss manufacturer Brusa.
- electricity, low voltage: 0.000514428 kWh; lognormal variance with pedigree 0.0058, pedigree (1,4,3,4,2)
  This dataset is based on direct information from the Swiss manufacturer Brusa.
- sheet rolling, steel: 0.0794187 kg; lognormal variance with pedigree 0.0058, pedigree (1,4,3,4,2)
  This dataset is based on direct information from the Swiss manufacturer Brusa.
- polystyrene, high impact: 0.0152663 kg; lognormal variance with pedigree 0.0058, pedigree (1,4,3,4,2)
  This dataset is based on direct information from the Swiss manufacturer Brusa.
  properties: carbon content, fossil 0.923077, dry mass 1 kg, wet mass 1 kg
- sheet rolling, aluminium: 0.576426 kg; lognormal variance with pedigree 0.0058, pedigree (1,4,3,4,2)
  This dataset is based on direct information from the Swiss manufacturer Brusa.
- steel, low-alloyed, hot rolled: 0.0794187 kg; lognormal variance with pedigree 0.0058, pedigree (1,4,3,4,2)
  This dataset is based on direct information from the Swiss manufacturer Brusa.
  properties: dry mass 1 kg, wet mass 1 kg, carbon content, fossil 0.005
- aluminium oxide, non-metallurgical: 0 kg; pedigree (1,1,1,1,1)
  This dataset is based on direct information from the Swiss manufacturer Brusa.
- brass: 0 kg; pedigree (1,1,1,1,1)
  This dataset is based on direct information from the Swiss manufacturer Brusa.
  properties: wet mass 1 kg, dry mass 1 kg
- aluminium, wrought alloy: 0.576426 kg; lognormal variance with pedigree 0.0058, pedigree (1,4,3,4,2)
  This dataset is based on direct information from the Swiss manufacturer Brusa.
  properties: wet mass 1 kg, dry mass 1 kg
- resistor, surface-mounted: 0.00768568 kg; lognormal variance with pedigree 0.0058, pedigree (1,4,3,4,2)
  This dataset is based on direct information from the Swiss manufacturer Brusa.
  properties: carbon content, fossil 0.00893558, dry mass 1 kg, wet mass 1 kg
- resistor, auxilliaries and energy use: 0.0294618 kg; lognormal variance with pedigree 0.0058, pedigree (1,4,3,4,2)
  This dataset is based on direct information from the Swiss manufacturer Brusa.
- printed wiring board, surface mounted, unspecified, Pb free: 0.119897 kg; lognormal variance with pedigree 0.0058, pedigree (1,4,3,4,2)
  This dataset is based on direct information from the Swiss manufacturer Brusa.
  properties: dry mass 1 kg, carbon content, fossil 0.132522, wet mass 1 kg
- aluminium scrap, new: -0.0135927, -0.101692 kg (2 entries); lognormal variance with pedigree 0.0064, pedigree (2,4,3,4,2)
  Aluminium scrap from production process.
  production volume 4050 kg
- aluminium oxide, non-metallurgical: 0.025459, 0.0043102 kg (2 entries); lognormal variance with pedigree 0.0058, pedigree (1,4,3,4,2)
  This dataset is based on direct information from the Swiss manufacturer Brusa.
  properties: dry mass 1 kg, wet mass 1 kg
- brass: 0.000386846, 0.0769824 kg (2 entries); lognormal variance with pedigree 0.0058, pedigree (1,4,3,4,2)
  This dataset is based on direct information from the Swiss manufacturer Brusa.

## Sampling procedure
Data on materials and technology has been provided directly by the Swiss manufacturer Brusa.

## Extrapolations
The data has been gathered between 2010 and 2011 and is expected, due to the high quality of the manufacturer, to be representative at least until 2015.
