# treatment of wastewater, average, capacity 1.1E10l/year

Dataset: EcoSpold 2, unit process
Geography: CA-QC
Time period: 1994-01-01 to 2019-12-31
Technology level: current
Classification: EcoSpold01Categories: waste management/wastewater treatment
Classification: ISIC rev.4 ecoinvent: 3700:Sewerage
Tags: Treatment
Scenario: Business-as-Usual
System model: Allocation at the point of substitution
Generated by: Marylène Dussault
Published in: Doka G. 2008
Database: ecoinvent
isCopyrightProtected: true
accessRestrictedTo: 1

## General comment
This dataset represents activated sludge wastewater treatment. This dataset is a copy of the Global version and is used to approximate activated sludage and biofiltration technolgie in Quebec. This dataset should be replace as soon as data for these technologies in the Quebec region become available. Only the production volume have been modified and the sewer process have been removed as it is included in the market process. Wastewater purified in a moderatly large municipal wastewater treatment plant (capacity class 2), with an average capacity size of 71100 per-captia-equivalents PCE.
Wastewater contains (in kg/m3): COD: 0.1556 (GSD=122.5%); BOD: 0.1036 (GSD=122.5%); DOC: 0.04575 (GSD=122.5%); TOC: 0.0673 (GSD=122.5%); SO4-S: 0.044 (GSD=122.5%); S part.: 0.002 (GSD=122.5%); NH4-N: 0.01495 (GSD=122.5%); NO3-N: 0.00105 (GSD=122.5%); NO2-N: 0.0004 (GSD=122.5%); N part.: 0.003279 (GSD=122.5%); N org. solv.: 0.008392 (GSD=122.5%); PO4-P: 0.002459 (GSD=122.5%); P part.: 0.0006147 (GSD=122.5%); Cl: 0.03003 (GSD=224.1%); F: 0.00003277 (GSD=224.1%); As: 0.0000009 (GSD=224.1%); Cd: 0.0000002806 (GSD=223.8%); Co: 0.000001618 (GSD=223.8%); Cr: 0.00001223 (GSD=223.8%); Cu: 0.00003744 (GSD=223.8%); Hg: 0.0000002 (GSD=223.8%); Mn: 0.000053 (GSD=224.1%); Mo: 0.0000009574 (GSD=223.8%); Ni: 0.000006589 (GSD=223.8%); Pb: 0.000008631 (GSD=223.8%); Sn: 0.0000034 (GSD=224.1%); Zn: 0.0001094 (GSD=223.8%); Si: 0.003126 (GSD=224.1%); Fe: 0.007093 (GSD=224.1%); Ca: 0.05083 (GSD=224.1%); Al: 0.001038 (GSD=224.1%); K: 0.0003989 (GSD=224.1%); Mg: 0.005707 (GSD=224.1%); Na: 0.002186 (GSD=224.1%);

## Included activities end
Infrastructure materials for municipal wastewater treatment plant, transports, dismantling. Land use burdens.

## Geography
Specific to the technology mix encountered in Switzerland in 2000. Well applicable to modern treatment practices in Europe, North America or Japan.

## Technology
Three stage wastewater treatment (mechanical, biological, chemical) including sludge digestion (fermentation) according to the average technology in Switzerland

## Parameters
- fraction, process water, to air: 0.1 dimensionless; lognormal variance with pedigree 0.092025, pedigree (4,4,3,2,4)

## Reference product
- wastewater, average: -1 m3; name WWT; CPC 39920: Sewage sludge; By-product classification Waste
  EcoSpold01Location=CH
  production volume 1.86225e8 m3; name PV_WWT
    Literature value. Represents volume of treated wastewater from lagoon facility during a year in Québec. Calculated from Quebec government published data in annual report on wastewater treatments in the region (MAMOT, 2011). Includes all types of lagoon technology (aerated, facultative, non-aerated, etc.).
  property carbon content, non-fossil 0.194039
    0.0673 kg TOC/m3 (Tab A.17, ecoinvent v2.2 report 13_I). TOC was considered as Total Carbon.
  property price 0 EUR2005; name WWT_price_EUR2005
    Waste products are assigned a price of zero as they are assumed to require further treatment.
  property carbon content 0.194039
    carbon content on a dry matter basis (reserved; not for manual entry)
  properties: water in wet mass 999.653 kg, wet mass 1000 kg, water content 2882.2, carbon content, fossil 0, dry mass 0.346837 kg, carbon allocation 0.0673 kg

## By-products
- heat, for reuse in municipal waste incineration only: 0 MJ; CPC 17300: Steam and hot water; By-product classification allocatable product; pedigree (1,1,1,1,1)
  Net electricity generated from this waste and used in internal MSWI plant energy redistribution.
  Uncertainty: uncertainty is calculated from uncertainties in waste composition and uncertainties in energy efficiency and the uncertainty in internal energy demand
  property exergy 0.1842 MJ; name E_th_prod_MSWI_exergy
    This exergy property is based on the exergy content of the product.
  property price 0.0106 EUR2005; name E_th_prod_MSWI_price_EUR2005
    Average European district heat price from Ecoheatcool and Euroheat 2005-2006, Ecoheat Work package 1: The European heat market. Final report. 10.6 EUR/GJ i s the price of district heat. http://www.solarthermalworld.org/files/Ecoheatcool%20WP1%20Web.pdf?download
  property true value relation 0.1842; name E_th_prod_MSWI_true_value_relation
    property to calculate "true value" from
- electricity, for reuse in municipal waste incineration only: 0 kWh; CPC 17100: Electrical energy; By-product classification allocatable product; pedigree (1,1,1,1,1)
  (same comment as for heat, for reuse in municipal waste incineration only)
  property price 0.1 EUR2005; name E_el_prod_MSWI_price_EUR2005
    Estimated to be the same price as in case of electricity, medium voltage.
  property exergy 3.6 MJ; name E_el_prod_MSWI_exergy
    This exergy property is based on the exergy content of the product.
  property true value relation 3.6; name E_el_prod_MSWI_true_value_relation
    property to calculate "true value" from

## Inputs from technosphere
- sodium hydroxide, without water, in 50% solution state: 0.00035213 kg; lognormal variance with pedigree 0.092, pedigree (1,1,5,5,1)
  EcoSpold01Location=RER
  burden from sludge incineration. Uncertainty calculated from wastewater composition and treatment model
  properties: dry mass 1 kg, wet mass 1 kg
- iron sulfate: 0.01166 kg; lognormal variance with pedigree 0.102, pedigree (1,1,5,5,1)
  direct wastewater treatment plant burden. Uncertainty calculated from wastewater composition and treatment model
  EcoSpold01Location=RER
  properties: wet mass 1 kg, dry mass 1 kg
- waste plastic, mixture: -0.0155 kg; name w_plastic; lognormal variance with pedigree 0.042, pedigree (1,1,5,5,1)
  direct wastewater treatment plant burden. Uncertainty calculated from wastewater composition and treatment model
  EcoSpold01Location=CH
  production volume 2.88648e6 kg; = (-1)*w_plastic/WWT*PV_WWT
    Calculated from the production volume of sewage, average in proportion to the respective output amounts.
  property price 0 EUR2005; name w_plastic_price_EUR2005
  properties: carbon content, fossil 0.747344, dry mass 0.847 kg, wet mass 1 kg, water content 0.180638
  note on carbon content, fossil: C content in 1 kg DM was calculated using data in Tab A.2, ecoinvent v2.2 report 13_I
- aluminium sulfate, powder: 0.0031512 kg; lognormal variance with pedigree 0.102, pedigree (1,1,5,5,1)
  EcoSpold01Location=RER
  direct wastewater treatment plant burden. Uncertainty calculated from wastewater composition and treatment model
  properties: wet mass 1 kg, dry mass 1 kg
- process-specific burdens, residual material landfill: 0.0037022 kg; lognormal variance with pedigree 0.072, pedigree (1,1,5,5,1)
  EcoSpold01Location=CH
  burden from sludge incineration. Uncertainty calculated from wastewater composition and treatment model
- wastewater treatment facility, capacity 1.1E10l/year: 1.9883e-9 unit; lognormal variance with pedigree 0.042, pedigree (1,1,5,5,1)
  uncertainty heeded in exchanges of the module;activityLink introduced to establish a direct link to the corresponding regional supply of this product
  EcoSpold01Location=CH
- heat, district or industrial, other than natural gas: 0.10875 MJ; lognormal variance with pedigree 0.052, pedigree (1,1,5,5,1)
  burden from sludge incineration. Uncertainty calculated from wastewater composition and treatment model
  EcoSpold01Location=CH
- process-specific burdens, slag landfill: 0.023613 kg; lognormal variance with pedigree 0.072, pedigree (1,1,5,5,1)
  (same comment as for heat, district or industrial, other than natural gas)
- waste cement, hydrated: -0.0037022 kg; name w_cement; lognormal variance with pedigree 0.082, pedigree (1,1,5,5,1)
  (same comment as for heat, district or industrial, other than natural gas)
  production volume 689440 kg; = (-1)*w_cement/WWT*PV_WWT
    (same comment as for waste plastic, mixture)
  property price 0 EUR2005; name w_cement_price_EUR2005
  properties: dry mass 1 kg, wet mass 1 kg
- municipal waste incineration facility: 3.2417e-11 unit; lognormal variance with pedigree 0.042, pedigree (1,1,5,5,1)
  (same comment as for heat, district or industrial, other than natural gas)
- slag landfill: 4.1979e-11 unit; lognormal variance with pedigree 0.072, pedigree (1,1,5,5,1)
  (same comment as for process-specific burdens, residual material landfill)
- iron (III) chloride, without water, in 40% solution state: 0.015947 kg; lognormal variance with pedigree 0.102, pedigree (1,1,5,5,1)
  EcoSpold01Location=CH
  direct wastewater treatment plant burden plus burden from sludge incineration. Uncertainty calculated from wastewater composition and treatment model
  properties: dry mass 1 kg, wet mass 1 kg
- cement, unspecified: 0.0014809 kg; lognormal variance with pedigree 0.082, pedigree (1,1,5,5,1)
  (same comment as for heat, district or industrial, other than natural gas)
  properties: dry mass 1 kg, wet mass 1 kg
- residual material landfill: 7.7129e-12 unit; lognormal variance with pedigree 0.072, pedigree (1,1,5,5,1)
  (same comment as for heat, district or industrial, other than natural gas)
- quicklime, milled, packed: 1.2537e-6 kg; lognormal variance with pedigree 0.082, pedigree (1,1,5,5,1)
  (same comment as for heat, district or industrial, other than natural gas)
  properties: water content 0.010101, wet mass 1 kg, dry mass 0.99 kg
- chromium oxide, flakes: 4.2095e-8 kg; lognormal variance with pedigree 0.542, pedigree (1,1,5,5,1)
  (same comment as for sodium hydroxide, without water, in 50% solution state)
  properties: dry mass 1 kg, wet mass 1 kg
- process-specific burdens, municipal waste incineration: 0.12967 kg; lognormal variance with pedigree 0.042, pedigree (1,1,5,5,1)
  (same comment as for heat, district or industrial, other than natural gas)
- chemical, inorganic: 6.5839e-7 kg; lognormal variance with pedigree 0.082, pedigree (1,1,5,5,1)
  burden from sludge incineration. Uncertainty calculated from wastewater composition and treatment model
  EcoSpold01Location=GLO
  properties: carbon content, fossil 0.003, dry mass 1 kg, wet mass 1 kg
  note on carbon content, fossil: This dataset is an unweighted average of 20 inorganic substances (listed in Tab 88.1, ecoinvent v2.2 report 8, part II), being part of the top100 chemicals included in this database. The C-content has also been calculated as an unweighted average of the C content of the substances composing this dataset.
- electricity, low voltage: 0.20571 kWh; lognormal variance with pedigree 0.062, pedigree (1,1,5,5,1)
  (same comment as for waste plastic, mixture)
- chemical, organic: 5.2547e-7 kg; lognormal variance with pedigree 0.432, pedigree (1,1,5,5,1)
  EcoSpold01Location=GLO
  burden from sludge incineration. Uncertainty calculated from wastewater composition and treatment model
  properties: dry mass 1 kg, carbon content, fossil 0.628, wet mass 1 kg
  note on carbon content, fossil: This dataset is an unweighted average of 20 organic substances (listed in Tab 88.1, ecoinvent v2.2 report 8, part II), being part of the top100 chemicals included in this database. The C-content has also been calculated as an unweighted average of the C content of the substances composing this dataset.
- waste graphical paper: -0.0155 kg; name w_paper; lognormal variance with pedigree 0.042, pedigree (1,1,5,5,1)
  (same comment as for waste plastic, mixture)
  production volume 2.88648e6 kg; = (-1)*w_paper/WWT*PV_WWT
    (same comment as for waste plastic, mixture)
  property price 0 EUR2005; name w_paper_price_EUR2005
  properties: dry mass 0.888 kg, wet mass 1 kg, water content 0.126126, carbon content, non-fossil 0.454955
- electricity, high voltage: 0.018642 kWh; lognormal variance with pedigree 0.492, pedigree (1,1,5,5,1)
  (same comment as for process-specific burdens, residual material landfill)
- heat, district or industrial, natural gas: 0.00632448 MJ; lognormal variance with pedigree 0.222, pedigree (1,1,5,5,1)
  (same comment as for sodium hydroxide, without water, in 50% solution state)
- hydrochloric acid, without water, in 30% solution state: 3.9503e-7 kg; lognormal variance with pedigree 0.082, pedigree (1,1,5,5,1)
  burden from sludge incineration. Uncertainty calculated from wastewater composition and treatment model
  EcoSpold01Location=RER
  properties: wet mass 1 kg, dry mass 1 kg
- ammonia, liquid: 7.2058e-5 kg; lognormal variance with pedigree 0.222, pedigree (1,1,5,5,1)
  (same comment as for process-specific burdens, residual material landfill)
  properties: dry mass 1 kg, wet mass 1 kg
- liquid manure spreading, by vacuum tanker: 0.00032716 m3; lognormal variance with pedigree 0.042, pedigree (1,1,5,5,1)
  burden from sludge spreading. Uncertainty calculated from wastewater composition and treatment model;activityLink introduced to establish a direct link to the corresponding regional supply of this product
  EcoSpold01Location=CH
- titanium dioxide: 2.0626e-6 kg; lognormal variance with pedigree 0.542, pedigree (1,1,5,5,1)
  (same comment as for sodium hydroxide, without water, in 50% solution state)
  properties: dry mass 1 kg, wet mass 1 kg

## Emissions to nature
- Nitrate [water, surface water]: 0.048305 kg; lognormal variance with pedigree 0.062, pedigree (1,1,5,5,1)
  sewer overload discharge plus direct wastewater treatment plant emission plus emission from sludge incineration. Uncertainty calculated from wastewater composition and treatment model
- Arsenic, ion [water, surface water]: 7.5922e-7 kg; lognormal variance with pedigree 0.612, pedigree (1,1,5,5,1)
  (same comment as for Nitrate)
- Phosphate [water, surface water]: 0.0027041 kg; lognormal variance with pedigree 0.082, pedigree (1,1,5,5,1)
  sewer overload discharge plus direct wastewater treatment plant emission plus emission from sludge incineration plus emission from sludge spreading. Uncertainty calculated from wastewater composition and treatment model
- Tin [soil, agricultural]: 7.6487e-7 kg; lognormal variance with pedigree 0.712, pedigree (1,1,5,5,1)
  emission from sludge spreading. Uncertainty calculated from wastewater composition and treatment model
- Nitrite [water, surface water]: 0.000644 kg; lognormal variance with pedigree 0.082, pedigree (1,1,5,5,1)
  direct wastewater treatment plant emission. Uncertainty calculated from wastewater composition and treatment model
- COD, Chemical Oxygen Demand [water, ground-, long-term]: 0.00026168 kg; lognormal variance with pedigree 0.112, pedigree (1,1,5,5,1)
  emission from sludge incineration. Uncertainty calculated from wastewater composition and treatment model
- Iron, ion [water, ground-, long-term]: 0.003812 kg; lognormal variance with pedigree 0.992, pedigree (1,1,5,5,1)
  (same comment as for COD, Chemical Oxygen Demand)
- Mercury [air, urban air close to ground]: 3.3683e-13 kg; lognormal variance with pedigree 0.742, pedigree (1,1,5,5,1)
  direct digester gas emission plus emission from sludge incineration. Uncertainty calculated from wastewater composition and treatment model
- Aluminium [air, urban air close to ground]: 1.4113e-6 kg; lognormal variance with pedigree 0.472, pedigree (1,1,5,5,1)
  (same comment as for Mercury)
- Molybdenum [water, ground-, long-term]: 2.392e-7 kg; lognormal variance with pedigree 0.712, pedigree (1,1,5,5,1)
  (same comment as for COD, Chemical Oxygen Demand)
- Manganese [water, ground-, long-term]: 1.3784e-5 kg; lognormal variance with pedigree 0.872, pedigree (1,1,5,5,1)
  (same comment as for COD, Chemical Oxygen Demand)
- TOC, Total Organic Carbon [water, surface water]: 0.0072994 kg; lognormal variance with pedigree 0.082, pedigree (1,1,5,5,1)
  (same comment as for Nitrate)
- Nickel [soil, agricultural]: 1.003e-6 kg; lognormal variance with pedigree 0.712, pedigree (1,1,5,5,1)
  (same comment as for Tin)
- Chromium [air, urban air close to ground]: 2.7317e-13 kg; lognormal variance with pedigree 0.802, pedigree (1,1,5,5,1)
  (same comment as for Mercury)
- Nitrogen oxides [air, urban air close to ground]: 0.00069993 kg; lognormal variance with pedigree 0.082, pedigree (1,1,5,5,1)
  (same comment as for Mercury)
- Fluoride [water, surface water]: 3.2769e-5 kg; lognormal variance with pedigree 0.672, pedigree (1,1,5,5,1)
  (same comment as for Nitrate)
- Phosphate [water, ground-, long-term]: 0.00015578 kg; lognormal variance with pedigree 4.252, pedigree (1,1,5,5,1)
  (same comment as for COD, Chemical Oxygen Demand)
- COD, Chemical Oxygen Demand [water, surface water]: 0.030152 kg; lognormal variance with pedigree 0.082, pedigree (1,1,5,5,1)
  (same comment as for Nitrate)
- Nickel, ion [water, ground-, long-term]: 1.4891e-6 kg; lognormal variance with pedigree 0.712, pedigree (1,1,5,5,1)
  (same comment as for COD, Chemical Oxygen Demand)
- Manganese [water, surface water]: 2.6898e-5 kg; lognormal variance with pedigree 0.662, pedigree (1,1,5,5,1)
  (same comment as for Nitrate)
- Nickel [air, urban air close to ground]: 6.8642e-14 kg; lognormal variance with pedigree 0.812, pedigree (1,1,5,5,1)
  (same comment as for Mercury)
- Copper, ion [water, ground-, long-term]: 1.3747e-5 kg; lognormal variance with pedigree 0.732, pedigree (1,1,5,5,1)
  (same comment as for COD, Chemical Oxygen Demand)
- Magnesium [water, surface water]: 0.0051484 kg; lognormal variance with pedigree 0.672, pedigree (1,1,5,5,1)
  (same comment as for Nitrate)
- Cobalt [water, surface water]: 8.2109e-7 kg; lognormal variance with pedigree 0.662, pedigree (1,1,5,5,1)
  (same comment as for Nitrate)
- Chromium VI [water, surface water]: 6.3282e-6 kg; lognormal variance with pedigree 0.642, pedigree (1,1,5,5,1)
  (same comment as for Nitrate)
- Lead [soil, agricultural]: 2.9713e-6 kg; lognormal variance with pedigree 0.712, pedigree (1,1,5,5,1)
  (same comment as for Tin)
- Cobalt [air, urban air close to ground]: 1.5513e-14 kg; lognormal variance with pedigree 0.812, pedigree (1,1,5,5,1)
  (same comment as for Mercury)
- Water [water, unspecified]: 0.9 m3; lognormal variance with pedigree 0.0827, pedigree (2,2,5,5,1)
  Calculated value based on water balance.
  property carbon content, fossil 0; name C_content_fossil
  property water in wet mass 1000 kg; name WWM
  property wet mass 1000 kg; name WM
  property carbon content, non-fossil 0; name C_content_non_fossil
  property dry mass 0 kg; name DM
- Zinc, ion [water, ground-, long-term]: 7.1834e-7 kg; lognormal variance with pedigree 5.512, pedigree (1,1,5,5,1)
  (same comment as for COD, Chemical Oxygen Demand)
- Chromium VI [water, ground-, long-term]: 3.911e-7 kg; lognormal variance with pedigree 1.092, pedigree (1,1,5,5,1)
  (same comment as for COD, Chemical Oxygen Demand)
- Calcium, ion [water, surface water]: 0.045858 kg; lognormal variance with pedigree 0.672, pedigree (1,1,5,5,1)
  (same comment as for Nitrate)
- Silicon [water, surface water]: 0.00018788 kg; lognormal variance with pedigree 0.572, pedigree (1,1,5,5,1)
  (same comment as for Nitrate)
- Chromium, ion [water, surface water]: 1.1775e-8 kg; lognormal variance with pedigree 0.722, pedigree (1,1,5,5,1)
  (same comment as for COD, Chemical Oxygen Demand)
- Water [air, unspecified]: 0.1 m3; lognormal variance with pedigree 0.0827, pedigree (2,2,5,5,1)
  Calculated value based on water balance.
- Carbon dioxide, non-fossil [air, urban air close to ground]: 0.19253 kg; lognormal variance with pedigree 0.062, pedigree (1,1,5,5,1)
  direct wastewater treatment plant emission plus direct digester gas emission plus emission from sludge incineration. Uncertainty calculated from wastewater composition and treatment model
- Zinc [soil, agricultural]: 2.9219e-5 kg; lognormal variance with pedigree 0.712, pedigree (1,1,5,5,1)
  (same comment as for Tin)
- Magnesium [soil, agricultural]: 0.00021652 kg; lognormal variance with pedigree 0.712, pedigree (1,1,5,5,1)
  (same comment as for Tin)
- Sulfate [water, ground-, long-term]: 0.002367 kg; lognormal variance with pedigree 0.102, pedigree (1,1,5,5,1)
  (same comment as for COD, Chemical Oxygen Demand)
- Arsenic, ion [water, ground-, long-term]: 6.5411e-8 kg; lognormal variance with pedigree 0.712, pedigree (1,1,5,5,1)
  (same comment as for COD, Chemical Oxygen Demand)
- Copper [air, urban air close to ground]: 1.2554e-10 kg; lognormal variance with pedigree 0.762, pedigree (1,1,5,5,1)
  (same comment as for Mercury)
- Sulfate [water, surface water]: 0.1449 kg; lognormal variance with pedigree 0.082, pedigree (1,1,5,5,1)
  (same comment as for Nitrate)
- Iron, ion [water, surface water]: 0.0036024 kg; lognormal variance with pedigree 0.662, pedigree (1,1,5,5,1)
  (same comment as for Nitrate)
- BOD5, Biological Oxygen Demand [water, surface water]: 0.0098229 kg; lognormal variance with pedigree 0.072, pedigree (1,1,5,5,1)
  (same comment as for Nitrate)
- Phosphorus [air, urban air close to ground]: 1.3301e-6 kg; lognormal variance with pedigree 0.102, pedigree (1,1,5,5,1)
  (same comment as for Mercury)
- Cobalt [water, ground-, long-term]: 4.2779e-7 kg; lognormal variance with pedigree 0.712, pedigree (1,1,5,5,1)
  (same comment as for COD, Chemical Oxygen Demand)
- Chromium [soil, agricultural]: 2.3299e-6 kg; lognormal variance with pedigree 0.712, pedigree (1,1,5,5,1)
  (same comment as for Tin)
- Carbon monoxide, non-fossil [air, urban air close to ground]: 0.00017096 kg; lognormal variance with pedigree 0.152, pedigree (1,1,5,5,1)
  (same comment as for Mercury)
- Arsenic [air, urban air close to ground]: 2.5337e-10 kg; lognormal variance with pedigree 0.732, pedigree (1,1,5,5,1)
  (same comment as for Mercury)
- DOC, Dissolved Organic Carbon [water, ground-, long-term]: 0.00010355 kg; lognormal variance with pedigree 0.112, pedigree (1,1,5,5,1)
  (same comment as for COD, Chemical Oxygen Demand)
- Zinc, ion [water, surface water]: 3.381e-5 kg; lognormal variance with pedigree 0.652, pedigree (1,1,5,5,1)
  (same comment as for Nitrate)
- Sodium, ion [water, surface water]: 0.002186 kg; lognormal variance with pedigree 0.672, pedigree (1,1,5,5,1)
  (same comment as for Nitrate)
- Molybdenum [water, surface water]: 5.3529e-7 kg; lognormal variance with pedigree 0.582, pedigree (1,1,5,5,1)
  (same comment as for Nitrate)
- Tin, ion [water, ground-, long-term]: 6.0968e-7 kg; lognormal variance with pedigree 1.262, pedigree (1,1,5,5,1)
  (same comment as for COD, Chemical Oxygen Demand)
- Ammonium, ion [water, surface water]: 0.011027 kg; lognormal variance with pedigree 0.062, pedigree (1,1,5,5,1)
  (same comment as for Nitrite)
- Zinc [air, urban air close to ground]: 7.5692e-10 kg; lognormal variance with pedigree 0.762, pedigree (1,1,5,5,1)
  (same comment as for Mercury)
- DOC, Dissolved Organic Carbon [water, surface water]: 0.0075378 kg; lognormal variance with pedigree 0.082, pedigree (1,1,5,5,1)
  (same comment as for Nitrate)
- Mercury [water, ground-, long-term]: 4.4099e-9 kg; lognormal variance with pedigree 2.972, pedigree (1,1,5,5,1)
  (same comment as for COD, Chemical Oxygen Demand)
- Silicon [soil, agricultural]: 0.0011366 kg; lognormal variance with pedigree 0.712, pedigree (1,1,5,5,1)
  (same comment as for Tin)
- NMVOC, non-methane volatile organic compounds, unspecified origin [air, urban air close to ground]: 2.2813e-6 kg; lognormal variance with pedigree 0.262, pedigree (1,1,5,5,1)
  direct digester gas emission. Uncertainty calculated from wastewater composition and treatment model
- Manganese [soil, agricultural]: 1.0095e-5 kg; lognormal variance with pedigree 0.712, pedigree (1,1,5,5,1)
  (same comment as for Tin)
- Nitrogen [water, surface water]: 0.00049 kg; lognormal variance with pedigree 0.082, pedigree (1,1,5,5,1)
  (same comment as for Nitrite)
- Calcium, ion [water, ground-, long-term]: 0.0026613 kg; lognormal variance with pedigree 0.712, pedigree (1,1,5,5,1)
  (same comment as for COD, Chemical Oxygen Demand)
- Copper [soil, agricultural]: 1.0725e-5 kg; lognormal variance with pedigree 0.712, pedigree (1,1,5,5,1)
  (same comment as for Tin)
- Magnesium [air, urban air close to ground]: 4.7278e-7 kg; lognormal variance with pedigree 0.732, pedigree (1,1,5,5,1)
  (same comment as for Mercury)
- Tin, ion [water, surface water]: 1.4223e-6 kg; lognormal variance with pedigree 0.662, pedigree (1,1,5,5,1)
  (same comment as for Nitrate)
- Methane, non-fossil [air, urban air close to ground]: 0.0005024 kg; lognormal variance with pedigree 0.142, pedigree (1,1,5,5,1)
  (same comment as for Mercury)
- Calcium [soil, agricultural]: 0.0019286 kg; lognormal variance with pedigree 0.712, pedigree (1,1,5,5,1)
  (same comment as for Tin)
- Nickel, ion [water, surface water]: 3.9966e-6 kg; lognormal variance with pedigree 0.662, pedigree (1,1,5,5,1)
  (same comment as for Nitrate)
- Calcium [air, urban air close to ground]: 5.0981e-6 kg; lognormal variance with pedigree 0.732, pedigree (1,1,5,5,1)
  (same comment as for Mercury)
- Magnesium [water, ground-, long-term]: 0.00031695 kg; lognormal variance with pedigree 0.712, pedigree (1,1,5,5,1)
  (same comment as for COD, Chemical Oxygen Demand)
- Chloride [water, surface water]: 0.040484 kg; lognormal variance with pedigree 0.482, pedigree (1,1,5,5,1)
  (same comment as for Nitrate)
- Iron [soil, agricultural]: 0.0051323 kg; lognormal variance with pedigree 0.162, pedigree (1,1,5,5,1)
  (same comment as for Tin)
- Cadmium, ion [water, surface water]: 1.4246e-7 kg; lognormal variance with pedigree 0.662, pedigree (1,1,5,5,1)
  (same comment as for Nitrate)
- Manganese [air, urban air close to ground]: 8.7161e-14 kg; lognormal variance with pedigree 0.832, pedigree (1,1,5,5,1)
  (same comment as for Mercury)
- Nitrate [water, ground-, long-term]: 5.1309e-5 kg; lognormal variance with pedigree 0.082, pedigree (1,1,5,5,1)
  (same comment as for COD, Chemical Oxygen Demand)
- Phosphate [water, ground-]: 1.4652e-5 kg; lognormal variance with pedigree 0.132, pedigree (1,1,5,5,1)
  (same comment as for Tin)
- Cadmium [air, urban air close to ground]: 4.7295e-12 kg; lognormal variance with pedigree 0.742, pedigree (1,1,5,5,1)
  (same comment as for Mercury)
- Silicon [water, ground-, long-term]: 0.0001565 kg; lognormal variance with pedigree 5.462, pedigree (1,1,5,5,1)
  (same comment as for COD, Chemical Oxygen Demand)
- Cyanide [air, urban air close to ground]: 1.2855e-6 kg; lognormal variance with pedigree 0.242, pedigree (1,1,5,5,1)
  (same comment as for COD, Chemical Oxygen Demand)
- Ammonia [air, urban air close to ground]: 0.00035613 kg; lognormal variance with pedigree 0.282, pedigree (1,1,5,5,1)
  direct digester gas emission plus emission from sludge incineration plus emission from sludge spreading. Uncertainty calculated from wastewater composition and treatment model
- Arsenic [soil, agricultural]: 7.5114e-8 kg; lognormal variance with pedigree 0.712, pedigree (1,1,5,5,1)
  (same comment as for Tin)
- BOD5, Biological Oxygen Demand [water, ground-, long-term]: 8.5596e-5 kg; lognormal variance with pedigree 0.112, pedigree (1,1,5,5,1)
  (same comment as for COD, Chemical Oxygen Demand)
- Potassium, ion [water, surface water]: 0.0003989 kg; lognormal variance with pedigree 0.672, pedigree (1,1,5,5,1)
  (same comment as for Nitrate)
- Aluminium [water, surface water]: 6.232e-5 kg; lognormal variance with pedigree 0.552, pedigree (1,1,5,5,1)
  (same comment as for Nitrate)
- Mercury [soil, agricultural]: 5.3452e-8 kg; lognormal variance with pedigree 0.712, pedigree (1,1,5,5,1)
  (same comment as for Tin)
- Sulfur [soil, agricultural]: 0.00059517 kg; lognormal variance with pedigree 0.112, pedigree (1,1,5,5,1)
  (same comment as for Tin)
- Tin [air, urban air close to ground]: 1.6092e-9 kg; lognormal variance with pedigree 0.732, pedigree (1,1,5,5,1)
  (same comment as for Mercury)
- TOC, Total Organic Carbon [water, ground-, long-term]: 0.00010355 kg; lognormal variance with pedigree 0.112, pedigree (1,1,5,5,1)
  (same comment as for COD, Chemical Oxygen Demand)
- Molybdenum [air, urban air close to ground]: 5.7835e-10 kg; lognormal variance with pedigree 0.732, pedigree (1,1,5,5,1)
  (same comment as for Mercury)
- Silicon [air, urban air close to ground]: 4.1957e-6 kg; lognormal variance with pedigree 0.732, pedigree (1,1,5,5,1)
  (same comment as for Mercury)
- Mercury [water, surface water]: 6.274e-8 kg; lognormal variance with pedigree 0.642, pedigree (1,1,5,5,1)
  (same comment as for Nitrate)
- Lead [air, urban air close to ground]: 1.7517e-10 kg; lognormal variance with pedigree 0.752, pedigree (1,1,5,5,1)
  (same comment as for Mercury)
- Molybdenum [soil, agricultural]: 1.8236e-7 kg; lognormal variance with pedigree 0.712, pedigree (1,1,5,5,1)
  (same comment as for Tin)
- Cobalt [soil, agricultural]: 3.0813e-7 kg; lognormal variance with pedigree 0.712, pedigree (1,1,5,5,1)
  (same comment as for Tin)
- Dinitrogen monoxide [air, urban air close to ground]: 0.00010363 kg; lognormal variance with pedigree 0.072, pedigree (1,1,5,5,1)
  direct wastewater treatment plant emission plus direct digester gas emission plus emission from sludge incineration plus emission from sludge spreading. Uncertainty calculated from wastewater composition and treatment model
- Sulfur dioxide [air, urban air close to ground]: 0.00088615 kg; lognormal variance with pedigree 0.102, pedigree (1,1,5,5,1)
  (same comment as for Mercury)
- Cadmium, ion [water, ground-, long-term]: 8.5046e-10 kg; lognormal variance with pedigree 6.902, pedigree (1,1,5,5,1)
  (same comment as for COD, Chemical Oxygen Demand)
- Aluminium [water, ground-, long-term]: 0.00066857 kg; lognormal variance with pedigree 0.462, pedigree (1,1,5,5,1)
  (same comment as for COD, Chemical Oxygen Demand)
- Lead [water, surface water]: 9.4873e-7 kg; lognormal variance with pedigree 0.602, pedigree (1,1,5,5,1)
  (same comment as for Nitrate)
- Iron [air, urban air close to ground]: 2.7169e-7 kg; lognormal variance with pedigree 0.202, pedigree (1,1,5,5,1)
  (same comment as for Mercury)
- Aluminium [soil, agricultural]: 0.00056973 kg; lognormal variance with pedigree 0.462, pedigree (1,1,5,5,1)
  (same comment as for Tin)
- Carbon [soil, agricultural]: 0.0066874 kg; lognormal variance with pedigree 0.102, pedigree (1,1,5,5,1)
  (same comment as for Tin)
- Lead [water, ground-, long-term]: 3.3568e-7 kg; lognormal variance with pedigree 6.922, pedigree (1,1,5,5,1)
  (same comment as for COD, Chemical Oxygen Demand)
- Copper, ion [water, surface water]: 9.7125e-6 kg; lognormal variance with pedigree 0.652, pedigree (1,1,5,5,1)
  (same comment as for Nitrate)
- Cadmium [soil, agricultural]: 5.3452e-8 kg; lognormal variance with pedigree 0.712, pedigree (1,1,5,5,1)
  (same comment as for Tin)

## Extrapolations
This dataset has been extrapolated from year 2000 to the year of the calculation (2019). The uncertainty has been adjusted accordingly.
