# tin mine operation

Dataset: EcoSpold 2, unit process
Geography: PE
Time period: 2010-01-01 to 2019-12-31
Technology level: current
Classification: ISIC rev.4 ecoinvent: 072:Mining of non-ferrous metal ores
Scenario: Business-as-Usual
System model: Allocation at the point of substitution
Share of production covered: 100 %
Generated by: Katherine Matos
Database: ecoinvent
isCopyrightProtected: true
accessRestrictedTo: 1

## General comment
This dataset describes the production of tin concentrate in Peru. It includes the mining and beneficiation of the minerals.
The mining operations are located in Puno (Peru). The data were collected from the available information reported on the Environmental Studies and closure plans of San Rafael mine. The water emissions were analyzed based on the Environmental monitoring reports of the mining company.
The system includes energy, reagents, water consumption, air and water emissions.

## Included activities start
The modeled system starts with the exploitation of the mineral ore in an underground mine.

## Included activities end
This dataset includes the mining and beneficiation of mineral (2.5% Sn). The system includes energy, reagents, water consumption, and air and water emissions. Industrial water is treated before it is discharged to the environment. Note that the water emissions are limited to what is reported onsite.

## Geography
Inputs and outputs for mining and beneficiation are from a Peruvian mining company located in Puno province.

## Technology
The modeled mine is an underground mine. The concentration plant has a capacity of 2,900 metric tons per day. Two concentration methods are used in the production process: gravimetric (84.21% concentrates) and direct flotation (15.79%) with an average water consumption of 23,78 m3 per dry metric ton of ore.

## Time period
The data was collected from the Environmental Impact Studies (2011-2014), monitoring reports (2015-2017) and other technical information (2010-2016). Therefore the time period is set to 2010-2017.

## Reference product
- tin concentrate: 1 kg; name Tin; source Peruvian Ministry of Energy and Mines  2016; CPC 1429: Other non-ferrous metal ores and concentrates (other than uranium or thorium ores and concentrates); By-product classification allocatable product
  Calculated value based on tin anual production reported by the Ministry of Energy and Mines (2016),
  production volume 2.91803e7 kg; name tin_PV; = 17800*1000/Tin_Sn_content
    Estimated value, based on the total amount of tin mined reported in literature.
    17800 metric tons of tin were mined in 2017 in Peru (USGS 2019). An average grade of 61% Sn is assumed.
    Reference:
    USGS (2019) Tin. U.S. Geological Survey, Mineral Commodity Summaries, February 2019, https://minerals.usgs.gov/minerals/pubs/commodity/tin/mcs-2019-tin.pdf (last accessed on 2019-04-24).
  property price 6.161 EUR2005; name Tin_price_EUR2005
    Temporary. This price is calculated based on the price of tin (10.1 EUR/kg) and the tin content (61%) of tin concentrate
  property tin content 0.61; name Tin_Sn_content
    tin content on a dry matter basis
  property carbon content 0
    carbon content on a dry matter basis (reserved; not for manual entry)
  property true value 6.161; name Tin_true_value
    allocation property applied in "true value" allocation // value calculated from revenue
  properties: dry mass 1 kg, water in wet mass 0 kg, wet mass 1 kg, carbon content, non-fossil 0, water content 0, carbon content, fossil 0, carbon allocation 0 kg

## By-products
- heat, for reuse in municipal waste incineration only: 0 MJ; CPC 17300: Steam and hot water; By-product classification allocatable product; pedigree (1,1,1,1,1)
  Net electricity generated from this waste and used in internal MSWI plant energy redistribution.
  Uncertainty: uncertainty is calculated from uncertainties in waste composition and uncertainties in energy efficiency and the uncertainty in internal energy demand
  production volume 362505 MJ
  property exergy 0.1842 MJ; name E_th_prod_MSWI_exergy
    This exergy property is based on the exergy content of the product.
  property price 0.0106 EUR2005; name E_th_prod_MSWI_price_EUR2005
    Average European district heat price from Ecoheatcool and Euroheat 2005-2006, Ecoheat Work package 1: The European heat market. Final report. 10.6 EUR/GJ i s the price of district heat. http://www.solarthermalworld.org/files/Ecoheatcool%20WP1%20Web.pdf?download
  property true value relation 0.1842; name E_th_prod_MSWI_true_value_relation
    property to calculate "true value" from
  property true value 8.19029e-5
    allocation property applied in "true value" allocation // value calculated from true value relation
- electricity, for reuse in municipal waste incineration only: 0 kWh; CPC 17100: Electrical energy; By-product classification allocatable product; pedigree (1,1,1,1,1)
  (same comment as for heat, for reuse in municipal waste incineration only)
  production volume 50347.8 kWh
  property price 0.1 EUR2005; name E_el_prod_MSWI_price_EUR2005
    Estimated to be the same price as in case of electricity, medium voltage.
  property exergy 3.6 MJ; name E_el_prod_MSWI_exergy
    This exergy property is based on the exergy content of the product.
  property true value relation 3.6; name E_el_prod_MSWI_true_value_relation
    property to calculate "true value" from
  property true value 0.00022232
    (same comment as for heat, for reuse in municipal waste incineration only)

## Inputs from technosphere
- blasting: 0.0534165 kg; source INSIDEO 2017; lognormal variance with pedigree 0.002, pedigree (2,3,2,1,1)
  Literature valure reported on the Anual tecnical Reports
- polypropylene, granulate: 0.00160072 kg; source SRK Consulting 2017; lognormal variance with pedigree 0.004425, pedigree (2,3,3,2,2)
  Literature value based on the chemicals requirements reported on company´s Techical reports.
  properties: wet mass 1 kg, carbon content, fossil 0.857143, dry mass 1 kg
- lime: 0.0493975 kg; source SRK Consulting 2017; lognormal variance with pedigree 0.005825, pedigree (3,3,3,2,2)
  (same comment as for polypropylene, granulate)
  properties: dry mass 1 kg, carbon content, fossil 0.120005, wet mass 1 kg
- mine infrastructure, underground, non-ferrous metal: 6.85359e-10 unit; = 1/(50*tin_PV); source SRK Consulting 2016; lognormal variance with pedigree 0.003925, pedigree (2,2,3,2,2)
  Own calculation based on the annual production and the mine lifespan (50 years).
- chemical, organic: 0.00758234 kg; source SRK Consulting 2017; lognormal variance with pedigree 0.004425, pedigree (2,3,3,2,2)
  (same comment as for polypropylene, granulate)
  properties: dry mass 1 kg, carbon content, fossil 0.628, wet mass 1 kg
  note on carbon content, fossil: This dataset is an unweighted average of 20 organic substances (listed in Tab 88.1, ecoinvent v2.2 report 8, part II), being part of the top100 chemicals included in this database. The C-content has also been calculated as an unweighted average of the C content of the substances composing this dataset.
- 4-methyl-2-pentanone: 8.14399e-5 kg; source SRK Consulting 2017; lognormal variance with pedigree 0.005325, pedigree (3,2,3,2,2)
  (same comment as for polypropylene, granulate)
  properties: carbon content, fossil 0.72, dry mass 1 kg, wet mass 1 kg
- electricity, medium voltage: 4.19242 kWh; source Minsur S.A 2016; lognormal variance with pedigree 0.002, pedigree (2,3,2,1,1)
  *Literature valure reported on the Environmental Impact Study (2014) from a representative peruvian gold mining company.
- wastewater, unpolluted: -0.19357 m3; name ByP_2; source Minsur S.A. 2016; lognormal variance with pedigree 0.002, pedigree (2,3,2,1,1)
  Water is physically treated before being discharged to the river.
  production volume 5.64873e6 m3; = ByP_2/tin*tin_PV
    Calculated from production volume of reference product using the relative outputs.
  property price 0 EUR2005; name ByP_2_price_EUR2005
  properties: carbon content, non-fossil 0.00178991, carbon content, fossil 0.00178991, dry mass 0.337476 kg, wet mass 1000 kg, water content 2962.17
  note on carbon content, fossil: Assumed to be like in tap water. Bicarbonate content is 2.93 mol/m3. CO2 content is 0.1 mol/m3 (ecoinvent v2.2 report 8, Tab 93.1).
- diesel, burned in building machine: 6.50968 MJ; source Minsur S.A 2016; lognormal variance with pedigree 0.002, pedigree (2,3,2,1,1)
  *Calculated value based on the diesel requirements reported on the Environmental Impact Study (2014) from a representative mining company. The calorific value used is 32 MJ/L of diesel.
- sulfidic tailings, generic: -33.1284 kg; name ByP_1; source Peruvian Ministry of Energy and Mines  2016; lognormal variance with pedigree 0.0052, pedigree (3,3,3,1,1)
  Calculated value based on the amount of mineral removed for the production of the reference product. Recuperation rate of 88.84% Sn.
  production volume 9.66744e8 kg; = byP_1/tin*tin_PV
    Calculated from production volume of reference product using the relative outputs.
  property tin content 0.0058; name ByP_1_Sn_content
  property gold content 0; name ByP_1_Au_content
  property price 0 EUR2005; name ByP_1_price_EUR2005
  property silver content 0; name ByP_1_Ag_content
  properties: potassium content 0.0025181, oxygen content 0.89157, calcium content 0.0089, magnesium content 0.0022359, sodium content 0.0014472, silicon content 0.053273, water content 0.176471, fluorine content 0.0011041, iron content 0.015374, wet mass 1 kg, aluminium content 0.014738, dry mass 0.85 kg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
- sulfuric acid: 0.042433 kg; source Peruvian Ministry of Energy and Mines  2016; lognormal variance with pedigree 0.0038, pedigree (2,3,3,1,1)
  (same comment as for polypropylene, granulate)
  properties: wet mass 1 kg, dry mass 1 kg

## Inputs from nature
- Tin, in ground [natural resource, in ground]: 0.80206 kg; source Peruvian Ministry of Energy and Mines  2016; lognormal variance with pedigree 0.011225, pedigree (3,3,3,2,2)
  Calculated value based on the mineral ore grade (2.35% Sn and the anual Sn production reported by the Ministry of Energy and Mines (2016).
- Occupation, industrial area [natural resource, land]: 0.0323662 m2*year; source SRK Consulting 2016; lognormal variance with pedigree 0.0409, pedigree (2,2,2,1,1)
  Own calculation based on the annual production and the mine lifespan (25 years).
- Transformation, to mineral extraction site [natural resource, land]: 0.00107887 m2; source SRK Consulting 2016; lognormal variance with pedigree 0.1223, pedigree (3,2,2,1,1)
  Own calculation based on the annual production and the mine lifespan (25 years).
- Transformation, from unspecified [natural resource, land]: 0.00107887 m2; source SRK Consulting 2016; lognormal variance with pedigree 0.1223, pedigree (3,2,2,1,1)
  Own calculation based on the annual production and the mine lifespan (25 years).
- Gangue, in ground [natural resource, in ground]: 29.4985 kg; source INSIDEO 2017; lognormal variance with pedigree 0.005825, pedigree (3,3,3,2,2)
  Calculated value based on the amount of gangue reported on the operation Certificate 2016
- Water, unspecified natural origin [natural resource, in water]: 0.229139 m3; name Water_undefined; source INSIDEO 2017; lognormal variance with pedigree 0.0052, pedigree (3,3,3,1,1)
  Literature value based on the water balance presented on a Company Technical report.

## Emissions to nature
- Manganese [water, surface water]: 1.93745e-5 kg; source Minsur S.A. 2016; lognormal variance with pedigree 0.6514, pedigree (2,3,2,1,1)
  Calculated value based on the monitoring report for water discharge (2015 and 2016) .
- Arsenic [air, non-urban air or from high stacks]: 6.22936e-6 kg; source Golder Associates Perú 2012; lognormal variance with pedigree 0.6588, pedigree (4,3,2,1,1)
  Calculated value based on the soil metal content registered on the Environmental Impact Study and the PM emissions results.
- Zinc [air, non-urban air or from high stacks]: 2.1628e-5 kg; source Golder Associates Perú 2012; lognormal variance with pedigree 0.005325, pedigree (3,2,3,2,2)
  (same comment as for Arsenic)
- Lead [air, non-urban air or from high stacks]: 3.5672e-5 kg; source Golder Associates Perú 2012; lognormal variance with pedigree 0.005325, pedigree (3,2,3,2,2)
  (same comment as for Arsenic)
- Copper, ion [water, surface water]: 1.55049e-6 kg; source Minsur S.A. 2016; lognormal variance with pedigree 0.6514, pedigree (2,3,2,1,1)
  Calculated value based on the monitoring report for water discharge (2015 and 2016) .
- Cobalt [air, non-urban air or from high stacks]: 3.27449e-6 kg; source Golder Associates Perú 2012; lognormal variance with pedigree 0.005825, pedigree (3,3,3,2,2)
  (same comment as for Arsenic)
- Tin [air, non-urban air or from high stacks]: 3.13823e-6 kg; source Golder Associates Perú 2012; lognormal variance with pedigree 0.005325, pedigree (3,2,3,2,2)
  (same comment as for Arsenic)
- Cadmium [air, non-urban air or from high stacks]: 5.60178e-7 kg; source Golder Associates Perú 2012; lognormal variance with pedigree 0.005825, pedigree (3,3,3,2,2)
  (same comment as for Arsenic)
- Nickel [air, non-urban air or from high stacks]: 2.09923e-6 kg; source Golder Associates Perú 2012; lognormal variance with pedigree 0.005825, pedigree (3,3,3,2,2)
  (same comment as for Arsenic)
- Chromium, ion [water, surface water]: 1.22167e-7 kg; source Minsur S.A. 2016; lognormal variance with pedigree 0.6514, pedigree (2,3,2,1,1)
  Calculated value based on the monitoring report for water discharge (2015 and 2016) .
- Particulates, < 2.5 um [air, non-urban air or from high stacks]: 0.0425509 kg; source Golder Associates Perú 2012; lognormal variance with pedigree 0.3028, pedigree (3,3,2,1,1)
  Calculated value based on EPA equations for the following activities: Truckloading, material handling, nivelation and erosion.
  Process characteristics were extracted from the environmental impact study.
- Lead [water, surface water]: 6.03236e-7 kg; source Minsur S.A. 2016; lognormal variance with pedigree 0.6514, pedigree (2,3,2,1,1)
  Calculated value based on the monitoring report for water discharge (2015 and 2016) .
- Iron, ion [water, surface water]: 4.67474e-6 kg; source Minsur S.A. 2016; lognormal variance with pedigree 0.6514, pedigree (2,3,2,1,1)
  Calculated value based on the monitoring report for water discharge (2015 and 2016) .
- Water [air, non-urban air or from high stacks]: 0.0343708 m3; name Water_evap; = 15%*water_undefined; source INSIDEO 2017; lognormal variance with pedigree 0.005825, pedigree (3,3,3,2,2)
  Calculated value based on an evaporation rate of 15%.
- Arsenic, ion [water, surface water]: 1.72568e-6 kg; source Minsur S.A. 2016; lognormal variance with pedigree 0.6514, pedigree (2,3,2,1,1)
  Calculated value based on the monitoring report for water discharge (2015 and 2016) .
- Cadmium, ion [water, surface water]: 1.72568e-6 kg; source Minsur S.A. 2016; lognormal variance with pedigree 0.6514, pedigree (2,3,2,1,1)
  Calculated value based on the monitoring report for water discharge (2015 and 2016) .
- Chromium [air, non-urban air or from high stacks]: 2.59268e-6 kg; source Golder Associates Perú 2012; lognormal variance with pedigree 0.005825, pedigree (3,3,3,2,2)
  (same comment as for Arsenic)
- Mercury [air, non-urban air or from high stacks]: 3.99233e-7 kg; source Golder Associates Perú 2012; lognormal variance with pedigree 0.6606, pedigree (4,3,3,1,1)
  (same comment as for Arsenic)
- Mercury [water, surface water]: 7.01076e-6 kg; source Minsur S.A. 2016; lognormal variance with pedigree 0.6514, pedigree (2,3,2,1,1)
  Calculated value based on the monitoring report for water discharge (2015 and 2016) .
- Zinc, ion [water, surface water]: 5.13416e-6 kg; source Minsur S.A. 2016; lognormal variance with pedigree 0.6514, pedigree (2,3,2,1,1)
  Calculated value based on the monitoring report for water discharge (2015 and 2016) .
- Particulates, > 2.5 um, and < 10um [air, non-urban air or from high stacks]: 0.0628746 kg; source Golder Associates Perú 2012; lognormal variance with pedigree 0.1246, pedigree (3,3,3,1,1)
  (same comment as for Particulates, < 2.5 um)
- Copper [air, non-urban air or from high stacks]: 7.3975e-6 kg; source Golder Associates Perú 2012; lognormal variance with pedigree 0.6588, pedigree (4,3,2,1,1)
  (same comment as for Arsenic)

## Sampling procedure
The data were collected from the environmental studies of San Rafael mine. San Rafael is an underground operation that represents 100% of the tin concentration production in Perú (Peruvian Ministry of Mine production statistics, 2016).
