# treatment of wastewater from cathode ray tube production, capacity 1.1E10l/year

Dataset: EcoSpold 2, unit process
Geography: CH
Time period: 1994-01-01 to 2019-12-31
Technology level: current
Classification: ISIC rev.4 ecoinvent: 3700:Sewerage
Classification: EcoSpold01Categories: waste management/wastewater treatment
Tags: Treatment; ConvertedDataset
Scenario: Business-as-Usual
System model: Allocation at the point of substitution
Generated by: Roland Hischier
Published in: Hischier R. 2007
Database: ecoinvent
isCopyrightProtected: true
accessRestrictedTo: 1

## General comment
Wastewater purified in a moderatly large municipal wastewater treatment plant (capacity class 2), with an average capacity size of 71100 per-captia-equivalents PCE.
Wastewater contains (in kg/m3): COD: 0.779 (GSD=122.5%); F: 0.0328 (GSD=224.1%); Cr: 0.0000963 (GSD=223.8%); Pb: 0.0000963 (GSD=223.8%); Zn: 0.0000963 (GSD=223.8%);
[This dataset was already contained in the ecoinvent database version 2. It was not individually updated during the transfer to ecoinvent version 3. Life Cycle Impact Assessment results may still have changed, as they are affected by changes in the supply chain, i.e. in other datasets. This dataset was generated following the ecoinvent quality guidelines for version 2. It may have been subject to central changes described in the ecoinvent version 3 change report (http://www.ecoinvent.org/database/ecoinvent-version-3/reports-of-changes/), and the results of the central updates were reviewed extensively. The changes added e.g. consistent water flows and other information throughout the database. The documentation of this dataset can be found in the ecoinvent reports of version 2, which are still available via the ecoinvent website. The change report linked above covers all central changes that were made during the conversion process.]

## Included activities end
Infrastructure materials for municipal wastewater treatment plant, transports, dismantling. Land use burdens.

## Geography
Specific to the technology mix encountered in Switzerland in 2000. Well applicable to modern treatment practices in Europe, North America or Japan.

## Technology
Three stage wastewater treatment (mechanical, biological, chemical) including sludge digestion (fermentation) according to the average technology in Switzerland

## Parameters
- fraction, process water, to air: 0.1 dimensionless; name fraction_PW_to_air; lognormal variance with pedigree 0.092025, pedigree (4,4,3,2,4)
  Literature value (Statistics Canada, 2007 & Shaffer, K.H., 2008, Consumptive water use in the Great Lakes Basin, USGS) (Vionnet, S., Quantis Water Database - Technical Report, 2012).

## Reference product
- wastewater from cathode ray tube production: -1 m3; By-product classification Waste; CPC 39920: Sewage sludge
  production volume 0.0336675 m3
    This is a placeholder value that does not reflect real-world production volumes. This dataset does not currently require a real-world production volume to work in the database framework, and no actual data were collected yet. This has no negative effect on the results of the ecoinvent database. The placeholder value of this activity was scaled according to the nominal GDP of 2005 (source: United Nations, http://data.un.org/Glossary.aspx?q=GDP+%28current+US%24%29, accessed 20130726) to reflect an appropriate share of the global production volume, which is also a placeholder value.
  property price 0 EUR2005
    Waste products are assigned a price of zero as they are assumed to require further treatment.
  property carbon content, fossil 0.0400425
    COD is 7.79e-4 kg/kg (Tab 12.11, ecoinvent v2.2 report 18_III). COD was converted to TOC, using conversion factors in Tab 4.10 (ecoinvent v2.2 report 13_IV). TOC was considered as Total Carbon.
  property carbon content 0.0400425
    carbon content on a dry matter basis (reserved; not for manual entry)
  properties: water in wet mass 991.578 kg, water content 117.74, carbon content, non-fossil 0, wet mass 1000 kg, dry mass 8.42179 kg, carbon allocation 0.337229 kg

## By-products
- electricity, for reuse in municipal waste incineration only: 0 kWh; CPC 17100: Electrical energy; By-product classification allocatable product; pedigree (1,1,1,1,1)
  Net electricity generated from this waste and used in internal MSWI plant energy redistribution.
  Uncertainty: uncertainty is calculated from uncertainties in waste composition and uncertainties in energy efficiency and the uncertainty in internal energy demand
  property exergy 3.6 MJ; name E_el_prod_MSWI_exergy
    This exergy property is based on the exergy content of the product.
  property true value relation 3.6; name E_el_prod_MSWI_true_value_relation
    property to calculate "true value" from
  property price 0.1 EUR2005; name E_el_prod_MSWI_price_EUR2005
    Estimated to be the same price as in case of electricity, medium voltage.
- heat, for reuse in municipal waste incineration only: 0 MJ; CPC 17300: Steam and hot water; By-product classification allocatable product; pedigree (1,1,1,1,1)
  Net useful heat generated from this waste and used in internal MSWI plant energy redistribution.
  Uncertainty: uncertainty is calculated from uncertainties in waste composition and uncertainties in energy efficiency and the uncertainty in internal energy demand
  property true value relation 0.1842; name E_th_prod_MSWI_true_value_relation
    property to calculate "true value" from
  property exergy 0.1842 MJ; name E_th_prod_MSWI_exergy
    This exergy property is based on the exergy content of the product.
  property price 0.0106 EUR2005; name E_th_prod_MSWI_price_EUR2005
    Average European district heat price from Ecoheatcool and Euroheat 2005-2006, Ecoheat Work package 1: The European heat market. Final report. 10.6 EUR/GJ i s the price of district heat. http://www.solarthermalworld.org/files/Ecoheatcool%20WP1%20Web.pdf?download
- zinc concentrate: 0 kg; CPC 14290: Other non-ferrous metal ores and concentrates (other than uranium or thorium ores and concentrates); By-product classification allocatable product
  Calculated value from the knowledge of the properties of both products.
  property price 0.38 EUR2005; name ByP_price_EUR2005
    Temporary price data. Calculated as 90% of purchasers price based on: Zinc content in concentrate 53%. Concentrate price per kg Zn 86.5% of refined Zn price (13.5% treatment charges according to CHR Metals Limited 2005: Dynamic cost curves. http://www.minecost.com/dynamic.pdf). 2004 zinc price from USGS (2007) Mineral commodity summaries 2007. <http://minerals.usgs.gov/minerals/pubs/mcs/2007/mcs2007.pdf> [Accessed 25 May 2010]
  property zinc content 0.53; name zinc_C_zinc_concentrate
    Zinc content on a dry matter basis. Value taken from teh "zinc mine operation" /GLO dataset.
  property dry mass 1 kg; name DM_zinc_concentrate
  property carbon content 0
    carbon content on a dry matter basis (reserved; not for manual entry)
  properties: wet mass 1 kg, water content 0, carbon content, non-fossil 0, carbon content, fossil 0, water in wet mass 0 kg, carbon allocation 0 kg

## Inputs from technosphere
- cement, unspecified: 0.00012546 kg; lognormal variance with pedigree 0.08, pedigree (1,1,5,1,1)
  burden from sludge incineration. Uncertainty calculated from wastewater composition and treatment model
  properties: wet mass 1 kg, dry mass 1 kg
- municipal waste incineration facility: 6.1533e-11 unit; lognormal variance with pedigree 0.04, pedigree (1,1,5,1,1)
  (same comment as for cement, unspecified)
- hydrochloric acid, without water, in 30% solution state: 2.8342e-8 kg; lognormal variance with pedigree 0.35, pedigree (1,1,5,1,1)
  (same comment as for cement, unspecified)
  properties: wet mass 1 kg, dry mass 1 kg
- iron (III) chloride, without water, in 40% solution state: 7.9851e-6 kg; lognormal variance with pedigree 0.38, pedigree (1,1,5,1,1)
  direct wastewater treatment plant burden plus burden from sludge incineration. Uncertainty calculated from wastewater composition and treatment model
  properties: dry mass 1 kg, wet mass 1 kg
- electricity, low voltage: 0.23172 kWh; lognormal variance with pedigree 0.14, pedigree (1,1,5,1,1)
  direct wastewater treatment plant burden. Uncertainty calculated from wastewater composition and treatment model
- process-specific burdens, residual material landfill: 0.00031365 kg; lognormal variance with pedigree 0.07, pedigree (1,1,5,1,1)
  burden from sludge incineration. Uncertainty calculated from wastewater composition and treatment model;activityLink introduced to establish a direct link to the corresponding regional supply of this product
- residual material landfill: 6.5344e-13 unit; lognormal variance with pedigree 0.07, pedigree (1,1,5,1,1)
  (same comment as for cement, unspecified)
- slag landfill: 7.6187e-13 unit; lognormal variance with pedigree 0.07, pedigree (1,1,5,1,1)
  (same comment as for cement, unspecified)
- waste plastic, mixture: -0.0155 kg; lognormal variance with pedigree 0.04, pedigree (1,1,5,1,1)
  (same comment as for electricity, low voltage)
  production volume 0.000521847 kg; = (Ref('037b95dc-e7e3-4f48-99cc-c4767c614408')*-1)* Ref('b636f339-ffd9-4238-ae86-76289aba2fb4', 'ProductionVolume')/ABS( Ref('b636f339-ffd9-4238-ae86-76289aba2fb4'))
    Calculated from the production volume of wastewater from cathode ray tube production in proportion to the respective output amounts.
  properties: wet mass 1 kg, water content 0.180638, carbon content, fossil 0.747344, dry mass 0.847 kg
  note on carbon content, fossil: C content in 1 kg DM was calculated using data in Tab A.2, ecoinvent v2.2 report 13_I
- heat, district or industrial, other than natural gas: 0.20643 MJ; lognormal variance with pedigree 0.05, pedigree (1,1,5,1,1)
  (same comment as for cement, unspecified)
- process-specific burdens, slag landfill: 0.00042855 kg; lognormal variance with pedigree 0.07, pedigree (1,1,5,1,1)
  (same comment as for process-specific burdens, residual material landfill)
- waste cement, hydrated: -0.00031365 kg; lognormal variance with pedigree 0.08, pedigree (1,1,5,1,1)
  (same comment as for cement, unspecified)
  production volume 1.05598e-5 kg; = (Ref('4fb07dae-34a6-4911-8da4-23420dd74876')*-1)* Ref('b636f339-ffd9-4238-ae86-76289aba2fb4', 'ProductionVolume')/ABS( Ref('b636f339-ffd9-4238-ae86-76289aba2fb4'))
    (same comment as for waste plastic, mixture)
  properties: wet mass 1 kg, dry mass 1 kg
- chemical, inorganic: 4.7236e-8 kg; lognormal variance with pedigree 0.35, pedigree (1,1,5,1,1)
  (same comment as for cement, unspecified)
  properties: dry mass 1 kg, wet mass 1 kg, carbon content, fossil 0.003
  note on carbon content, fossil: This dataset is an unweighted average of 20 inorganic substances (listed in Tab 88.1, ecoinvent v2.2 report 8, part II), being part of the top100 chemicals included in this database. The C-content has also been calculated as an unweighted average of the C content of the substances composing this dataset.
- sewer grid, 1.1E10l/year, 242 km: 1.6832e-7 km; lognormal variance with pedigree 0.04, pedigree (1,1,5,1,1)
  uncertainty heeded in exchanges of the module
  This exchange has an activity link directly to the producing activity because the product is primarily consumed in the same geographical area where it is produced.
- waste graphical paper: -0.0155 kg; lognormal variance with pedigree 0.04, pedigree (1,1,5,1,1)
  (same comment as for electricity, low voltage)
  production volume 0.000521847 kg; = (Ref('d0f73289-c761-4cc7-879a-091f1269c99d')*-1)* Ref('b636f339-ffd9-4238-ae86-76289aba2fb4', 'ProductionVolume')/ABS( Ref('b636f339-ffd9-4238-ae86-76289aba2fb4'))
    (same comment as for waste plastic, mixture)
  properties: wet mass 1 kg, water content 0.126126, carbon content, non-fossil 0.454955, dry mass 0.888 kg
- wastewater treatment facility, capacity 1.1E10l/year: 1.9883e-9 unit; lognormal variance with pedigree 0.04, pedigree (1,1,5,1,1)
  (same comment as for sewer grid, 1.1E10l/year, 242 km)
- electricity, high voltage: 0.035386 kWh; lognormal variance with pedigree 0.49, pedigree (1,1,5,1,1)
  (same comment as for cement, unspecified)
- liquid manure spreading, by vacuum tanker: 0.00083147 m3; lognormal variance with pedigree 0.04, pedigree (1,1,5,1,1)
  burden from sludge spreading. Uncertainty calculated from wastewater composition and treatment model
  This exchange has an activity link directly to the producing activity because the product is primarily consumed in the same geographical area where it is produced.
- process-specific burdens, municipal waste incineration: 0.24613 kg; lognormal variance with pedigree 0.04, pedigree (1,1,5,1,1)
  (same comment as for process-specific burdens, residual material landfill)

## Emissions to nature
- Lead [water, ground-, long-term]: 3.7452e-6 kg; lognormal variance with pedigree 6.92, pedigree (1,1,5,1,1)
  emission from sludge incineration. Uncertainty calculated from wastewater composition and treatment model
- Chromium [soil, agricultural]: 1.8342e-5 kg; lognormal variance with pedigree 0.71, pedigree (1,1,5,1,1)
  emission from sludge spreading. Uncertainty calculated from wastewater composition and treatment model
- Fluoride [water, surface water]: 0.0328 kg; lognormal variance with pedigree 0.67, pedigree (1,1,5,1,1)
  sewer overload discharge plus direct wastewater treatment plant emission plus emission from sludge incineration. Uncertainty calculated from wastewater composition and treatment model
- Chromium VI [water, surface water]: 4.982e-5 kg; lognormal variance with pedigree 0.64, pedigree (1,1,5,1,1)
  (same comment as for Fluoride)
- Chromium, ion [water, surface water]: 9.2698e-8 kg; lognormal variance with pedigree 0.72, pedigree (1,1,5,1,1)
  (same comment as for Lead)
- COD, Chemical Oxygen Demand [water, ground-, long-term]: 0.0013387 kg; lognormal variance with pedigree 0.11, pedigree (1,1,5,1,1)
  (same comment as for Lead)
- Lead [soil, agricultural]: 3.315e-5 kg; lognormal variance with pedigree 0.71, pedigree (1,1,5,1,1)
  (same comment as for Chromium)
- Carbon monoxide, fossil [air, urban air close to ground]: 0.0008163 kg; lognormal variance with pedigree 0.16, pedigree (1,1,5,1,1)
  (same comment as for Lead)
- Chromium VI [water, ground-, long-term]: 3.079e-6 kg; lognormal variance with pedigree 1.09, pedigree (1,1,5,1,1)
  (same comment as for Lead)
- Water [water, unspecified]: 0.9 m3; name water_to_water_unspecified; lognormal variance with pedigree 0.0807, pedigree (2,2,5,1,1)
  Calculated value based on water balance.
  property dry mass 0 kg; name DM
  property fraction, origin: fresh water 1; name fraction_origin_fresh_water_Ww
  property carbon content, fossil 0; name C_content_fossil
  property water in wet mass 1000 kg; name WWM
  property carbon content, non-fossil 0; name C_content_non_fossil
  property fraction, origin: salt water 0; name fraction_origin_salt_water_Ww
  property wet mass 1000 kg; name WM
  property fraction, origin: unspecified 0; name fraction_origin_unspecified_Ww
- TOC, Total Organic Carbon [water, ground-, long-term]: 0.00052972 kg; lognormal variance with pedigree 0.11, pedigree (1,1,5,1,1)
  (same comment as for Lead)
- BOD5, Biological Oxygen Demand [water, ground-, long-term]: 0.00043788 kg; lognormal variance with pedigree 0.11, pedigree (1,1,5,1,1)
  (same comment as for Lead)
- Water [air, unspecified]: 0.1 m3; name water_to_air_unspecified; lognormal variance with pedigree 0.0807, pedigree (2,2,5,1,1)
  Calculated value based on water balance.
  property fraction, origin: salt water 0; name fraction_origin_salt_water
  property fraction, origin: unspecified 1; name fraction_origin_unspecified
  property fraction, origin: fresh water 0; name fraction_origin_fresh_water
- NMVOC, non-methane volatile organic compounds, unspecified origin [air, urban air close to ground]: 1.167e-5 kg; lognormal variance with pedigree 0.26, pedigree (1,1,5,1,1)
  direct digester gas emission. Uncertainty calculated from wastewater composition and treatment model
- Zinc, ion [water, ground-, long-term]: 6.3259e-7 kg; lognormal variance with pedigree 5.51, pedigree (1,1,5,1,1)
  (same comment as for Lead)
- Chromium [air, urban air close to ground]: 2.1506e-12 kg; lognormal variance with pedigree 0.8, pedigree (1,1,5,1,1)
  direct digester gas emission plus emission from sludge incineration. Uncertainty calculated from wastewater composition and treatment model
- DOC, Dissolved Organic Carbon [water, surface water]: 0.037779 kg; lognormal variance with pedigree 0.08, pedigree (1,1,5,1,1)
  (same comment as for Fluoride)
- Lead [air, urban air close to ground]: 1.9544e-9 kg; lognormal variance with pedigree 0.75, pedigree (1,1,5,1,1)
  (same comment as for Chromium)
- Zinc [air, urban air close to ground]: 6.6657e-10 kg; lognormal variance with pedigree 0.76, pedigree (1,1,5,1,1)
  (same comment as for Chromium)
- Carbon [soil, agricultural]: 0.03421 kg; lognormal variance with pedigree 0.1, pedigree (1,1,5,1,1)
  (same comment as for Chromium)
- BOD5, Biological Oxygen Demand [water, surface water]: 0.049576 kg; lognormal variance with pedigree 0.05, pedigree (1,1,5,1,1)
  (same comment as for Fluoride)
- Zinc [soil, agricultural]: 2.5731e-5 kg; lognormal variance with pedigree 0.71, pedigree (1,1,5,1,1)
  (same comment as for Chromium)
- Methane, fossil [air, urban air close to ground]: 0.0025685 kg; lognormal variance with pedigree 0.14, pedigree (1,1,5,1,1)
  (same comment as for Lead)
- TOC, Total Organic Carbon [water, surface water]: 0.040445 kg; lognormal variance with pedigree 0.04, pedigree (1,1,5,1,1)
  (same comment as for Fluoride)
- DOC, Dissolved Organic Carbon [water, ground-, long-term]: 0.00052972 kg; lognormal variance with pedigree 0.11, pedigree (1,1,5,1,1)
  (same comment as for Lead)
- Lead [water, surface water]: 1.0585e-5 kg; lognormal variance with pedigree 0.6, pedigree (1,1,5,1,1)
  (same comment as for Fluoride)
- COD, Chemical Oxygen Demand [water, surface water]: 0.15096 kg; lognormal variance with pedigree 0.08, pedigree (1,1,5,1,1)
  (same comment as for Fluoride)
- Carbon dioxide, fossil [air, urban air close to ground]: 0.96215 kg; lognormal variance with pedigree 0.06, pedigree (1,1,5,1,1)
  (same comment as for Lead)
- Zinc, ion [water, surface water]: 2.9774e-5 kg; lognormal variance with pedigree 0.65, pedigree (1,1,5,1,1)
  (same comment as for Fluoride)

## Extrapolations
This dataset has been extrapolated from year 2000 to the year of the calculation (2019). The uncertainty has been adjusted accordingly.

## Review by Jürgen Sutter 2009-02-07
passed.
