# brick production facility construction

Dataset: EcoSpold 2, unit process
Geography: RoW
Time period: 1954-01-01 to 2029-12-31
Technology level: current
Classification: EcoSpold01Categories: construction materials/additives
Classification: ISIC rev.4 ecoinvent: 4290:Construction of other civil engineering projects
Scenario: Business-as-Usual
System model: Allocation at the point of substitution
Generated by: Catherine Reid
Database: ecoinvent
isCopyrightProtected: true
accessRestrictedTo: 1

## General comment
The dataset represents the construction of the brick production facility in GLO in the period 1954-2029. This GLO dataset is extrapolated from the Quebec dataset.

The dataset represents the construction of the brick production facility.
Specific data for the annual production and estimations for the land use were collected from the only producer of brick (made from shale) in Québec, for the year 2012.
The average yearly production volume of brick shale is 66'957 t and the lifetime of the site is estimated to75 years,
Total land occupation: 344'3263 m²; about 12'000 m² building hall, 5'000 m² paved roads, 25'000 m² vegetation and the balance is considered as industrial area.
ssumed weight of machines taken from clay pit construction ecoinvent (v3) dataset: 2'000t and service life estimated to 50 years.

## Included activities start
This activity start from the construction of the facility.

## Included activities end
The activity ends with the dismantling of the site and the end-of-life of the construction materials.
The dataset includes the land-use, building hall, the internal parkings and streets and the industrial machine (rock crusher). The disposal of the buildings and machinery is taken into account in the infrastructure datasets.

This dataset doesn't include the operation of the brick production facility.

## Geography
Extrapolated from the Quebec dataset. Estimation for the machinery is based on an existing european dataset. Uncertainty adjusted accordingly

## Technology
The data of the infrastructure corresponds to the current technology

## Time period
Facility built in 1954 with a lifetime of 75 years. The complete lifetime is considered in the dataset

## Parameters
- lifetime of machinery: 50 year; name lifetime_machinery; lognormal variance with pedigree 0.51, pedigree (5,5,5,5,5)
  Estimation.
  Uncertainty: Estimation. The uncertainty has been maximized.

## Reference product
- brick production facility: 1 unit; name ref_product; CPC 53269: Other constructions for manufacturing; By-product classification allocatable product
  production volume 2.23747 unit; = 0.01*7.00e13/3.11e11
    Gross approximation of the production volume based on an estimate of the Quebec production volume (0.01 unit per year, estimated with information from data provider) scaled to GLO by the ratio of global and Quebec GDP for 2011 (7e13/3.11e11). It should be replaced as soon as better data is found.
  property price 3.31969e6 EUR2005; name ref_product_price_EUR2005
    Calculated based on inputs: The price of the product has been calculated as a sum of the values of the material and energy inputs for this product. This value is therefore a rough estimation. It may underestimate the real price since there are additional expenses when producing any product. These expences can include for example labour costs, treatment of waste materials and profit for the producer. Please consider carefully whether this level of data quality is acceptable for your application.
  property lifetime capacity [kg] 5.02178e9 kg; name ref_product_lifetime_capacity_kg; = ref_product_lifetime*ref_product_capacity_kg
    Calculated value based on the real capacity of the facility.
  property lifetime 75 year; name ref_product_lifetime
    Estimation of infrastructure lifetime based on personnal communication with the brick producer.
  property capacity [kg] 6.6957e7 kg; name ref_product_capacity_kg
    Measured value based on sales of brick for the dataset brick shale production, Québec (source: questionnaire). Represent the real capacity of the facility.

## Inputs from technosphere
- industrial machine, heavy, unspecified: 3e6 kg; = input_machine*(ref_product_lifetime/lifetime_machinery); lognormal variance with pedigree 0, pedigree (1,1,1,1,1)
  Calculated value. Extrapolated from industrial machine used in clay pit construction dataset. It is assumed that machinery lifetime is 50 years.
  EcoSpold01Location=RER
  Uncertainty: Calculated variable. Uncertainty will be determined from propagation of uncertainty factors of underlying variables.
  property input_kg 2e6 kg; name input_machine
  note on input_kg: Estimation. Taken directly from ecoinvent data clay pit construction
- building, hall, steel construction: 12000 m2; lognormal variance with pedigree 0.35, pedigree (4,1,1,5,1)
  Estimated value.
  EcoSpold01Location=CH

## Inputs from nature
- Transformation, to traffic area, road network [natural resource, land]: 5000 m2; name surface_road; lognormal variance with pedigree 0.13, pedigree (4,1,1,5,1)
  Estimated value.
- Transformation, from unspecified [natural resource, land]: 344323 m2; name surface_site; lognormal variance with pedigree 0.13, pedigree (4,1,1,5,1)
  Estimated value. It is assumed that the surface related to the brick production represent 30% of the entire site including brick production facility and clay pit (excluded).
- Transformation, to industrial area [natural resource, land]: 339323 m2; name surface_industrial; = surface_site-surface_road; lognormal variance with pedigree 0, pedigree (1,1,1,1,1)
  Calculated value.
  Uncertainty: Calculated variable. Uncertainty will be determined from propagation of uncertainty factors of underlying variables.
- Occupation, traffic area, road network [natural resource, land]: 375000 m2*year; = surface_road*ref_product_lifetime; lognormal variance with pedigree 0, pedigree (1,1,1,1,1)
  Calculated value. Amount calculated using road occupation and lifetime
  Uncertainty: Calculated variable. Uncertainty will be determined from propagation of uncertainty factors of underlying variables.
- Occupation, industrial area [natural resource, land]: 2.54492e7 m2*year; = surface_industrial*ref_product_lifetime; lognormal variance with pedigree 0, pedigree (1,1,1,1,1)
  Calculated value. Amount calculated using industrial land occupation and lifetime
  Uncertainty: Calculated variable. Uncertainty will be determined from propagation of uncertainty factors of underlying variables.

## Sampling procedure
Estimations from data provider and similar processes.

## Extrapolations
GLO dataset extrapolated from Quebec dataset.
Land use data are based on the only Québec brick producer. Other information is rough estimation. This dataset has been copied and modified from ''clay pit construction'' dataset covering the geography GLO (ecoinvent v3.0). The uncertainty has been adjusted accordingly.
