# treatment of residue from Na-dichromate production, residual material landfill

Dataset: EcoSpold 2, unit process
Geography: CH
Time period: 1994-01-01 to 2019-12-31
Technology level: current
Classification: ISIC rev.4 ecoinvent: 3822:Treatment and disposal of hazardous waste
Classification: EcoSpold01Categories: waste management/residual material landfill
Synonyms: solid residues from Na2Cr2O7 production to surface impoundment
Tags: ConvertedDataset; Treatment
Scenario: Business-as-Usual
System model: Allocation at the point of substitution
Generated by: Gabor Doka (obsolete)
Published in: Doka G. 2009
Database: ecoinvent
isCopyrightProtected: true
accessRestrictedTo: 1

## General comment
Inventoried waste contains 100% reduced residues dichromate prod; .
waste composition (wet, in ppm): H2O n.a.; O 350630; H n.a.; C n.a.; S n.a.; N n.a.; P 893.79; B 7.1933; Cl n.a.; Br n.a.; F n.a.; I n.a.; Ag 0.714; As 0.62521; Ba 149.04; Cd 11.748; Co 1.3453; Cr 45400; Cu 1212.8; Hg n.a.; Mn 259.36; Mo 1.9551; Ni 1100; Pb 502.43; Sb 22.564; Se 0.31969; Sn 73.44; V 200; Zn 770; Be n.a.; Sc n.a.; Sr n.a.; Ti n.a.; Tl n.a.; W n.a.; Si 31200; Fe 214000; Ca 91600; Al 99200; K 2059.7; Mg 47700; Na 113000;
Share of carbon in waste that is biogenic 60.4%.
Additional solidification with 0.4 kg of cement.
[This dataset was already contained in the ecoinvent database version 2. It was not individually updated during the transfer to ecoinvent version 3. Life Cycle Impact Assessment results may still have changed, as they are affected by changes in the supply chain, i.e. in other datasets. This dataset was generated following the ecoinvent quality guidelines for version 2. It may have been subject to central changes described in the ecoinvent version 3 change report (http://www.ecoinvent.org/database/ecoinvent-version-3/reports-of-changes/), and the results of the central updates were reviewed extensively. The changes added e.g. consistent water flows and other information throughout the database. The documentation of this dataset can be found in the ecoinvent reports of version 2, which are still available via the ecoinvent website. The change report linked above covers all central changes that were made during the conversion process.]

## Included activities end
Waste-specific short-term emissions to water from leachate. Long-term emissions from landfill to ground water. Expenditures for solidificalion with cement (user-specified option)

## Geography
Technology encountered in Switzerland in 2000. Landfill includes base seal and leachate collection system.

## Technology
Swiss residual material landfill for polluted, inorganic waste. With base seal and leachate collection system. Recultivation after closure.

## Time period
Waste composition as given in literature reference, theoretical data or other source. Transfer coefficients from prospective model.

## Reference product
- residue from Na-dichromate production: -1 kg; CPC 39: Wastes or scraps; By-product classification Waste
  EcoSpold01Location=CH
  production volume 0.0336675 kg
    This is a placeholder value that does not reflect real-world production volumes. This dataset does not currently require a real-world production volume to work in the database framework, and no actual data were collected yet. This has no negative effect on the results of the ecoinvent database. The placeholder value of this activity was scaled according to the nominal GDP of 2005 (source: United Nations, http://data.un.org/Glossary.aspx?q=GDP+%28current+US%24%29, accessed 20130726) to reflect an appropriate share of the global production volume, which is also a placeholder value.
  property price 0 EUR2005
    Waste products are assigned a price of zero as they are assumed to require further treatment.
  property carbon content 0
    carbon content on a dry matter basis (reserved; not for manual entry)
  properties: water content 0, water in wet mass 0 kg, wet mass 1 kg, carbon content, non-fossil 0, carbon content, fossil 0, dry mass 1 kg, carbon allocation 0 kg

## Inputs from technosphere
- process-specific burdens, residual material landfill: 1 kg; lognormal variance with pedigree 0.04, pedigree (1,1,5,1,1)
  EcoSpold01Location=CH
  demands per kilogram waste. uncertainty is heeded in the module;activityLink introduced to establish a direct link to the corresponding regional supply of this product
- waste cement, hydrated: -1 kg; lognormal variance with pedigree 0.05, pedigree (1,1,5,1,1)
  EcoSpold01Location=CH
  Hydrated cement for solidification of residual material waste. Uncertainty in mass from solidification recipe.
  production volume 1 kg
    Calculated from the production volume of residue from Na-dichromate prod., 0% water in proportion to the respective output amounts.
  properties: wet mass 1 kg, dry mass 1 kg
- residual material landfill: 2.0833e-9 unit; lognormal variance with pedigree 0.04, pedigree (1,1,5,1,1)
  EcoSpold01Location=CH
  demands per kilogram waste. uncertainty is heeded in the module
- cement, unspecified: 0.4 kg; lognormal variance with pedigree 0.05, pedigree (1,1,5,1,1)
  Cement for solidification of residual material waste. Uncertainty in mass from solidification recipe.
  EcoSpold01Location=CH
  properties: dry mass 1 kg, wet mass 1 kg

## Emissions to nature
- Manganese [water, surface water]: 3.5766e-9 kg; lognormal variance with pedigree 2.09, pedigree (1,1,5,1,1)
  uncertainty is calculated from uncertainties in waste composition and transfer coefficients in residual landfill
- Potassium, ion [water, ground-, long-term]: 0.0014791 kg; lognormal variance with pedigree 0.61, pedigree (1,1,5,1,1)
  uncertainty is calculated from uncertainties in waste composition and transfer coefficients in incinerator and landfills.
- Barium [water, ground-, long-term]: 1.2311e-6 kg; lognormal variance with pedigree 6.7, pedigree (1,1,5,1,1)
  (same comment as for Potassium, ion)
- Aluminium [water, ground-, long-term]: 0.029448 kg; lognormal variance with pedigree 0.53, pedigree (1,1,5,1,1)
  (same comment as for Potassium, ion)
- Barium [water, surface water]: 2.0553e-9 kg; lognormal variance with pedigree 2.17, pedigree (1,1,5,1,1)
  (same comment as for Manganese)
- Chromium VI [water, surface water]: 0.0027291 kg; lognormal variance with pedigree 0.41, pedigree (1,1,5,1,1)
  (same comment as for Manganese)
- Vanadium, ion [water, surface water]: 4.9084e-7 kg; lognormal variance with pedigree 1.45, pedigree (1,1,5,1,1)
  (same comment as for Manganese)
- Phosphate [water, ground-, long-term]: 0.00061226 kg; lognormal variance with pedigree 1.27, pedigree (1,1,5,1,1)
  (same comment as for Potassium, ion)
- Molybdenum [water, surface water]: 1.9461e-6 kg; lognormal variance with pedigree 1.52, pedigree (1,1,5,1,1)
  (same comment as for Manganese)
- Calcium, ion [water, surface water]: 1.3818e-5 kg; lognormal variance with pedigree 1.07, pedigree (1,1,5,1,1)
  (same comment as for Manganese)
- Zinc, ion [water, surface water]: 1.5755e-8 kg; lognormal variance with pedigree 1.9, pedigree (1,1,5,1,1)
  (same comment as for Manganese)
- Cadmium, ion [water, ground-, long-term]: 7.9753e-8 kg; lognormal variance with pedigree 7.52, pedigree (1,1,5,1,1)
  (same comment as for Potassium, ion)
- Arsenic, ion [water, surface water]: 6.2521e-7 kg; lognormal variance with pedigree 1.67, pedigree (1,1,5,1,1)
  (same comment as for Manganese)
- Boron [water, surface water]: 5.636e-8 kg; lognormal variance with pedigree 1.75, pedigree (1,1,5,1,1)
  (same comment as for Manganese)
- Tin, ion [water, ground-, long-term]: 1.3916e-6 kg; lognormal variance with pedigree 4.98, pedigree (1,1,5,1,1)
  (same comment as for Potassium, ion)
- Iron, ion [water, ground-, long-term]: 0.0010726 kg; lognormal variance with pedigree 7.11, pedigree (1,1,5,1,1)
  (same comment as for Potassium, ion)
- Selenium [water, ground-, long-term]: 2.0695e-7 kg; lognormal variance with pedigree 1.76, pedigree (1,1,5,1,1)
  (same comment as for Potassium, ion)
- Calcium, ion [water, ground-, long-term]: 0.0082768 kg; lognormal variance with pedigree 1.61, pedigree (1,1,5,1,1)
  (same comment as for Potassium, ion)
- Nickel, ion [water, ground-, long-term]: 0.00039824 kg; lognormal variance with pedigree 0.94, pedigree (1,1,5,1,1)
  (same comment as for Potassium, ion)
- Manganese [water, ground-, long-term]: 2.1424e-6 kg; lognormal variance with pedigree 6.63, pedigree (1,1,5,1,1)
  (same comment as for Potassium, ion)
- Silver, ion [water, ground-, long-term]: 2.7485e-8 kg; lognormal variance with pedigree 4.31, pedigree (1,1,5,1,1)
  (same comment as for Potassium, ion)
- Sodium, ion [water, ground-, long-term]: 0.070593 kg; lognormal variance with pedigree 0.16, pedigree (1,1,5,1,1)
  (same comment as for Potassium, ion)
- Cobalt [water, surface water]: 3.8396e-10 kg; lognormal variance with pedigree 2.39, pedigree (1,1,5,1,1)
  (same comment as for Manganese)
- Vanadium, ion [water, ground-, long-term]: 0.00015372 kg; lognormal variance with pedigree 0.93, pedigree (1,1,5,1,1)
  (same comment as for Potassium, ion)
- Phosphate [water, surface water]: 1.0221e-6 kg; lognormal variance with pedigree 1.49, pedigree (1,1,5,1,1)
  (same comment as for Manganese)
- Silicon [water, surface water]: 7.0167e-5 kg; lognormal variance with pedigree 0.83, pedigree (1,1,5,1,1)
  (same comment as for Manganese)
- Antimony [water, surface water]: 7.9573e-6 kg; lognormal variance with pedigree 1.23, pedigree (1,1,5,1,1)
  (same comment as for Manganese)
- Lead [water, surface water]: 4.3509e-9 kg; lognormal variance with pedigree 2.07, pedigree (1,1,5,1,1)
  (same comment as for Manganese)
- Sodium, ion [water, surface water]: 0.042407 kg; lognormal variance with pedigree 0.18, pedigree (1,1,5,1,1)
  (same comment as for Manganese)
- Cadmium, ion [water, surface water]: 1.3314e-10 kg; lognormal variance with pedigree 2.53, pedigree (1,1,5,1,1)
  (same comment as for Manganese)
- Copper, ion [water, surface water]: 7.7938e-8 kg; lognormal variance with pedigree 1.69, pedigree (1,1,5,1,1)
  (same comment as for Manganese)
- Chromium VI [water, ground-, long-term]: 0.0086209 kg; lognormal variance with pedigree 0.24, pedigree (1,1,5,1,1)
  (same comment as for Potassium, ion)
- Nickel, ion [water, surface water]: 6.6484e-7 kg; lognormal variance with pedigree 1.4, pedigree (1,1,5,1,1)
  (same comment as for Manganese)
- Iron, ion [water, surface water]: 1.7906e-6 kg; lognormal variance with pedigree 1.38, pedigree (1,1,5,1,1)
  (same comment as for Manganese)
- Boron [water, ground-, long-term]: 7.0728e-6 kg; lognormal variance with pedigree 1.35, pedigree (1,1,5,1,1)
  (same comment as for Potassium, ion)
- Potassium, ion [water, surface water]: 0.0005806 kg; lognormal variance with pedigree 0.65, pedigree (1,1,5,1,1)
  (same comment as for Manganese)
- Magnesium [water, ground-, long-term]: 0.0054198 kg; lognormal variance with pedigree 1.42, pedigree (1,1,5,1,1)
  (same comment as for Potassium, ion)
- Magnesium [water, surface water]: 9.0481e-6 kg; lognormal variance with pedigree 1.1, pedigree (1,1,5,1,1)
  (same comment as for Manganese)
- Antimony [water, ground-, long-term]: 1.4606e-5 kg; lognormal variance with pedigree 1.21, pedigree (1,1,5,1,1)
  (same comment as for Potassium, ion)
- Selenium [water, surface water]: 1.1274e-7 kg; lognormal variance with pedigree 1.79, pedigree (1,1,5,1,1)
  (same comment as for Manganese)
- Lead [water, ground-, long-term]: 2.6062e-6 kg; lognormal variance with pedigree 7.71, pedigree (1,1,5,1,1)
  (same comment as for Potassium, ion)
- Arsenic, ion [water, ground-, long-term]: 0 kg; pedigree (1,1,1,1,1)
  (same comment as for Potassium, ion)
- Molybdenum [water, ground-, long-term]: 8.9758e-9 kg; lognormal variance with pedigree 1.55, pedigree (1,1,5,1,1)
  (same comment as for Potassium, ion)
- Copper, ion [water, ground-, long-term]: 4.6685e-5 kg; lognormal variance with pedigree 3.32, pedigree (1,1,5,1,1)
  (same comment as for Potassium, ion)
- Aluminium [water, surface water]: 4.9162e-5 kg; lognormal variance with pedigree 0.91, pedigree (1,1,5,1,1)
  (same comment as for Manganese)
- Silicon [water, ground-, long-term]: 0.03113 kg; lognormal variance with pedigree 0.28, pedigree (1,1,5,1,1)
  (same comment as for Potassium, ion)
- Silver, ion [water, surface water]: 4.5885e-11 kg; lognormal variance with pedigree 2.67, pedigree (1,1,5,1,1)
  (same comment as for Manganese)
- Tin, ion [water, surface water]: 2.3233e-9 kg; lognormal variance with pedigree 2.15, pedigree (1,1,5,1,1)
  (same comment as for Manganese)
- Cobalt [water, ground-, long-term]: 2.2999e-7 kg; lognormal variance with pedigree 2.35, pedigree (1,1,5,1,1)
  (same comment as for Potassium, ion)
- Zinc, ion [water, ground-, long-term]: 9.4371e-6 kg; lognormal variance with pedigree 5.58, pedigree (1,1,5,1,1)
  (same comment as for Potassium, ion)

## Sampling procedure
Landfill model based on observed leachate concentrations in literature. Extrapolated to 60'000 years heeding chemical characteristics. Initial waste composition from various literature sources.

## Extrapolations
This dataset has been extrapolated from year 2000 to the year of the calculation (2019). The uncertainty has been adjusted accordingly.

## Review by Niels Jungbluth 2009-02-15
passed.
