# nuclear waste storage construction, interim, for high level radioactive waste before final repository

Dataset: EcoSpold 2, unit process
Geography: RoW
Time period: 1992-01-01 to 2019-12-31
Technology level: current
Classification: ISIC rev.4 ecoinvent: 4290:Construction of other civil engineering projects
Classification: EcoSpold01Categories: nuclear power/waste treatment
Tags: ConvertedDataset
Scenario: Business-as-Usual
System model: Allocation at the point of substitution
Generated by: Roberto Dones
Published in: Dones, R. 2007
Database: ecoinvent
isCopyrightProtected: true
accessRestrictedTo: 1

## General comment
The Swiss interim storage for nuclear waste Zwilag has been modelled using two equal modules for the infrastructure. The reason is mainly due to the need within the ecoinvent scheme to trace the waste streams which end in the two final repositories for conditioned radioactive wastes. These two streams are the LLW: Low and intermediate Level long-lived radioactive Waste; and, the SF/HLW/ILW: Spent Fuel (unreprocessed in canisters), High Level radioactive Waste (vitrified in reprocessing), and Intermediate Level radioactive waste (mainly from reprocessing). This module relates to the second. The subdivision of the material use for the construction of Zwilag has been arbitrarily made with 50% for each part. The materials considered were only concrete and steel (reinforcing bars and structures), based on a rough calculation from a drawing. The capacity of the entire Zwilag is for approximately 20000 m3 of conditioned waste, of which 3000 HLW. An estimation of the energy consumption for the construction has been made using the energy requirements for the module “building, hall, steel construction”. The energy use for decommissioning is assumed to be 25% of the energy use from construction.
[This dataset was already contained in the ecoinvent database version 2. It was not individually updated during the transfer to ecoinvent version 3. Life Cycle Impact Assessment results may still have changed, as they are affected by changes in the supply chain, i.e. in other datasets. This dataset was generated following the ecoinvent quality guidelines for version 2. It may have been subject to central changes described in the ecoinvent version 3 change report (http://www.ecoinvent.org/database/ecoinvent-version-3/reports-of-changes/), and the results of the central updates were reviewed extensively. The changes added e.g. consistent water flows and other information throughout the database. The documentation of this dataset can be found in the ecoinvent reports of version 2, which are still available via the ecoinvent website. The change report linked above covers all central changes that were made during the conversion process.]

## Included activities end
Included in the module are the steel and concrete used for construction. Energy for construction and decommiddioning (electricity and diesel oil), inerts from dismantling of the buildings, and the surface use are also included.

## Geography
Swiss conditions.

## Technology
Information regards design in mid 1990s.

## Reference product
- nuclear waste storage, interim, for high level radioactive waste before final repository: 1 unit; CPC 54290: General construction services of other civil engineering works; By-product classification allocatable product
  EcoSpold01Location=CH
  production volume 3.96633 unit
    This is a placeholder value that does not reflect real-world production volumes. This dataset does not currently require a real-world production volume to work in the database framework, and no actual data were collected yet. This has no negative effect on the results of the ecoinvent database.
  property price 4.64017e6 EUR2005
    EU27 I/O database(in the 'EU & DK Input Output Database' (available in SimaPro)); -79 Building, non-residential EU 27 (calculated to be 38.169 EUR2003/kg). Based on consumption of (_53 Iron basic, virgin, EU27;7.25517782294095E-3 kg/EUR building; 0.45 EUR2003 per kg DS), (_61 Iron, after first processing, EU27;5.8766830719783E-3kg/EUR building; 0.62 EUR2003 per kg DS), (_65 Fabricated metal products, except machinery, EU27; 8.9167022775554E-3 kg/EUR building; 3.63 EUR2003 per kg DS) and (_66 Machinery and equipment n.e.c., EU27;4.15071881936446E-3 kg/EUR building; 5.71 EUR2003 per kg DS) - 122500 kg
  property true value 4.64017e6
    allocation property applied in "true value" allocation // value calculated from revenue

## By-products
- iron scrap, sorted, pressed: 0 kg; By-product classification Recyclable; CPC 39310: Slag, dross, scalings and other waste from the manufacture of iron or steel; pedigree (1,1,1,1,1)
  Iron scrap recovered from this waste.
  production volume 1618.4 kg
  property price 0.175 EUR2005
    Temporary price data. Calculated as 90% of purchasers price based on: 2005 import and export prices (total trades (USD) divided by total weight (kg) in biggest economies of the world: EU27, USA, Brasil, China, India, Japan and Russia) from UN Commodity Trade Statistics Database (http://data.un.org/Explorer.aspxDatabase [Accessed 2011.06.20]). Commodity: Waste or scrap, of cast iron
  property carbon content 0
    carbon content on a dry matter basis (reserved; not for manual entry)
  property true value 6.1818
    allocation property applied in "true value" allocation // value calculated from revenue
  properties: water content 0, water in wet mass 0 kg, carbon content, fossil 0, dry mass 1 kg, carbon content, non-fossil 0, wet mass 1 kg, carbon allocation 0 kg
- heat, for reuse in municipal waste incineration only: 0 MJ; CPC 17300: Steam and hot water; By-product classification allocatable product; pedigree (1,1,1,1,1)
  Net electricity generated from this waste and used in internal MSWI plant energy redistribution.
  Uncertainty: uncertainty is calculated from uncertainties in waste composition and uncertainties in energy efficiency and the uncertainty in internal energy demand
  production volume 52.4938 MJ
  property exergy 0.1842 MJ; name E_th_prod_MSWI_exergy
    This exergy property is based on the exergy content of the product.
  property price 0.0106 EUR2005; name E_th_prod_MSWI_price_EUR2005
    Average European district heat price from Ecoheatcool and Euroheat 2005-2006, Ecoheat Work package 1: The European heat market. Final report. 10.6 EUR/GJ i s the price of district heat. http://www.solarthermalworld.org/files/Ecoheatcool%20WP1%20Web.pdf?download
  property true value relation 0.1842; name E_th_prod_MSWI_true_value_relation
    property to calculate "true value" from
  property true value 0.107564
    allocation property applied in "true value" allocation // value calculated from true value relation
- electricity, for reuse in municipal waste incineration only: 0 kWh; CPC 17100: Electrical energy; By-product classification allocatable product; pedigree (1,1,1,1,1)
  (same comment as for heat, for reuse in municipal waste incineration only)
  production volume 7.39255 kWh
  property true value relation 3.6; name E_el_prod_MSWI_true_value_relation
    property to calculate "true value" from
  property price 0.1 EUR2005; name E_el_prod_MSWI_price_EUR2005
    Estimated to be the same price as in case of electricity, medium voltage.
  property exergy 3.6 MJ; name E_el_prod_MSWI_exergy
    This exergy property is based on the exergy content of the product.
  property true value 0.296052
    (same comment as for heat, for reuse in municipal waste incineration only)

## Inputs from technosphere
- reinforcing steel: 999999 kg; lognormal variance with pedigree 0.082, pedigree (1,1,5,5,1)
  own estimation, lack of data
  EcoSpold01Location=RER
  properties: carbon content, fossil 0.004, dry mass 1 kg, wet mass 1 kg
- diesel, burned in building machine: 3.80999e6 MJ; lognormal variance with pedigree 0.162, pedigree (1,1,5,5,1)
  EcoSpold01Location=GLO
  own estimation from an ecoinvent module, lack of direct data
- steel, low-alloyed, hot rolled: 225000 kg; lognormal variance with pedigree 0.162, pedigree (1,1,5,5,1)
  own estimation, lack of data
  EcoSpold01Location=RER
  properties: dry mass 1 kg, wet mass 1 kg, carbon content, fossil 0.005
  note on carbon content, fossil: Low alloyed steel composition given in Tab. 3.2 ecoinvent v2.2 report 10_partII. Steel assumed to have a C content of 0.5%
- waste reinforced concrete: 0 kg; pedigree (1,1,1,1,1)
  own estimation from total reinforced concrete
  EcoSpold01Location=CH
  production volume 0 kg
    Calculated from the production volume of nuclear waste storage, interim, for high level radioactive waste before final repository in proportion to the respective output amounts.
  properties: water content 0.00585407, dry mass 0.99418 kg, wet mass 1 kg
- electricity, medium voltage: 0 kWh; pedigree (1,1,1,1,1)
  EcoSpold01Location=CH
  own estimation from an ecoinvent module, lack of direct data
- concrete, normal: 0 m3; pedigree (1,1,1,1,1)
  EcoSpold01Location=CH
  own estimation, lack of data
  properties: water content 0.086758, dry mass 2190 kg, wet mass 2380 kg
- waste reinforced concrete: -1.37509e6, -1.96249e7 kg (2 entries); lognormal variance with pedigree 0.112, pedigree (1,1,5,5,1)
  own estimation from total reinforced concrete
  EcoSpold01Location=CH
  production volume 6.3e7 kg
- electricity, medium voltage: 1770.56, 322.168, 7436.57, 25310, 5463.48, 79214.8, 11337.1, 37145.1 kWh (8 entries); lognormal variance with pedigree 0.162, pedigree (1,1,5,5,1)
  EcoSpold01Location=CH
  own estimation from an ecoinvent module, lack of direct data
- concrete, normal: 190.568, 19.8569, 160.756, 90.4251, 382.925, 12.9158, 7442.54 m3 (7 entries); lognormal variance with pedigree 0.082, pedigree (1,1,5,5,1)
  EcoSpold01Location=CH
  own estimation, lack of data

## Inputs from nature
- Transformation, to industrial area [natural resource, land]: 16000 m2; lognormal variance with pedigree 0.062, pedigree (1,1,5,5,1)
  own estimation from plan
- Transformation, from pasture, man made [natural resource, land]: 16000 m2; lognormal variance with pedigree 0.062, pedigree (1,1,5,5,1)
  own estimation from plan
- Occupation, industrial area [natural resource, land]: 975999 m2*year; lognormal variance with pedigree 0.082, pedigree (1,1,5,5,1)
  own estimation from plan
- Transformation, to unspecified [natural resource, land]: 16000 m2; lognormal variance with pedigree 0.062, pedigree (1,1,5,5,1)
  own estimation from plan
- Transformation, from industrial area [natural resource, land]: 16000 m2; lognormal variance with pedigree 0.062, pedigree (1,1,5,5,1)
  own estimation from plan

## Sampling procedure
Literature

## Extrapolations
none This dataset has been copied from an original dataset covering the geography CH. The uncertainty has been adjusted accordingly.

## Review by Roberto Dones 2003-08-27
passed
for final run August 2003
