# treatment of waste vapour barrier, flame-retarded, municipal incineration

Dataset: EcoSpold 2, unit process
Geography: RoW
Time period: 2006-01-01 to 2019-12-31
Technology level: current
Classification: ISIC rev.4 ecoinvent: 3821:Treatment and disposal of non-hazardous waste
Synonyms: municipal waste incineration; Kehrichtverbrennung; Siedlungsabfallverbrennung
Scenario: Business-as-Usual
System model: Allocation at the point of substitution
Share of production covered: 1.8 %
Generated by: Gabor Doka
Published in: Doka G. 2013
Database: ecoinvent
isCopyrightProtected: true
accessRestrictedTo: 1

## General comment
This dataset represents the activity of waste disposal of waste vapour barrier, flame-retarded in a municipal solid waste incinerator (MSWI) // Recommended use of this dataset: For disposal of bulk or small parts of flame-retarded polymer vapour barrier (PE with 6.7w% bromine) (waste building product) // // Waste composition (wet, in ppm): upper heating value 40.38 MJ/kg; lower heating value 40.05 MJ/kg; H2O 3732; O 35860; H 114290; C 766980; S 398.3; N 1210.3; P n.a.; B n.a.; Cl 1363.6; Br 67000; F 13.421; I n.a.; Ag n.a.; As 1.7; Ba 223.68; Cd 31.672; Co 1.5658; Cr 11.631; Cu 38.596; Hg 0.044736; Mn 28.034; Mo n.a.; Ni 0.89472; Pb 21.082; Sb 9.3945; Se 1.8789; Sn 3.5585; V 2057.8; Zn 319.09; Be 0.44736; Sc n.a.; Sr 79.182; Ti 894.72; Tl 0.35789; W n.a.; Si n.a.; Fe 1431.5; Ca 2415.7; Al 178.94; K n.a.; Mg 89.472; Na 1311.2; // Share of carbon in waste that is biogenic 0%. // Share of metals in waste not oxidised and bulk-recyclable (exclude very small or thin parts) Iron: 0%; Alu: 0%; Copper: 0%. // One kg of this waste produces 0.04073 kg of slag and 0.04875 kg of residues, which are landfilled. Additional solidification with 0.0195 kg of cement. // Net energy production: 5.2MJ/kg electric energy and 10.09MJ/kg thermal energy. // Recovery of metal scrap to recycling: 0g iron scrap, 0g aluminium scrap, 0g copper scrap.

## Included activities start
waste incineration from waste reception gate and delivery into waste bunker at incinerator plant site (without transports to the incinerator)

## Included activities end
Waste-specific short-term emissions to water from leachate. Long-term emissions from landfill to ground water.

## Geography
Specific to the technology mix encountered in Switzerland in 2010. Well applicable to modern incineration practices in Europe, North America or Japan.

## Technology
average Swiss MSWI plants in 2010 (grate incinerators) with electrostatic precipitator for fly ash (ESP), wet flue gas scrubber and 25% SNCR , 42.77% SCR-high dust , 32.68% SCR-low dust -DeNOx facilities and 0% without Denox (weighted according to mass of burnt waste, representing Swiss average). Efficiency of iron scrap separation from slag : 58%. Efficiency of non-ferrous scrap separation from slag : 31%. Gross electric efficiency technology mix 15.84% and Gross thermal efficiency technology mix 28.51%

## Time period
Waste composition as given in literature reference, theoretical data or other source. Transfer coefficients for modern MSWI.

## Reference product
- electricity, for reuse in municipal waste incineration only: 1 kWh; name E_el_prod_MSWI; CPC 17100: Electrical energy; By-product classification allocatable product; pedigree (1,1,1,1,1)
  Net electricity generated from this waste and used in internal MSWI plant energy redistribution.
  Uncertainty: uncertainty is calculated from uncertainties in waste composition and uncertainties in energy efficiency and the uncertainty in internal energy demand
  production volume 5.2081e7 kWh
    calculated in proportion to reference product waste input to incinerator
  property exergy 3.6 MJ; name E_el_prod_MSWI_exergy
    This exergy property is based on the exergy content of the product.
  property true value relation 3.6; name E_el_prod_MSWI_true_value_relation
    property to calculate "true value" from
  property price 0.1 EUR2005; name E_el_prod_MSWI_price_EUR2005
    Estimated to be the same price as in case of electricity, medium voltage.
  property true value 0.185124; name E_el_prod_MSWI_true_value
    allocation property applied in "true value" allocation // value calculated from true value relation
- heat, for reuse in municipal waste incineration only: 0 MJ; name E_th_prod_MSWI; CPC 17300: Steam and hot water; By-product classification allocatable product; pedigree (1,1,1,1,1)
  (same comment as for electricity, for reuse in municipal waste incineration only)
  production volume 3.6416e8 MJ
    calculated in proportion to reference product waste input to incinerator
  property true value relation 0.1842; name E_th_prod_MSWI_true_value_relation
    property to calculate "true value" from
  property price 0.0106 EUR2005; name E_th_prod_MSWI_price_EUR2005
    Average European district heat price from Ecoheatcool and Euroheat 2005-2006, Ecoheat Work package 1: The European heat market. Final report. 10.6 EUR/GJ i s the price of district heat. http://www.solarthermalworld.org/files/Ecoheatcool%20WP1%20Web.pdf?download
  property exergy 0.1842 MJ; name E_th_prod_MSWI_exergy
    This exergy property is based on the exergy content of the product.
  property true value 0.0662319; name E_th_prod_MSWI_true_value
    (same comment as for electricity, for reuse in municipal waste incineration only)
- waste vapour barrier, flame-retarded: 0 kg; CPC 39217: Worn clothing and other worn textile articles; By-product classification Waste; CAS 9002-88-4
  Main reference product of this activity (supply of disposal service).
  production volume 3.6076e7 kg
    based on estimate on MSW in WTE globally and share of building products in Swiss MSW based on an unqualified estimate of building demand of Swiss population.
  property price 0 EUR2005
    Waste products are assigned a price of zero as they are assumed to require further treatment.
  property carbon content 0.803141
    carbon content on a dry matter basis (reserved; not for manual entry)
  property true value 0
    allocation property applied in "true value" allocation // value calculated from revenue
  properties: carbon content, non-fossil 0, carbon content, fossil 0.803141, wet mass 1 kg, water content 0.0471204, dry mass 0.955 kg, water in wet mass 0.045 kg, carbon allocation 0.767 kg

## Inputs from technosphere
- waste cement, hydrated: 0 kg; pedigree (1,1,1,1,1)
  Hydrated cement output for solidification of landfilled residual material.
  Uncertainty: Uncertainty calculated from uncertainty of the waste composition of this waste and transfer coefficients in the incinerator and of the solidification recipe.
  production volume 0 kg
    calculated in proportion to reference product waste input to incinerator
  properties: dry mass 1 kg, wet mass 1 kg
- heat, district or industrial, natural gas: 0 MJ; pedigree (1,1,1,1,1)
  Input to DeNOx stage, to heat up flue gas in low-dust SCR.
  Uncertainty: uncertainty calculated from uncertainty in average DeNOx input, uncertainty in the share of thermal NOx, uncertainty of nitrogen content in average municipal waste and the uncertainty in nitrogen content in *this* waste.
- process-specific burdens, slag landfill: 0 kg; pedigree (1,1,1,1,1)
  Mass-specific expenditures required for landfilling of bottom ash.
  Uncertainty: uncertainty is calculated from uncertainties in waste composition and transfer coefficients in incinerator
- water, decarbonised: 0 kg; pedigree (1,1,1,1,1)
  Incinerator process water used in flue gas scrubber stage.
  Uncertainty: uncertainty calculated from uncertainty in average water input, and the uncertainty of the waste composition of this waste
  properties: wet mass 1 kg
- chemical, organic: 4.63089e-6 kg; lognormal variance with pedigree 0.98648, pedigree (1,1,3,1,1)
  Auxilliary inputs for the wastewater treatment stage of the incinerator plant. Proxy for (pure) Trisodium-trimercapto-s-triazine (CAS 17766-26-6), used as 15% diluted solution, aka TMT15.
  Uncertainty: uncertainty calculated from uncertainty in average TMT15 input, of transfer coefficients in the incinerator, and the uncertainty of the waste composition of this waste
  properties: dry mass 1 kg, carbon content, fossil 0.628, wet mass 1 kg
- residual material landfill: 5.18143e-11 unit; lognormal variance with pedigree 0.081893, pedigree (1,1,3,1,1)
  Landfill infrastructure required for landfilling of incineration residues.
  Uncertainty: uncertainty is calculated from uncertainties in waste composition and transfer coefficients in incinerator
- chemical, inorganic: 0.000528602 kg; lognormal variance with pedigree 0.13697, pedigree (1,1,3,1,1)
  Auxilliary inputs for the wastewater treatment stage of the incinerator plant. Proxy for Polyelectrolyte.
  Uncertainty: uncertainty calculated from uncertainty in average Polyelectrolyte input, of transfer coefficients in the incinerator, and the uncertainty of the waste composition of this waste
  properties: carbon content, fossil 0.003, wet mass 1 kg, dry mass 1 kg
- ammonia, liquid: 0 kg; pedigree (1,1,1,1,1)
  Input to DeNOx stage (100% NH3).
  Uncertainty: uncertainty calculated from uncertainty in average DeNOx input, uncertainty in the share of thermal NOx, uncertainty of nitrogen content in average municipal waste and the uncertainty in nitrogen content in *this* waste.
  properties: dry mass 1 kg, wet mass 1 kg
- hydrochloric acid, without water, in 30% solution state: 0 kg; pedigree (1,1,1,1,1)
  Auxilliary inputs for the wastewater treatment stage of the incinerator plant.
  Uncertainty: uncertainty calculated from uncertainty in average HCl input, of transfer coefficients in the incinerator, and the uncertainty of the waste composition of this waste
  properties: dry mass 1 kg, wet mass 1 kg
- chromium oxide, flakes: 7.08646e-7 kg; lognormal variance with pedigree 0.5015, pedigree (1,1,3,1,1)
  Input to DeNOx stage.
  Uncertainty: uncertainty calculated from uncertainty in average DeNOx input, uncertainty in the share of thermal NOx, uncertainty of nitrogen content in average municipal waste and the uncertainty in nitrogen content in *this* waste.
  properties: wet mass 1 kg, dry mass 1 kg
- municipal waste incineration facility: 1.27546e-10 unit
  Demands per kilogram waste.
- titanium dioxide: 0 kg; pedigree (1,1,1,1,1)
  Input to DeNOx stage (TiO2 catalyst carrier)
  Uncertainty: uncertainty calculated from uncertainty in average DeNOx input, uncertainty in the share of thermal NOx, uncertainty of nitrogen content in average municipal waste and the uncertainty in nitrogen content in *this* waste.
  properties: wet mass 1 kg, dry mass 1 kg
- quicklime, milled, packed: 0 kg; pedigree (1,1,1,1,1)
  Auxilliary inputs for the flue gas treatment stage of the incinerator plant.
  Uncertainty: uncertainty calculated from uncertainty in average CaO input, of transfer coefficients in the incinerator, and the uncertainty of the waste composition of this waste
  properties: water content 0.010101, dry mass 0.99 kg, wet mass 1 kg
- cement, unspecified: 0 kg; pedigree (1,1,1,1,1)
  Cement required for solidification of landfilled residual material.
  Uncertainty: Uncertainty calculated from uncertainty of the waste composition of this waste, of transfer coefficients in the incinerator and of the solidification recipe.
  properties: wet mass 1 kg, dry mass 1 kg
- sodium hydroxide, without water, in 50% solution state: 0.000882262 kg; lognormal variance with pedigree 0.12182, pedigree (1,1,3,1,1)
  Auxilliary inputs for the flue gas treatment stage of the incinerator plant.
  Uncertainty: uncertainty calculated from uncertainty in average NaOH input, of transfer coefficients in the incinerator, and the uncertainty of the waste composition of this waste
  properties: wet mass 1 kg, dry mass 1 kg
- transport, freight, lorry, unspecified: 0 metric ton*km; pedigree (1,1,1,1,1)
  Transport services to transport incineration residues to landfills.
  Uncertainty: uncertainty calculated from uncertainty of the waste composition of this waste, uncertainty of transfer coefficients and the uncertainty in generic transportation distances
- process-specific burdens, residual material landfill: 0 kg; pedigree (1,1,1,1,1)
  Mass-specific expenditures required for landfilling of incineration residues.
  Uncertainty: uncertainty is calculated from uncertainties in waste composition and transfer coefficients in incinerator
- slag landfill: 3.55466e-11 unit; lognormal variance with pedigree 0.049116, pedigree (1,1,3,1,1)
  Landfill infrastructure required for landfilling of bottom ash.
  Uncertainty: uncertainty is calculated from uncertainties in waste composition and transfer coefficients in incinerator
- iron (III) chloride, without water, in 40% solution state: 0.000152489 kg; lognormal variance with pedigree 0.43777, pedigree (1,1,3,1,1)
  Auxilliary inputs for the wastewater treatment stage of the incinerator plant.
  Uncertainty: uncertainty calculated from uncertainty in average FeCl3 input, of transfer coefficients in the incinerator, and the uncertainty of the waste composition of this waste
  properties: wet mass 1 kg, dry mass 1 kg
- waste cement, hydrated: -0.00020934, -0.00697629, -0.0176859 kg (3 entries); lognormal variance with pedigree 0.090977, pedigree (1,1,3,1,1)
  (same comment as for waste cement, hydrated)
  production volume 1.7587e6 kg
- heat, district or industrial, natural gas: 0.00129008, 0.0294191, 0.0729347 MJ (3 entries); lognormal variance with pedigree 0.208, pedigree (1,1,3,1,1)
  (same comment as for heat, district or industrial, natural gas)
- process-specific burdens, slag landfill: 0.00565597, 0.0143387 kg (2 entries); lognormal variance with pedigree 0.049116, pedigree (1,1,3,1,1)
  (same comment as for process-specific burdens, slag landfill)
- water, decarbonised: 0.0565038, 0.147023, 0.592977, 0.144802, 0.0291914, 0.0959868, 0.00529904, 0.0755102, 0.175894, 1.10334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 kg (12 entries); lognormal variance with pedigree 0.43777, pedigree (1,1,3,1,1)
  (same comment as for water, decarbonised)
- ammonia, liquid: 5.68111e-5, 0.000497402 kg (2 entries); lognormal variance with pedigree 0.208, pedigree (1,1,3,1,1)
  (same comment as for ammonia, liquid)
- hydrochloric acid, without water, in 30% solution state: 2.54007e-5, 0.000113533 kg (2 entries); lognormal variance with pedigree 0.13697, pedigree (1,1,3,1,1)
  (same comment as for hydrochloric acid, without water, in 30% solution state)
- titanium dioxide: 4.65398e-6, 3.00702e-5 kg (2 entries); lognormal variance with pedigree 0.5015, pedigree (1,1,3,1,1)
  (same comment as for titanium dioxide)
- quicklime, milled, packed: 3.57562e-5, 0.00421239 kg (2 entries); lognormal variance with pedigree 0.13984, pedigree (1,1,3,1,1)
  (same comment as for quicklime, milled, packed)
- cement, unspecified: 0.000298158, 2.1838e-5, 2.47157e-5, 6.22454e-5, 0.00143297, 0.0014077, 4.14327e-5, 0.000455054, 5.50565e-5, 0.00614943 kg (10 entries); lognormal variance with pedigree 0.090977, pedigree (1,1,3,1,1)
  (same comment as for cement, unspecified)
- transport, freight, lorry, unspecified: 0.000121711, 0.00167296 metric ton*km (2 entries); lognormal variance with pedigree 0.036731, pedigree (1,1,3,1,1)
  (same comment as for transport, freight, lorry, unspecified)
- process-specific burdens, residual material landfill: 0.00703551, 0.017836 kg (2 entries); lognormal variance with pedigree 0.081893, pedigree (1,1,3,1,1)
  (same comment as for process-specific burdens, residual material landfill)

## Inputs from nature
- Oxygen [natural resource, in air]: 1.51678 kg; lognormal variance with pedigree 0.01469, pedigree (1,1,3,1,1)
  Oxygen from ambient air needed to combust and oxidise this waste. Net demand, i.e. without O2 leaving the plant in flue gas uncombusted.
  Uncertainty: uncertainty is calculated from uncertainties in waste composition and transfer coefficients to flue gas and soild residues in incinerator

## Emissions to nature
- Chromium VI [water, surface water]: 1.65846e-7 kg; lognormal variance with pedigree 1.3219, pedigree (1,1,3,1,1)
  Emissions to water from waste composition and transfer coefficients in incinerator and landfills.
  Uncertainty: uncertainty is calculated from uncertainties in waste composition and transfer coefficients in incinerator and landfills
- Antimony [water, surface water]: 1.65198e-6 kg; lognormal variance with pedigree 1.2764, pedigree (1,1,3,1,1)
  (same comment as for Chromium VI)
- Antimony [air, urban air close to ground]: 3.83944e-12 kg; lognormal variance with pedigree 1.3476, pedigree (1,1,3,1,1)
  Emission to air from waste composition and transfer coefficients.
  Uncertainty: uncertainty is calculated from uncertainties in waste composition and transfer coefficients in incinerator
- Hydrogen chloride [air, urban air close to ground]: 3.97005e-7 kg; lognormal variance with pedigree 0.64258, pedigree (1,1,3,1,1)
  (same comment as for Antimony)
- Magnesium [air, urban air close to ground]: 4.81476e-8 kg; lognormal variance with pedigree 0.99591, pedigree (1,1,3,1,1)
  (same comment as for Antimony)
- Cobalt [water, surface water]: 1.44729e-10 kg; lognormal variance with pedigree 1.7933, pedigree (1,1,3,1,1)
  (same comment as for Chromium VI)
- Tin, ion [water, ground-, long-term]: 6.9482e-7 kg; lognormal variance with pedigree 2.248, pedigree (1,1,3,1,1)
  Long-term emissions from landfilling of incineration residues.
  Uncertainty: uncertainty is calculated from uncertainties in waste composition and transfer coefficients in incinerator and landfills.
- Cadmium [air, urban air close to ground]: 8.2359e-9 kg; lognormal variance with pedigree 1.143, pedigree (1,1,3,1,1)
  (same comment as for Antimony)
- Magnesium [water, ground-, long-term]: 4.04244e-5 kg; lognormal variance with pedigree 0.94942, pedigree (1,1,3,1,1)
  (same comment as for Tin, ion)
- TOC, Total Organic Carbon [water, surface water]: 0.000199895 kg; lognormal variance with pedigree 0.027175, pedigree (1,1,3,1,1)
  (same comment as for Chromium VI)
- BOD5, Biological Oxygen Demand [water, surface water]: 0.00045186 kg; lognormal variance with pedigree 0.027696, pedigree (1,1,3,1,1)
  (same comment as for Chromium VI)
- Strontium [air, urban air close to ground]: 4.03974e-9 kg; lognormal variance with pedigree 1.0327, pedigree (1,1,3,1,1)
  (same comment as for Antimony)
- BOD5, Biological Oxygen Demand [water, ground-, long-term]: 0.000961187 kg; lognormal variance with pedigree 0.015676, pedigree (1,1,3,1,1)
  (same comment as for Tin, ion)
- Iron, ion [water, ground-, long-term]: 0.000368455 kg; lognormal variance with pedigree 0.78928, pedigree (1,1,3,1,1)
  (same comment as for Tin, ion)
- Phenol, pentachloro- [air, urban air close to ground]: 2.04793e-12 kg; lognormal variance with pedigree 0.071805, pedigree (1,1,3,1,1)
  Incomplete combustion product emitted to air.
  Uncertainty: uncertainty calculated from uncertainty in average operation emissions, and the uncertainty of the flue gas volume from this waste.
- DOC, Dissolved Organic Carbon [water, ground-, long-term]: 0.00116281 kg; lognormal variance with pedigree 0.015676, pedigree (1,1,3,1,1)
  (same comment as for Tin, ion)
- Cyanide [air, urban air close to ground]: 1.97855e-6 kg; lognormal variance with pedigree 1.4088, pedigree (1,1,3,1,1)
  Nitrogen species emitted to air after DeNOx stage.
  Uncertainty: uncertainty calculated from uncertainty in average N-emissions and uncertainty in the share of thermal NOx and the uncertainty in nitrogen content in *this* waste.
- TOC, Total Organic Carbon [water, ground-, long-term]: 0.00116281 kg; lognormal variance with pedigree 0.015676, pedigree (1,1,3,1,1)
  (same comment as for Tin, ion)
- Calcium [air, urban air close to ground]: 9.69962e-6 kg; lognormal variance with pedigree 0.55247, pedigree (1,1,3,1,1)
  (same comment as for Antimony)
- Benzene [air, urban air close to ground]: 4.70267e-9 kg; lognormal variance with pedigree 0.071805, pedigree (1,1,3,1,1)
  (same comment as for Phenol, pentachloro-)
- Selenium [air, urban air close to ground]: 1.14358e-8 kg; lognormal variance with pedigree 1.4996, pedigree (1,1,3,1,1)
  (same comment as for Antimony)
- Chloride [water, surface water]: 0.000534112 kg; lognormal variance with pedigree 0.50492, pedigree (1,1,3,1,1)
  (same comment as for Chromium VI)
- Manganese [air, urban air close to ground]: 2.73153e-9 kg; lognormal variance with pedigree 1.165, pedigree (1,1,3,1,1)
  (same comment as for Antimony)
- Particulates, > 2.5 um, and < 10um [air, urban air close to ground]: 2.82142e-9 kg; lognormal variance with pedigree 0.1685, pedigree (1,1,3,1,1)
  (same comment as for Phenol, pentachloro-)
- Antimony [water, ground-, long-term]: 3.04794e-6 kg; lognormal variance with pedigree 1.2406, pedigree (1,1,3,1,1)
  (same comment as for Tin, ion)
- Calcium, ion [water, ground-, long-term]: 0.000918025 kg; lognormal variance with pedigree 0.50791, pedigree (1,1,3,1,1)
  (same comment as for Tin, ion)
- Thallium [air, urban air close to ground]: 1.8259e-10 kg; lognormal variance with pedigree 1.7208, pedigree (1,1,3,1,1)
  (same comment as for Antimony)
- Chromium, ion [water, surface water]: 4.60768e-10 kg; lognormal variance with pedigree 1.2857, pedigree (1,1,3,1,1)
  (same comment as for Chromium VI)
- Copper, ion [water, ground-, long-term]: 1.75886e-5 kg; lognormal variance with pedigree 1.0716, pedigree (1,1,3,1,1)
  (same comment as for Tin, ion)
- Selenium [water, surface water]: 3.23829e-7 kg; lognormal variance with pedigree 1.185, pedigree (1,1,3,1,1)
  (same comment as for Chromium VI)
- Water [air, urban air close to ground]: 0.000932056 m3; lognormal variance with pedigree 1.3, pedigree (1,1,3,1,1)
  Water vapour from waste humidity, hydrogen oxidation and part of the process water.
  Uncertainty: Uncertainty calculated from uncertainty in waste composition, process water input and the uncertainty of fraction to air.
- Nickel, ion [water, ground-, long-term]: 4.38162e-7 kg; lognormal variance with pedigree 1.5533, pedigree (1,1,3,1,1)
  (same comment as for Tin, ion)
- Cobalt [air, urban air close to ground]: 1.4528e-9 kg; lognormal variance with pedigree 1.5284, pedigree (1,1,3,1,1)
  (same comment as for Antimony)
- DOC, Dissolved Organic Carbon [water, surface water]: 0.000199895 kg; lognormal variance with pedigree 0.027175, pedigree (1,1,3,1,1)
  (same comment as for Chromium VI)
- COD, Chemical Oxygen Demand [water, ground-, long-term]: 0.00293856 kg; lognormal variance with pedigree 0.015676, pedigree (1,1,3,1,1)
  (same comment as for Tin, ion)
- Methane, fossil [air, urban air close to ground]: 7.05381e-8 kg; lognormal variance with pedigree 0.071805, pedigree (1,1,3,1,1)
  (same comment as for Phenol, pentachloro-)
- Hydrogen fluoride [air, urban air close to ground]: 4.61946e-8 kg; lognormal variance with pedigree 1.2421, pedigree (1,1,3,1,1)
  (same comment as for Antimony)
- Dioxins, measured as 2,3,7,8-tetrachlorodibenzo-p-dioxin [air, urban air close to ground]: 9.40474e-15 kg; lognormal variance with pedigree 0.37505, pedigree (1,1,3,1,1)
  (same comment as for Phenol, pentachloro-)
- Titanium, ion [water, ground-, long-term]: 0.000136459 kg; lognormal variance with pedigree 0.80183, pedigree (1,1,3,1,1)
  (same comment as for Tin, ion)
- Vanadium [air, urban air close to ground]: 2.2267e-5 kg; lognormal variance with pedigree 0.57372, pedigree (1,1,3,1,1)
  (same comment as for Antimony)
- Fluoride [water, ground-, long-term]: 6.13905e-6 kg; lognormal variance with pedigree 0.73804, pedigree (1,1,3,1,1)
  (same comment as for Tin, ion)
- Lead [water, ground-, long-term]: 5.20031e-6 kg; lognormal variance with pedigree 4.3101, pedigree (1,1,3,1,1)
  (same comment as for Tin, ion)
- Nitrate [water, surface water]: 7.87112e-6 kg; lognormal variance with pedigree 0.44327, pedigree (1,1,3,1,1)
  (same comment as for Chromium VI)
- Carbon dioxide, fossil [air, urban air close to ground]: 1.42612 kg; lognormal variance with pedigree 0.0041986, pedigree (1,1,3,1,1)
  (same comment as for Antimony)
- Titanium [air, urban air close to ground]: 3.7871e-7 kg; lognormal variance with pedigree 0.69574, pedigree (1,1,3,1,1)
  (same comment as for Antimony)
- Heat, waste [air, urban air close to ground]: 15.0795 MJ; lognormal variance with pedigree 0.022004, pedigree (1,1,3,1,1)
  Waste heat generated from heating value of this waste plus any electricity required to process it.
  Uncertainty: uncertainty is calculated from uncertainties in waste composition and uncertainties in energy efficiency and the uncertainty in internal energy demand
- Thallium [water, surface water]: 1.11858e-10 kg; lognormal variance with pedigree 1.8772, pedigree (1,1,3,1,1)
  (same comment as for Chromium VI)
- Sodium, ion [water, ground-, long-term]: 0.000481706 kg; lognormal variance with pedigree 0.31123, pedigree (1,1,3,1,1)
  (same comment as for Tin, ion)
- Copper, ion [water, surface water]: 2.55153e-9 kg; lognormal variance with pedigree 0.97816, pedigree (1,1,3,1,1)
  (same comment as for Chromium VI)
- Manganese [water, surface water]: 2.22639e-9 kg; lognormal variance with pedigree 0.97106, pedigree (1,1,3,1,1)
  (same comment as for Chromium VI)
- Chloride [water, ground-, long-term]: 0.000161213 kg; lognormal variance with pedigree 0.6162, pedigree (1,1,3,1,1)
  (same comment as for Tin, ion)
- Mercury [water, surface water]: 2.47868e-11 kg; lognormal variance with pedigree 1.4017, pedigree (1,1,3,1,1)
  (same comment as for Chromium VI)
- Sulfate [water, ground-, long-term]: 0.000503292 kg; lognormal variance with pedigree 0.4594, pedigree (1,1,3,1,1)
  (same comment as for Tin, ion)
- Heat, waste [water, surface water]: 3.45701 MJ; lognormal variance with pedigree 0.022004, pedigree (1,1,3,1,1)
  (same comment as for Heat, waste)
- Benzene, pentachloro- [air, urban air close to ground]: 2.4846e-11 kg; lognormal variance with pedigree 0.071805, pedigree (1,1,3,1,1)
  (same comment as for Phenol, pentachloro-)
- Aluminium [water, surface water]: 9.87972e-9 kg; lognormal variance with pedigree 1.1198, pedigree (1,1,3,1,1)
  (same comment as for Chromium VI)
- Barium [air, urban air close to ground]: 4.47921e-7 kg; lognormal variance with pedigree 0.87093, pedigree (1,1,3,1,1)
  (same comment as for Antimony)
- Zinc [air, urban air close to ground]: 1.09118e-7 kg; lognormal variance with pedigree 0.83426, pedigree (1,1,3,1,1)
  (same comment as for Antimony)
- NMVOC, non-methane volatile organic compounds, unspecified origin [air, urban air close to ground]: 2.14017e-7 kg; lognormal variance with pedigree 0.071805, pedigree (1,1,3,1,1)
  (same comment as for Phenol, pentachloro-)
- Cadmium, ion [water, ground-, long-term]: 1.17909e-6 kg; lognormal variance with pedigree 6.5724, pedigree (1,1,3,1,1)
  (same comment as for Tin, ion)
- Lead [water, surface water]: 1.02884e-9 kg; lognormal variance with pedigree 0.98435, pedigree (1,1,3,1,1)
  (same comment as for Chromium VI)
- Nitrate [water, ground-, long-term]: 2.22083e-5 kg; lognormal variance with pedigree 0.64037, pedigree (1,1,3,1,1)
  (same comment as for Tin, ion)
- Beryllium [water, surface water]: 1.42949e-10 kg; lognormal variance with pedigree 2.1889, pedigree (1,1,3,1,1)
  (same comment as for Chromium VI)
- Bromine [water, surface water]: 0.0308707 kg; lognormal variance with pedigree 0.061672, pedigree (1,1,3,1,1)
  (same comment as for Chromium VI)
- Ammonia [air, urban air close to ground]: 6.51658e-7 kg; lognormal variance with pedigree 0.24792, pedigree (1,1,3,1,1)
  (same comment as for Cyanide)
- Nickel, ion [water, surface water]: 3.06702e-10 kg; lognormal variance with pedigree 2.1272, pedigree (1,1,3,1,1)
  (same comment as for Chromium VI)
- Bromine [water, ground-, long-term]: 0.00329462 kg; lognormal variance with pedigree 0.17482, pedigree (1,1,3,1,1)
  (same comment as for Tin, ion)
- Bromine [air, urban air close to ground]: 1.70743e-5 kg; lognormal variance with pedigree 0.18285, pedigree (1,1,3,1,1)
  (same comment as for Antimony)
- Sodium, ion [water, surface water]: 0.000181758 kg; lognormal variance with pedigree 0.31912, pedigree (1,1,3,1,1)
  (same comment as for Chromium VI)
- Titanium, ion [water, surface water]: 1.70192e-7 kg; lognormal variance with pedigree 0.52112, pedigree (1,1,3,1,1)
  (same comment as for Chromium VI)
- Aluminium [air, urban air close to ground]: 7.44359e-11 kg; lognormal variance with pedigree 0.95912, pedigree (1,1,3,1,1)
  (same comment as for Antimony)
- Sulfate [water, surface water]: 0.000103088 kg; lognormal variance with pedigree 0.37598, pedigree (1,1,3,1,1)
  (same comment as for Chromium VI)
- Selenium [water, ground-, long-term]: 6.22578e-7 kg; lognormal variance with pedigree 1.0913, pedigree (1,1,3,1,1)
  (same comment as for Tin, ion)
- Chromium VI [water, ground-, long-term]: 5.44367e-7 kg; lognormal variance with pedigree 1.7095, pedigree (1,1,3,1,1)
  (same comment as for Tin, ion)
- Tin [air, urban air close to ground]: 1.18592e-12 kg; lognormal variance with pedigree 1.478, pedigree (1,1,3,1,1)
  (same comment as for Antimony)
- Water [water, surface water]: 0.00024194 m3; lognormal variance with pedigree 1.8425, pedigree (1,1,3,1,1)
  Process water released to surface water.
  Uncertainty: uncertainty calculated from uncertainty in process water input and the uncertainty of fraction to surface water.
- Dinitrogen monoxide [air, urban air close to ground]: 9.20934e-6 kg; lognormal variance with pedigree 1.4088, pedigree (1,1,3,1,1)
  (same comment as for Cyanide)
- Nickel [air, urban air close to ground]: 5.73447e-10 kg; lognormal variance with pedigree 1.6072, pedigree (1,1,3,1,1)
  (same comment as for Antimony)
- Arsenic, ion [water, ground-, long-term]: 2.59714e-7 kg; lognormal variance with pedigree 1.5032, pedigree (1,1,3,1,1)
  (same comment as for Tin, ion)
- Tin, ion [water, surface water]: 4.80303e-11 kg; lognormal variance with pedigree 2.0269, pedigree (1,1,3,1,1)
  (same comment as for Chromium VI)
- Vanadium, ion [water, surface water]: 1.67626e-6 kg; lognormal variance with pedigree 0.76952, pedigree (1,1,3,1,1)
  (same comment as for Chromium VI)
- Mercury [water, ground-, long-term]: 1.45367e-9 kg; lognormal variance with pedigree 3.4277, pedigree (1,1,3,1,1)
  (same comment as for Tin, ion)
- Sodium [air, urban air close to ground]: 5.49213e-6 kg; lognormal variance with pedigree 0.63802, pedigree (1,1,3,1,1)
  (same comment as for Antimony)
- Carbon monoxide, fossil [air, urban air close to ground]: 7.99408e-6 kg; lognormal variance with pedigree 0.75229, pedigree (1,1,3,1,1)
  (same comment as for Phenol, pentachloro-)
- Particulates, < 2.5 um [air, urban air close to ground]: 5.61458e-7 kg; lognormal variance with pedigree 0.37505, pedigree (1,1,3,1,1)
  (same comment as for Phenol, pentachloro-)
- Toluene [air, urban air close to ground]: 9.40525e-9 kg; lognormal variance with pedigree 0.071805, pedigree (1,1,3,1,1)
  (same comment as for Phenol, pentachloro-)
- Calcium, ion [water, surface water]: 1.36444e-5 kg; lognormal variance with pedigree 0.4195, pedigree (1,1,3,1,1)
  (same comment as for Chromium VI)
- COD, Chemical Oxygen Demand [water, surface water]: 0.000457742 kg; lognormal variance with pedigree 0.027108, pedigree (1,1,3,1,1)
  (same comment as for Chromium VI)
- Nitrogen oxides [air, urban air close to ground]: 0.000206354 kg; lognormal variance with pedigree 0.24792, pedigree (1,1,3,1,1)
  Sum of fuel-Nox and thermal-NOx emitted to air after DeNOx stage.
  Uncertainty: uncertainty calculated from uncertainty in average N-emissions and uncertainty in the share of thermal NOx and the uncertainty in nitrogen content in *this* waste.
- Sulfur dioxide [air, urban air close to ground]: 2.16099e-6 kg; lognormal variance with pedigree 0.79244, pedigree (1,1,3,1,1)
  (same comment as for Antimony)
- Magnesium [water, surface water]: 2.12987e-7 kg; lognormal variance with pedigree 1.0964, pedigree (1,1,3,1,1)
  (same comment as for Chromium VI)
- Benzene, hexachloro- [air, urban air close to ground]: 9.83278e-12 kg; lognormal variance with pedigree 0.071805, pedigree (1,1,3,1,1)
  (same comment as for Phenol, pentachloro-)
- Manganese [water, ground-, long-term]: 8.82364e-6 kg; lognormal variance with pedigree 2.106, pedigree (1,1,3,1,1)
  (same comment as for Tin, ion)
- Mercury [air, urban air close to ground]: 6.47118e-10 kg; lognormal variance with pedigree 1.9307, pedigree (1,1,3,1,1)
  (same comment as for Antimony)
- Strontium [water, surface water]: 2.54357e-8 kg; lognormal variance with pedigree 1.7067, pedigree (1,1,3,1,1)
  (same comment as for Chromium VI)
- Chromium [air, urban air close to ground]: 5.18194e-9 kg; lognormal variance with pedigree 1.2675, pedigree (1,1,3,1,1)
  (same comment as for Antimony)
- Iron [air, urban air close to ground]: 1.30893e-9 kg; lognormal variance with pedigree 0.68127, pedigree (1,1,3,1,1)
  (same comment as for Antimony)
- Barium [water, surface water]: 1.53596e-8 kg; lognormal variance with pedigree 1.1611, pedigree (1,1,3,1,1)
  (same comment as for Chromium VI)
- Aluminium [water, ground-, long-term]: 6.60178e-5 kg; lognormal variance with pedigree 0.80897, pedigree (1,1,3,1,1)
  (same comment as for Tin, ion)
- Vanadium, ion [water, ground-, long-term]: 0.00048941 kg; lognormal variance with pedigree 0.43264, pedigree (1,1,3,1,1)
  (same comment as for Tin, ion)
- Benzo(a)pyrene [air, urban air close to ground]: 1.04649e-13 kg; lognormal variance with pedigree 0.37505, pedigree (1,1,3,1,1)
  (same comment as for Phenol, pentachloro-)
- Barium [water, ground-, long-term]: 5.74723e-5 kg; lognormal variance with pedigree 2.229, pedigree (1,1,3,1,1)
  (same comment as for Tin, ion)
- Zinc, ion [water, ground-, long-term]: 4.95067e-5 kg; lognormal variance with pedigree 2.9339, pedigree (1,1,3,1,1)
  (same comment as for Tin, ion)
- Cobalt [water, ground-, long-term]: 6.5074e-7 kg; lognormal variance with pedigree 1.4279, pedigree (1,1,3,1,1)
  (same comment as for Tin, ion)
- Thallium [water, ground-, long-term]: 1.06542e-7 kg; lognormal variance with pedigree 1.2781, pedigree (1,1,3,1,1)
  (same comment as for Tin, ion)
- Cadmium, ion [water, surface water]: 1.54872e-9 kg; lognormal variance with pedigree 0.94032, pedigree (1,1,3,1,1)
  (same comment as for Chromium VI)
- Copper [air, urban air close to ground]: 1.8035e-9 kg; lognormal variance with pedigree 1.1283, pedigree (1,1,3,1,1)
  (same comment as for Antimony)
- Arsenic, ion [water, surface water]: 6.00793e-7 kg; lognormal variance with pedigree 1.3884, pedigree (1,1,3,1,1)
  (same comment as for Chromium VI)
- Zinc, ion [water, surface water]: 1.46877e-8 kg; lognormal variance with pedigree 0.68041, pedigree (1,1,3,1,1)
  (same comment as for Chromium VI)
- Fluoride [water, surface water]: 5.23551e-7 kg; lognormal variance with pedigree 0.7951, pedigree (1,1,3,1,1)
  (same comment as for Chromium VI)
- Iron, ion [water, surface water]: 1.91998e-8 kg; lognormal variance with pedigree 0.88287, pedigree (1,1,3,1,1)
  (same comment as for Chromium VI)
- Beryllium [water, ground-, long-term]: 2.08589e-7 kg; lognormal variance with pedigree 1.5946, pedigree (1,1,3,1,1)
  (same comment as for Tin, ion)
- Lead [air, urban air close to ground]: 8.86139e-10 kg; lognormal variance with pedigree 1.2089, pedigree (1,1,3,1,1)
  (same comment as for Antimony)
- Strontium [water, ground-, long-term]: 4.03449e-5 kg; lognormal variance with pedigree 0.99463, pedigree (1,1,3,1,1)
  (same comment as for Tin, ion)
- Arsenic [air, urban air close to ground]: 6.79361e-9 kg; lognormal variance with pedigree 1.514, pedigree (1,1,3,1,1)
  (same comment as for Antimony)
