# treatment of wastewater, average, capacity 1.6E8l/year

Dataset: EcoSpold 2, unit process
Geography: CA-QC
Time period: 1994-01-01 to 2019-12-31
Technology level: current
Classification: ISIC rev.4 ecoinvent: 3700:Sewerage
Classification: EcoSpold01Categories: waste management/wastewater treatment
Tags: Treatment
Scenario: Business-as-Usual
System model: Allocation at the point of substitution
Generated by: Marylène Dussault
Published in: Doka G. 2008
Database: ecoinvent
isCopyrightProtected: true
accessRestrictedTo: 1

## General comment
This dataset represents activated sludge wastewater treatment. This dataset is a copy of the Global version and is used to approximate activated sludage and biofiltration technolgie in Quebec. This dataset should be replace as soon as data for these technologies in the Quebec region become available. Only the production volume have been modified and the sewer process have been removed as it is included in the market process. Wastewater purified in a small size municipal wastewater treatment plant (capacity class 5), with an average capacity size of 806 per-captia-equivalents PCE.
Wastewater contains (in kg/m3): COD: 0.1556 (GSD=122.5%); BOD: 0.1036 (GSD=122.5%); DOC: 0.04575 (GSD=122.5%); TOC: 0.0673 (GSD=122.5%); SO4-S: 0.044 (GSD=122.5%); S part.: 0.002 (GSD=122.5%); NH4-N: 0.01495 (GSD=122.5%); NO3-N: 0.00105 (GSD=122.5%); NO2-N: 0.0004 (GSD=122.5%); N part.: 0.003279 (GSD=122.5%); N org. solv.: 0.008392 (GSD=122.5%); PO4-P: 0.002459 (GSD=122.5%); P part.: 0.0006147 (GSD=122.5%); Cl: 0.03003 (GSD=224.1%); F: 0.00003277 (GSD=224.1%); As: 0.0000009 (GSD=224.1%); Cd: 0.0000002806 (GSD=223.8%); Co: 0.000001618 (GSD=223.8%); Cr: 0.00001223 (GSD=223.8%); Cu: 0.00003744 (GSD=223.8%); Hg: 0.0000002 (GSD=223.8%); Mn: 0.000053 (GSD=224.1%); Mo: 0.0000009574 (GSD=223.8%); Ni: 0.000006589 (GSD=223.8%); Pb: 0.000008631 (GSD=223.8%); Sn: 0.0000034 (GSD=224.1%); Zn: 0.0001094 (GSD=223.8%); Si: 0.003126 (GSD=224.1%); Fe: 0.007093 (GSD=224.1%); Ca: 0.05083 (GSD=224.1%); Al: 0.001038 (GSD=224.1%); K: 0.0003989 (GSD=224.1%); Mg: 0.005707 (GSD=224.1%); Na: 0.002186 (GSD=224.1%);

## Included activities end
Infrastructure materials for municipal wastewater treatment plant, transports, dismantling. Land use burdens.

## Geography
Specific to the technology mix encountered in Switzerland in 2000. Well applicable to modern treatment practices in Europe, North America or Japan.

## Technology
Three stage wastewater treatment (mechanical, biological, chemical) including sludge digestion (fermentation) according to the average technology in Switzerland

## Parameters
- fraction, process water, to air: 0.1 dimensionless; lognormal variance with pedigree 0.092025, pedigree (4,4,3,2,4)

## Reference product
- wastewater, average: -1 m3; name WWT; CPC 39920: Sewage sludge; By-product classification Waste
  EcoSpold01Location=CH
  production volume 1.63632e6 m3; name PV_WWT
    Literature value. Represents volume of treated wastewater from lagoon facility during a year in Québec. Calculated from Quebec government published data in annual report on wastewater treatments in the region (MAMOT, 2011). Includes all types of lagoon technology (aerated, facultative, non-aerated, etc.).
  property price 0 EUR2005; name WWT_price_EUR2005
    Waste products are assigned a price of zero as they are assumed to require further treatment.
  property carbon content, non-fossil 0.194039
    0.0673 kg TOC/m3 (Tab A.17, ecoinvent v2.2 report 13_I). TOC was considered as Total Carbon.
  property carbon content 0.194039
    carbon content on a dry matter basis (reserved; not for manual entry)
  properties: wet mass 1000 kg, dry mass 0.346837 kg, carbon content, fossil 0, water in wet mass 999.653 kg, water content 2882.2, carbon allocation 0.0673 kg

## By-products
- heat, for reuse in municipal waste incineration only: 0 MJ; CPC 17300: Steam and hot water; By-product classification allocatable product; pedigree (1,1,1,1,1)
  Net electricity generated from this waste and used in internal MSWI plant energy redistribution.
  Uncertainty: uncertainty is calculated from uncertainties in waste composition and uncertainties in energy efficiency and the uncertainty in internal energy demand
  property exergy 0.1842 MJ; name E_th_prod_MSWI_exergy
    This exergy property is based on the exergy content of the product.
  property price 0.0106 EUR2005; name E_th_prod_MSWI_price_EUR2005
    Average European district heat price from Ecoheatcool and Euroheat 2005-2006, Ecoheat Work package 1: The European heat market. Final report. 10.6 EUR/GJ i s the price of district heat. http://www.solarthermalworld.org/files/Ecoheatcool%20WP1%20Web.pdf?download
  property true value relation 0.1842; name E_th_prod_MSWI_true_value_relation
    property to calculate "true value" from
- electricity, for reuse in municipal waste incineration only: 0 kWh; CPC 17100: Electrical energy; By-product classification allocatable product; pedigree (1,1,1,1,1)
  (same comment as for heat, for reuse in municipal waste incineration only)
  property price 0.1 EUR2005; name E_el_prod_MSWI_price_EUR2005
    Estimated to be the same price as in case of electricity, medium voltage.
  property exergy 3.6 MJ; name E_el_prod_MSWI_exergy
    This exergy property is based on the exergy content of the product.
  property true value relation 3.6; name E_el_prod_MSWI_true_value_relation
    property to calculate "true value" from

## Inputs from technosphere
- process-specific burdens, slag landfill: 0.011299 kg; lognormal variance with pedigree 0.072, pedigree (1,1,5,5,1)
  burden from sludge incineration. Uncertainty calculated from wastewater composition and treatment model
  EcoSpold01Location=CH
- ammonia, liquid: 3.4481e-5 kg; lognormal variance with pedigree 0.222, pedigree (1,1,5,5,1)
  EcoSpold01Location=CH
  burden from sludge incineration. Uncertainty calculated from wastewater composition and treatment model
  properties: dry mass 1 kg, wet mass 1 kg
- process-specific burdens, municipal waste incineration: 0.062049 kg; lognormal variance with pedigree 0.052, pedigree (1,1,5,5,1)
  (same comment as for process-specific burdens, slag landfill)
- quicklime, milled, packed: 5.9992e-7 kg; lognormal variance with pedigree 0.092, pedigree (1,1,5,5,1)
  (same comment as for process-specific burdens, slag landfill)
  properties: water content 0.010101, wet mass 1 kg, dry mass 0.99 kg
- electricity, low voltage: 0.20571 kWh; lognormal variance with pedigree 0.062, pedigree (1,1,5,5,1)
  EcoSpold01Location=CH
  direct wastewater treatment plant burden. Uncertainty calculated from wastewater composition and treatment model
- cement, unspecified: 0.00070862 kg; lognormal variance with pedigree 0.082, pedigree (1,1,5,5,1)
  (same comment as for process-specific burdens, slag landfill)
  properties: dry mass 1 kg, wet mass 1 kg
- process-specific burdens, residual material landfill: 0.0017715 kg; lognormal variance with pedigree 0.072, pedigree (1,1,5,5,1)
  (same comment as for process-specific burdens, slag landfill)
- iron (III) chloride, without water, in 40% solution state: 0.015944 kg; lognormal variance with pedigree 0.102, pedigree (1,1,5,5,1)
  EcoSpold01Location=CH
  direct wastewater treatment plant burden plus burden from sludge incineration. Uncertainty calculated from wastewater composition and treatment model
  properties: wet mass 1 kg, dry mass 1 kg
- sodium hydroxide, without water, in 50% solution state: 0.0001685 kg; lognormal variance with pedigree 0.092, pedigree (1,1,5,5,1)
  EcoSpold01Location=RER
  burden from sludge incineration. Uncertainty calculated from wastewater composition and treatment model
  properties: dry mass 1 kg, wet mass 1 kg
- chromium oxide, flakes: 2.0143e-8 kg; lognormal variance with pedigree 0.542, pedigree (1,1,5,5,1)
  (same comment as for sodium hydroxide, without water, in 50% solution state)
  properties: dry mass 1 kg, wet mass 1 kg
- aluminium sulfate, powder: 0.0031512 kg; lognormal variance with pedigree 0.102, pedigree (1,1,5,5,1)
  direct wastewater treatment plant burden. Uncertainty calculated from wastewater composition and treatment model
  EcoSpold01Location=RER
  properties: dry mass 1 kg, wet mass 1 kg
- hydrochloric acid, without water, in 30% solution state: 1.8903e-7 kg; lognormal variance with pedigree 0.082, pedigree (1,1,5,5,1)
  (same comment as for sodium hydroxide, without water, in 50% solution state)
  properties: dry mass 1 kg, wet mass 1 kg
- residual material landfill: 3.6907e-12 unit; lognormal variance with pedigree 0.072, pedigree (1,1,5,5,1)
  (same comment as for process-specific burdens, slag landfill)
- slag landfill: 2.0088e-11 unit; lognormal variance with pedigree 0.072, pedigree (1,1,5,5,1)
  (same comment as for ammonia, liquid)
- waste cement, hydrated: -0.0017715 kg; name w_cement; lognormal variance with pedigree 0.082, pedigree (1,1,5,5,1)
  (same comment as for process-specific burdens, slag landfill)
  production volume 2898.74 kg; = (-1)*w_cement/WWT*PV_WWT
    Calculated from the production volume of sewage, average in proportion to the respective output amounts.
  property price 0 EUR2005; name w_cement_price_EUR2005
  properties: dry mass 1 kg, wet mass 1 kg
- chemical, inorganic: 3.1505e-7 kg; lognormal variance with pedigree 0.082, pedigree (1,1,5,5,1)
  burden from sludge incineration. Uncertainty calculated from wastewater composition and treatment model
  EcoSpold01Location=GLO
  properties: carbon content, fossil 0.003, dry mass 1 kg, wet mass 1 kg
  note on carbon content, fossil: This dataset is an unweighted average of 20 inorganic substances (listed in Tab 88.1, ecoinvent v2.2 report 8, part II), being part of the top100 chemicals included in this database. The C-content has also been calculated as an unweighted average of the C content of the substances composing this dataset.
- waste plastic, mixture: -0.0155 kg; name w_plastic; lognormal variance with pedigree 0.042, pedigree (1,1,5,5,1)
  (same comment as for electricity, low voltage)
  production volume 25363 kg; = (-1)*w_plastic/WWT*PV_WWT
    (same comment as for waste cement, hydrated)
  property price 0 EUR2005; name w_plastic_price_EUR2005
  properties: water content 0.180638, carbon content, fossil 0.747344, dry mass 0.847 kg, wet mass 1 kg
  note on carbon content, fossil: C content in 1 kg DM was calculated using data in Tab A.2, ecoinvent v2.2 report 13_I
- titanium dioxide: 9.87e-7 kg; lognormal variance with pedigree 0.542, pedigree (1,1,5,5,1)
  burden from sludge incineration. Uncertainty calculated from wastewater composition and treatment model
  EcoSpold01Location=RER
  properties: wet mass 1 kg, dry mass 1 kg
- electricity, high voltage: 0.0089206 kWh; lognormal variance with pedigree 0.492, pedigree (1,1,5,5,1)
  (same comment as for process-specific burdens, slag landfill)
- heat, district or industrial, other than natural gas: 0.052039 MJ; lognormal variance with pedigree 0.052, pedigree (1,1,5,5,1)
  (same comment as for process-specific burdens, slag landfill)
- wastewater treatment facility, capacity 1.6E8l/year: 1.7546e-7 unit; lognormal variance with pedigree 0.042, pedigree (1,1,5,5,1)
  uncertainty heeded in exchanges of the module;activityLink introduced to establish a direct link to the corresponding regional supply of this product
  EcoSpold01Location=CH
- waste graphical paper: -0.0155 kg; name w_paper; lognormal variance with pedigree 0.042, pedigree (1,1,5,5,1)
  (same comment as for electricity, low voltage)
  production volume 25363 kg; = (-1)*w_paper/WWT*PV_WWT
    (same comment as for waste cement, hydrated)
  property price 0 EUR2005; name w_paper_price_EUR2005
  properties: water content 0.126126, carbon content, non-fossil 0.454955, wet mass 1 kg, dry mass 0.888 kg
- municipal waste incineration facility: 1.5512e-11 unit; lognormal variance with pedigree 0.052, pedigree (1,1,5,5,1)
  (same comment as for process-specific burdens, slag landfill)
- chemical, organic: 2.5144e-7 kg; lognormal variance with pedigree 0.432, pedigree (1,1,5,5,1)
  EcoSpold01Location=GLO
  burden from sludge incineration. Uncertainty calculated from wastewater composition and treatment model
  properties: carbon content, fossil 0.628, wet mass 1 kg, dry mass 1 kg
  note on carbon content, fossil: This dataset is an unweighted average of 20 organic substances (listed in Tab 88.1, ecoinvent v2.2 report 8, part II), being part of the top100 chemicals included in this database. The C-content has also been calculated as an unweighted average of the C content of the substances composing this dataset.
- heat, district or industrial, natural gas: 0.00302634 MJ; lognormal variance with pedigree 0.222, pedigree (1,1,5,5,1)
  (same comment as for titanium dioxide)
- liquid manure spreading, by vacuum tanker: 0.0005977 m3; lognormal variance with pedigree 0.042, pedigree (1,1,5,5,1)
  burden from sludge spreading. Uncertainty calculated from wastewater composition and treatment model;activityLink introduced to establish a direct link to the corresponding regional supply of this product
  EcoSpold01Location=CH
- iron sulfate: 0.01166 kg; lognormal variance with pedigree 0.102, pedigree (1,1,5,5,1)
  (same comment as for aluminium sulfate, powder)
  properties: dry mass 1 kg, wet mass 1 kg

## Emissions to nature
- Magnesium [water, surface water]: 0.0051478 kg; lognormal variance with pedigree 0.672, pedigree (1,1,5,5,1)
  sewer overload discharge plus direct wastewater treatment plant emission plus emission from sludge incineration. Uncertainty calculated from wastewater composition and treatment model
- Iron, ion [water, ground-, long-term]: 0.0018241 kg; lognormal variance with pedigree 1.002, pedigree (1,1,5,5,1)
  emission from sludge incineration. Uncertainty calculated from wastewater composition and treatment model
- Phosphate [water, ground-]: 2.6769e-5 kg; lognormal variance with pedigree 0.122, pedigree (1,1,5,5,1)
  emission from sludge spreading. Uncertainty calculated from wastewater composition and treatment model
- Mercury [water, surface water]: 6.2267e-8 kg; lognormal variance with pedigree 0.652, pedigree (1,1,5,5,1)
  (same comment as for Magnesium)
- Magnesium [air, urban air close to ground]: 2.2623e-7 kg; lognormal variance with pedigree 0.732, pedigree (1,1,5,5,1)
  direct digester gas emission plus emission from sludge incineration. Uncertainty calculated from wastewater composition and treatment model
- Chloride [water, surface water]: 0.040484 kg; lognormal variance with pedigree 0.482, pedigree (1,1,5,5,1)
  (same comment as for Magnesium)
- Calcium, ion [water, ground-, long-term]: 0.0012735 kg; lognormal variance with pedigree 0.712, pedigree (1,1,5,5,1)
  (same comment as for Iron, ion)
- Iron [air, urban air close to ground]: 1.3001e-7 kg; lognormal variance with pedigree 0.212, pedigree (1,1,5,5,1)
  (same comment as for Magnesium)
- Cobalt [air, urban air close to ground]: 7.4233e-15 kg; lognormal variance with pedigree 0.822, pedigree (1,1,5,5,1)
  (same comment as for Magnesium)
- Nickel, ion [water, surface water]: 3.9961e-6 kg; lognormal variance with pedigree 0.662, pedigree (1,1,5,5,1)
  (same comment as for Magnesium)
- Manganese [soil, agricultural]: 1.8443e-5 kg; lognormal variance with pedigree 0.712, pedigree (1,1,5,5,1)
  (same comment as for Phosphate)
- Cobalt [water, surface water]: 8.2105e-7 kg; lognormal variance with pedigree 0.662, pedigree (1,1,5,5,1)
  (same comment as for Magnesium)
- Sodium, ion [water, surface water]: 0.002186 kg; lognormal variance with pedigree 0.672, pedigree (1,1,5,5,1)
  (same comment as for Magnesium)
- BOD5, Biological Oxygen Demand [water, surface water]: 0.0098227 kg; lognormal variance with pedigree 0.072, pedigree (1,1,5,5,1)
  (same comment as for Magnesium)
- DOC, Dissolved Organic Carbon [water, surface water]: 0.0075377 kg; lognormal variance with pedigree 0.082, pedigree (1,1,5,5,1)
  (same comment as for Magnesium)
- Iron, ion [water, surface water]: 0.0036009 kg; lognormal variance with pedigree 0.662, pedigree (1,1,5,5,1)
  (same comment as for Magnesium)
- Cobalt [soil, agricultural]: 5.6294e-7 kg; lognormal variance with pedigree 0.712, pedigree (1,1,5,5,1)
  (same comment as for Phosphate)
- Chromium, ion [water, surface water]: 5.6343e-9 kg; lognormal variance with pedigree 0.732, pedigree (1,1,5,5,1)
  (same comment as for Iron, ion)
- Zinc, ion [water, surface water]: 3.3805e-5 kg; lognormal variance with pedigree 0.652, pedigree (1,1,5,5,1)
  (same comment as for Magnesium)
- Nickel [air, urban air close to ground]: 3.2846e-14 kg; lognormal variance with pedigree 0.812, pedigree (1,1,5,5,1)
  (same comment as for Magnesium)
- BOD5, Biological Oxygen Demand [water, ground-, long-term]: 4.0959e-5 kg; lognormal variance with pedigree 0.122, pedigree (1,1,5,5,1)
  (same comment as for Iron, ion)
- Manganese [water, surface water]: 2.6898e-5 kg; lognormal variance with pedigree 0.662, pedigree (1,1,5,5,1)
  (same comment as for Magnesium)
- Nitrogen [water, surface water]: 0.00049 kg; lognormal variance with pedigree 0.082, pedigree (1,1,5,5,1)
  direct wastewater treatment plant emission. Uncertainty calculated from wastewater composition and treatment model
- NMVOC, non-methane volatile organic compounds, unspecified origin [air, urban air close to ground]: 2.2813e-6 kg; lognormal variance with pedigree 0.262, pedigree (1,1,5,5,1)
  direct digester gas emission. Uncertainty calculated from wastewater composition and treatment model
- Silicon [water, surface water]: 0.00018768 kg; lognormal variance with pedigree 0.572, pedigree (1,1,5,5,1)
  (same comment as for Magnesium)
- Aluminium [soil, agricultural]: 0.0010409 kg; lognormal variance with pedigree 0.452, pedigree (1,1,5,5,1)
  (same comment as for Phosphate)
- Copper, ion [water, surface water]: 9.7122e-6 kg; lognormal variance with pedigree 0.652, pedigree (1,1,5,5,1)
  (same comment as for Magnesium)
- Zinc [soil, agricultural]: 5.3381e-5 kg; lognormal variance with pedigree 0.712, pedigree (1,1,5,5,1)
  (same comment as for Phosphate)
- Ammonium, ion [water, surface water]: 0.011027 kg; lognormal variance with pedigree 0.062, pedigree (1,1,5,5,1)
  (same comment as for Nitrogen)
- Nitrate [water, ground-, long-term]: 2.4552e-5 kg; lognormal variance with pedigree 0.092, pedigree (1,1,5,5,1)
  (same comment as for Iron, ion)
- Phosphate [water, surface water]: 0.0027466 kg; lognormal variance with pedigree 0.082, pedigree (1,1,5,5,1)
  sewer overload discharge plus direct wastewater treatment plant emission plus emission from sludge incineration plus emission from sludge spreading. Uncertainty calculated from wastewater composition and treatment model
- Dinitrogen monoxide [air, urban air close to ground]: 0.00011435 kg; lognormal variance with pedigree 0.092, pedigree (1,1,5,5,1)
  direct wastewater treatment plant emission plus direct digester gas emission plus emission from sludge incineration plus emission from sludge spreading. Uncertainty calculated from wastewater composition and treatment model
- Arsenic [soil, agricultural]: 1.3723e-7 kg; lognormal variance with pedigree 0.712, pedigree (1,1,5,5,1)
  (same comment as for Phosphate)
- Calcium [soil, agricultural]: 0.0035234 kg; lognormal variance with pedigree 0.712, pedigree (1,1,5,5,1)
  (same comment as for Phosphate)
- Mercury [water, ground-, long-term]: 2.1102e-9 kg; lognormal variance with pedigree 2.982, pedigree (1,1,5,5,1)
  (same comment as for Iron, ion)
- Carbon monoxide, non-fossil [air, urban air close to ground]: 0.00016152 kg; lognormal variance with pedigree 0.162, pedigree (1,1,5,5,1)
  (same comment as for Magnesium)
- Zinc, ion [water, ground-, long-term]: 3.4373e-7 kg; lognormal variance with pedigree 5.512, pedigree (1,1,5,5,1)
  (same comment as for Iron, ion)
- Iron [soil, agricultural]: 0.0093763 kg; lognormal variance with pedigree 0.162, pedigree (1,1,5,5,1)
  (same comment as for Phosphate)
- Lead [soil, agricultural]: 5.4283e-6 kg; lognormal variance with pedigree 0.712, pedigree (1,1,5,5,1)
  (same comment as for Phosphate)
- Nitrogen oxides [air, urban air close to ground]: 0.00067623 kg; lognormal variance with pedigree 0.092, pedigree (1,1,5,5,1)
  (same comment as for Magnesium)
- Sulfur dioxide [air, urban air close to ground]: 0.00088405 kg; lognormal variance with pedigree 0.112, pedigree (1,1,5,5,1)
  (same comment as for Magnesium)
- Arsenic [air, urban air close to ground]: 2.5337e-10 kg; lognormal variance with pedigree 0.732, pedigree (1,1,5,5,1)
  (same comment as for Magnesium)
- Calcium [air, urban air close to ground]: 2.4395e-6 kg; lognormal variance with pedigree 0.732, pedigree (1,1,5,5,1)
  (same comment as for Magnesium)
- Magnesium [water, ground-, long-term]: 0.00015166 kg; lognormal variance with pedigree 0.712, pedigree (1,1,5,5,1)
  (same comment as for Iron, ion)
- Chromium [soil, agricultural]: 4.2565e-6 kg; lognormal variance with pedigree 0.712, pedigree (1,1,5,5,1)
  (same comment as for Phosphate)
- Cadmium [soil, agricultural]: 9.7652e-8 kg; lognormal variance with pedigree 0.712, pedigree (1,1,5,5,1)
  (same comment as for Phosphate)
- Tin, ion [water, ground-, long-term]: 2.9174e-7 kg; lognormal variance with pedigree 1.272, pedigree (1,1,5,5,1)
  (same comment as for Iron, ion)
- Nickel, ion [water, ground-, long-term]: 7.1255e-7 kg; lognormal variance with pedigree 0.712, pedigree (1,1,5,5,1)
  (same comment as for Iron, ion)
- Tin [air, urban air close to ground]: 7.702e-10 kg; lognormal variance with pedigree 0.732, pedigree (1,1,5,5,1)
  (same comment as for Magnesium)
- Cyanide [air, urban air close to ground]: 6.1511e-7 kg; lognormal variance with pedigree 0.242, pedigree (1,1,5,5,1)
  (same comment as for Iron, ion)
- Molybdenum [air, urban air close to ground]: 2.7675e-10 kg; lognormal variance with pedigree 0.732, pedigree (1,1,5,5,1)
  (same comment as for Magnesium)
- Potassium, ion [water, surface water]: 0.0003989 kg; lognormal variance with pedigree 0.672, pedigree (1,1,5,5,1)
  (same comment as for Magnesium)
- DOC, Dissolved Organic Carbon [water, ground-, long-term]: 4.9549e-5 kg; lognormal variance with pedigree 0.122, pedigree (1,1,5,5,1)
  (same comment as for Iron, ion)
- Methane, non-fossil [air, urban air close to ground]: 0.00050213 kg; lognormal variance with pedigree 0.142, pedigree (1,1,5,5,1)
  (same comment as for Magnesium)
- Phosphorus [air, urban air close to ground]: 6.3647e-7 kg; lognormal variance with pedigree 0.102, pedigree (1,1,5,5,1)
  (same comment as for Magnesium)
- Carbon dioxide, non-fossil [air, urban air close to ground]: 0.17249 kg; lognormal variance with pedigree 0.062, pedigree (1,1,5,5,1)
  direct wastewater treatment plant emission plus direct digester gas emission plus emission from sludge incineration. Uncertainty calculated from wastewater composition and treatment model
- Chromium [air, urban air close to ground]: 1.3072e-13 kg; lognormal variance with pedigree 0.812, pedigree (1,1,5,5,1)
  (same comment as for Magnesium)
- Arsenic, ion [water, ground-, long-term]: 3.13e-8 kg; lognormal variance with pedigree 0.712, pedigree (1,1,5,5,1)
  (same comment as for Iron, ion)
- TOC, Total Organic Carbon [water, surface water]: 0.0072992 kg; lognormal variance with pedigree 0.082, pedigree (1,1,5,5,1)
  (same comment as for Magnesium)
- Silicon [air, urban air close to ground]: 2.0077e-6 kg; lognormal variance with pedigree 0.732, pedigree (1,1,5,5,1)
  (same comment as for Magnesium)
- Aluminium [water, ground-, long-term]: 0.00031992 kg; lognormal variance with pedigree 0.472, pedigree (1,1,5,5,1)
  (same comment as for Iron, ion)
- Copper, ion [water, ground-, long-term]: 6.5781e-6 kg; lognormal variance with pedigree 0.732, pedigree (1,1,5,5,1)
  (same comment as for Iron, ion)
- Magnesium [soil, agricultural]: 0.00039557 kg; lognormal variance with pedigree 0.712, pedigree (1,1,5,5,1)
  (same comment as for Phosphate)
- Manganese [air, urban air close to ground]: 4.1708e-14 kg; lognormal variance with pedigree 0.842, pedigree (1,1,5,5,1)
  (same comment as for Magnesium)
- Molybdenum [water, ground-, long-term]: 1.1446e-7 kg; lognormal variance with pedigree 0.712, pedigree (1,1,5,5,1)
  (same comment as for Iron, ion)
- Lead [air, urban air close to ground]: 8.3969e-11 kg; lognormal variance with pedigree 0.752, pedigree (1,1,5,5,1)
  (same comment as for Magnesium)
- TOC, Total Organic Carbon [water, ground-, long-term]: 4.9549e-5 kg; lognormal variance with pedigree 0.122, pedigree (1,1,5,5,1)
  (same comment as for Iron, ion)
- Aluminium [water, surface water]: 6.2281e-5 kg; lognormal variance with pedigree 0.552, pedigree (1,1,5,5,1)
  (same comment as for Magnesium)
- Molybdenum [water, surface water]: 5.0954e-7 kg; lognormal variance with pedigree 0.622, pedigree (1,1,5,5,1)
  (same comment as for Magnesium)
- Mercury [soil, agricultural]: 9.7652e-8 kg; lognormal variance with pedigree 0.712, pedigree (1,1,5,5,1)
  (same comment as for Phosphate)
- Mercury [air, urban air close to ground]: 3.353e-13 kg; lognormal variance with pedigree 0.742, pedigree (1,1,5,5,1)
  (same comment as for Magnesium)
- Sulfate [water, ground-, long-term]: 0.0011326 kg; lognormal variance with pedigree 0.112, pedigree (1,1,5,5,1)
  (same comment as for Iron, ion)
- Water [air, unspecified]: 0.1 m3; lognormal variance with pedigree 0.0827, pedigree (2,2,5,5,1)
  Calculated value based on water balance.
- Tin, ion [water, surface water]: 1.4223e-6 kg; lognormal variance with pedigree 0.662, pedigree (1,1,5,5,1)
  (same comment as for Magnesium)
- Water [water, unspecified]: 0.9 m3; lognormal variance with pedigree 0.0827, pedigree (2,2,5,5,1)
  Calculated value based on water balance.
  property carbon content, fossil 0; name C_content_fossil
  property dry mass 0 kg; name DM
  property water in wet mass 1000 kg; name WWM
  property wet mass 1000 kg; name WM
  property carbon content, non-fossil 0; name C_content_non_fossil
- Arsenic, ion [water, surface water]: 7.3122e-7 kg; lognormal variance with pedigree 0.642, pedigree (1,1,5,5,1)
  (same comment as for Magnesium)
- Fluoride [water, surface water]: 3.2769e-5 kg; lognormal variance with pedigree 0.672, pedigree (1,1,5,5,1)
  (same comment as for Magnesium)
- Calcium, ion [water, surface water]: 0.045852 kg; lognormal variance with pedigree 0.672, pedigree (1,1,5,5,1)
  (same comment as for Magnesium)
- Phosphate [water, ground-, long-term]: 7.4541e-5 kg; lognormal variance with pedigree 4.252, pedigree (1,1,5,5,1)
  (same comment as for Iron, ion)
- Sulfate [water, surface water]: 0.14466 kg; lognormal variance with pedigree 0.082, pedigree (1,1,5,5,1)
  (same comment as for Magnesium)
- Sulfur [soil, agricultural]: 0.0010873 kg; lognormal variance with pedigree 0.102, pedigree (1,1,5,5,1)
  (same comment as for Phosphate)
- Ammonia [air, urban air close to ground]: 0.00058896 kg; lognormal variance with pedigree 0.312, pedigree (1,1,5,5,1)
  direct digester gas emission plus emission from sludge incineration plus emission from sludge spreading. Uncertainty calculated from wastewater composition and treatment model
- Cobalt [water, ground-, long-term]: 2.047e-7 kg; lognormal variance with pedigree 0.712, pedigree (1,1,5,5,1)
  (same comment as for Iron, ion)
- Cadmium, ion [water, ground-, long-term]: 4.0696e-10 kg; lognormal variance with pedigree 6.902, pedigree (1,1,5,5,1)
  (same comment as for Iron, ion)
- Nitrite [water, surface water]: 0.000644 kg; lognormal variance with pedigree 0.082, pedigree (1,1,5,5,1)
  (same comment as for Nitrogen)
- Manganese [water, ground-, long-term]: 6.596e-6 kg; lognormal variance with pedigree 0.872, pedigree (1,1,5,5,1)
  (same comment as for Iron, ion)
- Chromium VI [water, surface water]: 6.2654e-6 kg; lognormal variance with pedigree 0.652, pedigree (1,1,5,5,1)
  (same comment as for Magnesium)
- Cadmium, ion [water, surface water]: 1.4244e-7 kg; lognormal variance with pedigree 0.662, pedigree (1,1,5,5,1)
  (same comment as for Magnesium)
- Cadmium [air, urban air close to ground]: 2.2955e-12 kg; lognormal variance with pedigree 0.722, pedigree (1,1,5,5,1)
  (same comment as for Magnesium)
- Carbon [soil, agricultural]: 0.012217 kg; lognormal variance with pedigree 0.102, pedigree (1,1,5,5,1)
  (same comment as for Phosphate)
- Aluminium [air, urban air close to ground]: 6.7533e-7 kg; lognormal variance with pedigree 0.472, pedigree (1,1,5,5,1)
  (same comment as for Magnesium)
- COD, Chemical Oxygen Demand [water, ground-, long-term]: 0.00012522 kg; lognormal variance with pedigree 0.122, pedigree (1,1,5,5,1)
  (same comment as for Iron, ion)
- Zinc [air, urban air close to ground]: 3.622e-10 kg; lognormal variance with pedigree 0.762, pedigree (1,1,5,5,1)
  (same comment as for Magnesium)
- Nickel [soil, agricultural]: 1.8324e-6 kg; lognormal variance with pedigree 0.712, pedigree (1,1,5,5,1)
  (same comment as for Phosphate)
- COD, Chemical Oxygen Demand [water, surface water]: 0.030152 kg; lognormal variance with pedigree 0.082, pedigree (1,1,5,5,1)
  (same comment as for Magnesium)
- Silicon [soil, agricultural]: 0.0020764 kg; lognormal variance with pedigree 0.712, pedigree (1,1,5,5,1)
  (same comment as for Phosphate)
- Molybdenum [soil, agricultural]: 3.3317e-7 kg; lognormal variance with pedigree 0.712, pedigree (1,1,5,5,1)
  (same comment as for Phosphate)
- Tin [soil, agricultural]: 1.3974e-6 kg; lognormal variance with pedigree 0.712, pedigree (1,1,5,5,1)
  (same comment as for Phosphate)
- Nitrate [water, surface water]: 0.048295 kg; lognormal variance with pedigree 0.062, pedigree (1,1,5,5,1)
  (same comment as for Magnesium)
- Copper [air, urban air close to ground]: 6.0072e-11 kg; lognormal variance with pedigree 0.772, pedigree (1,1,5,5,1)
  (same comment as for Magnesium)
- Lead [water, surface water]: 9.4866e-7 kg; lognormal variance with pedigree 0.602, pedigree (1,1,5,5,1)
  (same comment as for Magnesium)
- Chromium VI [water, ground-, long-term]: 1.8714e-7 kg; lognormal variance with pedigree 1.092, pedigree (1,1,5,5,1)
  (same comment as for Iron, ion)
- Silicon [water, ground-, long-term]: 7.4886e-5 kg; lognormal variance with pedigree 5.462, pedigree (1,1,5,5,1)
  (same comment as for Iron, ion)
- Copper [soil, agricultural]: 1.9594e-5 kg; lognormal variance with pedigree 0.712, pedigree (1,1,5,5,1)
  (same comment as for Phosphate)
- Lead [water, ground-, long-term]: 1.6063e-7 kg; lognormal variance with pedigree 6.922, pedigree (1,1,5,5,1)
  (same comment as for Iron, ion)

## Extrapolations
This dataset has been extrapolated from year 2000 to the year of the calculation (2019). The uncertainty has been adjusted accordingly.
