# zirconium oxide production

Dataset: EcoSpold 2, unit process
Geography: AU
Time period: 2000-01-01 to 2019-12-31
Technology level: current
Classification: EcoSpold01Categories: chemicals/inorganics
Classification: ISIC rev.4 ecoinvent: 2011:Manufacture of basic chemicals
Synonyms: zirconia; zirconium dioxide
Tags: ConvertedDataset
Scenario: Business-as-Usual
System model: Allocation at the point of substitution
Generated by: Alex Primas
Published in: Althaus H.-J. 2004
Database: ecoinvent
isCopyrightProtected: true
accessRestrictedTo: 1

## General comment
In- and outputs of ZrSO4 and NaOH are calculated according to the stoechiometry. Process approximated with hydrothermal sodium silicate production and calcination of aluminium hydroxide to aluminium oxide. Weak data for energy consumption, wastes and emissions. Data partly based on a EMPA study, commissioned by the CEES.
[This dataset was already contained in the ecoinvent database version 2. It was not individually updated during the transfer to ecoinvent version 3. Life Cycle Impact Assessment results may still have changed, as they are affected by changes in the supply chain, i.e. in other datasets. This dataset was generated following the ecoinvent quality guidelines for version 2. It may have been subject to central changes described in the ecoinvent version 3 change report (http://www.ecoinvent.org/database/ecoinvent-version-3/reports-of-changes/), and the results of the central updates were reviewed extensively. The changes added e.g. consistent water flows and other information throughout the database. The documentation of this dataset can be found in the ecoinvent reports of version 2, which are still available via the ecoinvent website. The change report linked above covers all central changes that were made during the conversion process.]

## Included activities end
The process includes material and energy input, wastes and emissions for the production of zirconium oxide from zircon (ZrSiO4) using caustic fusion with sodium hydroxide. Transport and infrastructure are estimated.

## Geography
Production in Australia considered. Data bases on similar European production processes.

## Technology
Caustic fusion of zircon mineral (ZrSiO4) with sodium hydroxide to zirconium hydroxide. No allocation to sodium silicate by-product. Calcination of zirconium hydroxide to zirconium oxide.

## Parameters
- fraction, cooling water, once-through system, to air: 0.004; name fraction_CW_OT_to_air; lognormal variance with pedigree 0.0413, pedigree (2,3,1,3,1)
  Calculated based on literature value (Scown, C.D., 2011, Water Footprint of U.S. Transportation Fuels and supplying information of the article) (Vionnet, S., Quantis Water Database - Technical Report, 2012).
- fraction, cooling water, cooling pond system, to air: 0.032; name fraction_CW_CP_to_air; lognormal variance with pedigree 0.0413, pedigree (2,3,1,3,1)
  (same comment as for fraction, cooling water, once-through system, to air)
- fraction, process water, to air: 0.205 dimensionless; name fraction_PW_to_air; lognormal variance with pedigree 0.092025, pedigree (4,4,3,2,4)
  Literature value (Statistics Canada, 2007 & Shaffer, K.H., 2008, Consumptive water use in the Great Lakes Basin, USGS) (Vionnet, S., Quantis Water Database - Technical Report, 2012).
- fraction, cooling water, recirculating system, to air: 0.771; name fraction_CW_R_to_air; lognormal variance with pedigree 0.0413, pedigree (2,3,1,3,1)
  (same comment as for fraction, cooling water, once-through system, to air)
- fraction, cooling water, to air: 0.3875; name fraction_CW_to_air; = (0.5*fraction_CW_OT_to_air)+(0.5*fraction_CW_R_to_air); lognormal variance with pedigree 0.092025, pedigree (4,4,3,2,4)
  Calculated value based on literature value (see comments of the other parametres present in this dataset) and expert opinion. In the case when no industry/literature data are available about the type of cooling or directly fraction, cooling water, to air specific for the process a default assumption is applied. It is assumed that the once-through cooling system is used in 50% of all cases and recirculating system is used in another 50% of all cases.

## Reference product
- zirconium oxide: 1 kg; CPC 34220: Zinc oxide; zinc peroxide; chromium oxides and hydroxides; manganese oxides; iron oxides and hydroxides; earth[…]; By-product classification allocatable product; CAS 1314-23-4
  EcoSpold01Location=AU
  production volume 2.556e7 kg
    Unknown
    Production volumes (2005) were calculated from those of Zircon, assuming that 6% of total Zircon is consummed in Zirconium oxide production (Zirconia) (data in http://www.titaniumcorporation.com/s/Zircon.asp, accessed 2001.05.23)
  property price 30.3 EUR2005
    Average 2005 prices for EU27, USA, China, Japan and India from Import/Export data (US$ and tonnes) in UN Commodity Trade Statistics Database; Commodity: Zirconium, articles thereof, waste or scrap
  property carbon content 0
    carbon content on a dry matter basis (reserved; not for manual entry)
  property true value 30.3
    allocation property applied in "true value" allocation // value calculated from revenue
  properties: water content 0, carbon content, fossil 0, carbon content, non-fossil 0, water in wet mass 0 kg, dry mass 1 kg, wet mass 1 kg, carbon allocation 0 kg

## By-products
- heat, for reuse in municipal waste incineration only: 0 MJ; CPC 17300: Steam and hot water; By-product classification allocatable product; pedigree (1,1,1,1,1)
  Net electricity generated from this waste and used in internal MSWI plant energy redistribution.
  Uncertainty: uncertainty is calculated from uncertainties in waste composition and uncertainties in energy efficiency and the uncertainty in internal energy demand
  production volume 2.48669 MJ
  property exergy 0.1842 MJ; name E_th_prod_MSWI_exergy
    This exergy property is based on the exergy content of the product.
  property price 0.0106 EUR2005; name E_th_prod_MSWI_price_EUR2005
    Average European district heat price from Ecoheatcool and Euroheat 2005-2006, Ecoheat Work package 1: The European heat market. Final report. 10.6 EUR/GJ i s the price of district heat. http://www.solarthermalworld.org/files/Ecoheatcool%20WP1%20Web.pdf?download
  property true value relation 0.1842; name E_th_prod_MSWI_true_value_relation
    property to calculate "true value" from
  property true value 6.39954e-10
    allocation property applied in "true value" allocation // value calculated from true value relation
- electricity, for reuse in municipal waste incineration only: 0 kWh; CPC 17100: Electrical energy; By-product classification allocatable product; pedigree (1,1,1,1,1)
  (same comment as for heat, for reuse in municipal waste incineration only)
  production volume 0.350221 kWh
  property true value relation 3.6; name E_el_prod_MSWI_true_value_relation
    property to calculate "true value" from
  property price 0.1 EUR2005; name E_el_prod_MSWI_price_EUR2005
    Estimated to be the same price as in case of electricity, medium voltage.
  property exergy 3.6 MJ; name E_el_prod_MSWI_exergy
    This exergy property is based on the exergy content of the product.
  property true value 1.76149e-9
    (same comment as for heat, for reuse in municipal waste incineration only)

## Inputs from technosphere
- chemical factory, organics: 8e-10 unit; lognormal variance with pedigree 0.5861, pedigree (4,5,5,3,5)
  EcoSpold01Location=RER
  Estimation
  Uncertainty: estimation
- heat, district or industrial, other than natural gas: 2.0541 MJ; lognormal variance with pedigree 0.1461, pedigree (4,5,5,3,4)
  EcoSpold01Location=RER
  Data from hydrothermal sodium silicate production used
  Uncertainty: data from hydrothermal sodium silicate production used
- electricity, medium voltage: 0.0413 kWh; lognormal variance with pedigree 0.1461, pedigree (4,5,5,3,4)
  Data from hydrothermal sodium silicate production used
  EcoSpold01Location=UCTE
  Uncertainty: data from hydrothermal sodium silicate production used
- average incineration residue: -4.16e-5 kg; lognormal variance with pedigree 0.1461, pedigree (4,5,5,3,4)
  EcoSpold01Location=CH
  Data from hydrothermal sodium silicate production used
  Uncertainty: data from hydrothermal sodium silicate production used
  production volume 1063.3 kg
    Calculated from the production volume of zirconium oxide in proportion to the respective output amounts.
  properties: dry mass 1 kg, carbon content, non-fossil 0.0511208, carbon content, fossil 0.0325466, wet mass 1 kg
  note on carbon content, non-fossil: Tab A.1, ecoinvent v2.2 report 13_I. It is considered that 61.1% of the C has a biogenic origin
- steam, in chemical industry: 0.3 kg; lognormal variance with pedigree 0.1461, pedigree (4,5,5,3,4)
  Data from hydrothermal sodium silicate production used
  EcoSpold01Location=RER
  Uncertainty: data from hydrothermal sodium silicate production used
  properties: wet mass 1 kg
- zircon, 50% zirconium: 1.57 kg; lognormal variance with pedigree 0.0493, pedigree (2,5,5,3,1)
  EcoSpold01Location=AU
  Inputcalculated from stoechiometry
  Uncertainty: inputcalculated from stoechiometry
  properties: wet mass 1 kg, dry mass 1 kg
- chemical, organic: 0.00146 kg; lognormal variance with pedigree 0.1461, pedigree (4,5,5,3,4)
  Data from hydrothermal sodium silicate production used
  EcoSpold01Location=GLO
  Uncertainty: data from hydrothermal sodium silicate production used
  properties: dry mass 1 kg, carbon content, fossil 0.628, wet mass 1 kg
  note on carbon content, fossil: This dataset is an unweighted average of 20 organic substances (listed in Tab 88.1, ecoinvent v2.2 report 8, part II), being part of the top100 chemicals included in this database. The C-content has also been calculated as an unweighted average of the C content of the substances composing this dataset.
- heat, district or industrial, natural gas: 1.2 MJ; lognormal variance with pedigree 0.1461, pedigree (4,5,5,3,4)
  EcoSpold01Location=RER
  Data from sodium silicate and aluminium hydroxide production
  Uncertainty: data from sodium silicate and aluminium hydroxide production
- residue from cooling tower: -0.0025 kg; lognormal variance with pedigree 0.1461, pedigree (4,5,5,3,4)
  Data from hydrothermal sodium silicate production used
  EcoSpold01Location=CH
  Uncertainty: data from hydrothermal sodium silicate production used
  production volume 63900 kg
    (same comment as for average incineration residue)
  properties: water content 0.428571, carbon content, fossil 0.0544233, dry mass 0.7 kg, wet mass 1 kg
- inert waste, for final disposal: -0.0181 kg; lognormal variance with pedigree 0.1461, pedigree (4,5,5,3,4)
  (same comment as for residue from cooling tower)
  production volume 462636 kg
    (same comment as for average incineration residue)
  properties: dry mass 0.995 kg, water content 0.00502513, wet mass 1 kg
- sodium hydroxide, without water, in 50% solution state: 1.44 kg; lognormal variance with pedigree 0.0493, pedigree (2,5,5,3,1)
  (same comment as for heat, district or industrial, other than natural gas)
  properties: wet mass 1 kg, dry mass 1 kg

## Inputs from nature
- Water, unspecified natural origin [natural resource, in water]: 0.0016 m3; name water_UNO_input; lognormal variance with pedigree 0.1461, pedigree (4,5,5,3,4)
  Data from hydrothermal sodium silicate production used
  Uncertainty: data from hydrothermal sodium silicate production used
- Water, cooling, unspecified natural origin [natural resource, in water]: 2.08e-5 m3; name water_cooling_UNO_input; lognormal variance with pedigree 0.1461, pedigree (4,5,5,3,4)
  (same comment as for Water, unspecified natural origin)

## Emissions to nature
- DOC, Dissolved Organic Carbon [water, surface water]: 4.85185e-6 kg; lognormal variance with pedigree 0.1861, pedigree (4,5,5,3,4)
  Calculated as equal to TOC.
  Uncertainty: data from hydrothermal sodium silicate production used
- BOD5, Biological Oxygen Demand [water, surface water]: 2.62e-5 kg; lognormal variance with pedigree 0.1861, pedigree (4,5,5,3,4)
  Calculated as 0.5*COD.
  Uncertainty: data from hydrothermal sodium silicate production used
- Chloride [water, surface water]: 9.78e-5 kg; lognormal variance with pedigree 0.4461, pedigree (4,5,5,3,4)
  (same comment as for Water, unspecified natural origin)
- Silicon [water, surface water]: 0.00341 kg; lognormal variance with pedigree 0.7861, pedigree (4,5,5,3,4)
  (same comment as for Water, unspecified natural origin)
- Iron, ion [water, surface water]: 8.32e-8 kg; lognormal variance with pedigree 0.7861, pedigree (4,5,5,3,4)
  (same comment as for Water, unspecified natural origin)
- COD, Chemical Oxygen Demand [water, surface water]: 1.31e-5 kg; lognormal variance with pedigree 0.1861, pedigree (4,5,5,3,4)
  (same comment as for Water, unspecified natural origin)
- Nitrate [water, surface water]: 2.91e-7 kg; lognormal variance with pedigree 0.1861, pedigree (4,5,5,3,4)
  (same comment as for Water, unspecified natural origin)
- Water [air, unspecified]: 0.00033606 m3; name water_to_air_unspecified; = (water_cooling_UNO_input*fraction_CW_to_air)+(water_UNO_input*fraction_PW_to_air); lognormal variance with pedigree 0.0807, pedigree (2,2,5,1,1)
  Calculated value based on literature values and expert opinion. See comments in the parametres' comment field.
  property fraction, origin: unspecified 1; name fraction_origin_unspecified
  property fraction, origin: fresh water 0; name fraction_origin_fresh_water
  property fraction, origin: salt water 0; name fraction_origin_salt_water
- Water [water, unspecified]: 0.00128474 m3; name water_to_water_unspecified; = water_cooling_UNO_input*(1-fraction_CW_to_air)+water_UNO_input*(1-fraction_PW_to_air); lognormal variance with pedigree 0.0807, pedigree (2,2,5,1,1)
  (same comment as for Water)
  property fraction, origin: salt water 0; name fraction_origin_salt_water_Ww
  property fraction, origin: fresh water 0; name fraction_origin_fresh_water_Ww
  property fraction, origin: unspecified 1; name fraction_origin_unspecified_Ww
  property dry mass 0 kg; name DM
  property wet mass 1000 kg; name WM
  property water in wet mass 1000 kg; name WWM
  property carbon content, fossil 0; name C_content_fossil
  property carbon content, non-fossil 0; name C_content_non_fossil
- Suspended solids, unspecified [water, surface water]: 0.00127 kg; lognormal variance with pedigree 0.1861, pedigree (4,5,5,3,4)
  (same comment as for Water, unspecified natural origin)
- TOC, Total Organic Carbon [water, surface water]: 4.85185e-6 kg; lognormal variance with pedigree 0.1861, pedigree (4,5,5,3,4)
  Calculated by default as TOC (gC) = COD/2.7 (COD measured in g O2). Should more correctly be calculated from the carbon content of the specified emissions to water.
  Uncertainty: data from hydrothermal sodium silicate production used
- Phosphate [water, surface water]: 2.08e-8 kg; lognormal variance with pedigree 0.1861, pedigree (4,5,5,3,4)
  (same comment as for Water, unspecified natural origin)

## Sampling procedure
Based on literature

## Review by Rolf Frischknecht 2007-08-13
passed
none
