# lemon production

Dataset: EcoSpold 2, unit process
Geography: ES
Time period: 2009-01-01 to 2019-12-31
Technology level: current
Classification: ISIC rev.4 ecoinvent: 0123:Growing of citrus fruits
Tags: WFLDB
Scenario: Business-as-Usual
System model: Allocation at the point of substitution
Generated by: Tuija Waldvogel
Published in: Nemecek T. 2015
Database: ecoinvent
isCopyrightProtected: true
accessRestrictedTo: 1

## General comment
This dataset represents the production of 1 kg of lemons. The average yield from 2009 - 2012 is 37 t/ha. The data are representative for lemons production in Spain used for the export market. §
The dataset was modelled within the project 'World Food LCA database (WFLDB)'. The aim of this project was to provide inventories of a broad variety of agricultural products and processes and to cover for each product at least 50% of the global export market. The export share of lemons produced in Spain amounts to 16% of the global export (tonnage exported in 2010). The production system regarded in this dataset aimed at representing lemons produced in Spain for the export market.
PEF-Quality: data quality rating (DQR) = 2.3 (i.e. good quality). This dataset refers to an average situation; for specific situations exchanges might differ substantially due to site specific parameters

## Included activities start
This activity starts with the nursery producing fruit tree seedlings, i.e. grafted young trees to be planted.

## Included activities end
This activity ends with the waste treatment after the clearing of the orchard (rooting up the trees). The dataset includes all activities of a year in a year in the productive phase of the orchard including the establishment phase per year of lifetime (30 years, 256 trees/ha planted), the clearing of the orchard including waste treatment.
The establishment phase of the orchard includes tree nursery, soil cultivation, planting trees, sowing grass, and irrigation. Fertiliser and pesticide use in a year of the establishment phase is assumed to be half of the amount of a year in the productive phase.
The productive phase of the orchard includes machine operations, corresponding infrastructure, fuel use and sheds. Machine operations in the productive phase are: soil cultivation (mulching, mowing), fertiliser and pesticide application, harvesting and irrigation. Further, direct field emissions and land use change are included. At the end of the productive phase the orchard is cleared by rooting up the trees.
Heavy metal uptake by the crop is considered.
The inputs of seedlings, fertilisers (mineral and organic) and pesticides as well as packaging of fertilisers and pesticides are considered.

## Technology
Conventional production

## Parameters
- heavyMetalUptakeSwitch: 1
- LUC_crop_specific: 1
  This parameter allows to switch between a 'crop specific' and a 'country specific' approach when calculating the LUC of a crop. By default, the chosen approach is 'crop specific', so the value of the parameter is 1. If you want to apply a 'country specific' approach, turn the parameter to 0.

## Reference product
- lemon: 1 kg; CPC 01322: Lemons and limes; By-product classification allocatable product
  Reference flow: Yield = 37000 kg/ha
  production volume 6.74371e8 kg
    Source: FAOSTAT. Average, 2009-2012
  property price 0.58 EUR2005
    Calculated value based on data from United Nations Commodity Trade Statistics Database (comtrade.un.org). UN comtrade category: 80550 Lemons (Citrus limon/limonum) & limes (Citrus aurantifolia), fresh. Year: 2005. Using exchange rate of 1EURO = 1.209 USD. Average of price of import into 5 main markets (EU, US, JP, IN and CN).
  property carbon content, non-fossil 0.384123
    calculation: C-content of components according to ecoinvent report No. 15a. Source of composition: Souci, S.W., Fachmann, W., Kraut, H. (Hg.: Bundesminsiterium fur Ernahrung, Landwirtschaft und Forsten, Bonn) 'Die Zusammensetzung der Lebensmittel - Nahrwerttabellen', medpharm Scientific Publishers Stuttgart, CRC Press; 2000.
  property carbon content 0.384123
    carbon content on a dry matter basis (reserved; not for manual entry)
  property true value 0.58
    allocation property applied in "true value" allocation // value calculated from revenue
  properties: wet mass 1 kg, water content 0.842, carbon content, fossil 0, dry mass 0.542888 kg, water in wet mass 0.457112 kg, carbon allocation 0.208536 kg

## By-products
- electricity, for reuse in municipal waste incineration only: 0 kWh; CPC 17100: Electrical energy; By-product classification allocatable product; pedigree (1,1,1,1,1)
  Net electricity generated from this waste and used in internal MSWI plant energy redistribution.
  Uncertainty: uncertainty is calculated from uncertainties in waste composition and uncertainties in energy efficiency and the uncertainty in internal energy demand
  production volume 2.26729e6 kWh
  property true value relation 3.6; name E_el_prod_MSWI_true_value_relation
    property to calculate "true value" from
  property price 0.1 EUR2005; name E_el_prod_MSWI_price_EUR2005
    Estimated to be the same price as in case of electricity, medium voltage.
  property exergy 3.6 MJ; name E_el_prod_MSWI_exergy
    This exergy property is based on the exergy content of the product.
  property true value 0.000433554
    allocation property applied in "true value" allocation // value calculated from true value relation
- heat, for reuse in municipal waste incineration only: 0 MJ; CPC 17300: Steam and hot water; By-product classification allocatable product; pedigree (1,1,1,1,1)
  (same comment as for electricity, for reuse in municipal waste incineration only)
  production volume 1.64041e7 MJ
  property exergy 0.1842 MJ; name E_th_prod_MSWI_exergy
    This exergy property is based on the exergy content of the product.
  property price 0.0106 EUR2005; name E_th_prod_MSWI_price_EUR2005
    Average European district heat price from Ecoheatcool and Euroheat 2005-2006, Ecoheat Work package 1: The European heat market. Final report. 10.6 EUR/GJ i s the price of district heat. http://www.solarthermalworld.org/files/Ecoheatcool%20WP1%20Web.pdf?download
  property true value relation 0.1842; name E_th_prod_MSWI_true_value_relation
    property to calculate "true value" from
  property true value 0.0001605
    (same comment as for electricity, for reuse in municipal waste incineration only)

## Inputs from technosphere
- ammonium sulfate, as N: 0.0016158 kg; source Luis Angel Lopez 2015; lognormal variance with pedigree 0.118177, pedigree (2,1,3,1,1)
  Calculated based on literature values or expert estimation: The total amount of nutrient (Personal written communication, Luis Angel Lopez, Yara, 2015) multiplied by the share of fertiliser type (Personal written communication, Luis Angel Lopez, Yara, 2015). See supporting documentation 'WFLDB-Documentation.pdf' chapter 'Fertiliser application' for L3 and L4 data (https://ecoquery.ecoinvent.org/File/Reports).
  Corresponds to 59.8 kg/ha
  properties: wet mass 1 kg, dry mass 1 kg
- urea, as N: 0.000355204 kg; source Luis Angel Lopez 2015; lognormal variance with pedigree 0.118177, pedigree (2,1,3,1,1)
  Calculated based on literature values or expert estimation: The total amount of nutrient (Personal written communication, Luis Angel Lopez, Yara, 2015) multiplied by the share of fertiliser type (Personal written communication, Luis Angel Lopez, Yara, 2015). See supporting documentation 'WFLDB-Documentation.pdf' chapter 'Fertiliser application' for L3 and L4 data (https://ecoquery.ecoinvent.org/File/Reports).
  properties: wet mass 1 kg, carbon content, fossil 0.2, dry mass 1 kg
- phosphate rock, as P2O5, beneficiated, dry: 0.000382716 kg; source Luis Angel Lopez 2015; lognormal variance with pedigree 0.118177, pedigree (2,1,3,1,1)
  Calculated based on literature values or expert estimation: The total amount of nutrient (Personal written communication, Luis Angel Lopez, Yara, 2015) multiplied by the share of fertiliser type (Personal written communication, Luis Angel Lopez, Yara, 2015). See supporting documentation 'WFLDB-Documentation.pdf' chapter 'Fertiliser application' for L3 and L4 data (https://ecoquery.ecoinvent.org/File/Reports).
  Corresponds to 14.2 kg/ha
  properties: wet mass 1 kg, dry mass 1 kg
- potassium chloride, as K2O: 0.00133485 kg; source Luis Angel Lopez 2015; lognormal variance with pedigree 0.118177, pedigree (2,1,3,1,1)
  Calculated based on literature values or expert estimation: The total amount of nutrient (Personal written communication, Luis Angel Lopez, Yara, 2015) multiplied by the share of fertiliser type (Personal written communication, Luis Angel Lopez, Yara, 2015). See supporting documentation 'WFLDB-Documentation.pdf' chapter 'Fertiliser application' for L3 and L4 data (https://ecoquery.ecoinvent.org/File/Reports).
  Corresponds to 49.4 kg/ha
  properties: wet mass 1 kg, dry mass 1 kg
- potassium fertiliser, as K2O: 0.00485989 kg; source Luis Angel Lopez 2015; lognormal variance with pedigree 0.118177, pedigree (2,1,3,1,1)
  Calculated based on literature values or expert estimation: The total amount of nutrient (Personal written communication, Luis Angel Lopez, Yara, 2015) multiplied by the share of fertiliser type (Personal written communication, Luis Angel Lopez, Yara, 2015). See supporting documentation 'WFLDB-Documentation.pdf' chapter 'Fertiliser application' for L3 and L4 data (https://ecoquery.ecoinvent.org/File/Reports).
  Corresponds to 180.0 kg/ha
  properties: dry mass 1 kg, wet mass 1 kg
- potassium sulfate, as K2O: 0.00190508 kg; source Luis Angel Lopez 2015; lognormal variance with pedigree 0.118177, pedigree (2,1,3,1,1)
  Calculated based on literature values or expert estimation: The total amount of nutrient (Personal written communication, Luis Angel Lopez, Yara, 2015) multiplied by the share of fertiliser type (Personal written communication, Luis Angel Lopez, Yara, 2015). See supporting documentation 'WFLDB-Documentation.pdf' chapter 'Fertiliser application' for L3 and L4 data (https://ecoquery.ecoinvent.org/File/Reports).
  Corresponds to 70.6 kg/ha
  properties: wet mass 1 kg, dry mass 1 kg
- tillage, harrowing, by rotary harrow: 5.39987e-5 ha; source Ozkan B. 2004; lognormal variance with pedigree 0.118177, pedigree (2,1,3,1,1)
  Proxy from Lemon TR.
- fertilising, by broadcaster: 0.000107997 ha; source Ozkan B. 2004; lognormal variance with pedigree 0.118177, pedigree (2,1,3,1,1)
  Proxy from Lemon TR. Corresponds to 4 applications per year.
- tillage, ploughing: 2.69994e-5 ha; source Ozkan B. 2004; lognormal variance with pedigree 0.118177, pedigree (2,1,3,1,1)
  Proxy from Lemon TR.
- tillage, rolling: 4.04991e-5 ha; source Ozkan B. 2004; lognormal variance with pedigree 0.118177, pedigree (2,1,3,1,1)
  Proxy from Lemon TR.
- packaging, for fertilisers: 0.0334792 kg; lognormal variance with pedigree 0.0532, pedigree (4,3,3,5,4)
  Total amount of active substance/s of fertilisers needed for the production of 'lemon' is calculated to be circa 1.68E-02 kg. Fertiliser/s used in this dataset is/are: 'ammonium nitrate, as N', 'ammonium sulfate, as N', 'nitrogen fertiliser, as N', 'phosphate fertiliser, as P2O5', 'phosphate rock, as P2O5, beneficiated, dry', 'potassium chloride, as K2O', 'potassium fertiliser, as K2O', 'potassium sulfate, as K2O', 'urea, as N'. The total amount of active substance/s is doubled in order to account for the packaging of the dilluted product of fertiliser/s that is/are applied. Therefore, 3.35E-02 kg of packaging for fertilisers is justified with this exchange.
  properties: dry mass 1 kg, price 0.0642 EUR2005, wet mass 1 kg, carbon content, fossil 0.825301
  note on carbon content, fossil: Considering a chemical formula (C2H4)n for polyethylene, carbon content-fossil is calculated to be 0.856286 kg of Carbon per kg of dry mass.
- application of plant protection product, by field sprayer: 0.000107997 ha; source Ozkan B. 2004; lognormal variance with pedigree 0.118664, pedigree (2,2,3,1,1)
  Proxy from Lemon TR. Field sprayer used as a proxy for pesticide application in orchards. Corresponds to 4 applications per year.
- fruit tree seedling, for planting: 0.000230939 unit; lognormal variance with pedigree 0.118177, pedigree (2,1,3,1,1)
  Proxy: Similar crop and country used. This is the number of trees per ha divided by the lifetime years of the orchard.
  properties: water content 0.73, dry mass 0.578035 kg, carbon content, non-fossil 0.439481, wet mass 1 kg
  note on carbon content, non-fossil: calculation: C-content of components according to ecoinvent report No. 15a. Source of composition: https://ndb.nal.usda.gov/ndb/search/. Unspecific seedling used as proxy.
- transport, tractor and trailer, agricultural: 0.00199795 metric ton*km; lognormal variance with pedigree 0.156439, pedigree (4,1,3,1,1)
  On-farm transport: Yield (in tonnes) multiplied by the average distance from field to farm. The distance was assumed to be 2 km (proxy).
- planting tree: 0.000230939 unit; lognormal variance with pedigree 0.118177, pedigree (2,1,3,1,1)
  (same comment as for fruit tree seedling, for planting)
- cyclic N-compound: 0.000114873 kg; lognormal variance with pedigree 0.00784984, pedigree (2,2,3,1,1)
  Proxy: Source for total amount of pesticides: extrapolated with MEXALCA from similar crop. Active ingredient is calculated based on Ecoinvent dataset Apricot FR. For calculations see supporting documentation 'WFLDB-Documentation.pdf' (https://ecoquery.ecoinvent.org/File/Reports).
  properties: wet mass 1 kg, carbon content, fossil 0.641962, dry mass 1 kg
- irrigation: 0.138229 m3; lognormal variance with pedigree 0.118177, pedigree (2,1,3,1,1)
  Calculated value: The total amount of water used for irrigation (calculated from evapotranspiration, Pfister et al. 2011) multiplied by the country-share of irrigation technique (WFLDB-Guidelines.pdf, Appendix 6.1). See supporting documentation 'WFLDB-Documentation.pdf' chapter 'Water use for irrigation' for L2 data (https://ecoquery.ecoinvent.org/File/Reports).
  properties: dry mass 0.11 kg, water content 9089.91, wet mass 1000 kg
- phthalimide-compound: 0.000236699 kg; lognormal variance with pedigree 0.00784984, pedigree (2,2,3,1,1)
  (same comment as for cyclic N-compound)
  properties: dry mass 1 kg, wet mass 1 kg, carbon content, fossil 0.361204
- establishing orchard: 0.000230939 unit; lognormal variance with pedigree 0.118177, pedigree (2,1,3,1,1)
  (same comment as for fruit tree seedling, for planting)
- phenoxy-compound: 4.18365e-6 kg; lognormal variance with pedigree 0.00784984, pedigree (2,2,3,1,1)
  (same comment as for cyclic N-compound)
  properties: wet mass 1 kg, dry mass 1 kg, carbon content, fossil 0.532559
- nitrogen fertiliser, as N: 0.00324838 kg; source Luis Angel Lopez 2015; lognormal variance with pedigree 0.118177, pedigree (2,1,3,1,1)
  Calculated based on literature values or expert estimation: The total amount of nutrient (Personal written communication, Luis Angel Lopez, Yara, 2015) multiplied by the share of fertiliser type (Personal written communication, Luis Angel Lopez, Yara, 2015). See supporting documentation 'WFLDB-Documentation.pdf' chapter 'Fertiliser application' for L3 and L4 data (https://ecoquery.ecoinvent.org/File/Reports).
  Corresponds to 11.5 kg/ha
  properties: wet mass 1 kg, dry mass 1 kg
- glyphosate: 1.84559e-5 kg; lognormal variance with pedigree 0.00784984, pedigree (2,2,3,1,1)
  (same comment as for cyclic N-compound)
  properties: carbon content, fossil 0.214286, wet mass 1 kg, dry mass 1 kg
- phosphate fertiliser, as P2O5: 0.00204723 kg; source Luis Angel Lopez 2015; lognormal variance with pedigree 0.118177, pedigree (2,1,3,1,1)
  (same comment as for urea, as N)
  properties: dry mass 1 kg, wet mass 1 kg
- waste wood, untreated: -0.0359902 kg; lognormal variance with pedigree 0.118177, pedigree (2,1,3,1,1)
  Wood from trees after 1-2 years of sorrage at the field (20% water) per lifetime year (20 years) of the orchard
  production volume 2.42956e7 kg
    Calculated from the reference product amount and production volume
  properties: dry mass 0.8 kg, water content 0.25, wet mass 1 kg, carbon content, non-fossil 0.48632
- ammonium nitrate, as N: 0.000990472 kg; source Luis Angel Lopez 2015; lognormal variance with pedigree 0.118177, pedigree (2,1,3,1,1)
  Calculated based on literature values or expert estimation: The total amount of nutrient (Personal written communication, Luis Angel Lopez, Yara, 2015) multiplied by the share of fertiliser type (Personal written communication, Luis Angel Lopez, Yara, 2015). See supporting documentation 'WFLDB-Documentation.pdf' chapter 'Fertiliser application' for L3 and L4 data (https://ecoquery.ecoinvent.org/File/Reports).
  Corresponds to 36.7 kg/ha
  properties: wet mass 1 kg, dry mass 1 kg
- packaging, for pesticides: 0.000748423 kg; lognormal variance with pedigree 0.0532, pedigree (4,3,3,5,4)
  Total amount of active substance/s of pesticides needed for the production of lemon is calculated to be circa 3.75E-04 kg. Pesticide/s used in this dataset is/are: 'cyclic N-compound', 'glyphosate', 'phenoxy-compound', 'phthalimide-compound'. The total amount of active substance/s is doubled in order to account for the packaging of the dilluted product of pesticide/s that is/are applied. Therefore, 7.49E-04 kg of packaging for pesticides is justified with this exchange.
  properties: price 0.0642 EUR2005, wet mass 1 kg, carbon content, fossil 0.85714, dry mass 1 kg

## Inputs from nature
- Transformation, to permanent crop, irrigated [natural resource, land]: 0.0134997 m2; lognormal variance with pedigree 0.0382144, pedigree (2,1,3,1,1)
  10000 m2 divided by the life time of the perennial crop (20 years).
- Transformation, from permanent crop, irrigated [natural resource, land]: 0.0134997 m2; lognormal variance with pedigree 0.0382144, pedigree (2,1,3,1,1)
  10000 m2 divided by the life time of the perennial crop (20 years).
- Carbon dioxide, in air [natural resource, in air]: 0.222283 kg; lognormal variance with pedigree 0.00784984, pedigree (2,2,3,1,1)
  CO2 uptake by biomass
- Occupation, permanent crop, irrigated [natural resource, land]: 0.270723 m2*year; lognormal variance with pedigree 0.0140616, pedigree (2,1,3,1,1)
  Related to the duration from harvest date of previous crop to harvest date of main crop.
- Energy, gross calorific value, in biomass [natural resource, biotic]: 2.54809 MJ; lognormal variance with pedigree 0.00784984, pedigree (2,2,3,1,1)
  Gross energy content is related to MJ/kg dry matter of product. Source: ecoinvent data

## Emissions to nature
- Cadmium, ion [water, surface water]: 9.71059e-10 kg; source Freiermuth R.  2006; lognormal variance with pedigree 0.350938, pedigree (2,2,3,1,1)
  Calculated value - Freiermuth (2006). See 'WFLDB-Guidelines.pdf', available at https://ecoquery.ecoinvent.org/File/Reports.
- Water [water, ground-]: 0.00738946 m3; lognormal variance with pedigree 0.118177, pedigree (2,1,3,1,1)
  Calculated value - Emission calculated from water balance. See 'WFLDB-Guidelines.pdf', available at https://ecoquery.ecoinvent.org/File/Reports.
- Chromium, ion [water, surface water]: 9.11472e-8 kg; source Freiermuth R.  2006; lognormal variance with pedigree 0.350938, pedigree (2,2,3,1,1)
  (same comment as for Cadmium, ion)
- Chromium [soil, agricultural]: 1.04385e-6 kg; = 1.13102702703e-06 + ( - 8.611e-08)*heavyMetalUptakeSwitch; source Freiermuth R.  2006
  Comment on mathematicalRelation:
  1.13102702703e-06 from Calculated value - Freiermuth (2006). See 'WFLDB-Guidelines.pdf', available at https://ecoquery.ecoinvent.org/File/Reports.
  -8.611e-08 from Crop, default, heavy metals uptake model
  Heavy metal uptake can be excluded by setting the parameter heavyMetalUptakeSwitch to zero.
- Zinc [soil, agricultural]: -2.21763e-6 kg; = 2.83972972973e-06 + ( - 5.059634e-06)*heavyMetalUptakeSwitch; source Freiermuth R.  2006
  Comment on mathematicalRelation:
  2.83972972973e-06 from Calculated value - Freiermuth (2006). See 'WFLDB-Guidelines.pdf', available at https://ecoquery.ecoinvent.org/File/Reports.
  -5.059634e-06 from Crop, default, heavy metals uptake model
  Heavy metal uptake can be excluded by setting the parameter heavyMetalUptakeSwitch to zero.
- Copper [soil, agricultural]: -7.29006e-7 kg; = 3.17297297297e-07 + ( - 1.0470502e-06)*heavyMetalUptakeSwitch; source Freiermuth R.  2006
  Comment on mathematicalRelation:
  -1.0470502e-06 from Crop, default, heavy metals uptake model
  Heavy metal uptake can be excluded by setting the parameter heavyMetalUptakeSwitch to zero.
- Copper, ion [water, surface water]: 1.24424e-7 kg; source Freiermuth R.  2006; lognormal variance with pedigree 0.350938, pedigree (2,2,3,1,1)
  (same comment as for Cadmium, ion)
- Lead [soil, agricultural]: 1.56206e-7 kg; = 2.41808108108e-07 + ( - 8.544166e-08)*heavyMetalUptakeSwitch; source Freiermuth R.  2006
  Comment on mathematicalRelation:
  2.41808108108e-07 from Calculated value - Freiermuth (2006). See 'WFLDB-Guidelines.pdf', available at https://ecoquery.ecoinvent.org/File/Reports.
  -8.544166e-08 from Crop, default, heavy metals uptake model
  Heavy metal uptake can be excluded by setting the parameter heavyMetalUptakeSwitch to zero.
- Mercury [soil, agricultural]: -2.64973e-9 kg; = 3.75540540541e-09 + ( - 6.407848e-09)*heavyMetalUptakeSwitch; source Freiermuth R.  2006
  Comment on mathematicalRelation:
  -6.407848e-09 from Crop, default, heavy metals uptake model
  Heavy metal uptake can be excluded by setting the parameter heavyMetalUptakeSwitch to zero.
- Lead [water, surface water]: 3.15785e-8 kg; source Freiermuth R.  2006; lognormal variance with pedigree 0.350938, pedigree (2,2,3,1,1)
  (same comment as for Cadmium, ion)
- Nickel [soil, agricultural]: 1.74666e-7 kg; = 3.39891891892e-07 + ( - 1.650468e-07)*heavyMetalUptakeSwitch; source Freiermuth R.  2006
  Comment on mathematicalRelation:
  -1.650468e-07 from Crop, default, heavy metals uptake model
  Heavy metal uptake can be excluded by setting the parameter heavyMetalUptakeSwitch to zero.
- Captan [soil, agricultural]: 0.000236699 kg; lognormal variance with pedigree 0.0387216, pedigree (2,2,3,1,1)
  Calculated value - 100% emission in soil. See 'WFLDB-Guidelines.pdf', available at https://ecoquery.ecoinvent.org/File/Reports.
- Mercury [water, surface water]: 2.04858e-10 kg; source Freiermuth R.  2006; lognormal variance with pedigree 0.350938, pedigree (2,2,3,1,1)
  (same comment as for Cadmium, ion)
- Iprodion [soil, agricultural]: 0.000106638 kg; lognormal variance with pedigree 0.0387216, pedigree (2,2,3,1,1)
  (same comment as for Captan)
- 2,4-D [soil, agricultural]: 4.18365e-6 kg; lognormal variance with pedigree 0.0387216, pedigree (2,2,3,1,1)
  (same comment as for Captan)
- Cadmium, ion [water, ground-]: 1.20134e-9 kg; source Freiermuth R.  2006; lognormal variance with pedigree 0.350938, pedigree (2,2,3,1,1)
  (same comment as for Cadmium, ion)
- Zinc, ion [water, ground-]: 5.26866e-7 kg; source Freiermuth R.  2006; lognormal variance with pedigree 0.350938, pedigree (2,2,3,1,1)
  (same comment as for Cadmium, ion)
- Glyphosate [soil, agricultural]: 1.84559e-5 kg; lognormal variance with pedigree 0.0387216, pedigree (2,2,3,1,1)
  (same comment as for Captan)
- Indoxacarb [soil, agricultural]: 8.23515e-6 kg; lognormal variance with pedigree 0.0387216, pedigree (2,2,3,1,1)
  (same comment as for Captan)
- Carbon dioxide, fossil [air, non-urban air or from high stacks]: 0.00102371 kg; lognormal variance with pedigree 0.00784984, pedigree (2,2,3,1,1)
  Calculated value - CO2 emissions from urea and lime. See 'WFLDB-Guidelines.pdf', available at https://ecoquery.ecoinvent.org/File/Reports.
- Copper, ion [water, ground-]: 8.68381e-8 kg; source Freiermuth R.  2006; lognormal variance with pedigree 0.350938, pedigree (2,2,3,1,1)
  (same comment as for Cadmium, ion)
- Mercury [water, ground-]: 3.47698e-11 kg; source Freiermuth R.  2006; lognormal variance with pedigree 0.350938, pedigree (2,2,3,1,1)
  (same comment as for Cadmium, ion)
- Ammonia [air, non-urban air or from high stacks]: 0.000573791 kg; source EEA 2013; lognormal variance with pedigree 0.0387216, pedigree (2,2,3,1,1)
  Calculated value - EMEP/EEA (2013). See 'WFLDB-Guidelines.pdf', available at https://ecoquery.ecoinvent.org/File/Reports.
- Zinc, ion [water, surface water]: 1.47565e-7 kg; source Freiermuth R.  2006; lognormal variance with pedigree 0.350938, pedigree (2,2,3,1,1)
  (same comment as for Cadmium, ion)
- Nitrogen oxides [air, non-urban air or from high stacks]: 0.000244847 kg; source EEA 2013; lognormal variance with pedigree 0.118664, pedigree (2,2,3,1,1)
  Calculated value - EEA/EMEP (2013). See 'WFLDB-Guidelines.pdf', available at https://ecoquery.ecoinvent.org/File/Reports.
- Dinitrogen monoxide [air, non-urban air or from high stacks]: 0.000118928 kg; source IPCC 2006; lognormal variance with pedigree 0.118664, pedigree (2,2,3,1,1)
  Calculated value - IPCC (2006). See 'WFLDB-Guidelines.pdf', available at https://ecoquery.ecoinvent.org/File/Reports.
- Chromium, ion [water, ground-]: 5.43578e-7 kg; source Freiermuth R.  2006; lognormal variance with pedigree 0.350938, pedigree (2,2,3,1,1)
  (same comment as for Cadmium, ion)
- Cadmium [soil, agricultural]: 1.3085e-7 kg; = 1.47027027027e-07 + ( - 1.604332e-08)*heavyMetalUptakeSwitch; source Freiermuth R.  2006
  Comment on mathematicalRelation:
  1.47027027027e-07 from Calculated value - Freiermuth (2006). See 'WFLDB-Guidelines.pdf', available at https://ecoquery.ecoinvent.org/File/Reports.
  -1.604332e-08 from Crop, default, heavy metals uptake model
  Heavy metal uptake can be excluded by setting the parameter heavyMetalUptakeSwitch to zero.
- Water [air, non-urban air or from high stacks]: 0.10128 m3; lognormal variance with pedigree 0.118177, pedigree (2,1,3,1,1)
  (same comment as for Water)
- Lead [water, ground-]: 5.78003e-9 kg; source Freiermuth R.  2006; lognormal variance with pedigree 0.350938, pedigree (2,2,3,1,1)
  (same comment as for Cadmium, ion)
- Nickel, ion [water, surface water]: 6.47148e-8 kg; source Freiermuth R.  2006; lognormal variance with pedigree 0.350938, pedigree (2,2,3,1,1)
  (same comment as for Cadmium, ion)
- Phosphate [water, surface water]: 2.54086e-5 kg; source Prasuhn V.  2006; lognormal variance with pedigree 0.169866, pedigree (2,2,3,1,1)
  Calculated value - Prasuhn (2006). See 'WFLDB-Guidelines.pdf', available at https://ecoquery.ecoinvent.org/File/Reports.
- Nickel, ion [water, ground-]: 3.11087e-12 kg; source Freiermuth R.  2006; lognormal variance with pedigree 0.350938, pedigree (2,2,3,1,1)
  (same comment as for Cadmium, ion)
- Phosphorus [water, surface water]: 2.38018e-6 kg; source Prasuhn V.  2006; lognormal variance with pedigree 0.169866, pedigree (2,2,3,1,1)
  Calculated value - Prasuhn (2006) and SQCB-Erosion. See 'WFLDB-Guidelines.pdf', available at https://ecoquery.ecoinvent.org/File/Reports.
- Nitrate [water, ground-]: 0.00136904 kg; source Richner W. 2014; lognormal variance with pedigree 0.169866, pedigree (2,2,3,1,1)
- Water [water, surface water]: 0.0295589 m3; lognormal variance with pedigree 0.118177, pedigree (2,1,3,1,1)
  (same comment as for Water)
- Phosphate [water, ground-]: 4.97787e-6 kg; source Prasuhn V.  2006; lognormal variance with pedigree 0.169866, pedigree (2,2,3,1,1)
  (same comment as for Phosphate)

## Sampling procedure
WFLDB Methodological Guidelines for the Life Cycle Inventory of Agricultural Products in the latest version, available at: (Report section: https://v30.ecoquery.ecoinvent.org/File/Reports). Data sources: Data were categorised from level 0 (L0) to level (L4) as follows: L0 = estimate, proxy; L1 = statistical data (e.g. FAOSTAT); L2 = L1 adapted to crop and country; L3 = literature data or L1 resp. L2 data approved by experts; medium detailing (i.e. kg of total N-fertiliser); L4 = L3 data of high detailing (i.e. portion N-fertiliser types).In this dataset data were obtained for yield: L3; Fertilisers: L3; Pesticides: L0; Machinery: L0; Irrigation: L2. For information regarding the calculation of individual exchanges see supporting documentation WFLDB-Documentation.pdf.

## Extrapolations
If used, extrapolations are documented on the flow level.

## Review by Assumpció ANTON 2016-05-30
Be aware that the use of statistics in input calculations could provide some specific inputs not common for specific crops, this should be corrected if better information is available and better reflexed in DQR . Currently, I would dissent for some of good marks provided, being a revision of criteria applied advisable.

Pesticides will need to be amended periodically checking for update of pesticides' ban.
