# slab and siding, softwood, wet, measured as dry mass to generic market for residual softwood, wet

Dataset: EcoSpold 2, unit process
Geography: GLO
Time period: 2014-01-01 to 2019-12-31
Technology level: current
Classification: ISIC rev.4 ecoinvent: 1610:Sawmilling and planing of wood
Scenario: Business-as-Usual
System model: Allocation at the point of substitution
Generated by: Emilia Moreno Ruiz
Database: ecoinvent
isCopyrightProtected: true
accessRestrictedTo: 1

## General comment
This activity is linking the more specific market for slab and siding, softwood, to the more generic market for residual softwood, wet.It makes accesible the specific product slab and siding, softwood through the more generic product of wet residual softwood.

## Included activities start
Entry of the specific product "slab and siding, softwood, wet, measured as dry mass"

## Included activities end
Delivery of the generic product "residual softwood, wet"

## Reference product
- residual softwood, wet: 1 m3; name residual_softwood_wet; CPC 39283: Non-agglomerated wood waste and scrap; By-product classification allocatable product
  production volume 1.82222e7 m3; = 8.20E+10*0.1/ residual_softwood_wet_DM
    8.2E+10 kg is the rough Production Volumes of slab and siding, softwood produced out of sawing. It is considered that 10% of this volume is consumed as the more generic product "residual softwood, wet". The Dry Mass of this product is used to calculate the Production Volumes in m3.
  property price 19.5 EUR2005; name residual_softwood_wet_price_EUR2005
    Data on Import/Export (USD/kg) from UN data has been used. (http://data.un.org/Data.aspx?d=ComTrade&f=_l1Code%3a45, [accessed 10th June 2010]) Commodity: 'Sawdust, wood waste or scrap'. A density of 250 kg/m3 was used to convert from M3 to kg (data on density: http://wiki.answers.com/Q/What_is_the_density_of_sawdust, [Accessed 13 June 2010]).
  property dry mass 450 kg; name residual_softwood_wet_DM
  property carbon content 0.494
    carbon content on a dry matter basis (reserved; not for manual entry)
  properties: water content 0.7, carbon content, fossil 0, carbon content, non-fossil 0.494, wet mass 765 kg, water in wet mass 315 kg, carbon allocation 222.3 kg

## Inputs from technosphere
- slab and siding, softwood, wet, measured as dry mass: 450 kg; = residual_softwood_wet_DM* residual_softwood_wet
  Calculated using the Dry Mass of the reference product
  properties: carbon content, non-fossil 0.494, wet mass 1.7 kg, water content 0.7, dry mass 1 kg

## Extrapolations
This dataset has been extrapolated from year 2014 to the year of the calculation (2019). The uncertainty has been adjusted accordingly.
