# treatment of wastewater from potato starch production, capacity 1.1E10l/year

Dataset: EcoSpold 2, unit process
Geography: CH
Time period: 1994-01-01 to 2019-12-31
Technology level: current
Classification: ISIC rev.4 ecoinvent: 3700:Sewerage
Classification: EcoSpold01Categories: waste management/wastewater treatment
Tags: Treatment; ConvertedDataset
Scenario: Business-as-Usual
System model: Allocation at the point of substitution
Generated by: Gabor Doka (obsolete)
Published in: Doka G. 2008
Database: ecoinvent
isCopyrightProtected: true
accessRestrictedTo: 1

## General comment
Wastewater purified in a moderatly large municipal wastewater treatment plant (capacity class 2), with an average capacity size of 71100 per-captia-equivalents PCE.
Wastewater contains (in kg/m3): COD: 2 (GSD=217%); BOD: 1.35 (GSD=154%); Ntot.: 0.006 (GSD=113%);
[This dataset was already contained in the ecoinvent database version 2. It was not individually updated during the transfer to ecoinvent version 3. Life Cycle Impact Assessment results may still have changed, as they are affected by changes in the supply chain, i.e. in other datasets. This dataset was generated following the ecoinvent quality guidelines for version 2. It may have been subject to central changes described in the ecoinvent version 3 change report (http://www.ecoinvent.org/database/ecoinvent-version-3/reports-of-changes/), and the results of the central updates were reviewed extensively. The changes added e.g. consistent water flows and other information throughout the database. The documentation of this dataset can be found in the ecoinvent reports of version 2, which are still available via the ecoinvent website. The change report linked above covers all central changes that were made during the conversion process.]

## Included activities end
Infrastructure materials for municipal wastewater treatment plant, transports, dismantling. Land use burdens.

## Geography
Specific to the technology mix encountered in Switzerland in 2000. Well applicable to modern treatment practices in Europe, North America or Japan.

## Technology
Three stage wastewater treatment (mechanical, biological, chemical) including sludge digestion (fermentation) according to the average technology in Switzerland

## Parameters
- fraction, process water, to air: 0.1 dimensionless; name fraction_PW_to_air; lognormal variance with pedigree 0.092025, pedigree (4,4,3,2,4)
  Literature value (Statistics Canada, 2007 & Shaffer, K.H., 2008, Consumptive water use in the Great Lakes Basin, USGS) (Vionnet, S., Quantis Water Database - Technical Report, 2012).

## Reference product
- wastewater from potato starch production: -1 m3; CPC 39920: Sewage sludge; By-product classification Waste
  production volume 0.0336675 m3
    This is a placeholder value that does not reflect real-world production volumes. This dataset does not currently require a real-world production volume to work in the database framework, and no actual data were collected yet. This has no negative effect on the results of the ecoinvent database. The placeholder value of this activity was scaled according to the nominal GDP of 2005 (source: United Nations, http://data.un.org/Glossary.aspx?q=GDP+%28current+US%24%29, accessed 20130726) to reflect an appropriate share of the global production volume, which is also a placeholder value.
  property price 0 EUR2005
    Waste products are assigned a price of zero as they are assumed to require further treatment.
  property carbon content, non-fossil 0.993118
    COD= 2 kg/m3 (Tab A.19, ecoinvent v2.2 report 13_I). COD was converted to TOC, using conversion factors in Tab 4.10 (ecoinvent v2.2 report 13_IV). TOC was considered as Total Carbon.
  property carbon content 0.993118
    carbon content on a dry matter basis (reserved; not for manual entry)
  properties: dry mass 0.871801 kg, water in wet mass 999.128 kg, wet mass 1000 kg, carbon content, fossil 0, water content 1146.05, carbon allocation 0.865801 kg

## By-products
- electricity, for reuse in municipal waste incineration only: 0 kWh; CPC 17100: Electrical energy; By-product classification allocatable product; pedigree (1,1,1,1,1)
  Net electricity generated from this waste and used in internal MSWI plant energy redistribution.
  Uncertainty: uncertainty is calculated from uncertainties in waste composition and uncertainties in energy efficiency and the uncertainty in internal energy demand
  property exergy 3.6 MJ; name E_el_prod_MSWI_exergy
    This exergy property is based on the exergy content of the product.
  property true value relation 3.6; name E_el_prod_MSWI_true_value_relation
    property to calculate "true value" from
  property price 0.1 EUR2005; name E_el_prod_MSWI_price_EUR2005
    Estimated to be the same price as in case of electricity, medium voltage.
- heat, for reuse in municipal waste incineration only: 0 MJ; CPC 17300: Steam and hot water; By-product classification allocatable product; pedigree (1,1,1,1,1)
  Net useful heat generated from this waste and used in internal MSWI plant energy redistribution.
  Uncertainty: uncertainty is calculated from uncertainties in waste composition and uncertainties in energy efficiency and the uncertainty in internal energy demand
  property true value relation 0.1842; name E_th_prod_MSWI_true_value_relation
    property to calculate "true value" from
  property exergy 0.1842 MJ; name E_th_prod_MSWI_exergy
    This exergy property is based on the exergy content of the product.
  property price 0.0106 EUR2005; name E_th_prod_MSWI_price_EUR2005
    Average European district heat price from Ecoheatcool and Euroheat 2005-2006, Ecoheat Work package 1: The European heat market. Final report. 10.6 EUR/GJ i s the price of district heat. http://www.solarthermalworld.org/files/Ecoheatcool%20WP1%20Web.pdf?download
- zinc concentrate: 0 kg; CPC 14290: Other non-ferrous metal ores and concentrates (other than uranium or thorium ores and concentrates); By-product classification allocatable product
  Calculated value from the knowledge of the properties of both products.
  property price 0.38 EUR2005; name ByP_price_EUR2005
    Temporary price data. Calculated as 90% of purchasers price based on: Zinc content in concentrate 53%. Concentrate price per kg Zn 86.5% of refined Zn price (13.5% treatment charges according to CHR Metals Limited 2005: Dynamic cost curves. http://www.minecost.com/dynamic.pdf). 2004 zinc price from USGS (2007) Mineral commodity summaries 2007. <http://minerals.usgs.gov/minerals/pubs/mcs/2007/mcs2007.pdf> [Accessed 25 May 2010]
  property zinc content 0.53; name zinc_C_zinc_concentrate
    Zinc content on a dry matter basis. Value taken from teh "zinc mine operation" /GLO dataset.
  property dry mass 1 kg; name DM_zinc_concentrate
  property carbon content 0
    carbon content on a dry matter basis (reserved; not for manual entry)
  properties: wet mass 1 kg, water content 0, carbon content, non-fossil 0, carbon content, fossil 0, water in wet mass 0 kg, carbon allocation 0 kg

## Inputs from technosphere
- municipal waste incineration facility: 1.5956e-10 unit; lognormal variance with pedigree 0.06, pedigree (1,1,5,1,1)
  burden from sludge incineration. Uncertainty calculated from wastewater composition and treatment model
- sodium hydroxide, without water, in 50% solution state: 7.4881e-7 kg; lognormal variance with pedigree 0.09, pedigree (1,1,5,1,1)
  (same comment as for municipal waste incineration facility)
  properties: dry mass 1 kg, wet mass 1 kg
- ammonia, liquid: 1.5069e-5 kg; lognormal variance with pedigree 0.2, pedigree (1,1,5,1,1)
  (same comment as for municipal waste incineration facility)
  properties: dry mass 1 kg, wet mass 1 kg
- chromium oxide, flakes: 8.8032e-9 kg; lognormal variance with pedigree 0.53, pedigree (1,1,5,1,1)
  (same comment as for municipal waste incineration facility)
  properties: dry mass 1 kg, wet mass 1 kg
- residual material landfill: 1.0111e-12 unit; lognormal variance with pedigree 0.07, pedigree (1,1,5,1,1)
  (same comment as for municipal waste incineration facility)
- heat, district or industrial, other than natural gas: 0.5353 MJ; lognormal variance with pedigree 0.06, pedigree (1,1,5,1,1)
  (same comment as for municipal waste incineration facility)
- quicklime, milled, packed: 1.3576e-7 kg; lognormal variance with pedigree 0.1, pedigree (1,1,5,1,1)
  (same comment as for municipal waste incineration facility)
  properties: water content 0.010101, dry mass 0.99 kg, wet mass 1 kg
- electricity, high voltage: 0.091762 kWh; lognormal variance with pedigree 0.5, pedigree (1,1,5,1,1)
  (same comment as for municipal waste incineration facility)
- process-specific burdens, municipal waste incineration: 0.63826 kg; lognormal variance with pedigree 0.06, pedigree (1,1,5,1,1)
  burden from sludge incineration. Uncertainty calculated from wastewater composition and treatment model;activityLink introduced to establish a direct link to the corresponding regional supply of this product
- waste cement, hydrated: -0.00048535 kg; lognormal variance with pedigree 0.08, pedigree (1,1,5,1,1)
  (same comment as for municipal waste incineration facility)
  production volume 1.63405e-5 kg; = (Ref('bc063714-c508-468b-975b-e7ff934e3f52')*-1)* Ref('6f414f5f-1c61-4e4c-a981-ae4daaeb04de', 'ProductionVolume')/ABS( Ref('6f414f5f-1c61-4e4c-a981-ae4daaeb04de'))
    Calculated from the production volume of wastewater from potato starch production in proportion to the respective output amounts.
  properties: wet mass 1 kg, dry mass 1 kg
- chemical, inorganic: 9.9901e-9 kg; lognormal variance with pedigree 0.17, pedigree (1,1,5,1,1)
  (same comment as for municipal waste incineration facility)
  properties: carbon content, fossil 0.003, dry mass 1 kg, wet mass 1 kg
  note on carbon content, fossil: This dataset is an unweighted average of 20 inorganic substances (listed in Tab 88.1, ecoinvent v2.2 report 8, part II), being part of the top100 chemicals included in this database. The C-content has also been calculated as an unweighted average of the C content of the substances composing this dataset.
- heat, district or industrial, natural gas: 0.00132264 MJ; lognormal variance with pedigree 0.2, pedigree (1,1,5,1,1)
  (same comment as for municipal waste incineration facility)
- waste graphical paper: -0.0155 kg; lognormal variance with pedigree 0.04, pedigree (1,1,5,1,1)
  direct wastewater treatment plant burden. Uncertainty calculated from wastewater composition and treatment model
  production volume 0.000521847 kg; = (Ref('c48bffc6-74aa-4081-9d1a-b9d74f95f754')*-1)* Ref('6f414f5f-1c61-4e4c-a981-ae4daaeb04de', 'ProductionVolume')/ABS( Ref('6f414f5f-1c61-4e4c-a981-ae4daaeb04de'))
    (same comment as for waste cement, hydrated)
  properties: water content 0.126126, wet mass 1 kg, carbon content, non-fossil 0.454955, dry mass 0.888 kg
- sewer grid, 1.1E10l/year, 242 km: 1.6832e-7 km; lognormal variance with pedigree 0.04, pedigree (1,1,5,1,1)
  uncertainty heeded in exchanges of the module
  This exchange has an activity link directly to the producing activity because the product is primarily consumed in the same geographical area where it is produced.
- process-specific burdens, slag landfill: 0.0010648 kg; lognormal variance with pedigree 0.07, pedigree (1,1,5,1,1)
  (same comment as for process-specific burdens, municipal waste incineration)
- electricity, low voltage: 0.56796 kWh; lognormal variance with pedigree 0.35, pedigree (1,1,5,1,1)
  (same comment as for waste graphical paper)
- waste plastic, mixture: -0.0155 kg; lognormal variance with pedigree 0.04, pedigree (1,1,5,1,1)
  (same comment as for waste graphical paper)
  production volume 0.000521847 kg; = (Ref('7448fd46-7a6f-40f2-a00b-f519ad3dcfb7')*-1)* Ref('6f414f5f-1c61-4e4c-a981-ae4daaeb04de', 'ProductionVolume')/ABS( Ref('6f414f5f-1c61-4e4c-a981-ae4daaeb04de'))
    (same comment as for waste cement, hydrated)
  properties: carbon content, fossil 0.747344, water content 0.180638, dry mass 0.847 kg, wet mass 1 kg
  note on carbon content, fossil: C content in 1 kg DM was calculated using data in Tab A.2, ecoinvent v2.2 report 13_I
- wastewater treatment facility, capacity 1.1E10l/year: 1.9883e-9 unit; lognormal variance with pedigree 0.04, pedigree (1,1,5,1,1)
  (same comment as for sewer grid, 1.1E10l/year, 242 km)
- liquid manure spreading, by vacuum tanker: 0.0022794 m3; lognormal variance with pedigree 0.04, pedigree (1,1,5,1,1)
  burden from sludge spreading. Uncertainty calculated from wastewater composition and treatment model
  This exchange has an activity link directly to the producing activity because the product is primarily consumed in the same geographical area where it is produced.
- process-specific burdens, residual material landfill: 0.00048535 kg; lognormal variance with pedigree 0.07, pedigree (1,1,5,1,1)
  (same comment as for process-specific burdens, municipal waste incineration)
- hydrochloric acid, without water, in 30% solution state: 5.9941e-9 kg; lognormal variance with pedigree 0.17, pedigree (1,1,5,1,1)
  (same comment as for municipal waste incineration facility)
  properties: dry mass 1 kg, wet mass 1 kg
- cement, unspecified: 0.00019414 kg; lognormal variance with pedigree 0.08, pedigree (1,1,5,1,1)
  (same comment as for municipal waste incineration facility)
  properties: wet mass 1 kg, dry mass 1 kg
- titanium dioxide: 4.3136e-7 kg; lognormal variance with pedigree 0.53, pedigree (1,1,5,1,1)
  (same comment as for municipal waste incineration facility)
  properties: dry mass 1 kg, wet mass 1 kg
- slag landfill: 1.893e-12 unit; lognormal variance with pedigree 0.07, pedigree (1,1,5,1,1)
  (same comment as for municipal waste incineration facility)

## Emissions to nature
- BOD5, Biological Oxygen Demand [water, surface water]: 0.128 kg; lognormal variance with pedigree 0.18, pedigree (1,1,5,1,1)
  sewer overload discharge plus direct wastewater treatment plant emission plus emission from sludge incineration. Uncertainty calculated from wastewater composition and treatment model
- Nitrite [water, surface water]: 0.00013765 kg; lognormal variance with pedigree 0.06, pedigree (1,1,5,1,1)
  direct wastewater treatment plant emission. Uncertainty calculated from wastewater composition and treatment model
- Ammonium, ion [water, surface water]: 0.0023569 kg; lognormal variance with pedigree 0.05, pedigree (1,1,5,1,1)
  (same comment as for Nitrite)
- DOC, Dissolved Organic Carbon [water, ground-, long-term]: 0.0013738 kg; lognormal variance with pedigree 0.26, pedigree (1,1,5,1,1)
  emission from sludge incineration. Uncertainty calculated from wastewater composition and treatment model
- COD, Chemical Oxygen Demand [water, surface water]: 0.38756 kg; lognormal variance with pedigree 0.57, pedigree (1,1,5,1,1)
  (same comment as for BOD5, Biological Oxygen Demand)
- Methane, non-fossil [air, urban air close to ground]: 0.0068084 kg; lognormal variance with pedigree 0.28, pedigree (1,1,5,1,1)
  direct digester gas emission plus emission from sludge incineration. Uncertainty calculated from wastewater composition and treatment model
- Water [air, unspecified]: 0.1 m3; name water_to_air_unspecified; lognormal variance with pedigree 0.0807, pedigree (2,2,5,1,1)
  Calculated value based on water balance.
  property fraction, origin: fresh water 0; name fraction_origin_fresh_water
  property fraction, origin: salt water 0; name fraction_origin_salt_water
  property fraction, origin: unspecified 1; name fraction_origin_unspecified
- DOC, Dissolved Organic Carbon [water, surface water]: 0.098082 kg; lognormal variance with pedigree 0.52, pedigree (1,1,5,1,1)
  (same comment as for BOD5, Biological Oxygen Demand)
- Nitrate [water, surface water]: 0.010325 kg; lognormal variance with pedigree 0.05, pedigree (1,1,5,1,1)
  (same comment as for BOD5, Biological Oxygen Demand)
- Ammonia [air, urban air close to ground]: 7.8186e-5 kg; lognormal variance with pedigree 0.27, pedigree (1,1,5,1,1)
  direct digester gas emission plus emission from sludge incineration plus emission from sludge spreading. Uncertainty calculated from wastewater composition and treatment model
- COD, Chemical Oxygen Demand [water, ground-, long-term]: 0.0034718 kg; lognormal variance with pedigree 0.26, pedigree (1,1,5,1,1)
  (same comment as for DOC, Dissolved Organic Carbon)
- Carbon [soil, agricultural]: 0.093793 kg; lognormal variance with pedigree 0.25, pedigree (1,1,5,1,1)
  emission from sludge spreading. Uncertainty calculated from wastewater composition and treatment model
- Carbon dioxide, non-fossil [air, urban air close to ground]: 2.5157 kg; lognormal variance with pedigree 0.18, pedigree (1,1,5,1,1)
  direct wastewater treatment plant emission plus direct digester gas emission plus emission from sludge incineration. Uncertainty calculated from wastewater composition and treatment model
- Cyanide [air, urban air close to ground]: 2.6883e-7 kg; lognormal variance with pedigree 0.23, pedigree (1,1,5,1,1)
  (same comment as for DOC, Dissolved Organic Carbon)
- Water [water, unspecified]: 0.9 m3; name water_to_water_unspecified; lognormal variance with pedigree 0.0807, pedigree (2,2,5,1,1)
  Calculated value based on water balance.
  property wet mass 1000 kg; name WM
  property carbon content, fossil 0; name C_content_fossil
  property dry mass 0 kg; name DM
  property carbon content, non-fossil 0; name C_content_non_fossil
  property fraction, origin: fresh water 1; name fraction_origin_fresh_water_Ww
  property fraction, origin: unspecified 0; name fraction_origin_unspecified_Ww
  property water in wet mass 1000 kg; name WWM
  property fraction, origin: salt water 0; name fraction_origin_salt_water_Ww
- TOC, Total Organic Carbon [water, surface water]: 0.10493 kg; lognormal variance with pedigree 0.17, pedigree (1,1,5,1,1)
  (same comment as for BOD5, Biological Oxygen Demand)
- Carbon monoxide, non-fossil [air, urban air close to ground]: 0.0021619 kg; lognormal variance with pedigree 0.29, pedigree (1,1,5,1,1)
  (same comment as for Methane, non-fossil)
- BOD5, Biological Oxygen Demand [water, ground-, long-term]: 0.0011356 kg; lognormal variance with pedigree 0.26, pedigree (1,1,5,1,1)
  (same comment as for DOC, Dissolved Organic Carbon)
- TOC, Total Organic Carbon [water, ground-, long-term]: 0.0013738 kg; lognormal variance with pedigree 0.26, pedigree (1,1,5,1,1)
  (same comment as for DOC, Dissolved Organic Carbon)
- Dinitrogen monoxide [air, urban air close to ground]: 2.2246e-5 kg; lognormal variance with pedigree 0.07, pedigree (1,1,5,1,1)
  direct wastewater treatment plant emission plus direct digester gas emission plus emission from sludge incineration plus emission from sludge spreading. Uncertainty calculated from wastewater composition and treatment model
- Nitrate [water, ground-, long-term]: 1.073e-5 kg; lognormal variance with pedigree 0.07, pedigree (1,1,5,1,1)
  (same comment as for DOC, Dissolved Organic Carbon)
- Nitrogen [water, surface water]: 0.00010474 kg; lognormal variance with pedigree 0.06, pedigree (1,1,5,1,1)
  (same comment as for Nitrite)
- Nitrogen oxides [air, urban air close to ground]: 0.0001494 kg; lognormal variance with pedigree 0.07, pedigree (1,1,5,1,1)
  (same comment as for Methane, non-fossil)
- NMVOC, non-methane volatile organic compounds, unspecified origin [air, urban air close to ground]: 3.0936e-5 kg; lognormal variance with pedigree 0.4, pedigree (1,1,5,1,1)
  direct digester gas emission. Uncertainty calculated from wastewater composition and treatment model

## Extrapolations
This dataset has been extrapolated from year 2000 to the year of the calculation (2019). The uncertainty has been adjusted accordingly.

## Review by Niels Jungbluth 2009-01-22
passed.
