# stone wool factory construction

Dataset: EcoSpold 2, unit process
Geography: CH
Time period: 2000-01-01 to 2019-12-31
Technology level: current
Classification: EcoSpold01Categories: insulation materials/production
Classification: ISIC rev.4 ecoinvent: 4290:Construction of other civil engineering projects
Synonyms: mineralisch; Isolation; company; insulation; firm; Fabrik; platte; board; Betrieb; Dämm; mat; matte; mineral
Tags: ConvertedDataset
Scenario: Business-as-Usual
System model: Allocation at the point of substitution
Share of production covered: 40 %
Generated by: Daniel Kellenberger (obsolete)
Published in: Kellenberger D. 2007
Database: ecoinvent
isCopyrightProtected: true
accessRestrictedTo: 1

## General comment
The production volume of the plant is 45'000 t of rock wool products per year
[This dataset was already contained in the ecoinvent database version 2. It was not individually updated during the transfer to ecoinvent version 3. Life Cycle Impact Assessment results may still have changed, as they are affected by changes in the supply chain, i.e. in other datasets. This dataset was generated following the ecoinvent quality guidelines for version 2. It may have been subject to central changes described in the ecoinvent version 3 change report (http://www.ecoinvent.org/database/ecoinvent-version-3/reports-of-changes/), and the results of the central updates were reviewed extensively. The changes added e.g. consistent water flows and other information throughout the database. The documentation of this dataset can be found in the ecoinvent reports of version 2, which are still available via the ecoinvent website. The change report linked above covers all central changes that were made during the conversion process.]

## Included activities end
Includes the area of the infrastructure (buildings, roads, etc.), the buildings and the machines used for the rock wool production

## Geography
Data are only from one company in Switzerland (Flumroc AG). For some exchanges RER-modules have been used as proxy

## Technology
The data for the infrastructure correspond to high level of technology. The furnace is a cupola melting furnace. The emissions are abated by post-combustion with energy recuperation. As no description of the used machines exists, a total weight for these machines has been estimated and the module 'machine, heavy, unspecified' used.

## Reference product
- stone wool factory: 1 unit; CPC 37990: Non-metallic mineral products n.e.c. (including mineral wool, expanded mineral materials, worked mica, article[…]; By-product classification allocatable product
  production volume 0.0336675 unit
    This is a placeholder value that does not reflect real-world production volumes. This dataset does not currently require a real-world production volume to work in the database framework, and no actual data were collected yet. This has no negative effect on the results of the ecoinvent database. The placeholder value of this activity was scaled according to the nominal GDP of 2005 (source: United Nations, http://data.un.org/Glossary.aspx?q=GDP+%28current+US%24%29, accessed 20130726) to reflect an appropriate share of the global production volume, which is also a placeholder value.
  property price 2.9291e7 EUR2005
    Calculated based on inputs: The price of the product has been calculated as a sum of the values of the material and energy inputs for this product. This value is therefore a rough estimation. It may underestimate the real price since there are additional expenses when producing any product. These expences can include for example labour costs, treatment of waste materials and profit for the producer. Please consider carefully whether this level of data quality is acceptable for your application.

## Inputs from technosphere
- industrial machine, heavy, unspecified: 3.82e6 kg; lognormal variance with pedigree 0.368625, pedigree (1,3,5,2,3)
  activityLink introduced to establish a direct link to the corresponding regional supply of this product
- building, hall: 8400 m2; lognormal variance with pedigree 0.3706, pedigree (3,3,5,1,3)
  This exchange has an activity link directly to the producing activity because the product is primarily consumed in the same geographical area where it is produced.
- conveyor belt: 10000 m; lognormal variance with pedigree 0.368625, pedigree (1,3,5,2,3)
  (same comment as for industrial machine, heavy, unspecified)
- building, multi-storey: 187000 m3; lognormal variance with pedigree 0.370625, pedigree (3,3,5,2,3)
  (same comment as for industrial machine, heavy, unspecified)

## Inputs from nature
- Transformation, to traffic area, road network [natural resource, land]: 22700 m2; lognormal variance with pedigree 0.1601, pedigree (1,2,5,1,1)
- Transformation, from unspecified [natural resource, land]: 86200 m2; lognormal variance with pedigree 0.1601, pedigree (1,2,5,1,1)
- Transformation, to industrial area [natural resource, land]: 63600 m2; lognormal variance with pedigree 0.1601, pedigree (1,2,5,1,1)
- Occupation, industrial area [natural resource, land]: 4.31e6 m2*year; lognormal variance with pedigree 0.0801, pedigree (1,2,5,1,1)

## Sampling procedure
personal communication

## Extrapolations
This dataset has been extrapolated from year 2002 to the year of the calculation (2019). The uncertainty has been adjusted accordingly.

## Review by Roberto Dones 2003-07-04
Passed
