# tap water production, artificial recharged wells

Dataset: EcoSpold 2, unit process
Geography: RoW
Time period: 2012-01-01 to 2019-12-31
Technology level: current
Classification: EcoSpold01Categories: water supply/production
Classification: ISIC rev.4 ecoinvent: 3600:Water collection, treatment and supply
Synonyms: potable water
Tags: single enterprise data
Scenario: Business-as-Usual
System model: Allocation at the point of substitution
Generated by: Marylène Dussault
Database: ecoinvent
isCopyrightProtected: true
accessRestrictedTo: 1

## General comment
This dataset represents production of 1 kg of tap water under pressure at facility gate, ready for distribution in network. It represents average operation of tap water using artificial recharged wells technology. Water intake is a mix of groundwater and surface water (60:40). Surface water recharge hole where it settles and is then filtered through natural soil. Water is pumped from aquifer, disinfected and pressurized for distribution. Inventory was constructed from reported chemicals, energy inputs and wastes from a single plant located in Québec covering nearly 100% of total production of tap water from this technology.
[This dataset is meant to replace the following datasets:
- tap water production and supply, GLO, 2000 - 2000]

## Included activities start
From the intake pumping of raw surface water into the water treatment plant.

## Included activities end
This dataset ends with the production of tap water, at facility gate, under pressure. It includes energy for intake pumping, treatment system, lighting and heating of the building as well as the energy of the pump pressurizing water to the beginning of the network. It includes all chemicals and material added to the water during treatment and ultraviolent lamps for replacements. It excludes energy for pumping stations and water losses within the network which is included in the tap water market. Emissions to the environment occurring during the treatment and during the distribution were not considered as they are assumed negligible. Main substance in water that would be released in the environment are assumed to be considered in wastewater processes.

## Geography
Extrapolated from data from a single plant in Quebec (Canada). The uncertainty was adjusted accordingly.

## Time period
Time of publication.

## Parameters
- unit conversion, days in a year: 365.25 d/year; name days_per_year; lognormal variance with pedigree 0.0006, pedigree (1,1,1,1,1)
  Conversion factor.

## Reference product
- tap water: 1 kg; name tapwater; CPC 18000: Natural water; By-product classification allocatable product; CAS 7732-18-5
  production volume 9.20075e12 kg; name PV_tapwater; = ((4e15*0.3)-3.5E12)*0.0077
    Calculated value based on literature data and expert judgement. The amount of freshwater which falls as rainwater is 110000km3/year. Out of that only 40000km3/year is converted into surface runoff (http://www.fao.org/nr/water/aquastat/water_use/index.stm, accessed 20140522). The total water withdrawal in the world is around 4000km3/year, i.e. 4E15kg (cross-referenced with 3 publications; Shiklomanov, 2003, UN - http://unesdoc.unesco.org/images/0022/002257/225741E.pdf and http://unesdoc.unesco.org/images/0018/001819/181993e.pdf, accessed 20140522). Out of that app. 70% goes for irrigation (http://www.fao.org/nr/water/aquastat/water_use/index.stm, accessed 20140522), thus 1.2E15kg is left for municipal and industrial use.
    The total tap water production technology shares in the world, present in the ecoinvent database are calculated to be as follows; tap water production, conventional treatment - 40%, tap water production, conventional with biological treatment - 11%, tap water production, direct filtration treatment - 18.5%, tap water production, microstainer treatment - 2.2%, tap water production, ultrafiltration treatment - 2.3%, tap water production, seawater reverse osmosis conventional pretreatment, enhance module, single - 0.5%, tap water production, seawater reverse osmosis, conventional pretreatment, enhance module, single stage - 0.1%, tap water production, seawater reverse osmosis, conventional pretreatment, enhance module, two stages - 0.066%, tap water production, seawater reverse osmosis, ultrafiltration pretreatment, baseline module, single stage - 0.049%, tap water production, seawater reverse osmosis, ultrafiltration pretreatment, enhance module, single stage - 0.01%, tap water production, seawater reverse osmosis, ultrafiltration pretreatment, enhance module, two stages - 0.007%, tap water production, underground water with chemical treatment - 10.7%, tap water production, underground water with disinfection - 2.7%, tap water production, underground water without chemical treatment - 11.4%, tap water production, artificial recharge wells - 0.8%.
  property price 0.000397 EUR2005; name tapwater_price_EUR2005
    Converted from EU price by using Purchasing Power Parities (0.8458 in 2003 and 0.8426 in 2004)
  property carbon content 0.0017899
    carbon content on a dry matter basis (reserved; not for manual entry)
  property true value 0.000397; name tapwater_true_value
    allocation property applied in "true value" allocation // value calculated from revenue
  properties: water in wet mass 0.99966 kg, wet mass 1 kg, water content 2940.18, carbon content, fossil 0.0017899, carbon content, non-fossil 0, dry mass 0.00034 kg, carbon allocation 6.08566e-7 kg

## By-products
- electricity, for reuse in municipal waste incineration only: 0 kWh; CPC 17100: Electrical energy; By-product classification allocatable product; pedigree (1,1,1,1,1)
  Net electricity generated from this waste and used in internal MSWI plant energy redistribution.
  Uncertainty: uncertainty is calculated from uncertainties in waste composition and uncertainties in energy efficiency and the uncertainty in internal energy demand
  production volume 3.12788e6 kWh
  property exergy 3.6 MJ; name E_el_prod_MSWI_exergy
    This exergy property is based on the exergy content of the product.
  property true value relation 3.6; name E_el_prod_MSWI_true_value_relation
    property to calculate "true value" from
  property price 0.1 EUR2005; name E_el_prod_MSWI_price_EUR2005
    Estimated to be the same price as in case of electricity, medium voltage.
  property true value 4.36789e-8
    allocation property applied in "true value" allocation // value calculated from true value relation
- heat, for reuse in municipal waste incineration only: 0 MJ; CPC 17300: Steam and hot water; By-product classification allocatable product; pedigree (1,1,1,1,1)
  Net useful heat generated from this waste and used in internal MSWI plant energy redistribution.
  Uncertainty: uncertainty is calculated from uncertainties in waste composition and uncertainties in energy efficiency and the uncertainty in internal energy demand
  production volume 2.21293e7 MJ
  property true value relation 0.1842; name E_th_prod_MSWI_true_value_relation
    property to calculate "true value" from
  property exergy 0.1842 MJ; name E_th_prod_MSWI_exergy
    This exergy property is based on the exergy content of the product.
  property price 0.0106 EUR2005; name E_th_prod_MSWI_price_EUR2005
    Average European district heat price from Ecoheatcool and Euroheat 2005-2006, Ecoheat Work package 1: The European heat market. Final report. 10.6 EUR/GJ i s the price of district heat. http://www.solarthermalworld.org/files/Ecoheatcool%20WP1%20Web.pdf?download
  property true value 1.58116e-8
    (same comment as for electricity, for reuse in municipal waste incineration only)
- zinc concentrate: 0 kg; CPC 14290: Other non-ferrous metal ores and concentrates (other than uranium or thorium ores and concentrates); By-product classification allocatable product
  Calculated value from the knowledge of the properties of both products.
  production volume 553.635 kg
  property price 0.38 EUR2005; name ByP_price_EUR2005
    Temporary price data. Calculated as 90% of purchasers price based on: Zinc content in concentrate 53%. Concentrate price per kg Zn 86.5% of refined Zn price (13.5% treatment charges according to CHR Metals Limited 2005: Dynamic cost curves. http://www.minecost.com/dynamic.pdf). 2004 zinc price from USGS (2007) Mineral commodity summaries 2007. <http://minerals.usgs.gov/minerals/pubs/mcs/2007/mcs2007.pdf> [Accessed 25 May 2010]
  property zinc content 0.53; name zinc_C_zinc_concentrate
    Zinc content on a dry matter basis. Value taken from teh "zinc mine operation" /GLO dataset.
  property dry mass 1 kg; name DM_zinc_concentrate
  property carbon content 0
    carbon content on a dry matter basis (reserved; not for manual entry)
  property true value 2.28657e-11
    allocation property applied in "true value" allocation // value calculated from revenue
  properties: wet mass 1 kg, water content 0, carbon content, non-fossil 0, carbon content, fossil 0, water in wet mass 0 kg, carbon allocation 0 kg

## Inputs from technosphere
- ultraviolet lamp: 7.94244e-10 unit; lognormal variance with pedigree 0.0072, pedigree (2,4,3,5,1)
  Measured value. Based on replacement of ultraviolet lamps in 2012.
- wastewater, unpolluted: -1.39979e-5 m3; name ww; lognormal variance with pedigree 0.0072, pedigree (2,4,3,5,1)
  Measured value. Average amount of wastewater produced during treatment.
  EcoSpold01Location=CH
  production volume 1.2881e8 m3; = PV_tapwater*(ww/tapwater)
    Calculated from the production volume of tap water, at user in proportion to the respective output amounts.
  property price 0 EUR2005; name ww_price_EUR2005
  properties: wet mass 1000 kg, dry mass 0.337476 kg, carbon content, non-fossil 0.00178991, water content 2962.17, carbon content, fossil 0.00178991
  note on carbon content, fossil: Assumed to be like in tap water. Bicarbonate content is 2.93 mol/m3. CO2 content is 0.1 mol/m3 (ecoinvent v2.2 report 8, Tab 93.1).
- diesel, burned in building machine: 0.00153112 MJ; = diesel_use*density_diesel*NHV; lognormal variance with pedigree 0.002, pedigree (1,1,3,1,1)
  Calculated value.
  Uncertainty: Calculated variable. Uncertainty will be determined from propagation of uncertainty factors of underlying variables.
  property heating value, net 43.2 MJ; name NHV
  property fuel input in physical units, L 4.22e-5 l; name diesel_use
  property density 0.84 kg/l; name density_diesel
  note on heating value, net: Literature. net (lower) heating (calorific) value for diesel in MJ/kg
  note on fuel input in physical units, L: Measured value. Diesel volume consumed in a year. Exclusively used for routine runs of emergy generators.
- electricity, medium voltage: 0 kWh; pedigree (1,1,1,1,1)
  Measured value. Represents electricity consumption for the entire treatment process including pumping for water intake, all treatment processes and pumping for distribution at the plant gate.
  EcoSpold01Location=UCTE
- pump station: 2.05649e-11 unit; lognormal variance with pedigree 0.0466, pedigree (5,4,3,5,1)
  Extrapolated process. Used to represent treatment facility pumping both intake and at facility gate. Value taken directly from ecoinvent V2.2 tapwater, at user module.
  property plant average daily flow rate 30000 m3/d; name Q_av
  property lifetime 60 year; name lifetime
  note on plant average daily flow rate: Fixed values, Flow rate of a conventional water purification plant for a medium-size facility as defined in the water works process.
  note on lifetime: Estimated Value. Expected lifetime of water works as defined in the construction process.
- excavation, hydraulic digger: 1.11983e-10 m3; lognormal variance with pedigree 0.00806, pedigree (3,4,3,5,1)
  Extrapoled process. Used as approximation of effort for recharge hole construction. Value represents actual volume of holes which are used to artificially recharged the aquifer (31000 over lifetime production of facility asumming 60 years of useful life).
- building, hall, steel construction: 2.35965e-12 m2; lognormal variance with pedigree 0.0072, pedigree (2,4,3,5,1)
  Extrapolated process. Used to represent treatment facility since actual square footing was provided by data supplier (650 m2 over lifetime production of facility asumming 60 years of useful life) and that treatment that occurs within building has limited infrastructure requirements: chemical dosage and ultraviolet disinfection. A pumping station was added to account for pumping equipment.
- chlorine, liquid: 1.40422e-6 kg; lognormal variance with pedigree 0.0072, pedigree (2,4,3,5,1)
  Measured value.Represents use of chlorine, delivered in liquid state, for disinfection in surveyed artificially recharged treatment plant.
  properties: wet mass 1 kg, dry mass 1 kg
- electricity, medium voltage: 3.7961e-6, 6.90729e-7, 1.5944e-5, 5.59824e-6, 1.17137e-5, 0.000169837, 5.51467e-5, 2.43069e-5, 7.09133e-5 kWh (9 entries); lognormal variance with pedigree 0.0072, pedigree (2,4,3,5,1)
  (same comment as for electricity, medium voltage)

## Inputs from nature
- Water, well, in ground [natural resource, in water]: 0.000608309 m3; lognormal variance with pedigree 0.0466, pedigree (2,4,3,5,1)
  Calculated value. Surface water withdrawal represents average withdrawal from surveyed plants based on water production and wastewater production. Underground water intake accounts for 60% of total intake.
- Water, lake [natural resource, in water]: 0.000405539 m3; name waterIn; lognormal variance with pedigree 0.0466, pedigree (2,4,3,5,1)
  Calculated value. Surface water withdrawal represents average withdrawal from surveyed plants based on water production and wastewater production. Surface water intake accounts for 40% of total intake.

## Sampling procedure
Based on data collected in Quebec from a single plant. See corresponding Quebec dataset for more information. Note that percent representativeness is not supplied because technology-specific global production volumes is too uncertain. Should this information become available, the representativeness can be calculated by dividing the sum of the water treated by the Quebec plants that served as a basis for the Global dataset (1.26E10 kg/a) by the technology-specific global production volume.

## Extrapolations
Extrapolated from a single plant in Quebec (Canada). The uncertainty has been changed accordingly.
