# electron gun production, for cathode ray tube display

Dataset: EcoSpold 2, unit process
Geography: GLO
Time period: 2001-01-01 to 2019-12-31
Technology level: current
Classification: EcoSpold01Categories: electronics/component
Classification: ISIC rev.4 ecoinvent: 2610:Manufacture of electronic components and boards
Tags: ConvertedDataset
Scenario: Business-as-Usual
System model: Allocation at the point of substitution
Generated by: Roland Hischier
Published in: Hischier R. 2007
Database: ecoinvent
isCopyrightProtected: true
accessRestrictedTo: 1

## General comment
This dataset represents the production of 1 kg of electron gun for cathode ray tube display production. Data represent an electron gun as used in cathode ray tube screens. Main data about the composition are based on literature and own estimations.
[This dataset was already contained in the ecoinvent database version 2. It was not individually updated during the transfer to ecoinvent version 3. Life Cycle Impact Assessment results may still have changed, as they are affected by changes in the supply chain, i.e. in other datasets. This dataset was generated following the ecoinvent quality guidelines for version 2. It may have been subject to central changes described in the ecoinvent version 3 change report (http://www.ecoinvent.org/database/ecoinvent-version-3/reports-of-changes/), and the results of the central updates were reviewed extensively. The changes added e.g. consistent water flows and other information throughout the database. The documentation of this dataset can be found in the ecoinvent reports of version 2, which are still available via the ecoinvent website. The change report linked above covers all central changes that were made during the conversion process.]

## Included activities start
From reception of raw materials and auxiliaries at the factory gate.

## Included activities end
This dataset includes raw materials, infrastructure and transport efforts. Energy consumption, waste as well as all kind of emissions are not taken into account.

## Geography
Literature data are used to establish a global valuable dataset

## Technology
estimation of the composition of a current CRT electron gun

## Reference product
- electron gun, for cathode ray tube display: 1 kg; CPC 47173: Parts for the goods of subclasses 47140 to 47160; By-product classification allocatable product
  Rough estimation of the actual electron gun production.
  Computer monitors or displays are the visual interface between a computer and the user / operator. The CRT technology has been invented by the German physicist Karl Ferdinand Braun in 1897. It is the display technology that has been for a long time used in almost all computer displays, video monitors, televisions, radar displays and oscilloscopes. The CRT technically refers to any electronic vacuum tube employing a focused beam of electrons. Cathode rays work thereby in the form of streams of high speed electrons emitted from the heating of a cathode inside a vacuum tube, at its rear end. The emitted electrons form a beam within the tube due to the voltage difference applied across the two electrodes (the CRT screen typically forms the anode). The beam is then perturbed (deflected), either by a magnetic or an electric field, to trace over ('scan') the inside surface of the screen (anode). The screen is covered with a phosphorescent coating (often transition metals or rare earth elements), which emits visible light when excited by the electrons. Early computer displays used so-called vector monitors, a type of CRT similar to an oscilloscope but typically using magnetic, rather than electrostatic, deflection. Here, the beam traces straight lines between arbitrary points, repeatedly refreshing the display as quickly as possible. Vector displays for computers were limited in that they could display only a shape's outline (advanced vector systems could provide a limited amount of shading), and only a limited amount of crudely-drawn text (the number of shapes and/or textual characters drawn was severely limited, because the speed of refresh was roughly inversely proportional to how many vectors needed to be drawn). Other graphical displays used 'storage tubes'. Such CRTs inherently stored the image, and did not require periodic refreshing. Furthermore, displays for early computers that needed to display more text than was practical by using vectors, or that required high speed for photographic output, used a so-called Charactron CRT. This type incorporates a perforated metal character mask (stencil), which shapes a wide electron beam to form a character on the screen. The system selects a character on the mask using one set of deflection circuits, and selects the position to draw the character at using a second set. The beam is activated briefly to draw the character at that position. Many of these early computer displays used "slow", or long-persistence, phosphors to reduce flicker for the operator. While it reduces eyestrain for relatively static displays, the drawback of long-persistence phosphor is that when the display is changed, it produces a visible afterimage that can take up to several seconds to fade. This makes all these technologies inappropriate for animation, or for real-time dynamic information displays.
  Modern colour tubes use three different phosphors which emit red, green, and blue light respectively. They are packed either in strips or clusters. Such colour CRTs have thus three electron guns, one for each primary colour, arranged either in a straight line or in a triangular configuration (the guns are usually constructed as a single unit). The beam of each gun reaches the dots of exactly one colour; a grille or mask absorbs those electrons that would otherwise hit the wrong phosphor. Since each beam starts at a slightly different location within the tube, and all three beams are perturbed in essentially the same way, a particular deflection charge will cause the beams to hit a slightly different location on the screen (called a 'subpixel'). The so-called dot pitch defines thereby the "native resolution" of such displays. Despite all the advantages that new, flat display technologies seem to have, colour CRTs still find adherents in computer gaming due to their high refresh rates and higher resolution per initial cost. CRT's are also still popular in the prin
  EcoSpold01Location=GLO
  production volume 1 kg
    Dummy value to be replaced by measured, estimated or calculated value
  property price 16.9 EUR2005
    Calculated value based on data from United Nations Commodity Trade Statistics Database (comtrade.un.org). UN comtrade category: 854091 Parts of cathode-ray tubes. Year 2005. Using exchange rate of 1EURO = 1.209 USD. Average of price of import into 4 main markets (EU, US, JP and CN).
  property carbon content, fossil 0.0862743
    Calculated as the addition of C contents in the product composition
  property carbon content 0.0862743
    carbon content on a dry matter basis (reserved; not for manual entry)
  properties: carbon content, non-fossil 0, water in wet mass 0 kg, water content 0, dry mass 1 kg, wet mass 1 kg, carbon allocation 0.0862743 kg

## Inputs from technosphere
- sheet rolling, steel: 0.7 kg; source Socolof M. L. 2001; lognormal variance with pedigree 0.0861, pedigree (4,5,5,3,1)
  EcoSpold01Location=RER
  Estimation, based on literature and own assumptions.
  Uncertainty: Quantification, based on general literature
- injection moulding: 0.1 kg; source Socolof M. L. 2001; lognormal variance with pedigree 0.0861, pedigree (4,5,5,3,1)
  Estimation, based on literature and own assumptions.
  EcoSpold01Location=RER
  Uncertainty: Quantification, based on general literature
- glass tube, borosilicate: 0.2 kg; source Socolof M. L. 2001; lognormal variance with pedigree 0.0861, pedigree (4,5,5,3,1)
  Estimation, based on literature and own assumptions.
  EcoSpold01Location=DE
  Uncertainty: Quantification, based on general literature
  properties: dry mass 1 kg, wet mass 1 kg
- steel, chromium steel 18/8, hot rolled: 0.7 kg; source Socolof M. L. 2001; lognormal variance with pedigree 0.0861, pedigree (4,5,5,3,1)
  (same comment as for injection moulding)
  properties: carbon content, fossil 0.0008, wet mass 1 kg, dry mass 1 kg
  note on carbon content, fossil: Stainless steel model is the grade 304 steel (18/8 stainless, 18% chromium 8% nickel; max. 0.08% C)
- printed wiring board mounting facility: 2.08e-7 unit; lognormal variance with pedigree 0.3861, pedigree (4,5,5,3,1)
  EcoSpold01Location=GLO
  Proxy, due to a lack of specific information, the infrastructure module for the mounting of printed wiring boards is used.
  Uncertainty: Estimation, based on printed wiring board mounting plant
- polyethylene, high density, granulate: 0.1 kg; source Socolof M. L. 2001; lognormal variance with pedigree 0.0861, pedigree (4,5,5,3,1)
  (same comment as for injection moulding)
  properties: wet mass 1 kg, carbon content, fossil 0.857143, dry mass 1 kg
  note on carbon content, fossil: Polyethylene is formed out of a huge amount of ethylene monomers (C2H4) (ecoinvent v2.2 report 11_II). MW=28 g/mol

## Sampling procedure
own estimations

## Extrapolations
This dataset has been extrapolated from year 2007 to the year of the calculation (2019). The uncertainty has been adjusted accordingly.

## Review by Jürgen Sutter 2007-11-08
passed.
