# hydropower plant construction, run-of-river

Dataset: EcoSpold 2, unit process
Geography: CA-QC
Time period: 1945-01-01 to 2045-12-31
Technology level: current
Classification: ISIC rev.4 ecoinvent: 4220a: Construction of utility projects for electricity production, except for liquid fuels
Classification: EcoSpold01Categories: hydro power/production of components
Scenario: Business-as-Usual
System model: Allocation at the point of substitution
Generated by: Pablo Tirado
Database: ecoinvent
isCopyrightProtected: true
accessRestrictedTo: 1

## General comment
This dataset represents the construction of a run-of-river hydropower power plant in Quebec. This dataset is based on study on the production, transmission and distribution of electricity in Quebec. It represents an average of all the run-of-river power plants that belong to Hydro-Quebec, which is the main electricity provider in the region (about 95% of the total electricity produced). The inventory is based on a sample of 42 run-of-river power plants that combine for 13787MW, with different capacity (from 1800 MW to 4MW) and all the dams and derivations that were built to ensure the operation of the plants. Lifetime is assumed to be 100 years for the plant. The data refers to plant construction of a mix of types of dams built between 1910 and 2014, therefore they might not be representative for an individual type of hydropower power plant. Lifetime is assumed to be 100 years for the plant and 50 for most of the equipments included (turbine-generator, valves, cranes, etc.)
[This dataset was already contained in the ecoinvent database version 2. It was not individually updated during the transfer to ecoinvent version 3. Life Cycle Impact Assessment results may still have changed, as they are affected by changes in the supply chain, i.e. in other datasets. This dataset was generated following the ecoinvent quality guidelines for version 2. It may have been subject to central changes described in the ecoinvent version 3 change report (http://www.ecoinvent.org/database/ecoinvent-version-3/reports-of-changes/), and the results of the central updates were reviewed extensively. The changes added e.g. consistent water flows and other information throughout the database. The documentation of this dataset can be found in the ecoinvent reports of version 2, which are still available via the ecoinvent website. The change report linked above covers all central changes that were made during the conversion process.]

## Included activities start
From reception of mateirals and construction operations (excavation, blasting, etc.)

## Included activities end
The activity ends with the start of the plant operation.
It includes:
- land use associated with the infrastructures
- the most important materials used for the construction of the plant and the associated infrastructures: cement, gravel, steel, sand, wood, explosives;
- energy used for the construction;
- decommissioning and waste treatment
This dataset doesn't include :
- land use for access roads to the power plant

## Geography
Data collected for Quebec

## Technology
"The data refers to plant construction of a mix of types of dams built between 1930 and 2011, therefore they might not be representative for an individual type of hydropower power plant.

All the technologies (type of dam, type of turbine, etc.) and capacities present in the region are included in the dataset.
Several types of regulation works and dams are included (weight and vault concrete dams, morraine structures, etc.)"

## Time period
Construction data collected for built power plants and infrastructures between 1930 and 2011 but assumed to be equivalent to present construction (energy, explosives and operations). Data for new plants were calculated by linear regression (based on installed power)

## Parameters
- fraction, process water, to air: 0.15 dimensionless; lognormal variance with pedigree 0.092025, pedigree (4,4,3,2,4)
- fraction, tap water, to air: 0.15; name water_to_air; lognormal variance with pedigree 0.092025, pedigree (4,4,3,2,4)

## Reference product
- hydropower plant, run-of-river: 1 unit; name amountRP; CPC 53262: Power plants; By-product classification allocatable product
  EcoSpold01Location=RER
  production volume 0.01 unit; name apv_RP; = 1/lifetime
    Calculated value. As the dataset represents the total amount of materials used in all the plants in Quebec, the total production volume is 1. The APV corresonds to this value divided by the lifetime
  property lifetime 100 year; name lifetime
    Estimated value
  property price 2.79622e10 EUR2005
    EU27 I/O database(in the 'EU & DK Input Output Database' (available in SimaPro)); -79 Building, non-residential EU 27 (calculated to be 38.169 EUR2003/kg). Based on consumption of (_53 Iron basic, virgin, EU27;7.25517782294095E-3 kg/EUR building; 0.45 EUR2003 per kg DS), (_61 Iron, after first processing, EU27;5.8766830719783E-3kg/EUR building; 0.62 EUR2003 per kg DS), (_65 Fabricated metal products, except machinery, EU27; 8.9167022775554E-3 kg/EUR building; 3.63 EUR2003 per kg DS) and (_66 Machinery and equipment n.e.c., EU27;4.15071881936446E-3 kg/EUR building; 5.71 EUR2003 per kg DS) -738200000 kg
  property true value 2.79622e10; name amountRP_true_value
    allocation property applied in "true value" allocation // value calculated from revenue

## By-products
- heat, for reuse in municipal waste incineration only: 0 MJ; CPC 17300: Steam and hot water; By-product classification allocatable product; pedigree (1,1,1,1,1)
  Net electricity generated from this waste and used in internal MSWI plant energy redistribution.
  Uncertainty: uncertainty is calculated from uncertainties in waste composition and uncertainties in energy efficiency and the uncertainty in internal energy demand
  production volume 227.143 MJ
  property exergy 0.1842 MJ; name E_th_prod_MSWI_exergy
    This exergy property is based on the exergy content of the product.
  property price 0.0106 EUR2005; name E_th_prod_MSWI_price_EUR2005
    Average European district heat price from Ecoheatcool and Euroheat 2005-2006, Ecoheat Work package 1: The European heat market. Final report. 10.6 EUR/GJ i s the price of district heat. http://www.solarthermalworld.org/files/Ecoheatcool%20WP1%20Web.pdf?download
  property true value relation 0.1842; name E_th_prod_MSWI_true_value_relation
    property to calculate "true value" from
  property true value 149.422
    allocation property applied in "true value" allocation // value calculated from true value relation
- electricity, for reuse in municipal waste incineration only: 0 kWh; CPC 17100: Electrical energy; By-product classification allocatable product; pedigree (1,1,1,1,1)
  (same comment as for heat, for reuse in municipal waste incineration only)
  production volume 31.9772 kWh
  property true value relation 3.6; name E_el_prod_MSWI_true_value_relation
    property to calculate "true value" from
  property price 0.1 EUR2005; name E_el_prod_MSWI_price_EUR2005
    Estimated to be the same price as in case of electricity, medium voltage.
  property exergy 3.6 MJ; name E_el_prod_MSWI_exergy
    This exergy property is based on the exergy content of the product.
  property true value 411.122
    (same comment as for heat, for reuse in municipal waste incineration only)
- copper: 0 kg; source Rentz O. 1999; By-product classification allocatable product; CPC 41413: Refined copper and copper alloys, unwrought; master alloys of copper
  Literature value. Copper uses: Before end-use copper is manufactured into semi fabricated products, such as shapes and ingots (known as 'semis'). These manufacturing processes are subdivided into hot working, cold working and, if necessary, process annealing. Few of the semis are ready for use as such. They more typically travel to first-stage manufacturers, who make metal rods, wire, and casting, and then to component manufacturers who produce such things as motors, valves, and insulated cables The components in turn are incorporated by final-stage manufacturers into a variety of finished products - automobiles, commercial buildings, residential housing, and so forth. These uses account for about 79% of the world-wide consumption of copper.
  production volume 124947 kg
  properties: dry mass 1 kg, water in wet mass 0 kg, wet mass 1 kg, carbon content, non-fossil 0, water content 0, price 5.52 EUR2005, carbon content, fossil 0, carbon content 0, carbon allocation 0 kg, true value 6.89705e7
- zinc concentrate: 0 kg; CPC 14290: Other non-ferrous metal ores and concentrates (other than uranium or thorium ores and concentrates); By-product classification allocatable product
  Calculated value from the knowledge of the properties of both products.
  production volume 9.91735e-5 kg
  property price 0.38 EUR2005; name ByP_price_EUR2005
    Temporary price data. Calculated as 90% of purchasers price based on: Zinc content in concentrate 53%. Concentrate price per kg Zn 86.5% of refined Zn price (13.5% treatment charges according to CHR Metals Limited 2005: Dynamic cost curves. http://www.minecost.com/dynamic.pdf). 2004 zinc price from USGS (2007) Mineral commodity summaries 2007. <http://minerals.usgs.gov/minerals/pubs/mcs/2007/mcs2007.pdf> [Accessed 25 May 2010]
  property zinc content 0.53; name zinc_C_zinc_concentrate
    Zinc content on a dry matter basis. Value taken from teh "zinc mine operation" /GLO dataset.
  property dry mass 1 kg; name DM_zinc_concentrate
  property carbon content 0
    carbon content on a dry matter basis (reserved; not for manual entry)
  property true value 0.00376859
    allocation property applied in "true value" allocation // value calculated from revenue
  properties: wet mass 1 kg, water content 0, carbon content, non-fossil 0, carbon content, fossil 0, water in wet mass 0 kg, carbon allocation 0 kg

## Inputs from technosphere
- steel, chromium steel 18/8, hot rolled: 2.99262e8 kg; name cr_steel; = cr_steel_amount1*lifetime/lifetime_cr_steel; lognormal variance with pedigree 0.0026, pedigree (3,1,1,1,1)
  Calculated value. This value includes the total amount of this material used in the construction of the hydropower plants of Hydro-Quebec and all the associated regulatory infrastrcutures (dams, reservoirs, etc.). All the hydropower plants (20) were included in the calculation.
  The calculation is based on primary data from most of the infrastructures and plants and extrapolations based on the characteristics of the infrastructures (height, width, length, slope).
  EcoSpold01Location=RER
  property amount 1 of flow in kg 1.5e8 kg; name cr_steel_amount1
  property lifetime 50 year; name lifetime_cr_steel
  properties: wet mass 1 kg, carbon content, fossil 0.0008, dry mass 1 kg
  note on carbon content, fossil: Stainless steel model is the grade 304 steel (18/8 stainless, 18% chromium 8% nickel; max. 0.08% C)
  note on amount 1 of flow in kg: Calculated value. This value includes the total amount of this material used in the construction of the turbines of the hydropower plants of Hydro-Quebec. All the hydropower plants (20) were included in the calculation.
- sawnwood, softwood, raw, dried (u=10%): 6.52391e6 m3; lognormal variance with pedigree 0.0026, pedigree (3,1,1,1,1)
  Calculated value based on literature values and expert opinion. See comments in the parametres' comment field.
  properties: dry mass 450 kg, carbon content, non-fossil 0.494, water content 0.2, wet mass 540 kg
- gravel, round: 5.21713e10 kg; = 4.15e10+1.08e10; lognormal variance with pedigree 0.122, pedigree (3,1,1,1,1)
  EcoSpold01Location=CH
  Calculated value. This value includes the total amount of this material used in the construction of the hydropower plants of Hydro-Quebec and all the associated regulatory infrastrcutures (dams, reservoirs, etc.). All the hydropower plants (20) were included in the calculation.
  The calculation is based on primary data from most of the infrastructures and plants and extrapolations based on the characteristics of the infrastructures (height, width, length, slope).
  properties: wet mass 1 kg, dry mass 1 kg
- cement, Portland: 2.5936e10 kg; name cement_amount; lognormal variance with pedigree 0.122, pedigree (3,1,1,1,1)
  Calculated value. This value includes the total amount of this material used in the construction of the hydropower plants of Hydro-Quebec and all the associated regulatory infrastrcutures (dams, reservoirs, etc.). All the hydropower plants (20) were included in the calculation.
  The calculation is based on primary data from most of the infrastructures and plants and extrapolations based on the characteristics of the infrastructures (height, width, length, slope).
  As part this steel is used in the equipments, the lifetime of those is taken into account in the calculation
  EcoSpold01Location=CH
  properties: dry mass 1 kg, wet mass 1 kg
- waste reinforced concrete: -2.5936e10 kg; name concrete_waste; = (cement_amount)*-1; lognormal variance with pedigree 0, pedigree (1,1,1,1,1)
  Estimated value. All material but infrastructure (reinforcing steel and concrete) are removed
  production volume 2.6e8 kg; = apv_RP *concrete_waste / amountRP
    Calculated from production volume of reference product using the relative outputs.
  property price 0 EUR2005; name concrete_waste_price_EUR2005
  properties: wet mass 1 kg, dry mass 0.99418 kg, water content 0.00585407
- excavation, hydraulic digger: 2.18461e8 m3; lognormal variance with pedigree 0.0026, pedigree (3,1,1,1,1)
  (same comment as for sawnwood, softwood, raw, dried (u=10%))
- copper: 5.26701e7 kg; = copper_amount1*lifetime/lifetime_copper; lognormal variance with pedigree 0.0026, pedigree (3,1,1,1,1)
  Estimated value. As the water was not adressed in the study, an estimation ius made base on ecoinvent datasets. For 1 m3 of concrete 0.8 m3 of gravel, 0.127 m3 of water and 0.073 m3 of cement are mixed. This corresponds to 127 kg of water.
  property amount 1 of flow in kg 2.64e7 kg; name copper_amount1
  property lifetime 50 year; name lifetime_copper
  properties: dry mass 1 kg, wet mass 1 kg
- steel, low-alloyed, hot rolled: 2.54373e9 kg; name steel; = steel_amount1+ steel_amount2*lifetime/lifetime_copper; lognormal variance with pedigree 0.0026, pedigree (3,1,1,1,1)
  (same comment as for steel, chromium steel 18/8, hot rolled)
  property amount 1 of flow in kg 1.02e9 kg; name steel_amount1
  property amount 2 of flow in kg 7.65e8 kg; name steel_amount2
  properties: dry mass 1 kg, wet mass 1 kg, carbon content, fossil 0.005
  note on amount 1 of flow in kg: This value includes the total amount of this material used in the construction of the hydropower plants of Hydro-Quebec and all the associated regulatory infrastrcutures (dams, reservoirs, etc.). All the hydropower plants (20) were included in the calculation.
  note on amount 2 of flow in kg: This value includes the total amount of this material used in the construction of the equipments ot the hydropower plants of Hydro-Quebec and all the associated regulatory infrastrcutures (dams, reservoirs, etc.). All the hydropower plants (20) were included in the calculation.
  note on carbon content, fossil: Low alloyed steel composition given in Tab. 3.2 ecoinvent v2.2 report 10_partII. Steel assumed to have a C content of 0.5%
- scrap copper: -5.26701e7 kg; name scrapCopper; = (copper)*-1; lognormal variance with pedigree 0, pedigree (1,1,1,1,1)
  (same comment as for waste reinforced concrete)
  production volume 528000 kg; = scrapCopper*apv_RP/amountRP
    Calculated from production volume of reference product using the relative outputs.
  property price 0 EUR2005; name scrapCopper_price_EUR2005
  properties: wet mass 1 kg, dry mass 1 kg
- scrap steel: -2.84299e9 kg; name scrapSteel; = (cr_steel+steel)*-1; lognormal variance with pedigree 0, pedigree (1,1,1,1,1)
  Calculated value. This value includes the total amount of this material used in the construction of the hydropower plants of Hydro-Quebec and all the associated regulatory infrastrcutures (dams, reservoirs, etc.). All the hydropower plants (20) were included in the calculation.
  The calculation is based on primary data from most of the infrastructures and plants and extrapolations based on the characteristics of the infrastructures (height, width, length, slope).
  production volume 2.85e7 kg; = scrapSteel*apv_RP/amountRP
    Calculated from production volume of reference product using the relative outputs.
  property price 0 EUR2005; name scrapSteel_price_EUR2005
  properties: wet mass 1 kg, dry mass 1 kg
- explosive, tovex: 4.81812e7 kg; lognormal variance with pedigree 0.092, pedigree (3,1,1,1,1)
  Calculated value. This value includes the total amount of this material used in the construction of the hydropower plants of Hydro-Quebec and all the associated regulatory infrastrcutures (dams, reservoirs, etc.). All the hydropower plants (20) were included in the calculation.
  The calculation is based on primary data from most of the infrastructures and plants and extrapolations based on the characteristics of the infrastructures (height, width, length, slope).
  EcoSpold01Location=CH
  properties: carbon content, fossil 0.0483756, dry mass 0.92 kg, wet mass 1 kg, water content 0.0869565
  note on carbon content, fossil: Composition in Tab 4.1, ecoinvent v2.2 report n 7-part XVIII. 23% of wet mass consists of CH6N2O3
- reinforcing steel: 7.6212e8 kg; lognormal variance with pedigree 0.0026, pedigree (3,1,1,1,1)
  Calculated value. This value includes the total amount of this material used in the construction of the hydropower plants of Hydro-Quebec and all the associated regulatory infrastrcutures (dams, reservoirs, etc.). All the hydropower plants (20) were included in the calculation.
  The calculation is based on primary data from most of the infrastructures and plants and extrapolations based on the characteristics of the infrastructures (height, width, length, slope).
  As this steel is used in the turbine, the lifetime of the turbine is taken into account
  EcoSpold01Location=RER
  properties: wet mass 1 kg, dry mass 1 kg, carbon content, fossil 0.004
- tap water: 2.05098e10 kg; name water_in; = cement_amount*127/(.073*2200); lognormal variance with pedigree 0.12, pedigree (1,5,3,5,3)
  Calculated value. This value includes the total amount of this material used in the construction of the hydropower plants of Hydro-Quebec and all the associated regulatory infrastrcutures (dams, reservoirs, etc.). All the hydropower plants (20) were included in the calculation.
  As copper is used in the turbine, the lifetime of the turbine is taken into account
  EcoSpold01Location=RER
  properties: dry mass 0.000337476 kg, water content 2962.17, wet mass 1 kg, carbon content, fossil 0.00178991
  note on carbon content, fossil: Bicarbonate content is 2.93 mol/m3. CO2 content is 0.1 mol/m3 (ecoinvent v2.2 report 8, Tab 93.1).
- sand: 4.13979e10 kg; lognormal variance with pedigree 0.0026, pedigree (3,1,1,1,1)
  (same comment as for waste reinforced concrete)
  properties: dry mass 1 kg, wet mass 1 kg

## Emissions to nature
- Water [water, unspecified]: 1.74333e7 m3; = water_in/UnitConversion(1, 'm3', 'l')*(1-water_to_air); lognormal variance with pedigree 0.0427, pedigree (2,2,1,5,1)
  (same comment as for scrap steel)
  property water in wet mass 1000 kg; name WWM
  property carbon content, non-fossil 0; name C_content_non_fossil
  property wet mass 1000 kg; name WM
  property carbon content, fossil 0; name C_content_fossil
  property dry mass 0 kg; name DM
- Water [air, unspecified]: 3.07647e6 m3; = water_in/UnitConversion(1, 'm3', 'l')*water_to_air; lognormal variance with pedigree 0.0427, pedigree (2,2,1,5,1)
  (same comment as for scrap steel)

## Sampling procedure
Data collection from the company including all its activities

## Extrapolations
Some data are extrapolated from GLO dataset. Uncertainty has been adjusted accordingly
Data for new plants were calculated by linear regression (based on installed power)

## Review by Christian Bauer 2014-01-05
This dataset was thoroughfully reviewed and complies with the Data Quality Guidelines.
