# breadcrumbs production

Dataset: EcoSpold 2, unit process
Geography: RER
Time period: 2011-01-01 to 2019-12-31
Technology level: current
Classification: ISIC rev.4 ecoinvent: 1061:Manufacture of grain mill products
Scenario: Business-as-Usual
System model: Allocation at the point of substitution
Generated by: Ian Vázquez-Rowe
Published in: Vázquez-Rowe, I. 2013
Database: ecoinvent
isCopyrightProtected: true
accessRestrictedTo: 1

## General comment
This activity represents the production of breadcrumbs in an ingredient and food additive processing plant. The flour used for the breadcrumbs is obtained from conventional wheat production. The wheat is then grinded at a milling plant to produce wheat flour and thereafter it is transported by trucks to an ingredient and food additive processing plant, where the breadcrumbs are procuded. Breadcrumbs are made up of 90% wheat flour, and less than 5% content of corn dextrose, sunflower oil, salt, yeast and spices.

## Included activities start
Activities include the production of all raw materials to produce the breadcrumbs, the grinding of wheat at a milling plant and the production of the final product.

## Included activities end
The transport of breadcrumbs beyond the gate of the ingredient and food additive plants were not included in the modelling. The amount of plastic used in packagin, not included in the database, is 1.41 grams per kilogram of breadcrumbs production.

## Geography
The breadcrumbs processing plant is located in NW Spain, but its products are exported throughout Europe. The wheat grain is produced in the Ukraine and transported by marine freight to the port of Santander, in northern Spain. Thereafter, the wheat is sent to a mill in the province of Palencia (Spain) to produce the flour, which is then transported to the city fo Vigo to the breadcrumb processing factory.

## Technology
Technology represents business as usual in Europe for this type of product.

## Time period
Data were collected for year 2011.

## Reference product
- breadcrumbs: 1 kg; By-product classification allocatable product
  Breadcrumbs produced at a grain mill factory.
  production volume 0.2892 kg; name ProdVol
    Based on GDP production of Spain.
  property price 0.465247 EUR2005
    Calculated based on inputs: The price of the product has been calculated as a sum of the values of the material and energy inputs for this product. This value is therefore a rough estimation. It may underestimate the real price since there are additional expenses when producing any product. These expences can include for example labour costs, treatment of waste materials and profit for the producer. Please consider carefully whether this level of data quality is acceptable for your application.
  property carbon content 0.475
    carbon content on a dry matter basis (reserved; not for manual entry)
  property true value 0.0362893
    allocation property applied in "true value" allocation // value calculated from revenue
  properties: dry mass 0.907 kg, carbon content, fossil 0, wet mass 1 kg, carbon content, non-fossil 0.475, water in wet mass 0.093 kg, water content 0.102536, carbon allocation 0.430825 kg

## By-products
- heat, for reuse in municipal waste incineration only: 0 MJ; CPC 17300: Steam and hot water; By-product classification allocatable product; pedigree (1,1,1,1,1)
  Net electricity generated from this waste and used in internal MSWI plant energy redistribution.
  Uncertainty: uncertainty is calculated from uncertainties in waste composition and uncertainties in energy efficiency and the uncertainty in internal energy demand
  production volume 0.00448819 MJ
  property exergy 0.1842 MJ; name E_th_prod_MSWI_exergy
    This exergy property is based on the exergy content of the product.
  property price 0.0106 EUR2005; name E_th_prod_MSWI_price_EUR2005
    Average European district heat price from Ecoheatcool and Euroheat 2005-2006, Ecoheat Work package 1: The European heat market. Final report. 10.6 EUR/GJ i s the price of district heat. http://www.solarthermalworld.org/files/Ecoheatcool%20WP1%20Web.pdf?download
  property true value relation 0.1842; name E_th_prod_MSWI_true_value_relation
    property to calculate "true value" from
  property true value 6.60488e-10
    allocation property applied in "true value" allocation // value calculated from true value relation
- electricity, for reuse in municipal waste incineration only: 0 kWh; CPC 17100: Electrical energy; By-product classification allocatable product; pedigree (1,1,1,1,1)
  (same comment as for heat, for reuse in municipal waste incineration only)
  production volume 0.000632109 kWh
  property price 0.1 EUR2005; name E_el_prod_MSWI_price_EUR2005
    Estimated to be the same price as in case of electricity, medium voltage.
  property exergy 3.6 MJ; name E_el_prod_MSWI_exergy
    This exergy property is based on the exergy content of the product.
  property true value relation 3.6; name E_el_prod_MSWI_true_value_relation
    property to calculate "true value" from
  property true value 1.81802e-9
    (same comment as for heat, for reuse in municipal waste incineration only)

## Inputs from technosphere
All rows: source Vázquez-Rowe, I. 2013
- heat, central or small-scale, natural gas: 0.765513 MJ; lognormal variance with pedigree 0.0406, pedigree (1,1,5,1,1)
  Heat from natural gas used for energy at the plant.
  Uncertainty: Data collection was performed directly with the company that processed the final products. Data from upstream processes were described by plant technicians based on data exhanged with other companies providing materials.
- tap water: 0.482949 kg; lognormal variance with pedigree 0.0406, pedigree (1,1,5,1,1)
  Water used in the ingredient and additive food plant.
  Uncertainty: Data collection was performed directly with the company that processed the final products. Data from upstream processes were described by plant technicians based on data exhanged with other companies providing materials.
  properties: carbon content, fossil 0.00178991, water content 2962.17, dry mass 0.000337476 kg, wet mass 1 kg
  note on carbon content, fossil: Bicarbonate content is 2.93 mol/m3. CO2 content is 0.1 mol/m3 (ecoinvent v2.2 report 8, Tab 93.1).
- wheat flour: 0.9 kg; lognormal variance with pedigree 0.0418, pedigree (2,1,5,1,2)
  Wheat flour used as main raw material to produce the breadcrumbs.
  Uncertainty: Data collection was performed directly with the company that processed the final products. Data from upstream processes were described by plant technicians based on data exhanged with other companies providing materials.
  properties: dry mass 0.87 kg, digestable energy content 15.12 MJ/kg, water content 0.149425, wet mass 1 kg, carbon content, non-fossil 0.475
  note on digestable energy content: Weighted average based on breakdown of different wheat products produced for human consumption in South Africa and properties of each product (i.e. cake flour, self-raising flour, white bread flour, brown bread flour, industrial flour, whole wheat meal, and semolina). Breakdown calculated from the production figures from the SAGIS monthly production tables, retrieved online and properties for US consumer products also retrieved online (USDA, 2017). Reference(s): SAGIS (2017) Wheaten Products Manufactured per Month since July 2015, South African Grain Information Service. Available at: www.sagis.org.za. (Accessed Sept 2017); USDA (2017) USDA National Nutrient Database, United States Department of Agriculture Agricultural Research Service, Available at: https://ndb.nal.usda.gov/ndb/search/list. (Accessed October 2017).
  note on carbon content, non-fossil: Biogenic carbon content of vegetation and vegetation processed products on a dry mass basis (47.5% DM) derived from FAOSTAT. Reference: http://www.fao.org/forestry/17111/en
- wastewater from vegetable oil refinery: -8.29487e-5 m3; name wastewater; lognormal variance with pedigree 0.0406, pedigree (1,1,5,1,1)
  Wastewater generated at the plant.
  Uncertainty: Data collection was performed directly with the company that processed the final products. Data from upstream processes were described by plant technicians based on data exhanged with other companies providing materials.
  production volume 0.2892 m3
    Based on GDP of Europe at a global level
  property price 0 EUR2005; name wastewater_price_EUR2005
  properties: carbon content, non-fossil 0.993118, dry mass 0.871801 kg, water content 1146.05, wet mass 1000 kg
- vegetable oil, refined: 0.03 kg; lognormal variance with pedigree 0.0406, pedigree (1,1,5,1,1)
  Amount of sunflower oil added to produce the breadcrumbs.
  Uncertainty: Data collection was performed directly with the company that processed the final products. Data from upstream processes were described by plant technicians based on data exhanged with other companies providing materials.
  properties: dry mass 1 kg, wet mass 1 kg, carbon content, non-fossil 0.768
- sodium chloride, powder: 0.015 kg; lognormal variance with pedigree 0.041825, pedigree (2,1,5,2,2)
  Amount of salt needed in the production of the breadcrumbs.
  Uncertainty: Data collection was performed directly with the company that processed the final products. Data from upstream processes were described by plant technicians based on data exhanged with other companies providing materials.
  properties: dry mass 1 kg, wet mass 1 kg
- electricity, medium voltage: 0.0710256 kWh; lognormal variance with pedigree 0.0406, pedigree (1,1,5,1,1)
  Electricity used at the plant for breadcrumb processing.
  Uncertainty: Data collection was performed directly with the company that processed the final products. Data from upstream processes were described by plant technicians based on data exhanged with other companies providing materials.
- sugar, from sugar beet: 0.02 kg; lognormal variance with pedigree 0.0666, pedigree (4,5,5,5,3)
  Amount of sugar needed to produce the breadcrumbs.
  Uncertainty: Data collection was performed directly with the company that processed the final products. Data from upstream processes were described by plant technicians based on data exhanged with other companies providing materials.
  properties: carbon content, non-fossil 0.44, dry mass 1 kg, wet mass 1 kg

## Emissions to nature
- Water [air, unspecified]: 0.000384615 m3; source Vázquez-Rowe, I. 2013; lognormal variance with pedigree 0.0486, pedigree (4,1,5,1,1)
  Evaporated water in the production process of the breadcrumbs.
  Uncertainty: Data collection was performed directly with the company that processed the final products. Data from upstream processes were described by plant technicians based on data exhanged with other companies providing materials.

## Sampling procedure
Data collection was performed directly with the company that processed the final products. Data from upstream processes were described by plant technicians based on data exhanged with other companies providing materials.

## Extrapolations
Reference for breadcrumb production in Europe.
