# laminating service, foil, with acrylic binder

Dataset: EcoSpold 2, unit process
Geography: CA-QC
Time period: 1996-01-01 to 2019-12-31
Technology level: current
Classification: ISIC rev.4 ecoinvent: 1812:Service activities related to printing
Classification: EcoSpold01Categories: paintings/processing
Tags: recontextualization
Scenario: Business-as-Usual
System model: Allocation at the point of substitution
Generated by: Pascal Lesage
Published in: Hässig, W. 2007
Database: ecoinvent
isCopyrightProtected: true
accessRestrictedTo: 1

## General comment
Data derived from: BUWAL 250, Ökoinventare für Verpackungen, Umwelt-Materialien Nr. 250, Bundesamt für Umwelt, Wald und Landschaft (BUWAL), Bern, 1996.
[This dataset was already contained in the ecoinvent database version 2. It was not individually updated during the transfer to ecoinvent version 3. Life Cycle Impact Assessment results may still have changed, as they are affected by changes in the supply chain, i.e. in other datasets. This dataset was generated following the ecoinvent quality guidelines for version 2. It may have been subject to central changes described in the ecoinvent version 3 change report (http://www.ecoinvent.org/database/ecoinvent-version-3/reports-of-changes/), and the results of the central updates were reviewed extensively. The changes added e.g. consistent water flows and other information throughout the database. The documentation of this dataset can be found in the ecoinvent reports of version 2, which are still available via the ecoinvent website. The change report linked above covers all central changes that were made during the conversion process.]
Child dataset exchanges identical to GLO dataset. Created to enable linking to regional markets (e.g. for electricity). Data quality indicators adjusted accordingly.

## Included activities end
Estimation of electricity use for the laminating and cutting of foils. Only glue for laminating process included. Estimaion for waste process of glue overspray included. Materials which are laminated are not included. No transports of raw materials to the plant included. Infrastructure of the production plant not included.

## Geography
Data used has no specific geographical origin (literature values).
Child dataset exchanges identical to GLO dataset. Created to enable linking to regional markets (e.g. for electricity). Data quality indicators adjusted accordingly.

## Technology
Approximation from data of lamination of packaging foils. Acrylic glue as binder assumed.

## Time period
Time of literature publication.

## Parameters
- Quebec gross domestic product 2011: 3.11e11 USD(2011); name quebecGDP2011; lognormal variance with pedigree 0.0006, pedigree (1,1,1,1,1)
  Quebec Gross domestic product for 2011, expressed in 2011 USD. Source: Institut de la statistique du Québec. Converted from CAD to USD using a yearly average exchange rate of 0.989 CAD/USD (Source: bank of Canada).
- world gross domestic product 2011: 7e13 USD(2011); name worldGDP2011; lognormal variance with pedigree 0.0006, pedigree (1,1,1,1,1)
  World Gross domestic product for 2011, expressed in 2011 USD. Source: World Bank.

## Reference product
- laminating service, foil, with acrylic binder: 1 m2; By-product classification allocatable product; CPC 89122: Services related to printing
  EcoSpold01Location=RER
  production volume 0.0177714 m2; = PARENTVALUE * quebecGDP2011/worldGDP2011
    Gross approximation of Quebec production volume using relative value of Quebec GDP to world GDP
  property true value 0.837
    allocation property applied in "true value" allocation // value calculated from revenue
  properties: price 0.837 EUR2005

## By-products
- electricity, for reuse in municipal waste incineration only: 0 kWh; CPC 17100: Electrical energy; By-product classification allocatable product; pedigree (1,1,1,1,1)
  Net electricity generated from this waste and used in internal MSWI plant energy redistribution.
  Uncertainty: uncertainty is calculated from uncertainties in waste composition and uncertainties in energy efficiency and the uncertainty in internal energy demand
  production volume 1.98585e-7 kWh
  property true value relation 3.6; name E_el_prod_MSWI_true_value_relation
    property to calculate "true value" from
  property exergy 3.6 MJ; name E_el_prod_MSWI_exergy
    This exergy property is based on the exergy content of the product.
  property price 0.1 EUR2005; name E_el_prod_MSWI_price_EUR2005
    Estimated to be the same price as in case of electricity, medium voltage.
  property true value 1.44762e-6
    allocation property applied in "true value" allocation // value calculated from true value relation
- heat, for reuse in municipal waste incineration only: 0 MJ; CPC 17300: Steam and hot water; By-product classification allocatable product; pedigree (1,1,1,1,1)
  (same comment as for electricity, for reuse in municipal waste incineration only)
  production volume 1.4775e-6 MJ
  property price 0.0106 EUR2005; name E_th_prod_MSWI_price_EUR2005
    Average European district heat price from Ecoheatcool and Euroheat 2005-2006, Ecoheat Work package 1: The European heat market. Final report. 10.6 EUR/GJ i s the price of district heat. http://www.solarthermalworld.org/files/Ecoheatcool%20WP1%20Web.pdf?download
  property exergy 0.1842 MJ; name E_th_prod_MSWI_exergy
    This exergy property is based on the exergy content of the product.
  property true value relation 0.1842; name E_th_prod_MSWI_true_value_relation
    property to calculate "true value" from
  property true value 5.51091e-7
    (same comment as for electricity, for reuse in municipal waste incineration only)

## Inputs from technosphere
- waste paint: -0.0002 kg; lognormal variance with pedigree 0.072, pedigree (4,4,5,5,1)
  Data estimated from a related process
  EcoSpold01Location=CH
  Uncertainty: Data estimated from a related process
  production volume 3.55429e-6 kg; = PARENTVALUE * quebecGDP2011/worldGDP2011
    (same comment as for laminating service, foil, with acrylic binder)
  properties: wet mass 1 kg, dry mass 1 kg, carbon content, fossil 0.65
  note on carbon content, fossil: Tab A.5, ecoinvent v2.2 report 13_I. C content has been calculated after data in the tables, and then referred to 1 kg DM
- electricity, medium voltage: 0.0183 kWh; lognormal variance with pedigree 0.11, pedigree (3,5,5,5,3)
  EcoSpold01Location=UCTE
  Data estimated from a related process
  Uncertainty: Data estimated from a related process
- acrylic binder, without water, in 34% solution state: 0.0014 kg; lognormal variance with pedigree 0.074, pedigree (3,4,5,5,3)
  Data estimated from a related process
  EcoSpold01Location=RER
  Uncertainty: Data estimated from a related process
  properties: dry mass 1 kg, wet mass 1 kg, carbon content, fossil 0.599846
  note on carbon content, fossil: The acrylic acid ethyl ester (ethyl acrylate) is used for both solvent- and water-based paints, and in textiles as a binder in nonwoven fabrics and flocking (Acrylic acid and derivatives: uses, Ullmann). It was used as a representative example of acrylic binders. Its formula is C5H8O2

## Sampling procedure
Data from Literature used

## Extrapolations
GLO dataset extrapolated from European dataset, which in turn was used to create this child dataset. Exchanges identical to GLO dataset. Created to enable linking to regional markets (e.g. for electricity). Data quality indicators adjusted accordingly.

## Review by Rolf Frischknecht 2007-08-16
passed
none
