# treatment of decommissioned tram track

Dataset: EcoSpold 2, unit process
Geography: RoW
Time period: 1985-01-01 to 2019-12-31
Technology level: current
Classification: ISIC rev.4 ecoinvent: 3830:Materials recovery
Classification: EcoSpold01Categories: transport systems/road
Tags: Treatment; ConvertedDataset
Scenario: Business-as-Usual
System model: Allocation at the point of substitution
Generated by: Michael Spielmann (obsolete)
Published in: Spielmann M. 2004
Database: ecoinvent
isCopyrightProtected: true
accessRestrictedTo: 1

## General comment
Expenditures for the recycling of excavated materials are not considered.
[This dataset was already contained in the ecoinvent database version 2. It was not individually updated during the transfer to ecoinvent version 3. Life Cycle Impact Assessment results may still have changed, as they are affected by changes in the supply chain, i.e. in other datasets. This dataset was generated following the ecoinvent quality guidelines for version 2. It may have been subject to central changes described in the ecoinvent version 3 change report (http://www.ecoinvent.org/database/ecoinvent-version-3/reports-of-changes/), and the results of the central updates were reviewed extensively. The changes added e.g. consistent water flows and other information throughout the database. The documentation of this dataset can be found in the ecoinvent reports of version 2, which are still available via the ecoinvent website. The change report linked above covers all central changes that were made during the conversion process.]

## Included activities end
This module merely contains transport of tram track materials to the recycling facilities (20km)

## Geography
Data refers to Swiss conditions

## Technology
Swiss state of the art technology

## Reference product
- decommissioned tram track: -1 m*year; CPC 39990: Other wastes n.e.c.; By-product classification Waste
  EcoSpold01Location=CH
  production volume 3.96633 m*year
    This is a placeholder value that does not reflect real-world production volumes. This dataset does not currently require a real-world production volume to work in the database framework, and no actual data were collected yet. This has no negative effect on the results of the ecoinvent database.
  property carbon content, fossil 0.0034202
    Calculated from C content in input materials in the infrastructure
  property price 0 EUR2005
    Waste products are assigned a price of zero as they are assumed to require further treatment.
  property carbon content, non-fossil 0
    Calculated from C content in input materials in the infrastructure
  property carbon content 0.0034202
    carbon content on a dry matter basis (reserved; not for manual entry)
  properties: dry mass 309 kg, wet mass 309 kg, water in wet mass 0 kg, water content 0, carbon allocation 1.05684 kg

## Sampling procedure
literature

## Extrapolations
This dataset has been copied from an original dataset covering the geography CH. The uncertainty has been adjusted accordingly.

## Review by Niels Jungbluth 2004-04-02
Passed.
