# transport, trolleybus

Dataset: EcoSpold 2, unit process
Geography: CH
Time period: 2000-01-01 to 2019-12-31
Technology level: current
Classification: ISIC rev.4 ecoinvent: 4921:Urban and suburban passenger land transport
Synonyms: Lastwagen; truck; Heavy Duty Vehicle
Scenario: Business-as-Usual
System model: Allocation at the point of substitution
Generated by: Michael Spielmann (obsolete)
Published in: Spielmann M. 2004
Database: ecoinvent
isCopyrightProtected: true
accessRestrictedTo: 1

## General comment
Inventory refers to the entire transport life cycle. For road infrastructure, expenditures and environmental interventions due to construction of roads have been allocated based on the Gross tonne kilometre performance. Expenditures due to operation of the road infrastructure, as well as land use have been allocated based on the yearly vehicle kilometre performance. For the attribution of vehicle share to the transport performance a vehicle life time performance of 19’867’050 pkm/vehicle have been assumed. The energy use and combustion emissions dataset represents the energy use and combustion emission of a trolleybus in Switzerland.

## Included activities start
The energy use and combustion emissions service starts with electricity consumption.

## Included activities end
operation of vehicle; production and maintenance of vehicles; construction of road. The energy use and combustion emissions service ends with the service of transporting 1 vehicle over 1 kilometre. The dataset includes electricity consumption, particulate emissions and until and including heavy metal emissions.

## Geography
The data for vehicle operation and road infrastructure reflect Swiss conditions. Data for vehicle manufacturing and maintenance represents generic European data. Data for the vehicle disposal reflect Swiss situation. The data of the energy use and combustion emissions refers to average transport conditions in Switzerland.

## Technology
For vehicle operation all technologies are included in the average data. Road construction comprises bitumen and concrete roads. For the manufacturing of vehicles, the data reflects current modern technologies. For trolley buses no direct emissions due to combustion occur. However, emissions due to tyre, brake and road abrasion are accounted for.

## Time period
Data for gaseous emissions is based on scenarios for 2000.

## Reference product
- transport, trolleybus: 1 person*km; By-product classification allocatable product; CPC 64112: Urban and suburban scheduled road transport services of passengers
  production volume 0.0336675 person*km; name transport_RP_PV
    This is a placeholder value that does not reflect real-world production volumes. This dataset does not currently require a real-world production volume to work in the database framework, and no actual data were collected yet. This has no negative effect on the results of the ecoinvent database. The placeholder value of this activity was scaled according to the nominal GDP of 2005 (source: United Nations, http://data.un.org/Glossary.aspx?q=GDP+%28current+US%24%29, accessed 20130726) to reflect an appropriate share of the global production volume, which is also a placeholder value.
  property price 0.0189293 EUR2005
    Calculated based on inputs: The price of the product has been calculated as a sum of the values of the material and energy inputs for this product. This value is therefore a rough estimation. It may underestimate the real price since there are additional expenses when producing any product. These expences can include for example labour costs, treatment of waste materials and profit for the producer. Please consider carefully whether this level of data quality is acceptable for your application.

## Inputs from technosphere
- road maintenance: 8.6684e-5 m*year; lognormal variance with pedigree 0.342, pedigree (3,1,5,1,1)
  This input indicates the unit of road per vkm used during the transport activity. The road input is composed by two demand factors: - Road infrastructure and disposal (RI&D), which varies according to the gross vehicle weight. - Road operations & maintenance (RO&M), which does not vary according to the gross vehicle weight.
  Uncertainty: o
- electricity, medium voltage: 0.11704 kWh; source Bundesamt für Statistik (BfS) 2000; lognormal variance with pedigree 0.0406, pedigree (1,1,5,1,1)
  Literature value. The total electricity consumption of trolley buses and trams operating in Switzerland is available from the Swiss transport statistic Bundesamt für Statistik (BfS) (2000). Energy use and combustion emissions
  Uncertainty: d
- road: 0.00053 m*year; lognormal variance with pedigree 0.042, pedigree (3,1,5,1,1)
  activityLink introduced to establish a direct link to the corresponding regional supply of this product
  Uncertainty: o
- bus: 5.03e-8 unit; lognormal variance with pedigree 0.042025, pedigree (3,1,5,2,1)
  Uncertainty: o
- maintenance, bus: 5.03e-8 unit; lognormal variance with pedigree 0.042025, pedigree (3,1,5,2,1)
  (same comment as for road)

## Emissions to nature
- Copper [soil, industrial]: 2.53715e-9 kg; lognormal variance with pedigree 0.84, pedigree (1,1,5,1,1)
  Estimated value. For trolley buses no direct emissions due to combustion occur. However, emissions due to tyre, brake and road abrasion are accounted for. Energy use and combustion emissions
- Chromium [air, urban air close to ground]: 1.45915e-9 kg; lognormal variance with pedigree 0.716025, pedigree (4,5,5,2,1)
  Estimated value. For trolley buses no direct emissions due to combustion occur. However, emissions due to tyre, brake and road abrasion are accounted for. Energy use and combustion emissions
  Uncertainty: e
- Copper [air, urban air close to ground]: 2.42935e-9 kg; lognormal variance with pedigree 0.716025, pedigree (4,5,5,2,1)
  (same comment as for Chromium)
- Chromium, ion [water, surface water]: 1.5246e-9 kg; lognormal variance with pedigree 0.84, pedigree (1,1,5,1,1)
  (same comment as for Copper)
- Chromium VI [air, urban air close to ground]: 2.91445e-12 kg; lognormal variance with pedigree 0.84, pedigree (1,1,5,1,1)
  Calculated value. For trolley buses no direct emissions due to combustion occur. However, emissions due to tyre, brake and road abrasion are accounted for. Energy use and combustion emissions
- Nickel, ion [water, surface water]: 1.3552e-9 kg; lognormal variance with pedigree 0.84, pedigree (1,1,5,1,1)
  (same comment as for Copper)
- Particulates, > 10 um [air, urban air close to ground]: 1.6324e-5 kg; lognormal variance with pedigree 0.180025, pedigree (3,5,5,2,1)
  (same comment as for Chromium)
- Nickel [air, urban air close to ground]: 1.29745e-9 kg; lognormal variance with pedigree 0.716025, pedigree (4,5,5,2,1)
  (same comment as for Chromium)
- Cadmium, ion [water, surface water]: 1.694e-10 kg; lognormal variance with pedigree 0.84, pedigree (1,1,5,1,1)
  (same comment as for Copper)
- Ethane, 1,1,1,2-tetrafluoro-, HFC-134a [air, urban air close to ground]: 4.8125e-7 kg; lognormal variance with pedigree 0.16, pedigree (1,1,5,1,1)
  Estimated value. Yearly amount of cooling agent refilled in maintenance. Energy use and combustion emissions
- Lead [water, surface water]: 8.47e-10 kg; lognormal variance with pedigree 0.84, pedigree (1,1,5,1,1)
  (same comment as for Copper)
- Copper, ion [water, surface water]: 2.53715e-9 kg; lognormal variance with pedigree 0.84, pedigree (1,1,5,1,1)
  (same comment as for Copper)
- Nickel [soil, industrial]: 1.3552e-9 kg; lognormal variance with pedigree 0.84, pedigree (1,1,5,1,1)
  (same comment as for Copper)
- Particulates, < 2.5 um [air, urban air close to ground]: 1.155e-6 kg; lognormal variance with pedigree 0.1621, pedigree (3,2,5,1,1)
  (same comment as for Chromium)
- Chromium [soil, industrial]: 1.5246e-9 kg; lognormal variance with pedigree 0.84, pedigree (1,1,5,1,1)
  (same comment as for Copper)
- Lead [air, urban air close to ground]: 8.085e-10 kg; lognormal variance with pedigree 0.716025, pedigree (4,5,5,2,1)
  (same comment as for Chromium)
- Zinc [air, urban air close to ground]: 1.3013e-7 kg; lognormal variance with pedigree 0.716025, pedigree (4,5,5,2,1)
  (same comment as for Chromium)
  property carbon content, non-fossil 0; name C_content_non_fossil
  property dry mass 1 kg; name DM
  property carbon content, fossil 0; name C_content_fossil
  property water in wet mass 0 kg; name WWM
  property wet mass 1 kg; name WM
  property water content 0; name water_content
- Lead [soil, industrial]: 8.47e-10 kg; lognormal variance with pedigree 0.84, pedigree (1,1,5,1,1)
  (same comment as for Copper)
- Cadmium [soil, industrial]: 1.694e-10 kg; lognormal variance with pedigree 0.84, pedigree (1,1,5,1,1)
  (same comment as for Copper)
- Cadmium [air, urban air close to ground]: 1.62085e-10 kg; lognormal variance with pedigree 0.716025, pedigree (4,5,5,2,1)
  (same comment as for Chromium)
- Particulates, > 2.5 um, and < 10um [air, urban air close to ground]: 2.7258e-6 kg; lognormal variance with pedigree 0.162625, pedigree (3,3,5,2,1)
  (same comment as for Chromium)
- Zinc, ion [water, surface water]: 1.35905e-7 kg; lognormal variance with pedigree 0.84, pedigree (1,1,5,1,1)
  (same comment as for Copper)
- Zinc [soil, industrial]: 1.35905e-7 kg; lognormal variance with pedigree 0.84, pedigree (1,1,5,1,1)
  (same comment as for Copper)

## Sampling procedure
National statistics, literature studies

## Extrapolations
This dataset has been extrapolated from year 2000 to the year of the calculation (2019). The uncertainty has been adjusted accordingly.
