# water works construction, capacity 1.1E10l/year, microstrainer treatment

Dataset: EcoSpold 2, unit process
Geography: RoW
Time period: 2009-01-01 to 2019-12-31
Technology level: current
Classification: ISIC rev.4 ecoinvent: 4220:Construction of utility projects
Classification: EcoSpold01Categories: water supply/production
Scenario: Business-as-Usual
System model: Allocation at the point of substitution
Generated by: Marylène Dussault
Database: ecoinvent
isCopyrightProtected: false
accessRestrictedTo: 1

## General comment
This dataset represents the construction of a medium-sized potable water ultrafiltration treatment plant 30 000m3/d with a lifetime of 60 years. Treatment includes microstraining of water and disinfection. Microstraining plant is assumed to have similar infrastructure requirements as nanofiltration plant except for the filtration modules which were removed from inventory and replaced by primary data for microstraining equipment. The inventory includes microstrainer equipment provided by manufacturer which was extrapolated from a medium-size plant (58 000 m3/d) in Quebec. The other elements of the dataset are extrapolated from a small nanofiltration treatment plant in Lebel-sur-Quévillon, Québec (CA): average flow of 2000 m3/d and is assumed to have a 60 years lifetime. Inventory is extrapolated to a medium-size plant based on cost curve. Lifetime is assumed to be 13 years for mechanical equipment (e.g. pumps), 30 years for chemical tanks and 60 years for structural components. Note that a major source of uncertainty in this dataset is the use of cost scaling factors outside their reported range of validity: the cost scaling factors are reported to be valid for capacities of 3785 m3/d to 378540 m3/d, and the actual plant that served as basis for this dataset is has an average flow of 1500 m3/d. This uncertainty is accounted for through the “Further technological correlation” data quality indicator.

## Included activities start
From reception of raw materials and construction equipment. This dataset includes material inputs for equipment of the different water treatment stages: intake pumping, microstraining filtration and chlorination. A potable water reserve build underground (roof of the reserve is the floor of the water plant) is included in the inventory. Metal forming activities and associated losses were excluded.

## Included activities end
This datasets ends with the dismantlement of the plant at the end of its useful life, expected to be 60 years. Input material end-of-life is included, but equipment and energy used for dismantling is excluded due to lack of data.

## Geography
Extrapolated from data from a single plant in Quebec (Canada).

## Technology
Municipal water treatment by ultrafiltration membrane.

## Time period
Time of publication.

## Parameters
- factor A_polyurethane: 121 kg/(m3/d)^2; name A_polyurethane; lognormal variance with pedigree 0.0468, pedigree (3,4,2,5,4)
  Calculated value for constant A in scaling equation Y=A*Q^-B, where Y and Q are respectively the mass of material per unit flow and flow rate and B is a scaling factor to account for economies of scale. Calculations are based on contruction inventory extrapolated from Lebel-sur-Quévillon treatment plant, average flow rate (Bonton. 2012) and cost scaling factor B (Kawamura, 2008). Note that the calculation of the constant is uncertain as the B value is used outside its reported range of validity (see general comment).
- factor A_iron: 3720 kg/(m3/d)^2; name A_iron; lognormal variance with pedigree 0.0468, pedigree (3,4,2,5,4)
  Calculated value for constant A in scaling equation Y=A*Q^-B, where Y and Q are respectively the mass of material per unit flow and flow rate and B is a scaling factor to account for economies of scale. Calculations are based on material inventory of microstraining machines from Sherbrooke treatment plant, average flow rate and cost scaling factor B (Kawamura, 2008). Note that the calculation of the constant is uncertain as the B value is used outside its reported range of validity (see general comment).
- plant average daily flow rate: 30000 m3/d; name Q_av; lognormal variance with pedigree 0, pedigree (1,1,1,1,1)
  Assumed average size plant to be 30000 m3/d. Can be adapted to extrapolate construction inventory for different plant sizes ranging from 3785 m3/d to 378540 m3/d (representativity of used cost curves). To adapt the entire dataset to a different plant size change this parameter to the average flow rate of the waterworks you wish to model. Than change the amount called for this flow in the "tap water" dataset based on new plant lifetime production.
  Uncertainty: Fixed value for inventory calculation. no uncertainty associated.
- factor A_bronze: 2790 kg/(m3/d)^2; name A_bronze; lognormal variance with pedigree 0.0468, pedigree (3,4,2,5,4)
  (same comment as for factor A_iron)
- factor A_copper: 603 kg/(m3/d)^2; name A_Cu; lognormal variance with pedigree 0.0468, pedigree (3,4,2,5,4)
  (same comment as for factor A_polyurethane)
- factor A_stainless steel: 4050 kg/(m3/d)^2; name A_ssteel; lognormal variance with pedigree 0.0468, pedigree (3,4,2,5,4)
  (same comment as for factor A_iron)
- factor A_pvc: 965 kg/(m3/d)^2; name A_pvc; lognormal variance with pedigree 0.0468, pedigree (3,4,2,5,4)
  (same comment as for factor A_polyurethane)
- factorA_fg_reinfplast: 844 kg/(m3/d)^2; name A_fg_reinfp; lognormal variance with pedigree 0.0468, pedigree (3,4,2,5,4)
  (same comment as for factor A_polyurethane)
- factor A_aluminium: 1210 kg/(m3/d)^2; name A_Al; lognormal variance with pedigree 0.0468, pedigree (3,4,2,5,4)
  (same comment as for factor A_polyurethane)
- factorA_pvdc: 3010 kg/(m3/d)^2; name A_pvdc; lognormal variance with pedigree 0.0468, pedigree (3,4,2,5,4)
  (same comment as for factor A_polyurethane)
- factor A_fibre glass: 1930 kg/(m3/d)^2; name A_fglass; lognormal variance with pedigree 0.0468, pedigree (3,4,2,5,4)
  (same comment as for factor A_polyurethane)
- scaling factor: 0.8302 dimensionless; name B; lognormal variance with pedigree 0.0468, pedigree (3,4,2,5,4)
  Literature value. Cost-based scaling factor, usually used to account for economies of scale, as reported in Kawamura (2008). Note that the factor is reported to be valid for a capacity range of 3785 m3/d to 378540 m3/d.
  Kawamura, S., McGivney, W. T. 2008. Cost Estimating Manual for Water Treatment Facilities, Willey, 224p.
- factor A_concrete: 15.1 m3/(m3/d)^2; name A_concrete; lognormal variance with pedigree 0.0468, pedigree (3,4,2,5,4)
  (same comment as for factor A_polyurethane)
- scaling factor B_landuse: 0.289 dimensionless; name B_landuse; lognormal variance with pedigree 0.0452, pedigree (5,4,1,5,2)
  Calculated value for constant B in scaling equation Y=A*Q^-B. Estimated scaling factor based on regression of measurements of surface area Y occupied by 4 Quebec water treatment plants, each associated with its own daily flow rate Q. R^2 of regression based on this sample was 0.625.
- factor A_steel: 5390 kg/(m3/d)^2; name A_steel; lognormal variance with pedigree 0.0468, pedigree (3,4,2,5,4)
  (same comment as for factor A_polyurethane)
- factor A_landuse: 6.386 m2/(m3/d)^2; name A_landuse; lognormal variance with pedigree 0.0132, pedigree (4,4,1,5,2)
  Calculated value for constant A in scaling equation Y=A*Q^-B. Based on regression of measurements of surface area Y occupied by 4 Quebec water treatment plants of different technologies in Quebec, each associated with its own daily flow rate Q. R^2 of regression based on this sample was 0.6248.
- factor A_reinforcing steel: 5430 kg/(m3/d)^2; name A_reinfSteel; lognormal variance with pedigree 0.0468, pedigree (3,4,2,5,4)
  (same comment as for factor A_polyurethane)
- factor A_nylon: 232 kg/(m3/d)^2; name A_nylon; lognormal variance with pedigree 0.0468, pedigree (3,4,2,5,4)
  (same comment as for factor A_iron)

## Reference product
- iron scrap, unsorted: 1 kg; name W_iron; = iron; CPC 39310: Slag, dross, scalings and other waste from the manufacture of iron or steel; By-product classification Recyclable; pedigree (1,1,1,1,1)
  Estimation. Based on material input.
  Uncertainty: Calculated variable. Uncertainty will be determined from propagation of uncertainty factors of underlying variables.
  production volume 425942 kg; name PV_w_iron; = PV_waterworks * (W_iron / waterworks)
    Calculated from production volume of reference product using the relative outputs.
  property price 0.149 EUR2005; name W_iron_price_EUR2005
    Temporary price data. Calculated as 90% of purchasers price based on: estimated at 85% of sorted scrap
  property carbon content 0
    carbon content on a dry matter basis (reserved; not for manual entry)
  property true value 3220.31; name W_iron_true_value
    allocation property applied in "true value" allocation // value calculated from revenue
  properties: water content 0, carbon content, non-fossil 0, wet mass 1 kg, carbon content, fossil 0, water in wet mass 0 kg, dry mass 1 kg, carbon allocation 0 kg
- water works, capacity 1.1E10l/year: 0 unit; name waterworks; CPC 53253: Sewage and water treatment plants; By-product classification allocatable product
  EcoSpold01Location=CH
  production volume 19.7079 unit; name PV_waterworks
    Rough estimate based on production volume of the Quebec regional dataset and ratio of GDP's between the to region (GDP GLO/GDP Quebec (2012) = 239) of associated tap water production datasets and tap water production volumes.
  property lifetime 60 year; name lifetime
    Literature value. Assumed lifetime of 60 years for St-François-Rivière-du-Sud treatment plant based on Bonton, A. (2012).
  property price 629565 EUR2005; name waterworks_price_EUR2005
    Calculated based on inputs: The price of the product has been calculated as a sum of the values of the material and energy inputs for this product. This value is therefore a rough estimation. It may underestimate the real price since there are additional expenses when producing any product. These expences can include for example labour costs, treatment of waste materials and profit for the producer. Please consider carefully whether this level of data quality is acceptable for your application.
  property true value 629565; name waterworks_true_value
    allocation property applied in "true value" allocation // value calculated from revenue

## By-products
- copper: 0 kg; source Rentz O. 1999; By-product classification allocatable product; CPC 41413: Refined copper and copper alloys, unwrought; master alloys of copper
  Literature value. Copper uses: Before end-use copper is manufactured into semi fabricated products, such as shapes and ingots (known as 'semis'). These manufacturing processes are subdivided into hot working, cold working and, if necessary, process annealing. Few of the semis are ready for use as such. They more typically travel to first-stage manufacturers, who make metal rods, wire, and casting, and then to component manufacturers who produce such things as motors, valves, and insulated cables The components in turn are incorporated by final-stage manufacturers into a variety of finished products - automobiles, commercial buildings, residential housing, and so forth. These uses account for about 79% of the world-wide consumption of copper.
  production volume 296867 kg
  properties: dry mass 1 kg, water in wet mass 0 kg, wet mass 1 kg, carbon content, non-fossil 0, water content 0, price 5.52 EUR2005, carbon content, fossil 0, carbon content 0, carbon allocation 0 kg, true value 83149.9
- electricity, for reuse in municipal waste incineration only: 0 kWh; CPC 17100: Electrical energy; By-product classification allocatable product; pedigree (1,1,1,1,1)
  Net electricity generated from this waste and used in internal MSWI plant energy redistribution.
  Uncertainty: uncertainty is calculated from uncertainties in waste composition and uncertainties in energy efficiency and the uncertainty in internal energy demand
  production volume 9262.62 kWh
  property exergy 3.6 MJ; name E_el_prod_MSWI_exergy
    This exergy property is based on the exergy content of the product.
  property true value relation 3.6; name E_el_prod_MSWI_true_value_relation
    property to calculate "true value" from
  property price 0.1 EUR2005; name E_el_prod_MSWI_price_EUR2005
    Estimated to be the same price as in case of electricity, medium voltage.
  property true value 60.0819
    allocation property applied in "true value" allocation // value calculated from true value relation
- heat, for reuse in municipal waste incineration only: 0 MJ; CPC 17300: Steam and hot water; By-product classification allocatable product; pedigree (1,1,1,1,1)
  Net useful heat generated from this waste and used in internal MSWI plant energy redistribution.
  Uncertainty: uncertainty is calculated from uncertainties in waste composition and uncertainties in energy efficiency and the uncertainty in internal energy demand
  production volume 73428.9 MJ
  property true value relation 0.1842; name E_th_prod_MSWI_true_value_relation
    property to calculate "true value" from
  property exergy 0.1842 MJ; name E_th_prod_MSWI_exergy
    This exergy property is based on the exergy content of the product.
  property price 0.0106 EUR2005; name E_th_prod_MSWI_price_EUR2005
    Average European district heat price from Ecoheatcool and Euroheat 2005-2006, Ecoheat Work package 1: The European heat market. Final report. 10.6 EUR/GJ i s the price of district heat. http://www.solarthermalworld.org/files/Ecoheatcool%20WP1%20Web.pdf?download
  property true value 24.3256
    (same comment as for electricity, for reuse in municipal waste incineration only)
- zinc concentrate: 0 kg; CPC 14290: Other non-ferrous metal ores and concentrates (other than uranium or thorium ores and concentrates); By-product classification allocatable product
  Calculated value from the knowledge of the properties of both products.
  production volume 0.0660176 kg
  property price 0.38 EUR2005; name ByP_price_EUR2005
    Temporary price data. Calculated as 90% of purchasers price based on: Zinc content in concentrate 53%. Concentrate price per kg Zn 86.5% of refined Zn price (13.5% treatment charges according to CHR Metals Limited 2005: Dynamic cost curves. http://www.minecost.com/dynamic.pdf). 2004 zinc price from USGS (2007) Mineral commodity summaries 2007. <http://minerals.usgs.gov/minerals/pubs/mcs/2007/mcs2007.pdf> [Accessed 25 May 2010]
  property zinc content 0.53; name zinc_C_zinc_concentrate
    Zinc content on a dry matter basis. Value taken from teh "zinc mine operation" /GLO dataset.
  property dry mass 1 kg; name DM_zinc_concentrate
  property carbon content 0
    carbon content on a dry matter basis (reserved; not for manual entry)
  property true value 0.00127293
    allocation property applied in "true value" allocation // value calculated from revenue
  properties: wet mass 1 kg, water content 0, carbon content, non-fossil 0, carbon content, fossil 0, water in wet mass 0 kg, carbon allocation 0 kg
- iron scrap, sorted, pressed: 0 kg; By-product classification Recyclable; CPC 39310: Slag, dross, scalings and other waste from the manufacture of iron or steel; pedigree (1,1,1,1,1)
  Iron scrap recovered from this waste.
  Uncertainty: uncertainty calculated from uncertainty in waste composition, uncertainty of share of recyclable metal, uncertainty of transfer coefficient to bottom ash, uncertainty of the efficiency of scrap removal in MSWI plant.
  production volume 122426 kg
  property price 0.175 EUR2005
    Temporary price data. Calculated as 90% of purchasers price based on: 2005 import and export prices (total trades (USD) divided by total weight (kg) in biggest economies of the world: EU27, USA, Brasil, China, India, Japan and Russia) from UN Commodity Trade Statistics Database (http://data.un.org/Explorer.aspxDatabase [Accessed 2011.06.20]). Commodity: Waste or scrap, of cast iron
  property carbon content 0
    carbon content on a dry matter basis (reserved; not for manual entry)
  property true value 1087.11
    allocation property applied in "true value" allocation // value calculated from revenue
  properties: wet mass 1 kg, water in wet mass 0 kg, carbon content, non-fossil 0, carbon content, fossil 0, dry mass 1 kg, water content 0, carbon allocation 0 kg
- aluminium oxide, non-metallurgical: 0 kg; source European Aluminium Association 2008; CPC 41432: Alumina (aluminium oxide), except artificial corundum; By-product classification allocatable product; CAS 1344-28-1; pedigree (1,1,1,1,1)
  production volume 7855.7 kg
  property carbon content, non-fossil 0; name C_content_non_fossil
  property price 0.28 EUR2005; name Al2O3Amount_price_EUR2005
    From UN trade database. http://data.un.org/ Import data from the largest economies of the world are used (Brazil, India, USA, China, Japan and EU-27).
  property dry mass 1 kg; name DM
  property water content 0; name water_content
  property wet mass 1 kg; name WM
  property water in wet mass 0 kg; name WWM
  property carbon content, fossil 0; name C_content_fossil
  property carbon content 0
    carbon content on a dry matter basis (reserved; not for manual entry)
  property true value 111.61
    allocation property applied in "true value" allocation // value calculated from revenue
  properties: carbon allocation 0 kg
- aluminium, cast alloy: 0 kg; source European Aluminium Association 2008; By-product classification allocatable product; CPC 41431: Unwrought aluminium; pedigree (1,1,1,1,1)
  EcoSpold01Location=RER
  production volume 73433.4 kg
  property price 1.3 EUR2005; name castAlloyAmount_price_EUR2005
    Temporary price data. Calculated as 90% of purchasers price based on: Source: London Metal Exchange, Aluminium alloy price for 2005
  property carbon content 0
    carbon content on a dry matter basis (reserved; not for manual entry)
  property true value 4843.92
    allocation property applied in "true value" allocation // value calculated from revenue
  properties: water in wet mass 0 kg, carbon content, non-fossil 0, water content 0, dry mass 1 kg, carbon content, fossil 0, wet mass 1 kg, carbon allocation 0 kg
- aluminium, wrought alloy: 0 kg; source European Aluminium Association 2008; By-product classification allocatable product; CPC 4153: Semi-finished products of aluminium or aluminium alloys; pedigree (1,1,1,1,1)
  production volume 32147.7 kg
  property price 1.44 EUR2005; name secondaryAluminiumOutput_price_EUR2005
  properties: wet mass 1 kg, water content 0, carbon content, fossil 0, water in wet mass 0 kg, carbon content, non-fossil 0, dry mass 1 kg, carbon content 0, carbon allocation 0 kg, true value 2348.94

## Inputs from technosphere
- steel, low-alloyed, hot rolled: 0.00632488 kg; name steel; = (A_steel* Q_av^- B)* Q_av; lognormal variance with pedigree 0.008, pedigree (1,1,4,1,1)
  EcoSpold01Location=RER
  Calculated Value.
  Uncertainty: Calculated variable. Uncertainty will be determined from propagation of uncertainty factors of underlying variables. Uncertainty of actual relation between variables not accounted for at this time, although this could be included in a future update.
  properties: wet mass 1 kg, dry mass 1 kg, carbon content, fossil 0.005
  note on carbon content, fossil: Low alloyed steel composition given in Tab. 3.2 ecoinvent v2.2 report 10_partII. Steel assumed to have a C content of 0.5%
- polyvinylchloride, bulk polymerised: 0.00113238 kg; name PVC; = ( A_pvc* Q_av^- B)* Q_av; lognormal variance with pedigree 0.008, pedigree (1,1,4,1,1)
  EcoSpold01Location=RER
  Calculated Value.
  Uncertainty: Calculated variable. Uncertainty will be determined from propagation of uncertainty factors of underlying variables.
  properties: carbon content, fossil 0.387097, wet mass 1 kg, dry mass 1 kg
  note on carbon content, fossil: Monomer is vynyl chloride, C2H3Cl (ecoinvent v2.2 report 11_II). MW=62 g/mol
- polyurethane, rigid foam: 0.000141987 kg; name Purethane; = ( A_polyurethane*Q_av^- B)* Q_av; lognormal variance with pedigree 0.008, pedigree (1,1,4,1,1)
  Calculated Value.
  Uncertainty: Calculated variable. Uncertainty will be determined from propagation of uncertainty factors of underlying variables.
  properties: wet mass 1 kg, dry mass 1 kg, carbon content, fossil 0.69089
- bronze: 0.00327392 kg; = ( A_bronze *Q_av^- B)* Q_av; lognormal variance with pedigree 0.008, pedigree (1,1,4,1,1)
  (same comment as for polyurethane, rigid foam)
  properties: wet mass 1 kg, dry mass 1 kg
- waste polyvinylchloride: 0 kg; name W_pvc; pedigree (1,1,1,1,1)
  EcoSpold01Location=CH
  Estimation. Based on material input.
  Uncertainty: Calculated variable. Uncertainty will be determined from propagation of uncertainty factors of underlying variables.
  production volume 0 kg; name PV_w_pvc
    Calculated from the production volume of water works in proportion to the respective output amounts.
  property price 0 EUR2005; name W_pvc_price_EUR2005
  properties: dry mass 0.998 kg, water content 0.00200401, carbon content, fossil 0.440882, wet mass 1 kg
  note on carbon content, fossil: C content in 1 kg DM was calculated using data in Tab A.1, ecoinvent v2.2 report 13_I
- copper scrap, sorted, pressed: -0.00398151 kg; name W_cu; = (cu+bronze)*-1; lognormal variance with pedigree 0.008, pedigree (1,1,4,1,1)
  (same comment as for iron scrap, unsorted)
  production volume 384981 kg; name PV_w_cu; = PV_waterworks*W_cu/waterworks
    Calculated from production volume of reference product using the relative outputs.
  property price 2.84 EUR2005; name W_cu_price_EUR2005
  properties: wet mass 1 kg, dry mass 1 kg
- scrap steel: -0.0110773 kg; name W_steel; = (steel+ssteel)*-1; lognormal variance with pedigree 0.008, pedigree (1,1,4,1,1)
  (same comment as for iron scrap, unsorted)
  production volume 1.07109e6 kg; name PV_w_steel; = PV_waterworks*W_steel/waterworks
    Calculated from production volume of reference product using the relative outputs.
  property price 0 EUR2005; name W_steel_price_EUR2005
  properties: dry mass 1 kg, wet mass 1 kg
- waste reinforced concrete: -1.77191e-5 kg; name W_reinfconc; = (concrete)*-1; lognormal variance with pedigree 0.008, pedigree (1,1,4,1,1)
  (same comment as for waste polyvinylchloride)
  production volume 1713.29 kg; name PV_w_reinfconc; = PV_waterworks*W_reinfconc/waterworks
    (same comment as for waste polyvinylchloride)
  property price 0 EUR2005; name W_reinfconc_price_EUR2005
  properties: water content 0.00585407, wet mass 1 kg, dry mass 0.99418 kg
- aluminium scrap, post-consumer: -0.00141987 kg; name W_al; = (al)*-1; lognormal variance with pedigree 0.008, pedigree (1,1,4,1,1)
  (same comment as for iron scrap, unsorted)
  production volume 137291 kg; name PV_w_al; = PV_waterworks*W_al/waterworks
    Calculated from production volume of reference product using the relative outputs.
  property price 0.685 EUR2005; name W_al_price_EUR2005
  properties: dry mass 1 kg, wet mass 1 kg
- waste reinforcement steel: -0.00637182 kg; name W_reinfSteel; = (reinfsteel)*-1; lognormal variance with pedigree 0.008, pedigree (1,1,4,1,1)
  (same comment as for waste polyvinylchloride)
  production volume 616105 kg; name PV_w_reinfSteel; = PV_waterworks*(W_reinfSteel/waterworks)
    (same comment as for waste polyvinylchloride)
  property price 0 EUR2005; name W_reinfSteel_price_EUR2005
  properties: dry mass 1 kg, wet mass 1 kg
- concrete, normal: 0 m3; name concrete; pedigree (1,1,1,1,1)
  EcoSpold01Location=CH
  Calculated Value.
  Uncertainty: Calculated variable. Uncertainty will be determined from propagation of uncertainty factors of underlying variables.
  properties: dry mass 2190 kg, wet mass 2380 kg, water content 0.086758
- reinforcing steel: 0.00637182 kg; name reinfsteel; = (A_reinfsteel* Q_av^- B)* Q_av; lognormal variance with pedigree 0.008, pedigree (1,1,4,1,1)
  Calculated Value.
  EcoSpold01Location=RER
  Uncertainty: Calculated variable. Uncertainty will be determined from propagation of uncertainty factors of underlying variables.
  properties: wet mass 1 kg, carbon content, fossil 0.004, dry mass 1 kg
- nylon 6: 0.00027224 kg; name nylon; = ( A_nylon *Q_av^- B)* Q_av; lognormal variance with pedigree 0.008, pedigree (1,1,4,1,1)
  (same comment as for polyurethane, rigid foam)
  properties: wet mass 1 kg, carbon content, fossil 0.637168, dry mass 1 kg
  note on carbon content, fossil: It is a chain of caprolactam molecules, originating from aminocarboxylic acids - here caproic acid or caprolactam. The structure of nylon 6 is -(NH-(CH2)5-CO)n-, C6H11NO (ecoinvent v2.2 report 11_II). MW=113 g/mol
- glass fibre reinforced plastic, polyester resin, hand lay-up: 0.00226475 kg; name fglass_plast; = (A_fglass* Q_av^- B)* Q_av; lognormal variance with pedigree 0.008, pedigree (1,1,4,1,1)
  (same comment as for polyurethane, rigid foam)
  properties: dry mass 1 kg, carbon content, fossil 0.246639, wet mass 1 kg
- steel, chromium steel 18/8: 0.00475246 kg; name ssteel; = ( A_ssteel *Q_av^- B)* Q_av; lognormal variance with pedigree 0.008, pedigree (1,1,4,1,1)
  (same comment as for polyurethane, rigid foam)
  properties: wet mass 1 kg, dry mass 1 kg, carbon content, fossil 0.0008
  note on carbon content, fossil: Stainless steel model is the grade 304 steel (18/8 stainless, 18% chromium 8% nickel; max. 0.08% C)
- aluminium, wrought alloy: 0.00141987 kg; name Al; = (A_al* Q_av^- B)* Q_av; lognormal variance with pedigree 0.008, pedigree (1,1,4,1,1)
  Calculated Value.
  EcoSpold01Location=RER
  Uncertainty: Calculated variable. Uncertainty will be determined from propagation of uncertainty factors of underlying variables.
  0
  properties: wet mass 1 kg, dry mass 1 kg
- waste plastic, mixture: 0 kg; name W_plastics; pedigree (1,1,1,1,1)
  (same comment as for iron scrap, unsorted)
  production volume 0 kg; name PV_w_plastics
    Calculated from production volume of reference product using the relative outputs.
  property price 0 EUR2005; name W_plastics_price_EUR2005
  properties: dry mass 0.847 kg, wet mass 1 kg, carbon content, fossil 0.747344, water content 0.180638
- cast iron: 0.00436522 kg; name iron; = ( A_iron *Q_av^- B)* Q_av; lognormal variance with pedigree 0.008, pedigree (1,1,4,1,1)
  (same comment as for polyurethane, rigid foam)
  properties: carbon content, fossil 0.04, wet mass 1 kg, dry mass 1 kg
  note on carbon content, fossil: Cast iron is made by remelting pig iron in small furnaces (e.g. cupola furnaces or electric arc furnaces) and poured into moulds to make castings. It usually contains 2% to 6% carbon (ecoinvent v2.2 report 10_partII). An average content of 4% was considered
- waste glass pane in burnable frame: -0.00452951 kg; name W_fglass; = (fiberglass+fglass_plast)*-1; lognormal variance with pedigree 0.008, pedigree (1,1,4,1,1)
  Estimation. Based on material input.
  EcoSpold01Location=CH
  Uncertainty: Calculated variable. Uncertainty will be determined from propagation of uncertainty factors of underlying variables.
  production volume 437968 kg; name PV_w_fglass; = PV_waterworks*W_fglass/waterworks
    (same comment as for waste polyvinylchloride)
  property price 0 EUR2005; name W_fglass_price_EUR2005
  properties: dry mass 1 kg, wet mass 1 kg
- polyvinylidenchloride, granulate: 0.00353208 kg; name pvdc; = ( A_pvdc *Q_av^- B)* Q_av; lognormal variance with pedigree 0.008, pedigree (1,1,4,1,1)
  (same comment as for polyurethane, rigid foam)
  properties: wet mass 1 kg, carbon content, fossil 0.387097, dry mass 1 kg
- copper: 0.000707589 kg; name Cu; = (A_Cu* Q_av^- B)*Q_av; lognormal variance with pedigree 0.008, pedigree (1,1,4,1,1)
  (same comment as for polyvinylchloride, bulk polymerised)
  properties: dry mass 1 kg, wet mass 1 kg
- glass fibre: 0.00226475 kg; name fiberglass; = ( A_fglass* Q_av^- B)* Q_av; lognormal variance with pedigree 0.008, pedigree (1,1,4,1,1)
  (same comment as for polyurethane, rigid foam)
  properties: wet mass 1 kg, dry mass 1 kg
- waste polyvinylchloride: -0.00410306, -0.000274151, -2.07336e-5, -0.000113234, -4.57453e-5, -0.000107526 kg (6 entries); lognormal variance with pedigree 0.008, pedigree (1,1,4,1,1)
  (same comment as for waste polyvinylchloride)
  production volume 451016 kg
- concrete, normal: 2.11822e-7, 7.03091e-6, 7.32611e-7, 5.931e-6, 3.33619e-6, 4.76523e-7 m3 (6 entries); lognormal variance with pedigree 0.008, pedigree (1,1,4,1,1)
  (same comment as for concrete, normal)
- waste plastic, mixture: -0.000364373, -2.4346e-5, -1.84125e-6, -1.00558e-5, -4.06241e-6, -9.54888e-6 kg (6 entries); lognormal variance with pedigree 0.008, pedigree (1,1,4,1,1)
  (same comment as for iron scrap, unsorted)
  production volume 40052.5 kg

## Inputs from nature
- Transformation, to industrial area [natural resource, land]: 0.00198477 m2; name land; = (A_landuse* Q_av^-B_landuse)* Q_av; lognormal variance with pedigree 0.008, pedigree (1,1,4,1,1)
  (same comment as for polyurethane, rigid foam)
- Transformation, from unspecified [natural resource, land]: 0.00198477 m2; = (A_landuse* Q_av^-B_landuse)* Q_av; lognormal variance with pedigree 0.008, pedigree (1,1,4,1,1)
  (same comment as for polyurethane, rigid foam)
- Occupation, industrial area [natural resource, land]: 0.119086 m2*year; = land*lifetime; lognormal variance with pedigree 0.008, pedigree (1,1,4,1,1)
  (same comment as for polyurethane, rigid foam)

## Sampling procedure
Based on data collection at the Lebel-sur-Quevillon plant in 2009 and personal communication with the operator of the a microstrainer treatment plant in Quebec and the technology equipment manufacturer in 2013. Most of these data have been published in Bonton, A., Bouchard, C., Barbeau, B., & Jedrzejak, S. (2012). Comparative life cycle assessment of water treatment plants. Desalination, 284, 42–54. Scaling to average size plant was based on economic scaling curve (Kawamura, S., McGivney, W. T. 2008. Cost Estimating Manual for Water Treatment Facilities, Willey, 224p.).

## Extrapolations
From small-sized ultrafiltration treatment plant and medium-sized microstraining plant to Global average middle-sized microstraining treatment plant construction. Extrapolation is based on scaling initial inventory to average size plant using published cost scaling curves from Kawamura (2008). This approach assumes that the economic scaling factor for larger size is applicable to material quantity. Dataset is parameterized based on average flow. The cost curve used for scaling is supposed to be applicable to plant size ranging from 10 to 100 MGD, i.e. it is used here outside the prescribed range of applicability. Uncertainty has been adjusted accordingly.
