# electricity production, hard coal

Dataset: EcoSpold 2, unit process
Geography: AT
Time period: 1980-01-01 to 2019-12-31
Technology level: modern
Classification: ISIC rev.4 ecoinvent: 3510:Electric power generation, transmission and distribution
Classification: EcoSpold01Categories: hard coal/power plants
Synonyms: anthracite; coking coal; other bituminous coal
Tags: hard coal power; fossil fuels; coal power
Scenario: Business-as-Usual
System model: Allocation at the point of substitution
Generated by: Karin Treyer
Published in: Röder, A. 2007
Database: ecoinvent
isCopyrightProtected: true
accessRestrictedTo: 1

## General comment
This dataset represents the production of high voltage electricity in an average hard coal power plant in Austria in 2012. 'Hard coal' includes anthracite, coking coal and other bituminous coal according to the definition of the IEA electricity information 2014.
All exchanges in this dataset except for emissions of SO2, NOx and particles are production-weighted averages of the figures in the datasets in ecoinvent version two, which are valid for the following 14 countries: AT, BE, ES, FR, IT, NL, PT, DE, CZ, HR, PL, SK, CN, US. The exception values are production-weighted averages of version 2 countries and the new countries in version 3 (AU, CA, CL, ID, IN, KR, MX, MY, PE, RU, TH, TR, TW, TZ, UA, ZA)
Comments on the inventory data of emissions:
- For the assessment of main characteristics (sulphur and ash content of coal, efficiency of the plant) and CO2 a bottom-up approach has been used. It consists in the collection of information about single plants.
- The size distribution of particle emissions has been derived from German data.
- Halogene emissions have been estimated on the basis of the content of the species in the country-specific coal input mix, assuming average retention rates.
- For CO and particle emissions average values for the former UCTE are included (Union for the Coordination of the Transmission of Electricity, since 2009 replaced by ENTSO-E European Network of Transmission System Operators for Electricity).
- The country specific emission depend on the share of DeNOx.
- Emissions of trace elements were calculated by means of a formula (CORINAIR) using the ash content in the country-specific coal input mix and average transfer coefficients for coal power plants, taking into account the share of DeSOx installed.
- Emission of uranium and thorium radioactive isotopes were assumed proportional to the corresponding element emitted with particles; the other non-gaseous radioactive isotopes of the uranium and thorium decay chain were assumed proportional to the emitted U-238 or Th-232.
- The emission of gaseous radon and K-40 are taken from the literature.
IEA. 2014. Electricity Information 2014. ISBN 978-92-64-21692-1. International Energy Agency (IEA), Paris Cedex (FR)
European Environment Agency (1991) CORINAIR Inventory; VOC's Default Emission Factors
[This dataset is meant to replace the following datasets:]

## Included activities start
From reception of hard coal at the factory gate.

## Included activities end
This activity ends with 1 kWh of produced electricity at the power plant. The dataset includes apart the fuel oil to startup the power plant also the cooling and process water, the reduced SOx and NOx emissions, all emissions to air as well as the disposal of ashes and residues of the cooling tower. The dataset doesn't include the desulfurization (DeSOx) resp. denitrification (DeNOx) process and doesn't include the disposal of non-recycled ashes and the water treatment.

## Geography
Data for an average coal power plant in the country.

## Technology
POWER PLANT:
Hard coal power plant input is a market mix of 100MWe power plants (representing all power plants with a capacity <250MWe and 7% of installed capacity) and 500MWe power plants (representing all power plants with a capacity >250MWe and 93% of installed capacity). Please note that in contrast to ecoinvent v2, the two power plant types do not exist anymore as single datasets. Along with (Röder et al. 2004), lifetime of these power plants is assumed to be 150’000 full load hours. Whereas European hard coal power plants are assumed to be operated in mid-load mode with 4000 full load hours per year (corresponding to a lifetime of 37.5 years) (Röder et al. 2004), a capacity factor (average US) of 66% is documented (eGRID 2006), corresponding to about 5800 full load hours per year, or a lifetime of about 26 years.
Coal power plants are installed with an electrical filter and a flue gas desulfurization (DeSOx). To a large extent a selective catalytic reduction (SCR) takes place and a DeNOx plant is installed additionally. The electrical filter is the most widely used technology in UCTE countries. The system is highly efficient with filtration efficiency up to 99.9%. The electrical filter increases the energy consumption. The downstream flue gas desulfurization (DeSOx) reduces the particles further by 80% to 95%.
- Share of installed capacity with desulfurisation 2% (rough estimation based on sulfur mass balance
- Average efficiency of desulfurisation installations: 92% (rough estimation based on Dones et al. 27
- Share of installed capacity with denitrification (primary and/or secondary installations): 73% (figure based on IEA 212 )
- Average efficiency of denitrification installations: 8% (estimation based on Dones et al. 27, p.128. Valid for selective catalytic reaction systems)
- Share of installed capacity with particle filters: 98% (figure based on IEA 212 )
- Average efficiency of particle filters: 98% (figure based on IEA 212 )
- IEA 2012. Coal Power Database. International Energy Agency Clean Coal Centre, London
- IEA/OECD. 2010. Electricity Information 2010. International Energy Agency (IEA), Paris Cedex (FR). Part IV. Detailed OECD Electricity And Heat Data.
- Dones, R., Bauer, C., Röder, A. (2007) Kohle. In: Dones, R. (Ed.) et al., Sachbilanzen von Energiesystemen: Grundlagen für den ökologischen Vergleich von Energiesystemen und den Einbezug von Energiesystemen in Ökobilanzen für die Schweiz. Final report ecoinvent No.

## Time period
The Annual Production Volume is valid for the year 2012.

## Parameters
- fraction, water, decarbonised, to air: 0.0251074; name fraction_WDC_to_air; = fraction_CW_to_air; lognormal variance with pedigree 0.041425, pedigree (2,3,2,2,1)
  Calculated value. See comments in the other parametres present in this dataset. Decarbonised water is considered to be always used as cooling water, thus cooling water fractions to air are applied to all carbonised water input flows to calculate the amount of water consumed in the processes.
  nan
- factor: input of MJ for the production of 1 kWh: 8.55107 MJ/kWh; name factor_MJ_kWh; = 1*3.6/efficiency; undefined min 11.1801, max 11.1801, standardDeviation95 0, pedigree (1,1,1,1,1)
  Calculated value. 3.6 MJ = 1kWh.
  nan
- losses from gross electricity production: 0.04 dimensionless; name losses_gross_net; lognormal variance with pedigree 0.003525, pedigree (3,2,2,2,2)
  Calculated value. Own use of electricity plants in this country in 2012. For the OECD countries, the OECD iLibrary provides gross and net electricity values for the specific sector 'Total Fuel Combustion', from which the loss value is being calculated. This value is then applied to all fossil fuel datasets, as no data on a more detailed level were available.
  OECD. 2014. IEA Electricity Information Statistics: OECD - Electricity and heat generation. OECD iLibrary. Online database. DOI : 10.1787/elect-data-en
  nan
  Uncertainty: Generic IEA value used.
- recirculating cooling system as a fraction of all cooling systems: 0.27 dimensionless; name recirculating_CS_fraction_from_allCS; lognormal variance with pedigree 0.092025, pedigree (4,4,3,2,4)
  Calculated as an average of data available for Europe (Floerke, 2008, Future changes of freshwater needs in the electricity production sector) and USA (NERL, 2011, Estimating freshwater needs to meet future thermoelectric generation requirements).
  nan
- once-through and cooling pond cooling systems as a fraction of all cooling syste: 0.73 dimensionless; name once_through_andCP_CS_fractio_from_allCS; lognormal variance with pedigree 0.092025, pedigree (4,4,3,2,4)
  (same comment as for recirculating cooling system as a fraction of all cooling systems)
- efficiency: 0.421 dimensionless; lognormal variance with pedigree 0.003325, pedigree (3,2,1,2,2)
  Literature value/calculated value. Net electrical efficiency based on the lower heating value (LHV).
  For all OECD countries, the IEA Electricity information 2014 provides data for the year 2012 on fuel input (TJ, Net calorific value NCV) and gross electricity production (GWh) as well as heat production (TJ) in tables 8 and 9 for each country for electricity only and Combined Heat and Power (CHP) plants each. Together with the information on own use (see parameter 'losses'), the net electrical efficiency based on the NCV is calculated.
  For all non-OECD countries, data from the IEA Energy balances of non-OECD countries 2014 have been used. These tables do not always provide information on how much of the electricity has been produced in electricity only and in CHP plants, but often give the total value only.
  IEA. 2014. Electricity Information 2014. ISBN 978-92-64-21692-1. International Energy Agency (IEA), Paris Cedex (FR).
  IEA/OECD. 2014. Energy balances of non-OECD countries 2014. International Energy Agency (IEA), Paris Cedex (FR).
- gross electricity production: 4.077e9 kWh; name gross_electricity; lognormal variance with pedigree 0.0012, pedigree (2,1,1,1,1)
  Literature value/statistics. Taken from the IEA electricity information 2014, table 1.3.
  IEA. 2014. Electricity Information 2014. ISBN 978-92-64-21692-1. International Energy Agency (IEA), Paris Cedex (FR).
  nan
- fraction, cooling water, to air: 0.0251074; name fraction_CW_to_air; lognormal variance with pedigree 0.041425, pedigree (2,3,2,2,1)
  Calculated
  nan
- fraction, water, completely softened, to air: 0.15; name fraction_WCS_to_air; = fraction_PW_to_air; lognormal variance with pedigree 0.092025, pedigree (4,4,3,2,4)
  Calculated value. See comment in the other parametres present in this dataset. Water, completely softened is considered to be always used as process water, thus process water fractions to air are applied to all water, completely softened input flows to calculate the amount of water consumed in the processes.
  nan
- water consumption, electricity production from hard coal, recirculating CS: 0.0018 m3/kWh; name WConsumption_EP_HC_recirculatingCS; lognormal variance with pedigree 0.092025, pedigree (4,4,3,2,4)
  Estimated based on literature (Scown, 2011, Water Footprint of U.S. Transportation Fuels, SI). The amount of water consumed while burning lignite and peat is assumed to be the same as in case of coal.
  nan
- water withdrawal, electricity production from hard coal, recirculating CS: 0.0021 m3/kWh; name WWithdrawal_EP_HC_recirculating_CS; lognormal variance with pedigree 0.092025, pedigree (4,4,3,2,4)
  Estimated based on literature (Scown, 2011, Water Footprint of U.S. Transportation Fuels, SI). The amount of water withdrawn while burning lignite and peat is assumed to be the same as in case of coal.
  nan
- water withdrawal, electricity production from hard coal, once-through and coolin: 0.0815 m3/kWh; name WWithdrawal_EP_HC_once_through_andCP_CS; lognormal variance with pedigree 0.092025, pedigree (4,4,3,2,4)
  (same comment as for water withdrawal, electricity production from hard coal, recirculating)
- water consumption, electricity production from hard coal, once-through and cooli: 0.0014 m3/kWh; name WConsumption_EP_HC_once_through_andCP_CS; lognormal variance with pedigree 0.092025, pedigree (4,4,3,2,4)
  (same comment as for water consumption, electricity production from hard coal, recirculatin)
- fraction, process water, to air: 0.15 dimensionless; name fraction_PW_to_air; lognormal variance with pedigree 0.092025, pedigree (4,4,3,2,4)
  Literature value. In case when no industry/process specific data are available, default evaporation fraction value is used. This value is 15% and is based on literature (Statistics Canada, 2007 & Shaffer, K.H., 2008, Consumptive water use in the Great Lakes Basin, USGS & Shiklomanov, 2003, World Water Resources at the Beginning of the 21st Century) and has been approved by an expert.
  nan

## Reference product
- electricity, high voltage: 1 kWh; name electricity; CPC 17100: Electrical energy; By-product classification allocatable product
  production volume 3.91392e9 kWh; name electricity_apv; = gross_electricity*(1- losses_gross_net)
    Calculated value
  property price 0.0977 EUR2005
    Temporary price data. Calculated as 90% of purchasers price based on: 94% of the average price (to account for a 6% loss in transformation and transmission) for electricity for industrial consumersin 2005 (excluded taxes). From IEA.
  property true value 0.0977; name electricity_true_value
    allocation property applied in "true value" allocation // value calculated from revenue
  properties: Corresponding fuel use 8.91 MJ

## By-products
- heat, for reuse in municipal waste incineration only: 0 MJ; CPC 17300: Steam and hot water; By-product classification allocatable product; pedigree (1,1,1,1,1)
  Net electricity generated from this waste and used in internal MSWI plant energy redistribution.
  Uncertainty: uncertainty is calculated from uncertainties in waste composition and uncertainties in energy efficiency and the uncertainty in internal energy demand
  production volume 8.78645 MJ
  property exergy 0.1842 MJ; name E_th_prod_MSWI_exergy
    This exergy property is based on the exergy content of the product.
  property price 0.0106 EUR2005; name E_th_prod_MSWI_price_EUR2005
    Average European district heat price from Ecoheatcool and Euroheat 2005-2006, Ecoheat Work package 1: The European heat market. Final report. 10.6 EUR/GJ i s the price of district heat. http://www.solarthermalworld.org/files/Ecoheatcool%20WP1%20Web.pdf?download
  property true value relation 0.1842; name E_th_prod_MSWI_true_value_relation
    property to calculate "true value" from
  property true value 1.47669e-11
    allocation property applied in "true value" allocation // value calculated from true value relation
- electricity, for reuse in municipal waste incineration only: 0 kWh; CPC 17100: Electrical energy; By-product classification allocatable product; pedigree (1,1,1,1,1)
  (same comment as for heat, for reuse in municipal waste incineration only)
  production volume 1.23747 kWh
  property true value relation 3.6; name E_el_prod_MSWI_true_value_relation
    property to calculate "true value" from
  property price 0.1 EUR2005; name E_el_prod_MSWI_price_EUR2005
    Estimated to be the same price as in case of electricity, medium voltage.
  property exergy 3.6 MJ; name E_el_prod_MSWI_exergy
    This exergy property is based on the exergy content of the product.
  property true value 4.06463e-11
    (same comment as for heat, for reuse in municipal waste incineration only)

## Inputs from technosphere
- NOx retained, by selective catalytic reduction: 0.00165891 kg; name nox_retained; = 0.000194 * factor_MJ_kWh; source Maude C. W. 1994; lognormal variance with pedigree 0.044, pedigree (3,1,3,1,1)
  Estimation. The amount of retained NOx is gathered from a bottom-up approach and based on the collection of information about single plants (Maude et al., 1994) with updated information for year 2000 (Jahrbuch 2001). Additionally country specific data is available from coal power plant operators (Tauschitz et al. 1997), (Verbund 2002), (Energie Oberösterreich 1999), (Steweag), (Guttenbrunner et al. 1998). For about 60% of installed capacity in hard coal power plants detailed values for emissions and electricity production are available.
  Further references:
  Klatt H.-J., Meller E., Middelschulte A., Milojcic G., Reichel W., Riemer H.-W. (2001) Jahrbuch 2001 der europaischen Energie- und Rohstoffwirtschaft, 108. Jg. Gückauf, Essen.
  Tauschitz J., Kager W., Voges W. (1997) Restwarmeauskopplung im Dampfkraftwerk Voitsberg 3 In: VGB KraftwerksTechnik 77 2/97 S. 98-103.
  Verbund (2002) Umweltbericht 2001. Österreichische Elektrizitatswirtschafts-Aktiengesellschaft (Verbundgesellschaft). Wien
  Energie Oberösterreich AG (1999) Umwelterklarung für den Standort Riedersbach, Riedersbach 1999, http://www.energieag.at/riedersbach/index.html und Informationen über das Kraftwerk Timelkam (www.energieag.at/lambach/kws/timelkam/seite1.html), 8.8.2002
  Steweag (2002) http://www.steweag-steg.com/plant/mellach.htm. Steirische Wasserkraft- und Elektrizitats-AG, 9.8.2002.
  Guttenbrunner M., Madlsperger G., Pfeffer S., Steiner H. (1998) Umrüstung der Braunhohle-Kraftwerke der Oberösterreichischen Kraftwerke AG auf Steinkohle. In: VGB KraftwerksTechnik 78 6/98 S. 81-86.
  Amount was scaled to the amount of reference product.
  properties: wet mass 1 kg, dry mass 1 kg
- hard coal ash: -0.00211211 kg; name amount_ash; = (0.000247 * factor_MJ_kWh)*-1; source Maude C. W. 1994; lognormal variance with pedigree 0.092, pedigree (5,1,3,5,3)
  Estimation. The ash content of hard coal mined in Europe is usually between 10% and 25%. Imported coal has an ash content of mostly less than 10% (Brune et al. 1984) and (Maude et al 1994). Therefore, the weighted ash content of the country is taken into account. Due to the respective retention technology the amount of avoided ash is calculated.
  The ash accrues as bottom ash or fly ash. In case of slag tap firing granules accrue, since the high temperature leads to a vitreous substance. If a fly ash recirculation takes place, the ash accrues completely as granulate, without fly ash recirculation the proportion is 50%. In case of dry firing 15% to 20% of the ash accrue as bottom ash, the rest as fly ash (VGB 1992).
  According to data provided by operators and associations a recycling rate of 95% is assumed. Difficulties arise only with ashes from fluidized bed furnaces, which are difficult to handle. In Austria 4’352 kg per TJin of hard coal ash accrues, 217.6 kg of ash per TJin is deposited. This information relates only to the inorganic fraction of the ash.
  It is not clear if the recycled ash is a by-product or waste product. It is not known whether, for example, the cement and concrete industry pays something for the ash or even get something for it.
  Further references:
  Brune D., Stehfest H. (1984) Folgen eines verstarkten Kohleeinsatzes in der Bundesrepublik Deutschland; Teilbericht: Umweltfolgeanalysen für Abwasseremissionen und feste Rückstande aus der Kohlegewinnung und -nutzung. Kernforschungszentrum Karlsruhe KfK 3526.
  VGB und VDEW (1992) Verwertungskonzept für Reststoffe aus Kohlekraftwerken in der Bundesrepublik Deutschland. VGB-TW 702, Essen.
  Amount was scaled to the amount of reference product.
  production volume 8.26665e6 kg; = amount_ash/electricity*electricity_apv
    Calculated from the production volume of hard coal, burned in power plant in proportion to the respective output amounts.
  property price 0 EUR2005; name amount_ash_price_EUR2005
  properties: dry mass 1 kg, wet mass 1 kg
- water, decarbonised: 1.28266 kg; name water_decarbonised_input; = 0.15 * factor_MJ_kWh; source Euler H. 1984; lognormal variance with pedigree 0.052025, pedigree (4,5,4,2,3)
  Estimation. The water treatment for the wet cooling and for feed water treatment is recorded separately. According to (Euler 1984) the share of river cooled power plants was 58% in 1978. 42% of the power plants were operated with wet cooling. According to (Brune et al. 1984) 33% of hard coal power plants are operated with wet cooling towers in 1980. Since 1978 practically all power plants have been built with wet cooling towers. It is believed that around 50% of river cooled power plants have been shut down or equipped with wet cooling towers. It results an assumed share of river cooled power plants of 25% in the whole UCTE area.
  Further references:
  Brune D., Stehfest H. (1984) Folgen eines verstarkten Kohleeinsatzes in der Bundesrepublik Deutschland; Teilbericht: Umweltfolgeanalysen für Abwasseremissionen und feste Rückstande aus der Kohlegewinnung und -nutzung. Kernforschungszentrum Karlsruhe KfK 3526.
  Amount was scaled to the amount of reference product.
  Estimation. The water treatment for the wet cooling and for feed water treatment is recorded separately. According to (Euler 1984) the share of river cooled power plants was 58% in 1978. 42% of the power plants were operated with wet cooling. According to (Brune et al. 1984) 33% of hard coal power plants are operated with wet cooling towers in 1980. Since 1978 practically all power plants have been built with wet cooling towers. It is believed that around 50% of river cooled power plants have been shut down or equipped with wet cooling towers. It results an assumed share of river cooled power plants of 25% in the whole UCTE area.
  Further references:
  Brune D., Stehfest H. (1984) Folgen eines verstarkten Kohleeinsatzes in der Bundesrepublik Deutschland; Teilbericht: Umweltfolgeanalysen für Abwasseremissionen und feste Rückstande aus der Kohlegewinnung und -nutzung. Kernforschungszentrum Karlsruhe KfK 3526.
  Amount was scaled to the amount of reference product.
  properties: wet mass 1 kg
- light fuel oil: 0.000145368 kg; name light_fuel_oil; = 1.7E-05 * factor_MJ_kWh; source STEAG AG Essen 1988; lognormal variance with pedigree 0.0221, pedigree (3,4,4,3,1)
  Estimation. Fuel oil is primarily used for starting up the plant. For medium load hard coal power plants typically 450g of fuel oil and 0.5g of diesel per ton of burned hard coal is necessary. This results in 0.73 GJ of fuel oil per TJin.
  Amount was scaled to the amount of reference product.
  properties: carbon content, fossil 0.862, dry mass 1 kg, wet mass 1 kg
- hard coal power plant: 1.11164e-11 unit; name hard_coal_power_plant; = 1.3E-12 * factor_MJ_kWh; source Röder, A. 2007; lognormal variance with pedigree 0.3147, pedigree (3,3,3,3,1)
  Calculated value. At the moment, the hard coal power plant input consists of a market mix of a 100MWe power plant and a 500MWe power plant
  .
  For this calculation, 4000 load hours per year are assumed. It is assumed that a total of 150'000h is reached during the lifetime. A capacity of 500MW is taken for the calculation.
- chlorine, liquid: 8.55107e-5 kg; = 1E-05 * factor_MJ_kWh; source GESAMP  1984; lognormal variance with pedigree 0.108025, pedigree (5,4,4,2,3)
  Estimation. For the once-through cooling it is assumed that chlorine is added as an antifouling. Per ton of water around 3 g of chlorine are added. This leads to an emission of 0.2 g per ton of water OCl-.
  Amount was scaled to the amount of reference product.
  properties: dry mass 1 kg, wet mass 1 kg
- residue from cooling tower: -4.27553e-5 kg; name amount_residue; = (5E-06 * factor_MJ_kWh)*-1; source VGB 1992; lognormal variance with pedigree 0.072, pedigree (5,1,3,1,1)
  Estimation. The cleaning of the steam generators usually leaves residues that are burdened with surfactants and residues that contain metal ions. For the cleaning also mordents are used. The residues from the cooling tower contain organic ingredients (pollen, leaves, etc.) but also corrosion products of the cooling tower, chalk and iron hydroxide from additional water treatment. Per TJin 5 kg of residues from cooling tower are assumed.
  Amount was scaled to the amount of reference product.
  production volume 167341 kg; = amount_residue/electricity*electricity_apv
    (same comment as for hard coal ash)
  property price 0 EUR2005; name amount_residue_price_EUR2005
  properties: wet mass 1 kg, water content 0.428571, carbon content, fossil 0.0544233, dry mass 0.7 kg
- hard coal: 0.385653 kg; name hard_coal; = 0.0451 * factor_MJ_kWh; lognormal variance with pedigree 0.21, pedigree (5,5,5,5,5)
  Estimation. The calorific value of the consumed coal in the coal power plant (26.8 MJ/kg) is adapted to the country specific calorific value of the supply mix (23.2 MJ/kg). The calorific value of the consumed coal is derived from power plant operators. The calorific value of the supply mix is obtained from the proportions and different compositions of the different production regions.
  Amount was scaled to the amount of reference product.
  properties: wet mass 1 kg, water content 0.0638298, dry mass 0.94 kg, carbon content, fossil 0.845
  note on carbon content, fossil: C content 75-94% (specified in Tab 1.1, report 6, part VI). A mean content of 0.845 kg C/ kg dry hard coal was considered
- SOx retained, in hard coal flue gas desulfurisation: 0.00466888 kg; name sox_retained; = 0.000546 * factor_MJ_kWh; source Maude C. W. 1994; lognormal variance with pedigree 0.004, pedigree (3,1,3,1,1)
  Estimation. The amount of retained SOx is gathered from a bottom-up approach and based on the collection of information about single plants (Maude et al., 1994) with updated information for year 2000 (Jahrbuch 2001). Additionally country specific data is available from coal power plant operators (Tauschitz et al. 1997), (Verbund 2002), (Energie Oberösterreich 1999), (Steweag), (Guttenbrunner et al. 1998). For about 60% of installed capacity in hard coal power plants detailed values for emissions and electricity production are available.
  Further references:
  Klatt H.-J., Meller E., Middelschulte A., Milojcic G., Reichel W., Riemer H.-W. (2001) Jahrbuch 2001 der europaischen Energie- und Rohstoffwirtschaft, 108. Jg. Gückauf, Essen.
  Tauschitz J., Kager W., Voges W. (1997) Restwarmeauskopplung im Dampfkraftwerk Voitsberg 3 In: VGB KraftwerksTechnik 77 2/97 S. 98-103.
  Verbund (2002) Umweltbericht 2001. Österreichische Elektrizitatswirtschafts-Aktiengesellschaft (Verbundgesellschaft). Wien
  Energie Oberösterreich AG (1999) Umwelterklarung für den Standort Riedersbach, Riedersbach 1999, http://www.energieag.at/riedersbach/index.html und Informationen über das Kraftwerk Timelkam (www.energieag.at/lambach/kws/timelkam/seite1.html), 8.8.2002
  Steweag (2002) http://www.steweag-steg.com/plant/mellach.htm. Steirische Wasserkraft- und Elektrizitats-AG, 9.8.2002.
  Guttenbrunner M., Madlsperger G., Pfeffer S., Steiner H. (1998) Umrüstung der Braunhohle-Kraftwerke der Oberösterreichischen Kraftwerke AG auf Steinkohle. In: VGB KraftwerksTechnik 78 6/98 S. 81-86.
  Amount was scaled to the amount of reference product.
  properties: wet mass 1 kg, dry mass 1 kg
- water, completely softened: 0.0513064 kg; name water_softened_input; = 0.006 * factor_MJ_kWh; source Euler H. 1984; lognormal variance with pedigree 0.052025, pedigree (4,5,4,2,3)
  (same comment as for water, decarbonised)
  properties: wet mass 1 kg
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
## Inputs from nature
- Water, cooling, unspecified natural origin [natural resource, in water]: 0.0454106 m3; name water_cooling_UNO_input; = ((recirculating_CS_fraction_from_allCS*WWithdrawal_EP_HC_recirculating_CS)+(once_through_andCP_CS_fractio_from_allCS*WWithdrawal_EP_HC_once_through_andCP_CS))/11.31*factor_MJ_kWh; lognormal variance with pedigree 0.098025, pedigree (4,4,4,2,4)
  Estimation. The water for the ash removal is used without treatment. According to (Euler 1984) the share of river cooled power plants was 58% in 1978. 42% of the power plants were operated with wet cooling. According to (Brune et al. 1984) 33% of hard coal power plants are operated with wet cooling towers in 1980. Since 1978 practically all power plants have been built with wet cooling towers. It is believed that around 50% of river cooled power plants have been shut down or equipped with wet cooling towers. It results an assumed share of river cooled power plants of 25% in the whole UCTE area.
  Further references:
  Brune D., Stehfest H. (1984) Folgen eines verstarkten Kohleeinsatzes in der Bundesrepublik Deutschland; Teilbericht: Umweltfolgeanalysen für Abwasseremissionen und feste Rückstande aus der Kohlegewinnung und -nutzung. Kernforschungszentrum Karlsruhe KfK 3526.
  Amount was scaled to the amount of reference product.
  Calculated based on literature (Scown, C.D., et al., 2011, Water Footprint of U.S. Trasportation Fuels;Scown, C.D., et al., 2011, Water Footprint of U.S. Trasportation Fuels (SI); Stiegel, 2008, Estimating Freshwater Needs to Meet Future Thermoelectric Generation Requirements; Floerke, M., 2009, Future changes of freshwater needs in the electricity production sector), (Vionnet, S., Quantis Water Database - Technical Report, 2012). Water use in this process is modelled based on literature (see references). The process boundaries are given by the boundaries of the power plant. The process ends when the energy (MJ) is produced and ready to be used for electricity production (kWh).
  Calculated based on literature data.

## Emissions to nature
- Selenium [air, non-urban air or from high stacks]: 3.77957e-8 kg; name selenium; = 4.42E-09 * factor_MJ_kWh; lognormal variance with pedigree 0.732, pedigree (5,1,3,1,1)
  Modeled, based on 'electricity production, coal power plant, clean gas and trace element emissions' - pdf-document on the dedicated talk page of ecoinvent (www.ecoinvent.org/documentation).
  Amount was scaled to the amount of reference product.
- Xylene [air, non-urban air or from high stacks]: 7.88409e-6 kg; name xylene; = 9.22E-07 * factor_MJ_kWh; lognormal variance with pedigree 0.078025, pedigree (3,5,4,2,1)
  (same comment as for Selenium)
- Nickel [air, non-urban air or from high stacks]: 1.47078e-8 kg; name nickel; = 1.72E-09 * factor_MJ_kWh; lognormal variance with pedigree 0.732, pedigree (5,1,3,1,1)
  (same comment as for Selenium)
- Benzo(a)pyrene [air, non-urban air or from high stacks]: 1.71021e-12 kg; name benzo_a_pyrene; = 2E-13 * factor_MJ_kWh; lognormal variance with pedigree 0.078025, pedigree (3,5,4,2,1)
  (same comment as for Selenium)
- Radium-226 [air, non-urban air or from high stacks]: 1.65891e-6 kBq; name radium_226; = 1.94E-07 * factor_MJ_kWh; lognormal variance with pedigree 0.382, pedigree (5,1,3,1,1)
  (same comment as for Selenium)
- Manganese [air, non-urban air or from high stacks]: 2.20618e-8 kg; name manganese; = 2.58E-09 * factor_MJ_kWh; lognormal variance with pedigree 0.732, pedigree (5,1,3,1,1)
  (same comment as for Selenium)
- Radium-228 [air, non-urban air or from high stacks]: 1.66746e-6 kBq; name radium_228; = 1.95E-07 * factor_MJ_kWh; lognormal variance with pedigree 0.382, pedigree (5,1,3,1,1)
  (same comment as for Selenium)
- Lead [air, non-urban air or from high stacks]: 5.33587e-8 kg; name lead; = 6.24E-09 * factor_MJ_kWh; lognormal variance with pedigree 0.732, pedigree (5,1,3,1,1)
  (same comment as for Selenium)
- Antimony [air, non-urban air or from high stacks]: 6.67838e-10 kg; name antimony; = 7.81E-11 * factor_MJ_kWh; lognormal variance with pedigree 0.732, pedigree (5,1,3,1,1)
  (same comment as for Selenium)
- Butane [air, non-urban air or from high stacks]: 1.6247e-7 kg; name butane; = 1.9E-08 * factor_MJ_kWh; lognormal variance with pedigree 0.078025, pedigree (3,5,4,2,1)
  (same comment as for Selenium)
- PAH, polycyclic aromatic hydrocarbons [air, non-urban air or from high stacks]: 8.55107e-9 kg; name pah; = 1E-09 * factor_MJ_kWh; lognormal variance with pedigree 0.338025, pedigree (3,5,4,2,1)
  (same comment as for Selenium)
- Sulfur dioxide [air, non-urban air or from high stacks]: 0.000395059 kg; name sulfur_dioxide; = 4.62E-05 * factor_MJ_kWh; source Maude C. W. 1994; lognormal variance with pedigree 0.004, pedigree (3,1,3,1,1)
  Estimation. Data is out of a bottom-up approach and based on the collection of information about single plants (Maude et al., 1994) with updated information for year 2000 (Jahrbuch 2001). Additionally country specific data is available from coal power plant operators (Tauschitz et al. 1997), (Verbund 2002), (Energie Oberösterreich 1999), (Steweag), (Guttenbrunner et al. 1998). For about 60% of installed capacity in hard coal power plants detailed values for emissions and electricity production are available.
  Further references:
  Klatt H.-J., Meller E., Middelschulte A., Milojcic G., Reichel W., Riemer H.-W. (2001) Jahrbuch 2001 der europaischen Energie- und Rohstoffwirtschaft, 108. Jg. Gückauf, Essen.
  Tauschitz J., Kager W., Voges W. (1997) Restwarmeauskopplung im Dampfkraftwerk Voitsberg 3 In: VGB KraftwerksTechnik 77 2/97 S. 98-103.
  Verbund (2002) Umweltbericht 2001. Österreichische Elektrizitatswirtschafts-Aktiengesellschaft (Verbundgesellschaft). Wien
  Energie Oberösterreich AG (1999) Umwelterklarung für den Standort Riedersbach, Riedersbach 1999, http://www.energieag.at/riedersbach/index.html und Informationen über das Kraftwerk Timelkam (www.energieag.at/lambach/kws/timelkam/seite1.html), 8.8.2002
  Steweag (2002) http://www.steweag-steg.com/plant/mellach.htm. Steirische Wasserkraft- und Elektrizitats-AG, 9.8.2002.
  Guttenbrunner M., Madlsperger G., Pfeffer S., Steiner H. (1998) Umrüstung der Braunhohle-Kraftwerke der Oberösterreichischen Kraftwerke AG auf Steinkohle. In: VGB KraftwerksTechnik 78 6/98 S. 81-86.
  Amount was scaled to the amount of reference product.
- Hydrogen chloride [air, non-urban air or from high stacks]: 3.07838e-5 kg; name hydrogen_chloride; = 3.6E-06 * factor_MJ_kWh; lognormal variance with pedigree 0.202, pedigree (5,1,3,1,1)
  (same comment as for Selenium)
- Thorium-232 [air, non-urban air or from high stacks]: 1.41093e-6 kBq; name thorium_232; = 1.65E-07 * factor_MJ_kWh; lognormal variance with pedigree 0.382, pedigree (5,1,3,1,1)
  (same comment as for Selenium)
- Mercury [air, non-urban air or from high stacks]: 1.26556e-8 kg; name mercury; = 1.48E-09 * factor_MJ_kWh; lognormal variance with pedigree 0.732, pedigree (5,1,3,1,1)
  (same comment as for Selenium)
- Vanadium [air, non-urban air or from high stacks]: 4.44656e-9 kg; name vanadium; = 5.2E-10 * factor_MJ_kWh; lognormal variance with pedigree 0.732, pedigree (5,1,3,1,1)
  (same comment as for Selenium)
- Molybdenum [air, non-urban air or from high stacks]: 1.35962e-9 kg; name molybdenum; = 1.59E-10 * factor_MJ_kWh; lognormal variance with pedigree 0.732, pedigree (5,1,3,1,1)
  (same comment as for Selenium)
- Propene [air, non-urban air or from high stacks]: 1.36817e-7 kg; name propene; = 1.6E-08 * factor_MJ_kWh; lognormal variance with pedigree 0.078025, pedigree (3,5,4,2,1)
  (same comment as for Selenium)
- Polonium-210 [air, non-urban air or from high stacks]: 1.1715e-5 kBq; name polonium_210; = 1.37E-06 * factor_MJ_kWh; lognormal variance with pedigree 0.382, pedigree (5,1,3,1,1)
  (same comment as for Selenium)
- Uranium-238 [air, non-urban air or from high stacks]: 1.38527e-6 kBq; name uranium_238; = 1.62E-07 * factor_MJ_kWh; lognormal variance with pedigree 0.382, pedigree (5,1,3,1,1)
  (same comment as for Selenium)
- Lead-210 [air, non-urban air or from high stacks]: 6.42185e-6 kBq; name lead_210; = 7.51E-07 * factor_MJ_kWh; lognormal variance with pedigree 0.382, pedigree (5,1,3,1,1)
  (same comment as for Selenium)
- Toluene [air, non-urban air or from high stacks]: 9.32067e-7 kg; name toluene; = 1.09E-07 * factor_MJ_kWh; lognormal variance with pedigree 0.078025, pedigree (3,5,4,2,1)
  (same comment as for Selenium)
- Hydrocarbons, aliphatic, unsaturated [air, non-urban air or from high stacks]: 1.84703e-6 kg; name hydrocarbons_aliphatic_unsaturated; = 2.16E-07 * factor_MJ_kWh; lognormal variance with pedigree 0.078025, pedigree (3,5,4,2,1)
  (same comment as for Selenium)
- Pentane [air, non-urban air or from high stacks]: 1.25701e-6 kg; name pentane; = 1.47E-07 * factor_MJ_kWh; lognormal variance with pedigree 0.078025, pedigree (3,5,4,2,1)
  (same comment as for Selenium)
- Boron [air, non-urban air or from high stacks]: 1.81283e-6 kg; name boron; = 2.12E-07 * factor_MJ_kWh; lognormal variance with pedigree 0.732, pedigree (5,1,3,1,1)
  (same comment as for Selenium)
- Thorium-228 [air, non-urban air or from high stacks]: 8.97862e-7 kBq; name throium_228; = 1.05E-07 * factor_MJ_kWh; lognormal variance with pedigree 0.382, pedigree (5,1,3,1,1)
  (same comment as for Selenium)
- Nitrogen oxides [air, non-urban air or from high stacks]: 0.000524181 kg; name nitrogen_oxides; = 6.13E-05 * factor_MJ_kWh; source Maude C. W. 1994; lognormal variance with pedigree 0.044, pedigree (3,1,3,1,1)
  (same comment as for Sulfur dioxide)
- Formaldehyde [air, non-urban air or from high stacks]: 4.95962e-7 kg; name formaldehyde; = 5.8E-08 * factor_MJ_kWh; lognormal variance with pedigree 0.078025, pedigree (3,5,4,2,1)
  (same comment as for Selenium)
- Chromium [air, non-urban air or from high stacks]: 1.80428e-9 kg; name chromium; = 2.11E-10 * factor_MJ_kWh; lognormal variance with pedigree 0.732, pedigree (5,1,3,1,1)
  (same comment as for Selenium)
- Cadmium [air, non-urban air or from high stacks]: 7.74727e-10 kg; name cadmium; = 9.06E-11 * factor_MJ_kWh; lognormal variance with pedigree 0.732, pedigree (5,1,3,1,1)
  (same comment as for Selenium)
- Arsenic [air, non-urban air or from high stacks]: 2.57387e-9 kg; name arsenic; = 3.01E-10 * factor_MJ_kWh; lognormal variance with pedigree 0.732, pedigree (5,1,3,1,1)
  (same comment as for Selenium)
- Bromine [air, non-urban air or from high stacks]: 7.25131e-7 kg; name bromine; = 8.48E-08 * factor_MJ_kWh; lognormal variance with pedigree 0.202, pedigree (5,1,3,1,1)
  (same comment as for Selenium)
- Zinc [air, non-urban air or from high stacks]: 3.88219e-8 kg; name zinc; = 4.54E-09 * factor_MJ_kWh; lognormal variance with pedigree 0.732, pedigree (5,1,3,1,1)
  (same comment as for Selenium)
- Strontium [air, non-urban air or from high stacks]: 6.62708e-9 kg; name strontium; = 7.75E-10 * factor_MJ_kWh; lognormal variance with pedigree 0.732, pedigree (5,1,3,1,1)
  (same comment as for Selenium)
- Particulates, > 10 um [air, non-urban air or from high stacks]: 4.41235e-5 kg; name particulates_gt10; = 5.16E-06 * factor_MJ_kWh; source Maude C. W. 1994; lognormal variance with pedigree 0.122, pedigree (5,1,3,1,1)
  Estimation. Data is out of a bottom-up approach and based on the collection of information about single plants (Maude et al., 1994) with updated information for year 2000 (Jahrbuch 2001). Additionally country specific data is available from coal power plant operators (Tauschitz et al. 1997), (Verbund 2002), (Energie Oberösterreich 1999), (Steweag), (Guttenbrunner et al. 1998). For about 60% of installed capacity in hard coal power plants detailed values for emissions and electricity production are available.
  The filtration efficiency for particles with a high diameter is 100%. For particles <0.2 microm, which also have the highest trace element concentrations, the filtration efficiency is lower. Based on data from (LNRW 1993) 20% of the particles are >10 microm. Here it is assumed that 5% of the particles are >10 microm, 10% of the particles are between 2.5 and 10 microm, and 85% of the particles are <2.5 microm. Beside particles from the chimney further emissions occur through removals from freight cars, conveyor belts to the storage area, storage, inventory reduction, transportation to the silo, cooling tower, streets and chalk storage. In (Hesketh et al. 1983) different retention techniques are distinguished and an additional emission factor of 5kg per TJin is assumed for particles >10 microm.
  Further references:
  Klatt H.-J., Meller E., Middelschulte A., Milojcic G., Reichel W., Riemer H.-W. (2001) Jahrbuch 2001 der europaischen Energie- und Rohstoffwirtschaft, 108. Jg. Gückauf, Essen.
  Tauschitz J., Kager W., Voges W. (1997) Restwarmeauskopplung im Dampfkraftwerk Voitsberg 3 In: VGB KraftwerksTechnik 77 2/97 S. 98-103.
  Verbund (2002) Umweltbericht 2001. Österreichische Elektrizitatswirtschafts-Aktiengesellschaft (Verbundgesellschaft). Wien
  Energie Oberösterreich AG (1999) Umwelterklarung für den Standort Riedersbach, Riedersbach 1999, http://www.energieag.at/riedersbach/index.html und Informationen über das Kraftwerk Timelkam (www.energieag.at/lambach/kws/timelkam/seite1.html), 8.8.2002
  Steweag (2002) http://www.steweag-steg.com/plant/mellach.htm. Steirische Wasserkraft- und Elektrizitats-AG, 9.8.2002.
  Guttenbrunner M., Madlsperger G., Pfeffer S., Steiner H. (1998) Umrüstung der Braunhohle-Kraftwerke der Oberösterreichischen Kraftwerke AG auf Steinkohle. In: VGB KraftwerksTechnik 78 6/98 S. 81-86.
  LNRW (1993) Reduzierung der durch Kokerein verursachten Umweltbelastung. Landtag Nordrhein-Westfalen, Drucksache 11/5438. Düsseldorf.
  Amount was scaled to the amount of reference product.
- Particulates, < 2.5 um [air, non-urban air or from high stacks]: 2.32589e-5 kg; name particulates_lt2_5; = 2.72E-06 * factor_MJ_kWh; source Maude C. W. 1994; lognormal variance with pedigree 0.382, pedigree (5,1,3,1,1)
  (same comment as for Particulates, > 10 um)
- Propane [air, non-urban air or from high stacks]: 2.99287e-7 kg; name propane; = 3.5E-08 * factor_MJ_kWh; lognormal variance with pedigree 0.078025, pedigree (3,5,4,2,1)
  (same comment as for Selenium)
- Dioxins, measured as 2,3,7,8-tetrachlorodibenzo-p-dioxin [air, non-urban air or from high stacks]: 5.98575e-14 kg; name dioxins; = 7E-15 * factor_MJ_kWh; lognormal variance with pedigree 0.338025, pedigree (3,5,4,2,1)
  (same comment as for Selenium)
- Cobalt [air, non-urban air or from high stacks]: 1.56485e-9 kg; name cobalt; = 1.83E-10 * factor_MJ_kWh; lognormal variance with pedigree 0.732, pedigree (5,1,3,1,1)
  (same comment as for Selenium)
- Barium [air, non-urban air or from high stacks]: 4.438e-8 kg; name barium; = 5.19E-09 * factor_MJ_kWh; lognormal variance with pedigree 0.732, pedigree (5,1,3,1,1)
  (same comment as for Selenium)
- Hydrocarbons, aliphatic, alkanes, unspecified [air, non-urban air or from high stacks]: 1.87268e-6 kg; name hydrocarbons_al_al_unspec; = 2.19E-07 * factor_MJ_kWh; lognormal variance with pedigree 0.078025, pedigree (3,5,4,2,1)
  (same comment as for Selenium)
- Hydrogen fluoride [air, non-urban air or from high stacks]: 2.34299e-5 kg; name hydrogen_fluoride; = 2.74E-06 * factor_MJ_kWh; lognormal variance with pedigree 0.202, pedigree (5,1,3,1,1)
  (same comment as for Selenium)
- Chromium VI [air, non-urban air or from high stacks]: 2.23183e-10 kg; name chromium_vi; = 2.61E-11 * factor_MJ_kWh; lognormal variance with pedigree 0.482, pedigree (1,1,3,1,1)
  (same comment as for Selenium)
- Carbon monoxide, fossil [air, non-urban air or from high stacks]: 6.84086e-5 kg; name carbon_monoxide_fossil; = 8E-06 * factor_MJ_kWh; lognormal variance with pedigree 0.672025, pedigree (3,4,4,2,1)
  (same comment as for Selenium)
- Methane, fossil [air, non-urban air or from high stacks]: 8.55107e-6 kg; name methane_fossil; = 1E-06 * factor_MJ_kWh; lognormal variance with pedigree 0.072025, pedigree (3,4,4,2,1)
  (same comment as for Selenium)
- Radon-222 [air, non-urban air or from high stacks]: 0.00429264 kBq; name radon_222; = 0.000502 * factor_MJ_kWh; lognormal variance with pedigree 0.382, pedigree (5,1,3,1,1)
  (same comment as for Selenium)
- Radon-220 [air, non-urban air or from high stacks]: 0.00241995 kBq; name radon_220; = 0.000283 * factor_MJ_kWh; lognormal variance with pedigree 0.382, pedigree (5,1,3,1,1)
  (same comment as for Selenium)
- Copper [air, non-urban air or from high stacks]: 7.72162e-9 kg; name copper; = 9.03E-10 * factor_MJ_kWh; lognormal variance with pedigree 0.732, pedigree (5,1,3,1,1)
  (same comment as for Selenium)
- Benzene [air, non-urban air or from high stacks]: 1.85558e-6 kg; name benzene; = 2.17E-07 * factor_MJ_kWh; lognormal variance with pedigree 0.078025, pedigree (3,5,4,2,1)
  (same comment as for Selenium)
- Dinitrogen monoxide [air, non-urban air or from high stacks]: 3.33492e-5 kg; name dinitrogen_monoxide; = 3.9E-06 * factor_MJ_kWh; lognormal variance with pedigree 0.072025, pedigree (3,4,4,2,1)
  (same comment as for Selenium)
- Carbon dioxide, fossil [air, non-urban air or from high stacks]: 0.8038 kg; name carbon_dioxide_fossil; = 0.094 * factor_MJ_kWh; source OECD 1991; lognormal variance with pedigree 0.004, pedigree (3,1,3,1,1)
  Literature value. In a hard coal power plant 94 t per TJin of carbon dioxide emissions occur.
  Amount was scaled to the amount of reference product.
- Potassium-40 [air, non-urban air or from high stacks]: 1.37672e-5 kBq; name potassium_40; = 1.61E-06 * factor_MJ_kWh; lognormal variance with pedigree 0.382, pedigree (5,1,3,1,1)
  (same comment as for Selenium)
- Iodine [air, non-urban air or from high stacks]: 1.35962e-7 kg; name iodine; = 1.59E-08 * factor_MJ_kWh; lognormal variance with pedigree 0.202, pedigree (5,1,3,1,1)
  (same comment as for Selenium)
- Water [air, unspecified]: 0.00118004 m3; name water_to_air_unspecified; = (water_softened_input/1000)*fraction_WCS_to_air+(water_decarbonised_input/1000)*fraction_WDC_to_air+water_cooling_UNO_input*fraction_CW_to_air; lognormal variance with pedigree 0.0427, pedigree (2,2,3,1,1)
  Calculated value based on literature values and expert opinion. See comments in the parametres' comment field.
  property fraction, origin: fresh water 0.0338067; name fraction_origin_fresh_water
  property fraction, origin: unspecified 0.966193; name fraction_origin_unspecified
  property fraction, origin: salt water 0; name fraction_origin_salt_water
- Particulates, > 2.5 um, and < 10um [air, non-urban air or from high stacks]: 2.73634e-6 kg; name particulates_2_5_to_10; = 3.2E-07 * factor_MJ_kWh; source Maude C. W. 1994; lognormal variance with pedigree 0.202, pedigree (5,1,3,1,1)
  (same comment as for Particulates, > 10 um)
- Water [water, unspecified]: 0.0455646 m3; name water_to_water_unspecified; = (water_softened_input/1000)*(1-fraction_WCS_to_air)+(water_decarbonised_input/1000)*(1-fraction_WDC_to_air)+water_cooling_UNO_input*(1-fraction_CW_to_air); lognormal variance with pedigree 0.0427, pedigree (2,2,3,1,1)
  (same comment as for Water)
  property wet mass 1000 kg; name WM
  property fraction, origin: fresh water 0.0283958; name fraction_origin_fresh_water_Ww
  property carbon content, fossil 0; name C_content_fossil
  property dry mass 0 kg; name DM
  property water in wet mass 1000 kg; name WWM
  property carbon content, non-fossil 0; name C_content_non_fossil
  property fraction, origin: unspecified 0.971604; name fraction_origin_unspecified_Ww
  property fraction, origin: salt water 0; name fraction_origin_salt_water_Ww
- Ethane [air, non-urban air or from high stacks]: 3.50594e-7 kg; name ethane; = 4.1E-08 * factor_MJ_kWh; lognormal variance with pedigree 0.078025, pedigree (3,5,4,2,1)
  (same comment as for Selenium)
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
## Sampling procedure
Based on literature and statistics as well as country-specific data from coal power plant operators in Austria.

## Extrapolations
Data from 1993 have been updated for the years 2000 (v1.0), and 2004-2005 (v2.0). Uncertainty was adjusted accordingly.

## Review by Carl Vadenbo 2015-07-23
The update of the whole electricity sector for the ecoinvent v3.2 database consist of hundreds of datasets. All these datasets have passed through a streamlined review processes where the underlying modelling of production volumes, technology shares and efficiencies was reviewed in detail prior to the datasets being submitted to the database.
