# treatment of used printer, laser, by mechanical treatment

Dataset: EcoSpold 2, unit process
Geography: GLO
Time period: 2005-01-01 to 2019-12-31
Technology level: current
Classification: EcoSpold01Categories: waste management/recycling
Classification: ISIC rev.4 ecoinvent: 3830:Materials recovery
Tags: Treatment; ConvertedDataset
Scenario: Business-as-Usual
System model: Allocation at the point of substitution
Generated by: Roland Hischier
Published in: Hischier R. 2007
Database: ecoinvent
isCopyrightProtected: true
accessRestrictedTo: 1

## General comment
manual dismantling plus subsequent shredding/separation procedure, based on common transfer coefficients for both steps. Data from literature and from own experiences in Switzerland.
[This dataset was already contained in the ecoinvent database version 2. It was not individually updated during the transfer to ecoinvent version 3. Life Cycle Impact Assessment results may still have changed, as they are affected by changes in the supply chain, i.e. in other datasets. This dataset was generated following the ecoinvent quality guidelines for version 2. It may have been subject to central changes described in the ecoinvent version 3 change report (http://www.ecoinvent.org/database/ecoinvent-version-3/reports-of-changes/), and the results of the central updates were reviewed extensively. The changes added e.g. consistent water flows and other information throughout the database. The documentation of this dataset can be found in the ecoinvent reports of version 2, which are still available via the ecoinvent website. The change report linked above covers all central changes that were made during the conversion process.]

## Included activities end
This dataset represents the mechanical treatment of a WEEE devices in Switzerland. Two process steps are included: manual depollution and the mechanical treatment (shredder) of the remaining part.

## Geography
European data, used as average for global situation

## Technology
4-step-procedure (shredder - separation - shredder - separation) as used currently often in Europe

## Reference product
- used printer, laser: 0 kg; By-product classification Waste; CPC 39990: Other wastes n.e.c.
  EcoSpold01Location=GLO
  production volume 0 kg; = 0.77 * 15680441.25*2
    Assumption: 77% globally are mechanically treated, the rest is dismantled manually. See ecoinvent v.2.2 report. Total amount of dismantling assumed to be equal to total amount of production globally.
  property carbon content, fossil 0.583701
    Composition data from laser jet printer, divided by its weight 5.87 kg (Tab 4.12, ecoinvent v2.2 report 18_V)
  property carbon content, non-fossil 0
    (same comment as for used printer, laser)
  property price 0 EUR2005
    Waste products are assigned a price of zero as they are assumed to require further treatment.
  property carbon content 0.583701
    carbon content on a dry matter basis (reserved; not for manual entry)
  properties: water in wet mass 0 kg, water content 0, dry mass 1 kg, wet mass 1 kg, carbon allocation 0.583701 kg
- iron scrap, sorted, pressed: 1 kg; By-product classification Recyclable; CPC 39310: Slag, dross, scalings and other waste from the manufacture of iron or steel; pedigree (1,1,1,1,1)
  replaces the original flow "Fe fraction of used printer, laser, from mechanical treatment"
  production volume 3.12355e6 kg

## By-products
- iron scrap, sorted, pressed: 0 kg; By-product classification Recyclable; CPC 39310: Slag, dross, scalings and other waste from the manufacture of iron or steel; pedigree (1,1,1,1,1)
  replaces the original flow "Fe fraction of used printer, laser, from mechanical treatment"
  production volume 0 kg; = ABS( Ref('ac7e6025-547f-4711-b582-98d465623fe4')/ Ref('3c3b3e81-ff78-418d-80cd-a1f52037b56e')* Ref('3c3b3e81-ff78-418d-80cd-a1f52037b56e', 'ProductionVolume'))
    Unkonwn
    Calculated from the production volume of used printer, laser in proportion to the respective output amounts.
  property wet mass 1 kg; name WM
  property carbon content, non-fossil 0; name C_content_non_fossil
  property carbon content, fossil 0; name C_content_fossil
  property dry mass 1 kg; name DM
  property water in wet mass 0 kg; name WWM
  property price 0.175 EUR2005
    Temporary price data. Calculated as 90% of purchasers price based on: 2005 import and export prices (total trades (USD) divided by total weight (kg) in biggest economies of the world: EU27, USA, Brasil, China, India, Japan and Russia) from UN Commodity Trade Statistics Database (http://data.un.org/Explorer.aspxDatabase [Accessed 2011.06.20]). Commodity: Waste or scrap, of cast iron
  property water content 0; name water_content
  property carbon content 0
    carbon content on a dry matter basis (reserved; not for manual entry)
  properties: carbon allocation 0 kg
- lead: 0 kg; CPC 41441: Lead, unwrought; By-product classification allocatable product
  EcoSpold01Location=SE
  property price 0.744 EUR2005
    Temporary price data. Calculated as 90% of purchasers price based on: Source: ecoinvent v2 report 10-part IX, Tab 5.10 & 2.5
  property carbon content 0
    carbon content on a dry matter basis (reserved; not for manual entry)
  properties: wet mass 1 kg, water content 0, carbon content, non-fossil 0, carbon content, fossil 0, dry mass 1 kg, water in wet mass 0 kg, carbon allocation 0 kg
- copper: 0 kg; By-product classification allocatable product; CPC 41413: Refined copper and copper alloys, unwrought; master alloys of copper
  EcoSpold01Location=SE
  property price 5.52 EUR2005
    Literature value (http://www.economist.com/news/business/21576714-mining-industry-has-enriched-chile-its-future-precarious-copper-solution). Average price between 20015 and 2013.
  property carbon content 0
    carbon content on a dry matter basis (reserved; not for manual entry)
  properties: water content 0, water in wet mass 0 kg, carbon content, fossil 0, carbon content, non-fossil 0, dry mass 1 kg, wet mass 1 kg, carbon allocation 0 kg
- nickel, 99.5%: 0 kg; CPC 41422: Unwrought nickel; By-product classification allocatable product
  EcoSpold01Location=SE
  property price 10.4 EUR2005
    Temporary price data. Calculated as 90% of purchasers price based on: 2004 nickel price from USGS (2007) Mineral commodity summaries 2007. <http://minerals.usgs.gov/minerals/pubs/mcs/2007/mcs2007.pdf> [Accessed 25 May 2010]
  property carbon content 0
    carbon content on a dry matter basis (reserved; not for manual entry)
  properties: water in wet mass 0 kg, wet mass 1 kg, carbon content, non-fossil 0, dry mass 1 kg, water content 0, carbon content, fossil 0, carbon allocation 0 kg
- silver: 0 kg; CPC 41310: Silver (including silver plated with gold or platinum), unwrought or in semi-manufactured forms, or in powder […]; By-product classification allocatable product; CAS 7440-22-4
  EcoSpold01Location=SE
  property price 178 EUR2005
    (same comment as for lead)
  property carbon content 0
    carbon content on a dry matter basis (reserved; not for manual entry)
  properties: wet mass 1 kg, carbon content, non-fossil 0, dry mass 1 kg, water content 0, carbon content, fossil 0, water in wet mass 0 kg, carbon allocation 0 kg
- palladium: 0 kg; CPC 4160: Other non-ferrous metals and articles thereof (including waste and scrap of some metals); cermets and articles […]; By-product classification allocatable product
  EcoSpold01Location=SE
  property price 5640 EUR2005
    Temporary price data. Calculated as 90% of purchasers price based on: 2004 price from USGS (2007) Mineral commodity summaries 2007. <http://minerals.usgs.gov/minerals/pubs/mcs/2007/mcs2007.pdf> [Accessed 25 May 2010]
  property carbon content 0
    carbon content on a dry matter basis (reserved; not for manual entry)
  properties: wet mass 1 kg, carbon content, fossil 0, water in wet mass 0 kg, water content 0, carbon content, non-fossil 0, dry mass 1 kg, carbon allocation 0 kg
- gold: 0 kg; CPC 41320: Gold (including gold plated with platinum), unwrought or in semi-manufactured forms, or in powder form; By-product classification allocatable product; CAS 7440-57-5
  EcoSpold01Location=SE
  property price 10600 EUR2005
    Temporary price data. Calculated as 90% of purchasers price based on: Source: ecoinvent v2 report 10-part IX, Tab 2.5
  property carbon content 0
    carbon content on a dry matter basis (reserved; not for manual entry)
  properties: wet mass 1 kg, carbon content, fossil 0, dry mass 1 kg, carbon content, non-fossil 0, water content 0, water in wet mass 0 kg, carbon allocation 0 kg
- electricity, for reuse in municipal waste incineration only: 0 kWh; CPC 17100: Electrical energy; By-product classification allocatable product; pedigree (1,1,1,1,1)
  Net electricity generated from this waste and used in internal MSWI plant energy redistribution.
  Uncertainty: uncertainty is calculated from uncertainties in waste composition and uncertainties in energy efficiency and the uncertainty in internal energy demand
  property price 0.1 EUR2005; name E_el_prod_MSWI_price_EUR2005
    Estimated to be the same price as in case of electricity, medium voltage.
  property exergy 3.6 MJ; name E_el_prod_MSWI_exergy
    This exergy property is based on the exergy content of the product.
  property true value relation 3.6; name E_el_prod_MSWI_true_value_relation
    property to calculate "true value" from
- heat, for reuse in municipal waste incineration only: 0 MJ; CPC 17300: Steam and hot water; By-product classification allocatable product; pedigree (1,1,1,1,1)
  Net useful heat generated from this waste and used in internal MSWI plant energy redistribution.
  Uncertainty: uncertainty is calculated from uncertainties in waste composition and uncertainties in energy efficiency and the uncertainty in internal energy demand
  property true value relation 0.1842; name E_th_prod_MSWI_true_value_relation
    property to calculate "true value" from
  property exergy 0.1842 MJ; name E_th_prod_MSWI_exergy
    This exergy property is based on the exergy content of the product.
  property price 0.0106 EUR2005; name E_th_prod_MSWI_price_EUR2005
    Average European district heat price from Ecoheatcool and Euroheat 2005-2006, Ecoheat Work package 1: The European heat market. Final report. 10.6 EUR/GJ i s the price of district heat. http://www.solarthermalworld.org/files/Ecoheatcool%20WP1%20Web.pdf?download
- zinc concentrate: 0 kg; CPC 14290: Other non-ferrous metal ores and concentrates (other than uranium or thorium ores and concentrates); By-product classification allocatable product
  Calculated value from the knowledge of the properties of both products.
  property price 0.38 EUR2005; name ByP_price_EUR2005
    Temporary price data. Calculated as 90% of purchasers price based on: Zinc content in concentrate 53%. Concentrate price per kg Zn 86.5% of refined Zn price (13.5% treatment charges according to CHR Metals Limited 2005: Dynamic cost curves. http://www.minecost.com/dynamic.pdf). 2004 zinc price from USGS (2007) Mineral commodity summaries 2007. <http://minerals.usgs.gov/minerals/pubs/mcs/2007/mcs2007.pdf> [Accessed 25 May 2010]
  property zinc content 0.53; name zinc_C_zinc_concentrate
    Zinc content on a dry matter basis. Value taken from teh "zinc mine operation" /GLO dataset.
  property dry mass 1 kg; name DM_zinc_concentrate
  property carbon content 0
    carbon content on a dry matter basis (reserved; not for manual entry)
  properties: wet mass 1 kg, water content 0, carbon content, non-fossil 0, carbon content, fossil 0, water in wet mass 0 kg, carbon allocation 0 kg
- iron scrap, unsorted: 0 kg; source European Aluminium Association 2008; CPC 39310: Slag, dross, scalings and other waste from the manufacture of iron or steel; By-product classification Recyclable; pedigree (1,1,1,1,1)
  property price 0.149 EUR2005; name ironScrapAmount_price_EUR2005
    Temporary price data. Calculated as 90% of purchasers price based on: estimated at 85% of sorted scrap
  property carbon content 0
    carbon content on a dry matter basis (reserved; not for manual entry)
  properties: water in wet mass 0 kg, water content 0, carbon content, fossil 0, carbon content, non-fossil 0, dry mass 1 kg, wet mass 1 kg, carbon allocation 0 kg
- aluminium oxide, non-metallurgical: 0 kg; source European Aluminium Association 2008; CPC 41432: Alumina (aluminium oxide), except artificial corundum; By-product classification allocatable product; CAS 1344-28-1; pedigree (1,1,1,1,1)
  property carbon content, non-fossil 0; name C_content_non_fossil
  property price 0.28 EUR2005; name Al2O3Amount_price_EUR2005
    From UN trade database. http://data.un.org/ Import data from the largest economies of the world are used (Brazil, India, USA, China, Japan and EU-27).
  property dry mass 1 kg; name DM
  property water content 0; name water_content
  property wet mass 1 kg; name WM
  property water in wet mass 0 kg; name WWM
  property carbon content, fossil 0; name C_content_fossil
  property carbon content 0
    carbon content on a dry matter basis (reserved; not for manual entry)
  properties: carbon allocation 0 kg
- aluminium, cast alloy: 0 kg; source European Aluminium Association 2008; By-product classification allocatable product; CPC 41431: Unwrought aluminium; pedigree (1,1,1,1,1)
  EcoSpold01Location=RER
  property price 1.3 EUR2005; name castAlloyAmount_price_EUR2005
    Temporary price data. Calculated as 90% of purchasers price based on: Source: London Metal Exchange, Aluminium alloy price for 2005
  property carbon content 0
    carbon content on a dry matter basis (reserved; not for manual entry)
  properties: water in wet mass 0 kg, carbon content, non-fossil 0, water content 0, dry mass 1 kg, carbon content, fossil 0, wet mass 1 kg, carbon allocation 0 kg
- aluminium, wrought alloy: 0 kg; source European Aluminium Association 2008; By-product classification allocatable product; CPC 4153: Semi-finished products of aluminium or aluminium alloys; pedigree (1,1,1,1,1)
  property price 1.44 EUR2005; name secondaryAluminiumOutput_price_EUR2005
    Estimated based on literature values and expert judgement. Aluminium ccast alloys are about 90% of the price of aluminium wrought alloys.
  property carbon content 0
    carbon content on a dry matter basis (reserved; not for manual entry)
  properties: wet mass 1 kg, water content 0, carbon content, fossil 0, water in wet mass 0 kg, carbon content, non-fossil 0, dry mass 1 kg, carbon allocation 0 kg
- heat, district or industrial, other than natural gas: 0 MJ; CPC 17300: Steam and hot water; By-product classification allocatable product; pedigree (1,1,1,1,1)
  net production of heat from landfill gas utilisation.
  Uncertainty: U
  property price 0.0106 EUR2005
    (same comment as for heat, for reuse in municipal waste incineration only)
  property carbon content 0
    carbon content on a dry matter basis (reserved; not for manual entry)
  properties: wet mass 1 kg, water content 0, water in wet mass 0 kg, true value relation 0.1842, dry mass 1 kg, carbon content, non-fossil 0, carbon content, fossil 0, carbon allocation 0 kg
- electricity, medium voltage: 0 kWh; By-product classification allocatable product; CPC 17100: Electrical energy; pedigree (1,1,1,1,1)
  net production of electricity from landfill gas utilisation (minus electricity demand for landfill gas pumping).
  Uncertainty: U
  property price 0.1 EUR2005
    Calculated to be between the price of electricity, high voltage and electricity, low voltage.
  properties: true value relation 3.6

## Inputs from technosphere
- waste polystyrene: 0 kg; pedigree (1,1,1,1,1)
  EcoSpold01Location=CH
  Calculated - based on composition data
  Uncertainty: calculated - based on composition data
  production volume 0 kg; = ABS( Ref('490233ea-0ecb-428c-9879-5e9634a069b3')/ Ref('3c3b3e81-ff78-418d-80cd-a1f52037b56e')* Ref('3c3b3e81-ff78-418d-80cd-a1f52037b56e', 'ProductionVolume'))
    Calculated from the production volume of used printer, laser in proportion to the respective output amounts.
  properties: dry mass 0.998 kg, wet mass 1 kg, carbon content, fossil 0.922579, water content 0.00200401
- waste plastic, consumer electronics: 0 kg; pedigree (1,1,1,1,1)
  Calculated - based on composition data
  EcoSpold01Location=CH
  Uncertainty: calculated - based on composition data
  production volume 0 kg; = ABS( Ref('4ad10221-a286-457f-9937-97840c8749f5')/ Ref('3c3b3e81-ff78-418d-80cd-a1f52037b56e')* Ref('3c3b3e81-ff78-418d-80cd-a1f52037b56e', 'ProductionVolume'))
    (same comment as for waste polystyrene)
  properties: carbon content, fossil 0.830215, dry mass 0.847 kg, water content 0.180638, wet mass 1 kg
  note on carbon content, fossil: C content in 1 kg DM was calculated using data in Tab A.2, ecoinvent v2.2 report 13_I
- electronics scrap: 0 kg; pedigree (1,1,1,1,1)
  replaces the original flow "Cu fraction of used printer, laser, from mechanical treatment"
  production volume 0 kg; = ABS( Ref('8bbbc7d8-433a-4981-a46d-5edec564d4ba')/ Ref('3c3b3e81-ff78-418d-80cd-a1f52037b56e')* Ref('3c3b3e81-ff78-418d-80cd-a1f52037b56e', 'ProductionVolume'))
    (same comment as for iron scrap, sorted, pressed)
  properties: dry mass 1 kg, price 16.1 EUR2005, wet mass 1 kg
- residue from mechanical treatment, laser printer: 0 kg; pedigree (1,1,1,1,1)
  (same comment as for waste polystyrene)
  production volume 0 kg; = ABS( Ref('2e57ec13-13c5-41f2-b075-57f71b1875c1')/ Ref('3c3b3e81-ff78-418d-80cd-a1f52037b56e')* Ref('3c3b3e81-ff78-418d-80cd-a1f52037b56e', 'ProductionVolume'))
    (same comment as for waste polystyrene)
  properties: wet mass 1 kg, dry mass 1 kg, carbon content, fossil 0.796604
  note on carbon content, fossil: Tab 4.34, ecoinvent v2.2 report 18_V, for details in fraction composition. Carbon content in plastic was calculated using data in Tab A.2, ecoinvent v2.2 report 13_I. Others was also considered plastic, and calculated the same way (from pg 70, ecoinvent v2.2 report 18_V). Ferro was assumed to have a C content of 0.012 kg C/ kg (C content of steel, calculated out of emission factors published in Commission Decision of 18 July 2007 establishing guidelines for the monitoring and reporting of greenhouse gas emissions pursuant to Directive 2003/87/EC of the European Parliament and of the Council (notified under document number C(2007) 3416)). The other component of the fraction were considered to content no C.
- used cable: 0 kg; pedigree (1,1,1,1,1)
  Calculated - based on composition data
  Uncertainty: calculated - based on composition data
  production volume 0 kg; = ABS(Ref('3c3b3e81-ff78-418d-80cd-a1f52037b56e', 'ProductionVolume') * (Ref('fba06752-d1e2-471c-98aa-a8dad6a37c0a') / Ref('3c3b3e81-ff78-418d-80cd-a1f52037b56e')))
    Calculated from production volume of reference product using the relative outputs.
  properties: dry mass 1 kg, carbon content, fossil 183.274, wet mass 1 kg
- aluminium scrap, post-consumer, prepared for melting: 0 kg; pedigree (1,1,1,1,1)
  replaces the original flow "Al fraction of used printer, laser, from mechanical treatment"
  production volume 0 kg; = ABS( Ref('a2f9ad2f-d86f-4781-bf31-3797ca9959c6')/ Ref('3c3b3e81-ff78-418d-80cd-a1f52037b56e')* Ref('3c3b3e81-ff78-418d-80cd-a1f52037b56e', 'ProductionVolume'))
    (same comment as for iron scrap, sorted, pressed)
  properties: dry mass 1 kg, wet mass 1 kg, price 0.806 EUR2005
- waste electric and electronic equipment: 0 kg; pedigree (1,1,1,1,1)
  EcoSpold01Location=GLO
  Rough estimation
  Uncertainty: rough estimation
  production volume 0 kg; = ABS(Ref('c181cc6f-137a-4b49-a870-5a925ba7c95f')/ Ref('3c3b3e81-ff78-418d-80cd-a1f52037b56e')* Ref('3c3b3e81-ff78-418d-80cd-a1f52037b56e', 'ProductionVolume'))
    (same comment as for waste polystyrene)
  properties: carbon content, fossil 0.0877555, dry mass 1 kg, carbon content, non-fossil 0.000485011, wet mass 1 kg
- waste polystyrene: -8.65975e-5, -6.67616e-6, -2.75749e-6, -2.6185e-6, -9.99184e-5, -1.114e-6, -5.04907e-7, -0.000699484 kg (8 entries); lognormal variance with pedigree 0.054, pedigree (3,4,5,1,1)
  (same comment as for waste polystyrene)
- waste plastic, consumer electronics: 0, 0 kg (2 entries); pedigree (1,1,1,1,1)
  (same comment as for waste plastic, consumer electronics)
- residue from mechanical treatment, laser printer: 0, 0 kg (2 entries); pedigree (1,1,1,1,1)
  (same comment as for waste polystyrene)
- photovoltaic cell factory: 4.59943e-11 unit; lognormal variance with pedigree 0.3701, pedigree (1,4,5,3,3)
  EcoSpold01Location=DE
  Proxy with calculated value. Photovoltaic cell factory is used assuming a 25 years life-time and a production volume of 3’000’000 pieces per year.
- copper: 0.000717874 kg; source Jemai 2005; lognormal variance with pedigree 0.0521, pedigree (1,4,5,3,1)
  Estimation, based on literature.
  EcoSpold01Location=RER
- synthetic rubber: 5.89892e-5 kg; source Jemai 2005; lognormal variance with pedigree 0.0701, pedigree (1,4,5,3,3)
  Literature Value.
  EcoSpold01Location=RER
- plug, inlet and outlet, for computer cable: 0.00344966 unit; lognormal variance with pedigree 0.0521, pedigree (1,4,5,3,1)
  Measured Value.
  EcoSpold01Location=GLO
- polyethylene, high density, granulate: 0.000215949 kg; source Jemai 2005; lognormal variance with pedigree 0.0701, pedigree (1,4,5,3,3)
  Literature Value.
  EcoSpold01Location=RER
- aluminium, wrought alloy: 4.66808e-5 kg; lognormal variance with pedigree 0.0701, pedigree (1,4,5,3,3)
  Literature Value.
- cable, printer cable, without plugs: 0.00620938 m; lognormal variance with pedigree 0.0521, pedigree (1,4,5,3,1)
  EcoSpold01Location=GLO
  Measured Value.
- magnesium: 0.000267004 kg; source Jemai 2005; lognormal variance with pedigree 0.0701, pedigree (1,4,5,3,3)
  EcoSpold01Location=RER
  Estimation, based on literature.
- sheet rolling, copper: 0.000178002 kg; source Jemai 2005; lognormal variance with pedigree 0.0701, pedigree (1,4,5,3,3)
  Estimation, based on literature.
  EcoSpold01Location=RER
- sheet rolling, steel: 0.000413614 kg; source Jemai 2005; lognormal variance with pedigree 0.0701, pedigree (1,4,5,3,3)
  EcoSpold01Location=RER
  Literature Value.
- steel, low-alloyed, hot rolled: 0.000323923 kg; source Jemai 2005; lognormal variance with pedigree 0.0701, pedigree (1,4,5,3,3)
  Literature Value.
  EcoSpold01Location=RER
- section bar extrusion, aluminium: 6.86482e-5 kg; source Jemai 2005; lognormal variance with pedigree 0.0701, pedigree (1,4,5,3,3)
  Literature Value.
  EcoSpold01Location=RER
- aluminium, cast alloy: 2.19674e-5 kg; lognormal variance with pedigree 0.0701, pedigree (1,4,5,3,3)
  Literature Value.
- toner module, laser printer, black/white: 0.00172483 unit; lognormal variance with pedigree 0.0521, pedigree (1,4,5,3,1)
  Measured Value.
  EcoSpold01Location=GLO
- polystyrene foam slab: 0.000899671 kg; source Jemai 2005; lognormal variance with pedigree 0.0521, pedigree (1,4,5,3,1)
  EcoSpold01Location=RER
  Estimation, based on literature.
  Further references:
  Hewlett Packard (2001) Environmental Profile - HP LaserJet 1200 Series Printers. Download of 07.02.14 from <http://www.hp.com/hpinfo/globalcitizenship/environment/productdata/pdf/eds_laserj_c7044a_v1.pdf>.
- electricity, medium voltage: 0.00574955 kWh; source Jemai 2005; lognormal variance with pedigree 0.0707, pedigree (2,4,5,3,3)
  Estimation, based on literature.
  EcoSpold01Location=UCTE
- cable, connector for computer, without plugs: 0.00620938 m; source Jemai 2005; lognormal variance with pedigree 0.0521, pedigree (1,4,5,3,1)
  Measured Value.
  EcoSpold01Location=GLO
- stretch blow moulding: 0.000215949 kg; source Jemai 2005; lognormal variance with pedigree 0.0701, pedigree (1,4,5,3,3)
  EcoSpold01Location=RER
  Literature Value.
- packaging film, low density polyethylene: 0.000121428 kg; source Jemai 2005; lognormal variance with pedigree 0.0521, pedigree (1,4,5,3,1)
  Estimation, based on literature.
  Further references:
  Hewlett Packard (2001) Environmental Profile - HP LaserJet 1200 Series Printers. Download of 07.02.14 from <http://www.hp.com/hpinfo/globalcitizenship/environment/productdata/pdf/eds_laserj_c7044a_v1.pdf>.
  EcoSpold01Location=RER
- steel, chromium steel 18/8, hot rolled: 0.00443626 kg; source Jemai 2005; lognormal variance with pedigree 0.0521, pedigree (1,4,5,3,1)
  Literature Value.
  EcoSpold01Location=RER
- magnesium-alloy, AZ91, diecast: 0.000267004 kg; source Jemai 2005; lognormal variance with pedigree 0.0701, pedigree (1,4,5,3,3)
  Estimation, based on literature.
  EcoSpold01Location=RER
- plug, inlet and outlet, for printer cable: 0.00344966 unit; source Jemai 2005; lognormal variance with pedigree 0.0521, pedigree (1,4,5,3,1)
  Measured Value.
  EcoSpold01Location=GLO
- injection moulding: 0.0098912 kg; source Jemai 2005; lognormal variance with pedigree 0.0701, pedigree (1,4,5,3,3)
  EcoSpold01Location=RER
  Literature Value.
- polystyrene, high impact: 0.00976253 kg; source Jemai 2005; lognormal variance with pedigree 0.0701, pedigree (1,4,5,3,3)
  EcoSpold01Location=RER
  Literature Value.
- used printer, laser: -0.0202495 kg; lognormal variance with pedigree 0.0701, pedigree (1,4,5,3,3)
  Literature Value.
  production volume 9.20442e7 kg
- wire drawing, copper: 0.000539871 kg; source Jemai 2005; lognormal variance with pedigree 0.0701, pedigree (1,4,5,3,3)
  Literature Value.
  EcoSpold01Location=RER
- tap water: 0.0855515 kg; source Jemai 2005; lognormal variance with pedigree 0.0701, pedigree (1,4,5,3,3)
  EcoSpold01Location=RER
  Literature Value.
- wastewater, unpolluted: -1.30811e-6, -0.000162206 m3 (2 entries); source Jemai 2005; lognormal variance with pedigree 0.0701, pedigree (1,4,5,3,3)
  EcoSpold01Location=CH
  Estimation, based on literature.
  Further references:
  Hewlett Packard (2001) Environmental Profile - HP LaserJet 1200 Series Printers. Download of 07.02.14 from <http://www.hp.com/hpinfo/globalcitizenship/environment/productdata/pdf/eds_laserj_c7044a_v1.pdf>.
  production volume 743253 m3
- epoxy resin, liquid: 1.21249e-5, 5.75582e-5 kg (2 entries); source Jemai 2005; lognormal variance with pedigree 0.0701, pedigree (1,4,5,3,3)
  Literature Value.
  EcoSpold01Location=RER
- waste polyethylene: -1.1688e-5, -9.01077e-7, -3.72177e-7, -3.53417e-7, -1.34859e-5, -1.50355e-7, -6.8147e-8, -9.44089e-5 kg (8 entries); source Jemai 2005; lognormal variance with pedigree 0.0521, pedigree (1,4,5,3,1)
  Estimation, based on literature.
  Further references:
  Hewlett Packard (2001) Environmental Profile - HP LaserJet 1200 Series Printers. Download of 07.02.14 from <http://www.hp.com/hpinfo/globalcitizenship/environment/productdata/pdf/eds_laserj_c7044a_v1.pdf>.
  EcoSpold01Location=CH
  production volume 551952 kg
- corrugated board box: 0.000928827, 4.15286e-5, 0.003528 kg (3 entries); source Jemai 2005; lognormal variance with pedigree 0.0521, pedigree (1,4,5,3,1)
  (same comment as for packaging film, low density polyethylene)
- flat glass, uncoated: 8.4237e-7, 4.09064e-6 kg (2 entries); source Jemai 2005; lognormal variance with pedigree 0.0701, pedigree (1,4,5,3,3)
  Literature Value.
  EcoSpold01Location=RER
- toner module, laser printer, colour: 0.00172483 unit; lognormal variance with pedigree 0.0521, pedigree (1,4,5,3,1)
  Measured Value.
  EcoSpold01Location=GLO

## Inputs from nature
- Water, well, in ground [natural resource, in water]: 7.83072e-5 m3; source Jemai 2005; lognormal variance with pedigree 0.0701, pedigree (1,4,5,3,3)
  Literature Value.

## Emissions to nature
- Water [air, unspecified]: 9.99538e-6 m3; lognormal variance with pedigree 0.0807, pedigree (2,2,5,1,1)
  Calculated value based on literature values and expert opinion. See comments in the parametres' comment field.

## Sampling procedure
literature and own experiences

## Review by Jürgen Sutter 2007-08-31
passed.

## Review by Bo Weidema 2012-05-31
Passed. This dataset is based on an earlier ecoinvent dataset. The outputs are now specified in terms of materials that can be treated by existing treatment activities.
