# treatment of waste glass, municipal incineration with fly ash extraction

Dataset: EcoSpold 2, unit process
Geography: CH
Time period: 2006-01-01 to 2019-12-31
Technology level: current
Classification: ISIC rev.4 ecoinvent: 3821:Treatment and disposal of non-hazardous waste
Synonyms: municipal waste incineration
Scenario: Business-as-Usual
System model: Allocation at the point of substitution
Share of production covered: 1.8 %
Generated by: Gabor Doka
Published in: Doka G. 2015
Database: ecoinvent
isCopyrightProtected: true
accessRestrictedTo: 1

## General comment
This dataset represents the activity of waste disposal of waste glass in a municipal solid waste incinerator (MSWI) // Recommended use of this dataset: For disposal of glass which goes to incineration as part of a larger item or in small amounts only, as part of communal waste mixture eg. packaging glass. Larger separated amounts of glass fractions will not be disposed in incinerators, but rather go to recycling or landfill. // // Waste composition (wet, in ppm): upper heating value 0.1423 MJ/kg; lower heating value 0.04602 MJ/kg; H2O 20000; O 483070; H n.a.; C n.a.; S n.a.; N n.a.; P n.a.; B n.a.; Cl 195.89; Br n.a.; F n.a.; I n.a.; Ag n.a.; As n.a.; Ba n.a.; Cd n.a.; Co n.a.; Cr 303.63; Cu 7.8356; Hg n.a.; Mn n.a.; Mo n.a.; Ni n.a.; Pb 38.688; Sb n.a.; Se n.a.; Sn n.a.; V n.a.; Zn 3.9178; Be n.a.; Sc n.a.; Sr n.a.; Ti n.a.; Tl n.a.; W n.a.; Si 359090; Fe n.a.; Ca 72818; Al n.a.; K n.a.; Mg n.a.; Na 64472; // Share of carbon in waste that is biogenic 60.4%. // Share of metals in waste not oxidised and bulk-recyclable (exclude very small or thin parts) Iron: 0%; Alu: 0%; Copper: 0%. // Recovery of metal scrap from bottom ash to recycling: 0g iron scrap, 0g aluminium scrap, 0g copper scrap.Ultimately one kg of this waste produces 1.156 kg of bottom ash (can include some washed ash) and 0 kg of residues, which are landfilled (technology mix). Net energy production: 0MJ/kg electric energy and 0.01MJ/kg thermal energy. //

## Included activities start
waste incineration from waste reception gate and delivery into waste bunker at incinerator plant site (without transports to the incinerator)

## Included activities end
Waste-specific short-term emissions to water from leachate. Long-term emissions from landfill to ground water.

## Geography
Specific to the technology mix encountered in Switzerland in 2012.

## Technology
average Swiss MSWI plants in 2010 (grate incinerators) with electrostatic precipitator for fly ash (ESP), wet flue gas scrubber and 25% SNCR , 42.77% SCR-high dust , 32.68% SCR-low dust -DeNOx facilities and 0% without Denox (weighted according to mass of burnt waste, representing Swiss average). Efficiency of iron scrap separation from slag : 58%. Efficiency of non-ferrous scrap separation from slag : 31%. The technology mix for this dataset includes a filter ash treatment (FLUWA) of a share of 46.22%. Gross electric efficiency technology mix 15.84% and Gross thermal efficiency technology mix 28.51%

## Time period
Waste composition as given in literature reference, theoretical data or other source. Transfer coefficients for modern MSWI.

## Reference product
- waste glass: 0 kg; CPC 37111: Glass in the mass, in balls (except microspheres), rods or tubes, unworked; waste and scrap of glass; By-product classification Waste
  Main reference product of this activity (supply of disposal service).
  production volume 0 kg
    based on corresponding global production volume of MSW fraction in conventional MSWI (wo fly ash extraction) and scaled down to annual Swiss incinerated MSW mass of 3.02 mio. tonnes.
  property price 0 EUR2005
    Waste products are assigned a price of zero as they are assumed to require further treatment.
  properties: wet mass 1 kg, water in wet mass 0.02 kg, zinc content 3.9978e-6, calcium content 0.074304, silicon content 0.36642, chromium content 0.00030983, copper content 7.9955e-6, dry mass 0.98 kg, lead content 3.9478e-5, water content 0.020408, sodium content 0.065787, oxygen content 0.49293, chlorine content 0.00019989
- heat, for reuse in municipal waste incineration only: 1 MJ; CPC 17300: Steam and hot water; By-product classification allocatable product; pedigree (1,1,1,1,1)
  Net useful heat generated from this waste and used in internal MSWI plant energy redistribution.
  Uncertainty: uncertainty is calculated from uncertainties in waste composition and uncertainties in energy efficiency and the uncertainty in internal energy demand
  production volume 2.9735e6 MJ

## By-products
- heat, for reuse in municipal waste incineration only: 0 MJ; name E_th_prod_MSWI; CPC 17300: Steam and hot water; By-product classification allocatable product; pedigree (1,1,1,1,1)
  (same comment as for heat, for reuse in municipal waste incineration only)
  production volume 0 MJ
    calculated in proportion to reference product waste input to incinerator
  property price 0.0106 EUR2005; name E_th_prod_MSWI_price_EUR2005
    Average European district heat price from Ecoheatcool and Euroheat 2005-2006, Ecoheat Work package 1: The European heat market. Final report. 10.6 EUR/GJ i s the price of district heat. http://www.solarthermalworld.org/files/Ecoheatcool%20WP1%20Web.pdf?download

## Inputs from technosphere
- transport, freight, lorry, unspecified: 0 metric ton*km; pedigree (1,1,1,1,1)
  Transport services to transport incineration residues to landfills and filter ash to external treatments (FLUWA).
  Uncertainty: uncertainty calculated from uncertainty of the waste composition of this waste, uncertainty of transfer coefficients and the uncertainty in generic transportation distances
- municipal waste incineration facility: 0 unit
  Demands per kilogram waste.
- electricity, for reuse in municipal waste incineration only: 0 kWh; name E_el_prod_MSWI; pedigree (1,1,1,1,1)
  Net electricity required to incinerate this waste (subsidiesed from high-calorific waste fractions).
  Uncertainty: uncertainty is calculated from uncertainties in waste composition and uncertainties in energy efficiency and the uncertainty in internal energy demand
- process-specific burdens, slag landfill: 0 kg; pedigree (1,1,1,1,1)
  Mass-specific expenditures required for landfilling of bottom ash.;activityLink introduced to establish a direct link to the corresponding regional supply of this product
  Uncertainty: uncertainty is calculated from uncertainties in waste composition and transfer coefficients in incinerator
- slag landfill: 0 unit; pedigree (1,1,1,1,1)
  Landfill infrastructure required for landfilling of bottom ash.
  Uncertainty: uncertainty is calculated from uncertainties in waste composition and transfer coefficients in incinerator
- wire drawing, copper: 8.97512e-8 kg; source Volvo Truck Corporation 2004; lognormal variance with pedigree 0.16, pedigree (1,1,5,1,1)
  Estimated value. Based on the material composition of a Volvo FH as available from product declaration.
  EcoSpold01Location=RER
- wastewater from lorry production: -7.00522e-11 m3; source MAN Nutzfahrzeuge AG 2000; lognormal variance with pedigree 0.05, pedigree (1,1,5,1,1)
  Literature value. Data represent MAN production sites in Germany and comprises: final truck assembly, engine manufacturing, manufacturing of metal parts. Data available from environmental reports of the company.
  Additional references:
  MAN Nutzfahrzeuge AG (2002) Umwelterklärung 2002. MAN Nutzfahrzeuge AG, München
  EcoSpold01Location=CH
  production volume 2.18 m3
- alkyd paint, white, without solvent, in 60% solution state: 3.18313e-7 kg; source Volvo Truck Corporation 2004; lognormal variance with pedigree 0.08, pedigree (1,1,5,1,1)
  EcoSpold01Location=RER
  Estimated value. Based on the material composition of a Volovo FH as available from product declaration.
- lead: 3.17848e-8 kg; source Volvo Truck Corporation 2004; lognormal variance with pedigree 0.05, pedigree (1,1,5,1,1)
  EcoSpold01Location=RER
  Estimated value. Based on the material composition of a Volvo FH as available from product declaration.
- tap water: 4.98008e-7 kg; source MAN Nutzfahrzeuge AG 2002; lognormal variance with pedigree 0.05, pedigree (1,1,5,1,1)
  EcoSpold01Location=RER
  Calculated value. About 95% of the consumed tap water and groundwater are used in the final assembly of vehicles (own calculations based on MAN Nutzfahrzeuge AG (2002)).
- sheet rolling, steel: 0.000424916 kg; source Volvo Truck Corporation 2004; lognormal variance with pedigree 0.05, pedigree (1,1,5,1,1)
  (same comment as for wire drawing, copper)
- refrigerant R134a: 8.82705e-12 kg; source Volvo Truck Corporation 2004; lognormal variance with pedigree 0.08, pedigree (1,1,5,1,1)
  (same comment as for wire drawing, copper)
- pig iron: 6.98153e-8 kg; source Volvo Truck Corporation 2004; lognormal variance with pedigree 0.08, pedigree (1,1,5,1,1)
  EcoSpold01Location=GLO
  Estimated value. Based on the material composition of a Volvo FH as available from product declaration.
- nitric acid, without water, in 50% solution state: 1.58207e-12 kg; source MAN Nutzfahrzeuge AG 2000; lognormal variance with pedigree 0.05, pedigree (1,1,5,1,1)
  Literature value. Data represent MAN production sites in Germany and comprises: final truck assembly, engine manufacturing, manufacturing of metal parts. Data available from environmental reports of the company.
  Additional references:
  MAN Nutzfahrzeuge AG (2002) Umwelterklärung 2002. MAN Nutzfahrzeuge AG, München
  EcoSpold01Location=RER
- steel, chromium steel 18/8, hot rolled: 7.84985e-8 kg; source Volvo Truck Corporation 2004; lognormal variance with pedigree 0.16, pedigree (1,1,5,1,1)
  (same comment as for wire drawing, copper)
- propylene glycol, liquid: 5.16466e-10 kg; source Volvo Truck Corporation 2004; lognormal variance with pedigree 0.05, pedigree (1,1,5,1,1)
  (same comment as for wire drawing, copper)
- copper: 4.76673e-6 kg; source Volvo Truck Corporation 2004; lognormal variance with pedigree 0.16, pedigree (1,1,5,1,1)
  (same comment as for alkyd paint, white, without solvent, in 60% solution state)
- heat, district or industrial, natural gas: 6.80532e-7 MJ; source MAN Nutzfahrzeuge AG 2000; lognormal variance with pedigree 0.05, pedigree (1,1,5,1,1)
  EcoSpold01Location=RER
  Literature value. Energy expenditures for stationary combustion processes are available from environmental reports of a German lorry manufacturer MAN Nutzfahrzeuge AG (2000)andMAN Nutzfahrzeuge AG (2000). The data is available for various manufacturing sites performing different tasks in the manufacturing chain. The total value used in this study comprises stamping processes, metal part and wiring harness manufacturing, engine production and testing as well as the final assembly.
  Additional references:
  MAN Nutzfahrzeuge AG (2002) Umwelterklärung 2002. MAN Nutzfahrzeuge AG, München.
- brass: 4.26153e-10 kg; source Volvo Truck Corporation 2004; lognormal variance with pedigree 0.08, pedigree (1,1,5,1,1)
  EcoSpold01Location=CH
  Estimated value. Based on the material composition of a Volovo FH as available from product declaration.
- cast iron: 0.000379085 kg; source Volvo Truck Corporation 2004; lognormal variance with pedigree 0.08, pedigree (1,1,5,1,1)
  (same comment as for alkyd paint, white, without solvent, in 60% solution state)
- tempering, flat glass: 1.22704e-6 kg; source Volvo Truck Corporation 2004; lognormal variance with pedigree 0.08, pedigree (1,1,5,1,1)
  (same comment as for lead)
- hydrochloric acid, without water, in 30% solution state: 3.03565e-12 kg; source MAN Nutzfahrzeuge AG 2000; lognormal variance with pedigree 0.05, pedigree (1,1,5,1,1)
  Literature value. Data represent MAN production sites in Germany and comprises: final truck assembly, engine manufacturing, manufacturing of metal parts. Data available from environmental reports of the company.
  Additional references:
  MAN Nutzfahrzeuge AG (2002) Umwelterklärung 2002. MAN Nutzfahrzeuge AG, München]
  EcoSpold01Location=RER
- polyethylene, high density, granulate: 4.01556e-6 kg; source Volvo Truck Corporation 2004; lognormal variance with pedigree 0.16, pedigree (1,1,5,1,1)
  (same comment as for wire drawing, copper)
- heat, district or industrial, other than natural gas: 3.72624e-6 MJ; source MAN Nutzfahrzeuge AG 2000; lognormal variance with pedigree 0.05, pedigree (1,1,5,1,1)
  Literature value. Energy expenditures for stationary combustion processes are available from environmental reports of a German lorry manufacturer MAN Nutzfahrzeuge AG (2000)andMAN Nutzfahrzeuge AG (2000). The data is available for various manufacturing sites performing different tasks in the manufacturing chain. The total value used in this study comprises stamping processes, metal part and wiring harness manufacturing, engine production and testing as well as the final assembly.
  Additional references:
  MAN Nutzfahrzeuge AG (2002) Umwelterklärung 2002. MAN Nutzfahrzeuge AG, München.
  EcoSpold01Location=RER
- sulfuric acid: 5.35702e-9 kg; source Volvo Truck Corporation 2004; lognormal variance with pedigree 0.05, pedigree (1,1,5,1,1)
  (same comment as for wire drawing, copper)
- lime, hydrated, packed: 3.23318e-10, 3.75081e-8 kg (2 suppliers, which the file names only by identifier); sum of these 3.78315e-8 kg; source MAN Nutzfahrzeuge AG 2000; lognormal variance with pedigree 0.2106, pedigree (5,5,5,5,5)
  EcoSpold01Location=CH
  Literature value. Data represent MAN production sites in Germany and comprises: final truck assembly, engine manufacturing, manufacturing of metal parts. Data available from environmental reports of the company. For Ca(OH)2, 50% H2O is assumed.
  Additional references:
  MAN Nutzfahrzeuge AG (2002) Umwelterklärung 2002. MAN Nutzfahrzeuge AG, München
  Uncertainty: 2, 50% H2O is assumed.
- road vehicle factory: 0, 0 unit (2 suppliers, which the file names only by identifier); pedigree (1,1,1,1,1)
  Estimated value. Expenditures for the infrastructure of a road vehicle plant have been estimated and linked to vehicle manufacturing.
  EcoSpold01Location=RER
- diesel, burned in building machine: 9.35232e-8 MJ; source MAN Nutzfahrzeuge AG 2000; lognormal variance with pedigree 0.34, pedigree (1,1,5,1,1)
  Literature value. Diesel is used for engine testing and the operation of fork-lifters. The latter is modeled as building machine. Energy expenditures for stationary combustion processes are available from environmental reports of a German lorry manufacturer MAN Nutzfahrzeuge AG (2000) and MAN Nutzfahrzeuge AG (2002). The data is available for various manufacturing sites performing different tasks in the manufacturing chain. The total value used in this study comprises stamping processes, metal part and wiring harness manufacturing, engine production and testing as well as the final assembly.
  Additional references:
  MAN Nutzfahrzeuge AG (2002) Umwelterklärung 2002. MAN Nutzfahrzeuge AG, München.
  EcoSpold01Location=GLO
- reinforcing steel: 5.56125e-5 kg; source Volvo Truck Corporation 2004; lognormal variance with pedigree 0.05, pedigree (1,1,5,1,1)
  (same comment as for wire drawing, copper)
- synthetic rubber: 7.8295e-7 kg; source Volvo Truck Corporation 2004; lognormal variance with pedigree 0.08, pedigree (1,1,5,1,1)
  (same comment as for wire drawing, copper)
- flat glass, coated: 3.1538e-5 kg; source Volvo Truck Corporation 2004; lognormal variance with pedigree 0.08, pedigree (1,1,5,1,1)
  (same comment as for alkyd paint, white, without solvent, in 60% solution state)
- electricity, medium voltage: 8.87094e-7 kWh; source MAN Nutzfahrzeuge AG 2000; lognormal variance with pedigree 0.05, pedigree (1,1,5,1,1)
  Literature value. Energy expenditures for stationary combustion processes are available from environmental reports of a German lorry manufacturer MAN Nutzfahrzeuge AG (2000)andMAN Nutzfahrzeuge AG (2000). The data is available for various manufacturing sites performing different tasks in the manufacturing chain. The total value used in this study comprises stamping processes, metal part and wiring harness manufacturing, engine production and testing as well as the final assembly.
  Additional references:
  MAN Nutzfahrzeuge AG (2002) Umwelterklärung 2002. MAN Nutzfahrzeuge AG, München.
  EcoSpold01Location=UCTE
- used bus: -4.41352e-12 unit; lognormal variance with pedigree 0.342, pedigree (3,1,5,1,1)
  Uncertainty: own calculations
  production volume 1.32237 unit
- acetic acid, without water, in 98% solution state: 2.12084e-12 kg; source MAN Nutzfahrzeuge AG 2002; lognormal variance with pedigree 0.05, pedigree (1,1,5,1,1)
  EcoSpold01Location=RER
  Data represent MAN production sites in Germany and comprises: final truck assembly, engine manufacturing, manufacturing of metal parts. Data available from environmental reports of the company.
- lubricating oil: 1.27508e-6 kg; source MAN Nutzfahrzeuge AG 2000; lognormal variance with pedigree 0.16, pedigree (1,1,5,1,1)
  (same comment as for nitric acid, without water, in 50% solution state)
- section bar rolling, steel: 4.1431e-7 kg; source Volvo Truck Corporation 2004; lognormal variance with pedigree 0.08, pedigree (1,1,5,1,1)
  (same comment as for wire drawing, copper)
- diesel: 2.6823e-9 kg; source MAN Nutzfahrzeuge AG 2000; lognormal variance with pedigree 0.34, pedigree (1,1,5,1,1)
  EcoSpold01Location=RER
  Literature value. Diesel is used for engine testing and the operation of fork-lifters. The latter is modeled as building machine. Energy expenditures for stationary combustion processes are available from environmental reports of a German lorry manufacturer MAN Nutzfahrzeuge AG (2000) and MAN Nutzfahrzeuge AG (2002). The data is available for various manufacturing sites performing different tasks in the manufacturing chain. The total value used in this study comprises stamping processes, metal part and wiring harness manufacturing, engine production and testing as well as the final assembly.
  Additional references:
  MAN Nutzfahrzeuge AG (2002) Umwelterklärung 2002. MAN Nutzfahrzeuge AG, München.
- aluminium, cast alloy: 2.82025e-7 kg; source Volvo Truck Corporation 2004; lognormal variance with pedigree 0.16, pedigree (1,1,5,1,1)
  Estimated value. Based on the material composition of a Volovo FH as available from product declaration.
- sodium hydroxide, without water, in 50% solution state: 1.8986e-6 kg; source MAN Nutzfahrzeuge AG 2000; lognormal variance with pedigree 0.05, pedigree (1,1,5,1,1)
  EcoSpold01Location=RER
  Literature value. Data represent MAN production sites in Germany and comprises: final truck assembly, engine manufacturing, manufacturing of metal parts. Data available from environmental reports of the company.
  Additional references:
  MAN Nutzfahrzeuge AG (2002) Umwelterklärung 2002. MAN Nutzfahrzeuge AG, München
- steel, low-alloyed, hot rolled: 0.0011371 kg; source Volvo Truck Corporation 2004; lognormal variance with pedigree 1.37, pedigree (1,1,5,1,1)
  (same comment as for wire drawing, copper)
- stone wool, packed: 1.57032e-8 kg; source Volvo Truck Corporation 2004; lognormal variance with pedigree 0.05, pedigree (1,1,5,1,1)
  EcoSpold01Location=CH
  Estimated value. Based on the material composition of a Volvo FH as available from product declaration.
- pitch: 3.25625e-10, 2.66241e-7 kg (2 suppliers, which the file names only by identifier); sum of these 2.66567e-7 kg; source Volvo Truck Corporation 2004; lognormal variance with pedigree 0.05, pedigree (1,1,5,1,1)
  Estimated value. Based on the material composition of a Volovo FH as available from product declaration.
  EcoSpold01Location=RER
- wastewater, average: -2.3045e-10, -3.2026e-8 m3 (2 suppliers, which the file names only by identifier); sum of these -3.22564e-8 m3; source MAN Nutzfahrzeuge AG 2000; lognormal variance with pedigree 0.05, pedigree (1,1,5,1,1)
  EcoSpold01Location=CH
  Literature value. Data represent MAN production sites in Germany and comprises: final truck assembly, engine manufacturing, manufacturing of metal parts. Data available from environmental reports of the company.
  Additional references:
  MAN Nutzfahrzeuge AG (2002) Umwelterklärung 2002. MAN Nutzfahrzeuge AG, München
  production volume 15.9 m3
- flat glass, coated: 3.87086e-9 kg; source Volvo Truck Corporation 2004; lognormal variance with pedigree 0.082, pedigree (1,1,5,5,1)
  (same comment as for alkyd paint, white, without solvent, in 60% solution state)
- alkyd paint, white, without solvent, in 60% solution state: 1.42363e-8 kg; source Volvo Truck Corporation 2004; lognormal variance with pedigree 0.082, pedigree (1,1,5,5,1)
  (same comment as for alkyd paint, white, without solvent, in 60% solution state)
- nitric acid, without water, in 50% solution state: 1.58313e-12 kg; source MAN Nutzfahrzeuge AG 2000; lognormal variance with pedigree 0.052, pedigree (1,1,5,5,1)
  (same comment as for sodium hydroxide, without water, in 50% solution state)
- section bar rolling, steel: 3.23078e-7 kg; source Volvo Truck Corporation 2004; lognormal variance with pedigree 0.082, pedigree (1,1,5,5,1)
  (same comment as for wire drawing, copper)
- tempering, flat glass: 3.57911e-9 kg; source Volvo Truck Corporation 2004; lognormal variance with pedigree 0.082, pedigree (1,1,5,5,1)
  (same comment as for lead)
- hydrochloric acid, without water, in 30% solution state: 1.42593e-8 kg; source MAN Nutzfahrzeuge AG 2000; lognormal variance with pedigree 0.052, pedigree (1,1,5,5,1)
  (same comment as for hydrochloric acid, without water, in 30% solution state)
- sheet rolling, steel: 8.67236e-8 kg; source Volvo Truck Corporation 2004; lognormal variance with pedigree 0.052, pedigree (1,1,5,5,1)
  (same comment as for lead)
- propylene glycol, liquid: 8.18574e-10 kg; source Volvo Truck Corporation 2004; lognormal variance with pedigree 0.052, pedigree (1,1,5,5,1)
  (same comment as for lead)
- sulfuric acid: 2.83007e-8 kg; source Volvo Truck Corporation 2004; lognormal variance with pedigree 0.052, pedigree (1,1,5,5,1)
  (same comment as for lead)
- wastewater, average: -3.44843e-10 m3; source MAN Nutzfahrzeuge AG 2000; lognormal variance with pedigree 0.052, pedigree (1,1,5,5,1)
  (same comment as for wastewater, average)
  production volume 47.7 m3
- brass: 4.24132e-10 kg; source Volvo Truck Corporation 2004; lognormal variance with pedigree 0.082, pedigree (1,1,5,5,1)
  (same comment as for brass)
- lubricating oil: 1.4597e-9 kg; source MAN Nutzfahrzeuge AG 2000; lognormal variance with pedigree 0.162, pedigree (1,1,5,5,1)
  (same comment as for sodium hydroxide, without water, in 50% solution state)
- wire drawing, copper: 8.98029e-8 kg; source Volvo Truck Corporation 2004; lognormal variance with pedigree 0.162, pedigree (1,1,5,5,1)
  (same comment as for lead)
- pitch: 1.77278e-11, 1.01034e-12, 4.57278e-11, 2.04971e-12, 2.92616e-12, 2.58504e-10 kg (6 suppliers, which the file names only by identifier); sum of these 3.27946e-10 kg; source Volvo Truck Corporation 2004; lognormal variance with pedigree 0.052, pedigree (1,1,5,5,1)
  (same comment as for pitch)
- diesel: 1.14994e-10, 5.52826e-12, 2.32085e-10, 1.62566e-11, 2.3497e-11, 2.29172e-9 kg (6 suppliers, which the file names only by identifier); sum of these 2.68408e-9 kg; source MAN Nutzfahrzeuge AG 2000; lognormal variance with pedigree 0.342, pedigree (1,1,5,5,1)
  Literature value. Diesel is used for engine testing and the operation of fork-lifters. The latter is modeled as building machine. Energy expenditures for stationary combustion processes are available from environmental reports of a German lorry manufacturer MAN Nutzfahrzeuge AG (2000) and MAN Nutzfahrzeuge AG (2002). The data is available for various manufacturing sites performing different tasks in the manufacturing chain. The total value used in this study comprises stamping processes, metal part and wiring harness manufacturing, engine production and testing as well as the final assembly.
  Additional references:
  MAN Nutzfahrzeuge AG (2002) Umwelterklärung 2002. MAN Nutzfahrzeuge AG, München.
  EcoSpold01Location=RER
- tap water: 1.13803e-8, 9.45422e-8, 1.88079e-8, 4.74261e-7, 1.0163e-7, 3.50946e-8, 5.4272e-6 kg (7 suppliers, which the file names only by identifier); sum of these 6.16292e-6 kg; source MAN Nutzfahrzeuge AG 2002; lognormal variance with pedigree 0.052, pedigree (1,1,5,5,1)
  (same comment as for tap water)
- heat, district or industrial, natural gas: 5.1877e-8, 2.93287e-6 MJ (2 suppliers, which the file names only by identifier); sum of these 2.98474e-6 MJ; source MAN Nutzfahrzeuge AG 2000; lognormal variance with pedigree 0.052, pedigree (1,1,5,5,1)
  (same comment as for heat, district or industrial, other than natural gas)
- heat, district or industrial, other than natural gas: 2.00254e-9, 4.46692e-6 MJ (2 suppliers, which the file names only by identifier); sum of these 4.46892e-6 MJ; source MAN Nutzfahrzeuge AG 2000; lognormal variance with pedigree 0.052, pedigree (1,1,5,5,1)
  (same comment as for heat, district or industrial, natural gas)
- electricity, medium voltage: 3.63291e-8, 6.61037e-9, 1.12102e-7, 1.62536e-6, 2.3262e-7, 7.62157e-7 kWh (6 suppliers, which the file names only by identifier); sum of these 2.77518e-6 kWh; source MAN Nutzfahrzeuge AG 2000; lognormal variance with pedigree 0.052, pedigree (1,1,5,5,1)
  (same comment as for electricity, medium voltage)
- sawnwood, hardwood, dried (u=20%), planed: 3.95211e-12 m3; lognormal variance with pedigree 0.0521, pedigree (1,4,5,3,1)
  EcoSpold01Location=RER
- metal working factory: 0 unit; pedigree (1,1,1,1,1)
  activityLink introduced to establish a direct link to the corresponding regional supply of this product
  EcoSpold01Location=RER
- aluminium, wrought alloy: 9.94783e-6 kg; lognormal variance with pedigree 0.05, pedigree (1,1,5,1,1)
  composite
  EcoSpold01Location=RER
- polyvinylchloride, emulsion polymerised: 2.45518e-9 kg; lognormal variance with pedigree 0.0521, pedigree (1,4,5,3,1)
  EcoSpold01Location=RER
- polyurethane, rigid foam: 5.1696e-8 kg; lognormal variance with pedigree 0.05, pedigree (1,1,5,1,1)
  EcoSpold01Location=RER
  composite
- waste plastic, mixture: -7.94403e-10 kg; lognormal variance with pedigree 0.0521, pedigree (1,4,5,3,1)
  EcoSpold01Location=CH
  production volume 0.0363 kg
- glass fibre reinforced plastic, polyamide, injection moulded: 3.55313e-9 kg; lognormal variance with pedigree 0.05, pedigree (1,1,5,1,1)
  composite
  EcoSpold01Location=RER
- seal, natural rubber based: 3.296e-9 kg; lognormal variance with pedigree 0.05, pedigree (1,1,5,1,1)
  EcoSpold01Location=DE
  composite
- extrusion, plastic film: 1.09639e-8 kg; lognormal variance with pedigree 0.0521, pedigree (1,4,5,3,1)
  (same comment as for metal working factory)
- glazing, triple, U<0.5 W/m2K: 1.60826e-8 m2; lognormal variance with pedigree 0.0521, pedigree (1,4,5,3,1)
  EcoSpold01Location=RER
- waste wood, untreated: -2.87555e-10 kg; lognormal variance with pedigree 0.0521, pedigree (1,4,5,3,1)
  EcoSpold01Location=CH
  production volume 0.0203 kg
- powder coat, steel: 1.25504e-8 m2; lognormal variance with pedigree 0.0521, pedigree (1,4,5,3,1)
  (same comment as for metal working factory)
- stone wool: 0.000109841 kg; lognormal variance with pedigree 0.0521, pedigree (1,4,5,3,1)
  EcoSpold01Location=CH
- used triple glazing, U<0.5W/m2K: -3.15574e-10 m2; lognormal variance with pedigree 0.0521, pedigree (1,4,5,3,1)
  EcoSpold01Location=CH
  production volume 0.0135 m2
- section bar extrusion, aluminium: 5.41114e-8 kg; lognormal variance with pedigree 0.05, pedigree (1,1,5,1,1)
  EcoSpold01Location=RER
  composite
- plywood, for indoor use: 1.92648e-11 m3; lognormal variance with pedigree 0.0521, pedigree (1,4,5,3,1)
  EcoSpold01Location=RER
- polystyrene, extruded: 4.72192e-10 kg; lognormal variance with pedigree 0.0521, pedigree (1,4,5,3,1)
  EcoSpold01Location=RER
- adhesive, for metal: 2.80472e-10 kg; lognormal variance with pedigree 0.0521, pedigree (1,4,5,3,1)
  EcoSpold01Location=DE
- glass wool mat: 1.1067e-8 kg; lognormal variance with pedigree 0.0521, pedigree (1,4,5,3,1)
  EcoSpold01Location=CH
- powder coat, aluminium sheet: 1.14455e-8 m2; lognormal variance with pedigree 0.05, pedigree (1,1,5,1,1)
  composite
  EcoSpold01Location=RER
- zinc coat, coils: 2.3949e-9 m2; lognormal variance with pedigree 0.0521, pedigree (1,4,5,3,1)
  EcoSpold01Location=RER
  activityLink introduced to establish a direct link to the corresponding regional supply of this product
- polyvinylchloride, suspension polymerised: 1.6777e-8 kg; lognormal variance with pedigree 0.0521, pedigree (1,4,5,3,1)
  EcoSpold01Location=RER
- waste mineral wool, for final disposal: -3.29667e-10, -0.000109177 kg (2 suppliers, which the file names only by identifier); sum of these -0.000109177 kg; lognormal variance with pedigree 0.0521, pedigree (1,4,5,3,1)
  EcoSpold01Location=CH
  production volume 0.0234 kg
- powder coat, aluminium sheet: 7.44215e-9 m2; lognormal variance with pedigree 0.052, pedigree (1,1,5,5,1)
  EcoSpold01Location=RER
  composite
- metal working factory: 0 unit; pedigree (1,1,1,1,1)
  EcoSpold01Location=RER
- extrusion, plastic film: 1.58682e-8 kg; lognormal variance with pedigree 0.054, pedigree (1,4,5,5,1)
  EcoSpold01Location=RER
- polyurethane, rigid foam: 9.18504e-7 kg; lognormal variance with pedigree 0.052, pedigree (1,1,5,5,1)
  composite
  EcoSpold01Location=RER
- adhesive, for metal: 1.8237e-10 kg; lognormal variance with pedigree 0.054, pedigree (1,4,5,5,1)
  EcoSpold01Location=DE
- plywood, for indoor use: 1.32056e-11 m3; lognormal variance with pedigree 0.054, pedigree (1,4,5,5,1)
  EcoSpold01Location=RER
- section bar extrusion, aluminium: 7.68489e-8 kg; lognormal variance with pedigree 0.052, pedigree (1,1,5,5,1)
  EcoSpold01Location=RER
  composite
- sawnwood, hardwood, dried (u=20%), planed: 2.56975e-12 m3; lognormal variance with pedigree 0.054, pedigree (1,4,5,5,1)
  EcoSpold01Location=RER
- powder coat, steel: 8.16058e-9 m2; lognormal variance with pedigree 0.054, pedigree (1,4,5,5,1)
  EcoSpold01Location=RER
- waste mineral wool, for final disposal: -2.40717e-10 kg; lognormal variance with pedigree 0.054, pedigree (1,4,5,5,1)
  EcoSpold01Location=CH
  production volume 0.0702 kg
- zinc coat, coils: 4.82106e-9 m2; lognormal variance with pedigree 0.054, pedigree (1,4,5,5,1)
  EcoSpold01Location=RER
- waste plastic, mixture: -1.53699e-6, -1.02695e-7, -7.76669e-9, -4.24169e-8, -1.71359e-8, -4.02788e-8, -1.7683e-8 kg (7 suppliers, which the file names only by identifier); sum of these -1.76496e-6 kg; lognormal variance with pedigree 0.054, pedigree (1,4,5,5,1)
  EcoSpold01Location=CH
  production volume 0.1089 kg
- waste wood, untreated: -1.41428e-11, -1.75604e-12, -1.28386e-13, -4.93218e-12, -4.67085e-9, -1.17799e-12, -1.87631e-10 kg (7 suppliers, which the file names only by identifier); sum of these -4.88062e-9 kg; lognormal variance with pedigree 0.054, pedigree (1,4,5,5,1)
  EcoSpold01Location=CH
  production volume 0.0609 kg
- waste mineral wool: -3.46356e-10 kg; lognormal variance with pedigree 0.0401, pedigree (1,2,5,1,1)
  EcoSpold01Location=CH
  Modelled, based on "Agricultural Buildings" - pdf-document on the dedicated talk page of ecoinvent (www.ecoinvent.org/talk-pages)
  production volume 14.3 kg
- waste polystyrene isolation, flame-retardant: -1.02492e-9 kg; lognormal variance with pedigree 0.0401, pedigree (1,2,5,1,1)
  (same comment as for waste mineral wool)
  production volume 46.1 kg
- glass fibre: 1.5216e-5 kg; lognormal variance with pedigree 0.0401, pedigree (1,2,5,1,1)
  Modelled, based on "Agricultural Buildings" - pdf-document on the dedicated talk page of ecoinvent (www.ecoinvent.org/talk-pages)
  EcoSpold01Location=RER
- particle board, for indoor use: 6.52906e-12 m3; lognormal variance with pedigree 0.0401, pedigree (1,2,5,1,1)
  (same comment as for glass fibre)
- kraft paper, unbleached: 2.80236e-11 kg; lognormal variance with pedigree 0.0401, pedigree (1,2,5,1,1)
  EcoSpold01Location=RER
  Modelled, based on "Agricultural Buildings" - pdf-document on the dedicated talk page of ecoinvent (www.ecoinvent.org/talk-pages)
- electricity, low voltage: 0.00136945 kWh; lognormal variance with pedigree 0.0401, pedigree (1,2,5,1,1)
  (same comment as for waste mineral wool)
- glass fibre reinforced plastic, polyester resin, hand lay-up: 1.55759e-5 kg; lognormal variance with pedigree 0.0401, pedigree (1,2,5,1,1)
  (same comment as for kraft paper, unbleached)
- waste brick: -4.16776e-8 kg; lognormal variance with pedigree 0.0401, pedigree (1,2,5,1,1)
  (same comment as for waste mineral wool)
  production volume 2200 kg
- waste building wood, chrome preserved: -3.25087e-9 kg; lognormal variance with pedigree 0.0401, pedigree (1,2,5,1,1)
  (same comment as for waste mineral wool)
  production volume 498 kg
- waste concrete, not reinforced: -6.16157e-7 kg; lognormal variance with pedigree 0.0401, pedigree (1,2,5,1,1)
  Modelled, based on "Agricultural Buildings" - pdf-document on the dedicated talk page of ecoinvent (www.ecoinvent.org/talk-pages)
  EcoSpold01Location=CH
  production volume 4590 kg
- fibre cement facing tile: 7.59057e-9 kg; lognormal variance with pedigree 0.0401, pedigree (1,2,5,1,1)
  (same comment as for waste concrete, not reinforced)
- waste polyurethane foam: -3.52369e-10 kg; lognormal variance with pedigree 0.0401, pedigree (1,2,5,1,1)
  (same comment as for waste concrete, not reinforced)
  production volume 5.43 kg
- epoxy resin, liquid: 2.4073e-11 kg; lognormal variance with pedigree 0.0401, pedigree (1,2,5,1,1)
  (same comment as for kraft paper, unbleached)
- excavation, hydraulic digger: 5.77155e-9 m3; lognormal variance with pedigree 0.0401, pedigree (1,2,5,1,1)
  (same comment as for kraft paper, unbleached)
- gravel, round: 2.09302e-6 kg; lognormal variance with pedigree 0.0401, pedigree (1,2,5,1,1)
  (same comment as for waste concrete, not reinforced)
- waste polyethylene/polypropylene product: -8.7841e-10 kg; lognormal variance with pedigree 0.0401, pedigree (1,2,5,1,1)
  (same comment as for waste concrete, not reinforced)
  production volume 91.9 kg
- waste cement in concrete and mortar: -6.9452e-7 kg; lognormal variance with pedigree 0.0401, pedigree (1,2,5,1,1)
  (same comment as for waste concrete, not reinforced)
  production volume 539 kg
- waste glass: -3.23312e-5 kg; lognormal variance with pedigree 0.0401, pedigree (1,2,5,1,1)
  (same comment as for waste concrete, not reinforced)
  production volume 8.79 kg
- lean concrete: 3.38081e-10 m3; lognormal variance with pedigree 0.0401, pedigree (1,2,5,1,1)
  (same comment as for waste mineral wool)
- cement, Portland: 4.97259e-7 kg; lognormal variance with pedigree 0.0401, pedigree (1,2,5,1,1)
  (same comment as for waste mineral wool)
- polypropylene, granulate: 7.15037e-9 kg; lognormal variance with pedigree 0.0401, pedigree (1,2,5,1,1)
  (same comment as for kraft paper, unbleached)
- polystyrene foam slab: 1.35483e-10 kg; lognormal variance with pedigree 0.0401, pedigree (1,2,5,1,1)
  (same comment as for glass fibre)
- cement mortar: 7.89962e-9 kg; lognormal variance with pedigree 0.0401, pedigree (1,2,5,1,1)
  (same comment as for waste mineral wool)
- glued laminated timber, for indoor use: 4.71192e-12 m3; lognormal variance with pedigree 0.0401, pedigree (1,2,5,1,1)
  (same comment as for glass fibre)
- waste bitumen sheet: -2.82877e-11 kg; lognormal variance with pedigree 0.0401, pedigree (1,2,5,1,1)
  (same comment as for waste concrete, not reinforced)
  production volume 1.18 kg
- excavation, skid-steer loader: 3.70081e-10 m3; lognormal variance with pedigree 0.0401, pedigree (1,2,5,1,1)
  Modelled, based on "Agricultural Buildings" - pdf-document on the dedicated talk page of ecoinvent (www.ecoinvent.org/talk-pages);activityLink introduced to establish a direct link to the corresponding regional supply of this product
  EcoSpold01Location=RER
- waste reinforced concrete: -9.67958e-6 kg; lognormal variance with pedigree 0.0401, pedigree (1,2,5,1,1)
  (same comment as for waste concrete, not reinforced)
  production volume 32300 kg
- zinc coat, pieces: 6.64427e-9 m2; lognormal variance with pedigree 0.0401, pedigree (1,2,5,1,1)
  (same comment as for glass fibre)
- waste bitumen: -4.53756e-9 kg; lognormal variance with pedigree 0.0401, pedigree (1,2,5,1,1)
  (same comment as for waste concrete, not reinforced)
  production volume 1080 kg
- waste glass sheet: -2.72506e-9 kg; lognormal variance with pedigree 0.0401, pedigree (1,2,5,1,1)
  (same comment as for waste mineral wool)
  production volume 238 kg
- sanitary ceramics: 3.37369e-9 kg; lognormal variance with pedigree 0.0401, pedigree (1,2,5,1,1)
  (same comment as for waste mineral wool)
- fibre cement corrugated slab: 1.32485e-9 kg; lognormal variance with pedigree 0.0401, pedigree (1,2,5,1,1)
  (same comment as for waste mineral wool)
- waste wood, untreated: -9.13842e-8 kg; lognormal variance with pedigree 0.0401, pedigree (1,2,5,1,1)
  (same comment as for waste mineral wool)
  production volume 3060 kg
- waste plastic, mixture: -1.24403e-6 kg; lognormal variance with pedigree 0.0401, pedigree (1,2,5,1,1)
  (same comment as for waste mineral wool)
  production volume 5.86 kg
- waste fibreboard: -4.25794e-9 kg; lognormal variance with pedigree 0.0401, pedigree (1,2,5,1,1)
  (same comment as for waste mineral wool)
  production volume 718 kg
- concrete, normal: 9.11121e-8 m3; lognormal variance with pedigree 0.0401, pedigree (1,2,5,1,1)
  (same comment as for waste concrete, not reinforced)
- flat glass, uncoated: 9.71125e-8 kg; lognormal variance with pedigree 0.0401, pedigree (1,2,5,1,1)
  (same comment as for kraft paper, unbleached)
- waste bulk iron, excluding reinforcement: -1.273e-7 kg; lognormal variance with pedigree 0.0401, pedigree (1,2,5,1,1)
  (same comment as for waste mineral wool)
  production volume 1070 kg
- clay brick: 6.00741e-8 kg; lognormal variance with pedigree 0.0401, pedigree (1,2,5,1,1)
  (same comment as for kraft paper, unbleached)
- sawnwood, softwood, dried (u=20%), planed: 4.91411e-11 m3; lognormal variance with pedigree 0.0401, pedigree (1,2,5,1,1)
  (same comment as for kraft paper, unbleached)
- roof tile: 8.54428e-10 kg; lognormal variance with pedigree 0.0401, pedigree (1,2,5,1,1)
  (same comment as for kraft paper, unbleached)
- calendering, rigid sheets: 3.08256e-12 kg; lognormal variance with pedigree 0.0401, pedigree (1,2,5,1,1)
  (same comment as for kraft paper, unbleached)
- waste sealing sheet, polyvinylchloride: -3.08256e-12 kg; lognormal variance with pedigree 0.0401, pedigree (1,2,5,1,1)
  (same comment as for waste mineral wool)
  production volume 1.49 kg
- sand: 1.04476e-9 kg; lognormal variance with pedigree 0.0401, pedigree (1,2,5,1,1)
  (same comment as for waste mineral wool)
- polyvinylchloride, bulk polymerised: 7.65292e-6 kg; lognormal variance with pedigree 0.0401, pedigree (1,2,5,1,1)
  (same comment as for kraft paper, unbleached)
- waste polyvinylchloride product: -4.76983e-10 kg; lognormal variance with pedigree 0.0401, pedigree (1,2,5,1,1)
  (same comment as for waste mineral wool)
  production volume 7.64 kg
- chromium: 3.49709e-10 kg; lognormal variance with pedigree 0.0512, pedigree (2,3,5,1,1)
  EcoSpold01Location=RER
  Uncertainty: LCI of one passenger car
- nickel, 99.5%: 2.03997e-10 kg; lognormal variance with pedigree 0.0512, pedigree (2,3,5,1,1)
  EcoSpold01Location=GLO
  Uncertainty: literature study
- ethylene, average: 1.34784e-9 kg; lognormal variance with pedigree 0.0532, pedigree (2,4,5,1,2)
  EcoSpold01Location=RER
  Uncertainty: LCI of one passenger car
- used light commercial vehicle: -1.45712e-10 unit; lognormal variance with pedigree 0.342025, pedigree (3,1,5,2,1)
  Uncertainty: own calculations
  production volume 1.32237 unit
- ethylene glycol: 6.99418e-10 kg; lognormal variance with pedigree 0.0532, pedigree (2,4,5,1,2)
  EcoSpold01Location=RER
  Uncertainty: LCI of one passenger car
- flat glass, uncoated: 1.23356e-7 kg; lognormal variance with pedigree 0.0532, pedigree (2,3,5,5,1)
  EcoSpold01Location=RER
  Uncertainty: literature study
- ethylene, average: 2.12842e-11, 1.32655e-9 kg (2 suppliers, which the file names only by identifier); sum of these 1.34784e-9 kg; lognormal variance with pedigree 0.0552, pedigree (2,4,5,5,2)
  EcoSpold01Location=RER
  Uncertainty: LCI of one passenger car
- electronics, for control units: 1.80126e-9 kg; source Volvo Truck Corporation 2004; lognormal variance with pedigree 0.05, pedigree (1,1,5,1,1)
  (same comment as for wire drawing, copper)
- used lorry, 16 metric ton: -1.33969e-11 unit; lognormal variance with pedigree 0.342025, pedigree (3,1,5,2,1)
  Uncertainty: own calculations
  production volume 1.32237 unit
- used lorry, 28 metric ton: -8.95393e-12 unit; lognormal variance with pedigree 0.342025, pedigree (3,1,5,2,1)
  Uncertainty: own calculations
  production volume 1.32237 unit
- used lorry, 40 metric ton: -5.36966e-12 unit; lognormal variance with pedigree 0.342025, pedigree (3,1,5,2,1)
  Uncertainty: own calculations
  production volume 1.32237 unit
- heat, district or industrial, other than natural gas: 0.000214981 MJ; lognormal variance with pedigree 0.1786, pedigree (4,3,5,1,1)
  EcoSpold01Location=CH
  Literature studies, rough estimate
  Uncertainty: literature studies, rough estimate
- waste emulsion paint: -3.15249e-8 kg; lognormal variance with pedigree 0.0586, pedigree (4,3,5,1,1)
  Literature studies
  EcoSpold01Location=CH
  Uncertainty: literature studies
  production volume 645 kg
- tap water: 3.20088e-5 kg; lognormal variance with pedigree 0.0586, pedigree (4,3,5,1,1)
  (same comment as for heat, district or industrial, other than natural gas)
- heat, district or industrial, natural gas: 1.20672e-5 MJ; lognormal variance with pedigree 0.1786, pedigree (4,3,5,1,1)
  EcoSpold01Location=RER
  Literature studies, rough estimate
  Uncertainty: literature studies, rough estimate
- electricity, medium voltage: 2.70089e-5 kWh; lognormal variance with pedigree 0.1786, pedigree (4,3,5,1,1)
  Literature studies, rough estimate
  EcoSpold01Location=CH
  Uncertainty: literature studies, rough estimate
- paper, woodfree, uncoated: 2.8912e-6 kg; lognormal variance with pedigree 0.0586, pedigree (4,3,5,1,1)
  EcoSpold01Location=RER
  Literature studies; estimate based on ICE maintenace figures
  Uncertainty: literature studies; estimate based on ICE maintenace figures
- solvent, organic: 3.50375e-8 kg; lognormal variance with pedigree 0.0588, pedigree (2,2,5,3,3)
  EcoSpold01Location=GLO
  Literature studies; estimate based on ICE maintenace figures
  Uncertainty: literature studies; estimate based on ICE maintenace figures
- glued laminated timber, for outdoor use: 1.16348e-10 m3; lognormal variance with pedigree 0.0588, pedigree (2,2,5,3,3)
  EcoSpold01Location=RER
  Literature value from Maibach (1999).
  Uncertainty: literature studies
- bronze: 9.94861e-6 kg; lognormal variance with pedigree 0.0512, pedigree (2,3,5,1,1)
  Literature
  EcoSpold01Location=CH
  Uncertainty: Literature
- waste polyvinylchloride: -3.37734e-7 kg; lognormal variance with pedigree 0.0512, pedigree (2,3,5,1,1)
  EcoSpold01Location=CH
  Estimation for materials used
  Uncertainty: Estimation for materials used
  production volume 1164 kg
- waste glass pane in burnable frame: -2.98149e-5 kg; lognormal variance with pedigree 0.0512, pedigree (2,3,5,1,1)
  (same comment as for waste polyvinylchloride)
  production volume 323 kg
- waste rubber, unspecified: -3.73003e-12 kg; lognormal variance with pedigree 0.0512, pedigree (2,3,5,1,1)
  Estimation for materials used
  EcoSpold01Location=CH
  Uncertainty: Estimation for materials used
  production volume 0.42 kg
- cement, unspecified: 1.91298e-7 kg; lognormal variance with pedigree 0.0512, pedigree (2,3,5,1,1)
  Literature
  EcoSpold01Location=CH
  Uncertainty: Literature
- waste reinforcement steel: -4.8403e-5 kg; lognormal variance with pedigree 0.0512, pedigree (2,3,5,1,1)
  (same comment as for waste rubber, unspecified)
  production volume 4492 kg
- water works, capacity 6.23E10l/year: 0, 0 unit (2 suppliers, which the file names only by identifier); pedigree (1,1,1,1,1)
  Calculated value. Based on water works capacity and lifetime. Share of infrastructure attributed to the prodction of 1 kg of drinking water is estimated by dividing the 1 unit of drinking water plant by the total estimated amount of water this plant will produce.
  Uncertainty: Calculated variable. Uncertainty will be determined from propagation of uncertainty factors of underlying variables. Uncertainty of actual relation between variables not accounted for at this time, although this could be included in a future update.
- electricity, low voltage: 2.85499e-6 kWh; lognormal variance with pedigree 0.002, pedigree (1,1,3,1,1)
  Calculated value.
  Uncertainty: Calculated variable. Uncertainty will be determined from propagation of uncertainty factors of underlying variables. Uncertainty of actual relation between variables not accounted for at this time, although this could be included in a future update.
- iron(III) chloride, without water, in a 12% iron solution state: 1.27775e-10 kg; lognormal variance with pedigree 0.002, pedigree (1,1,3,1,1)
  Literature value. Average and uncertainty based on published amounts by Al-sarkal, T. et al. 2013, Tarnacki et al. 2012, Darwish, M.et al. 2013, Sanz, M. A. 2007, G. Raluy et al. 2006 and Sadhwani, J. J.et al. 2005.
  Al-Sarkal, T., & Arafat, H. a. (2013). Ultrafiltration versus sedimentation-based pretreatment in Fujairah-1 RO plant: Environmental impact study. Desalination, 317, 55–66.
  Tarnacki, K., Meneses, M., Melin, T., van Medevoort, J., & Jansen, a. (2012). Environmental assessment of desalination processes: Reverse osmosis and Memstill®. Desalination, 296, 69–80.
  Darwish, M., Hassabou, A. H., & Shomar, B. (2013). Using Seawater Reverse Osmosis (SWRO) desalting system for less environmental impacts in Qatar. Desalination, 309, 113–124.
  Sanza, M. A., Bonnélyea, V., & Cremerb, G. (2007). Fujairah reverse osmosis plant: 2 years of operation. Desalination, 203(1-3), 91–99.
  Raluy, G., Serra, L., & Uche, J. (2006). Life cycle assessment of MSF, MED and RO desalination technologies. Energy, 31(13), 2361–2372.
  Sadhwani, J. J., Veza, J. M., & Santana, C. (2005). Case studies on environmental impact of seawater desalination. Desalination, 185(1-3), 1–8.
- sodium hydrogen sulfite: 2.10587e-10 kg; lognormal variance with pedigree 0.21, pedigree (5,5,5,5,5)
  Literature value. Average and uncertainty based on published amounts by Al-sarkal, T. et al. 2013, Tarnacki et al. 2012, Darwish, M.et al. 2013, Sanz, M. A. 2007, G. Raluy et al. 2006 and Sadhwani, J. J.et al. 2005.
  Al-Sarkal, T., & Arafat, H. a. (2013). Ultrafiltration versus sedimentation-based pretreatment in Fujairah-1 RO plant: Environmental impact study. Desalination, 317, 55-66.
  Tarnacki, K., Meneses, M., Melin, T., van Medevoort, J., & Jansen, a. (2012). Environmental assessment of desalination processes: Reverse osmosis and Memstill®. Desalination, 296, 69-80.
  Darwish, M., Hassabou, A. H., & Shomar, B. (2013). Using Seawater Reverse Osmosis (SWRO) desalting system for less environmental impacts in Qatar. Desalination, 309, 113-124.
  Sanza, M. A., Bonnélyea, V., & Cremerb, G. (2007). Fujairah reverse osmosis plant: 2 years of operation. Desalination, 203(1-3), 91-99.
  Raluy, G., Serra, L., & Uche, J. (2006). Life cycle assessment of MSF, MED and RO desalination technologies. Energy, 31(13), 2361-2372.
  Sadhwani, J. J., Veza, J. M., & Santana, C. (2005). Case studies on environmental impact of seawater desalination. Desalination, 185(1-3), 1-8.
- seawater reverse osmosis module: 4.41996e-10, 7.62975e-10 m2 (2 suppliers, which the file names only by identifier); sum of these 1.20497e-9 m2; lognormal variance with pedigree 0.002, pedigree (1,1,3,1,1)
  This unit process refers to the unit of active membrane surface for reverse osmosis of seawater.
  Uncertainty: Calculated variable. Uncertainty will be determined from propagation of uncertainty factors of underlying variables. Uncertainty of actual relation between variables not accounted for at this time, although this could be included in a future update.
- tap water: 4.91163e-8 kg; lognormal variance with pedigree 0.002, pedigree (1,1,3,1,1)
  Calculated variable. This flow represents the amount of water in chemical solution. Chemical processes represent active substance only. Water is added seperatly.
  Uncertainty: Calculated variable. Uncertainty will be determined from propagation of uncertainty factors of underlying variables. Uncertainty of actual relation between variables not accounted for at this time, although this could be included in a future update.
- polyacrylamide: 3.24014e-11 kg; lognormal variance with pedigree 0.002, pedigree (1,1,3,1,1)
  (same comment as for sodium hydrogen sulfite)
- waste glass pane in burnable frame: -2.97495e-10 kg; lognormal variance with pedigree 0.002, pedigree (1,1,3,1,1)
  Calculated value. Process used as proxy for disposal of fiber glass/epoxy pressure vessel.
  Uncertainty: Calculated variable. Uncertainty will be determined from propagation of uncertainty factors of underlying variables. Uncertainty of actual relation between variables not accounted for at this time, although this could be included in a future update.
  production volume 1.10192e6 kg
- carbon dioxide, liquid: 5.06508e-9, 2.40618e-8 kg (2 suppliers, which the file names only by identifier); sum of these 2.91269e-8 kg; lognormal variance with pedigree 0.0066, pedigree (3,4,3,1,1)
  Calculated value. Represents dosage for recarbonisation of permeate water as calculated by RWT software. Caracterisation of permeate used was calculated from modeling seawater reverse osmosis with conventional pretreatment considering single stage baseline 8-inch spiral wound modules using ROSA system design software (Dow Chemical).
- chlorine, liquid: 1.72783e-10, 8.63755e-10 kg (2 suppliers, which the file names only by identifier); sum of these 1.03654e-9 kg; lognormal variance with pedigree 0.0606, pedigree (5,5,3,5,3)
  Literature value. Chlorine for final desinfection. Taken directly from ecoinvent V.3 tap water.
- polyvinylidenchloride, granulate: 9.62374e-10, 2.28168e-5 kg (2 suppliers, which the file names only by identifier); sum of these 2.28177e-5 kg; lognormal variance with pedigree 0.0058, pedigree (2,4,3,1,2)
  Literature value. Material for catridge, filtration step upstream of reverse osmosis filtration.
- sodium hypochlorite, without water, in 15% solution state: 5.79679e-10, 2.75181e-9 kg (2 suppliers, which the file names only by identifier); sum of these 3.33149e-9 kg; lognormal variance with pedigree 0.210001, pedigree (5,5,5,5,5)
  (same comment as for sodium hydrogen sulfite)
- polycarboxylates, 40% active substance: 8.82485e-10, 1.78692e-9 kg (2 suppliers, which the file names only by identifier); sum of these 2.6694e-9 kg; lognormal variance with pedigree 0.21, pedigree (5,5,5,5,5)
  (same comment as for sodium hydrogen sulfite)
- epoxy resin, liquid: 1.79442e-11 kg; lognormal variance with pedigree 0.002, pedigree (1,1,3,1,1)
  (same comment as for electricity, low voltage)
- EDTA, ethylenediaminetetraacetic acid: 2.02004e-12 kg; source Biswas, W. 2009; lognormal variance with pedigree 0.2106, pedigree (5,5,5,5,5)
  Approximated process. Represents detergent used for cleaning reverse osmosis membrane. Value based on literature reported as detergent in liquid state in Biswas, W. K. (2009). Density of EDTA used (0.84 kg/l). Highly uncertain value since nature of detergent is unknown. Uncertainty have been maximized.
- citric acid: 8.0888e-10 kg; source Biswas, W. 2009; lognormal variance with pedigree 0.0072, pedigree (3,4,3,1,2)
  Literature value. Sum of chemical use for pretreatment and reverse osmosis based on Biswas, W. K. (2009).
- municipal solid waste: -7.26776e-10, -6.18189e-12, -4.32584e-12, -1.71677e-11, -1.21417e-8 kg (5 suppliers, which the file names only by identifier); sum of these -1.28962e-8 kg; source Biswas, W. 2009
  Literature value. Value based on report solid waste generation per kg of SWRO water production in Biswas, W. K. (2009).
  production volume 2.607e6 kg
- copper scrap, sorted, pressed: -1.45798e-5 kg; lognormal variance with pedigree 0.008, pedigree (1,1,4,1,1)
  Estimation. Based on material input.
  Uncertainty: Calculated variable. Uncertainty will be determined from propagation of uncertainty factors of underlying variables.
  production volume 1494.14 kg
- scrap steel: -0.00115134 kg; lognormal variance with pedigree 0.008, pedigree (1,1,4,1,1)
  (same comment as for copper scrap, sorted, pressed)
  production volume 84567.6 kg
- municipal solid waste: -1.21057e-6 kg; lognormal variance with pedigree 0.008, pedigree (1,1,4,1,1)
  (same comment as for copper scrap, sorted, pressed)
  production volume 29815.9 kg
- aluminium scrap, post-consumer: -9.23307e-6 kg; lognormal variance with pedigree 0.008, pedigree (1,1,4,1,1)
  (same comment as for copper scrap, sorted, pressed)
  production volume 484.676 kg
- silica sand: 1.23499e-6 kg; lognormal variance with pedigree 0.008, pedigree (1,1,4,1,1)
  Calculated Value.
  EcoSpold01Location=DE
  Uncertainty: Calculated variable. Uncertainty will be determined from propagation of uncertainty factors of underlying variables.
- polyethylene, linear low density, granulate: 2.10448e-8 kg; lognormal variance with pedigree 0.008, pedigree (1,1,4,1,1)
  Calculated Value.
  Uncertainty: Calculated variable. Uncertainty will be determined from propagation of uncertainty factors of underlying variables.
- charcoal: 9.019e-9 kg; lognormal variance with pedigree 0.008, pedigree (1,1,4,1,1)
  (same comment as for polyethylene, linear low density, granulate)
- nylon 6: 8.27267e-7 kg; lognormal variance with pedigree 0.008, pedigree (1,1,4,1,1)
  (same comment as for polyethylene, linear low density, granulate)
- steel, chromium steel 18/8: 1.44475e-5 kg; lognormal variance with pedigree 0.008, pedigree (1,1,4,1,1)
  (same comment as for polyethylene, linear low density, granulate)
- waste polyvinylchloride: -2.6503e-5, -1.77083e-6, -1.33925e-7, -7.31416e-7, -2.95803e-7, -6.94547e-7 kg (6 suppliers, which the file names only by identifier); sum of these -3.01295e-5 kg; lognormal variance with pedigree 0.008, pedigree (1,1,4,1,1)
  EcoSpold01Location=CH
  Estimation. Based on material input.
  Uncertainty: Calculated variable. Uncertainty will be determined from propagation of uncertainty factors of underlying variables.
  production volume 451016 kg
- concrete, normal: 4.54322e-8, 4.73397e-9, 3.83248e-8, 2.18484e-8, 3.07919e-9 m3 (5 suppliers, which the file names only by identifier); sum of these 1.13419e-7 m3; lognormal variance with pedigree 0.008, pedigree (1,1,4,1,1)
  EcoSpold01Location=CH
  Calculated Value.
  Uncertainty: Calculated variable. Uncertainty will be determined from propagation of uncertainty factors of underlying variables.
- heat, district or industrial, other than natural gas: 4.45318e-8 MJ; lognormal variance with pedigree 0.1786, pedigree (4,3,5,1,1)
  EcoSpold01Location=RER
  Uncertainty: literature studies; value represents a rough estimate (basic uncertainty =2)
- used train, passenger, high-speed: -2.91139e-14 unit; lognormal variance with pedigree 0.34, pedigree (1,1,5,1,1)
  production volume 0.242058 unit
- electricity, medium voltage: 8.89429e-9 kWh; source von Rozycki C. 2003; lognormal variance with pedigree 0.1786, pedigree (4,3,5,1,1)
  Literature value. Train manufacturing data is available from Rozycki (2003) mainly based on (Maibach, 1999).
  Further references:
  Maibach M., Peter D. and Seiler B. (1999) Ökoinventar Transporte: Grundlagen für den ökologischen Vergleich von Transportsystemen und den Einbezug von Transportsystemen in Ökobilanzen. Technischer Schlussbericht. In: Schweizerischer Nationalfonds zur Förderung der wissenschaftlichen Forschung (ed. SPP Umwelt M.). 2nd Edition. INFRAS, Zürich
  EcoSpold01Location=DE
  Uncertainty: literature studies; value represents a rough estimate (basic uncertainty =2)
- heat, district or industrial, natural gas: 2.82405e-8 MJ; lognormal variance with pedigree 0.0512, pedigree (4,3,5,5,1)
  (same comment as for heat, district or industrial, other than natural gas)
- electricity, medium voltage: 9.05779e-10, 6.74251e-9, 1.24123e-9, 7.79892e-9, 3.36468e-9, 3.07586e-9, 5.43537e-9, 3.17532e-9, 7.63579e-10, 2.25722e-8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 kWh (39 suppliers, which the file names only by identifier); sum of these 3.72232e-7 kWh; source von Rozycki C. 2003; lognormal variance with pedigree 0.1806, pedigree (4,3,5,5,1)
  (same comment as for electricity, medium voltage)
- used train, passenger, long-distance: -4.48714e-13 unit; lognormal variance with pedigree 0.34, pedigree (1,1,5,1,1)
  production volume 0.0336675 unit
- electricity, medium voltage: 4.62753e-8 kWh; source Frischknecht R. 1996; lognormal variance with pedigree 0.0606, pedigree (4,3,5,5,1)
  Calculated value. Estimates for energy consumption for manufacturing is taken from Frischknecht (1996) assuming an electricity consumption of 2.7 MJ/kg material.
  EcoSpold01Location=CH
  Uncertainty: literature studies
- used train, passenger, regional: -3.95805e-12 unit; lognormal variance with pedigree 0.34, pedigree (1,1,5,1,1)
  production volume 0.0336675 unit
- used tram: -4.48645e-11 unit; lognormal variance with pedigree 0.042, pedigree (3,1,5,1,1)
  production volume 1.32237 unit
- waste concrete: -9.12651e-7 kg; lognormal variance with pedigree 0.123425, pedigree (2,4,2,2,5)
  Calculated value. Amount of output material is set equal to the amount of respective input material, concrete, normal. It also contains waste concrete from hotel foundation. Conversion is made from m3 of concrete to kg of concrete based on the wet mass property of concrete (see properties section).
  production volume 3.23372e8 kg
- used window frame, wood-metal: -3.30485e-13 m2; lognormal variance with pedigree 0.123425, pedigree (2,4,2,2,5)
  Calculated value. Amount of output material is set equal to the amount of respective input material, window frame, wood-metal.
  production volume 605.893 m2
- used door, outer, wood-aluminium: -4.06346e-13 m2; lognormal variance with pedigree 0.123425, pedigree (2,4,2,2,5)
  Calculated value. Amount of output material is set equal to the amount of respective input material, door, outer, wood-aluminium.
  production volume 338.709 m2
- gypsum plasterboard: 9.54343e-10 kg; lognormal variance with pedigree 0.123425, pedigree (2,4,2,2,5)
  Calculated value. Combined of all instances of use across the building. Assumed thickness of plasterboard 12.5 mm. Source: Practical DYI 2018. Types of plasterboard. Available from: https://www.practicaldiy.com/general-building/plasterboard/plasterboard.php Accessed 23 March 2018. Assumed density of plasterboard 640 kg/m3. Source: British Gypsum 2018. What is the density of Gyproc plasterboards? Available from: http://www.british-gypsum.com/technical-advice/faqs/114-what-is-the-density-of-gyproc-plasterboards Accessed 23 March 2018. In terms of outputs assumed to have gone to waste gypsum plasterboard.
- window frame, wood-metal, U=1.6 W/m2K: 3.30485e-13 m2; lognormal variance with pedigree 0.123425, pedigree (2,4,2,2,5)
  Calculated value. The amount of exchange is calculated as: amount of input product * (lifetime of the hotel / lifetime of the product). Assumed service life of 35 years. Source: Asif et al. 2002. LIFE CYCLE OF WINDOW MATERIALS - A COMPARATIVE ASSESSMENT. Available from: http://ohp.parks.ca.gov/pages/1054/files/uk%20window%20frame%20lca.pdf Accessed 16 March 2018. In terms of outputs assumed to have gone to used window frame, wood-metal.
- waste gypsum plasterboard: -9.54343e-10 kg; lognormal variance with pedigree 0.123425, pedigree (2,4,2,2,5)
  Calculated value. Amount of output material is set equal to the amount of respective input material, gypsum plasterboard.
  production volume 1.0153e6 kg
- natural stone plate, cut: 9.99082e-13 kg; lognormal variance with pedigree 0.123425, pedigree (2,4,2,2,5)
  Calculated value. Used here in place of marble. Combined of all instances of use across the building. Assumed thickness of marble is 22 mm. Source: Erdly and Schwartz 2004. Building facade maintenance, repair, and inspection. ASTM International, West Conshohocken, USA. Assumed density of marble is 2.7 kg/m3. Source: The Engineering Toolbox 2018. Densities of common solids. Available from: https://www.engineeringtoolbox.com/density-solids-d_1265.html Accessed 25 March 2018. Assumed service life of 75 years which is equal to the service life of the hotel building with minor refurbishments throughout. In terms of outputs assumed to have gone to inert waste.
- door, outer, wood-aluminium: 4.06346e-13 m2; lognormal variance with pedigree 0.123425, pedigree (2,4,2,2,5)
  Calculated value. The amount of exchange is calculated as: amount of input product * (lifetime of the hotel / lifetime of the product). Assumed service life of 40 years. Source: Cobut et al. 2015. The environmental footprint of interior wood doors in non-residential buildings - part 1: life cycle assessment. Journal of Cleaner Production, 109, 232-246. In terms of outputs, assumed to have gone to used door, outer, wood-alunimium.
- used door, inner, wood: -1.87683e-11 m2; lognormal variance with pedigree 0.123425, pedigree (2,4,2,2,5)
  Calculated value. Amount of output material is set equal to the amount of respective input material, door, inner, wood.
  production volume 4972.61 m2
- sawnwood, beam, softwood, dried (u=10%), planed: 7.98644e-13 m3; lognormal variance with pedigree 0.123425, pedigree (2,4,2,2,5)
  Calculated value. Represents here all wood used in flooring and for wall decoration. Combined of all instances of use across the building. Assumed thickness of wood to be 9.5 mm. Source: APA 2016. Wall construction. An excerpt of the engineering wood construction guide. Available from: https://www.buildgp.com/DocumentViewer.aspx?elementid=10198 Accessed 25 March 2018. Assumed service life of 75 years with minor refurbishments throughout. In terms of outputs assumed to have gone to waste wood, untreated.
- used door, inner, glass-wood: -2.41817e-12 m2; lognormal variance with pedigree 0.123425, pedigree (2,4,2,2,5)
  Calculated value. Amount of output material is set equal to the amount of respective input material, door, inner, glass-wood.
  production volume 732.038 m2
- elevator, hydraulic: 1.74888e-13 unit; lognormal variance with pedigree 0.422225, pedigree (1,4,2,2,5)
  Calculated value. The amount of exchange is calculated as: amount of input product * (lifetime of the hotel / lifetime of the product). Assumed service life of elevatorunit is 20 years. Source: Miljögiraff 2015. LCA of elevator lifting service in property. Miljögiraff Report 56. Available from: https://www.researchgate.net/profile/Marcus_Wendin/publication/301295772_Elevators_towards_a_circular_economy/links/5717790f08ae2679a8c772db/Elevators-towards-a-circular-economy.pdf Accessed 23 March 2018.
- door, inner, wood: 1.87683e-11 m2; lognormal variance with pedigree 0.123425, pedigree (2,4,2,2,5)
  Calculated value. The amount of exchange is calculated as: amount of input product * (lifetime of the hotel / lifetime of the product). Assumed service life of 40 years. Source: Cobut et al. 2015. The environmental footprint of interior wood doors in non-residential buildings - part 1: life cycle assessment. Journal of Cleaner Production, 109, 232-246. In terms of outputs, assumed to have gone to used door, inner, wood.
- blower and heat exchange unit, decentralized, 180-250 m3/h: 7.22733e-14 unit; lognormal variance with pedigree 0.422225, pedigree (1,4,2,2,5)
  Calculated value. Represents here an air-conditioning unit. The amount of exchange is calculated as: amount of input product * (lifetime of the hotel / lifetime of the product). Assumed service life of the air-conditioning unit is 15 years. Source: ASHRAE 2018. ASHRAE Equipment Life Expectancy chart. Available from: http://www.culluminc.com/wp-content/uploads/2013/02/ASHRAE_Chart_HVAC_Life_Expectancy%201.pdf Accessed 23 March 2018.
- door, inner, glass-wood: 2.41817e-12 m2; lognormal variance with pedigree 0.123425, pedigree (2,4,2,2,5)
  Calculated value. The amount of exchange is calculated as: amount of input product * (lifetime of the hotel / lifetime of the product). Assumed service life of 40 years. Source: Cobut et al. 2015. The environmental footprint of interior wood doors in non-residential buildings - part 1: life cycle assessment. Journal of Cleaner Production, 109, 232-246. In terms of outputs, assumed to have gone to used door, inner, glass-wood.
- waste glass: -1.21978e-9 kg; lognormal variance with pedigree 0.123425, pedigree (2,4,2,2,5)
  Calculated value. Amount of output material is set equal to the amount of respective input material, flat glass, coated. The amount also contains waste glass wool mat.
  production volume 192641 kg
- inert waste: -1.47127e-9 kg; lognormal variance with pedigree 0.123425, pedigree (2,4,2,2,5)
  Calculated value. Amount of output material is set equal to the amount of respective input material, sanitary ceramics.
  production volume 231992 kg
- window frame, aluminium, U=1.6 W/m2K: 2.49869e-11 m2; lognormal variance with pedigree 0.123425, pedigree (2,4,2,2,5)
  Calculated value. The amount of exchange is calculated as: amount of input product * (lifetime of the hotel / lifetime of the product). Assumed service life of 35 years. Source: Asif et al. 2002. LIFE CYCLE OF WINDOW MATERIALS - A COMPARATIVE ASSESSMENT. Available from: http://ohp.parks.ca.gov/pages/1054/files/uk%20window%20frame%20lca.pdf Accessed 16 March 2018. In terms of outputs assumed to have gone to aluminium scrap.
- electricity, low voltage: 6.38124e-10 kWh; lognormal variance with pedigree 0.422225, pedigree (1,4,2,2,5)
  Calculated value. Assuming that 0.30 kWh/m3 of electricity is necessary to construct a building. Source: Zabalza et al. 2013. Use of LCA as a Tool for Building Ecodesign. A Case Study of a Low Energy Building in Spain. Energies, 6(8), 3901-3921.
- base plaster: 3.88715e-10 kg; lognormal variance with pedigree 0.123425, pedigree (2,4,2,2,5)
  Calculated value. Combined of all instances of use across the building structure and walls. Assuming that 1213 bags of base paster (each bag has a weight of 25 kg) are required to plaster the area of circa 11000 m3 (accounting for any work losses). Source: British Gypsum 2018. Plaster Coverage Tool. Available from: http://www.british-gypsum.com/technical-advice/plaster-coverage-tool. Accessed 23 March 2018. Assumed service life of 75 years which is equal to the service life of the hotel building with minor refurbishments throughout. In terms of outputs assumed to have gone to waste concrete.
- acrylic varnish, without water, in 87.5% solution state: 3.64075e-11 kg; lognormal variance with pedigree 0.122825, pedigree (1,4,2,2,5)
  Calculated value. The amount of exchange is calculated as: amount of input product * (lifetime of the hotel / lifetime of the product). Used here in place of all varnishes. Combined of all instances of use across the building structure and walls. Assuming 1 liter of paint is required to paint 10m2 and weighs 1.5 kg. Source: BQ 2018. Wall painting calculator. Available from: https://www.diy.com/help-advice/wall-painting-calculator/Dev_npcart_100008.art Accessed 16 March 2018. Assumed service life of 5 years which is equivalent to the period of major refurbishments in hotels. Source: Filimonau et al. 2011. Reviewing the carbon footprint analysis of hotels: Life Cycle Energy Analysis (LCEA) as a holistic method for carbon impact appraisal of tourist accommodation. Journal of Cleaner Production, 19(17-18), 1917-1930. In terms of outputs assumed to have gone to waste paint on wall.
- sawnwood, beam, softwood, raw, dried (u=10%): 1.07874e-12 m3; lognormal variance with pedigree 0.122825, pedigree (1,4,2,2,5)
  Calculated value. Combined of all instances of use across the building structure and walls. The amount of exchange is calculated as: amount of input product * (lifetime of the hotel / lifetime of the product). Assumed service life of 75 years which is equal to the service life of the hotel building with minor refurbishments throughout. In terms of outputs, assumed to have gone to waste wood, untreated.
- alkyd paint, white, without water, in 60% solution state: 1.07874e-10 kg; lognormal variance with pedigree 0.122825, pedigree (1,4,2,2,5)
  Calculated value. The amount of exchange is calculated as: amount of input product * (lifetime of the hotel / lifetime of the product). Used here in place of water soluble acrylic paint and alkyd enamel. Combined of all instances of use across the building structure and walls. Assuming 1 liter of paint is required to paint 10m2 and weighs 1.5 kg. Source: BQ 2018. Wall painting calculator. Available from: https://www.diy.com/help-advice/wall-painting-calculator/Dev_npcart_100008.art Accessed 16 March 2018. Assumed service life of 5 years which is equivalent to the period of major refurbishments in hotels. Source: Filimonau et al. 2011. Reviewing the carbon footprint analysis of hotels: Life Cycle Energy Analysis (LCEA) as a holistic method for carbon impact appraisal of tourist accommodation. Journal of Cleaner Production, 19(17-18), 1917-1930. In terms of outputs assumed to have gone to waste paint on wall.
- door, outer, wood-glass: 5.61844e-13 m2; lognormal variance with pedigree 0.122825, pedigree (1,4,2,2,5)
  Calculated value. The amount of exchange is calculated as: amount of input product * (lifetime of the hotel / lifetime of the product). Assumed service life of 40 years. Source: Cobut et al. 2015. The environmental footprint of interior wood doors in non-residential buildings - part 1: life cycle assessment. Journal of Cleaner Production, 109, 232-246. In terms of outputs, assumed to have gone to used door, outer, wood-glass.
- waste paint on wall: -1.44282e-10 kg; lognormal variance with pedigree 0.122825, pedigree (1,4,2,2,5)
  Calculated value. Amount of output material is set equal to the amount of respective input material, alkyd paint and acrylic varnish.
  production volume 158895 kg
- used door, outer, wood-glass: -5.61844e-13 m2; lognormal variance with pedigree 0.122825, pedigree (1,4,2,2,5)
  Calculated value. Amount of output material is set equal to the amount of respective input material, door, outer, wood-glass.
  production volume 618.75 m2
- used window frame, wood: -8.02635e-12 m2; lognormal variance with pedigree 0.122825, pedigree (1,4,2,2,5)
  Calculated value. Amount of output material is set equal to the amount of respective input material, window frame, wood.
  production volume 8839.29 m2
- ceramic tile: 2.22802e-6 kg; lognormal variance with pedigree 0.122825, pedigree (1,4,2,2,5)
  Calculated value. The amount of exchange is calculated as: amount of input product * (lifetime of the hotel / lifetime of the product). Combined of all instances of use across the building structure and walls. Assuming 12.3 kg of tiles is required to cover 1 m2. Source: Victoria Plumbing 2018. British ceramic tile. Available from: https://victoriaplum.com/product/british-ceramic-tile-metro-bevel-white-gloss-tile-100mm-x-200mm Accessed 16 March 2018. Assumed service life of 5 years which is equivalent to the period of major refurbishments in hotels. Source: Filimonau et al. 2011. Reviewing the carbon footprint analysis of hotels: Life Cycle Energy Analysis (LCEA) as a holistic method for carbon impact appraisal of tourist accommodation. Journal of Cleaner Production, 19(17-18), 1917-1930. In terms of outputs assumed to have gone to insert waste.
- window frame, wood, U=1.5 W/m2K: 8.02635e-12 m2; lognormal variance with pedigree 0.122825, pedigree (1,4,2,2,5)
  Calculated value. The amount of exchange is calculated as: amount of input product * (lifetime of the hotel / lifetime of the product). Assumed service life of 35 years. Source: Asif et al. 2002. LIFE CYCLE OF WINDOW MATERIALS - A COMPARATIVE ASSESSMENT. Available from: http://ohp.parks.ca.gov/pages/1054/files/uk%20window%20frame%20lca.pdf Accessed 16 March 2018.
- plywood, for outdoor use: 5.51357e-12 m3; lognormal variance with pedigree 0.122825, pedigree (1,4,2,2,5)
  (same comment as for sawnwood, beam, softwood, raw, dried (u=10%))
- inert waste, for final disposal: -5.06907e-5 kg; lognormal variance with pedigree 0.0186, pedigree (1,5,4,5,1)
  disposal of refractory fireclay
  EcoSpold01Location=CH
  production volume 22400 kg
- waste mineral oil: -1.23858e-6 kg; lognormal variance with pedigree 0.0186, pedigree (1,5,4,5,1)
  disposal of lubricatin oil
  production volume 560 kg
- heat, central or small-scale, other than natural gas: 0.0060984 MJ; source Attika Feuer AG 2011; lognormal variance with pedigree 0.098, pedigree (1,5,4,5,1)
  estimation - data comes from a comparison between old dataset value and communication with producer (total annual heating value in factory/production)
  EcoSpold01Location=CH
- refractory, fireclay, packed: 4.84632e-5 kg; source Attika Feuer AG 2011; lognormal variance with pedigree 0.0352, pedigree (1,5,4,5,1)
  EcoSpold01Location=DE
  estimation - refractory fireclay internal cover for the combustion chamber
- scrap aluminium: -1.34998e-7 kg; lognormal variance with pedigree 0.0167, pedigree (1,5,4,3,1)
  EcoSpold01Location=CH
  disposal aluminium
  production volume 12000 kg
- scrap copper: -2.02497e-8 kg; lognormal variance with pedigree 0.0167, pedigree (1,5,4,3,1)
  disposal copper
  EcoSpold01Location=CH
  production volume 1800 kg
- waste polyethylene: -1.35003e-8 kg; lognormal variance with pedigree 0.0167, pedigree (1,5,4,3,1)
  EcoSpold01Location=CH
  disposal of plastic components
  production volume 1200 kg
- anti-reflex-coating, etching, solar glass: 4.61466e-10 m2; lognormal variance with pedigree 0.0606, pedigree (2,5,5,5,1)
  EcoSpold01Location=DK
  Questionnaire
  Uncertainty: Questionnaire
- heat carrier liquid, 40% C3H8O2: -7.15273e-13 m3; lognormal variance with pedigree 0.062, pedigree (3,5,5,5,1)
  Estimation
  EcoSpold01Location=CH
  Uncertainty: Estimation
  production volume 0.00465 m3
- sheet rolling, copper: 1.29211e-9 kg; lognormal variance with pedigree 0.0606, pedigree (2,5,5,5,1)
  EcoSpold01Location=RER
  Questionnaire
  Uncertainty: Questionnaire
- brazing solder, cadmium free: 4.61466e-11 kg; lognormal variance with pedigree 0.0606, pedigree (2,5,5,5,1)
  EcoSpold01Location=RER
  Questionnaire
  Uncertainty: Questionnaire
- waste paperboard, unsorted: -1.53668e-9 kg; lognormal variance with pedigree 0.062, pedigree (3,5,5,5,1)
  Estimation
  EcoSpold01Location=CH
  Uncertainty: Estimation
  production volume 9.99 kg
- silicone product: 2.45962e-11 kg; lognormal variance with pedigree 0.0606, pedigree (2,5,5,5,1)
  EcoSpold01Location=RER
  Questionnaire
  Uncertainty: Questionnaire
- selective coat, copper sheet, physical vapour deposition: 4.61466e-10 m2; lognormal variance with pedigree 0.0606, pedigree (2,5,5,5,1)
  Questionnaire
  EcoSpold01Location=DE
  Uncertainty: Questionnaire
- glass tube, borosilicate: 1.87084e-6 kg; lognormal variance with pedigree 0.0606, pedigree (2,5,5,5,1)
  EcoSpold01Location=DE
  Questionnaire plus 5% losses
  Uncertainty: Questionnaire plus 5% losses
- wastewater, from residence: -2.03968e-11 m3; lognormal variance with pedigree 0.1327, pedigree (2,2,5,5,4)
  EcoSpold01Location=CH
  Questionnaire, data for other type of collector
  Uncertainty: Questionnaire, data for other type of collector
  production volume 0.1326 m3
- solar collector factory: 0 unit; pedigree (1,1,1,1,1)
  EcoSpold01Location=RER
  Estimation for flat plate collector
  Uncertainty: Estimation for flat plate collector
- chemical, organic: 1.42563e-9 kg; lognormal variance with pedigree 0.1327, pedigree (2,2,5,5,4)
  Questionnaire, data for other type of collector
  EcoSpold01Location=GLO
  Uncertainty: Questionnaire, data for other type of collector
- corrugated board box: 1.78781e-11, 1.5188e-9 kg (2 suppliers, which the file names only by identifier); sum of these 1.53668e-9 kg; lognormal variance with pedigree 0.056, pedigree (3,4,5,5,1)
  Company information, packaging
  EcoSpold01Location=RER
  Uncertainty: Company information, packaging
- water, completely softened: 1.77798e-10, 2.37522e-10 kg (2 suppliers, which the file names only by identifier); sum of these 4.1532e-10 kg; lognormal variance with pedigree 0.0606, pedigree (2,5,5,5,1)
  Questionnaire, heat transfer fluid
  EcoSpold01Location=RER
  Uncertainty: Questionnaire, heat transfer fluid
- waste glass sheet: -6.50981e-9 kg; lognormal variance with pedigree 0.062, pedigree (3,5,5,5,1)
  EcoSpold01Location=CH
  Estimation
  Uncertainty: Estimation
  production volume 42.6 kg
- municipal solid waste: -1.42118e-12, -4.16905e-12, -2.56596e-12, -4.50828e-12, -4.55194e-12, -4.35818e-12, -1.20284e-13, -4.26101e-12, -5.44046e-13, -2.85157e-11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 kg (34 suppliers, which the file names only by identifier); sum of these -2.09021e-10 kg; lognormal variance with pedigree 0.1327, pedigree (2,2,5,5,4)
  (same comment as for wastewater, from residence)
  production volume 0.0852 kg
- hazardous waste, for incineration: -3.55375e-10, -2.82709e-8 kg (2 suppliers, which the file names only by identifier); sum of these -2.86263e-8 kg; lognormal variance with pedigree 0.1327, pedigree (2,2,5,5,4)
  Questionnaire, data for other type of collector
  EcoSpold01Location=CH
  Uncertainty: Questionnaire, data for other type of collector
  production volume 0.681 kg
- waste plastic, mixture: -9.9302e-12, -2.4795e-11, -1.35573e-11, -1.05177e-11, -2.76851e-11, -3.71044e-12, -3.13546e-10, -4.11641e-11, -4.28468e-12, -2.46317e-10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 kg (34 suppliers, which the file names only by identifier); sum of these -1.54254e-9 kg; lognormal variance with pedigree 0.062, pedigree (3,5,5,5,1)
  EcoSpold01Location=CH
  Estimation
  Uncertainty: Estimation
  production volume 2.16 kg
- waste mineral wool: -9.32414e-10 kg; lognormal variance with pedigree 0.062, pedigree (3,5,5,5,1)
  Estimation
  EcoSpold01Location=CH
  Uncertainty: Estimation
  production volume 6.09 kg
- waste glass: -6.54194e-10, -2.05935e-9, -5.25338e-10, -7.65221e-10, -1.21441e-9, -6.84952e-8, -6.31305e-9, -1.43222e-10, -1.60093e-10, -1.95377e-8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 kg (40 suppliers, which the file names only by identifier); sum of these -8.34623e-7 kg; lognormal variance with pedigree 0.1327, pedigree (2,2,5,5,4)
  (same comment as for wastewater, from residence)
  production volume 2.04 kg
- electricity, medium voltage: 8.6548e-10 kWh; lognormal variance with pedigree 0.1327, pedigree (2,2,5,5,4)
  EcoSpold01Location=GB
  Questionnaire, data for other type of collector plus data for flat plate collector production
  Uncertainty: Questionnaire, data for other type of collector plus data for flat plate collector production
- aluminium oxide, non-metallurgical: 1.73715e-9 kg; lognormal variance with pedigree 0.0541, pedigree (3,2,5,5,1)
  Estimation for 5% feldspar
  EcoSpold01Location=RER
  Uncertainty: Estimation for 5% feldspar
- soda ash, light, crystalline, heptahydrate: 5.48941e-9 kg; lognormal variance with pedigree 0.0527, pedigree (2,2,5,5,1)
  Reduction for feldspar + boron plus production wastes
  EcoSpold01Location=RER
  Uncertainty: Reduction for feldspar + boron plus production wastes
- glass tube factory: 0 unit; pedigree (1,1,1,1,1)
  EcoSpold01Location=DE
  Questionnaire
  Uncertainty: Questionnaire
- wastewater from glass production: -1.88655e-11 m3; lognormal variance with pedigree 0.0527, pedigree (2,2,5,5,1)
  Questionnaire
  EcoSpold01Location=CH
  Uncertainty: Questionnaire
  production volume 0.001629 m3
- boric acid, anhydrous, powder: 3.47431e-9 kg; lognormal variance with pedigree 0.0541, pedigree (3,2,5,5,1)
  EcoSpold01Location=RER
  Estimation for 10% boron trioxide
  Uncertainty: Estimation for 10% boron trioxide
- waste wood, untreated: -1.0748e-14, -3.52339e-14, -1.94612e-14, -3.28434e-14, -3.75809e-14, -7.15666e-15, -4.6657e-14, -5.25218e-15, -3.21453e-13, -4.4328e-14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 kg (34 suppliers, which the file names only by identifier); sum of these -2.10275e-12 kg; lognormal variance with pedigree 0.0527, pedigree (2,2,5,5,1)
  Questionnaire, wood wastes
  EcoSpold01Location=CH
  Uncertainty: Questionnaire, wood wastes
  production volume 0.002217 kg
- municipal solid waste: -3.39653e-11 kg; lognormal variance with pedigree 0.0527, pedigree (2,2,5,5,1)
  EcoSpold01Location=CH
  Questionnaire, unspecific wastes
  Uncertainty: Questionnaire, unspecific wastes
  production volume 0.00729 kg
- waste glass: -1.00623e-8 kg; lognormal variance with pedigree 0.0527, pedigree (2,2,5,5,1)
  EcoSpold01Location=CH
  Glass used as sealing material
  Uncertainty: Glass used as sealing material
  production volume 0.002871 kg
- wastewater from tube collector production: -5.53961e-9 m3; lognormal variance with pedigree 0.0527, pedigree (2,2,5,5,1)
  EcoSpold01Location=CH
  Questionnaire
  Uncertainty: Questionnaire
  production volume 0.00936 m3
- EUR-flat pallet: 5.98349e-11 unit; lognormal variance with pedigree 0.0527, pedigree (2,2,5,5,1)
  EcoSpold01Location=RER
  Wood palette packaging
  Uncertainty: Wood palette packaging
- xenon, gaseous: 6.90676e-9 kg; lognormal variance with pedigree 0.1221, pedigree (5,2,5,5,1)
  Xenon filling of the tube, 1bar, own calculation
  EcoSpold01Location=CH
  Uncertainty: Xenon filling of the tube, 1bar, own calculation
- gas motor, 206kW: 0 unit; pedigree (1,1,1,1,1)
  Literature data and primary data from French manufacturers (Boulard et al, 2011). Generating set for the heating system.
- tractor, 4-wheel, agricultural: 2.77763e-9 kg
  Literature data and primary data from French manufacturers (Boulard et al, 2011). Tractor.
- aluminium alloy, AlMg3: 4.16645e-8 kg; lognormal variance with pedigree 0.374402, pedigree (5,5,5,5,5)
  Literature data and primary data from French manufacturers (Boulard et al, 2011). Roof structure.
- drawing of pipe, steel: 4.07568e-8 kg; lognormal variance with pedigree 0.374402, pedigree (5,5,5,5,5)
  Literature data and primary data from French manufacturers (Boulard et al, 2011). Tubes and siphons for the heating system.
- extrusion, plastic pipes: 7.89432e-9 kg; lognormal variance with pedigree 0.374402, pedigree (5,5,5,5,5)
  Literature data and primary data from French manufacturers (Boulard et al, 2011). Pipes for the fertigation system, cooling system and CO2 injection system.
- agricultural machinery, unspecified: 7.61785e-10 kg; lognormal variance with pedigree 0.374402, pedigree (5,5,5,5,5)
  Literature data and primary data from French manufacturers (Boulard et al, 2011). Ramp and cable drum for the soil preparation system.
- waste electric and electronic equipment: -5.66673e-10 kg
  Electric and electronic components sent to treatment
  production volume 0.0118242 kg
- polymer foaming: 8.95421e-10 kg; lognormal variance with pedigree 0.374402, pedigree (5,5,5,5,5)
  Literature data and primary data from French manufacturers (Boulard et al, 2011). Plastic bags part of for the support system.
- blow moulding: 5.78673e-10 kg; lognormal variance with pedigree 0.374402, pedigree (5,5,5,5,5)
  Literature data and primary data from French manufacturers (Boulard et al, 2011). Tanks for the fertigation system.
- polyvinylfluoride: 1.78938e-10 kg; lognormal variance with pedigree 0.374402, pedigree (5,5,5,5,5)
  Literature data and primary data from French manufacturers (Boulard et al, 2011). Cables and wires for the greenhouse structure and the CO2 injection system.
- heat and power co-generation unit, 200kW electrical, diesel SCR, components for electricity only: 0 unit; pedigree (1,1,1,1,1)
  (same comment as for gas motor, 206kW)
- injection moulding: 4.08116e-10 kg; lognormal variance with pedigree 0.374402, pedigree (5,5,5,5,5)
  Literature data and primary data from French manufacturers (Boulard et al, 2011). Taps, gutters and stoppers for the fertigation system.
- steel, low-alloyed: 7.75215e-8 kg; lognormal variance with pedigree 0.374402, pedigree (5,5,5,5,5)
  Literature data and primary data from French manufacturers (Boulard et al, 2011). Poles and trellis for the greenhouse structure.
- oil boiler, 100kW: 3.40114e-13 unit; lognormal variance with pedigree 0.374402, pedigree (5,5,5,5,5)
  Literature data and primary data from French manufacturers (Boulard et al, 2011). Boiler for the heating system.
- polystyrene, expandable: 3.11345e-9 kg; lognormal variance with pedigree 0.374402, pedigree (5,5,5,5,5)
  (same comment as for polymer foaming)
- concrete block: 1.34563e-8, 6.09492e-9 kg (2 suppliers, which the file names only by identifier); sum of these 1.95512e-8 kg; lognormal variance with pedigree 0.374402, pedigree (5,5,5,5,5)
  Literature data and primary data from French manufacturers (Boulard et al, 2011). Mechanical room part of for the storage system.
- waste rubber, unspecified: -5.2613e-11 kg
  Synthetic rubber sent to treatment
  production volume 0.00114391 kg
- waste concrete: -4.98878e-11 kg
  Concrete components sent to treatment
  production volume 4.01456 kg
- concrete, normal: 3.47742e-11 m3; lognormal variance with pedigree 0.374402, pedigree (5,5,5,5,5)
  Literature data and primary data from French manufacturers (Boulard et al, 2011). Walls and mechanical room.
- waste plastic, mixture: -1.35919e-10 kg
  Plastic components sent to treatment
  production volume 0.406852 kg
- electricity, low voltage: 5.9431e-9, 4.79523e-8, 1.56975e-7, 8.44e-9, 5.6829e-8, 2.38538e-8, 2.10736e-8, 3.92262e-8, 3.57067e-7, 2.25722e-8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 kWh (45 suppliers, which the file names only by identifier); sum of these 1.43023e-5 kWh; lognormal variance with pedigree 0.374402, pedigree (5,5,5,5,5)
  Literature data and primary data from French manufacturers (Boulard et al, 2011). Electricity for manufacturing of the greenhouse structure.
- potassium fertiliser, as K2O: 5.67164e-8 kg; lognormal variance with pedigree 0.120177, pedigree (2,1,3,5,1)
  Calculated based on literature values: The nutrient content of the crop multiplied by the country-share of the fertiliser type (IFA 2014). See supporting documentation 'WFLDB-Documentation.pdf' chapter 'Fertiliser application' for L1 data and appendix for the source of nutrient content (https://ecoquery.ecoinvent.org/File/Reports).
  Corresponds to 330.0 kg/ha
- potassium chloride, as K2O: 6.46415e-8 kg; lognormal variance with pedigree 0.120177, pedigree (2,1,3,5,1)
  Calculated based on literature values: The nutrient content of the crop multiplied by the country-share of the fertiliser type (IFA 2014). See supporting documentation 'WFLDB-Documentation.pdf' chapter 'Fertiliser application' for L1 data and appendix for the source of nutrient content (https://ecoquery.ecoinvent.org/File/Reports).
  Corresponds to 419.0 kg/ha
- planting: 1.53466e-10 ha; lognormal variance with pedigree 0.160177, pedigree (2,1,3,5,4)
  Expert estimation: energy consumption has been estimated as similar to planting in open field
- packaging, for pesticides: 1.23323e-7 kg; lognormal variance with pedigree 0.0532, pedigree (4,3,3,5,4)
  Total amount of active substance/s of pesticides needed for the production of tomato, fresh grade is calculated to be circa 9.46E-05 kg. Pesticide/s used in this dataset is/are: 'pesticide, unspecified'. The total amount of active substance/s is doubled in order to account for the packaging of the dilluted product of pesticide/s that is/are applied. Therefore, 1.89E-04 kg of packaging for pesticides is justified with this exchange.
- urea, as N: 5.01913e-9 kg; lognormal variance with pedigree 0.120177, pedigree (2,1,3,5,1)
  Calculated based on literature values: The nutrient content of the crop multiplied by the country-share of the fertiliser type (IFA 2014). See supporting documentation 'WFLDB-Documentation.pdf' chapter 'Fertiliser application' for L1 data and appendix for the source of nutrient content (https://ecoquery.ecoinvent.org/File/Reports).
  Corresponds to 26.5 kg/ha
- packaging, for fertilisers: 5.9583e-7 kg; lognormal variance with pedigree 0.0532, pedigree (4,3,3,5,4)
  Total amount of active substance/s of fertilisers needed for the production of 'tomato, fresh grade' is calculated to be circa 3.90E-03 kg. Fertiliser/s used in this dataset is/are: 'ammonia, liquid', 'ammonium nitrate, as N', 'ammonium sulfate, as N', 'nitrogen fertiliser, as N', 'potassium chloride, as K2O', 'potassium fertiliser, as K2O', 'potassium sulfate, as K2O', 'urea, as N'. The total amount of active substance/s is doubled in order to account for the packaging of the dilluted product of fertiliser/s that is/are applied. Therefore, 7.80E-03 kg of packaging for fertilisers is justified with this exchange.
- ammonium sulfate, as N: 2.8118e-9 kg; lognormal variance with pedigree 0.120177, pedigree (2,1,3,5,1)
  Calculated based on literature values: The nutrient content of the crop multiplied by the country-share of the fertiliser type (IFA 2014). See supporting documentation 'WFLDB-Documentation.pdf' chapter 'Fertiliser application' for L1 data and appendix for the source of nutrient content (https://ecoquery.ecoinvent.org/File/Reports).
  Corresponds to 16.5 kg/ha
- greenhouse, glass walls and roof: 1.44762e-6 m2*year; lognormal variance with pedigree 0.120177, pedigree (2,1,3,5,1)
  Calculated value: 1 ha divided by the yield in kg/ha. Note: greenhouse dataset stands for 1 m2 used over 1 year
- nitrogen fertiliser, as N: 1.38947e-7 kg; lognormal variance with pedigree 0.120177, pedigree (2,1,3,5,1)
  Calculated based on literature values: The nutrient content of the crop multiplied by the country-share of the fertiliser type (IFA 2014). See supporting documentation 'WFLDB-Documentation.pdf' chapter 'Fertiliser application' for L1 data and appendix for the source of nutrient content (https://ecoquery.ecoinvent.org/File/Reports).
  Corresponds to 101.0 kg/ha
- ammonia, liquid: 7.45925e-9 kg; lognormal variance with pedigree 0.120177, pedigree (2,1,3,5,1)
  Calculated based on literature values: The nutrient content of the crop multiplied by the country-share of the fertiliser type (IFA 2014). See supporting documentation 'WFLDB-Documentation.pdf' chapter 'Fertiliser application' for L1 data and appendix for the source of nutrient content (https://ecoquery.ecoinvent.org/File/Reports).
  Corresponds to 45.7 kg/ha
- application of plant protection product, by field sprayer: 4.51695e-10 ha; lognormal variance with pedigree 0.120664, pedigree (2,2,3,5,1)
  Expert estimation.
- transport, tractor and trailer, agricultural: 4.57574e-8 metric ton*km; lognormal variance with pedigree 0.158439, pedigree (4,1,3,5,1)
  On-farm transport: Yield (in tonnes) multiplied by the average distance from field to farm. The distance was obtained by extrapolation (modified MEXALCA approach). See supporting documentation 'WFLDB-Documentation.pdf' chapter 'Machinery processes' (https://ecoquery.ecoinvent.org/File/Reports).
- pesticide, unspecified: 6.89518e-9 kg; lognormal variance with pedigree 0.00984984, pedigree (2,2,3,5,1)
  Proxy: Extrapolated using a modified MEXALCA-approach (Roches et al. 2010; Nemecek et al. 2012). See supporting documentation 'WFLDB-Documentation.pdf' chapter 'Pesticide application' for L1 data (https://ecoquery.ecoinvent.org/File/Reports).
  Corresponds to 45.7 kg/ha
- tomato seedling, for planting: 4.29705e-6 unit; source Martínez-Blanco J. 2011; lognormal variance with pedigree 0.120177, pedigree (2,1,3,5,1)
  Literature value or expert estimation (Martínez-Blanco et al. 2011). 2.5 plants per m2 is considered.
- potassium sulfate, as K2O: 1.54653e-8 kg; lognormal variance with pedigree 0.120177, pedigree (2,1,3,5,1)
  Calculated based on literature values: The nutrient content of the crop multiplied by the country-share of the fertiliser type (IFA 2014). See supporting documentation 'WFLDB-Documentation.pdf' chapter 'Fertiliser application' for L1 data and appendix for the source of nutrient content (https://ecoquery.ecoinvent.org/File/Reports).
  Corresponds to 102.0 kg/ha
- ammonium nitrate, as N: 2.45059e-9 kg; lognormal variance with pedigree 0.120177, pedigree (2,1,3,5,1)
  Calculated based on literature values: The nutrient content of the crop multiplied by the country-share of the fertiliser type (IFA 2014). See supporting documentation 'WFLDB-Documentation.pdf' chapter 'Fertiliser application' for L1 data and appendix for the source of nutrient content (https://ecoquery.ecoinvent.org/File/Reports).
  Corresponds to 14.1 kg/ha
- irrigation: 2.92197e-8, 1.24029e-9, 4.96116e-11, 2.61205e-7, 4.28046e-9, 2.1404e-10, 1.18946e-8, 1.97825e-9, 5.01952e-7, 9.64872e-9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 m3 (16 suppliers, which the file names only by identifier); sum of these 1.00739e-6 m3; lognormal variance with pedigree 0.120177, pedigree (2,1,3,5,1)
  Literature value: total amount of water used for irrigation (Torellas et al. 2012). See supporting documentation 'WFLDB-Documentation.pdf' chapter 'Water use for irrigation' (https://ecoquery.ecoinvent.org/File/Reports).
- electricity, low voltage: 3.20846e-7 kWh; source Stoessel F. 2012; lognormal variance with pedigree 0.120177, pedigree (2,1,3,5,1)
  Literature value or expert estimation (Stoessel et al. 2012).
- heat, central or small-scale, natural gas: 6.45136e-11, 0.000618217 MJ (2 suppliers, which the file names only by identifier); sum of these 0.000618217 MJ; source Stoessel F. 2012; lognormal variance with pedigree 0.120177, pedigree (2,1,3,5,1)
  Literature value or expert estimation (Stoessel et al. 2012).
- phosphate fertiliser, as P2O5: 4.3053e-9 kg; source Torellas M. 2012; lognormal variance with pedigree 0.120177, pedigree (2,1,3,5,1)
  Calculated based on literature values or expert estimation: The total amount of nutrient (Torellas et al. 2012) multiplied by the country-share of fertiliser type (IFA 2014). See supporting documentation 'WFLDB-Documentation.pdf' chapter 'Fertiliser application' for L3 and L4 data (https://ecoquery.ecoinvent.org/File/Reports).
  Corresponds to 90.2 kg/ha
- greenhouse, plastic walls and roof: 8.70385e-8 m2*year; source Torellas M. 2012; lognormal variance with pedigree 0.120177, pedigree (2,1,3,5,1)
  (same comment as for greenhouse, glass walls and roof)
- phosphate rock, as P2O5, beneficiated, dry: 9.88757e-11 kg; source Torellas M. 2012; lognormal variance with pedigree 0.120177, pedigree (2,1,3,5,1)
  Calculated based on literature values or expert estimation: The total amount of nutrient (Torellas et al. 2012) multiplied by the country-share of fertiliser type (IFA 2014). See supporting documentation 'WFLDB-Documentation.pdf' chapter 'Fertiliser application' for L3 and L4 data (https://ecoquery.ecoinvent.org/File/Reports).
  Corresponds to 11.4 kg/ha
- packaging film, low density polyethylene: 2.80757e-9 kg; source Torellas M. 2012
  Literature value or expert estimation (Torellas et al. 2012). Bed plastic: 694.7 kg/ha, LDPE lifespan: 3 years.
- expanded perlite: 5.47661e-8 kg; source Torellas M. 2012
  Literature value or expert estimation (Torellas et al. 2012). Substrate: 18'876.5 kg/ha, Perlite lifespan: 3 years.
- waste polyethylene: -1.45383e-13, -3.6301e-13, -1.98485e-13, -1.53984e-13, -4.05323e-13, -3.16461e-11, -2.11447e-12, -1.59914e-13, -5.43225e-14, -4.59046e-12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 kg (41 suppliers, which the file names only by identifier); sum of these -2.80874e-10 kg
  End-of-life treatment of bed plastic and substrate bags (PE used as proxy). Based on Torellas et al. (2012), 50% is landfilled and 50% is recycled
  production volume 1.55223e7 kg
- waste polystyrene: -1.82798e-12, -5.73765e-13, -1.43265e-12, -7.83339e-13, -6.0771e-13, -1.59964e-12, -1.24894e-10, -8.34494e-12, -6.31114e-13, -2.14388e-13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 kg (42 suppliers, which the file names only by identifier); sum of these -1.11032e-9 kg
  End-of-life treatment of substrate bed (PS). Based on Torellas et al. (2012), 50% is landfilled and 50% is recycled
  production volume 6.12599e7 kg
- irrigation: 2.00952e-8 m3; source Torellas M. 2012; lognormal variance with pedigree 0.120177, pedigree (2,1,3,5,1)
  (same comment as for irrigation)
## Inputs from nature
- Water, well, in ground [natural resource, in water]: 2.23331e-9 m3; source MAN Nutzfahrzeuge AG 2000; lognormal variance with pedigree 0.05, pedigree (1,1,5,1,1)
  Calculated value. About 95% of the consumed tap water and groundwater are used in the final assembly of vehicles (own calculations based on MAN Nutzfahrzeuge AG (2002)).
- Transformation, from pasture, man made [natural resource, land]: 2.94803e-8 m2; lognormal variance with pedigree 0.1601, pedigree (1,2,5,1,1)
  Modelled, based on "Agricultural Buildings" - pdf-document on the dedicated talk page of ecoinvent (www.ecoinvent.org/talk-pages)
- Occupation, urban, discontinuously built [natural resource, land]: 7.52175e-7 m2*year; lognormal variance with pedigree 0.0801, pedigree (1,2,5,1,1)
  (same comment as for Transformation, from pasture, man made)
- Occupation, construction site [natural resource, land]: 1.56078e-8 m2*year; lognormal variance with pedigree 0.0801, pedigree (1,2,5,1,1)
  (same comment as for Transformation, from pasture, man made)
- Transformation, to urban, discontinuously built [natural resource, land]: 2.94803e-8 m2; lognormal variance with pedigree 0.1601, pedigree (1,2,5,1,1)
  (same comment as for Transformation, from pasture, man made)
- Transformation, from unspecified [natural resource, land]: 1.30344e-5 m2; lognormal variance with pedigree 0.238, pedigree (5,5,5,1,1)
  Rough estimation
  Uncertainty: Rough estimation
- Transformation, to industrial area [natural resource, land]: 1.30344e-5 m2; lognormal variance with pedigree 0.238, pedigree (5,5,5,1,1)
  Rough estimation
  Uncertainty: Rough estimation
- Occupation, industrial area [natural resource, land]: 0.000782085 m2*year; lognormal variance with pedigree 0.158, pedigree (5,5,5,1,1)
  Rough estimation for 70a life time
  Uncertainty: Rough estimation for 70a life time
- Water, salt, ocean [natural resource, in water]: 1.98725e-6 m3; source Al-Sarkal, T. 2013; lognormal variance with pedigree 0.002, pedigree (1,1,3,1,1)
  Calculated value. Based on ratio of raw water intake and permeate of Fujairah-1 seawater reverse osmosis plant.
  Uncertainty: Calculated variable. Uncertainty will be determined from propagation of uncertainty factors of underlying variables. Uncertainty of actual relation between variables not accounted for at this time, although this could be included in a future update.
- Transformation, to urban, continuously built [natural resource, land]: 1.78585e-10 m2; lognormal variance with pedigree 0.242225, pedigree (1,4,2,2,5)
  Calculated value. Based on survey data that have specified he gross floor area of the hotel which is 20260 m2 .
- Occupation, urban, continuously built [natural resource, land]: 1.33939e-8 m2*year; lognormal variance with pedigree 0.162225, pedigree (1,4,2,2,5)
  Calculated value. Based on survey data, the gross floor area is 20260 m2, multiplied by the lifetime of the building.
- Transformation, from urban, continuously built [natural resource, land]: 1.78585e-10 m2; lognormal variance with pedigree 0.242225, pedigree (1,4,2,2,5)
  (same comment as for Transformation, to urban, continuously built)
- Transformation, from arable land, unspecified use [natural resource, land]: 1.53466e-6 m2; lognormal variance with pedigree 0.0402144, pedigree (2,1,3,5,1)
  Land transformation: 1 ha divided by yield
- Carbon dioxide, in air [natural resource, in air]: 7.17519e-6 kg; lognormal variance with pedigree 0.00984984, pedigree (2,2,3,5,1)
  CO2 uptake by biomass
- Transformation, to arable land, unspecified use [natural resource, land]: 1.53466e-6 m2; lognormal variance with pedigree 0.0402144, pedigree (2,1,3,5,1)
  Land transformation: 1 ha divided by yield
- Occupation, annual crop [natural resource, land]: 1.53881e-6 m2*year; lognormal variance with pedigree 0.0160616, pedigree (2,1,3,5,1)
  Related to the duration from harvest date of previous crop to harvest date of main crop.
- Energy, gross calorific value, in biomass [natural resource, biotic]: 6.44995e-5 MJ; lognormal variance with pedigree 0.00984984, pedigree (2,2,3,5,1)

## Emissions to nature
- Dioxins, measured as 2,3,7,8-tetrachlorodibenzo-p-dioxin [air, urban air close to ground]: 0 kg; pedigree (1,1,1,1,1)
  Incomplete combustion product emitted to air.
  Uncertainty: uncertainty calculated from uncertainty in average operation emissions, and the uncertainty of the flue gas volume from this waste.
- Chromium VI [water, surface water]: 0 kg; pedigree (1,1,1,1,1)
  Emissions to water from waste composition and transfer coefficients in incinerator and landfills.
  Uncertainty: uncertainty is calculated from uncertainties in waste composition and transfer coefficients in incinerator and landfills
- Particulates, < 2.5 um [air, urban air close to ground]: 5.21146e-12 kg; lognormal variance with pedigree 0.30374, pedigree (1,1,3,1,1)
  (same comment as for Dioxins, measured as 2,3,7,8-tetrachlorodibenzo-p-dioxin)
- Methane, fossil [air, urban air close to ground]: 0 kg; pedigree (1,1,1,1,1)
  (same comment as for Dioxins, measured as 2,3,7,8-tetrachlorodibenzo-p-dioxin)
- Water [water, surface water]: 1.5044e-8 m3
  Process water released to surface water.
- Sodium, ion [water, ground-, long-term]: 0 kg; pedigree (1,1,1,1,1)
  Long-term emissions from landfilling of incineration residues.
  Uncertainty: uncertainty is calculated from uncertainties in waste composition and transfer coefficients in incinerator and landfills.
- Methane, non-fossil [air, urban air close to ground]: 0 kg; pedigree (1,1,1,1,1)
  (same comment as for Dioxins, measured as 2,3,7,8-tetrachlorodibenzo-p-dioxin)
- NMVOC, non-methane volatile organic compounds, unspecified origin [air, urban air close to ground]: 0 kg; pedigree (1,1,1,1,1)
  (same comment as for Dioxins, measured as 2,3,7,8-tetrachlorodibenzo-p-dioxin)
- Carbon monoxide, fossil [air, urban air close to ground]: 0 kg; pedigree (1,1,1,1,1)
  (same comment as for Dioxins, measured as 2,3,7,8-tetrachlorodibenzo-p-dioxin)
- Calcium, ion [water, ground-, long-term]: 0 kg; pedigree (1,1,1,1,1)
  (same comment as for Sodium, ion)
- Carbon monoxide, non-fossil [air, urban air close to ground]: 0 kg; pedigree (1,1,1,1,1)
  (same comment as for Dioxins, measured as 2,3,7,8-tetrachlorodibenzo-p-dioxin)
- Zinc, ion [water, ground-, long-term]: 0 kg; pedigree (1,1,1,1,1)
  (same comment as for Sodium, ion)
- Silicon [water, ground-, long-term]: 0 kg; pedigree (1,1,1,1,1)
  (same comment as for Sodium, ion)
- Lead [water, ground-, long-term]: 0 kg; pedigree (1,1,1,1,1)
  (same comment as for Sodium, ion)
- Chromium VI [water, ground-, long-term]: 0 kg; pedigree (1,1,1,1,1)
  (same comment as for Sodium, ion)
- Heat, waste [water, surface water]: 0 MJ; pedigree (1,1,1,1,1)
  Waste heat generated from heating value of this waste plus any electricity required to process it.
  Uncertainty: uncertainty is calculated from uncertainties in waste composition and uncertainties in energy efficiency and the uncertainty in internal energy demand
- Copper, ion [water, ground-, long-term]: 0 kg; pedigree (1,1,1,1,1)
  (same comment as for Sodium, ion)
- Water [air, urban air close to ground]: 0 m3
  Water vapour from waste humidity, hydrogen oxidation and part of the process water.
- Heat, waste [air, urban air close to ground]: 0 MJ; pedigree (1,1,1,1,1)
  (same comment as for Heat, waste)
- Chloride [water, ground-, long-term]: 0 kg; pedigree (1,1,1,1,1)
  (same comment as for Sodium, ion)
- Phenol, pentachloro- [air, urban air close to ground]: 0 kg; pedigree (1,1,1,1,1)
  (same comment as for Dioxins, measured as 2,3,7,8-tetrachlorodibenzo-p-dioxin)
- Sodium, ion [water, surface water]: 0 kg; pedigree (1,1,1,1,1)
  (same comment as for Chromium VI)
- Benzo(a)pyrene [air, urban air close to ground]: 0 kg; pedigree (1,1,1,1,1)
  (same comment as for Dioxins, measured as 2,3,7,8-tetrachlorodibenzo-p-dioxin)
- Calcium, ion [water, surface water]: 0 kg; pedigree (1,1,1,1,1)
  (same comment as for Chromium VI)
- Benzene, hexachloro- [air, urban air close to ground]: 0 kg; pedigree (1,1,1,1,1)
  (same comment as for Dioxins, measured as 2,3,7,8-tetrachlorodibenzo-p-dioxin)
- Silicon [water, surface water]: 0 kg; pedigree (1,1,1,1,1)
  (same comment as for Chromium VI)
- Toluene [air, urban air close to ground]: 0 kg; pedigree (1,1,1,1,1)
  (same comment as for Dioxins, measured as 2,3,7,8-tetrachlorodibenzo-p-dioxin)
- Lead [water, surface water]: 0 kg; pedigree (1,1,1,1,1)
  (same comment as for Chromium VI)
- Benzene, pentachloro- [air, urban air close to ground]: 0 kg; pedigree (1,1,1,1,1)
  (same comment as for Dioxins, measured as 2,3,7,8-tetrachlorodibenzo-p-dioxin)
- Zinc, ion [water, surface water]: 0 kg; pedigree (1,1,1,1,1)
  (same comment as for Chromium VI)
- Benzene [air, urban air close to ground]: 0 kg; pedigree (1,1,1,1,1)
  (same comment as for Dioxins, measured as 2,3,7,8-tetrachlorodibenzo-p-dioxin)
- Copper, ion [water, surface water]: 0 kg; pedigree (1,1,1,1,1)
  (same comment as for Chromium VI)
- Particulates, > 2.5 um, and < 10um [air, urban air close to ground]: 0 kg; pedigree (1,1,1,1,1)
  (same comment as for Dioxins, measured as 2,3,7,8-tetrachlorodibenzo-p-dioxin)
- Chloride [water, surface water]: 0 kg; pedigree (1,1,1,1,1)
  (same comment as for Chromium VI)
- Water [water, unspecified]: 2.16508e-9 m3; lognormal variance with pedigree 0.0807, pedigree (2,2,5,1,1)
  Calculated value based on literature values and expert opinion. See comments in the parametres' comment field.
- Cadmium [air, unspecified]: 0 kg; source MAN Nutzfahrzeuge AG 2000; pedigree (1,1,1,1,1)
  Calculated value. Based on the diesel consumption for engine testing, direct environmental emissions to air are calculated, employing the emission profile of a lorry 28t empty. Is assumed that diesel is used for engine testing and the operation of fork-lifters. The latter is modeled as building machine.Energy expenditures for stationary combustion processes are available from environmental reports of a German lorry manufacturer MAN Nutzfahrzeuge AG (2000) and MAN Nutzfahrzeuge AG (2002).
  Additional references:
  MAN Nutzfahrzeuge AG (2002) Umwelterklärung 2002. MAN Nutzfahrzeuge AG, München.
- BOD5, Biological Oxygen Demand [water, unspecified]: 4.04889e-12 kg; source Frischknecht R. 2003; lognormal variance with pedigree 0.16, pedigree (1,1,5,1,1)
  Calculated value according to ecoinvent quality guidelines Frischknecht et al. (2003).
- Particulates, > 2.5 um, and < 10um [air, unspecified]: 6.81241e-13 kg; source MAN Nutzfahrzeuge AG 2000; lognormal variance with pedigree 0.16, pedigree (1,1,5,1,1)
  (same comment as for Cadmium)
- Carbon dioxide, fossil [air, unspecified]: 2.03408e-8 kg; source MAN Nutzfahrzeuge AG 2000; lognormal variance with pedigree 0.16, pedigree (1,1,5,1,1)
  (same comment as for Cadmium)
- Lead [air, unspecified]: 0 kg; source MAN Nutzfahrzeuge AG 2000; pedigree (1,1,1,1,1)
  (same comment as for Cadmium)
- Carbon monoxide, fossil [air, unspecified]: 3.12664e-11 kg; source MAN Nutzfahrzeuge AG 2000; lognormal variance with pedigree 0.16, pedigree (1,1,5,1,1)
  (same comment as for Cadmium)
- Toluene [air, unspecified]: 1.77058e-13 kg; source MAN Nutzfahrzeuge AG 2000; lognormal variance with pedigree 0.16, pedigree (1,1,5,1,1)
  (same comment as for Cadmium)
- Chromium [air, unspecified]: 9.41527e-15 kg; source MAN Nutzfahrzeuge AG 2000; lognormal variance with pedigree 0.69, pedigree (1,1,5,1,1)
  (same comment as for Cadmium)
- Particulates, < 2.5 um [air, unspecified]: 8.16204e-12 kg; source MAN Nutzfahrzeuge AG 2000; lognormal variance with pedigree 0.16, pedigree (1,1,5,1,1)
  (same comment as for Cadmium)
- Sulfur dioxide [air, unspecified]: 3.85608e-12 kg; source MAN Nutzfahrzeuge AG 2000; lognormal variance with pedigree 0.16, pedigree (1,1,5,1,1)
  (same comment as for Cadmium)
- Xylene [air, unspecified]: 1.77058e-13 kg; source MAN Nutzfahrzeuge AG 2000; lognormal variance with pedigree 0.16, pedigree (1,1,5,1,1)
  (same comment as for Cadmium)
- COD, Chemical Oxygen Demand [water, unspecified]: 4.04889e-12 kg; source MAN Nutzfahrzeuge AG 2002; lognormal variance with pedigree 0.16, pedigree (1,1,5,1,1)
  Literature value. For automotive stamping, a Chemical Oxygen Demand (COD) is reported MAN Nutzfahrzeuge AG (2002) with 12800 kg/year resulting in a specific COD of 0.126 kg/vehicle.
- Nickel [air, unspecified]: 0 kg; source MAN Nutzfahrzeuge AG 2000; pedigree (1,1,1,1,1)
  (same comment as for Cadmium)
- NMVOC, non-methane volatile organic compounds, unspecified origin [air, unspecified]: 9.52313e-10 kg; source MAN Nutzfahrzeuge AG 2000; lognormal variance with pedigree 0.16, pedigree (1,1,5,1,1)
  (same comment as for Cadmium)
- Ammonia [air, unspecified]: 7.16589e-13 kg; source MAN Nutzfahrzeuge AG 2000; lognormal variance with pedigree 0.16, pedigree (1,1,5,1,1)
  (same comment as for Cadmium)
- Benzene [air, unspecified]: 4.20956e-13 kg; source MAN Nutzfahrzeuge AG 2000; lognormal variance with pedigree 0.16, pedigree (1,1,5,1,1)
  (same comment as for Cadmium)
- Selenium [air, unspecified]: 0 kg; source MAN Nutzfahrzeuge AG 2000; pedigree (1,1,1,1,1)
  (same comment as for Cadmium)
- Copper [air, unspecified]: 9.41527e-15 kg; source MAN Nutzfahrzeuge AG 2000; lognormal variance with pedigree 0.69, pedigree (1,1,5,1,1)
  (same comment as for Cadmium)
- Dinitrogen monoxide [air, unspecified]: 7.16589e-13 kg; source MAN Nutzfahrzeuge AG 2000; lognormal variance with pedigree 0.16, pedigree (1,1,5,1,1)
  (same comment as for Cadmium)
- Nitrogen oxides [air, unspecified]: 1.92804e-10 kg; source MAN Nutzfahrzeuge AG 2000; lognormal variance with pedigree 0.16, pedigree (1,1,5,1,1)
  (same comment as for Cadmium)
- Mercury [air, unspecified]: 0 kg; source MAN Nutzfahrzeuge AG 2000; pedigree (1,1,1,1,1)
  (same comment as for Cadmium)
- Particulates, > 10 um [air, unspecified]: 3.50261e-13 kg; source MAN Nutzfahrzeuge AG 2000; lognormal variance with pedigree 0.16, pedigree (1,1,5,1,1)
  (same comment as for Cadmium)
- TOC, Total Organic Carbon [water, unspecified]: 1.77058e-12 kg; source Frischknecht R. 2003; lognormal variance with pedigree 0.16, pedigree (1,1,5,1,1)
  Calculated value according to ecoinvent quality guidelines Frischknecht et al. (2003).
- Methane, fossil [air, unspecified]: 5.30211e-13 kg; source MAN Nutzfahrzeuge AG 2000; lognormal variance with pedigree 0.16, pedigree (1,1,5,1,1)
  (same comment as for Cadmium)
- DOC, Dissolved Organic Carbon [water, unspecified]: 1.77058e-12 kg; source Frischknecht R. 2003; lognormal variance with pedigree 0.16, pedigree (1,1,5,1,1)
  Calculated value according to ecoinvent quality guidelines Frischknecht et al. (2003).
- Water [air, unspecified]: 5.28836e-9 m3; lognormal variance with pedigree 0.0807, pedigree (2,2,5,1,1)
  (same comment as for Water)
- Zinc [air, unspecified]: 5.55918e-15 kg; source MAN Nutzfahrzeuge AG 2000; lognormal variance with pedigree 0.69, pedigree (1,1,5,1,1)
  (same comment as for Cadmium)
- COD, Chemical Oxygen Demand [water, surface water]: 2.81224e-11 kg; lognormal variance with pedigree 0.0927, pedigree (2,4,5,3,1)
  Uncertainty: LCI of one passenger car
- BOD5, Biological Oxygen Demand [water, surface water]: 3.78852e-12 kg; lognormal variance with pedigree 0.0927, pedigree (2,4,5,3,1)
  Uncertainty: LCI of one passenger car
- TOC, Total Organic Carbon [water, surface water]: 1.04157e-11 kg; lognormal variance with pedigree 0.0927, pedigree (2,4,5,3,1)
  Calculated by default as TOC (gC) = COD/2.7 (COD measured in g O2). Should more correctly be calculated from the carbon content of the specified emissions to water.
  Uncertainty: LCI of one passenger car
- DOC, Dissolved Organic Carbon [water, surface water]: 1.04157e-11 kg; lognormal variance with pedigree 0.0927, pedigree (2,4,5,3,1)
  Calculated as equal to TOC.
  Uncertainty: LCI of one passenger car
- Phosphate [water, surface water]: 8.85944e-11 kg; lognormal variance with pedigree 0.0927, pedigree (2,4,5,3,1)
  Uncertainty: LCI of one passenger car
- NMVOC, non-methane volatile organic compounds, unspecified origin [air, non-urban air or from high stacks]: 1.52582e-7 kg; lognormal variance with pedigree 0.0588, pedigree (2,2,5,3,3)
  Derived from the used paint and solvent, assuming all solvent is emitted to air.
  Uncertainty: Derived from the used paint and solvent, assuming all solvent is emitted to air.
- Boron [water, ocean]: 8.112e-9 kg; lognormal variance with pedigree 0.046, pedigree (3,4,3,1,1)
  Calculated value. Mass of ion returned to the ocean with the concentrate as calculated by modeling for seawater reverse osmosis with conventional pretreatment considering single stage baseline 8-inch spiral wound modules using ROSA system design software (Dow Chemical). Note that the impact from emission of concentrate reside mostly in the high ion loaded water and small area of release which individual substance emissions will not be well acounted by impact models.
- Carbon dioxide, non-fossil [air, non-urban air or from high stacks]: 2.43762e-8 kg; lognormal variance with pedigree 0.0446, pedigree (5,4,3,1,1)
  Calculated value. Mass of carbon dioxide emitted to air assuming carbon dioxide in concentrate under pressure will all be emited to air after release of concentrate at atmospheric conditions. Concentraiton in concentrate was calculated by modeling seawater reverse osmosis using ROSA system design software (Dow Chemical).
- Potassium, ion [water, ocean]: 7.64858e-7 kg; lognormal variance with pedigree 0.046, pedigree (3,4,3,1,1)
  (same comment as for Boron)
- Hydrogen carbonate [water, ocean]: 2.58251e-7 kg; lognormal variance with pedigree 0.046, pedigree (3,4,3,1,1)
  Calculated value. Mass of ion returned to the ocean with the concentrate as calculated by modeling for seawater reverse osmosis with conventional pretreatment considering single stage baseline 8-inch spiral wound modules using ROSA system design software (Dow Chemical) and RWT for recarbonisation. Note that the impact from emission of concentrate reside mostly in the high ion loaded water and small area of release which individual substance emissions will not be well acounted by impact models.
- Strontium [water, ocean]: 2.58249e-8 kg; lognormal variance with pedigree 0.046, pedigree (3,4,3,1,1)
  (same comment as for Boron)
- Chloride [water, ocean]: 3.82164e-5 kg; lognormal variance with pedigree 0.046, pedigree (3,4,3,1,1)
  (same comment as for Boron)
- Water [water, ocean]: 1.11651e-6 m3; lognormal variance with pedigree 0.0066, pedigree (3,4,3,1,1)
  Calculated value. Volume of concentrate (water returned to the environment) based production of 1 kg of tap water and on recovery rate.
- Fluoride [water, ocean]: 1.98229e-9 kg; lognormal variance with pedigree 0.046, pedigree (3,4,3,1,1)
  (same comment as for Boron)
- Sodium, ion [water, ocean]: 2.12393e-5 kg; lognormal variance with pedigree 0.046, pedigree (3,4,3,1,1)
  (same comment as for Boron)
- Carbonate [water, ocean]: 2.37487e-9 kg; lognormal variance with pedigree 0.046, pedigree (3,4,3,1,1)
  (same comment as for Hydrogen carbonate)
- Calcium, ion [water, ocean]: 8.06387e-7 kg; lognormal variance with pedigree 0.046, pedigree (3,4,3,1,1)
  (same comment as for Hydrogen carbonate)
- Sulfate [water, ocean]: 5.4144e-6 kg; lognormal variance with pedigree 0.046, pedigree (3,4,3,1,1)
  (same comment as for Boron)
- Magnesium [water, ocean]: 2.56414e-6 kg; lognormal variance with pedigree 0.046, pedigree (3,4,3,1,1)
  (same comment as for Boron)
- Carbon dioxide, fossil [air, urban air close to ground]: 3.82174e-10 kg; lognormal variance with pedigree 0.0901, pedigree (4,2,5,5,1)
  Estimation for decomposition of carbonates
  Uncertainty: Estimation for decomposition of carbonates
- Nitrogen oxides [air, urban air close to ground]: 2.26525e-10 kg; lognormal variance with pedigree 0.0827, pedigree (2,2,5,5,1)
  Questionnaire
  Uncertainty: Questionnaire
- Pesticides, unspecified [soil, agricultural]: 6.61405e-9 kg; lognormal variance with pedigree 0.0407216, pedigree (2,2,3,5,1)
  Calculated value - 100% emission in soil. See 'WFLDB-Guidelines.pdf', available at https://ecoquery.ecoinvent.org/File/Reports.
- Carbon dioxide, from soil or biomass stock [air, non-urban air or from high stacks]: 2.07778e-7 kg; normal variance with pedigree 0.5452, pedigree (3,3,5,5,2)
  Global average LUC emissions according 2nd edition of the Quantis-modified tool developed by Blonk Consultants 'WFLDB-adapted-Blonk 2014 direct-land-use-change-assessment-tool_2015-05-18a.xlsx', tab. 'Country & land use unknown'. The emission are based on the relative change in production areas in all countries for a given crop. The weighted average is used which takes into acount relative difference in crop expansion into primary forest, secondary forest, grassland, perennial and annual land.
- Zinc [soil, agricultural]: -8.60991e-11 kg; source Freiermuth R.  2006
  Comment on mathematicalRelation:
  4.81628211661e-07 from Calculated value - Freiermuth (2006). See 'WFLDB-Guidelines.pdf', available at https://ecoquery.ecoinvent.org/File/Reports.
  -1.75485562777e-06 from Crop, default, heavy metals uptake model
  Heavy metal uptake can be excluded by setting the parameter heavyMetalUptakeSwitch to zero.
- Copper [soil, agricultural]: -2.09786e-11 kg; source Freiermuth R.  2006
  Comment on mathematicalRelation:
  5.89906400698e-08 from Calculated value - Freiermuth (2006). See 'WFLDB-Guidelines.pdf', available at https://ecoquery.ecoinvent.org/File/Reports.
  Heavy metal uptake can be excluded by setting the parameter heavyMetalUptakeSwitch to zero.
- Mercury [soil, agricultural]: -8.35238e-14 kg; source Freiermuth R.  2006
  Comment on mathematicalRelation:
  9.86088857224e-10 from Calculated value - Freiermuth (2006). See 'WFLDB-Guidelines.pdf', available at https://ecoquery.ecoinvent.org/File/Reports.
  -2.22246275614e-09 from Crop, default, heavy metals uptake model
  Heavy metal uptake can be excluded by setting the parameter heavyMetalUptakeSwitch to zero.
- Carbon dioxide, fossil [air, non-urban air or from high stacks]: 1.18199e-8 kg; lognormal variance with pedigree 0.00984984, pedigree (2,2,3,5,1)
  Calculated value - CO2 emissions from urea and lime. See 'WFLDB-Guidelines.pdf', available at https://ecoquery.ecoinvent.org/File/Reports.
- Water [air, non-urban air or from high stacks]: 1.69218e-7 m3; lognormal variance with pedigree 0.120177, pedigree (2,1,3,5,1)
  Calculated value - Emission calculated from water balance. See 'WFLDB-Guidelines.pdf', available at https://ecoquery.ecoinvent.org/File/Reports.
- Dinitrogen monoxide [air, non-urban air or from high stacks]: 3.24144e-9 kg; source IPCC 2006; lognormal variance with pedigree 0.120664, pedigree (2,2,3,5,1)
  Calculated value - IPCC (2006). See 'WFLDB-Guidelines.pdf', available at https://ecoquery.ecoinvent.org/File/Reports.
- Cadmium [soil, agricultural]: 9.07686e-13 kg; source Freiermuth R.  2006
  Comment on mathematicalRelation:
  1.4658166308e-08 from Calculated value - Freiermuth (2006). See 'WFLDB-Guidelines.pdf', available at https://ecoquery.ecoinvent.org/File/Reports.
  -5.56437686799e-09 from Crop, default, heavy metals uptake model
  Heavy metal uptake can be excluded by setting the parameter heavyMetalUptakeSwitch to zero.
- Ammonia [air, non-urban air or from high stacks]: 6.20783e-9 kg; source EEA 2013; lognormal variance with pedigree 0.0407216, pedigree (2,2,3,5,1)
  Calculated value - EMEP/EEA (2013). See 'WFLDB-Guidelines.pdf', available at https://ecoquery.ecoinvent.org/File/Reports.
- Mercury [water, ground-]: 0 kg; source Freiermuth R.  2006; pedigree (1,1,1,1,1)
  Calculated value - Freiermuth (2006). See 'WFLDB-Guidelines.pdf', available at https://ecoquery.ecoinvent.org/File/Reports.
- Lead [water, ground-]: 4.81624e-14 kg; source Freiermuth R.  2006; lognormal variance with pedigree 0.352938, pedigree (2,2,3,5,1)
  (same comment as for Mercury)
- Copper, ion [water, ground-]: 5.16631e-13 kg; source Freiermuth R.  2006; lognormal variance with pedigree 0.352938, pedigree (2,2,3,5,1)
  (same comment as for Mercury)
- Chromium, ion [water, ground-]: 3.13509e-12 kg; source Freiermuth R.  2006; lognormal variance with pedigree 0.352938, pedigree (2,2,3,5,1)
  (same comment as for Mercury)
- Nickel [soil, agricultural]: 6.03009e-13 kg; source Freiermuth R.  2006
  Comment on mathematicalRelation:
  5.76088090407e-08 from Calculated value - Freiermuth (2006). See 'WFLDB-Guidelines.pdf', available at https://ecoquery.ecoinvent.org/File/Reports.
  -5.72439243284e-08 from Crop, default, heavy metals uptake model
  Heavy metal uptake can be excluded by setting the parameter heavyMetalUptakeSwitch to zero.
- Cadmium, ion [water, ground-]: 7.03593e-15 kg; source Freiermuth R.  2006; lognormal variance with pedigree 0.352938, pedigree (2,2,3,5,1)
  (same comment as for Mercury)
- Phosphate [water, ground-]: 3.30106e-11 kg; source Prasuhn V.  2006; lognormal variance with pedigree 0.171866, pedigree (2,2,3,5,1)
  Calculated value - Prasuhn (2006). See 'WFLDB-Guidelines.pdf', available at https://ecoquery.ecoinvent.org/File/Reports.
- Lead [soil, agricultural]: 1.15581e-12 kg; source Freiermuth R.  2006
  Comment on mathematicalRelation:
  -2.96341154117e-08 from Crop, default, heavy metals uptake model
  Heavy metal uptake can be excluded by setting the parameter heavyMetalUptakeSwitch to zero.
- Chromium [soil, agricultural]: 1.14465e-11 kg; source Freiermuth R.  2006
  Comment on mathematicalRelation:
  1.34804305605e-07 from Calculated value - Freiermuth (2006). See 'WFLDB-Guidelines.pdf', available at https://ecoquery.ecoinvent.org/File/Reports.
  -2.98659187813e-08 from Crop, default, heavy metals uptake model
  Heavy metal uptake can be excluded by setting the parameter heavyMetalUptakeSwitch to zero.
- Water [water, ground-]: 3.761e-9 m3; lognormal variance with pedigree 0.120177, pedigree (2,1,3,5,1)
  (same comment as for Water)
- Nitrogen oxides [air, non-urban air or from high stacks]: 6.12602e-9 kg; source EEA 2013; lognormal variance with pedigree 0.120664, pedigree (2,2,3,5,1)
  Calculated value - EEA/EMEP (2013). See 'WFLDB-Guidelines.pdf', available at https://ecoquery.ecoinvent.org/File/Reports.
- Zinc, ion [water, ground-]: 3.79757e-12 kg; source Freiermuth R.  2006; lognormal variance with pedigree 0.352938, pedigree (2,2,3,5,1)
  (same comment as for Mercury)
- Insecticides, unspecified [soil, agricultural]: 3.30746e-11 kg; lognormal variance with pedigree 0.0407216, pedigree (2,2,3,5,1)
  (same comment as for Pesticides, unspecified)
- Fungicides, unspecified [soil, agricultural]: 2.4806e-10 kg; lognormal variance with pedigree 0.0407216, pedigree (2,2,3,5,1)
  (same comment as for Pesticides, unspecified)
- Nitrate [water, ground-]: 3.12468e-9 kg
  Calculated value - Torellas et al. (2012): Water emissions of NO3: 359 kg/ha (The irrigation system is an open- loop drip system, without recirculation of drainage water). See 'WFLDB-Guidelines.pdf', available at https://ecoquery.ecoinvent.org/File/Reports.
