# dust collector production, electrostatic precipitator, for industrial use

Dataset: EcoSpold 2, unit process
Geography: CH
Time period: 2010-01-01 to 2019-12-31
Technology level: current
Classification: EcoSpold01Categories: wood energy/heating systems
Classification: ISIC rev.4 ecoinvent: 2819:Manufacture of other general-purpose machinery
Synonyms: dust precipitator; exhaust aftertreatment control system; particulate filter; dust collector
Tags: biomass power
Scenario: Business-as-Usual
System model: Allocation at the point of substitution
Generated by: Marco Mina
Database: ecoinvent
isCopyrightProtected: true
accessRestrictedTo: 1

## General comment
This dataset represent the production and the disposal of an electrostatic precipitator for industrial use, dimensioned to be connected to a wood furnace with capacity between 500 and 1000kW. Its air flow capacity is 1100 litres per second. Is modeled from an electrostatic precipitator for biomass burning but it could be used as a dust collector for other industrial processes (exaust after-treatment) with a compatible capacity.

## Included activities start
From reception of furnace components at the factory gate

## Included activities end
This activity ends with the disposal of the device in the end of its lifetime.The dataset includes the most important materials used for the fabrication of the electrostatic precipitator (ESP) for industrial use: steel, stainless steel, copper, aluminium, mineral wool, plastics. The dataset includes energy required for the construction and the disposal of the device. The dataset doesnt include the basement in concrete for its installation.

## Geography
Could be used for central European conditions.

## Technology
Typical electrostatic precipitator for particulate matter collection from wood boilers. This device is dimensioned to be applied in conjunction with a wood furnace with 1000kW thermal capacity.
Source image: http://www.gmefilter.ch/2011D.pdf (modified)

## Reference product
- dust collector, electrostatic precipitator, for industrial use: 1 unit; CPC 4393: General-purpose machinery n.e.c.; By-product classification allocatable product
  production volume 50 unit; name dust_collector
    estimated from the produced number of furnaces (the device is applied together - only in a small percentages of new stoves installed are equiped with this device) - high uncertainty
  property price 1284.25 EUR2005
    Calculated based on inputs: The price of the product has been calculated as a sum of the values of the material and energy inputs for this product. This value is therefore a rough estimation. It may underestimate the real price since there are additional expenses when producing any product. These expences can include for example labour costs, treatment of waste materials and profit for the producer. Please consider carefully whether this level of data quality is acceptable for your application.
  property lifetime capacity [l] 7.008e11 l; name lifetime_capacity_l; = (20*365*24*60*60)* (capacity_l_per_hour/3600)
    lifetime capacity in litres
  property capacity [l/hour] 4e6 l/hour; name capacity_l_per_hour
    capacity in litres per hour
  property lifetime 20 year; name lifetime
  property true value 1284.25
    allocation property applied in "true value" allocation // value calculated from revenue

## By-products
- iron scrap, sorted, pressed: 0 kg; By-product classification Recyclable; CPC 39310: Slag, dross, scalings and other waste from the manufacture of iron or steel; pedigree (1,1,1,1,1)
  Iron scrap recovered from this waste.
  Uncertainty: uncertainty calculated from uncertainty in waste composition, uncertainty of share of recyclable metal, uncertainty of transfer coefficient to bottom ash, uncertainty of the efficiency of scrap removal in MSWI plant.
  production volume 8106.3 kg
  property price 0.175 EUR2005
    Temporary price data. Calculated as 90% of purchasers price based on: 2005 import and export prices (total trades (USD) divided by total weight (kg) in biggest economies of the world: EU27, USA, Brasil, China, India, Japan and Russia) from UN Commodity Trade Statistics Database (http://data.un.org/Explorer.aspxDatabase [Accessed 2011.06.20]). Commodity: Waste or scrap, of cast iron
  property carbon content 0
    carbon content on a dry matter basis (reserved; not for manual entry)
  property true value 28.372
    allocation property applied in "true value" allocation // value calculated from revenue
  properties: wet mass 1 kg, water in wet mass 0 kg, carbon content, non-fossil 0, carbon content, fossil 0, dry mass 1 kg, water content 0, carbon allocation 0 kg
- copper: 0 kg; source Rentz O. 1999; By-product classification allocatable product; CPC 41413: Refined copper and copper alloys, unwrought; master alloys of copper
  Literature value. Copper uses: Before end-use copper is manufactured into semi fabricated products, such as shapes and ingots (known as 'semis'). These manufacturing processes are subdivided into hot working, cold working and, if necessary, process annealing. Few of the semis are ready for use as such. They more typically travel to first-stage manufacturers, who make metal rods, wire, and casting, and then to component manufacturers who produce such things as motors, valves, and insulated cables The components in turn are incorporated by final-stage manufacturers into a variety of finished products - automobiles, commercial buildings, residential housing, and so forth. These uses account for about 79% of the world-wide consumption of copper.
  production volume 459.283 kg
  properties: dry mass 1 kg, water in wet mass 0 kg, wet mass 1 kg, carbon content, non-fossil 0, water content 0, price 5.52 EUR2005, carbon content, fossil 0, carbon content 0, carbon allocation 0 kg, true value 50.7049
- electricity, for reuse in municipal waste incineration only: 0 kWh; CPC 17100: Electrical energy; By-product classification allocatable product; pedigree (1,1,1,1,1)
  Net electricity generated from this waste and used in internal MSWI plant energy redistribution.
  Uncertainty: uncertainty is calculated from uncertainties in waste composition and uncertainties in energy efficiency and the uncertainty in internal energy demand
  production volume 2477.62 kWh
  property exergy 3.6 MJ; name E_el_prod_MSWI_exergy
    This exergy property is based on the exergy content of the product.
  property true value relation 3.6; name E_el_prod_MSWI_true_value_relation
    property to calculate "true value" from
  property price 0.1 EUR2005; name E_el_prod_MSWI_price_EUR2005
    Estimated to be the same price as in case of electricity, medium voltage.
  property true value 6.34605
    allocation property applied in "true value" allocation // value calculated from true value relation
- heat, for reuse in municipal waste incineration only: 0 MJ; CPC 17300: Steam and hot water; By-product classification allocatable product; pedigree (1,1,1,1,1)
  Net useful heat generated from this waste and used in internal MSWI plant energy redistribution.
  Uncertainty: uncertainty is calculated from uncertainties in waste composition and uncertainties in energy efficiency and the uncertainty in internal energy demand
  production volume 17182.2 MJ
  property true value relation 0.1842; name E_th_prod_MSWI_true_value_relation
    property to calculate "true value" from
  property exergy 0.1842 MJ; name E_th_prod_MSWI_exergy
    This exergy property is based on the exergy content of the product.
  property price 0.0106 EUR2005; name E_th_prod_MSWI_price_EUR2005
    Average European district heat price from Ecoheatcool and Euroheat 2005-2006, Ecoheat Work package 1: The European heat market. Final report. 10.6 EUR/GJ i s the price of district heat. http://www.solarthermalworld.org/files/Ecoheatcool%20WP1%20Web.pdf?download
  property true value 2.25182
    (same comment as for electricity, for reuse in municipal waste incineration only)
- zinc concentrate: 0 kg; CPC 14290: Other non-ferrous metal ores and concentrates (other than uranium or thorium ores and concentrates); By-product classification allocatable product
  Calculated value from the knowledge of the properties of both products.
  production volume 0.162531 kg
  property price 0.38 EUR2005; name ByP_price_EUR2005
    Temporary price data. Calculated as 90% of purchasers price based on: Zinc content in concentrate 53%. Concentrate price per kg Zn 86.5% of refined Zn price (13.5% treatment charges according to CHR Metals Limited 2005: Dynamic cost curves. http://www.minecost.com/dynamic.pdf). 2004 zinc price from USGS (2007) Mineral commodity summaries 2007. <http://minerals.usgs.gov/minerals/pubs/mcs/2007/mcs2007.pdf> [Accessed 25 May 2010]
  property zinc content 0.53; name zinc_C_zinc_concentrate
    Zinc content on a dry matter basis. Value taken from teh "zinc mine operation" /GLO dataset.
  property dry mass 1 kg; name DM_zinc_concentrate
  property carbon content 0
    carbon content on a dry matter basis (reserved; not for manual entry)
  property true value 0.00123524
    allocation property applied in "true value" allocation // value calculated from revenue
  properties: wet mass 1 kg, water content 0, carbon content, non-fossil 0, carbon content, fossil 0, water in wet mass 0 kg, carbon allocation 0 kg
- lead: 0 kg; CPC 41441: Lead, unwrought; By-product classification allocatable product
  EcoSpold01Location=SE
  production volume 0.560085 kg
  property price 0.744 EUR2005
    Temporary price data. Calculated as 90% of purchasers price based on: Source: ecoinvent v2 report 10-part IX, Tab 5.10 & 2.5
  property carbon content 0
    carbon content on a dry matter basis (reserved; not for manual entry)
  property true value 0.00833406
    allocation property applied in "true value" allocation // value calculated from revenue
  properties: wet mass 1 kg, water content 0, carbon content, non-fossil 0, carbon content, fossil 0, dry mass 1 kg, water in wet mass 0 kg, carbon allocation 0 kg
- nickel, 99.5%: 0 kg; CPC 41422: Unwrought nickel; By-product classification allocatable product
  EcoSpold01Location=SE
  production volume 1.16916 kg
  property price 10.4 EUR2005
    Temporary price data. Calculated as 90% of purchasers price based on: 2004 nickel price from USGS (2007) Mineral commodity summaries 2007. <http://minerals.usgs.gov/minerals/pubs/mcs/2007/mcs2007.pdf> [Accessed 25 May 2010]
  property carbon content 0
    carbon content on a dry matter basis (reserved; not for manual entry)
  property true value 0.243186
    allocation property applied in "true value" allocation // value calculated from revenue
  properties: water in wet mass 0 kg, wet mass 1 kg, carbon content, non-fossil 0, dry mass 1 kg, water content 0, carbon content, fossil 0, carbon allocation 0 kg
- silver: 0 kg; CPC 41310: Silver (including silver plated with gold or platinum), unwrought or in semi-manufactured forms, or in powder […]; By-product classification allocatable product; CAS 7440-22-4
  EcoSpold01Location=SE
  production volume 0.193075 kg
  property price 178 EUR2005
    (same comment as for lead)
  property carbon content 0
    carbon content on a dry matter basis (reserved; not for manual entry)
  property true value 0.687348
    allocation property applied in "true value" allocation // value calculated from revenue
  properties: wet mass 1 kg, carbon content, non-fossil 0, dry mass 1 kg, water content 0, carbon content, fossil 0, water in wet mass 0 kg, carbon allocation 0 kg
- palladium: 0 kg; CPC 4160: Other non-ferrous metals and articles thereof (including waste and scrap of some metals); cermets and articles […]; By-product classification allocatable product
  EcoSpold01Location=SE
  production volume 0.010688 kg
  property price 5640 EUR2005
    Temporary price data. Calculated as 90% of purchasers price based on: 2004 price from USGS (2007) Mineral commodity summaries 2007. <http://minerals.usgs.gov/minerals/pubs/mcs/2007/mcs2007.pdf> [Accessed 25 May 2010]
  property carbon content 0
    carbon content on a dry matter basis (reserved; not for manual entry)
  property true value 1.2056
    allocation property applied in "true value" allocation // value calculated from revenue
  properties: wet mass 1 kg, carbon content, fossil 0, water in wet mass 0 kg, water content 0, carbon content, non-fossil 0, dry mass 1 kg, carbon allocation 0 kg
- gold: 0 kg; CPC 41320: Gold (including gold plated with platinum), unwrought or in semi-manufactured forms, or in powder form; By-product classification allocatable product; CAS 7440-57-5
  EcoSpold01Location=SE
  production volume 0.00586125 kg
  property price 10600 EUR2005
    Temporary price data. Calculated as 90% of purchasers price based on: Source: ecoinvent v2 report 10-part IX, Tab 2.5
  property carbon content 0
    carbon content on a dry matter basis (reserved; not for manual entry)
  property true value 1.24258
    allocation property applied in "true value" allocation // value calculated from revenue
  properties: wet mass 1 kg, carbon content, fossil 0, dry mass 1 kg, carbon content, non-fossil 0, water content 0, water in wet mass 0 kg, carbon allocation 0 kg
- iron scrap, unsorted: 0 kg; source European Aluminium Association 2008; CPC 39310: Slag, dross, scalings and other waste from the manufacture of iron or steel; By-product classification Recyclable; pedigree (1,1,1,1,1)
  production volume 0.210378 kg
  property price 0.149 EUR2005; name ironScrapAmount_price_EUR2005
    Temporary price data. Calculated as 90% of purchasers price based on: estimated at 85% of sorted scrap
  property carbon content 0
    carbon content on a dry matter basis (reserved; not for manual entry)
  property true value 0.000626927
    allocation property applied in "true value" allocation // value calculated from revenue
  properties: water in wet mass 0 kg, water content 0, carbon content, fossil 0, carbon content, non-fossil 0, dry mass 1 kg, wet mass 1 kg, carbon allocation 0 kg
- aluminium oxide, non-metallurgical: 0 kg; source European Aluminium Association 2008; CPC 41432: Alumina (aluminium oxide), except artificial corundum; By-product classification allocatable product; CAS 1344-28-1; pedigree (1,1,1,1,1)
  production volume 13.2383 kg
  property carbon content, non-fossil 0; name C_content_non_fossil
  property price 0.28 EUR2005; name Al2O3Amount_price_EUR2005
    From UN trade database. http://data.un.org/ Import data from the largest economies of the world are used (Brazil, India, USA, China, Japan and EU-27).
  property dry mass 1 kg; name DM
  property water content 0; name water_content
  property wet mass 1 kg; name WM
  property water in wet mass 0 kg; name WWM
  property carbon content, fossil 0; name C_content_fossil
  property carbon content 0
    carbon content on a dry matter basis (reserved; not for manual entry)
  property true value 0.0741345
    allocation property applied in "true value" allocation // value calculated from revenue
  properties: carbon allocation 0 kg
- aluminium, cast alloy: 0 kg; source European Aluminium Association 2008; By-product classification allocatable product; CPC 41431: Unwrought aluminium; pedigree (1,1,1,1,1)
  EcoSpold01Location=RER
  production volume 123.749 kg
  property price 1.3 EUR2005; name castAlloyAmount_price_EUR2005
    Temporary price data. Calculated as 90% of purchasers price based on: Source: London Metal Exchange, Aluminium alloy price for 2005
  property carbon content 0
    carbon content on a dry matter basis (reserved; not for manual entry)
  property true value 3.21747
    allocation property applied in "true value" allocation // value calculated from revenue
  properties: water in wet mass 0 kg, carbon content, non-fossil 0, water content 0, dry mass 1 kg, carbon content, fossil 0, wet mass 1 kg, carbon allocation 0 kg
- aluminium, wrought alloy: 0 kg; source European Aluminium Association 2008; By-product classification allocatable product; CPC 4153: Semi-finished products of aluminium or aluminium alloys; pedigree (1,1,1,1,1)
  production volume 54.1749 kg
  property price 1.44 EUR2005; name secondaryAluminiumOutput_price_EUR2005
  properties: wet mass 1 kg, water content 0, carbon content, fossil 0, water in wet mass 0 kg, carbon content, non-fossil 0, dry mass 1 kg, carbon content 0, carbon allocation 0 kg, true value 1.56024

## Inputs from technosphere
- drawing of pipe, steel: 0 kg; source G&M E-Filter GMBH company 2011; uniform min 0, max 0, pedigree (1,1,4,1,1)
  estimation - comparison between two producer companies G&M E-Filter (CH) and Coral Engineering (IT)
  EcoSpold01Location=RER
- steel, low-alloyed, hot rolled: 642.048 kg; source G&M E-Filter GMBH company 2011; lognormal variance with pedigree 0.0258, pedigree (2,1,4,1,1)
  (same comment as for drawing of pipe, steel)
  properties: dry mass 1 kg, wet mass 1 kg, carbon content, fossil 0.005
  note on carbon content, fossil: Low alloyed steel composition given in Tab. 3.2 ecoinvent v2.2 report 10_partII. Steel assumed to have a C content of 0.5%
- electricity, low voltage: 390.812 kWh; source G&M E-Filter GMBH company 2011; lognormal variance with pedigree 0.154625, pedigree (3,3,5,2,3)
  EcoSpold01Location=CH
  estimation - comparison between two producer companies G&M E-Filter (CH) and Coral Engineering (IT)
- scrap steel: -1395.76 kg; lognormal variance with pedigree 0.0087, pedigree (1,2,4,1,1)
  EcoSpold01Location=CH
  steel and chromium steel disposal
  production volume 75000 kg; = Ref('701d4c11-744d-4056-803f-2ef78947cffb', 'ProductionVolume')* (Ref('e0b48d28-e4ad-490e-9a1c-2de27fb1b6a0')*-1)
    Calculated from production volume of reference product using the relative outputs.
  properties: wet mass 1 kg, lifetime 20 year, dry mass 1 kg
- sheet rolling, steel: 0 kg; source G&M E-Filter GMBH company 2011; uniform min 0, max 0, pedigree (1,1,4,1,1)
  (same comment as for drawing of pipe, steel)
- aluminium, wrought alloy: 11.1661 kg; source G&M E-Filter GMBH company 2011; lognormal variance with pedigree 0.0258, pedigree (2,1,4,1,1)
  (same comment as for drawing of pipe, steel)
  properties: dry mass 1 kg, wet mass 1 kg
- heat, central or small-scale, other than natural gas: 1209.66 MJ; source G&M E-Filter GMBH company 2011; lognormal variance with pedigree 0.154625, pedigree (3,3,5,2,3)
  estimation - comparison between two producer companies G&M E-Filter (CH) and Coral Engineering (IT)
  EcoSpold01Location=CH
- scrap copper: -34.4287 kg; lognormal variance with pedigree 0.0087, pedigree (1,2,4,1,1)
  EcoSpold01Location=CH
  electric connections
  production volume 1850 kg; = Ref('701d4c11-744d-4056-803f-2ef78947cffb', 'ProductionVolume')* (Ref('0680a117-7581-42ca-af11-01aa9d2bf24b')*-1)
    Calculated from production volume of reference product using the relative outputs.
  properties: wet mass 1 kg, lifetime 20 year, dry mass 1 kg
- ceramic tile: 39.0812 kg; source G&M E-Filter GMBH company 2011; lognormal variance with pedigree 0.0358, pedigree (2,5,4,5,1)
  estimation - comparison between two producer companies G&M E-Filter (CH) and Coral Engineering (IT)
  properties: wet mass 1 kg, dry mass 1 kg
- sheet rolling, steel: 77.2319 kg; source G&M E-Filter GMBH company 2011; lognormal variance with pedigree 0.0358, pedigree (2,5,4,5,1)
  EcoSpold01Location=RER
  estimation - comparison between two producer companies G&M E-Filter (CH) and Coral Engineering (IT)
- glass wool mat: 51.1777 kg; source G&M E-Filter GMBH company 2011; lognormal variance with pedigree 0.0332, pedigree (4,1,4,1,1)
  (same comment as for heat, central or small-scale, other than natural gas)
  properties: wet mass 1 kg, dry mass 1 kg, carbon content, fossil 0.0107327
  note on carbon content, fossil: A share of 16 w-% for the binders is taken into account. The binder used in this study is a mixture of phenol, formaldehyde and urea resins (ecoinvent v2.2 report 16_part XIV), and the C content was calculated as a weigthed average of phenol, formaldehyde and urea C content.
- electronics, for control units: 4.65252 kg; source G&M E-Filter GMBH company 2011; lognormal variance with pedigree 0.0332, pedigree (4,1,4,1,1)
  (same comment as for sheet rolling, steel)
  properties: dry mass 1 kg, carbon content, non-fossil 0.00013442, carbon content, fossil 0.337146, wet mass 1 kg
  note on carbon content, non-fossil: The control unit has a composition of 46% steel (housing), 32% plastics, 14% printed wiring boards and 8% cables (various types).;
- inert waste, for final disposal: -39.0812 kg; lognormal variance with pedigree 0.0087, pedigree (1,2,4,1,1)
  EcoSpold01Location=CH
  ceramic
  production volume 2100 kg; = Ref('701d4c11-744d-4056-803f-2ef78947cffb', 'ProductionVolume')* (Ref('945cc1f5-684d-4e3f-9478-386b2d2a51c2')*-1)
    Calculated from production volume of reference product using the relative outputs.
  properties: water content 0.00502513, wet mass 1 kg, lifetime 20 year, dry mass 0.995 kg
- waste polyethylene: -28.8456 kg; lognormal variance with pedigree 0.0087, pedigree (1,2,4,1,1)
  plastics
  EcoSpold01Location=CH
  production volume 1550 kg; = Ref('701d4c11-744d-4056-803f-2ef78947cffb', 'ProductionVolume')* (Ref('f3fa18a4-5cd3-4129-bbc3-46fd18628d97')*-1)
    Calculated from production volume of reference product using the relative outputs.
  properties: lifetime 20 year, wet mass 1 kg, carbon content, fossil 0.825301, dry mass 0.996 kg, water content 0.00401606
  note on carbon content, fossil: C content in 1 kg DM was calculated using data in Tab A.1, ecoinvent v2.2 report 13_I
- polyethylene, high density, granulate: 28.8456 kg; source G&M E-Filter GMBH company 2011; lognormal variance with pedigree 0.0332, pedigree (4,1,4,1,1)
  (same comment as for sheet rolling, steel)
  properties: dry mass 1 kg, wet mass 1 kg, carbon content, fossil 0.857143
  note on carbon content, fossil: Polyethylene is formed out of a huge amount of ethylene monomers (C2H4) (ecoinvent v2.2 report 11_II). MW=28 g/mol
- electronics scrap from control units: -4.65252 kg; lognormal variance with pedigree 0.0087, pedigree (1,2,4,1,1)
  EcoSpold01Location=RER
  electronic parts
  production volume 250 kg; = Ref('701d4c11-744d-4056-803f-2ef78947cffb', 'ProductionVolume')* (Ref('e6ef7804-708c-4611-86c1-43036b0441fe')*-1)
    Calculated from production volume of reference product using the relative outputs.
  properties: carbon content, fossil 0.337146, carbon content, non-fossil 0.00013442, lifetime 20 year, wet mass 1 kg, dry mass 1 kg
- waste mineral wool, for final disposal: -51.1777 kg; lognormal variance with pedigree 0.0087, pedigree (1,2,4,1,1)
  EcoSpold01Location=CH
  insulation and filters
  production volume 2750 kg; = Ref('701d4c11-744d-4056-803f-2ef78947cffb', 'ProductionVolume')* (Ref('dc873dc9-f3b1-4ecf-ac8d-7c145014239a')*-1)
    Calculated from production volume of reference product using the relative outputs.
  properties: lifetime 20 year, wet mass 1 kg, dry mass 1 kg
- scrap aluminium: -11.1661 kg; lognormal variance with pedigree 0.0087, pedigree (1,2,4,1,1)
  EcoSpold01Location=CH
  various elements
  production volume 600 kg; = Ref('701d4c11-744d-4056-803f-2ef78947cffb', 'ProductionVolume')* (Ref('b32f32f4-d1ba-4109-8b56-86d3e2feffb7')*-1)
    Calculated from production volume of reference product using the relative outputs.
  properties: wet mass 1 kg, lifetime 20 year, dry mass 1 kg
- drawing of pipe, steel: 77.2319 kg; source G&M E-Filter GMBH company 2011; lognormal variance with pedigree 0.0358, pedigree (2,5,4,5,1)
  (same comment as for drawing of pipe, steel)
- steel, chromium steel 18/8, hot rolled: 753.709 kg; source G&M E-Filter GMBH company 2011; lognormal variance with pedigree 0.0258, pedigree (2,1,4,1,1)
  (same comment as for drawing of pipe, steel)
  properties: dry mass 1 kg, wet mass 1 kg, carbon content, fossil 0.0008
  note on carbon content, fossil: Stainless steel model is the grade 304 steel (18/8 stainless, 18% chromium 8% nickel; max. 0.08% C)
- copper: 34.4287 kg; source G&M E-Filter GMBH company 2011; lognormal variance with pedigree 0.0332, pedigree (4,1,4,1,1)
  (same comment as for sheet rolling, steel)
  properties: dry mass 1 kg, wet mass 1 kg

## Sampling procedure
literature, personal communications from technicians and producers, technical data available

## Review by Martin Kilga 2012-02-01
Please add dimension (l, w, h) and item list inlc. properties in general comment

## Review by Bo Weidema 2012-02-01
This dataset has only been reviewed by two editors. Since this is an infrastructure dataset, this deviation from normal procedures is acceptable.

## Review by Bo Weidema 2012-02-01
Passed. Documentation adequate, inputs relevant, mass balance correct, and correct handling of capacity utilisation.
