# urea ammonium nitrate production

Dataset: EcoSpold 2, unit process
Geography: RER
Time period: 1999-01-01 to 2019-12-31
Technology level: current
Classification: EcoSpold01Categories: chemicals/inorganics
Classification: ISIC rev.4 ecoinvent: 2012:Manufacture of fertilizers and nitrogen compounds
Synonyms: UAN
Tags: ConvertedDataset
Scenario: Business-as-Usual
System model: Allocation at the point of substitution
Generated by: Angelika Heil
Published in: Nemecek, T. 2004
Database: ecoinvent
isCopyrightProtected: true
accessRestrictedTo: 1

## General comment
Refers to 1 kg N, resp. 3.13 kg urea ammonium nitrate with a N-content of 32.0%
[This dataset was already contained in the ecoinvent database version 2. It was not individually updated during the transfer to ecoinvent version 3. Life Cycle Impact Assessment results may still have changed, as they are affected by changes in the supply chain, i.e. in other datasets. This dataset was generated following the ecoinvent quality guidelines for version 2. It may have been subject to central changes described in the ecoinvent version 3 change report (http://www.ecoinvent.org/database/ecoinvent-version-3/reports-of-changes/), and the results of the central updates were reviewed extensively. The changes added e.g. consistent water flows and other information throughout the database. The documentation of this dataset can be found in the ecoinvent reports of version 2, which are still available via the ecoinvent website. The change report linked above covers all central changes that were made during the conversion process.]

## Included activities end
The unit process inventory takes into account the production of urea ammonium nitrate from ammonia and nitric acid. Transports of raw materials and intermediate products were included as well as the transport of the fertiliser product from the factory to the regional storehouse. Production and waste treatment of catalysts, coating and packaging of the final fertiliser products were not included. CO2-consumption (733 kg CO2/ton of urea) during production of urea was not included, since CO2 arises as a by-product during the production of ammonia. Infrastructure was included by means of a proxy module.

## Geography
According to the reference used for this inventory, the European average is derived from mean values of several fertiliser plants within Europe. The production of raw materials and/or intermediates outside Europe was taken into account by considering the production technology in the respective country and the relative import shares.

## Technology
Production inventory was derived from detailed literature studies and specifications from the manufacturer, relevant for the European production. Transport specifications of the fertiliser product to the regional department store, which were not included in the reference used for this inventory, were complemented by data given in Patyk & Reinhardt (1997).

## Time period
Year when the principal reference used for this inventory was published.

## Parameters
- fraction, cooling water, to air: 0.3875; name fraction_CW_to_air; = (0.5*fraction_CW_OT_to_air)+(0.5*fraction_CW_R_to_air); lognormal variance with pedigree 0.092025, pedigree (4,4,3,2,4)
  Calculated value based on literature value (see comments of the other parametres present in this dataset) and expert opinion. In the case when no industry/literature data are available about the type of cooling or directly fraction, cooling water, to air specific for the process a default assumption is applied. It is assumed that the once-through cooling system is used in 50% of all cases and recirculating system is used in another 50% of all cases.
- fraction, process water, to air: 0.36 dimensionless; name fraction_PW_to_air; lognormal variance with pedigree 0.092025, pedigree (4,4,3,2,4)
  Literature value (Statistics Canada, 2007 & Shaffer, K.H., 2008, Consumptive water use in the Great Lakes Basin, USGS) (Vionnet, S., Quantis Water Database - Technical Report, 2012).
- fraction, cooling water, once-through system, to air: 0.004; name fraction_CW_OT_to_air; lognormal variance with pedigree 0.0413, pedigree (2,3,1,3,1)
  Calculated based on literature value (Scown, C.D., 2011, Water Footprint of U.S. Transportation Fuels and supplying information of the article) (Vionnet, S., Quantis Water Database - Technical Report, 2012).
- fraction, cooling water, recirculating system, to air: 0.771; name fraction_CW_R_to_air; lognormal variance with pedigree 0.0413, pedigree (2,3,1,3,1)
  (same comment as for fraction, cooling water, once-through system, to air)
- fraction, cooling water, cooling pond system, to air: 0.032; name fraction_CW_CP_to_air; lognormal variance with pedigree 0.0413, pedigree (2,3,1,3,1)
  (same comment as for fraction, cooling water, once-through system, to air)

## Reference product
- nitrogen fertiliser, as N: 1 kg; CPC 3461: Mineral or chemical fertilizers, nitrogenous; By-product classification allocatable product
  EcoSpold01Location=RER
  production volume 0 kg
    Not separately specified in fertiliser statistics
  property price 0.473 EUR2005
    Temporary price data. Calculated as 90% of purchasers price based on: 2004 prices are calculated on basis of Import/Export data (tonnes and US$) from UN Trade Statistics Database (http://data.un.org/Browse.aspx?d=ComTrade, accessed 7/7-2010). N, P2O5, or K2O content (http://www.fertilizer.org/ifa/Home-Page/STATISTICS/Conversions-factors)
  property carbon content 0
    carbon content on a dry matter basis (reserved; not for manual entry)
  properties: carbon content, non-fossil 0, water content 0, carbon content, fossil 0, wet mass 1 kg, water in wet mass 0 kg, dry mass 1 kg, carbon allocation 0 kg

## Inputs from technosphere
- ammonia, liquid: 0.921 kg; lognormal variance with pedigree 0.040625, pedigree (2,1,5,2,1)
  EcoSpold01Location=RER
  properties: dry mass 1 kg, wet mass 1 kg
- nitric acid, without water, in 50% solution state: 1.13 kg; lognormal variance with pedigree 0.040625, pedigree (2,1,5,2,1)
  EcoSpold01Location=RER
  properties: wet mass 1 kg, dry mass 1 kg
- heat, district or industrial, natural gas: 1.79 MJ; lognormal variance with pedigree 0.040625, pedigree (2,1,5,2,1)
  EcoSpold01Location=RER
- electricity, medium voltage: 0.157 kWh; lognormal variance with pedigree 0.040625, pedigree (2,1,5,2,1)
  EcoSpold01Location=UCTE
- chemical factory, organics: 1.25e-9 unit; lognormal variance with pedigree 0.340625, pedigree (2,1,5,2,1)
  EcoSpold01Location=RER
  activityLink introduced to establish a direct link to the corresponding regional supply of this product

## Inputs from nature
- Water, unspecified natural origin [natural resource, in water]: 1.225e-5 m3; name water_UNO_input; source IFA - International Fertilizer Industry  1998; lognormal variance with pedigree 0.052625, pedigree (3,3,5,2,1)
  Calculated based on literature, (Vionnet, S., Quantis Water Database - Technical Report, 2012). It includes the processe of urea ammonium nitrate (UAN) production. The amounts of water used are reported as a sum without distinguishing between cooling water and process water. Therefore it is assumed that 95% is used as cooling water and 5% is used as process water.
- Water, cooling, unspecified natural origin [natural resource, in water]: 0.00023275 m3; name water_cooling_UNO_input; source IFA - International Fertilizer Industry  1998; lognormal variance with pedigree 0.051225, pedigree (2,3,5,2,1)
  (same comment as for Water, unspecified natural origin)
  property water in wet mass 999.89 kg; name WWM
  property water content 9081.65; name water_content
  property dry mass 0.1101 kg; name DM
  property carbon content, fossil 0.0104329; name C_content_fossil
  property wet mass 1000 kg; name WM
  property carbon content, non-fossil 0; name C_content_non_fossil

## Emissions to nature
- Water [water, unspecified]: 0.000150399 m3; name water_to_water_unspecified; = water_cooling_UNO_input*(1-fraction_CW_to_air)+water_UNO_input*(1-fraction_PW_to_air); lognormal variance with pedigree 0.0807, pedigree (2,2,5,1,1)
  Calculated value based on literature values and expert opinion. See comments in the parametres' comment field.
  property fraction, origin: unspecified 1; name fraction_origin_unspecified_Ww
  property fraction, origin: salt water 0; name fraction_origin_salt_water_Ww
  property fraction, origin: fresh water 0; name fraction_origin_fresh_water_Ww
- Particulates, > 10 um [air, urban air close to ground]: 0.00069 kg; lognormal variance with pedigree 0.1093, pedigree (2,3,5,3,3)
- Particulates, > 2.5 um, and < 10um [air, urban air close to ground]: 0.000345 kg; lognormal variance with pedigree 0.1793, pedigree (2,3,5,3,3)
- Water [air, unspecified]: 9.46006e-5 m3; name water_to_air_unspecified; = (water_cooling_UNO_input*fraction_CW_to_air)+(water_UNO_input*fraction_PW_to_air); lognormal variance with pedigree 0.0807, pedigree (2,2,5,1,1)
  (same comment as for Water)
  property fraction, origin: salt water 0; name fraction_origin_salt_water
  property fraction, origin: fresh water 0; name fraction_origin_fresh_water
  property fraction, origin: unspecified 1; name fraction_origin_unspecified
- Carbon monoxide, fossil [air, urban air close to ground]: 0.00144 kg; lognormal variance with pedigree 0.7093, pedigree (2,3,5,3,3)
- Ammonium, ion [water, surface water]: 0.00055 kg; lognormal variance with pedigree 0.1093, pedigree (2,3,5,3,3)
- Particulates, < 2.5 um [air, urban air close to ground]: 0.00069 kg; lognormal variance with pedigree 0.3693, pedigree (2,3,5,3,3)
- Ammonia [air, urban air close to ground]: 0.000286 kg; lognormal variance with pedigree 0.1093, pedigree (2,3,5,3,3)
- Methane, fossil [air, urban air close to ground]: 0.000391 kg; lognormal variance with pedigree 0.1093, pedigree (2,3,5,3,3)

## Sampling procedure
Values given in the reference originate from manufacturers and/or other data sources which in turn refer to the real situation and hence are largely secured. However, the emissions factors may be somewhat uncertain. When no information on the speciation of N - emissions was given in the reference, the most likely speciation was assessed by an expert. For particulate emissions factors into the air specified only as the total particle mass in the reference, particle size distribution was assessed based on an expert's guess.

## Extrapolations
This dataset has been extrapolated from year 1999 to the year of the calculation (2019). The uncertainty has been adjusted accordingly.

## Review by Maggie Osses 2004-05-28
Passed.
