# treatment of uranium tailing, non-radioactive emission

Dataset: EcoSpold 2, unit process
Geography: GLO
Time period: 1980-01-01 to 2019-12-31
Technology level: current
Classification: ISIC rev.4 ecoinvent: 3821:Treatment and disposal of non-hazardous waste
Classification: EcoSpold01Categories: nuclear power/waste treatment
Synonyms: uranium tails
Tags: Treatment; ConvertedDataset
Scenario: Business-as-Usual
System model: Allocation at the point of substitution
Share of production covered: 1 %
Generated by: Gabor Doka (obsolete)
Published in: Dones, R. 2009
Database: ecoinvent
isCopyrightProtected: true
accessRestrictedTo: 1

## General comment
[This dataset was already contained in the ecoinvent database version 2. It was not individually updated during the transfer to ecoinvent version 3. Life Cycle Impact Assessment results may still have changed, as they are affected by changes in the supply chain, i.e. in other datasets. This dataset was generated following the ecoinvent quality guidelines for version 2. It may have been subject to central changes described in the ecoinvent version 3 change report (http://www.ecoinvent.org/database/ecoinvent-version-3/reports-of-changes/), and the results of the central updates were reviewed extensively. The changes added e.g. consistent water flows and other information throughout the database. The documentation of this dataset can be found in the ecoinvent reports of version 2, which are still available via the ecoinvent website. The change report linked above covers all central changes that were made during the conversion process.]

## Included activities end
Waste-specific emissions for uranium tailings impoundment leachate. Mixture of a generic dry site (53%) and generic wet site (47%). Short- and long-term emissions to air from dry site (wind erosion of evaporites). Short- and long-term emissions to groundwater from wet site (infiltration leaching).

## Geography
Data refers to a worldwide average. Dataset contains the mixture of two different generic sites: 53% dry site (actual evaporation > precipitation) and 47% wet site (actual evaporation < precipitation), according to the worldwide uranium tailings production in 2006.

## Technology
Mechanically stable tailings impoundment. Closure with clay barrier and reduction of leachate flow for the initial 2000 years. Uranium production from in-situ leaching (ISL) is not heedded.

## Time period
Average uranium tailings composition from literature references. Transfer coefficients from prospective model, specific to uranium tailings.

## Reference product
- uranium tailing, non-radioactive emission: -1 m3; CPC 39990: Other wastes n.e.c.; By-product classification Waste
  EcoSpold01Location=GLO
  production volume 1 m3
    21.46 Mio t/a tailings generation (11.54 in dry sites / 9.919 in wet sites)
    Dummy value to be replaced by value to be calculated from the demand for this treatment activity
  property price 0 EUR2005
    Waste products are assigned a price of zero as they are assumed to require further treatment.
  property carbon content 0.00133333
    carbon content on a dry matter basis (reserved; not for manual entry)
  properties: water content 0.333333, carbon content, non-fossil 0.00133333, carbon content, fossil 0, wet mass 1800 kg, dry mass 1350 kg, water in wet mass 450 kg, carbon allocation 1.8 kg

## Emissions to nature
- Tin [air, non-urban air or from high stacks]: 8.06e-9 kg; lognormal variance with pedigree 2.338, pedigree (1,1,4,1,1)
  Emissions from dry site in mix. Uncertainty is calculated from uncertainties in tailings composition and transfer coefficients
- Nickel, ion [water, ground-]: 3.29e-6 kg; lognormal variance with pedigree 0.948, pedigree (1,1,4,1,1)
  Emissions from wet site in mix. Uncertainty is calculated from uncertainties in tailings composition and transfer coefficients
- Magnesium [water, ground-, long-term]: 3.24 kg; lognormal variance with pedigree 0.458, pedigree (1,1,4,1,1)
  (same comment as for Nickel, ion)
- Arsenic, ion [water, ground-, long-term]: 0.184 kg; lognormal variance with pedigree 1.168, pedigree (1,1,4,1,1)
  (same comment as for Nickel, ion)
- Mercury [water, ground-, long-term]: 0.00224 kg; lognormal variance with pedigree 1.998, pedigree (1,1,4,1,1)
  (same comment as for Nickel, ion)
- Strontium [water, ground-, long-term]: 0.118 kg; lognormal variance with pedigree 0.348, pedigree (1,1,4,1,1)
  (same comment as for Nickel, ion)
- Copper, ion [water, ground-]: 6.48e-6 kg; lognormal variance with pedigree 0.538, pedigree (1,1,4,1,1)
  (same comment as for Nickel, ion)
- Potassium, ion [water, ground-]: 0.00319 kg; lognormal variance with pedigree 0.288, pedigree (1,1,4,1,1)
  (same comment as for Nickel, ion)
- Copper [air, non-urban air or from high stacks]: 1.92e-7 kg; lognormal variance with pedigree 1.538, pedigree (1,1,4,1,1)
  (same comment as for Tin)
- Aluminium [air, non-urban air or from high stacks]: 2.42e-5 kg; lognormal variance with pedigree 1.178, pedigree (1,1,4,1,1)
  (same comment as for Tin)
- Particulates, > 10 um [air, low population density, long-term]: 7.3 kg; lognormal variance with pedigree 0.138, pedigree (1,1,4,1,1)
  (same comment as for Tin)
- Chlorine [air, non-urban air or from high stacks]: 0.00104 kg; lognormal variance with pedigree 2.048, pedigree (1,1,4,1,1)
  (same comment as for Tin)
- Silicon [air, non-urban air or from high stacks]: 1.13e-5 kg; lognormal variance with pedigree 1.308, pedigree (1,1,4,1,1)
  (same comment as for Tin)
- Mercury [air, non-urban air or from high stacks]: 1.39e-9 kg; lognormal variance with pedigree 3.088, pedigree (1,1,4,1,1)
  (same comment as for Tin)
- Magnesium [water, ground-]: 0.00108 kg; lognormal variance with pedigree 0.528, pedigree (1,1,4,1,1)
  (same comment as for Nickel, ion)
- Nickel, ion [water, ground-, long-term]: 0.0596 kg; lognormal variance with pedigree 0.868, pedigree (1,1,4,1,1)
  (same comment as for Nickel, ion)
- Silicon [air, low population density, long-term]: 0.815 kg; lognormal variance with pedigree 2.068, pedigree (1,1,4,1,1)
  (same comment as for Tin)
- Boron [water, ground-]: 0.00029 kg; lognormal variance with pedigree 0.098, pedigree (1,1,4,1,1)
  (same comment as for Nickel, ion)
- Sulfate [air, low population density, long-term]: 3.37 kg; lognormal variance with pedigree 0.138, pedigree (1,1,4,1,1)
  (same comment as for Tin)
- Copper, ion [water, ground-, long-term]: 0.275 kg; lognormal variance with pedigree 0.458, pedigree (1,1,4,1,1)
  (same comment as for Nickel, ion)
- Chromium VI [air, low population density, long-term]: 0.00236 kg; lognormal variance with pedigree 0.358, pedigree (1,1,4,1,1)
  (same comment as for Tin)
- Fluorine [air, low population density, long-term]: 0.223 kg; lognormal variance with pedigree 1.098, pedigree (1,1,4,1,1)
  (same comment as for Tin)
- Molybdenum [air, low population density, long-term]: 0.00637 kg; lognormal variance with pedigree 0.188, pedigree (1,1,4,1,1)
  (same comment as for Tin)
- Sodium, ion [water, ground-]: 0.055 kg; lognormal variance with pedigree 0.398, pedigree (1,1,4,1,1)
  (same comment as for Nickel, ion)
- Fluorine [air, non-urban air or from high stacks]: 3e-5 kg; lognormal variance with pedigree 1.298, pedigree (1,1,4,1,1)
  (same comment as for Tin)
- Arsenic [air, non-urban air or from high stacks]: 3.97e-5 kg; lognormal variance with pedigree 1.718, pedigree (1,1,4,1,1)
  (same comment as for Tin)
- Vanadium [air, low population density, long-term]: 0.0227 kg; lognormal variance with pedigree 1.348, pedigree (1,1,4,1,1)
  (same comment as for Tin)
- Boron [air, non-urban air or from high stacks]: 8.61e-6 kg; lognormal variance with pedigree 0.638, pedigree (1,1,4,1,1)
  (same comment as for Tin)
- Tungsten [air, non-urban air or from high stacks]: 3.24e-6 kg; lognormal variance with pedigree 1.748, pedigree (1,1,4,1,1)
  (same comment as for Tin)
- Aluminium [air, low population density, long-term]: 3.66 kg; lognormal variance with pedigree 0.098, pedigree (1,1,4,1,1)
  (same comment as for Tin)
- Iron, ion [water, ground-, long-term]: 35.3 kg; lognormal variance with pedigree 0.128, pedigree (1,1,4,1,1)
  (same comment as for Nickel, ion)
- Beryllium [water, ground-]: 5.17e-7 kg; lognormal variance with pedigree 0.228, pedigree (1,1,4,1,1)
  (same comment as for Nickel, ion)
- Silicon [water, ground-, long-term]: 30.1 kg; lognormal variance with pedigree 0.538, pedigree (1,1,4,1,1)
  (same comment as for Nickel, ion)
- Phosphate [water, ground-]: 0.0116 kg; lognormal variance with pedigree 0.138, pedigree (1,1,4,1,1)
  (same comment as for Nickel, ion)
- Particulates, < 2.5 um [air, low population density, long-term]: 2.92 kg; lognormal variance with pedigree 0.138, pedigree (1,1,4,1,1)
  (same comment as for Tin)
- Arsenic [air, low population density, long-term]: 0.0194 kg; lognormal variance with pedigree 1.168, pedigree (1,1,4,1,1)
  (same comment as for Tin)
- Lead [water, ground-, long-term]: 0.291 kg; lognormal variance with pedigree 0.578, pedigree (1,1,4,1,1)
  (same comment as for Nickel, ion)
- Mercury [water, ground-]: 4.71e-8 kg; lognormal variance with pedigree 2.068, pedigree (1,1,4,1,1)
  (same comment as for Nickel, ion)
- Boron [air, low population density, long-term]: 0.00615 kg; lognormal variance with pedigree 0.078, pedigree (1,1,4,1,1)
  (same comment as for Tin)
- Lead [air, low population density, long-term]: 0.0328 kg; lognormal variance with pedigree 0.578, pedigree (1,1,4,1,1)
  (same comment as for Tin)
- Manganese [water, ground-, long-term]: 0.729 kg; lognormal variance with pedigree 0.888, pedigree (1,1,4,1,1)
  (same comment as for Nickel, ion)
- Manganese [air, non-urban air or from high stacks]: 6.33e-6 kg; lognormal variance with pedigree 1.728, pedigree (1,1,4,1,1)
  (same comment as for Tin)
- Silver, ion [water, ground-, long-term]: 0.00486 kg; lognormal variance with pedigree 0.418, pedigree (1,1,4,1,1)
  (same comment as for Nickel, ion)
- Iron [air, non-urban air or from high stacks]: 6.67e-6 kg; lognormal variance with pedigree 1.338, pedigree (1,1,4,1,1)
  (same comment as for Tin)
- Chloride [water, ground-]: 0.0339 kg; lognormal variance with pedigree 1.788, pedigree (1,1,4,1,1)
  (same comment as for Nickel, ion)
- Cadmium [air, non-urban air or from high stacks]: 1.06e-8 kg; lognormal variance with pedigree 1.268, pedigree (1,1,4,1,1)
  (same comment as for Tin)
- Cadmium, ion [water, ground-, long-term]: 0.00443 kg; lognormal variance with pedigree 0.298, pedigree (1,1,4,1,1)
  (same comment as for Nickel, ion)
- Scandium [air, non-urban air or from high stacks]: 2.42e-5 kg; lognormal variance with pedigree 1.478, pedigree (1,1,4,1,1)
  (same comment as for Tin)
- Molybdenum [air, non-urban air or from high stacks]: 1.39e-5 kg; lognormal variance with pedigree 0.728, pedigree (1,1,4,1,1)
  (same comment as for Tin)
- Nitrate [air, non-urban air or from high stacks]: 0.0108 kg; lognormal variance with pedigree 1.118, pedigree (1,1,4,1,1)
  (same comment as for Tin)
- Nickel [air, non-urban air or from high stacks]: 9.75e-8 kg; lognormal variance with pedigree 1.878, pedigree (1,1,4,1,1)
  (same comment as for Tin)
- Zinc [air, low population density, long-term]: 0.0235 kg; lognormal variance with pedigree 0.958, pedigree (1,1,4,1,1)
  (same comment as for Tin)
- Sodium [air, low population density, long-term]: 0.215 kg; lognormal variance with pedigree 0.328, pedigree (1,1,4,1,1)
  (same comment as for Tin)
- Barium [air, non-urban air or from high stacks]: 1.78e-8 kg; lognormal variance with pedigree 1.998, pedigree (1,1,4,1,1)
  (same comment as for Tin)
- Nitrate [water, ground-]: 0.253 kg; lognormal variance with pedigree 1.038, pedigree (1,1,4,1,1)
  (same comment as for Nickel, ion)
- Sulfate [air, non-urban air or from high stacks]: 0.0816 kg; lognormal variance with pedigree 0.468, pedigree (1,1,4,1,1)
  (same comment as for Tin)
- Cadmium, ion [water, ground-]: 3.59e-7 kg; lognormal variance with pedigree 0.368, pedigree (1,1,4,1,1)
  (same comment as for Nickel, ion)
- Silicon [water, ground-]: 0.000381 kg; lognormal variance with pedigree 0.098, pedigree (1,1,4,1,1)
  (same comment as for Nickel, ion)
- Aluminium [water, ground-]: 0.000817 kg; lognormal variance with pedigree 0.168, pedigree (1,1,4,1,1)
  (same comment as for Nickel, ion)
- Tungsten [air, low population density, long-term]: 0.00148 kg; lognormal variance with pedigree 1.218, pedigree (1,1,4,1,1)
  (same comment as for Tin)
- Antimony [water, ground-]: 0.000418 kg; lognormal variance with pedigree 1.478, pedigree (1,1,4,1,1)
  (same comment as for Nickel, ion)
- Chromium VI [air, non-urban air or from high stacks]: 2.67e-6 kg; lognormal variance with pedigree 0.788, pedigree (1,1,4,1,1)
  (same comment as for Tin)
- Nitrate [water, ground-, long-term]: 0.121 kg; lognormal variance with pedigree 1.288, pedigree (1,1,4,1,1)
  (same comment as for Nickel, ion)
- Beryllium [air, non-urban air or from high stacks]: 1.53e-8 kg; lognormal variance with pedigree 1.078, pedigree (1,1,4,1,1)
  (same comment as for Tin)
- Phosphorus [air, low population density, long-term]: 0.00615 kg; lognormal variance with pedigree 0.068, pedigree (1,1,4,1,1)
  (same comment as for Tin)
- Tin [air, low population density, long-term]: 0.000763 kg; lognormal variance with pedigree 1.308, pedigree (1,1,4,1,1)
  (same comment as for Tin)
- Magnesium [air, low population density, long-term]: 0.365 kg; lognormal variance with pedigree 0.458, pedigree (1,1,4,1,1)
  (same comment as for Tin)
- Barium [air, low population density, long-term]: 0.0212 kg; lognormal variance with pedigree 0.788, pedigree (1,1,4,1,1)
  (same comment as for Tin)
- Vanadium, ion [water, ground-, long-term]: 0.203 kg; lognormal variance with pedigree 1.348, pedigree (1,1,4,1,1)
  (same comment as for Nickel, ion)
- Chlorine [air, low population density, long-term]: 0.0454 kg; lognormal variance with pedigree 1.708, pedigree (1,1,4,1,1)
  (same comment as for Tin)
- Barium [water, ground-, long-term]: 0.384 kg; lognormal variance with pedigree 0.658, pedigree (1,1,4,1,1)
  (same comment as for Nickel, ion)
- Nickel [air, low population density, long-term]: 0.00672 kg; lognormal variance with pedigree 0.868, pedigree (1,1,4,1,1)
  (same comment as for Tin)
- Sulfate [water, ground-]: 2.76 kg; lognormal variance with pedigree 0.208, pedigree (1,1,4,1,1)
  (same comment as for Nickel, ion)
- Arsenic, ion [water, ground-]: 0.00134 kg; lognormal variance with pedigree 1.238, pedigree (1,1,4,1,1)
  (same comment as for Nickel, ion)
- Calcium, ion [water, ground-, long-term]: 10.5 kg; lognormal variance with pedigree 0.838, pedigree (1,1,4,1,1)
  (same comment as for Nickel, ion)
- Sodium, ion [water, ground-, long-term]: 1.86 kg; lognormal variance with pedigree 0.328, pedigree (1,1,4,1,1)
  (same comment as for Nickel, ion)
- Selenium [air, non-urban air or from high stacks]: 3.39e-6 kg; lognormal variance with pedigree 0.718, pedigree (1,1,4,1,1)
  (same comment as for Tin)
- Scandium [water, ground-]: 0.000817 kg; lognormal variance with pedigree 0.998, pedigree (1,1,4,1,1)
  (same comment as for Nickel, ion)
- Silver [air, low population density, long-term]: 0.000548 kg; lognormal variance with pedigree 0.418, pedigree (1,1,4,1,1)
  (same comment as for Tin)
- Titanium [air, non-urban air or from high stacks]: 1.31e-6 kg; lognormal variance with pedigree 1.898, pedigree (1,1,4,1,1)
  (same comment as for Tin)
- Zinc, ion [water, ground-]: 8.38e-6 kg; lognormal variance with pedigree 1.038, pedigree (1,1,4,1,1)
  (same comment as for Nickel, ion)
- Chromium VI [water, ground-]: 9.01e-5 kg; lognormal variance with pedigree 0.178, pedigree (1,1,4,1,1)
  (same comment as for Nickel, ion)
- Molybdenum [water, ground-]: 0.00047 kg; lognormal variance with pedigree 0.268, pedigree (1,1,4,1,1)
  (same comment as for Nickel, ion)
- Tin, ion [water, ground-, long-term]: 0.00677 kg; lognormal variance with pedigree 1.308, pedigree (1,1,4,1,1)
  (same comment as for Nickel, ion)
- Scandium [water, ground-, long-term]: 0.115 kg; lognormal variance with pedigree 0.928, pedigree (1,1,4,1,1)
  (same comment as for Nickel, ion)
- Lead [water, ground-]: 1.21e-6 kg; lognormal variance with pedigree 0.648, pedigree (1,1,4,1,1)
  (same comment as for Nickel, ion)
- Sulfate [water, ground-, long-term]: 27.8 kg; lognormal variance with pedigree 0.138, pedigree (1,1,4,1,1)
  (same comment as for Nickel, ion)
- Particulates, > 2.5 um, and < 10um [air, non-urban air or from high stacks]: 0.0119 kg; lognormal variance with pedigree 0.348, pedigree (1,1,4,1,1)
  (same comment as for Tin)
- Antimony [water, ground-, long-term]: 0.00263 kg; lognormal variance with pedigree 1.408, pedigree (1,1,4,1,1)
  (same comment as for Nickel, ion)
- Potassium [air, low population density, long-term]: 0.626 kg; lognormal variance with pedigree 0.488, pedigree (1,1,4,1,1)
  (same comment as for Tin)
- Silver, ion [water, ground-]: 3.25e-8 kg; lognormal variance with pedigree 0.498, pedigree (1,1,4,1,1)
  (same comment as for Nickel, ion)
- Vanadium, ion [water, ground-]: 0.00254 kg; lognormal variance with pedigree 1.428, pedigree (1,1,4,1,1)
  (same comment as for Nickel, ion)
- Iron [air, low population density, long-term]: 3.98 kg; lognormal variance with pedigree 0.128, pedigree (1,1,4,1,1)
  (same comment as for Tin)
- Strontium [air, low population density, long-term]: 0.0133 kg; lognormal variance with pedigree 0.348, pedigree (1,1,4,1,1)
  (same comment as for Tin)
- Barium [water, ground-]: 6e-7 kg; lognormal variance with pedigree 0.728, pedigree (1,1,4,1,1)
  (same comment as for Nickel, ion)
- Vanadium [air, non-urban air or from high stacks]: 7.55e-5 kg; lognormal variance with pedigree 1.848, pedigree (1,1,4,1,1)
  (same comment as for Tin)
- Zinc [air, non-urban air or from high stacks]: 2.48e-7 kg; lognormal variance with pedigree 1.988, pedigree (1,1,4,1,1)
  (same comment as for Tin)
- Molybdenum [water, ground-, long-term]: 0.0562 kg; lognormal variance with pedigree 0.188, pedigree (1,1,4,1,1)
  (same comment as for Nickel, ion)
- Mercury [air, low population density, long-term]: 0.000252 kg; lognormal variance with pedigree 1.998, pedigree (1,1,4,1,1)
  (same comment as for Tin)
- Fluoride [water, ground-]: 0.00101 kg; lognormal variance with pedigree 0.408, pedigree (1,1,4,1,1)
  (same comment as for Nickel, ion)
- Antimony [air, non-urban air or from high stacks]: 1.31e-5 kg; lognormal variance with pedigree 1.698, pedigree (1,1,4,1,1)
  (same comment as for Tin)
- Sodium [air, non-urban air or from high stacks]: 0.00165 kg; lognormal variance with pedigree 0.758, pedigree (1,1,4,1,1)
  (same comment as for Tin)
- Strontium [air, non-urban air or from high stacks]: 2.48e-7 kg; lognormal variance with pedigree 1.328, pedigree (1,1,4,1,1)
  (same comment as for Tin)
- Tin, ion [water, ground-]: 2.72e-7 kg; lognormal variance with pedigree 1.378, pedigree (1,1,4,1,1)
  (same comment as for Nickel, ion)
- Chloride [water, ground-, long-term]: 0.378 kg; lognormal variance with pedigree 1.708, pedigree (1,1,4,1,1)
  (same comment as for Nickel, ion)
- Silver [air, non-urban air or from high stacks]: 9.63e-10 kg; lognormal variance with pedigree 1.618, pedigree (1,1,4,1,1)
  (same comment as for Tin)
- Phosphate [water, ground-, long-term]: 0.394 kg; lognormal variance with pedigree 0.068, pedigree (1,1,4,1,1)
  (same comment as for Nickel, ion)
- Cobalt [air, low population density, long-term]: 0.00294 kg; lognormal variance with pedigree 0.128, pedigree (1,1,4,1,1)
  (same comment as for Tin)
- Chromium VI [water, ground-, long-term]: 0.0245 kg; lognormal variance with pedigree 0.288, pedigree (1,1,4,1,1)
  (same comment as for Nickel, ion)
- Beryllium [air, low population density, long-term]: 0.000462 kg; lognormal variance with pedigree 0.148, pedigree (1,1,4,1,1)
  (same comment as for Tin)
- Potassium [air, non-urban air or from high stacks]: 9.45e-5 kg; lognormal variance with pedigree 1.088, pedigree (1,1,4,1,1)
  (same comment as for Tin)
- Particulates, > 10 um [air, non-urban air or from high stacks]: 0.0199 kg; lognormal variance with pedigree 0.348, pedigree (1,1,4,1,1)
  (same comment as for Tin)
- Calcium [air, non-urban air or from high stacks]: 0.00116 kg; lognormal variance with pedigree 1.448, pedigree (1,1,4,1,1)
  (same comment as for Tin)
- Potassium, ion [water, ground-, long-term]: 12.8 kg; lognormal variance with pedigree 0.228, pedigree (1,1,4,1,1)
  (same comment as for Nickel, ion)
- Tungsten [water, ground-, long-term]: 0.013 kg; lognormal variance with pedigree 1.218, pedigree (1,1,4,1,1)
  (same comment as for Nickel, ion)
- Beryllium [water, ground-, long-term]: 0.0041 kg; lognormal variance with pedigree 0.148, pedigree (1,1,4,1,1)
  (same comment as for Nickel, ion)
- Copper [air, low population density, long-term]: 0.031 kg; lognormal variance with pedigree 0.458, pedigree (1,1,4,1,1)
  (same comment as for Tin)
- Particulates, < 2.5 um [air, non-urban air or from high stacks]: 0.00796 kg; lognormal variance with pedigree 0.348, pedigree (1,1,4,1,1)
  (same comment as for Tin)
- Selenium [water, ground-]: 0.000114 kg; lognormal variance with pedigree 0.238, pedigree (1,1,4,1,1)
  (same comment as for Nickel, ion)
- Magnesium [air, non-urban air or from high stacks]: 3.2e-5 kg; lognormal variance with pedigree 1.288, pedigree (1,1,4,1,1)
  (same comment as for Tin)
- Aluminium [water, ground-, long-term]: 32.4 kg; lognormal variance with pedigree 0.098, pedigree (1,1,4,1,1)
  (same comment as for Nickel, ion)
- Iron, ion [water, ground-]: 0.000225 kg; lognormal variance with pedigree 0.208, pedigree (1,1,4,1,1)
  (same comment as for Nickel, ion)
- Nitrate [air, low population density, long-term]: 0.0314 kg; lognormal variance with pedigree 0.988, pedigree (1,1,4,1,1)
  (same comment as for Tin)
- Lead [air, non-urban air or from high stacks]: 3.59e-8 kg; lognormal variance with pedigree 1.828, pedigree (1,1,4,1,1)
  (same comment as for Tin)
- Cobalt [water, ground-]: 8.37e-6 kg; lognormal variance with pedigree 0.198, pedigree (1,1,4,1,1)
  (same comment as for Nickel, ion)
- Manganese [air, low population density, long-term]: 0.0823 kg; lognormal variance with pedigree 0.888, pedigree (1,1,4,1,1)
  (same comment as for Tin)
- Particulates, > 2.5 um, and < 10um [air, low population density, long-term]: 4.38 kg; lognormal variance with pedigree 0.138, pedigree (1,1,4,1,1)
  (same comment as for Tin)
- Antimony [air, low population density, long-term]: 0.00033 kg; lognormal variance with pedigree 1.408, pedigree (1,1,4,1,1)
  (same comment as for Tin)
- Scandium [air, low population density, long-term]: 0.0131 kg; lognormal variance with pedigree 0.928, pedigree (1,1,4,1,1)
  (same comment as for Tin)
- Boron [water, ground-, long-term]: 0.0615 kg; lognormal variance with pedigree 0.058, pedigree (1,1,4,1,1)
  (same comment as for Nickel, ion)
- Titanium, ion [water, ground-, long-term]: 2.12 kg; lognormal variance with pedigree 0.798, pedigree (1,1,4,1,1)
  (same comment as for Nickel, ion)
- Tungsten [water, ground-]: 0.000109 kg; lognormal variance with pedigree 1.288, pedigree (1,1,4,1,1)
  (same comment as for Nickel, ion)
- Selenium [water, ground-, long-term]: 0.0161 kg; lognormal variance with pedigree 0.168, pedigree (1,1,4,1,1)
  (same comment as for Nickel, ion)
- Strontium [water, ground-]: 8.38e-6 kg; lognormal variance with pedigree 0.418, pedigree (1,1,4,1,1)
  (same comment as for Nickel, ion)
- Phosphorus [air, non-urban air or from high stacks]: 0.000344 kg; lognormal variance with pedigree 0.498, pedigree (1,1,4,1,1)
  (same comment as for Tin)
- Titanium, ion [water, ground-]: 4.43e-5 kg; lognormal variance with pedigree 0.868, pedigree (1,1,4,1,1)
  (same comment as for Nickel, ion)
- Titanium [air, low population density, long-term]: 0.239 kg; lognormal variance with pedigree 0.798, pedigree (1,1,4,1,1)
  (same comment as for Tin)
- Calcium [air, low population density, long-term]: 1.19 kg; lognormal variance with pedigree 0.838, pedigree (1,1,4,1,1)
  (same comment as for Tin)
- Selenium [air, low population density, long-term]: 0.00183 kg; lognormal variance with pedigree 0.168, pedigree (1,1,4,1,1)
  (same comment as for Tin)
- Cobalt [air, non-urban air or from high stacks]: 2.48e-7 kg; lognormal variance with pedigree 0.968, pedigree (1,1,4,1,1)
  (same comment as for Tin)
- Calcium, ion [water, ground-]: 0.0392 kg; lognormal variance with pedigree 0.918, pedigree (1,1,4,1,1)
  (same comment as for Nickel, ion)
- Cobalt [water, ground-, long-term]: 0.026 kg; lognormal variance with pedigree 0.128, pedigree (1,1,4,1,1)
  (same comment as for Nickel, ion)
- Zinc, ion [water, ground-, long-term]: 0.209 kg; lognormal variance with pedigree 0.958, pedigree (1,1,4,1,1)
  (same comment as for Nickel, ion)
- Cadmium [air, low population density, long-term]: 0.0005 kg; lognormal variance with pedigree 0.298, pedigree (1,1,4,1,1)
  (same comment as for Tin)
- Fluoride [water, ground-, long-term]: 5.85 kg; lognormal variance with pedigree 0.448, pedigree (1,1,4,1,1)
  (same comment as for Nickel, ion)
- Manganese [water, ground-]: 0.000214 kg; lognormal variance with pedigree 0.958, pedigree (1,1,4,1,1)
  (same comment as for Nickel, ion)

## Sampling procedure
Tailings model based on observed leachate concentrations in literature. Extrapolated to 80'000 years heeding chemical characteristics. Initial tailings composition from various literature sources.

## Extrapolations
This dataset has been extrapolated from year 2007 to the year of the calculation (2019). The uncertainty has been adjusted accordingly.

## Review by Roland Hischier 2009-02-15
passed.
