# cable production, unspecified

Dataset: EcoSpold 2, unit process
Geography: GLO
Time period: 2005-01-01 to 2019-12-31
Technology level: current
Classification: ISIC rev.4 ecoinvent: 2732:Manufacture of other electronic and electric wires and cables
Classification: EcoSpold01Categories: electronics/component
Scenario: Business-as-Usual
System model: Allocation at the point of substitution
Generated by: Tereza Levova
Database: ecoinvent
isCopyrightProtected: true
accessRestrictedTo: 1

## General comment
The dataset represents production of unspecified cable.

## Parameters
- fraction, process water, to air: 0.061 dimensionless; name fraction_PW_to_air; lognormal variance with pedigree 0.092025, pedigree (4,4,3,2,4)
  Literature value (Statistics Canada, 2007 & Shaffer, K.H., 2008, Consumptive water use in the Great Lakes Basin, USGS) (Vionnet, S., Quantis Water Database - Technical Report, 2012).
- fraction, tap water, to air: 0.061; name fraction_TW_to_air; = fraction_PW_to_air; lognormal variance with pedigree 0.092025, pedigree (4,4,3,2,4)
  Calculated value. See comment in the other parametres present in this dataset. Tap water is considered to be always used as process water, thus process water fractions to air are applied to all tap water input flows to calculate the amount of water consumed in the processes.

## Reference product
- cable, unspecified: 1 kg; name cable_RP; By-product classification allocatable product; CPC 463: Insulated wire and cable; optical fibre cables
  This product represents average, unspecified cable.
  production volume 4 kg
    This is a placeholder value that does not reflect real-world production volumes. This dataset does not currently require a real-world production volume to work in the database framework, and no actual data were collected yet. This has no negative effect on the results of the ecoinvent database.
  property price 6.59 EUR2005; name cable_RP_price_EUR2005
    Calculated based on data in UN comtrade database.
  property carbon content 0.28196
    carbon content on a dry matter basis (reserved; not for manual entry)
  property true value 6.59; name cable_RP_true_value
    allocation property applied in "true value" allocation // value calculated from revenue
  properties: carbon content, fossil 0.28196, carbon content, non-fossil 0, water in wet mass 0 kg, dry mass 1 kg, wet mass 1 kg, water content 0, carbon allocation 0.28196 kg

## By-products
- heat, for reuse in municipal waste incineration only: 0 MJ; CPC 17300: Steam and hot water; By-product classification allocatable product; pedigree (1,1,1,1,1)
  Net electricity generated from this waste and used in internal MSWI plant energy redistribution.
  Uncertainty: uncertainty is calculated from uncertainties in waste composition and uncertainties in energy efficiency and the uncertainty in internal energy demand
  production volume 0.00631216 MJ
  property exergy 0.1842 MJ; name E_th_prod_MSWI_exergy
    This exergy property is based on the exergy content of the product.
  property price 0.0106 EUR2005; name E_th_prod_MSWI_price_EUR2005
    Average European district heat price from Ecoheatcool and Euroheat 2005-2006, Ecoheat Work package 1: The European heat market. Final report. 10.6 EUR/GJ i s the price of district heat. http://www.solarthermalworld.org/files/Ecoheatcool%20WP1%20Web.pdf?download
  property true value relation 0.1842; name E_th_prod_MSWI_true_value_relation
    property to calculate "true value" from
  property true value 7.71559e-6
    allocation property applied in "true value" allocation // value calculated from true value relation
- electricity, for reuse in municipal waste incineration only: 0 kWh; CPC 17100: Electrical energy; By-product classification allocatable product; pedigree (1,1,1,1,1)
  (same comment as for heat, for reuse in municipal waste incineration only)
  production volume 0.000897934 kWh
  property price 0.1 EUR2005; name E_el_prod_MSWI_price_EUR2005
    Estimated to be the same price as in case of electricity, medium voltage.
  property exergy 3.6 MJ; name E_el_prod_MSWI_exergy
    This exergy property is based on the exergy content of the product.
  property true value relation 3.6; name E_el_prod_MSWI_true_value_relation
    property to calculate "true value" from
  property true value 2.14511e-5
    (same comment as for heat, for reuse in municipal waste incineration only)

## Inputs from technosphere
- copper: 0.659776 kg; name copper_input; = 0.66-(hazardous_waste_BP*-1); lognormal variance with pedigree 0.0912, pedigree (2,5,5,5,4)
  Literature value; according to the European company, 1 kg cable is split up into 0.66 kg of copper and 0.34 kg of plastics (ecoinvent v2.2 report 18_V, pg 97).
  properties: dry mass 1 kg, wet mass 1 kg
- extrusion, plastic pipes: 0.3384 kg; = HDPE_input; lognormal variance with pedigree 0.0912, pedigree (2,5,5,5,4)
  Calculated value; the service of plastic extrusion.
- rolling mill: 1.76949e-12 unit; lognormal variance with pedigree 0.0912, pedigree (2,5,5,5,4)
  Assumption; to be the same as in case of data cable production.
- polyethylene, high density, granulate: 0.3384 kg; name HDPE_input; = cable_RP-copper_input-(waste_plastic_BP*-1); lognormal variance with pedigree 0.0912, pedigree (2,5,5,5,4)
  (same comment as for copper)
  properties: wet mass 1 kg, carbon content, fossil 0.857143, dry mass 1 kg
  note on carbon content, fossil: Polyethylene is formed out of a huge amount of ethylene monomers (C2H4) (ecoinvent v2.2 report 11_II). MW=28 g/mol
- tap water: 1.45199 kg; name tap_water_input; lognormal variance with pedigree 0.0912, pedigree (2,5,5,5,4)
  Assumption; to be the same as in case of printer cable production.
  properties: dry mass 0.000337476 kg, wet mass 1 kg, carbon content, fossil 0.00178991, water content 2962.17
  note on carbon content, fossil: Bicarbonate content is 2.93 mol/m3. CO2 content is 0.1 mol/m3 (ecoinvent v2.2 report 8, Tab 93.1).
- wire drawing, copper: 0.659776 kg; = copper_input; lognormal variance with pedigree 0.0912, pedigree (2,5,5,5,4)
  Calculated value; the service of copper wire drawing.
- hazardous waste, for incineration: 0 kg; name hazardous_waste_BP; pedigree (1,1,1,1,1)
  Assumption; to be the same as in case of printer cable production.
  production volume 0 kg
    Calculated from production volume of reference product using the relative outputs.
  property price 0 EUR2005; name hazardous_waste_BP_price_EUR2005
  properties: wet mass 1 kg, carbon content, fossil 0.554667, water content 0.333333, dry mass 0.75 kg
  note on carbon content, fossil: Tab A.6, ecoinvent v2.2 report 13_I. C content has been calculated after data in the tables, and then referred to 1 kg DM
- waste plastic, mixture: 0 kg; name waste_plastic_BP; pedigree (1,1,1,1,1)
  Assumption; to be the same as in case of printer cable production.
  production volume 0 kg
    Calculated from production volume of reference product using the relative outputs.
  property price 0 EUR2005; name waste_plastic_BP_price_EUR2005
  properties: water content 0.180638, wet mass 1 kg, carbon content, fossil 0.747344, dry mass 0.847 kg
- hazardous waste, for incineration: -7.1049e-5, -1.85718e-6, -0.000147743 kg (3 entries); lognormal variance with pedigree 0.0986, pedigree (4,5,5,5,4)
  Assumption; to be the same as in case of printer cable production.
  production volume 0.0008826 kg
- waste plastic, mixture: -0.000175125, -1.35011e-5, -5.57644e-6, -5.29535e-6, -0.000202064, -2.25282e-6, -1.02107e-6, -0.00141456 kg (8 entries); lognormal variance with pedigree 0.0986, pedigree (4,5,5,5,4)
  Assumption; to be the same as in case of printer cable production.
  production volume 0.0072776 kg

## Emissions to nature
- Water [water, unspecified]: 0.00136342 m3; name water_to_water_unspecified; = (tap_water_input/1000)*(1-fraction_TW_to_air); lognormal variance with pedigree 0.130025, pedigree (4,4,5,2,4)
  Calculated value based on literature values and expert opinion. See comments in the parametres' comment field.
  property fraction, origin: salt water 0; name fraction_origin_salt_water_Ww
  property fraction, origin: fresh water 1; name fraction_origin_fresh_water_Ww
  property fraction, origin: unspecified 0; name fraction_origin_unspecified_Ww
- Water [air, unspecified]: 8.85716e-5 m3; name water_to_air_unspecified; = (tap_water_input/1000*fraction_TW_to_air); lognormal variance with pedigree 0.130025, pedigree (4,4,5,2,4)
  (same comment as for Water)
  property fraction, origin: unspecified 0; name fraction_origin_unspecified
  property fraction, origin: fresh water 1; name fraction_origin_fresh_water
  property fraction, origin: salt water 0; name fraction_origin_salt_water
