# treatment of wastewater from liquid crystal display backlight production, capacity 1.1E10l/year

Dataset: EcoSpold 2, unit process
Geography: CH
Time period: 1994-01-01 to 2019-12-31
Technology level: current
Classification: ISIC rev.4 ecoinvent: 3700:Sewerage
Classification: EcoSpold01Categories: waste management/wastewater treatment
Tags: Treatment; ConvertedDataset
Scenario: Business-as-Usual
System model: Allocation at the point of substitution
Generated by: Roland Hischier
Published in: Hischier R. 2007
Database: ecoinvent
isCopyrightProtected: true
accessRestrictedTo: 1

## General comment
Wastewater purified in a moderatly large municipal wastewater treatment plant (capacity class 2), with an average capacity size of 71100 per-captia-equivalents PCE.
Wastewater contains (in kg/m3): BOD: 2.03 (GSD=122.5%); Ntot.: 0.000676 (GSD=122.5%); Hg: 0.0000563 (GSD=223.8%); Ni: 0.00225 (GSD=223.8%); Pb: 0.000563 (GSD=223.8%); Fe: 0.0563 (GSD=224.1%);
[This dataset was already contained in the ecoinvent database version 2. It was not individually updated during the transfer to ecoinvent version 3. Life Cycle Impact Assessment results may still have changed, as they are affected by changes in the supply chain, i.e. in other datasets. This dataset was generated following the ecoinvent quality guidelines for version 2. It may have been subject to central changes described in the ecoinvent version 3 change report (http://www.ecoinvent.org/database/ecoinvent-version-3/reports-of-changes/), and the results of the central updates were reviewed extensively. The changes added e.g. consistent water flows and other information throughout the database. The documentation of this dataset can be found in the ecoinvent reports of version 2, which are still available via the ecoinvent website. The change report linked above covers all central changes that were made during the conversion process.]

## Included activities end
Infrastructure materials for municipal wastewater treatment plant, transports, dismantling. Land use burdens.

## Geography
Specific to the technology mix encountered in Switzerland in 2000. Well applicable to modern treatment practices in Europe, North America or Japan.

## Technology
Three stage wastewater treatment (mechanical, biological, chemical) including sludge digestion (fermentation) according to the average technology in Switzerland

## Parameters
- fraction, process water, to air: 0.1 dimensionless; name fraction_PW_to_air; lognormal variance with pedigree 0.092025, pedigree (4,4,3,2,4)
  Literature value (Statistics Canada, 2007 & Shaffer, K.H., 2008, Consumptive water use in the Great Lakes Basin, USGS) (Vionnet, S., Quantis Water Database - Technical Report, 2012).

## Reference product
- wastewater from liquid crystal display backlight production: -1 m3; CPC 39920: Sewage sludge; By-product classification Waste
  production volume 0.0336675 m3
    This is a placeholder value that does not reflect real-world production volumes. This dataset does not currently require a real-world production volume to work in the database framework, and no actual data were collected yet. This has no negative effect on the results of the ecoinvent database. The placeholder value of this activity was scaled according to the nominal GDP of 2005 (source: United Nations, http://data.un.org/Glossary.aspx?q=GDP+%28current+US%24%29, accessed 20130726) to reflect an appropriate share of the global production volume, which is also a placeholder value.
  property price 0 EUR2005
    Waste products are assigned a price of zero as they are assumed to require further treatment.
  property carbon content, fossil 0.641966
    BOD is 2.03e-3 kg/kg (Tab 12.14, ecoinvent v2.2 report 18_III). BOD was converted to TOC, using conversion factors in Tab 4.10 (ecoinvent v2.2 report 13_IV). TOC was considered as Total Carbon.
  property carbon content 0.641966
    carbon content on a dry matter basis (reserved; not for manual entry)
  properties: dry mass 2.05335 kg, water in wet mass 997.947 kg, wet mass 1000 kg, carbon content, non-fossil 0, water content 486.009, carbon allocation 1.31818 kg

## By-products
- electricity, for reuse in municipal waste incineration only: 0 kWh; CPC 17100: Electrical energy; By-product classification allocatable product; pedigree (1,1,1,1,1)
  Net electricity generated from this waste and used in internal MSWI plant energy redistribution.
  Uncertainty: uncertainty is calculated from uncertainties in waste composition and uncertainties in energy efficiency and the uncertainty in internal energy demand
  property exergy 3.6 MJ; name E_el_prod_MSWI_exergy
    This exergy property is based on the exergy content of the product.
  property true value relation 3.6; name E_el_prod_MSWI_true_value_relation
    property to calculate "true value" from
  property price 0.1 EUR2005; name E_el_prod_MSWI_price_EUR2005
    Estimated to be the same price as in case of electricity, medium voltage.
- heat, for reuse in municipal waste incineration only: 0 MJ; CPC 17300: Steam and hot water; By-product classification allocatable product; pedigree (1,1,1,1,1)
  Net useful heat generated from this waste and used in internal MSWI plant energy redistribution.
  Uncertainty: uncertainty is calculated from uncertainties in waste composition and uncertainties in energy efficiency and the uncertainty in internal energy demand
  property true value relation 0.1842; name E_th_prod_MSWI_true_value_relation
    property to calculate "true value" from
  property exergy 0.1842 MJ; name E_th_prod_MSWI_exergy
    This exergy property is based on the exergy content of the product.
  property price 0.0106 EUR2005; name E_th_prod_MSWI_price_EUR2005
    Average European district heat price from Ecoheatcool and Euroheat 2005-2006, Ecoheat Work package 1: The European heat market. Final report. 10.6 EUR/GJ i s the price of district heat. http://www.solarthermalworld.org/files/Ecoheatcool%20WP1%20Web.pdf?download
- zinc concentrate: 0 kg; CPC 14290: Other non-ferrous metal ores and concentrates (other than uranium or thorium ores and concentrates); By-product classification allocatable product
  Calculated value from the knowledge of the properties of both products.
  property price 0.38 EUR2005; name ByP_price_EUR2005
    Temporary price data. Calculated as 90% of purchasers price based on: Zinc content in concentrate 53%. Concentrate price per kg Zn 86.5% of refined Zn price (13.5% treatment charges according to CHR Metals Limited 2005: Dynamic cost curves. http://www.minecost.com/dynamic.pdf). 2004 zinc price from USGS (2007) Mineral commodity summaries 2007. <http://minerals.usgs.gov/minerals/pubs/mcs/2007/mcs2007.pdf> [Accessed 25 May 2010]
  property zinc content 0.53; name zinc_C_zinc_concentrate
    Zinc content on a dry matter basis. Value taken from teh "zinc mine operation" /GLO dataset.
  property dry mass 1 kg; name DM_zinc_concentrate
  property carbon content 0
    carbon content on a dry matter basis (reserved; not for manual entry)
  properties: wet mass 1 kg, water content 0, carbon content, non-fossil 0, carbon content, fossil 0, water in wet mass 0 kg, carbon allocation 0 kg

## Inputs from technosphere
- electricity, low voltage: 0.82687 kWh; lognormal variance with pedigree 0.17, pedigree (1,1,5,1,1)
  direct wastewater treatment plant burden. Uncertainty calculated from wastewater composition and treatment model
- liquid manure spreading, by vacuum tanker: 0.0034735 m3; lognormal variance with pedigree 0.04, pedigree (1,1,5,1,1)
  burden from sludge spreading. Uncertainty calculated from wastewater composition and treatment model
  This exchange has an activity link directly to the producing activity because the product is primarily consumed in the same geographical area where it is produced.
- quicklime, milled, packed: 1.5634e-8 kg; lognormal variance with pedigree 0.11, pedigree (1,1,5,1,1)
  burden from sludge incineration. Uncertainty calculated from wastewater composition and treatment model
  properties: wet mass 1 kg, dry mass 0.99 kg, water content 0.010101
- heat, district or industrial, other than natural gas: 0.88898 MJ; lognormal variance with pedigree 0.05, pedigree (1,1,5,1,1)
  (same comment as for quicklime, milled, packed)
- chemical, inorganic: 5.2342e-7 kg; lognormal variance with pedigree 0.46, pedigree (1,1,5,1,1)
  (same comment as for quicklime, milled, packed)
  properties: carbon content, fossil 0.003, dry mass 1 kg, wet mass 1 kg
  note on carbon content, fossil: This dataset is an unweighted average of 20 inorganic substances (listed in Tab 88.1, ecoinvent v2.2 report 8, part II), being part of the top100 chemicals included in this database. The C-content has also been calculated as an unweighted average of the C content of the substances composing this dataset.
- iron (III) chloride, without water, in 40% solution state: 2.3868e-5 kg; lognormal variance with pedigree 0.47, pedigree (1,1,5,1,1)
  direct wastewater treatment plant burden plus burden from sludge incineration. Uncertainty calculated from wastewater composition and treatment model
  properties: wet mass 1 kg, dry mass 1 kg
- ammonia, liquid: 1.7353e-6 kg; lognormal variance with pedigree 0.22, pedigree (1,1,5,1,1)
  (same comment as for quicklime, milled, packed)
  properties: wet mass 1 kg, dry mass 1 kg
- process-specific burdens, municipal waste incineration: 1.06 kg; lognormal variance with pedigree 0.04, pedigree (1,1,5,1,1)
  burden from sludge incineration. Uncertainty calculated from wastewater composition and treatment model;activityLink introduced to establish a direct link to the corresponding regional supply of this product
- residual material landfill: 7.466e-12 unit; lognormal variance with pedigree 0.07, pedigree (1,1,5,1,1)
  (same comment as for quicklime, milled, packed)
- sewer grid, 1.1E10l/year, 242 km: 1.6832e-7 km; lognormal variance with pedigree 0.04, pedigree (1,1,5,1,1)
  uncertainty heeded in exchanges of the module
  This exchange has an activity link directly to the producing activity because the product is primarily consumed in the same geographical area where it is produced.
- electricity, high voltage: 0.15239 kWh; lognormal variance with pedigree 0.49, pedigree (1,1,5,1,1)
  (same comment as for quicklime, milled, packed)
- hydrochloric acid, without water, in 30% solution state: 3.1405e-7 kg; lognormal variance with pedigree 0.46, pedigree (1,1,5,1,1)
  (same comment as for quicklime, milled, packed)
  properties: wet mass 1 kg, dry mass 1 kg
- cement, unspecified: 0.0014335 kg; lognormal variance with pedigree 0.08, pedigree (1,1,5,1,1)
  (same comment as for quicklime, milled, packed)
  properties: dry mass 1 kg, wet mass 1 kg
- process-specific burdens, slag landfill: 0.02391 kg; lognormal variance with pedigree 0.07, pedigree (1,1,5,1,1)
  (same comment as for process-specific burdens, municipal waste incineration)
- chemical, organic: 7.3834e-5 kg; lognormal variance with pedigree 0.7, pedigree (1,1,5,1,1)
  (same comment as for quicklime, milled, packed)
  properties: dry mass 1 kg, wet mass 1 kg, carbon content, fossil 0.628
  note on carbon content, fossil: This dataset is an unweighted average of 20 organic substances (listed in Tab 88.1, ecoinvent v2.2 report 8, part II), being part of the top100 chemicals included in this database. The C-content has also been calculated as an unweighted average of the C content of the substances composing this dataset.
- heat, district or industrial, natural gas: 0.000152307 MJ; lognormal variance with pedigree 0.22, pedigree (1,1,5,1,1)
  (same comment as for quicklime, milled, packed)
- titanium dioxide: 4.9673e-8 kg; lognormal variance with pedigree 0.54, pedigree (1,1,5,1,1)
  (same comment as for quicklime, milled, packed)
  properties: dry mass 1 kg, wet mass 1 kg
- sodium hydroxide, without water, in 50% solution state: 8.623e-8 kg; lognormal variance with pedigree 0.1, pedigree (1,1,5,1,1)
  (same comment as for quicklime, milled, packed)
  properties: wet mass 1 kg, dry mass 1 kg
- chromium oxide, flakes: 1.0137e-9 kg; lognormal variance with pedigree 0.54, pedigree (1,1,5,1,1)
  (same comment as for quicklime, milled, packed)
  properties: dry mass 1 kg, wet mass 1 kg
- waste graphical paper: -0.0155 kg; lognormal variance with pedigree 0.04, pedigree (1,1,5,1,1)
  (same comment as for electricity, low voltage)
  production volume 0.000521847 kg; = (Ref('5d9ff426-10c7-4469-9317-00520fd762a4')*-1)* Ref('8741a4a3-5aec-474f-9c18-448f89d3ead7', 'ProductionVolume')/ABS( Ref('8741a4a3-5aec-474f-9c18-448f89d3ead7'))
    Calculated from the production volume of wastewater from liquid crystal display backlight production in proportion to the respective output amounts.
  properties: carbon content, non-fossil 0.454955, wet mass 1 kg, water content 0.126126, dry mass 0.888 kg
- slag landfill: 4.2507e-11 unit; lognormal variance with pedigree 0.07, pedigree (1,1,5,1,1)
  (same comment as for quicklime, milled, packed)
- waste plastic, mixture: -0.0155 kg; lognormal variance with pedigree 0.04, pedigree (1,1,5,1,1)
  (same comment as for electricity, low voltage)
  production volume 0.000521847 kg; = (Ref('ecbe636a-f693-4062-b23f-391322bb4c76')*-1)* Ref('8741a4a3-5aec-474f-9c18-448f89d3ead7', 'ProductionVolume')/ABS( Ref('8741a4a3-5aec-474f-9c18-448f89d3ead7'))
    (same comment as for waste graphical paper)
  properties: water content 0.180638, wet mass 1 kg, dry mass 0.847 kg, carbon content, fossil 0.747344
  note on carbon content, fossil: C content in 1 kg DM was calculated using data in Tab A.2, ecoinvent v2.2 report 13_I
- municipal waste incineration facility: 2.6499e-10 unit; lognormal variance with pedigree 0.04, pedigree (1,1,5,1,1)
  (same comment as for quicklime, milled, packed)
- waste cement, hydrated: -0.0035837 kg; lognormal variance with pedigree 0.08, pedigree (1,1,5,1,1)
  (same comment as for quicklime, milled, packed)
  production volume 0.000120654 kg; = (Ref('81da15bd-8b36-4104-9951-420ad64527cd')*-1)* Ref('8741a4a3-5aec-474f-9c18-448f89d3ead7', 'ProductionVolume')/ABS( Ref('8741a4a3-5aec-474f-9c18-448f89d3ead7'))
    (same comment as for waste graphical paper)
  properties: dry mass 1 kg, wet mass 1 kg
- process-specific burdens, residual material landfill: 0.0035837 kg; lognormal variance with pedigree 0.07, pedigree (1,1,5,1,1)
  (same comment as for process-specific burdens, municipal waste incineration)
- wastewater treatment facility, capacity 1.1E10l/year: 1.9883e-9 unit; lognormal variance with pedigree 0.04, pedigree (1,1,5,1,1)
  (same comment as for sewer grid, 1.1E10l/year, 242 km)

## Emissions to nature
- Carbon dioxide, fossil [air, urban air close to ground]: 3.7535 kg; lognormal variance with pedigree 0.06, pedigree (1,1,5,1,1)
  emission from sludge incineration. Uncertainty calculated from wastewater composition and treatment model
- Ammonia [air, urban air close to ground]: 8.5765e-6 kg; lognormal variance with pedigree 0.28, pedigree (1,1,5,1,1)
  direct digester gas emission plus emission from sludge incineration plus emission from sludge spreading. Uncertainty calculated from wastewater composition and treatment model
- DOC, Dissolved Organic Carbon [water, ground-, long-term]: 0.0021115 kg; lognormal variance with pedigree 0.11, pedigree (1,1,5,1,1)
  (same comment as for Carbon dioxide, fossil)
- Nitrate [water, surface water]: 0.0011633 kg; lognormal variance with pedigree 0.06, pedigree (1,1,5,1,1)
  sewer overload discharge plus direct wastewater treatment plant emission plus emission from sludge incineration. Uncertainty calculated from wastewater composition and treatment model
- Nickel, ion [water, surface water]: 0.0013647 kg; lognormal variance with pedigree 0.66, pedigree (1,1,5,1,1)
  (same comment as for Nitrate)
- Iron [air, urban air close to ground]: 5.6768e-7 kg; lognormal variance with pedigree 0.75, pedigree (1,1,5,1,1)
  direct digester gas emission plus emission from sludge incineration. Uncertainty calculated from wastewater composition and treatment model
- BOD5, Biological Oxygen Demand [water, surface water]: 0.19248 kg; lognormal variance with pedigree 0.07, pedigree (1,1,5,1,1)
  (same comment as for Nitrate)
- Iron, ion [water, ground-, long-term]: 0.0079649 kg; lognormal variance with pedigree 1.54, pedigree (1,1,5,1,1)
  (same comment as for Carbon dioxide, fossil)
- Lead [soil, agricultural]: 0.00019381 kg; lognormal variance with pedigree 0.71, pedigree (1,1,5,1,1)
  emission from sludge spreading. Uncertainty calculated from wastewater composition and treatment model
- Carbon monoxide, fossil [air, urban air close to ground]: 0.0032648 kg; lognormal variance with pedigree 0.16, pedigree (1,1,5,1,1)
  (same comment as for Carbon dioxide, fossil)
- Lead [water, ground-, long-term]: 2.1896e-5 kg; lognormal variance with pedigree 6.92, pedigree (1,1,5,1,1)
  (same comment as for Carbon dioxide, fossil)
- Water [water, unspecified]: 0.9 m3; name water_to_water_unspecified; lognormal variance with pedigree 0.0807, pedigree (2,2,5,1,1)
  Calculated value based on water balance.
  property fraction, origin: salt water 0; name fraction_origin_salt_water_Ww
  property wet mass 1000 kg; name WM
  property dry mass 0 kg; name DM
  property water in wet mass 1000 kg; name WWM
  property carbon content, fossil 0; name C_content_fossil
  property carbon content, non-fossil 0; name C_content_non_fossil
  property fraction, origin: unspecified 0; name fraction_origin_unspecified_Ww
  property fraction, origin: fresh water 1; name fraction_origin_fresh_water_Ww
- TOC, Total Organic Carbon [water, surface water]: 0.15683 kg; lognormal variance with pedigree 0.07, pedigree (1,1,5,1,1)
  (same comment as for Nitrate)
- Methane, fossil [air, urban air close to ground]: 0.010238 kg; lognormal variance with pedigree 0.14, pedigree (1,1,5,1,1)
  (same comment as for Carbon dioxide, fossil)
- Lead [water, surface water]: 6.1882e-5 kg; lognormal variance with pedigree 0.6, pedigree (1,1,5,1,1)
  (same comment as for Nitrate)
- Nickel, ion [water, ground-, long-term]: 0.00050849 kg; lognormal variance with pedigree 0.71, pedigree (1,1,5,1,1)
  (same comment as for Carbon dioxide, fossil)
- BOD5, Biological Oxygen Demand [water, ground-, long-term]: 0.0017454 kg; lognormal variance with pedigree 0.11, pedigree (1,1,5,1,1)
  (same comment as for Carbon dioxide, fossil)
- Lead [air, urban air close to ground]: 1.1426e-8 kg; lognormal variance with pedigree 0.75, pedigree (1,1,5,1,1)
  (same comment as for Iron)
- Nickel [soil, agricultural]: 0.0003425 kg; lognormal variance with pedigree 0.71, pedigree (1,1,5,1,1)
  (same comment as for Lead)
- Nitrate [water, ground-, long-term]: 1.2356e-6 kg; lognormal variance with pedigree 0.08, pedigree (1,1,5,1,1)
  (same comment as for Carbon dioxide, fossil)
- Iron, ion [water, surface water]: 0.028578 kg; lognormal variance with pedigree 0.66, pedigree (1,1,5,1,1)
  (same comment as for Nitrate)
- Nitrogen [water, surface water]: 1.18e-5 kg; lognormal variance with pedigree 0.08, pedigree (1,1,5,1,1)
  direct wastewater treatment plant emission. Uncertainty calculated from wastewater composition and treatment model
- Mercury [water, ground-, long-term]: 1.2411e-6 kg; lognormal variance with pedigree 2.97, pedigree (1,1,5,1,1)
  (same comment as for Carbon dioxide, fossil)
- DOC, Dissolved Organic Carbon [water, surface water]: 0.14684 kg; lognormal variance with pedigree 0.04, pedigree (1,1,5,1,1)
  (same comment as for Nitrate)
- NMVOC, non-methane volatile organic compounds, unspecified origin [air, urban air close to ground]: 4.6518e-5 kg; lognormal variance with pedigree 0.26, pedigree (1,1,5,1,1)
  direct digester gas emission. Uncertainty calculated from wastewater composition and treatment model
- TOC, Total Organic Carbon [water, ground-, long-term]: 0.0021115 kg; lognormal variance with pedigree 0.11, pedigree (1,1,5,1,1)
  (same comment as for Carbon dioxide, fossil)
- Dinitrogen monoxide [air, urban air close to ground]: 2.4957e-6 kg; lognormal variance with pedigree 0.07, pedigree (1,1,5,1,1)
  direct wastewater treatment plant emission plus direct digester gas emission plus emission from sludge incineration plus emission from sludge spreading. Uncertainty calculated from wastewater composition and treatment model
- Cyanide [air, urban air close to ground]: 3.0957e-8 kg; lognormal variance with pedigree 0.24, pedigree (1,1,5,1,1)
  (same comment as for Carbon dioxide, fossil)
- Nitrogen oxides [air, urban air close to ground]: 1.6856e-5 kg; lognormal variance with pedigree 0.08, pedigree (1,1,5,1,1)
  (same comment as for Iron)
- Water [air, unspecified]: 0.1 m3; name water_to_air_unspecified; lognormal variance with pedigree 0.0807, pedigree (2,2,5,1,1)
  Calculated value based on water balance.
  property fraction, origin: unspecified 1; name fraction_origin_unspecified
  property fraction, origin: fresh water 0; name fraction_origin_fresh_water
  property fraction, origin: salt water 0; name fraction_origin_salt_water
- Carbon [soil, agricultural]: 0.13636 kg; lognormal variance with pedigree 0.11, pedigree (1,1,5,1,1)
  (same comment as for Lead)
- Mercury [water, surface water]: 1.7657e-5 kg; lognormal variance with pedigree 0.64, pedigree (1,1,5,1,1)
  (same comment as for Nitrate)
- Ammonium, ion [water, surface water]: 0.00026555 kg; lognormal variance with pedigree 0.06, pedigree (1,1,5,1,1)
  (same comment as for Nitrogen)
- COD, Chemical Oxygen Demand [water, surface water]: 0.58831 kg; lognormal variance with pedigree 0.04, pedigree (1,1,5,1,1)
  (same comment as for Nitrate)
- Mercury [air, urban air close to ground]: 9.4797e-11 kg; lognormal variance with pedigree 0.74, pedigree (1,1,5,1,1)
  (same comment as for Iron)
- Mercury [soil, agricultural]: 1.5043e-5 kg; lognormal variance with pedigree 0.71, pedigree (1,1,5,1,1)
  (same comment as for Lead)
- COD, Chemical Oxygen Demand [water, ground-, long-term]: 0.005336 kg; lognormal variance with pedigree 0.11, pedigree (1,1,5,1,1)
  (same comment as for Carbon dioxide, fossil)
- Iron [soil, agricultural]: 0.010724 kg; lognormal variance with pedigree 0.71, pedigree (1,1,5,1,1)
  (same comment as for Lead)
- Nickel [air, urban air close to ground]: 2.3439e-11 kg; lognormal variance with pedigree 0.81, pedigree (1,1,5,1,1)
  (same comment as for Iron)
- Nitrite [water, surface water]: 1.5509e-5 kg; lognormal variance with pedigree 0.08, pedigree (1,1,5,1,1)
  (same comment as for Nitrogen)

## Extrapolations
This dataset has been extrapolated from year 2000 to the year of the calculation (2019). The uncertainty has been adjusted accordingly.

## Review by Jürgen Sutter 2009-02-07
passed.
