# electricity production, photovoltaic, 3kWp slanted-roof installation, multi-Si, panel, mounted

Dataset: EcoSpold 2, unit process
Geography: IN-MP
Time period: 2005-01-01 to 2019-12-31
Technology level: current
Classification: EcoSpold01Categories: photovoltaic/power plants
Classification: ISIC rev.4 ecoinvent: 3510b: Electric power generation, photovoltaic
Synonyms: polycrystalline; PV-module; multi-crystalline; Solar module; silicon
Tags: India; photovoltaic power
Scenario: Business-as-Usual
System model: Allocation at the point of substitution
Generated by: Muhammed Noor Hossain
Published in: Hossain, Muhammed Noor 2016
Database: ecoinvent
isCopyrightProtected: true
accessRestrictedTo: 1

## General comment
This dataset represents the production of grid-connected low voltage electricity with a 3 kWp building integrated photovoltaic (PV) module in India - Madhya Pradesh (a state/union territory in India) in 2012. The 3 kWp module has been chosen as basic module for building integrated PV electricity production. Larger modules can easily be built with these 3 kWp modules without producing a significant error in environmental impact calculations. The module is a multi-Si panel installed on a slanted roof.
An inverter is used to convert the low voltage DC power into AC power.
We took the total generation from solar photovoltaic according to the Indian energy statistics from International Energy Agency (IEA, 2016). Then, we distributed the total generation among the states according to the installed capacity data as on 31.03.2013 from Statistical Yearbook, India, 2015 (Statistical Yearbook, India, 2015). We have, then, distributed the total generation from solar among two different technologies based on the panel class i.e. photovoltaic, 3kWp slanted-roof installation, multi-Si, panel, mounted and photovoltaic, 3kWp slanted-roof installation, single-Si, panel, mounted according to the ecoinvent v3.2. However, for the technical reasons (i.e. too many datasets for a very minor share of production volume), we kept only multi-Si, panel, mounted to represent as grid-interactive solar power technology in India.
Source:
IEA. (2016). International Energy Agency. Retrieved May 19, 2016, from http://www.iea.org/statistics/statisticssearch/report/?year=2013&country=INDIA&product=RenewablesandWaste
Statistical Yearbook, India. (2015). Energy. Retrieved 06 21, 2016, from Ministry of Statistics and Programme Implementation: http://mospi.nic.in/Mospi_New/upload/SYB2015/ch16.html
[This dataset is meant to replace the following datasets:
- electricity production, photovoltaic, 3kWp slanted-roof installation, multi-Si, panel, mounted, IN, 2005 - 2015]

## Included activities start
From the PV module installed and ready to be used.

## Included activities end
This activity ends with low voltage electricity produced with the 3 kWp module, assuming an average yield.

This dataset includes tap water use for cleaning the module and it’s treatment.

## Technology
Electricity production with a grid-connected 3 kWp multi-Si photovoltaic panel mounted on a buildings slanted roof. See field 'extrapolation' for comment on the output voltage.

## Time period
The annual production volume is valid for the period of 01.04.2012 - 31.03.2013.

## Parameters
- Share 3kWp slanted-roof installation, multi-Si, panel, mounted, on roof: 0; name pv_3sri_mSi_pmr; pedigree (5,5,5,5,5)
  Parameter not needed for this dataset but present due to parent-child relationship.
- Yield (Output), photovoltaics: 1370 kWh/kWp; name yield; lognormal variance with pedigree 0.003725, pedigree (3,2,1,2,2)
  Calculated value. Indian state/union territory specific average total solar yield for a year is calculated from the online Photovoltaic Geographical Information System - Interactive Maps tool from European Commission Joint Research Centre (EUJRC). The parameter chosen are PV technology: Crystalline silicon; Installed peak PV power: 1 kWp; Estimated system losses: 14%; and Mounting Position: Building integrated. Moreover, the geo-location is selected randomly. That means the point of location is not particularly the largest city or the city with highest number of grid-connected PV panels. Since, the data on the location of grid-connected PV panels are not available and the Yield (Output) is also not very different inside the geography, we kept this value for this version. EUJRC (2017). Photovoltaic Geographical Information System - Interactive Maps. Retrieved on 29 January, 2017 from http://re.jrc.ec.europa.eu/pvgis/apps4/pvest.php?map=africa&lang=en.
- gross electricity production: 4.64497e7 kWh; name gross_electricity; lognormal variance with pedigree 0.0018, pedigree (2,1,1,1,2)
  Literature and calculated value. We took the total generation from solar photovoltaic according to the Indian energy statistics from International Energy Agency (IEA, 2016). Then, we distributed the total generation among the states according to the installed capacity data as on 31.03.2013 from Statistical Yearbook, India, 2015 (Statistical Yearbook, India, 2015). We have, then, distributed the total generation from solar among two different technologies based on the panel class i.e. photovoltaic, 3kWp slanted-roof installation, multi-Si, panel, mounted and photovoltaic, 3kWp slanted-roof installation, single-Si, panel, mounted according to the ecoinvent v3.2. However, for the technical reasons (i.e. too many datasets for a very minor share of production volume), we kept only multi-Si, panel, mounted to represent as grid-interactive solar power technology in India. Source: IEA. (2016). International Energy Agency. Retrieved May 19, 2016, from http://www.iea.org/statistics/statisticssearch/report/?year=2013&country=INDIA&product=RenewablesandWaste
- capacity: 0.003 MW; lognormal variance with pedigree 0.001925, pedigree (2,2,1,2,2)
  Capacity of the photovoltaic cell in MWp per installation unit [MWp/unit]
  nan
- water use for cleaning photovoltaic panels: 20 l/m2; name water_pv_panels_cleaning; lognormal variance with pedigree 0.1227, pedigree (5,4,5,3,4)
  Estimation
  nan
- fraction, process water, to air: 0.15 dimensionless; name fraction_PW_to_air; lognormal variance with pedigree 0.092025, pedigree (4,4,3,2,4)
  Literature value. In case when no industry/process specific data are available, default evaporation fraction value is used. This value is 15% and is based on literature (Statistics Canada, 2007 & Shaffer, K.H., 2008, Consumptive water use in the Great Lakes Basin, USGS & Shiklomanov, 2003, World Water Resources at the Beginning of the 21st Century) and has been approved by an expert.
  nan
- correction factor: 0.92; name corr; lognormal variance with pedigree 0.0175, pedigree (4,3,2,3,3)
  Estimation. Literature data on the yield for optimum installation and not real performance in the country have been corrected with a factor of 92% according to experiences in Switzerland for average production. This is based on the ratio of actual yield and published IEA data (820/892 = 0.92 - see Jungbluth et al. 2012 for detailed discussion)
  for use when something has to be corrected with an overall factor
- lifetime: 30 year; lognormal variance with pedigree 0.026625, pedigree (4,3,3,2,3)
  Oral communication. Gnos, S. 2002. Personal Communication, 10.2002. NET AG, Switzerland
  nan
- losses from gross electricity production: 0.05 dimensionless; name losses_gross_net; lognormal variance with pedigree 0.0167, pedigree (3,3,1,3,3)
  Estimation. The factor for the loss of electricity from gross to net electricity production is an assumption based on experiences and expertise (5% losses for photovoltaics).
  nan
- Panel area for one 3 kWp unit, mc-Si: 22.1 m2/unit; name panel_area_mcSi; lognormal variance with pedigree 0.0199, pedigree (4,3,2,3,3)
  Literature value. Jungbluth N., Stucki M., Flury K., Frischknecht R. and Buesser S. (2012) Life Cycle Inventories of Photovoltaic Power Production. ESU-services Ltd., Uster, CH, retrieved from: www.esu-services.ch/data/public-lci-reports/
  Tab. 12.3, p.127
  nan
- Yield (Output), photovoltaics, corrected: 1260.4 kWh/kWp; name yield_corr; = yield*corr; lognormal variance with pedigree 0, pedigree (1,1,1,1,1)
  Estimated value. The annual yield is corrected with a correction factor of 0.92 according to Jungbluth et al. 2012.
  Annual output (yield), roof-top [kWh* kWp-1*y-1]
  The annual yield is corrected with a correction factor of 0.92 according to [ Jungbluth N., Stucki M., and Frischknecht R. (2009) Photovoltaics. In Dones, R. (Ed.) et al., Sachbilanzen von Energiesystemen: Grundlagen fur den okologischen Vergleich von Energiesystemen und den Einbezug von Energiesystemen in Oekobilanzen fur die Schweiz. ecoinvent report No. 6-XII, Swiss Centre for Life Cycle Inventories, Dubendorf, CH, 2009.]
- fraction, tap water, to air: 0.15; name fraction_TW_to_air; = fraction_PW_to_air; lognormal variance with pedigree 0.092025, pedigree (4,4,3,2,4)
  Calculated value. See comment in the other parametres present in this dataset. Tap water is considered to be always used as process water, thus process water fractions to air are applied to all tap water input flows to calculate the amount of water consumed in the processes.
  nan

## Reference product
- electricity, low voltage: 1 kWh; CPC 17100: Electrical energy; By-product classification allocatable product
  production volume 4.41272e7 kWh; name apv; = gross_electricity* (1-losses_gross_net)
    Literature and calculated value. We took the total generation from solar photovoltaic according to the Indian energy statistics from International Energy Agency (IEA, 2016). Then, we distributed the total generation among the states according to the installed capacity data as on 31.03.2013 from Statistical Yearbook, India, 2015 (Statistical Yearbook, India, 2015). We have, then, distributed the total generation from solar among two different technologies based on the panel class i.e. photovoltaic, 3kWp slanted-roof installation, multi-Si, panel, mounted and photovoltaic, 3kWp slanted-roof installation, single-Si, panel, mounted according to the ecoinvent v3.2. However, for the technical reasons (i.e. too many datasets for a very minor share of production volume), we kept only multi-Si, panel, mounted to represent as grid-interactive solar power technology in India.
  property price 0.107 EUR2005
    Temporary price data. Calculated as 90% of purchasers price based on: IEA Key world energy statistics 2004 (www.iea.org/textbase/nppdf/free/2004/keyworld2004.pdf)
  property true value 0.107
    allocation property applied in "true value" allocation // value calculated from revenue

## By-products
- heat, for reuse in municipal waste incineration only: 0 MJ; CPC 17300: Steam and hot water; By-product classification allocatable product; pedigree (1,1,1,1,1)
  Net electricity generated from this waste and used in internal MSWI plant energy redistribution.
  Uncertainty: uncertainty is calculated from uncertainties in waste composition and uncertainties in energy efficiency and the uncertainty in internal energy demand
  production volume 11.0342 MJ
  property exergy 0.1842 MJ; name E_th_prod_MSWI_exergy
    This exergy property is based on the exergy content of the product.
  property price 0.0106 EUR2005; name E_th_prod_MSWI_price_EUR2005
    Average European district heat price from Ecoheatcool and Euroheat 2005-2006, Ecoheat Work package 1: The European heat market. Final report. 10.6 EUR/GJ i s the price of district heat. http://www.solarthermalworld.org/files/Ecoheatcool%20WP1%20Web.pdf?download
  property true value relation 0.1842; name E_th_prod_MSWI_true_value_relation
    property to calculate "true value" from
  property true value 1.64858e-9
    allocation property applied in "true value" allocation // value calculated from true value relation
- electricity, for reuse in municipal waste incineration only: 0 kWh; CPC 17100: Electrical energy; By-product classification allocatable product; pedigree (1,1,1,1,1)
  (same comment as for heat, for reuse in municipal waste incineration only)
  production volume 1.53253 kWh
  property price 0.1 EUR2005; name E_el_prod_MSWI_price_EUR2005
    Estimated to be the same price as in case of electricity, medium voltage.
  property exergy 3.6 MJ; name E_el_prod_MSWI_exergy
    This exergy property is based on the exergy content of the product.
  property true value relation 3.6; name E_el_prod_MSWI_true_value_relation
    property to calculate "true value" from
  property true value 4.47496e-9
    (same comment as for heat, for reuse in municipal waste incineration only)

## Inputs from technosphere
- wastewater, from residence: -3.89647e-6 m3; name sewage; = (tapwater/1000)*-1; lognormal variance with pedigree 0.0047, pedigree (2,2,3,5,1)
  Calculated value.
  production volume 171.94 m3; = apv*sewage
    Calculated value
  property price 0 EUR2005; name sewage_price_EUR2005
  properties: dry mass 0.337476 kg, carbon content, non-fossil 0.199421, water content 2962.17, wet mass 1000 kg
  note on carbon content, non-fossil: 0.0673 kg TOC/m3 (Tab A.17, ecoinvent v2.2 report 13_I). TOC was considered as Total Carbon.
- photovoltaic slanted-roof installation, 3kWp, multi-Si, panel, mounted, on roof: 8.81554e-6 unit; name installation; = 1/(lifetime*(capacity*1000)*yield_corr); lognormal variance with pedigree 0.0161, pedigree (3,2,3,5,1)
  Calculated value. Lifetime*capacity*annual yield = y * kWp/unit * kWh/(kWp*y) = kWh/unit and then the reciproke.
- tap water: 0.00389647 kg; name tapwater; = installation*panel_area_mcSi*water_pv_panels_cleaning; lognormal variance with pedigree 0.0047, pedigree (2,2,3,5,1)
  Calculated value. Amount of installation needed to produce 1 kWh * panel area per installation * water need to clean 1 m2 of panel. [unit/kWh * m2/unit * l/m2 = l/kWh]. A density of 1 kg/dm3 is assumed.
  properties: wet mass 1 kg, water content 2962.17, carbon content, fossil 0.00178991, dry mass 0.000337476 kg
  note on carbon content, fossil: Bicarbonate content is 2.93 mol/m3. CO2 content is 0.1 mol/m3 (ecoinvent v2.2 report 8, Tab 93.1).

## Inputs from nature
- Energy, solar, converted [natural resource, in air]: 3.8503 MJ; lognormal variance with pedigree 0.00388441, pedigree (2,2,3,1,1)
  Energy loss in the system is included.

## Emissions to nature
- Water [air, unspecified]: 5.84471e-7 m3; name water_to_air_unspecified; = (tapwater/1000)*fraction_TW_to_air; lognormal variance with pedigree 0.098025, pedigree (4,4,4,2,4)
  Calculated value based on literature values and expert opinion. See comments in the parametres' comment field.
  property fraction, origin: fresh water 1; name fraction_origin_fresh_water
  property fraction, origin: salt water 0; name fraction_origin_salt_water
  property fraction, origin: unspecified 0; name fraction_origin_unspecified

## Sampling procedure
The inventory is generated using statistical data, literature data and modelling.

## Extrapolations
LCI data represent specific production and manufacturing facilities. Please see the following source. 2012, Jungbluth N., Stucki M., Flury K., Frischknecht R. and Buesser S., Life Cycle Inventories of Photovoltaic Power Production, Uster, CH, ESU-services Ltd., 3 - SeparatePublication, retrieved from: www.esu-services.ch/data/public-lci-reports/

## Review by Carl Vadenbo 2015-05-29
The update of the whole electricity sector for the ecoinvent v3.2 database consist of hundreds of datasets. All these datasets have passed through a streamlined review processes where the underlying modelling of production volumes, technology shares and efficiencies was reviewed in detail prior to the datasets being submitted to the database.

## Review by Karin Treyer 2017-01-06
This dataset has been produced in a project on regionalisation of the Indian electricity mix on a states level.
In general, only key parameters have been adjusted to region-specific conditions, such as the electrical efficiency or power plants own use of electricity (losses from gross to net electricity). Whenever more accurate data will be available on e.g. region-specific emissions from power plants, these should be included in this dataset. The solar yield is not valid for a specific location with installed photovoltaic panels, but is a single-point value in the present Indian State.
