# pipeline construction, natural gas, high pressure distribution network

Dataset: EcoSpold 2, unit process
Geography: RoW
Time period: 1990-01-01 to 2019-12-31
Technology level: current
Classification: ISIC rev.4 ecoinvent: 4220:Construction of utility projects
Classification: EcoSpold01Categories: natural gas/fuels
Tags: ConvertedDataset
Scenario: Business-as-Usual
System model: Allocation at the point of substitution
Generated by: Mireille Faist Emmenegger (obsolete)
Published in: Faist Emmenegger, M. 2007
Database: ecoinvent
isCopyrightProtected: true
accessRestrictedTo: 1

## General comment
Pipeline infrastructure for gas distribution. Life time 40 years. Annual transport of 30 TJ/km/a.
[This dataset was already contained in the ecoinvent database version 2. It was not individually updated during the transfer to ecoinvent version 3. Life Cycle Impact Assessment results may still have changed, as they are affected by changes in the supply chain, i.e. in other datasets. This dataset was generated following the ecoinvent quality guidelines for version 2. It may have been subject to central changes described in the ecoinvent version 3 change report (http://www.ecoinvent.org/database/ecoinvent-version-3/reports-of-changes/), and the results of the central updates were reviewed extensively. The changes added e.g. consistent water flows and other information throughout the database. The documentation of this dataset can be found in the ecoinvent reports of version 2, which are still available via the ecoinvent website. The change report linked above covers all central changes that were made during the conversion process.]

## Included activities end
This dataset describes the infrastructure needed for the European high (>1 bar) and middle (>0.1 bar) pressure distribution network.

## Geography
Proportion of the different materials is based on German data, thickness of the pipelines on Swiss data.

## Technology
The length of the pipelines is based on German statistics, whereas the thickness of the pipeline is estimated (Swiss data).

## Reference product
- pipeline, natural gas, high pressure distribution network: 1 km; name pipeline_amount; CPC 53251: Local pipelines; By-product classification allocatable product
  EcoSpold01Location=RER
  production volume 34340.6 km; name pipeline_PV; = 1840000/40
    The total length of natural gas high pressure distribution network pipeline in the world amounts to 1840000 km. The average lifespan of the pipeline is 40 years, which means that 46000 km of pipeline is built yearly.
  property price 139087 EUR2005
    Calculated based on inputs: The price of the product has been calculated as a sum of the values of the material and energy inputs for this product. This value is therefore a rough estimation. It may underestimate the real price since there are additional expenses when producing any product. These expences can include for example labour costs, treatment of waste materials and profit for the producer. Please consider carefully whether this level of data quality is acceptable for your application.
  property true value 139087; name pipeline_amount_true_value
    allocation property applied in "true value" allocation // value calculated from revenue

## By-products
- iron scrap, sorted, pressed: 0 kg; By-product classification Recyclable; CPC 39310: Slag, dross, scalings and other waste from the manufacture of iron or steel; pedigree (1,1,1,1,1)
  Iron scrap recovered from this waste.
  production volume 137408 kg
  property price 0.175 EUR2005
    Temporary price data. Calculated as 90% of purchasers price based on: 2005 import and export prices (total trades (USD) divided by total weight (kg) in biggest economies of the world: EU27, USA, Brasil, China, India, Japan and Russia) from UN Commodity Trade Statistics Database (http://data.un.org/Explorer.aspxDatabase [Accessed 2011.06.20]). Commodity: Waste or scrap, of cast iron
  property carbon content 0
    carbon content on a dry matter basis (reserved; not for manual entry)
  property true value 0.524564
    allocation property applied in "true value" allocation // value calculated from revenue
  properties: water content 0, water in wet mass 0 kg, carbon content, fossil 0, dry mass 1 kg, carbon content, non-fossil 0, wet mass 1 kg, carbon allocation 0 kg
- heat, for reuse in municipal waste incineration only: 0 MJ; CPC 17300: Steam and hot water; By-product classification allocatable product; pedigree (1,1,1,1,1)
  Net electricity generated from this waste and used in internal MSWI plant energy redistribution.
  Uncertainty: uncertainty is calculated from uncertainties in waste composition and uncertainties in energy efficiency and the uncertainty in internal energy demand
  production volume 4.67985e7 MJ
  property exergy 0.1842 MJ; name E_th_prod_MSWI_exergy
    This exergy property is based on the exergy content of the product.
  property price 0.0106 EUR2005; name E_th_prod_MSWI_price_EUR2005
    Average European district heat price from Ecoheatcool and Euroheat 2005-2006, Ecoheat Work package 1: The European heat market. Final report. 10.6 EUR/GJ i s the price of district heat. http://www.solarthermalworld.org/files/Ecoheatcool%20WP1%20Web.pdf?download
  property true value relation 0.1842; name E_th_prod_MSWI_true_value_relation
    property to calculate "true value" from
  property true value 7.37269
    allocation property applied in "true value" allocation // value calculated from true value relation
- electricity, for reuse in municipal waste incineration only: 0 kWh; CPC 17100: Electrical energy; By-product classification allocatable product; pedigree (1,1,1,1,1)
  (same comment as for heat, for reuse in municipal waste incineration only)
  production volume 6.6573e6 kWh
  property price 0.1 EUR2005; name E_el_prod_MSWI_price_EUR2005
    Estimated to be the same price as in case of electricity, medium voltage.
  property exergy 3.6 MJ; name E_el_prod_MSWI_exergy
    This exergy property is based on the exergy content of the product.
  property true value relation 3.6; name E_el_prod_MSWI_true_value_relation
    property to calculate "true value" from
  property true value 20.4977
    (same comment as for heat, for reuse in municipal waste incineration only)

## Inputs from technosphere
- cast iron: 343.067 kg; lognormal variance with pedigree 0.1306, pedigree (4,3,5,5,1)
  EcoSpold01Location=RER
  Qualified estimate for CH
  Uncertainty: qualified estimate for CH
  properties: dry mass 1 kg, carbon content, fossil 0.04, wet mass 1 kg
  note on carbon content, fossil: Cast iron is made by remelting pig iron in small furnaces (e.g. cupola furnaces or electric arc furnaces) and poured into moulds to make castings. It usually contains 2% to 6% carbon (ecoinvent v2.2 report 10_partII). An average content of 4% was considered
- polyethylene, high density, granulate: 2377.31 kg; lognormal variance with pedigree 0.1306, pedigree (4,3,5,5,1)
  EcoSpold01Location=RER
  Qualified estimate for CH
  Uncertainty: qualified estimate for CH
  properties: wet mass 1 kg, carbon content, fossil 0.857143, dry mass 1 kg
  note on carbon content, fossil: Polyethylene is formed out of a huge amount of ethylene monomers (C2H4) (ecoinvent v2.2 report 11_II). MW=28 g/mol
- building, hall, steel construction: 0.199959 m2; lognormal variance with pedigree 0.3706, pedigree (4,3,5,5,1)
  EcoSpold01Location=CH
  Qualified estimate for CH
  Uncertainty: qualified estimate for CH
- building, multi-storey: 15.9967 m3; lognormal variance with pedigree 0.3706, pedigree (4,3,5,5,1)
  EcoSpold01Location=RER
  Qualified estimate for CH
  Uncertainty: qualified estimate for CH
- reinforcing steel: 13679.6 kg; lognormal variance with pedigree 0.1306, pedigree (4,3,5,5,1)
  Qualified estimate for CH
  EcoSpold01Location=RER
  Uncertainty: qualified estimate for CH
  properties: wet mass 1 kg, carbon content, fossil 0.004, dry mass 1 kg
- waste reinforcement steel: -10207.6 kg; name waste_reinf_steel_amount
  Qualified estimate for CH
  production volume 4.68015e8 kg; = pipeline_PV*waste_reinf_steel_amount/pipeline_amount
    Calculated from production volume of reference product using the relative outputs.
  property price 0 EUR2005; name waste_reinf_steel_amount_price_EUR2005
  properties: dry mass 1 kg, wet mass 1 kg
- decommissioned pipeline, natural gas: -7071.66 kg; name decom_pipeline_amount; lognormal variance with pedigree 0.1306, pedigree (4,3,5,5,1)
  EcoSpold01Location=CH
  Qualified estimate for CH
  Uncertainty: qualified estimate for CH
  production volume 2.43432e8 kg; = pipeline_PV*decom_pipeline_amount/ pipeline_amount
    Calculated from the production volume of pipeline, natural gas, high pressure distribution network in proportion to the respective output amounts.
  property price 0 EUR2005; name decom_pipeline_amount_price_EUR2005
  properties: dry mass 1 kg, wet mass 1 kg
- sand: 0 kg; pedigree (1,1,1,1,1)
  Qualified estimate for CH
  EcoSpold01Location=CH
  Uncertainty: qualified estimate for CH
  properties: dry mass 1 kg, wet mass 1 kg
- pitch: 0 kg; pedigree (1,1,1,1,1)
  EcoSpold01Location=RER
  Qualified estimate for CH
  Uncertainty: qualified estimate for CH
  properties: wet mass 1 kg, dry mass 1 kg, carbon content, fossil 0.83
- waste plastic, mixture: 0 kg; name waste_plastic_mix_amount; pedigree (1,1,1,1,1)
  EcoSpold01Location=CH
  Qualified estimate for CH
  Uncertainty: qualified estimate for CH
  production volume 0 kg
    (same comment as for decommissioned pipeline, natural gas)
  property price 0 EUR2005; name waste_plastic_mix_amount_price_EUR2005
  properties: dry mass 0.847 kg, wet mass 1 kg, water content 0.180638, carbon content, fossil 0.747344
  note on carbon content, fossil: C content in 1 kg DM was calculated using data in Tab A.2, ecoinvent v2.2 report 13_I
- polyethylene, low density, granulate: 760.636 kg; lognormal variance with pedigree 0.1306, pedigree (4,3,5,5,1)
  Qualified estimate for CH
  EcoSpold01Location=RER
  Uncertainty: qualified estimate for CH
  properties: dry mass 1 kg, wet mass 1 kg, carbon content, fossil 0.857143
- transport, helicopter, LTO cycle: 4.14032 unit; lognormal variance with pedigree 0.2506, pedigree (4,3,5,5,1)
  Qualified estimate for CH
  EcoSpold01Location=GLO
  Uncertainty: qualified estimate for CH
- drawing of pipe, steel: 13985.4 kg; lognormal variance with pedigree 0.1306, pedigree (4,3,5,5,1)
  Qualified estimate for CH
  EcoSpold01Location=RER
  Uncertainty: qualified estimate for CH
- excavation, skid-steer loader: 18996.1 m3; lognormal variance with pedigree 0.2506, pedigree (4,3,5,5,1)
  EcoSpold01Location=RER
  Qualified estimate for CH
  Uncertainty: qualified estimate for CH
- cement, unspecified: 0 kg; pedigree (1,1,1,1,1)
  EcoSpold01Location=CH
  Qualified estimate for CH
  Uncertainty: qualified estimate for CH
  properties: dry mass 1 kg, wet mass 1 kg
- waste bitumen: -629.701 kg; name waste_bitumen_amount; lognormal variance with pedigree 0.1306, pedigree (4,3,5,5,1)
  EcoSpold01Location=CH
  Qualified estimate for CH
  Uncertainty: qualified estimate for CH
  production volume 2.16563e7 kg; = pipeline_PV* waste_bitumen_amount/ pipeline_amount
    (same comment as for decommissioned pipeline, natural gas)
  property price 0 EUR2005; name waste_bitumen_amount_price_EUR2005
  properties: wet mass 1 kg, carbon content, fossil 0.842657, water content 0.0141988, dry mass 0.986 kg
- transport, passenger car: 8.06906 km; lognormal variance with pedigree 0.2506, pedigree (4,3,5,5,1)
  EcoSpold01Location=CH
  Qualified estimate
  Uncertainty: qualified estimate
- concrete, normal: 0 m3; pedigree (1,1,1,1,1)
  EcoSpold01Location=CH
  Qualified estimate for CH
  Uncertainty: qualified estimate for CH
  properties: water content 0.086758, wet mass 2380 kg, dry mass 2190 kg
- transport, helicopter: 10.3508 hour; lognormal variance with pedigree 0.2506, pedigree (4,3,5,5,1)
  Qualified estimate for CH
  EcoSpold01Location=GLO
  Uncertainty: qualified estimate for CH
- waste concrete, not reinforced: -3275.33 kg; name waste_concrete_not_reinf_amount
  Qualified estimate for CH
  production volume 1.50174e8 kg; = pipeline_PV*waste_concrete_not_reinf_amount/pipeline_amount
    Calculated from production volume of reference product using the relative outputs.
  property price 0 EUR2005; name waste_concrete_not_reinf_a_price_EUR2005
  properties: wet mass 1 kg, dry mass 1 kg
- excavation, hydraulic digger: 1199.76 m3; lognormal variance with pedigree 0.2506, pedigree (4,3,5,5,1)
  Qualified estimate for CH
  EcoSpold01Location=RER
  Uncertainty: qualified estimate for CH
- sand: 3157.48, 608197 kg (2 entries); lognormal variance with pedigree 0.1306, pedigree (4,3,5,5,1)
  Qualified estimate for CH
  EcoSpold01Location=CH
  Uncertainty: qualified estimate for CH
- pitch: 67.8751, 3.86832, 175.079, 7.84778, 11.2034, 989.742 kg (6 entries); lognormal variance with pedigree 0.1306, pedigree (4,3,5,5,1)
  EcoSpold01Location=RER
  Qualified estimate for CH
  Uncertainty: qualified estimate for CH
- waste plastic, mixture: -193.04, -12.8982, -0.975467, -5.3274, -2.15221, -5.05886, -1351.38 kg (7 entries); lognormal variance with pedigree 0.1306, pedigree (4,3,5,5,1)
  EcoSpold01Location=CH
  Qualified estimate for CH
  Uncertainty: qualified estimate for CH
  production volume 5.39551e7 kg
- cement, unspecified: 136.92, 10.0285, 28.5844, 646.446, 19.0268, 208.97, 25.2831, 2823.94 kg (8 entries); lognormal variance with pedigree 0.1306, pedigree (4,3,5,5,1)
  EcoSpold01Location=CH
  Qualified estimate for CH
  Uncertainty: qualified estimate for CH
- concrete, normal: 0.60662, 0.063209, 0.511721, 0.287843, 1.21894, 0.0411139 m3 (6 entries); lognormal variance with pedigree 0.1306, pedigree (4,3,5,5,1)
  EcoSpold01Location=CH
  Qualified estimate for CH
  Uncertainty: qualified estimate for CH

## Inputs from nature
- Transformation, to annual crop [natural resource, land]: 1999.59 m2; lognormal variance with pedigree 0.2506, pedigree (4,3,5,5,1)
  Qualified estimate for CH
  Uncertainty: qualified estimate for CH
- Transformation, from forest, unspecified [natural resource, land]: 1999.59 m2; lognormal variance with pedigree 0.2506, pedigree (4,3,5,5,1)
  Qualified estimate for CH
  Uncertainty: qualified estimate for CH
- Occupation, construction site [natural resource, land]: 3329.32 m2*year; lognormal variance with pedigree 0.1706, pedigree (4,3,5,5,1)
  Qualified estimate for CH
  Uncertainty: qualified estimate for CH
- Transformation, to industrial area [natural resource, land]: 2.48949 m2; lognormal variance with pedigree 0.1906, pedigree (4,3,5,5,1)
  Qualified estimate for CH
  Uncertainty: qualified estimate for CH
- Transformation, from unspecified [natural resource, land]: 2.48949 m2; lognormal variance with pedigree 0.1906, pedigree (4,3,5,5,1)
  Qualified estimate for CH
  Uncertainty: qualified estimate for CH
- Occupation, industrial area [natural resource, land]: 49.6899 m2*year; lognormal variance with pedigree 0.1106, pedigree (4,3,5,5,1)
  Qualified estimate for CH
  Uncertainty: qualified estimate for CH

## Sampling procedure
statistics

## Extrapolations
none This dataset has been copied from an original dataset covering the geography Europe without Switzerland. The uncertainty has been adjusted accordingly.

## Review by Michael Spielmann (obsolete) 2003-08-10
Passed.
