# ferrosilicon production

Dataset: EcoSpold 2, unit process
Geography: CN
Time period: 2008-01-01 to 2019-12-31
Technology level: current
Classification: ISIC rev.4 ecoinvent: 2410:Manufacture of basic iron and steel
Scenario: Business-as-Usual
System model: Allocation at the point of substitution
Generated by: Simone Ehrenberger
Published in: Simone Ehrenberger 2013
Database: ecoinvent
isCopyrightProtected: true
accessRestrictedTo: 1

## General comment
Ferrosilicon (FeSi) is produced via reduction of silica sand in presence of iron in an electric arc furnace. Coke is used as reduction agent. FeSi is used in various metallurgical processes as reduction agent or alloying material. For the FeSi production process, the data on material consumption is based on an average of three Chinese companies which have been surveyed in 2008.

## Included activities start
The process starts with the reception of raw materials at the factory gate.

## Included activities end
This activity ends with the production of ferrosilicon in an electric arc furnace. No further process steps are included.

## Technology
The module includes the production of the anode: the production of Söderberg paste has been developed according to data from ProBas (reference year 2003; www.probas.umweltbundesamt.de).

Theoretically, the main emission from the electric arc furnace where FeSi is produced is CO according to the following chemical reactions:

SiO2 + 2C = Si + 2 CO

SiO2 + C = SiO + CO

In reality, several further reactions lead to potential CO and CO2 emissions. Due to large uncertainties of the direct CO and CO2 emissions from the furnace, this module refers to the average amount of direct CO2 emissions from FeSi production which has been measured at Chinese Fe-alloy plants (Zhou 2001). Other elements of the off-gas are amorphous condensed SiO2, SO2 and NOx. The SiO2 dust is calculated in this study. It can be filtered and used for concrete or ceramic production. As there is no information whether this is done in China, there is no further use assumed. SO2 and NOx result from impurities of the raw materials and are not expected to be emitted in relevant amounts. Data on infrastructure is a rough estimation.

## Reference product
- ferrosilicon: 0 kg; CPC 41115: Other ferro-alloys; By-product classification allocatable product; CAS 8049-17-0
  production volume 0 kg
    estimated in 2008 annual report on ferrosilicon market (www.asianmetal.com/report/en/2008guitie_en.pdf)
  property price 0.677 EUR2005
    Calculated based on literature value (UN Commodity Trade Statistics Database) using data on trade value and net weight (kg) for 5 reference countries/regions (EU-27, USA, JP, CN and IN) which weighted (by net weight) average is assumed to be a good approximation of the global price. The UN classification; 720229 Ferro-silicon, <55% silicon (accessed 20140506). Data for the year 2005.
  property carbon content 0.1
    carbon content on a dry matter basis (reserved; not for manual entry)
  properties: carbon content, non-fossil 0, wet mass 1 kg, water in wet mass 0 kg, dry mass 1 kg, carbon content, fossil 0.1, water content 0, carbon allocation 0.1 kg
- coal tar: 0 kg; CPC 34530: Roasted iron pyrites; By-product classification allocatable product; pedigree (1,1,1,1,1)
  for anode production
  properties: carbon content, fossil 0.83, water in wet mass 0 kg, dry mass 1 kg, water content 0, wet mass 1 kg, carbon content, non-fossil 0, carbon content 0.83, carbon allocation 0.83 kg
- ferrosilicon: 1 kg; CPC 41115: Other ferro-alloys; By-product classification allocatable product; CAS 8049-17-0
  production volume 4e9 kg

## By-products
- ferrosilicon: 0 kg; CPC 41115: Other ferro-alloys; By-product classification allocatable product; CAS 8049-17-0
  properties: price 0.677 EUR2005, carbon content, non-fossil 0, wet mass 1 kg, water in wet mass 0 kg, dry mass 1 kg, carbon content, fossil 0.1, water content 0, carbon content 0.1, carbon allocation 0.1 kg
- heat, for reuse in municipal waste incineration only: 0 MJ; CPC 17300: Steam and hot water; By-product classification allocatable product; pedigree (1,1,1,1,1)
  Net electricity generated from this waste and used in internal MSWI plant energy redistribution.
  Uncertainty: uncertainty is calculated from uncertainties in waste composition and uncertainties in energy efficiency and the uncertainty in internal energy demand
  property exergy 0.1842 MJ; name E_th_prod_MSWI_exergy
    This exergy property is based on the exergy content of the product.
  property price 0.0106 EUR2005; name E_th_prod_MSWI_price_EUR2005
    Average European district heat price from Ecoheatcool and Euroheat 2005-2006, Ecoheat Work package 1: The European heat market. Final report. 10.6 EUR/GJ i s the price of district heat. http://www.solarthermalworld.org/files/Ecoheatcool%20WP1%20Web.pdf?download
  property true value relation 0.1842; name E_th_prod_MSWI_true_value_relation
    property to calculate "true value" from
- electricity, for reuse in municipal waste incineration only: 0 kWh; CPC 17100: Electrical energy; By-product classification allocatable product; pedigree (1,1,1,1,1)
  (same comment as for heat, for reuse in municipal waste incineration only)
  property price 0.1 EUR2005; name E_el_prod_MSWI_price_EUR2005
    Estimated to be the same price as in case of electricity, medium voltage.
  property exergy 3.6 MJ; name E_el_prod_MSWI_exergy
    This exergy property is based on the exergy content of the product.
  property true value relation 3.6; name E_el_prod_MSWI_true_value_relation
    property to calculate "true value" from

## Inputs from technosphere
- natural gas, low pressure: 0 m3; pedigree (1,1,1,1,1)
  for anode production
  properties: carbon content, fossil 0.695187, wet mass 1 kg, dry mass 1 kg
  note on carbon content, fossil: C content considered the same as in high pressure (consumption mix)
- electric arc furnace converter: 0 unit; pedigree (1,1,1,1,1)
  estimation for infrastructure
- wastewater, average: 0 m3; pedigree (1,1,1,1,1)
  estimation for water balance
  production volume 0 m3; = Ref('0c6107cf-beee-4e57-afde-39cbdc292354', 'ProductionVolume') * (Ref('766ed174-2a52-4299-b005-5a0f9bd2a7a5') / Ref('0c6107cf-beee-4e57-afde-39cbdc292354'))
    Calculated from production volume of reference product using the relative outputs.
  properties: water content 2882.2, carbon content, non-fossil 0.194039, dry mass 0.346837 kg, wet mass 1000 kg
  note on carbon content, non-fossil: 0.0673 kg TOC/m3 (Tab A.17, ecoinvent v2.2 report 13_I). TOC was considered as Total Carbon.
- electricity, low voltage: 0 kWh; pedigree (1,1,1,1,1)
  for FeSi and anode production; The energy consumption of the process are provided by BJUT based on the data survey for the Chinese LCI database.
- inert waste: 0 kg; pedigree (1,1,1,1,1)
  estimation on slag from FeSi production and anode production; composition unknown, but slag should contain some carbon
  production volume 0 kg; = Ref('0c6107cf-beee-4e57-afde-39cbdc292354', 'ProductionVolume') * (Ref('52f24e48-a8a4-4e26-90b1-6563f880b106') / Ref('0c6107cf-beee-4e57-afde-39cbdc292354'))
    Calculated from production volume of reference product using the relative outputs.
  properties: dry mass 1 kg, wet mass 1 kg
- steel, unalloyed: 0 kg; pedigree (1,1,1,1,1)
  for FeSi production
  properties: dry mass 1 kg, wet mass 1 kg, carbon content, fossil 0.0025
- tap water: 0 kg; pedigree (1,1,1,1,1)
  for anode production
  properties: water content 2962.17, carbon content, fossil 0.00178991, dry mass 0.000337476 kg, wet mass 1 kg
  note on carbon content, fossil: Bicarbonate content is 2.93 mol/m3. CO2 content is 0.1 mol/m3 (ecoinvent v2.2 report 8, Tab 93.1).
- coke: 0 MJ; pedigree (1,1,1,1,1)
  for FeSi production
  properties: water content 0.0638298, carbon content, fossil 0.869149, wet mass 0.034965 kg, dry mass 0.0328671 kg
- hard coal: 0.699697 kg; lognormal variance with pedigree 0.0518, pedigree (2,3,5,5,3)
  for anode production
  properties: carbon content, fossil 0.845, dry mass 0.94 kg, wet mass 1 kg, water content 0.0638298
  note on carbon content, fossil: C content 75-94% (specified in Tab 1.1, report 6, part VI). A mean content of 0.845 kg C/ kg dry hard coal was considered
- silica sand: 0 kg; pedigree (1,1,1,1,1)
  for FeSi production
  properties: water content 0.010101, dry mass 0.99 kg, wet mass 1 kg
- coal tar: 0 kg; pedigree (1,1,1,1,1)
  for anode production
  properties: carbon content, fossil 0.83, dry mass 1 kg, wet mass 1 kg
- petroleum coke: 0 kg; pedigree (1,1,1,1,1)
  for anode production
  properties: dry mass 1 kg, wet mass 1 kg, carbon content, fossil 0.885
- heavy fuel oil: 0 kg; pedigree (1,1,1,1,1)
  for anode production
  properties: carbon content, fossil 0.849, wet mass 1 kg, dry mass 1 kg
- sodium hydroxide, without water, in 50% solution state: 0.00556674 kg; lognormal variance with pedigree 0.34, pedigree (1,1,5,1,1)
  own assumption
  EcoSpold01Location=RER
- hard coal: 2.19318 kg; lognormal variance with pedigree 0.04, pedigree (1,1,5,1,1)
  standard for ressources
  EcoSpold01Location=UCTE
- phosphoric acid, fertiliser grade, without water, in 70% solution state: 0.000398404 kg; lognormal variance with pedigree 0.34, pedigree (1,1,5,1,1)
  EcoSpold01Location=GLO
  own assumption
- iron sulfate: 0.000116016, 8.31857e-5 kg (2 entries); lognormal variance with pedigree 0.34, pedigree (1,1,5,1,1)
  EcoSpold01Location=RER
  own assumption
- water, decarbonised: 2.54282, 0.0319382, 0.0831032, 5.19709e-5, 0.335174, 0.0165001, 0.0542556, 0.00299523, 0.0426814, 0.0994225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 kg (13 entries); lognormal variance with pedigree 0.34, pedigree (1,1,5,1,1)
  own assumption
  EcoSpold01Location=RER
- hard coal coke factory: 2.70175e-11 unit; lognormal variance with pedigree 0.08, pedigree (1,1,5,1,1)
  EcoSpold01Location=RER
  own assumption
- electricity, medium voltage: 0.0770792 kWh; lognormal variance with pedigree 0.34, pedigree (1,1,5,1,1)
  EcoSpold01Location=UCTE
  own assumption
- coal tar: -0.0873214 kg
  EcoSpold01Location=DE
  production volume 1.65107e8 kg
- coal gas: -6.96097 MJ
  EcoSpold01Location=DE
  The activityLink to "treatment of coal gas, in power plant, DE 2008" was added by ecoinvent during a database update.
  production volume 2.33737e10 MJ
- coal gas: -4.99114 MJ
  EcoSpold01Location=GLO
  production volume 3.04816e12 MJ
- hard coal coke factory: 1.9372e-11 unit; lognormal variance with pedigree 0.08, pedigree (1,1,5,1,1)
  own assumption
  EcoSpold01Location=RER
- hard coal: 0.164323, 0.10089, 0.0988658, 0.0234601, 0.147397, 0.0769757, 0.0429047, 0.218038 kg (8 entries); lognormal variance with pedigree 0.04, pedigree (1,1,5,1,1)
  EcoSpold01Location=UCTE
  standard for ressources
- electricity, medium voltage: 2.4687e-5, 0.000184469, 0.000599399, 3.39588e-5, 0.000213371, 9.20544e-5, 8.38325e-5, 0.000148707, 8.65434e-5, 2.08114e-5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 kWh (46 entries); lognormal variance with pedigree 0.34, pedigree (1,1,5,1,1)
  own assumption
  EcoSpold01Location=UCTE

## Emissions to nature
- Carbon dioxide, fossil [air, unspecified]: 0 kg; pedigree (1,1,1,1,1)
  emission from FeSi production (data from DLR / IMA study); The direct CO2 emissions of the process are provided by BJUT based on the data survey for the Chinese LCI database.
- Water [air, unspecified]: 0.00169185 m3; lognormal variance with pedigree 0.0447, pedigree (2,2,3,5,1)
  estimation for water balance
- Ethene [air, non-urban air or from high stacks]: 8.93165e-5 kg; lognormal variance with pedigree 0.69, pedigree (1,1,5,1,1)
  own assumption
- Scandium [air, non-urban air or from high stacks]: 7.5331e-9 kg; lognormal variance with pedigree 0.69, pedigree (1,1,5,1,1)
  own assumption
- Strontium [air, non-urban air or from high stacks]: 3.83012e-7 kg; lognormal variance with pedigree 0.69, pedigree (1,1,5,1,1)
  own assumption
- Phosphorus [air, non-urban air or from high stacks]: 2.4313e-7 kg; lognormal variance with pedigree 0.69, pedigree (1,1,5,1,1)
  own assumption
- Arsenic [air, non-urban air or from high stacks]: 4.62877e-8 kg; lognormal variance with pedigree 0.08, pedigree (1,1,5,1,1)
  own assumption
- Zinc [air, non-urban air or from high stacks]: 1.61413e-7 kg; lognormal variance with pedigree 0.69, pedigree (1,1,5,1,1)
  own assumption
- Particulates, > 10 um [air, non-urban air or from high stacks]: 0.00609768 kg; lognormal variance with pedigree 0.34, pedigree (1,1,5,1,1)
  own assumption
- Uranium [air, non-urban air or from high stacks]: 3.83012e-9 kg; lognormal variance with pedigree 0.69, pedigree (1,1,5,1,1)
  own assumption
- Propene [air, non-urban air or from high stacks]: 5.80081e-6 kg; lognormal variance with pedigree 0.69, pedigree (1,1,5,1,1)
  own assumption
- Toluene [air, non-urban air or from high stacks]: 6.75546e-6 kg; lognormal variance with pedigree 0.69, pedigree (1,1,5,1,1)
  own assumption
- Lead [air, non-urban air or from high stacks]: 1.91229e-7 kg; lognormal variance with pedigree 0.08, pedigree (1,1,5,1,1)
  own assumption
- Cadmium [air, non-urban air or from high stacks]: 9.61973e-9 kg; lognormal variance with pedigree 0.08, pedigree (1,1,5,1,1)
  own assumption
- Silicon [air, non-urban air or from high stacks]: 4.75189e-5 kg; lognormal variance with pedigree 0.69, pedigree (1,1,5,1,1)
  own assumption
- NMVOC, non-methane volatile organic compounds, unspecified origin [air, non-urban air or from high stacks]: 0.0121272 kg; lognormal variance with pedigree 0.69, pedigree (1,1,5,1,1)
  own assumption
- Antimony [air, non-urban air or from high stacks]: 2.90126e-9 kg; lognormal variance with pedigree 0.69, pedigree (1,1,5,1,1)
  own assumption
- Water [water, unspecified]: 0.00267422 m3; lognormal variance with pedigree 0.0807, pedigree (2,2,5,1,1)
  Calculated value based on literature values and expert opinion. See comments in the parametres' comment field.
- Zirconium [air, non-urban air or from high stacks]: 9.28129e-8 kg; lognormal variance with pedigree 0.69, pedigree (1,1,5,1,1)
  own assumption
- Methane, fossil [air, non-urban air or from high stacks]: 0.00305386 kg; lognormal variance with pedigree 1.37, pedigree (1,1,5,1,1)
  own assumption
- Carbon monoxide, fossil [air, non-urban air or from high stacks]: 0.0209931 kg; lognormal variance with pedigree 0.34, pedigree (1,1,5,1,1)
  own assumption
- Aluminium [air, non-urban air or from high stacks]: 3.2421e-5 kg; lognormal variance with pedigree 0.69, pedigree (1,1,5,1,1)
  own assumption
- Iodine [air, non-urban air or from high stacks]: 3.83012e-9 kg; lognormal variance with pedigree 0.69, pedigree (1,1,5,1,1)
  own assumption
- Tin [air, non-urban air or from high stacks]: 3.83012e-9 kg; lognormal variance with pedigree 0.69, pedigree (1,1,5,1,1)
  own assumption
- Mercury [air, non-urban air or from high stacks]: 2.31735e-9 kg; lognormal variance with pedigree 0.34, pedigree (1,1,5,1,1)
  own assumption
- Sulfur dioxide [air, non-urban air or from high stacks]: 0.00254373 kg; lognormal variance with pedigree 0.34, pedigree (1,1,5,1,1)
  own assumption
- Manganese [air, non-urban air or from high stacks]: 1.523e-7 kg; lognormal variance with pedigree 0.69, pedigree (1,1,5,1,1)
  own assumption
- Hydrocarbons, aliphatic, unsaturated [air, non-urban air or from high stacks]: 2.89246e-6 kg; lognormal variance with pedigree 0.69, pedigree (1,1,5,1,1)
  own assumption
- Boron [air, non-urban air or from high stacks]: 1.04415e-7 kg; lognormal variance with pedigree 0.69, pedigree (1,1,5,1,1)
  own assumption
- Selenium [air, non-urban air or from high stacks]: 9.39383e-9 kg; lognormal variance with pedigree 0.69, pedigree (1,1,5,1,1)
  own assumption
- Particulates, < 2.5 um [air, non-urban air or from high stacks]: 0.00363311 kg; lognormal variance with pedigree 0.34, pedigree (1,1,5,1,1)
  own assumption
- Copper [air, non-urban air or from high stacks]: 4.18943e-8 kg; lognormal variance with pedigree 0.69, pedigree (1,1,5,1,1)
  own assumption
- Ethyne [air, non-urban air or from high stacks]: 2.89246e-6 kg; lognormal variance with pedigree 0.69, pedigree (1,1,5,1,1)
  own assumption
- PAH, polycyclic aromatic hydrocarbons [water, surface water]: 5.97606e-8 kg; lognormal variance with pedigree 0.34, pedigree (1,1,5,1,1)
  own assumption
- Calcium [air, non-urban air or from high stacks]: 3.83012e-6 kg; lognormal variance with pedigree 0.69, pedigree (1,1,5,1,1)
  own assumption
- Nickel [air, non-urban air or from high stacks]: 6.26872e-8 kg; lognormal variance with pedigree 0.69, pedigree (1,1,5,1,1)
  own assumption
- Chromium [air, non-urban air or from high stacks]: 4.91154e-8 kg; lognormal variance with pedigree 0.69, pedigree (1,1,5,1,1)
  own assumption
- Vanadium [air, non-urban air or from high stacks]: 7.5331e-8 kg; lognormal variance with pedigree 0.69, pedigree (1,1,5,1,1)
  own assumption
- Thorium [air, non-urban air or from high stacks]: 7.5331e-9 kg; lognormal variance with pedigree 0.69, pedigree (1,1,5,1,1)
  own assumption
- Thallium [air, non-urban air or from high stacks]: 3.6392e-9 kg; lognormal variance with pedigree 0.69, pedigree (1,1,5,1,1)
  own assumption
- Sodium [air, non-urban air or from high stacks]: 1.90711e-6 kg; lognormal variance with pedigree 0.69, pedigree (1,1,5,1,1)
  own assumption
- Ammonia [air, non-urban air or from high stacks]: 1.85869e-5 kg; lognormal variance with pedigree 1.37, pedigree (1,1,5,1,1)
  own assumption
- Solids, inorganic [water, surface water]: 0.00219122 kg; lognormal variance with pedigree 0.34, pedigree (1,1,5,1,1)
  own assumption
- Cobalt [air, non-urban air or from high stacks]: 1.23808e-8 kg; lognormal variance with pedigree 0.69, pedigree (1,1,5,1,1)
  own assumption
- Hydrogen sulfide [water, surface water]: 7.96807e-6 kg; lognormal variance with pedigree 0.34, pedigree (1,1,5,1,1)
  own assumption
- Ammonium, ion [water, surface water]: 4.9664e-5 kg; lognormal variance with pedigree 0.34, pedigree (1,1,5,1,1)
  own assumption
- Benzene [air, non-urban air or from high stacks]: 0.00124519 kg; lognormal variance with pedigree 1.37, pedigree (1,1,5,1,1)
  own assumption
- Nitrogen oxides [air, non-urban air or from high stacks]: 0.00236055 kg; lognormal variance with pedigree 0.34, pedigree (1,1,5,1,1)
  own assumption
- Carbon dioxide, fossil [air, non-urban air or from high stacks]: 0.320432 kg; lognormal variance with pedigree 0.05, pedigree (1,1,5,1,1)
  own assumption
- Molybdenum [air, non-urban air or from high stacks]: 5.68956e-9 kg; lognormal variance with pedigree 0.69, pedigree (1,1,5,1,1)
  own assumption
- Benzo(a)pyrene [air, non-urban air or from high stacks]: 8.99827e-6 kg; lognormal variance with pedigree 0.08, pedigree (1,1,5,1,1)
  own assumption
- Bromine [air, non-urban air or from high stacks]: 2.08193e-8 kg; lognormal variance with pedigree 0.69, pedigree (1,1,5,1,1)
  own assumption
- Sodium, ion [water, surface water]: 0.0024898 kg; lognormal variance with pedigree 0.34, pedigree (1,1,5,1,1)
  own assumption
- Iron [air, non-urban air or from high stacks]: 1.33498e-5 kg; lognormal variance with pedigree 0.69, pedigree (1,1,5,1,1)
  own assumption
- Propane [air, non-urban air or from high stacks]: 1.77531e-5 kg; lognormal variance with pedigree 0.69, pedigree (1,1,5,1,1)
  own assumption
- Ethane [air, non-urban air or from high stacks]: 0.00035483 kg; lognormal variance with pedigree 0.69, pedigree (1,1,5,1,1)
  own assumption
- Beryllium [air, non-urban air or from high stacks]: 4.63653e-9 kg; lognormal variance with pedigree 0.69, pedigree (1,1,5,1,1)
  own assumption
- Potassium [air, non-urban air or from high stacks]: 3.83012e-6 kg; lognormal variance with pedigree 0.69, pedigree (1,1,5,1,1)
  own assumption
- Particulates, > 2.5 um, and < 10um [air, non-urban air or from high stacks]: 0.00167227 kg; lognormal variance with pedigree 0.34, pedigree (1,1,5,1,1)
  own assumption
- Chloride [water, surface water]: 0.00387489 kg; lognormal variance with pedigree 0.34, pedigree (1,1,5,1,1)
  own assumption
- Hydrogen sulfide [air, non-urban air or from high stacks]: 8.12113e-5 kg; lognormal variance with pedigree 0.69, pedigree (1,1,5,1,1)
  own assumption
- Magnesium [air, non-urban air or from high stacks]: 1.16016e-5 kg; lognormal variance with pedigree 0.69, pedigree (1,1,5,1,1)
  own assumption
- Barium [air, non-urban air or from high stacks]: 4.08538e-7 kg; lognormal variance with pedigree 0.69, pedigree (1,1,5,1,1)
  own assumption
- Titanium [air, non-urban air or from high stacks]: 1.16016e-6 kg; lognormal variance with pedigree 0.69, pedigree (1,1,5,1,1)
  own assumption
- Carbon disulfide [air, non-urban air or from high stacks]: 1.06432e-6 kg; lognormal variance with pedigree 0.05, pedigree (1,1,5,1,1)
  own assumption
- Silver [air, non-urban air or from high stacks]: 1.48139e-10 kg; lognormal variance with pedigree 0.69, pedigree (1,1,5,1,1)
  own assumption
- Cyanide [air, non-urban air or from high stacks]: 3.73766e-6 kg; lognormal variance with pedigree 0.69, pedigree (1,1,5,1,1)
  own assumption
- Methane, chlorodifluoro-, HCFC-22 [air, non-urban air or from high stacks]: 3.72626e-6 kg; lognormal variance with pedigree 0.34, pedigree (1,1,5,1,1)
  own assumption
- Ethanol [air, non-urban air or from high stacks]: 4.86579e-8 kg; lognormal variance with pedigree 0.69, pedigree (1,1,5,1,1)
  own assumption
- Acetone [air, non-urban air or from high stacks]: 4.82021e-5 kg; lognormal variance with pedigree 0.34, pedigree (1,1,5,1,1)
  own assumption
- Phenol, pentachloro- [air, non-urban air or from high stacks]: 3.91998e-6 kg; lognormal variance with pedigree 0.34, pedigree (1,1,5,1,1)
  own assumption
- Styrene [air, non-urban air or from high stacks]: 4.99114e-8 kg; lognormal variance with pedigree 0.69, pedigree (1,1,5,1,1)
  own assumption
- Acrolein [air, non-urban air or from high stacks]: 5.94835e-8 kg; lognormal variance with pedigree 0.34, pedigree (1,1,5,1,1)
  own assumption
- Methanol [air, non-urban air or from high stacks]: 4.86579e-6 kg; lognormal variance with pedigree 0.69, pedigree (1,1,5,1,1)
  own assumption
- PAH, polycyclic aromatic hydrocarbons [air, non-urban air or from high stacks]: 2.60952e-6 kg; lognormal variance with pedigree 0.69, pedigree (1,1,5,1,1)
  own assumption
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
## Review by Hans-Jörg Althaus 2014-02-04
ok
