# treatment of spent solvent mixture, hazardous waste incineration

Dataset: EcoSpold 2, unit process
Geography: CH
Time period: 1997-01-01 to 2019-12-31
Technology level: current
Classification: ISIC rev.4 ecoinvent: 3822:Treatment and disposal of hazardous waste
Classification: EcoSpold01Categories: waste management/hazardous waste incineration
Synonyms: waste solvents mixture from chemical production
Tags: ConvertedDataset; Treatment
Scenario: Business-as-Usual
System model: Allocation at the point of substitution
Share of production covered: 39 %
Generated by: Gabor Doka (obsolete)
Published in: Doka G. 2008
Database: ecoinvent
isCopyrightProtected: true
accessRestrictedTo: 1

## General comment
Inventoried waste contains 100% waste solvents mixture; .
waste composition (wet, in ppm): upper heating value 23.68 MJ/kg; lower heating value 21.7 MJ/kg; H2O 165000; O 200000; H 81660; C 477000; S 6420; N 10360; P 1000; B n.a.; Cl 24448; Br 2505.2; F 44.921; I 100.24; Ag n.a.; As n.a.; Ba n.a.; Cd n.a.; Co 4.1029; Cr n.a.; Cu 5.1445; Hg n.a.; Mn n.a.; Mo n.a.; Ni 4.2554; Pb n.a.; Sb n.a.; Se n.a.; Sn n.a.; V n.a.; Zn 41.844; Be n.a.; Sc n.a.; Sr n.a.; Ti n.a.; Tl n.a.; W n.a.; Si 31321; Fe 84.652; Ca n.a.; Al n.a.; K n.a.; Mg n.a.; Na n.a.;
Share of carbon in waste that is biogenic 0%.
Net energy produced in HWI: 17.11MJ/kg electric energy and 1.27MJ/kg thermal energy
Allocation of energy production: no substitution or expansion. 100% of burden allocated to waste disposal function of HWI.
One kg of this waste produces 0.07563 kg of residues, which are landfilled. Additional solidification with 0.03025 kg of cement.
[This dataset was already contained in the ecoinvent database version 2. It was not individually updated during the transfer to ecoinvent version 3. Life Cycle Impact Assessment results may still have changed, as they are affected by changes in the supply chain, i.e. in other datasets. This dataset was generated following the ecoinvent quality guidelines for version 2. It may have been subject to central changes described in the ecoinvent version 3 change report (http://www.ecoinvent.org/database/ecoinvent-version-3/reports-of-changes/), and the results of the central updates were reviewed extensively. The changes added e.g. consistent water flows and other information throughout the database. The documentation of this dataset can be found in the ecoinvent reports of version 2, which are still available via the ecoinvent website. The change report linked above covers all central changes that were made during the conversion process.]

## Included activities end
waste-specific air and water emissions from incineration, auxiliary material consumption for flue gas cleaning. Short-term emissions to river water and long-term emissions to ground water from residual material landfill (from solidified fly ashes and scrubber slugde). Process energy demands for HWI.

## Geography
Specific to the technology encountered in Switzerland in 2000. Well applicable to modern incineration practices in Europe or North America or Japan.

## Technology
Swiss HWI plant in 2000 with wet flue gas scrubber and low-dust SCR DeNOx facility. Gross thermal efficiency 74.4% and gross electric efficiency 10%.

## Time period
Transfer coefficients for modern Swiss MSWI. Emission speciation based on early 90ies data.

## Reference product
- spent solvent mixture: -1 kg; name SSM; CPC 39950: Wastes from chemical or allied industries; By-product classification Waste
  production volume 1.25e8 kg; name SSM_PV
    According to Capello et al. (2006), about 250’000 tonnes of solvents are used per annum in Switzerland. It was assumed that 50% of the used solvent in Switzerland is incinerated for treatment.
    Capello et al. (2006). Environmental assessment of waste-solvent treatment in the Swiss chemical industry. ETH.
    <http://www.sust-chem.ethz.ch/tools/ecosolvent/analysis_chem_life_cycle> (Accessed 23-03-2015).
  property price 0 EUR2005; name SSM_price_EUR2005
    Waste products are assigned a price of zero as they are assumed to require further treatment.
  property carbon content, fossil 0.571257
    Tab A.7, ecoinvent v2.2 report 13_I. C content has been calculated after data in the tables, and then referred to 1 kg DM
  property carbon content 0.571257
    carbon content on a dry matter basis (reserved; not for manual entry)
  properties: carbon content, non-fossil 0, water content 0.197605, water in wet mass 0.165 kg, dry mass 0.835 kg, wet mass 1 kg, carbon allocation 0.477 kg

## Inputs from technosphere
- chemical, inorganic: 0.00027895 kg; lognormal variance with pedigree 0.15, pedigree (1,1,5,1,1)
  Proxy for Polyelectrolyte. uncertainty calculated from uncertainty in average auxiliary material input, and the unertainty of the waste composition of this waste
  properties: carbon content, fossil 0.003, wet mass 1 kg, dry mass 1 kg
  note on carbon content, fossil: This dataset is an unweighted average of 20 inorganic substances (listed in Tab 88.1, ecoinvent v2.2 report 8, part II), being part of the top100 chemicals included in this database. The C-content has also been calculated as an unweighted average of the C content of the substances composing this dataset.
- ammonia, liquid: 0.00037782 kg; lognormal variance with pedigree 0.89, pedigree (1,1,5,1,1)
  uncertainty calculated from uncertainty in average DeNOx input, uncertainty in the share of thermal NOx, uncertainty of nitrogen content in average municipal waste and the unertainty in nitrogen content in *this* waste.
  properties: dry mass 1 kg, wet mass 1 kg
- quicklime, milled, packed: 0.0062205 kg; lognormal variance with pedigree 0.22, pedigree (1,1,5,1,1)
  uncertainty calculated from uncertainty in average auxiliary material input, and the unertainty of the waste composition of this waste
  properties: water content 0.010101, dry mass 0.99 kg, wet mass 1 kg
- chromium: 3.0278e-7 kg; lognormal variance with pedigree 1.27, pedigree (1,1,5,1,1)
  Proxy for vanadium pentoxide V2O5 in SCR catalyst. uncertainty calculated from uncertainty in average DeNOx input, uncertainty in the share of thermal NOx, uncertainty of nitrogen content in average municipal waste and the unertainty in nitrogen content in *this* waste.
  properties: dry mass 1 kg, wet mass 1 kg
- hydrochloric acid, without water, in 30% solution state: 0.00016737 kg; lognormal variance with pedigree 0.15, pedigree (1,1,5,1,1)
  (same comment as for quicklime, milled, packed)
  properties: wet mass 1 kg, dry mass 1 kg
- heat, district or industrial, natural gas: 0.184428 MJ; lognormal variance with pedigree 0.99, pedigree (1,1,5,1,1)
  (same comment as for ammonia, liquid)
- heat, central or small-scale, other than natural gas: 1.222 MJ; lognormal variance with pedigree 1.41, pedigree (1,1,5,1,1)
  Uncertainty dependent on total energy required and heating value present, using experimental GSd for substraction from uc=A*GSDa^2-B
- cement, unspecified: 0.030252 kg; lognormal variance with pedigree 0.11, pedigree (1,1,5,1,1)
  Cement for solidification of landfilled residual material. Uncertainty calculated from unertainty of the waste composition of this waste, of transfer coefficients in the incinerator and of the solidification recipe.
  properties: dry mass 1 kg, wet mass 1 kg
- hydrogen peroxide, without water, in 50% solution state: 2.8873e-5 kg; lognormal variance with pedigree 0.49, pedigree (1,1,5,1,1)
  (same comment as for quicklime, milled, packed)
  properties: wet mass 1 kg, dry mass 1 kg
- sodium hydroxide, without water, in 50% solution state: 0.046084 kg; lognormal variance with pedigree 0.21, pedigree (1,1,5,1,1)
  (same comment as for quicklime, milled, packed)
  properties: wet mass 1 kg, dry mass 1 kg
- hazardous waste incineration facility: 1.25e-9 unit; lognormal variance with pedigree 0.04, pedigree (1,1,5,1,1)
  demands per kilogram waste. uncertainty is heeded in the module
  This exchange has an activity link directly to the producing activity because the product is primarily consumed in the same geographical area where it is produced.
- titanium dioxide: 1.4836e-5 kg; lognormal variance with pedigree 1.27, pedigree (1,1,5,1,1)
  (same comment as for ammonia, liquid)
  properties: wet mass 1 kg, dry mass 1 kg
- calcium chloride: 0.0034676 kg; lognormal variance with pedigree 0.74, pedigree (1,1,5,1,1)
  (same comment as for quicklime, milled, packed)
  properties: wet mass 1 kg, dry mass 1 kg
- residual material landfill: 1.5756e-10 unit; lognormal variance with pedigree 0.1, pedigree (1,1,5,1,1)
  uncertainty is calculated from uncertainties in waste composition and transfer coefficients in incinerator
- waste cement, hydrated: -0.07563 kg; name WS_BP; lognormal variance with pedigree 0.11, pedigree (1,1,5,1,1)
  Hydrated cement for solidification of landfilled residual material. Uncertainty calculated from unertainty of the waste composition of this waste and transfer coefficients in the incinerator and of the solidification recipe.
  production volume 9.45375e6 kg; name WS_BP_PV; = (WS_BP * SSM_PV)/ABS(SSM)
    Calculated from the production volume of spent solvent mixture, 16.5% water in proportion to the respective output amounts.
  property price 0 EUR2005; name WS_BP_price_EUR2005
  properties: dry mass 1 kg, wet mass 1 kg
- process-specific burdens, hazardous waste incineration plant: 1 kg; lognormal variance with pedigree 0.04, pedigree (1,1,5,1,1)
  demands per kilogram waste. uncertainty is heeded in the module;activityLink introduced to establish a direct link to the corresponding regional supply of this product
- iron (III) chloride, without water, in 40% solution state: 3.2063e-5 kg; lognormal variance with pedigree 0.82, pedigree (1,1,5,1,1)
  (same comment as for quicklime, milled, packed)
  properties: dry mass 1 kg, wet mass 1 kg
- process-specific burdens, residual material landfill: 0.07563 kg; lognormal variance with pedigree 0.1, pedigree (1,1,5,1,1)
  uncertainty is calculated from uncertainties in waste composition and transfer coefficients in incinerator;activityLink introduced to establish a direct link to the corresponding regional supply of this product

## Emissions to nature
- Iron [air, urban air close to ground]: 5.9256e-8 kg; lognormal variance with pedigree 1.05, pedigree (1,1,5,1,1)
  (same comment as for residual material landfill)
- Hydrogen chloride [air, urban air close to ground]: 7.5414e-6 kg; lognormal variance with pedigree 0.33, pedigree (1,1,5,1,1)
  (same comment as for residual material landfill)
- Nitrate [water, ground-, long-term]: 0.00037216 kg; lognormal variance with pedigree 0.41, pedigree (1,1,5,1,1)
  Long-term emissions from landfilling of incineration residues. uncertainty is calculated from uncertainties in waste composition and transfer coefficients in incinerator and landfills.
- Fluoride [water, ground-, long-term]: 7.2227e-8 kg; lognormal variance with pedigree 1.13, pedigree (1,1,5,1,1)
  (same comment as for Nitrate)
- Hydrogen fluoride [air, urban air close to ground]: 1.1303e-8 kg; lognormal variance with pedigree 1.14, pedigree (1,1,5,1,1)
  (same comment as for residual material landfill)
- DOC, Dissolved Organic Carbon [water, surface water]: 1.0486e-5 kg; lognormal variance with pedigree 0.35, pedigree (1,1,5,1,1)
  uncertainty is calculated from uncertainties in waste composition and transfer coefficients in incinerator and landfills
- Dinitrogen monoxide [air, urban air close to ground]: 3.6886e-5 kg; lognormal variance with pedigree 1.02, pedigree (5,5,5,5,5)
  uncertainty calculated from uncertainty for proxy (from MSWI), uncertainty in average N-emissions, uncertainty in the share of thermal NOx, uncertainty of nitrogen content in average municipal waste and the unertainty in nitrogen content in *this* waste.
- Ammonia [air, urban air close to ground]: 1.0246e-5 kg; lognormal variance with pedigree 0.93, pedigree (1,1,5,1,1)
  uncertainty calculated from uncertainty in average N-emissions, uncertainty in the share of thermal NOx, uncertainty of nitrogen content in average municipal waste and the unertainty in nitrogen content in *this* waste.
- Chloride [water, surface water]: 0.024411 kg; lognormal variance with pedigree 0.3, pedigree (1,1,5,1,1)
  (same comment as for DOC, Dissolved Organic Carbon)
- DOC, Dissolved Organic Carbon [water, ground-, long-term]: 0.0033905 kg; lognormal variance with pedigree 0.11, pedigree (1,1,5,1,1)
  (same comment as for Nitrate)
- Sulfate [water, ground-, long-term]: 0.00073589 kg; lognormal variance with pedigree 0.47, pedigree (1,1,5,1,1)
  (same comment as for Nitrate)
- Sulfate [water, surface water]: 0.018513 kg; lognormal variance with pedigree 0.46, pedigree (1,1,5,1,1)
  (same comment as for DOC, Dissolved Organic Carbon)
- Iodide [water, surface water]: 0.00010022 kg; lognormal variance with pedigree 1, pedigree (1,1,5,1,1)
  (same comment as for DOC, Dissolved Organic Carbon)
- Silicon [water, surface water]: 7.0276e-5 kg; lognormal variance with pedigree 0.83, pedigree (1,1,5,1,1)
  (same comment as for DOC, Dissolved Organic Carbon)
- Copper [air, urban air close to ground]: 3.6011e-9 kg; lognormal variance with pedigree 1.42, pedigree (1,1,5,1,1)
  (same comment as for residual material landfill)
- COD, Chemical Oxygen Demand [water, surface water]: 2.3968e-5 kg; lognormal variance with pedigree 0.35, pedigree (1,1,5,1,1)
  (same comment as for DOC, Dissolved Organic Carbon)
- Bromine [water, ground-, long-term]: 8.3772e-7 kg; lognormal variance with pedigree 0.61, pedigree (1,1,5,1,1)
  (same comment as for Nitrate)
- Zinc, ion [water, ground-, long-term]: 5.0561e-7 kg; lognormal variance with pedigree 5.96, pedigree (1,1,5,1,1)
  (same comment as for Nitrate)
- Bromine [water, surface water]: 0.0025039 kg; lognormal variance with pedigree 0.58, pedigree (1,1,5,1,1)
  (same comment as for DOC, Dissolved Organic Carbon)
- Phosphate [water, ground-, long-term]: 0.00067405 kg; lognormal variance with pedigree 1.26, pedigree (1,1,5,1,1)
  (same comment as for Nitrate)
- Bromine [air, urban air close to ground]: 5.0105e-7 kg; lognormal variance with pedigree 0.61, pedigree (1,1,5,1,1)
  (same comment as for residual material landfill)
- Iron, ion [water, surface water]: 6.8001e-5 kg; lognormal variance with pedigree 1.02, pedigree (1,1,5,1,1)
  (same comment as for DOC, Dissolved Organic Carbon)
- Carbon monoxide, fossil [air, urban air close to ground]: 1.2076e-5 kg; lognormal variance with pedigree 0.71, pedigree (1,4,5,1,3)
  1 plant for waste solvent incineration in Switzerland
- BOD5, Biological Oxygen Demand [water, surface water]: 2.3968e-5 kg; lognormal variance with pedigree 0.35, pedigree (1,1,5,1,1)
  (same comment as for DOC, Dissolved Organic Carbon)
- Silicon [air, urban air close to ground]: 7.2917e-5 kg; lognormal variance with pedigree 0.29, pedigree (1,1,5,1,1)
  (same comment as for residual material landfill)
- Nickel [air, urban air close to ground]: 2.9788e-9 kg; lognormal variance with pedigree 1.44, pedigree (1,1,5,1,1)
  (same comment as for residual material landfill)
- Copper, ion [water, surface water]: 2.2102e-7 kg; lognormal variance with pedigree 1.4, pedigree (1,1,5,1,1)
  (same comment as for DOC, Dissolved Organic Carbon)
- Carbon dioxide, fossil [air, urban air close to ground]: 1.7297 kg; lognormal variance with pedigree 0.06, pedigree (1,1,5,1,1)
  calculated from uncertainty in carbon in waste and transfer coefficients
- BOD5, Biological Oxygen Demand [water, ground-, long-term]: 0.0077498 kg; lognormal variance with pedigree 0.11, pedigree (1,1,5,1,1)
  (same comment as for Nitrate)
- Cyanide [air, urban air close to ground]: 9.2214e-6 kg; lognormal variance with pedigree 1.02, pedigree (5,5,5,5,5)
  (same comment as for Dinitrogen monoxide)
- Copper, ion [water, ground-, long-term]: 1.894e-7 kg; lognormal variance with pedigree 4.05, pedigree (1,1,5,1,1)
  (same comment as for Nitrate)
- Iron, ion [water, ground-, long-term]: 8.3157e-8 kg; lognormal variance with pedigree 8.04, pedigree (1,1,5,1,1)
  (same comment as for Nitrate)
- Iodine [air, urban air close to ground]: 2.0048e-8 kg; lognormal variance with pedigree 1.03, pedigree (1,1,5,1,1)
  (same comment as for residual material landfill)
- Zinc, ion [water, surface water]: 5.6155e-7 kg; lognormal variance with pedigree 1.12, pedigree (1,1,5,1,1)
  (same comment as for DOC, Dissolved Organic Carbon)
- Chloride [water, ground-, long-term]: 2.9675e-5 kg; lognormal variance with pedigree 0.33, pedigree (1,1,5,1,1)
  (same comment as for Nitrate)
- TOC, Total Organic Carbon [water, ground-, long-term]: 0.0033905 kg; lognormal variance with pedigree 0.11, pedigree (1,1,5,1,1)
  (same comment as for Nitrate)
- Zinc [air, urban air close to ground]: 2.9291e-8 kg; lognormal variance with pedigree 1.14, pedigree (1,1,5,1,1)
  (same comment as for residual material landfill)
- TOC, Total Organic Carbon [water, surface water]: 1.0486e-5 kg; lognormal variance with pedigree 0.35, pedigree (1,1,5,1,1)
  (same comment as for DOC, Dissolved Organic Carbon)
- Phosphorus [air, urban air close to ground]: 7e-7 kg; lognormal variance with pedigree 0.72, pedigree (1,1,5,1,1)
  (same comment as for residual material landfill)
- COD, Chemical Oxygen Demand [water, ground-, long-term]: 0.0077498 kg; lognormal variance with pedigree 0.11, pedigree (1,1,5,1,1)
  (same comment as for Nitrate)
- Cobalt [water, surface water]: 4.1e-6 kg; lognormal variance with pedigree 1.43, pedigree (1,1,5,1,1)
  (same comment as for DOC, Dissolved Organic Carbon)
- Sulfur dioxide [air, urban air close to ground]: 7.704e-6 kg; lognormal variance with pedigree 0.48, pedigree (1,1,5,1,1)
  (same comment as for residual material landfill)
- Nickel, ion [water, surface water]: 8.7227e-7 kg; lognormal variance with pedigree 1.42, pedigree (1,1,5,1,1)
  (same comment as for DOC, Dissolved Organic Carbon)
- Iodide [water, ground-, long-term]: 2.105e-14 kg; lognormal variance with pedigree 1.04, pedigree (1,1,5,1,1)
  (same comment as for Nitrate)
- Cobalt [air, urban air close to ground]: 2.872e-9 kg; lognormal variance with pedigree 1.45, pedigree (1,1,5,1,1)
  (same comment as for residual material landfill)
- Silicon [water, ground-, long-term]: 0.031178 kg; lognormal variance with pedigree 0.28, pedigree (1,1,5,1,1)
  (same comment as for Nitrate)
- Nitrate [water, surface water]: 0.00013252 kg; lognormal variance with pedigree 0.3, pedigree (1,1,5,1,1)
  (same comment as for DOC, Dissolved Organic Carbon)
- Phosphate [water, surface water]: 4.8012e-5 kg; lognormal variance with pedigree 0.67, pedigree (1,1,5,1,1)
  (same comment as for DOC, Dissolved Organic Carbon)
- Fluoride [water, surface water]: 4.4838e-5 kg; lognormal variance with pedigree 1.11, pedigree (1,1,5,1,1)
  (same comment as for DOC, Dissolved Organic Carbon)
- Nickel, ion [water, ground-, long-term]: 1.2245e-6 kg; lognormal variance with pedigree 1.68, pedigree (1,1,5,1,1)
  (same comment as for Nitrate)
- Nitrogen oxides [air, urban air close to ground]: 0.0002664 kg; lognormal variance with pedigree 0.93, pedigree (1,1,5,1,1)
  (same comment as for Ammonia)

## Sampling procedure
The 2 Swiss HWI plants, used as the inventory reference technology mix, have a total annual capacity of 53'000 tons of hazardous waste. This corresponds to 39% of the Swiss total installed capacity in 2000. Swiss average plants size is 20'000 t/a.

## Extrapolations
This dataset has been extrapolated from year 2000 to the year of the calculation (2019). The uncertainty has been adjusted accordingly.

## Review by Niels Jungbluth 2009-01-22
passed.
