# treatment of hard coal ash, residual material landfill

Dataset: EcoSpold 2, unit process
Geography: AT
Time period: 1994-01-01 to 2019-12-31
Technology level: current
Classification: ISIC rev.4 ecoinvent: 3822:Treatment and disposal of hazardous waste
Classification: EcoSpold01Categories: waste management/residual material landfill
Tags: Treatment; ConvertedDataset
Scenario: Business-as-Usual
System model: Allocation at the point of substitution
Generated by: Gabor Doka (obsolete)
Published in: Doka G. 2009
Database: ecoinvent
isCopyrightProtected: true
accessRestrictedTo: 1

## General comment
Inventoried waste contains 100% AT hard coal ash; .
waste composition (wet, in ppm): H2O n.a.; O 490560; H n.a.; C n.a.; S 3246.2; N n.a.; P 810.95; B 283.61; Cl 22.663; Br 64.895; F 2.9372; I 4.0388; Ag n.a.; As 12.626; Ba 1620.4; Cd 4.0253; Co 57.252; Cr 73.913; Cu 122.52; Hg 0.085005; Mn 1613; Mo 24.758; Ni 162.66; Pb 323.85; Sb 12.173; Se 8.2715; Sn 88.976; V 324.96; Zn 403.69; Be 16.223; Sc 10.761; Sr 1613.7; Ti 12110; Tl 8.0686; W 8.1741; Si 202890; Fe 56857; Ca 16420; Al 137520; K 16199; Mg 48394; Na 8103.2;
Share of carbon in waste that is biogenic 60.4%.
[This dataset was already contained in the ecoinvent database version 2. It was not individually updated during the transfer to ecoinvent version 3. Life Cycle Impact Assessment results may still have changed, as they are affected by changes in the supply chain, i.e. in other datasets. This dataset was generated following the ecoinvent quality guidelines for version 2. It may have been subject to central changes described in the ecoinvent version 3 change report (http://www.ecoinvent.org/database/ecoinvent-version-3/reports-of-changes/), and the results of the central updates were reviewed extensively. The changes added e.g. consistent water flows and other information throughout the database. The documentation of this dataset can be found in the ecoinvent reports of version 2, which are still available via the ecoinvent website. The change report linked above covers all central changes that were made during the conversion process.]

## Included activities end
Waste-specific short-term emissions to water from leachate. Long-term emissions from landfill to ground water.

## Geography
Technology encountered in Switzerland in 2000. Landfill includes base seal and leachate collection system.

## Technology
Swiss residual material landfill for polluted, inorganic waste. With base seal and leachate collection system. Recultivation after closure.

## Time period
Waste composition as given in literature reference, theoretical data or other source. Transfer coefficients from prospective model.

## Reference product
- hard coal ash: -1 kg; CPC 39: Wastes or scraps; By-product classification Waste
  EcoSpold01Location=AT
  production volume 9.43198e6 kg
    Estimated. Energy production in mainly responsible for hard coal ashes. The production volume is calculated as the sum of hard coal ashes resulting from electricity and heat and power co-generation production from hard coal in the respective country.
  property price 0 EUR2005
    Waste products are assigned a price of zero as they are assumed to require further treatment.
  property carbon content 0
    carbon content on a dry matter basis (reserved; not for manual entry)
  properties: carbon content, fossil 0, wet mass 1 kg, carbon content, non-fossil 0, water in wet mass 0 kg, water content 0, dry mass 1 kg, carbon allocation 0 kg

## Inputs from technosphere
- residual material landfill: 2.0833e-9 unit; lognormal variance with pedigree 0.04, pedigree (1,1,5,1,1)
  demands per kilogram waste. uncertainty is heeded in the module
  EcoSpold01Location=CH
- process-specific burdens, residual material landfill: 1 kg; lognormal variance with pedigree 0.04, pedigree (1,1,5,1,1)
  EcoSpold01Location=CH
  demands per kilogram waste. uncertainty is heeded in the module;activityLink introduced to establish a direct link to the corresponding regional supply of this product

## Emissions to nature
- Silicon [water, surface water]: 0.00045628 kg; lognormal variance with pedigree 0.65, pedigree (1,1,5,1,1)
  uncertainty is calculated from uncertainties in waste composition and transfer coefficients in residual landfill
- Barium [water, surface water]: 2.2346e-8 kg; lognormal variance with pedigree 1.85, pedigree (1,1,5,1,1)
  (same comment as for Silicon)
- Phosphate [water, surface water]: 9.2739e-7 kg; lognormal variance with pedigree 1.51, pedigree (1,1,5,1,1)
  (same comment as for Silicon)
- Fluoride [water, surface water]: 1.5917e-7 kg; lognormal variance with pedigree 1.65, pedigree (1,1,5,1,1)
  (same comment as for Silicon)
- Molybdenum [water, ground-, long-term]: 1.1366e-7 kg; lognormal variance with pedigree 1.21, pedigree (1,1,5,1,1)
  uncertainty is calculated from uncertainties in waste composition and transfer coefficients in incinerator and landfills.
- Tin, ion [water, ground-, long-term]: 1.686e-6 kg; lognormal variance with pedigree 4.95, pedigree (1,1,5,1,1)
  (same comment as for Molybdenum)
- Iron, ion [water, ground-, long-term]: 0.00028496 kg; lognormal variance with pedigree 7.23, pedigree (1,1,5,1,1)
  (same comment as for Molybdenum)
- Scandium [water, surface water]: 1.5187e-6 kg; lognormal variance with pedigree 1.39, pedigree (1,1,5,1,1)
  (same comment as for Silicon)
- Lead [water, ground-, long-term]: 1.6798e-6 kg; lognormal variance with pedigree 7.77, pedigree (1,1,5,1,1)
  (same comment as for Molybdenum)
- Copper, ion [water, surface water]: 7.8739e-9 kg; lognormal variance with pedigree 1.99, pedigree (1,1,5,1,1)
  (same comment as for Silicon)
- Calcium, ion [water, surface water]: 2.4769e-6 kg; lognormal variance with pedigree 1.25, pedigree (1,1,5,1,1)
  (same comment as for Silicon)
- Potassium, ion [water, surface water]: 0.0045664 kg; lognormal variance with pedigree 0.39, pedigree (1,1,5,1,1)
  (same comment as for Silicon)
- Zinc, ion [water, ground-, long-term]: 4.9476e-6 kg; lognormal variance with pedigree 5.66, pedigree (1,1,5,1,1)
  (same comment as for Molybdenum)
- Manganese [water, surface water]: 2.2244e-8 kg; lognormal variance with pedigree 1.85, pedigree (1,1,5,1,1)
  (same comment as for Silicon)
- Magnesium [water, surface water]: 9.1797e-6 kg; lognormal variance with pedigree 1.1, pedigree (1,1,5,1,1)
  (same comment as for Silicon)
- Titanium, ion [water, ground-, long-term]: 0.0035949 kg; lognormal variance with pedigree 0.75, pedigree (1,1,5,1,1)
  (same comment as for Molybdenum)
- Molybdenum [water, surface water]: 2.4644e-5 kg; lognormal variance with pedigree 1.19, pedigree (1,1,5,1,1)
  (same comment as for Silicon)
- Manganese [water, ground-, long-term]: 1.3324e-5 kg; lognormal variance with pedigree 6.39, pedigree (1,1,5,1,1)
  (same comment as for Molybdenum)
- Mercury [water, ground-, long-term]: 4.0124e-9 kg; lognormal variance with pedigree 4.29, pedigree (1,1,5,1,1)
  (same comment as for Molybdenum)
- Cobalt [water, ground-, long-term]: 9.7879e-6 kg; lognormal variance with pedigree 1.86, pedigree (1,1,5,1,1)
  (same comment as for Molybdenum)
- Cobalt [water, surface water]: 1.634e-8 kg; lognormal variance with pedigree 1.89, pedigree (1,1,5,1,1)
  (same comment as for Silicon)
- Boron [water, surface water]: 2.2221e-6 kg; lognormal variance with pedigree 1.26, pedigree (1,1,5,1,1)
  (same comment as for Silicon)
- Cadmium, ion [water, ground-, long-term]: 2.7328e-8 kg; lognormal variance with pedigree 7.66, pedigree (1,1,5,1,1)
  (same comment as for Molybdenum)
- Vanadium, ion [water, ground-, long-term]: 0.00024977 kg; lognormal variance with pedigree 0.86, pedigree (1,1,5,1,1)
  (same comment as for Molybdenum)
- Phosphate [water, ground-, long-term]: 0.00055551 kg; lognormal variance with pedigree 1.29, pedigree (1,1,5,1,1)
  (same comment as for Molybdenum)
- Tin, ion [water, surface water]: 2.8147e-9 kg; lognormal variance with pedigree 2.13, pedigree (1,1,5,1,1)
  (same comment as for Silicon)
- Copper, ion [water, ground-, long-term]: 4.7165e-6 kg; lognormal variance with pedigree 3.63, pedigree (1,1,5,1,1)
  (same comment as for Molybdenum)
- Cadmium, ion [water, surface water]: 4.5622e-11 kg; lognormal variance with pedigree 2.67, pedigree (1,1,5,1,1)
  (same comment as for Silicon)
- Antimony [water, surface water]: 4.2931e-6 kg; lognormal variance with pedigree 1.31, pedigree (1,1,5,1,1)
  (same comment as for Silicon)
- Chloride [water, surface water]: 6.4819e-6 kg; lognormal variance with pedigree 1.24, pedigree (1,1,5,1,1)
  (same comment as for Silicon)
- Sodium, ion [water, ground-, long-term]: 0.0050622 kg; lognormal variance with pedigree 0.44, pedigree (1,1,5,1,1)
  (same comment as for Molybdenum)
- Sodium, ion [water, surface water]: 0.003041 kg; lognormal variance with pedigree 0.46, pedigree (1,1,5,1,1)
  (same comment as for Silicon)
- Iron, ion [water, surface water]: 4.7573e-7 kg; lognormal variance with pedigree 1.5, pedigree (1,1,5,1,1)
  (same comment as for Silicon)
- Nickel, ion [water, ground-, long-term]: 5.889e-5 kg; lognormal variance with pedigree 1.2, pedigree (1,1,5,1,1)
  (same comment as for Molybdenum)
- Bromine [water, ground-, long-term]: 1.2765e-5 kg; lognormal variance with pedigree 1.08, pedigree (1,1,5,1,1)
  (same comment as for Molybdenum)
- Tungsten [water, ground-, long-term]: 5.2915e-6 kg; lognormal variance with pedigree 1.34, pedigree (1,1,5,1,1)
  (same comment as for Molybdenum)
- Silicon [water, ground-, long-term]: 0.20243 kg; lognormal variance with pedigree 0.1, pedigree (1,1,5,1,1)
  (same comment as for Molybdenum)
- Selenium [water, surface water]: 2.917e-6 kg; lognormal variance with pedigree 1.36, pedigree (1,1,5,1,1)
  (same comment as for Silicon)
- Sulfate [water, surface water]: 0.0010448 kg; lognormal variance with pedigree 0.66, pedigree (1,1,5,1,1)
  (same comment as for Silicon)
- Aluminium [water, ground-, long-term]: 0.040824 kg; lognormal variance with pedigree 0.5, pedigree (1,1,5,1,1)
  (same comment as for Molybdenum)
- Fluoride [water, ground-, long-term]: 2.778e-6 kg; lognormal variance with pedigree 1.47, pedigree (1,1,5,1,1)
  (same comment as for Molybdenum)
- Potassium, ion [water, ground-, long-term]: 0.011633 kg; lognormal variance with pedigree 0.35, pedigree (1,1,5,1,1)
  (same comment as for Molybdenum)
- Arsenic, ion [water, surface water]: 1.2626e-5 kg; lognormal variance with pedigree 1.28, pedigree (1,1,5,1,1)
  (same comment as for Silicon)
- Aluminium [water, surface water]: 6.8153e-5 kg; lognormal variance with pedigree 0.88, pedigree (1,1,5,1,1)
  (same comment as for Silicon)
- Chromium VI [water, ground-, long-term]: 1.4035e-5 kg; lognormal variance with pedigree 1.05, pedigree (1,1,5,1,1)
  (same comment as for Molybdenum)
- Iodide [water, surface water]: 4.0388e-6 kg; lognormal variance with pedigree 1.43, pedigree (1,1,5,1,1)
  (same comment as for Silicon)
- Tungsten [water, surface water]: 2.8827e-6 kg; lognormal variance with pedigree 1.36, pedigree (1,1,5,1,1)
  (same comment as for Silicon)
- Lead [water, surface water]: 2.8044e-9 kg; lognormal variance with pedigree 2.12, pedigree (1,1,5,1,1)
  (same comment as for Silicon)
- Antimony [water, ground-, long-term]: 7.8804e-6 kg; lognormal variance with pedigree 1.29, pedigree (1,1,5,1,1)
  (same comment as for Molybdenum)
- Barium [water, ground-, long-term]: 1.3385e-5 kg; lognormal variance with pedigree 6.39, pedigree (1,1,5,1,1)
  (same comment as for Molybdenum)
- Scandium [water, ground-, long-term]: 9.2426e-6 kg; lognormal variance with pedigree 1.3, pedigree (1,1,5,1,1)
  (same comment as for Molybdenum)
- Sulfate [water, ground-, long-term]: 0.0086937 kg; lognormal variance with pedigree 0.55, pedigree (1,1,5,1,1)
  (same comment as for Molybdenum)
- Mercury [water, surface water]: 6.6985e-12 kg; lognormal variance with pedigree 2.95, pedigree (1,1,5,1,1)
  (same comment as for Silicon)
- Titanium, ion [water, surface water]: 6.0016e-6 kg; lognormal variance with pedigree 1.13, pedigree (1,1,5,1,1)
  (same comment as for Silicon)
- Bromine [water, surface water]: 5.2131e-5 kg; lognormal variance with pedigree 1.06, pedigree (1,1,5,1,1)
  (same comment as for Silicon)
- Thallium [water, surface water]: 4.8767e-9 kg; lognormal variance with pedigree 2.06, pedigree (1,1,5,1,1)
  (same comment as for Silicon)
- Nickel, ion [water, surface water]: 9.8313e-8 kg; lognormal variance with pedigree 1.66, pedigree (1,1,5,1,1)
  (same comment as for Silicon)
- Selenium [water, ground-, long-term]: 5.3545e-6 kg; lognormal variance with pedigree 1.34, pedigree (1,1,5,1,1)
  (same comment as for Molybdenum)
- Iodide [water, ground-, long-term]: 4.0388e-13 kg; lognormal variance with pedigree 1.45, pedigree (1,1,5,1,1)
  (same comment as for Molybdenum)
- Strontium [water, ground-, long-term]: 0.00058421 kg; lognormal variance with pedigree 0.89, pedigree (1,1,5,1,1)
  (same comment as for Molybdenum)
- Chloride [water, ground-, long-term]: 1.6181e-5 kg; lognormal variance with pedigree 1.2, pedigree (1,1,5,1,1)
  (same comment as for Molybdenum)
- Vanadium, ion [water, surface water]: 7.9751e-7 kg; lognormal variance with pedigree 1.38, pedigree (1,1,5,1,1)
  (same comment as for Silicon)
- Calcium, ion [water, ground-, long-term]: 0.0014836 kg; lognormal variance with pedigree 1.79, pedigree (1,1,5,1,1)
  (same comment as for Molybdenum)
- Boron [water, ground-, long-term]: 0.00027886 kg; lognormal variance with pedigree 0.86, pedigree (1,1,5,1,1)
  (same comment as for Molybdenum)
- Thallium [water, ground-, long-term]: 2.9211e-6 kg; lognormal variance with pedigree 1.59, pedigree (1,1,5,1,1)
  (same comment as for Molybdenum)
- Strontium [water, surface water]: 9.7532e-7 kg; lognormal variance with pedigree 1.35, pedigree (1,1,5,1,1)
  (same comment as for Silicon)
- Magnesium [water, ground-, long-term]: 0.0054987 kg; lognormal variance with pedigree 1.41, pedigree (1,1,5,1,1)
  (same comment as for Molybdenum)
- Chromium VI [water, surface water]: 4.4431e-6 kg; lognormal variance with pedigree 1.21, pedigree (1,1,5,1,1)
  (same comment as for Silicon)
- Beryllium [water, surface water]: 9.8053e-9 kg; lognormal variance with pedigree 1.96, pedigree (1,1,5,1,1)
  (same comment as for Silicon)
- Beryllium [water, ground-, long-term]: 5.8734e-6 kg; lognormal variance with pedigree 1.5, pedigree (1,1,5,1,1)
  (same comment as for Molybdenum)
- Zinc, ion [water, surface water]: 8.2598e-9 kg; lognormal variance with pedigree 1.98, pedigree (1,1,5,1,1)
  (same comment as for Silicon)
- Arsenic, ion [water, ground-, long-term]: 1.2626e-14 kg; lognormal variance with pedigree 1.3, pedigree (1,1,5,1,1)
  (same comment as for Molybdenum)

## Sampling procedure
Landfill model based on observed leachate concentrations in literature. Extrapolated to 60'000 years heeding chemical characteristics. Initial waste composition from various literature sources.

## Extrapolations
This dataset has been extrapolated from year 2000 to the year of the calculation (2019). The uncertainty has been adjusted accordingly.

## Review by Niels Jungbluth 2009-02-15
passed.
