# treatment of hard coal ash, residual material landfill

Dataset: EcoSpold 2, unit process
Geography: ES
Time period: 1994-01-01 to 2019-12-31
Technology level: current
Classification: EcoSpold01Categories: waste management/residual material landfill
Classification: ISIC rev.4 ecoinvent: 3822:Treatment and disposal of hazardous waste
Tags: ConvertedDataset; Treatment
Scenario: Business-as-Usual
System model: Allocation at the point of substitution
Generated by: Gabor Doka (obsolete)
Published in: Doka G. 2009
Database: ecoinvent
isCopyrightProtected: true
accessRestrictedTo: 1

## General comment
Inventoried waste contains 100% ES hard coal ash; .
waste composition (wet, in ppm): H2O n.a.; O 746170; H n.a.; C n.a.; S 3500.5; N n.a.; P 462.89; B 158.24; Cl 13.652; Br 20.523; F 46.51; I 1.5718; Ag n.a.; As 20.917; Ba 895.15; Cd 1.082; Co 19.676; Cr 83.345; Cu 45.942; Hg 0.059522; Mn 242.26; Mo 7.6085; Ni 62.313; Pb 74.931; Sb 2.393; Se 3.4093; Sn 29.927; V 114.23; Zn 103.49; Be 7.6443; Sc 19.504; Sr 876.86; Ti 3401; Tl 3.7288; W 9.8034; Si 101870; Fe 28247; Ca 8147.3; Al 69293; K 8114.1; Mg 23808; Na 4123.4;
Share of carbon in waste that is biogenic 60.4%.
[This dataset was already contained in the ecoinvent database version 2. It was not individually updated during the transfer to ecoinvent version 3. Life Cycle Impact Assessment results may still have changed, as they are affected by changes in the supply chain, i.e. in other datasets. This dataset was generated following the ecoinvent quality guidelines for version 2. It may have been subject to central changes described in the ecoinvent version 3 change report (http://www.ecoinvent.org/database/ecoinvent-version-3/reports-of-changes/), and the results of the central updates were reviewed extensively. The changes added e.g. consistent water flows and other information throughout the database. The documentation of this dataset can be found in the ecoinvent reports of version 2, which are still available via the ecoinvent website. The change report linked above covers all central changes that were made during the conversion process.]

## Included activities end
Waste-specific short-term emissions to water from leachate. Long-term emissions from landfill to ground water.

## Geography
Technology encountered in Switzerland in 2000. Landfill includes base seal and leachate collection system.

## Technology
Swiss residual material landfill for polluted, inorganic waste. With base seal and leachate collection system. Recultivation after closure.

## Time period
Waste composition as given in literature reference, theoretical data or other source. Transfer coefficients from prospective model.

## Reference product
- hard coal ash: -1 kg; CPC 39: Wastes or scraps; By-product classification Waste
  EcoSpold01Location=ES
  production volume 3.32697e9 kg
    Estimated. Energy prodcution in mainly responsible for hard coal ashes. The production volume is calculated as the sum of hard coal ashes resulting from electricity and heat and power co-generation production from hard coal in the respective country.
  property price 0 EUR2005
    Waste products are assigned a price of zero as they are assumed to require further treatment.
  property carbon content 0
    carbon content on a dry matter basis (reserved; not for manual entry)
  properties: water in wet mass 0 kg, water content 0, dry mass 1 kg, carbon content, fossil 0, carbon content, non-fossil 0, wet mass 1 kg, carbon allocation 0 kg

## Inputs from technosphere
- residual material landfill: 2.0833e-9 unit; lognormal variance with pedigree 0.04, pedigree (1,1,5,1,1)
  EcoSpold01Location=CH
  demands per kilogram waste. uncertainty is heeded in the module
- process-specific burdens, residual material landfill: 1 kg; lognormal variance with pedigree 0.04, pedigree (1,1,5,1,1)
  EcoSpold01Location=CH
  demands per kilogram waste. uncertainty is heeded in the module;activityLink introduced to establish a direct link to the corresponding regional supply of this product

## Emissions to nature
- Sulfate [water, surface water]: 0.0011267 kg; lognormal variance with pedigree 0.65, pedigree (1,1,5,1,1)
  uncertainty is calculated from uncertainties in waste composition and transfer coefficients in residual landfill
- Boron [water, surface water]: 1.2398e-6 kg; lognormal variance with pedigree 1.33, pedigree (1,1,5,1,1)
  (same comment as for Sulfate)
- Beryllium [water, ground-, long-term]: 2.7675e-6 kg; lognormal variance with pedigree 1.6, pedigree (1,1,5,1,1)
  uncertainty is calculated from uncertainties in waste composition and transfer coefficients in incinerator and landfills.
- Phosphate [water, ground-, long-term]: 0.00031709 kg; lognormal variance with pedigree 1.36, pedigree (1,1,5,1,1)
  (same comment as for Beryllium)
- Aluminium [water, ground-, long-term]: 0.02057 kg; lognormal variance with pedigree 0.56, pedigree (1,1,5,1,1)
  (same comment as for Beryllium)
- Aluminium [water, surface water]: 3.434e-5 kg; lognormal variance with pedigree 0.94, pedigree (1,1,5,1,1)
  (same comment as for Sulfate)
- Chromium VI [water, ground-, long-term]: 1.5826e-5 kg; lognormal variance with pedigree 1.03, pedigree (1,1,5,1,1)
  (same comment as for Beryllium)
- Selenium [water, surface water]: 1.2023e-6 kg; lognormal variance with pedigree 1.48, pedigree (1,1,5,1,1)
  (same comment as for Sulfate)
- Calcium, ion [water, ground-, long-term]: 0.00073618 kg; lognormal variance with pedigree 1.88, pedigree (1,1,5,1,1)
  (same comment as for Beryllium)
- Scandium [water, surface water]: 2.7525e-6 kg; lognormal variance with pedigree 1.31, pedigree (1,1,5,1,1)
  (same comment as for Sulfate)
- Tungsten [water, ground-, long-term]: 6.3462e-6 kg; lognormal variance with pedigree 1.32, pedigree (1,1,5,1,1)
  (same comment as for Beryllium)
- Sodium, ion [water, surface water]: 0.0015474 kg; lognormal variance with pedigree 0.54, pedigree (1,1,5,1,1)
  (same comment as for Sulfate)
- Cobalt [water, ground-, long-term]: 3.364e-6 kg; lognormal variance with pedigree 2, pedigree (1,1,5,1,1)
  (same comment as for Beryllium)
- Cobalt [water, surface water]: 5.6159e-9 kg; lognormal variance with pedigree 2.04, pedigree (1,1,5,1,1)
  (same comment as for Sulfate)
- Magnesium [water, ground-, long-term]: 0.0027051 kg; lognormal variance with pedigree 1.49, pedigree (1,1,5,1,1)
  (same comment as for Beryllium)
- Molybdenum [water, surface water]: 7.5736e-6 kg; lognormal variance with pedigree 1.34, pedigree (1,1,5,1,1)
  (same comment as for Sulfate)
- Silicon [water, ground-, long-term]: 0.10164 kg; lognormal variance with pedigree 0.16, pedigree (1,1,5,1,1)
  (same comment as for Beryllium)
- Iodide [water, ground-, long-term]: 1.5718e-13 kg; lognormal variance with pedigree 1.57, pedigree (1,1,5,1,1)
  (same comment as for Beryllium)
- Thallium [water, ground-, long-term]: 1.35e-6 kg; lognormal variance with pedigree 1.7, pedigree (1,1,5,1,1)
  (same comment as for Beryllium)
- Chloride [water, surface water]: 3.9047e-6 kg; lognormal variance with pedigree 1.31, pedigree (1,1,5,1,1)
  (same comment as for Sulfate)
- Bromine [water, surface water]: 1.6486e-5 kg; lognormal variance with pedigree 1.21, pedigree (1,1,5,1,1)
  (same comment as for Sulfate)
- Thallium [water, surface water]: 2.2537e-9 kg; lognormal variance with pedigree 2.16, pedigree (1,1,5,1,1)
  (same comment as for Sulfate)
- Cadmium, ion [water, surface water]: 1.2263e-11 kg; lognormal variance with pedigree 2.84, pedigree (1,1,5,1,1)
  (same comment as for Sulfate)
- Sodium, ion [water, ground-, long-term]: 0.002576 kg; lognormal variance with pedigree 0.52, pedigree (1,1,5,1,1)
  (same comment as for Beryllium)
- Cadmium, ion [water, ground-, long-term]: 7.3454e-9 kg; lognormal variance with pedigree 7.83, pedigree (1,1,5,1,1)
  (same comment as for Beryllium)
- Vanadium, ion [water, ground-, long-term]: 8.7798e-5 kg; lognormal variance with pedigree 1, pedigree (1,1,5,1,1)
  (same comment as for Beryllium)
- Sulfate [water, ground-, long-term]: 0.0093747 kg; lognormal variance with pedigree 0.54, pedigree (1,1,5,1,1)
  (same comment as for Beryllium)
- Tungsten [water, surface water]: 3.4573e-6 kg; lognormal variance with pedigree 1.34, pedigree (1,1,5,1,1)
  (same comment as for Sulfate)
- Mercury [water, ground-, long-term]: 2.8096e-9 kg; lognormal variance with pedigree 4.29, pedigree (1,1,5,1,1)
  (same comment as for Beryllium)
- Strontium [water, surface water]: 5.2998e-7 kg; lognormal variance with pedigree 1.43, pedigree (1,1,5,1,1)
  (same comment as for Sulfate)
- Bromine [water, ground-, long-term]: 4.0369e-6 kg; lognormal variance with pedigree 1.23, pedigree (1,1,5,1,1)
  (same comment as for Beryllium)
- Potassium, ion [water, ground-, long-term]: 0.0058268 kg; lognormal variance with pedigree 0.44, pedigree (1,1,5,1,1)
  (same comment as for Beryllium)
- Selenium [water, ground-, long-term]: 2.207e-6 kg; lognormal variance with pedigree 1.46, pedigree (1,1,5,1,1)
  (same comment as for Beryllium)
- Barium [water, ground-, long-term]: 7.3942e-6 kg; lognormal variance with pedigree 6.46, pedigree (1,1,5,1,1)
  (same comment as for Beryllium)
- Chloride [water, ground-, long-term]: 9.7476e-6 kg; lognormal variance with pedigree 1.27, pedigree (1,1,5,1,1)
  (same comment as for Beryllium)
- Iron, ion [water, ground-, long-term]: 0.00014157 kg; lognormal variance with pedigree 7.3, pedigree (1,1,5,1,1)
  (same comment as for Beryllium)
- Fluoride [water, ground-, long-term]: 4.399e-5 kg; lognormal variance with pedigree 1.1, pedigree (1,1,5,1,1)
  (same comment as for Beryllium)
- Titanium, ion [water, surface water]: 1.6855e-6 kg; lognormal variance with pedigree 1.28, pedigree (1,1,5,1,1)
  (same comment as for Sulfate)
- Antimony [water, surface water]: 8.4392e-7 kg; lognormal variance with pedigree 1.53, pedigree (1,1,5,1,1)
  (same comment as for Sulfate)
- Antimony [water, ground-, long-term]: 1.5491e-6 kg; lognormal variance with pedigree 1.5, pedigree (1,1,5,1,1)
  (same comment as for Beryllium)
- Fluoride [water, surface water]: 2.5205e-6 kg; lognormal variance with pedigree 1.28, pedigree (1,1,5,1,1)
  (same comment as for Sulfate)
- Arsenic, ion [water, surface water]: 2.0917e-5 kg; lognormal variance with pedigree 1.21, pedigree (1,1,5,1,1)
  (same comment as for Sulfate)
- Copper, ion [water, surface water]: 2.9525e-9 kg; lognormal variance with pedigree 2.12, pedigree (1,1,5,1,1)
  (same comment as for Sulfate)
- Mercury [water, surface water]: 4.6904e-12 kg; lognormal variance with pedigree 2.95, pedigree (1,1,5,1,1)
  (same comment as for Sulfate)
- Barium [water, surface water]: 1.2344e-8 kg; lognormal variance with pedigree 1.93, pedigree (1,1,5,1,1)
  (same comment as for Sulfate)
- Vanadium, ion [water, surface water]: 2.8034e-7 kg; lognormal variance with pedigree 1.52, pedigree (1,1,5,1,1)
  (same comment as for Sulfate)
- Beryllium [water, surface water]: 4.6202e-9 kg; lognormal variance with pedigree 2.06, pedigree (1,1,5,1,1)
  (same comment as for Sulfate)
- Tin, ion [water, surface water]: 9.4674e-10 kg; lognormal variance with pedigree 2.27, pedigree (1,1,5,1,1)
  (same comment as for Sulfate)
- Zinc, ion [water, surface water]: 2.1175e-9 kg; lognormal variance with pedigree 2.16, pedigree (1,1,5,1,1)
  (same comment as for Sulfate)
- Zinc, ion [water, ground-, long-term]: 1.2684e-6 kg; lognormal variance with pedigree 5.84, pedigree (1,1,5,1,1)
  (same comment as for Beryllium)
- Titanium, ion [water, ground-, long-term]: 0.0010096 kg; lognormal variance with pedigree 0.91, pedigree (1,1,5,1,1)
  (same comment as for Beryllium)
- Chromium VI [water, surface water]: 5.0101e-6 kg; lognormal variance with pedigree 1.19, pedigree (1,1,5,1,1)
  (same comment as for Sulfate)
- Molybdenum [water, ground-, long-term]: 3.4931e-8 kg; lognormal variance with pedigree 1.37, pedigree (1,1,5,1,1)
  (same comment as for Beryllium)
- Calcium, ion [water, surface water]: 1.229e-6 kg; lognormal variance with pedigree 1.33, pedigree (1,1,5,1,1)
  (same comment as for Sulfate)
- Lead [water, surface water]: 6.4888e-10 kg; lognormal variance with pedigree 2.32, pedigree (1,1,5,1,1)
  (same comment as for Sulfate)
- Strontium [water, ground-, long-term]: 0.00031746 kg; lognormal variance with pedigree 0.97, pedigree (1,1,5,1,1)
  (same comment as for Beryllium)
- Iodide [water, surface water]: 1.5718e-6 kg; lognormal variance with pedigree 1.55, pedigree (1,1,5,1,1)
  (same comment as for Sulfate)
- Iron, ion [water, surface water]: 2.3635e-7 kg; lognormal variance with pedigree 1.57, pedigree (1,1,5,1,1)
  (same comment as for Sulfate)
- Potassium, ion [water, surface water]: 0.0022872 kg; lognormal variance with pedigree 0.47, pedigree (1,1,5,1,1)
  (same comment as for Sulfate)
- Nickel, ion [water, ground-, long-term]: 2.256e-5 kg; lognormal variance with pedigree 1.32, pedigree (1,1,5,1,1)
  (same comment as for Beryllium)
- Arsenic, ion [water, ground-, long-term]: 2.0917e-14 kg; lognormal variance with pedigree 1.23, pedigree (1,1,5,1,1)
  (same comment as for Beryllium)
- Silicon [water, surface water]: 0.00022909 kg; lognormal variance with pedigree 0.71, pedigree (1,1,5,1,1)
  (same comment as for Sulfate)
- Manganese [water, ground-, long-term]: 2.0011e-6 kg; lognormal variance with pedigree 6.64, pedigree (1,1,5,1,1)
  (same comment as for Beryllium)
- Tin, ion [water, ground-, long-term]: 5.671e-7 kg; lognormal variance with pedigree 5.09, pedigree (1,1,5,1,1)
  (same comment as for Beryllium)
- Nickel, ion [water, surface water]: 3.7662e-8 kg; lognormal variance with pedigree 1.78, pedigree (1,1,5,1,1)
  (same comment as for Sulfate)
- Manganese [water, surface water]: 3.3408e-9 kg; lognormal variance with pedigree 2.1, pedigree (1,1,5,1,1)
  (same comment as for Sulfate)
- Magnesium [water, surface water]: 4.516e-6 kg; lognormal variance with pedigree 1.18, pedigree (1,1,5,1,1)
  (same comment as for Sulfate)
- Phosphate [water, surface water]: 5.2936e-7 kg; lognormal variance with pedigree 1.58, pedigree (1,1,5,1,1)
  (same comment as for Sulfate)
- Scandium [water, ground-, long-term]: 1.6751e-5 kg; lognormal variance with pedigree 1.22, pedigree (1,1,5,1,1)
  (same comment as for Beryllium)
- Boron [water, ground-, long-term]: 0.00015559 kg; lognormal variance with pedigree 0.94, pedigree (1,1,5,1,1)
  (same comment as for Beryllium)
- Lead [water, ground-, long-term]: 3.8868e-7 kg; lognormal variance with pedigree 7.96, pedigree (1,1,5,1,1)
  (same comment as for Beryllium)
- Copper, ion [water, ground-, long-term]: 1.7685e-6 kg; lognormal variance with pedigree 3.76, pedigree (1,1,5,1,1)
  (same comment as for Beryllium)

## Sampling procedure
Landfill model based on observed leachate concentrations in literature. Extrapolated to 60'000 years heeding chemical characteristics. Initial waste composition from various literature sources.

## Extrapolations
This dataset has been extrapolated from year 2000 to the year of the calculation (2019). The uncertainty has been adjusted accordingly.

## Review by Niels Jungbluth 2009-02-15
passed.
