# electricity production, hard coal, at coal mine power plant

Dataset: EcoSpold 2, unit process
Geography: RoW
Time period: 1999-01-01 to 2019-12-31
Technology level: current
Classification: EcoSpold01Categories: hard coal/power plants
Classification: ISIC rev.4 ecoinvent: 3510:Electric power generation, transmission and distribution
Scenario: Business-as-Usual
System model: Allocation at the point of substitution
Generated by: Christian Bauer
Published in: Röder, A. 2007
Database: ecoinvent
isCopyrightProtected: true
accessRestrictedTo: 1

## General comment
This activity roughly describes the electricity production of an average 20 MW plant for self-generation and self-use in major coal mines. For the main characteristics (LHV, sulphur and ash content of coal, efficiency of the plant) and key criteria emissions (SOx and particles), direct information from individual Chinese Shandong and Shanxi major coal mines around 2000 from the CETP project (Dones, Zhou and Tian 2003) has been used. These data are used as first approximation for GLO conditions. These base data have been integrated for other species as well as trace elements and radionuclides using maximum data from European plants.
[This dataset was already contained in the ecoinvent database version 2. It was not individually updated during the transfer to ecoinvent version 3. Life Cycle Impact Assessment results may still have changed, as they are affected by changes in the supply chain, i.e. in other datasets. This dataset was generated following the ecoinvent quality guidelines for version 2. It may have been subject to central changes described in the ecoinvent version 3 change report (http://www.ecoinvent.org/database/ecoinvent-version-3/reports-of-changes/), and the results of the central updates were reviewed extensively. The changes added e.g. consistent water flows and other information throughout the database. The documentation of this dataset can be found in the ecoinvent reports of version 2, which are still available via the ecoinvent website. The change report linked above covers all central changes that were made during the conversion process.]

## Included activities start
Starts with coal input for electricity generation.

## Included activities end
Energy conversion for electricity production. Use of fuel oil for startup is accounted for. Particle removal is included in this module. DeSOx and DeNOx are not explicitly included (some of these units use Fluidized Bed Combustion technology, but data on SO2 emissions emissions comes from major coal mines in Shandong and Shanxi (China), which cover this case as well).

## Geography
Key country-specific data (Shandong and Shanxi) integrated with data for major European power plants. Supposed to represent GLO conditions.

## Technology
Average installed technology.

## Parameters
- fraction, water, decarbonised, to air: 0.025107; name fraction_WDC_to_air; lognormal variance with pedigree 0.041425, pedigree (2,3,2,2,1)
- fraction, cooling water, cooling pond system, to air: 0.032; name fraction_CW_CP_to_air; lognormal variance with pedigree 0.0413, pedigree (2,3,1,3,1)
  Calculated based on literature value (Scown, C.D., 2011, Water Footprint of U.S. Transportation Fuels and supplying information of the article) (Vionnet, S., Quantis Water Database - Technical Report, 2012).
- fraction, cooling water, recirculating system, to air: 0.771; name fraction_CW_R_to_air; lognormal variance with pedigree 0.0413, pedigree (2,3,1,3,1)
  (same comment as for fraction, cooling water, cooling pond system, to air)
- fraction, cooling water, once-through system, to air: 0.004; name fraction_CW_OT_to_air; lognormal variance with pedigree 0.0413, pedigree (2,3,1,3,1)
  (same comment as for fraction, cooling water, cooling pond system, to air)
- fraction, process water, to air: 0.15 dimensionless; name fraction_PW_to_air; lognormal variance with pedigree 0.092025, pedigree (4,4,3,2,4)
- fraction, water, completely softened, to air: 0.15; name fraction_WCS_to_air; lognormal variance with pedigree 0.092025, pedigree (4,4,3,2,4)
- fraction, cooling water, to air: 0.025107; name fraction_CW_to_air; lognormal variance with pedigree 0.041425, pedigree (2,3,2,2,1)

## Reference product
- electricity, high voltage, for internal use in coal mining: 1 kWh; By-product classification allocatable product; CPC 17100: Electrical energy
  production volume 6.55336e10 kWh; name apv_el
    0.0242 kWh/kg; 4.934E12 kg coal according to Coal Facts 2006 http://www.worldcoal.org/resources/coal-statistics/
  property price 0.0977 EUR2005
    Temporary price data. Calculated as 90% of purchasers price based on: 94% of the average price (to account for a 6% loss in transformation and transmission) for electricity for industrial consumersin 2005 (excluded taxes). From IEA.
  property true value 0.0977
    allocation property applied in "true value" allocation // value calculated from revenue

## By-products
- electricity, for reuse in municipal waste incineration only: 0 kWh; CPC 17100: Electrical energy; By-product classification allocatable product; pedigree (1,1,1,1,1)
  Net electricity generated from this waste and used in internal MSWI plant energy redistribution.
  Uncertainty: uncertainty is calculated from uncertainties in waste composition and uncertainties in energy efficiency and the uncertainty in internal energy demand
  production volume 559.932 kWh
  property exergy 3.6 MJ; name E_el_prod_MSWI_exergy
    This exergy property is based on the exergy content of the product.
  property true value relation 3.6; name E_el_prod_MSWI_true_value_relation
    property to calculate "true value" from
  property price 0.1 EUR2005; name E_el_prod_MSWI_price_EUR2005
    Estimated to be the same price as in case of electricity, medium voltage.
  property true value 1.09777e-9
    allocation property applied in "true value" allocation // value calculated from true value relation
- heat, for reuse in municipal waste incineration only: 0 MJ; CPC 17300: Steam and hot water; By-product classification allocatable product; pedigree (1,1,1,1,1)
  Net useful heat generated from this waste and used in internal MSWI plant energy redistribution.
  Uncertainty: uncertainty is calculated from uncertainties in waste composition and uncertainties in energy efficiency and the uncertainty in internal energy demand
  production volume 3961.19 MJ
  property true value relation 0.1842; name E_th_prod_MSWI_true_value_relation
    property to calculate "true value" from
  property exergy 0.1842 MJ; name E_th_prod_MSWI_exergy
    This exergy property is based on the exergy content of the product.
  property price 0.0106 EUR2005; name E_th_prod_MSWI_price_EUR2005
    Average European district heat price from Ecoheatcool and Euroheat 2005-2006, Ecoheat Work package 1: The European heat market. Final report. 10.6 EUR/GJ i s the price of district heat. http://www.solarthermalworld.org/files/Ecoheatcool%20WP1%20Web.pdf?download
  property true value 3.97365e-10
    (same comment as for electricity, for reuse in municipal waste incineration only)
- zinc concentrate: 0 kg; CPC 14290: Other non-ferrous metal ores and concentrates (other than uranium or thorium ores and concentrates); By-product classification allocatable product
  Calculated value from the knowledge of the properties of both products.
  production volume 0.140504 kg
  property price 0.38 EUR2005; name ByP_price_EUR2005
    Temporary price data. Calculated as 90% of purchasers price based on: Zinc content in concentrate 53%. Concentrate price per kg Zn 86.5% of refined Zn price (13.5% treatment charges according to CHR Metals Limited 2005: Dynamic cost curves. http://www.minecost.com/dynamic.pdf). 2004 zinc price from USGS (2007) Mineral commodity summaries 2007. <http://minerals.usgs.gov/minerals/pubs/mcs/2007/mcs2007.pdf> [Accessed 25 May 2010]
  property zinc content 0.53; name zinc_C_zinc_concentrate
    Zinc content on a dry matter basis. Value taken from teh "zinc mine operation" /GLO dataset.
  property dry mass 1 kg; name DM_zinc_concentrate
  property carbon content 0
    carbon content on a dry matter basis (reserved; not for manual entry)
  property true value 8.14718e-13
    allocation property applied in "true value" allocation // value calculated from revenue
  properties: wet mass 1 kg, water content 0, carbon content, non-fossil 0, carbon content, fossil 0, water in wet mass 0 kg, carbon allocation 0 kg

## Inputs from technosphere
- residue from cooling tower: -0.000141 kg; name residue; lognormal variance with pedigree 0.074, pedigree (5,1,3,5,1)
  EcoSpold01Location=CH
  Calculated from mass balance
  Uncertainty: calculated from mass balance
  production volume 9.24024e6 kg; = apv_el*residue
    Calculated from the production volume of hard coal, burned in coal mine power plant in proportion to the respective output amounts.
  property price 0 EUR2005; name residue_price_EUR2005
  properties: carbon content, fossil 0.0544233, wet mass 1 kg, water content 0.428571, dry mass 0.7 kg
- chlorine, liquid: 0.000282 kg; lognormal variance with pedigree 0.11, pedigree (5,4,4,5,3)
  EcoSpold01Location=RER
  Rough guess
  Uncertainty: rough guess
  properties: wet mass 1 kg, dry mass 1 kg
- hard coal: 0 kg; pedigree (1,1,1,1,1)
  own assumption
  EcoSpold01Location=CN
  properties: dry mass 0.94 kg, water content 0.0638298, wet mass 1 kg, carbon content, fossil 0.845
  note on carbon content, fossil: C content 75-94% (specified in Tab 1.1, report 6, part VI). A mean content of 0.845 kg C/ kg dry hard coal was considered
- hard coal ash: -0.75012 kg; name ash; lognormal variance with pedigree 0.342, pedigree (5,1,3,5,3)
  EcoSpold01Location=PL
  Own assumption on the basis of 50% ash content; original dataset 1.58calc. from mass balance
  Uncertainty: calc. from mass balance
  production volume 4.91581e10 kg; = apv_el*ash
    (same comment as for residue from cooling tower)
  property price 0 EUR2005; name ash_price_EUR2005
  properties: dry mass 1 kg, wet mass 1 kg
- light fuel oil: 0 kg; pedigree (1,1,1,1,1)
  EcoSpold01Location=RER
  Typical value for hard coal plant in DE
  Uncertainty: typical value for hard coal plant in DE
  properties: wet mass 1 kg, carbon content, fossil 0.862, dry mass 1 kg
- water, decarbonised: 0 kg; name water_decarbonised_input; pedigree (1,1,1,1,1)
  Estimate based on literature
  Amount was scaled to the amount of reference product.
  estimate based on literature
  Amount was scaled to the amount of reference product.
  EcoSpold01Location=RER
  Uncertainty: estimate based on literature
  properties: wet mass 1 kg
- water, completely softened: 0 kg; name water_softened_input; pedigree (1,1,1,1,1)
  (same comment as for water, decarbonised)
  properties: wet mass 1 kg
- hard coal power plant: 4.1736e-10 unit; lognormal variance with pedigree 0.3166, pedigree (3,3,3,5,1)
  EcoSpold01Location=CN
- hard coal: 0.0982786, 0.264463, 0.162374, 0.159116, 0.037757, 0.237223, 0.123885, 0.0690512, 0.350912 kg (9 entries); lognormal variance with pedigree 0.034, pedigree (1,1,3,5,1)
  own assumption
  EcoSpold01Location=CN
- light fuel oil: 6.10242e-5, 8.80067e-6, 0.000123161, 8.17284e-6, 1.18421e-5, 0.000266399 kg (6 entries); lognormal variance with pedigree 0.024, pedigree (3,4,4,5,1)
  (same comment as for light fuel oil)
- water, decarbonised: 0.0860544, 0.223913, 0.00014003, 0.220531, 0.044458, 0.146186, 0.00807035, 0.115001, 0.267884, 1.68036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 kg (12 entries); lognormal variance with pedigree 0.054, pedigree (4,5,4,5,3)
  (same comment as for water, decarbonised)
- water, completely softened: 0.0707565, 0.0984435 kg (2 entries); lognormal variance with pedigree 0.054, pedigree (4,5,4,5,3)
  (same comment as for water, decarbonised)

## Inputs from nature
- Water, cooling, unspecified natural origin [natural resource, in water]: 0.00516146 m3; name water_cooling_UNO_input; source Scown, C.D., et al. 2011; lognormal variance with pedigree 0.018, pedigree (3,4,3,5,1)
  Estimate based on literature
  Amount was scaled to the amount of reference product.
  Calculated based on literature (Scown, C.D., et al., 2011, Water Footprint of U.S. Trasportation Fuels;Scown, C.D., et al., 2011, Water Footprint of U.S. Trasportation Fuels (SI); Stiegel, 2008, Estimating Freshwater Needs to Meet Future Thermoelectric Generation Requirements; Floerke, M., 2009, Future changes of freshwater needs in the electricity production sector), (Vionnet, S., Quantis Water Database - Technical Report, 2012). Water use in this process is modelled based on literature (see references). The process boundaries are given by the boundaries of the power plant. The process ends when the energy (MJ) is produced and ready to be used for electricity production (kWh). It is assumed that the rate between different types of cooling system is the same as in Europe.
  estimate based on literature
  Amount was scaled to the amount of reference product.
  Calculated based on literature (Scown, C.D., et al., 2011, Water Footprint of U.S. Trasportation Fuels;Scown, C.D., et al., 2011, Water Footprint of U.S. Trasportation Fuels (SI); Stiegel, 2008, Estimating Freshwater Needs to Meet Future Thermoelectric Generation Requirements; Floerke, M., 2009, Future changes of freshwater needs in the electricity production sector), (Vionnet, S., Quantis Water Database - Technical Report, 2012). Water use in this process is modelled based on literature (see references). The process boundaries are given by the boundaries of the power plant. The process ends when the energy (MJ) is produced and ready to be used for electricity production (kWh). It is assumed that the rate between different types of cooling system is the same as in Europe.
  Uncertainty: estimate based on literature

## Emissions to nature
- Lead [air, urban air close to ground]: 1.78224e-6 kg; lognormal variance with pedigree 0.834, pedigree (5,1,3,5,1)
  Own assumption; extrapol. from previously estimated 5.31calc. from trace element balance, input uncertain
  Uncertainty: calc. from trace element balance, input uncertain
- Potassium-40 [air, urban air close to ground]: 0.00084318 kBq; lognormal variance with pedigree 0.684, pedigree (5,1,3,5,1)
  Own assumption; extrapol. from previously estimated 3.27calc. from trace element balance, input uncertain
  Uncertainty: calc. from trace element balance, input uncertain
- Bromine [air, urban air close to ground]: 1.61022e-5 kg; lognormal variance with pedigree 0.284, pedigree (5,1,3,5,1)
  Own assumption; original 2.28calculated from trace element balance, input uncertain
  Uncertainty: calculated from trace element balance, input uncertain
- Nitrogen oxides [air, urban air close to ground]: 0.0115056 kg; lognormal variance with pedigree 0.126, pedigree (3,1,3,5,1)
  Own assumption; original 1.52see power plant data base for details
  Uncertainty: see power plant data base for details
- Selenium [air, urban air close to ground]: 2.78898e-7 kg; lognormal variance with pedigree 0.834, pedigree (5,1,3,5,1)
  (same comment as for Lead)
- Formaldehyde [air, urban air close to ground]: 1.6356e-6 kg; lognormal variance with pedigree 0.23, pedigree (3,5,4,5,1)
  Own assumption; original 1.65based on available literature
  Uncertainty: based on available literature
- Uranium-238 [air, urban air close to ground]: 0.00073602 kBq; lognormal variance with pedigree 0.684, pedigree (5,1,3,5,1)
  (same comment as for Potassium-40)
- Nickel [air, urban air close to ground]: 9.3906e-7 kg; lognormal variance with pedigree 0.834, pedigree (5,1,3,5,1)
  (same comment as for Lead)
- Particulates, > 10 um [air, urban air close to ground]: 0.0070782 kg; lognormal variance with pedigree 0.244, pedigree (5,1,3,5,1)
  Own assumption; original 1.83see power plant data base for details
  Uncertainty: see power plant data base for details
- Methane, fossil [air, urban air close to ground]: 2.82e-5 kg; lognormal variance with pedigree 0.224, pedigree (3,4,4,5,1)
  Own assumption; original 1.61based on available literature
  Uncertainty: based on available literature
- Hydrocarbons, aliphatic, unsaturated [air, urban air close to ground]: 6.0912e-6 kg; lognormal variance with pedigree 0.23, pedigree (3,5,4,5,1)
  (same comment as for Formaldehyde)
- Xylene [air, urban air close to ground]: 2.60004e-5 kg; lognormal variance with pedigree 0.23, pedigree (3,5,4,5,1)
  (same comment as for Formaldehyde)
- Radon-222 [air, urban air close to ground]: 0.0103212 kBq; lognormal variance with pedigree 0.684, pedigree (5,1,3,5,1)
  (same comment as for Potassium-40)
- Copper [air, urban air close to ground]: 4.3146e-7 kg; lognormal variance with pedigree 0.834, pedigree (5,1,3,5,1)
  (same comment as for Lead)
- Water [water, unspecified]: 0.00518321 m3; name water_to_water_unspecified; lognormal variance with pedigree 0.0447, pedigree (2,2,3,5,1)
  Calculated value based on literature values and expert opinion. See comments in the parametres' comment field.
  property fraction, origin: unspecified 0.541091; name fraction_origin_unspecified_Ww
  property fraction, origin: salt water 0; name fraction_origin_salt_water_Ww
  property carbon content, fossil 0; name C_content_fossil
  property fraction, origin: fresh water 0.458909; name fraction_origin_fresh_water_Ww
  property water in wet mass 1000 kg; name WWM
  property wet mass 1000 kg; name WM
  property dry mass 0 kg; name DM
  property carbon content, non-fossil 0; name C_content_non_fossil
- Ethane [air, urban air close to ground]: 1.1562e-6 kg; lognormal variance with pedigree 0.23, pedigree (3,5,4,5,1)
  (same comment as for Formaldehyde)
- Sulfur dioxide [air, urban air close to ground]: 0.03525 kg; lognormal variance with pedigree 0.126, pedigree (3,1,3,5,1)
  Own assumption; original 1.11see power plant data base for details
  Uncertainty: see power plant data base for details
- PAH, polycyclic aromatic hydrocarbons [air, urban air close to ground]: 2.82e-8 kg; lognormal variance with pedigree 0.5, pedigree (3,5,4,5,1)
  Own assumption; original 3.12based on available literature
  Uncertainty: based on available literature
- Water [air, unspecified]: 0.000261171 m3; name water_to_air_unspecified; = (water_softened_input/1000)*fraction_WCS_to_air+(water_decarbonised_input/1000)*fraction_WDC_to_air+water_cooling_UNO_input*fraction_CW_to_air; lognormal variance with pedigree 0.0447, pedigree (2,2,3,5,1)
  (same comment as for Water)
  property fraction, origin: unspecified 0.496183; name fraction_origin_unspecified
  property fraction, origin: fresh water 0.503817; name fraction_origin_fresh_water
  property fraction, origin: salt water 0; name fraction_origin_salt_water
- Hydrogen chloride [air, urban air close to ground]: 0.0008601 kg; lognormal variance with pedigree 0.334, pedigree (5,1,3,5,1)
  (same comment as for Bromine)
- Polonium-210 [air, urban air close to ground]: 0.0062604 kBq; lognormal variance with pedigree 0.684, pedigree (5,1,3,5,1)
  (same comment as for Potassium-40)
- Antimony [air, urban air close to ground]: 5.5836e-8 kg; lognormal variance with pedigree 0.834, pedigree (5,1,3,5,1)
  (same comment as for Lead)
- Radium-228 [air, urban air close to ground]: 0.000261696 kBq; lognormal variance with pedigree 0.684, pedigree (5,1,3,5,1)
  (same comment as for Potassium-40)
- Barium [air, urban air close to ground]: 3.4404e-6 kg; lognormal variance with pedigree 0.834, pedigree (5,1,3,5,1)
  (same comment as for Lead)
- Carbon dioxide, fossil [air, urban air close to ground]: 2.679 kg; lognormal variance with pedigree 0.006, pedigree (3,1,3,5,1)
  Based on available literature
  Uncertainty: based on available literature
- Particulates, < 2.5 um [air, urban air close to ground]: 0.028482 kg; lognormal variance with pedigree 0.514, pedigree (5,1,3,5,1)
  Own assumption; original 3.27see power plant data base for details
  Uncertainty: see power plant data base for details
- Strontium [air, urban air close to ground]: 3.1302e-6 kg; lognormal variance with pedigree 0.834, pedigree (5,1,3,5,1)
  (same comment as for Lead)
- Lead-210 [air, urban air close to ground]: 0.0034122 kBq; lognormal variance with pedigree 0.834, pedigree (5,1,3,5,1)
  (same comment as for Potassium-40)
- Cadmium [air, urban air close to ground]: 3.2712e-8 kg; lognormal variance with pedigree 0.834, pedigree (5,1,3,5,1)
  (same comment as for Lead)
- Pentane [air, urban air close to ground]: 4.1454e-6 kg; lognormal variance with pedigree 0.23, pedigree (3,5,4,5,1)
  (same comment as for Formaldehyde)
- Mercury [air, urban air close to ground]: 9.024e-8 kg; lognormal variance with pedigree 0.834, pedigree (5,1,3,5,1)
  (same comment as for Lead)
- Cobalt [air, urban air close to ground]: 1.33104e-7 kg; lognormal variance with pedigree 0.834, pedigree (5,1,3,5,1)
  (same comment as for Lead)
- Chromium VI [air, urban air close to ground]: 3.9762e-8 kg; lognormal variance with pedigree 0.484, pedigree (1,1,3,5,1)
  based on range of data
- Boron [air, urban air close to ground]: 1.974e-5 kg; lognormal variance with pedigree 0.834, pedigree (5,1,3,5,1)
  (same comment as for Lead)
- Particulates, > 2.5 um, and < 10um [air, urban air close to ground]: 0.0033276 kg; lognormal variance with pedigree 0.424, pedigree (5,1,3,5,1)
  Own assumption; original 2.28see power plant data base for details
  Uncertainty: see power plant data base for details
- Zinc [air, urban air close to ground]: 2.1714e-6 kg; lognormal variance with pedigree 0.834, pedigree (5,1,3,5,1)
  (same comment as for Lead)
- Butane [air, urban air close to ground]: 5.358e-7 kg; lognormal variance with pedigree 0.23, pedigree (3,5,4,5,1)
  (same comment as for Formaldehyde)
- Hydrocarbons, aliphatic, alkanes, unspecified [air, urban air close to ground]: 6.1758e-6 kg; lognormal variance with pedigree 0.23, pedigree (3,5,4,5,1)
  (same comment as for Formaldehyde)
- Radium-226 [air, urban air close to ground]: 0.00088548 kBq; lognormal variance with pedigree 0.684, pedigree (5,1,3,5,1)
  (same comment as for Potassium-40)
- Toluene [air, urban air close to ground]: 3.0738e-6 kg; lognormal variance with pedigree 0.23, pedigree (3,5,4,5,1)
  (same comment as for Formaldehyde)
- Iodine [air, urban air close to ground]: 8.2344e-6 kg; lognormal variance with pedigree 0.334, pedigree (5,1,3,5,1)
  (same comment as for Bromine)
- Benzene [air, urban air close to ground]: 6.1194e-6 kg; lognormal variance with pedigree 0.23, pedigree (3,5,4,5,1)
  (same comment as for Formaldehyde)
- Hydrogen fluoride [air, urban air close to ground]: 7.6986e-5 kg; lognormal variance with pedigree 0.334, pedigree (5,1,3,5,1)
  (same comment as for Bromine)
- Radon-220 [air, urban air close to ground]: 0.01833 kBq; lognormal variance with pedigree 0.684, pedigree (5,1,3,5,1)
  (same comment as for Potassium-40)
- Arsenic [air, urban air close to ground]: 3.4122e-7 kg; lognormal variance with pedigree 0.834, pedigree (5,1,3,5,1)
  (same comment as for Lead)
- Molybdenum [air, urban air close to ground]: 6.063e-8 kg; lognormal variance with pedigree 0.834, pedigree (5,1,3,5,1)
  (same comment as for Lead)
- Thorium-232 [air, urban air close to ground]: 0.000221652 kBq; lognormal variance with pedigree 0.684, pedigree (5,1,3,5,1)
  (same comment as for Potassium-40)
- Thorium-228 [air, urban air close to ground]: 0.000141 kBq; lognormal variance with pedigree 0.684, pedigree (5,1,3,5,1)
  (same comment as for Potassium-40)
- Benzo(a)pyrene [air, urban air close to ground]: 5.64e-12 kg; lognormal variance with pedigree 0.23, pedigree (3,5,4,5,1)
  (same comment as for Formaldehyde)
- Dinitrogen monoxide [air, urban air close to ground]: 1.41e-5 kg; lognormal variance with pedigree 0.134, pedigree (3,4,4,5,1)
  (same comment as for Methane, fossil)
- Chromium [air, urban air close to ground]: 3.2148e-7 kg; lognormal variance with pedigree 0.834, pedigree (5,1,3,5,1)
  (same comment as for Lead)
- Dioxins, measured as 2,3,7,8-tetrachlorodibenzo-p-dioxin [air, urban air close to ground]: 1.974e-13 kg; lognormal variance with pedigree 0.5, pedigree (3,5,4,5,1)
  (same comment as for PAH, polycyclic aromatic hydrocarbons)
- Carbon monoxide, fossil [air, urban air close to ground]: 0.001128 kg; lognormal variance with pedigree 0.814, pedigree (3,4,4,5,1)
  Own assumption; original 5.09based on available literature
  Uncertainty: based on available literature
- Propane [air, urban air close to ground]: 9.87e-7 kg; lognormal variance with pedigree 0.23, pedigree (3,5,4,5,1)
  (same comment as for Formaldehyde)
- Vanadium [air, urban air close to ground]: 7.8678e-7 kg; lognormal variance with pedigree 0.834, pedigree (5,1,3,5,1)
  (same comment as for Lead)
- Propene [air, urban air close to ground]: 4.512e-7 kg; lognormal variance with pedigree 0.23, pedigree (3,5,4,5,1)
  (same comment as for Formaldehyde)
- Manganese [air, urban air close to ground]: 1.70046e-6 kg; lognormal variance with pedigree 0.834, pedigree (5,1,3,5,1)
  (same comment as for Lead)

## Sampling procedure
literature and statistics

## Extrapolations
see Geography/Text This dataset has been copied from an original dataset covering the geography CN. The uncertainty has been adjusted accordingly.
