# storage building construction, chemicals, solid

Dataset: EcoSpold 2, unit process
Geography: CH
Time period: 1998-01-01 to 2019-12-31
Technology level: current
Classification: ISIC rev.4 ecoinvent: 4100:Construction of buildings
Classification: EcoSpold01Categories: chemicals/inorganics
Tags: ConvertedDataset
Scenario: Business-as-Usual
System model: Allocation at the point of substitution
Generated by: Alex Primas
Published in: Althaus H.-J. 2007
Database: ecoinvent
isCopyrightProtected: true
accessRestrictedTo: 1

## General comment
The infrastructure module includes 2 building halls of 15 m height with a floor area of 3000 m2 each, totalling to a storage capacitiy of about 30000 m3. The life time of the tanks was assumed to be 50 years. This infrastructure module has a high uncertainty and should only be seen as an approximation of the infrastructure for regional storage of solid chemicals.
[This dataset was already contained in the ecoinvent database version 2. It was not individually updated during the transfer to ecoinvent version 3. Life Cycle Impact Assessment results may still have changed, as they are affected by changes in the supply chain, i.e. in other datasets. This dataset was generated following the ecoinvent quality guidelines for version 2. It may have been subject to central changes described in the ecoinvent version 3 change report (http://www.ecoinvent.org/database/ecoinvent-version-3/reports-of-changes/), and the results of the central updates were reviewed extensively. The changes added e.g. consistent water flows and other information throughout the database. The documentation of this dataset can be found in the ecoinvent reports of version 2, which are still available via the ecoinvent website. The change report linked above covers all central changes that were made during the conversion process.]

## Included activities end
Process for building hall includes construction and disposal porcesses, no contamination assumed for disposal, land use included.

## Geography
Based on weak data from 1 site valid for Switzerland

## Technology
Data origins from the storage of sodium chloride, there is high uncertainty in the technological correlation. This may also affect the materials and types of building used.

## Reference product
- storage building, chemicals, solid: 1 unit; CPC 53269: Other constructions for manufacturing; By-product classification allocatable product
  Uncertainty not applicable for output
  production volume 0.0336675 unit
    This is a placeholder value that does not reflect real-world production volumes. This dataset does not currently require a real-world production volume to work in the database framework, and no actual data were collected yet. This has no negative effect on the results of the ecoinvent database. The placeholder value of this activity was scaled according to the nominal GDP of 2005 (source: United Nations, http://data.un.org/Glossary.aspx?q=GDP+%28current+US%24%29, accessed 20130726) to reflect an appropriate share of the global production volume, which is also a placeholder value.
  property price 1.65558e6 EUR2005
    Calculated based on inputs: The price of the product has been calculated as a sum of the values of the material and energy inputs for this product. This value is therefore a rough estimation. It may underestimate the real price since there are additional expenses when producing any product. These expences can include for example labour costs, treatment of waste materials and profit for the producer. Please consider carefully whether this level of data quality is acceptable for your application.

## Inputs from technosphere
- building, hall: 12000 m2; lognormal variance with pedigree 0.146025, pedigree (4,5,5,2,4)
  Estimated with data from 1 site
  This exchange has an activity link directly to the producing activity because the product is primarily consumed in the same geographical area where it is produced.

## Inputs from nature
- Occupation, construction site [natural resource, land]: 18000 m2*year; lognormal variance with pedigree 0.266, pedigree (4,5,5,1,4)
  Estimated with data from 1 site
- Transformation, to industrial area [natural resource, land]: 9000 m2; lognormal variance with pedigree 0.186, pedigree (4,5,5,1,4)
  Estimated with data from 1 site
- Occupation, industrial area [natural resource, land]: 450000 m2*year; lognormal variance with pedigree 0.266, pedigree (4,5,5,1,4)
  Estimated with data from 1 site
- Transformation, from unspecified [natural resource, land]: 9000 m2; lognormal variance with pedigree 0.186, pedigree (4,5,5,1,4)
  Estimated with data from 1 site

## Sampling procedure
Estimation from literature and from pictures and maps of 1 site for sodium chloride storage

## Extrapolations
This dataset has been extrapolated from year 1998 to the year of the calculation (2019). The uncertainty has been adjusted accordingly.

## Review by Roland Hischier 2003-08-26
Passed.
