# ground granulated blast furnace slag production

Dataset: EcoSpold 2, unit process
Geography: IN
Time period: 2014-04-01 to 2019-12-31
Technology level: current
Classification: ISIC rev.4 ecoinvent: 239:Manufacture of non-metallic mineral products n.e.c.
Synonyms: GGBFS; slag cement
Scenario: Business-as-Usual
System model: Allocation at the point of substitution
Generated by: P V Kiran Ananth
Published in: Kiran Ananth P. V. 2017
Database: ecoinvent
isCopyrightProtected: true
accessRestrictedTo: 1

## General comment
The ground granulated blast furnace slag (GGBFS) is a by-product of iron manufacturing which when added to concrete improves its properties such as workability, strength and durability.
This material is obtained by the heating of iron ore, limestone and coke at a temperature about 1500 degree Celsius. The process is carried out in a blast furnace.
The formation of GGBFS is not direct. The by-product of iron manufacturing is a molten slag and molten iron. The molten slag consists of alumina and silica, also with the certain amount of oxides.
This slag is later granulated by cooling it. For this, it is allowed to pass through a high-pressure water get. This result in quenching of the particles which results in granules of size lesser than 5mm in diameter.
The main constituents of blast furnace slag are CaO, SiO2, Al2O3 and MgO. These are the minerals that are found in most of the cementitious substances.
The particles are further dried and ground in a rotating ball mill to form a fine powder, known as ground granulated blast furnace slag cement.

## Included activities start
From transport of molten iron blast furnace slag for granulation from pig iron production (within the steel plant). Granulation is followed by dewatering and/or drying, crushing, grinding and finally storage.

## Included activities end
This activity ends with the storage of the finished product (GGBFS) in silo.
This activity includes the process steps (i) quenching/granulation, (ii) dewatering and/or drying, (iii) crushing, (iv) grinding, and (v) storage in pile and silo.
This activity does neither include packaging and distribution of the final product, nor the treatment of wastewater generated in the granulation process step.

## Geography
Data represents for Western & Southern part of India. Data collected from 3 ground granulated blast furnace slag production facility.

## Technology
Data represent for latest technology

## Time period
Data collected for above mentioned period.

## Parameters
- fraction, process water, to air: 0.15 dimensionless; name fraction_PW_to_air; lognormal variance with pedigree 0.092025, pedigree (4,4,3,2,4)
  Literature value. In case when no industry/process specific data are available, default evaporation fraction value is used. This value is 15% and is based on literature (Statistics Canada, 2007 & Shaffer, K.H., 2008, Consumptive water use in the Great Lakes Basin, USGS & Shiklomanov, 2003, World Water Resources at the Beginning of the 21st Century) and has been approved by an expert.

## Reference product
- blast furnace slag: 0 kg; = -(GGBFS+inert_waste_slag+part_matter); CPC 37440: Portland cement, aluminous cement, slag cement and similar hydraulic cements, except in the form of clinkers; By-product classification Recyclable
  Calculated value: Input of blast furnace slag assumed to be sum of GGBFS output, disposed solid waste, particulate matter emissions and suspended solid in effluent.
  production volume 0 kg; = ABS(Ref('45e4fa0d-b95f-48f0-b2dc-ce49e8e760e1')/ GGBFS* apv_GGBFS)
    Calculated value from the amount of ground granulated blast furnace slag produced in this process.
  property carbon content, fossil 0
    Industry value; Arcelor Mittal, chemical composition of blast furnace slag (http://www.cst.com.br/english/products/co_products/catalog_products/blast_slag/blast_slag.asp, accessed: 20121003).
  property carbon content 0
    carbon content on a dry matter basis (reserved; not for manual entry)
  properties: wet mass 1 kg, carbon content, non-fossil 0, water in wet mass 0 kg, dry mass 1 kg, water content 0, price 0 EUR2005, carbon allocation 0 kg
- ground granulated blast furnace slag: 1 kg; By-product classification allocatable product; CPC 37440: Portland cement, aluminous cement, slag cement and similar hydraulic cements, except in the form of clinkers; pedigree (1,1,1,1,1)
  Weighted average data from 3 manufacturing units
  production volume 1.2e10 kg

## By-products
- ground granulated blast furnace slag: 0 kg; name GGBFS; By-product classification allocatable product; CPC 37440: Portland cement, aluminous cement, slag cement and similar hydraulic cements, except in the form of clinkers; pedigree (1,1,1,1,1)
  Weighted average data from 3 manufacturing units
  production volume 0 kg; name apv_GGBFS; = 12E6*1000
    Source: Indian Minerals Yearbook, 2014. Ministry of Mines.
  property price 0.0615 EUR2005; name GGBFS_price_EUR2005
    2005 import and export prices (total trades (USD) divided by total weight (kg) in China, India, USA, Japan, Russia and Europe, major producers and consumers (http://www.cementchina.net/freport/showfre.asp?id=749) from UN Commodity Trade Statistics Database (http://data.un.org/Explorer.aspxDatabase [Accessed 2 July 2010]). Commodity: Cement (portland, aluminious, slag or hydraulic)
  property water in wet mass 0 kg; name GGBFS_WWM
  property carbon content, non-fossil 0; name GGBFS_C_content_non_fossil
  property water content 0; name GGBFS_water_content
  property carbon content, fossil 0; name GGBFS_C_content_fossil
    (same comment as for blast furnace slag)
  property carbon content 0
    carbon content on a dry matter basis (reserved; not for manual entry)
  properties: wet mass 1 kg, dry mass 1 kg, carbon allocation 0 kg
- heat, for reuse in municipal waste incineration only: 0 MJ; CPC 17300: Steam and hot water; By-product classification allocatable product; pedigree (1,1,1,1,1)
  Net electricity generated from this waste and used in internal MSWI plant energy redistribution.
  Uncertainty: uncertainty is calculated from uncertainties in waste composition and uncertainties in energy efficiency and the uncertainty in internal energy demand
  property exergy 0.1842 MJ; name E_th_prod_MSWI_exergy
    This exergy property is based on the exergy content of the product.
  property price 0.0106 EUR2005; name E_th_prod_MSWI_price_EUR2005
    Average European district heat price from Ecoheatcool and Euroheat 2005-2006, Ecoheat Work package 1: The European heat market. Final report. 10.6 EUR/GJ i s the price of district heat. http://www.solarthermalworld.org/files/Ecoheatcool%20WP1%20Web.pdf?download
  property true value relation 0.1842; name E_th_prod_MSWI_true_value_relation
    property to calculate "true value" from
- electricity, for reuse in municipal waste incineration only: 0 kWh; CPC 17100: Electrical energy; By-product classification allocatable product; pedigree (1,1,1,1,1)
  (same comment as for heat, for reuse in municipal waste incineration only)
  property true value relation 3.6; name E_el_prod_MSWI_true_value_relation
    property to calculate "true value" from
  property price 0.1 EUR2005; name E_el_prod_MSWI_price_EUR2005
    Estimated to be the same price as in case of electricity, medium voltage.
  property exergy 3.6 MJ; name E_el_prod_MSWI_exergy
    This exergy property is based on the exergy content of the product.
- zinc concentrate: 0 kg; CPC 14290: Other non-ferrous metal ores and concentrates (other than uranium or thorium ores and concentrates); By-product classification allocatable product
  Calculated value from the knowledge of the properties of both products.
  property price 0.38 EUR2005; name ByP_price_EUR2005
    Temporary price data. Calculated as 90% of purchasers price based on: Zinc content in concentrate 53%. Concentrate price per kg Zn 86.5% of refined Zn price (13.5% treatment charges according to CHR Metals Limited 2005: Dynamic cost curves. http://www.minecost.com/dynamic.pdf). 2004 zinc price from USGS (2007) Mineral commodity summaries 2007. <http://minerals.usgs.gov/minerals/pubs/mcs/2007/mcs2007.pdf> [Accessed 25 May 2010]
  property zinc content 0.53; name zinc_C_zinc_concentrate
    Zinc content on a dry matter basis. Value taken from teh "zinc mine operation" /GLO dataset.
  property dry mass 1 kg; name DM_zinc_concentrate
  property carbon content 0
    carbon content on a dry matter basis (reserved; not for manual entry)
  properties: wet mass 1 kg, water content 0, carbon content, non-fossil 0, carbon content, fossil 0, water in wet mass 0 kg, carbon allocation 0 kg

## Inputs from technosphere
- steel, low-alloyed: 5.21725e-8 kg; name grinding_media; source Marceau M. 2003, p. 5; lognormal variance with pedigree 0.0027, pedigree (2,2,2,4,2)
  Referred ecoinvent dataset " ground granulated blast furnace slag, GLO" accessed on 20180206. Uncertainty adjusted accordingly.
  properties: carbon content, fossil 0.005, dry mass 1 kg, wet mass 1 kg
  note on carbon content, fossil: Low alloyed steel composition given in Tab. 3.2 ecoinvent v2.2 report 10_partII. Steel assumed to have a C content of 0.5%
- ethylene glycol: 6.90819e-6 kg; name grinding_aid; source Marceau M. 2003, p. 5; lognormal variance with pedigree 0.0027, pedigree (2,2,2,4,2)
  (same comment as for steel, low-alloyed)
  properties: dry mass 1 kg, wet mass 1 kg, carbon content, fossil 0.387097
- inert waste: -4.7967e-5 kg; name inert_waste_slag; source Marceau M. 2003, p. 5; lognormal variance with pedigree 0.3021, pedigree (2,2,2,4,2)
  Weighted average data from 3 manufacturing units
  production volume 0 kg; = apv_GGBFS*(inert_waste_slag/(GGBFS))
    Calculated from production volume of reference product using the relative outputs.
  property price 0 EUR2005; name inert_waste_slag_price_EUR2005
  properties: dry mass 1 kg, wet mass 1 kg
- lubricating oil: 3.96699e-5 kg; name lub_oil; source Marceau M. 2003, p. 5; lognormal variance with pedigree 0.0027, pedigree (2,2,2,4,2)
  (same comment as for steel, low-alloyed)
  properties: wet mass 1 kg, carbon content, fossil 0.75, dry mass 1 kg
  note on carbon content, fossil: Lubricating oil is produced from diesel. C-content/dry mass of fats and oils considered 75%, from: ecoinvent v2.2 report, n 15a, pg 40
- wastewater from ground granulated blast furnace slag production: 0 m3; name wastewater; pedigree (1,1,1,1,1)
  (same comment as for steel, low-alloyed)
  production volume 0 m3; = apv_GGBFS*(wastewater/(GGBFS))
    Calculated from production volume of reference product using the relative outputs.
  property price 0 EUR2005; name wastewater_price_EUR2005
  properties: carbon content, fossil 0.027074, water content 2225.48, dry mass 0.449139 kg, wet mass 1000 kg
  note on carbon content, fossil: TOC =0.01216 kg/m3 (Tab A.20, ecoinvent v2.2 report 13_I). TOC was considered as Total Carbon.
- solvent, organic: 0 kg; name solvent; source Marceau M. 2003, p. 5; pedigree (1,1,1,1,1)
  (same comment as for steel, low-alloyed)
  properties: dry mass 1 kg, carbon content, fossil 0.63072, wet mass 1 kg
  note on carbon content, fossil: Mixture of 15 of the most often used solvents (list in ecoinvent v2.2 report 11-III, pg 293). C content was calculated as an unweighted average of C content of the different solvents
- light fuel oil: 0 kg; name fuel_oil; source Marceau M. 2003, p. 6; pedigree (1,1,1,1,1)
  Weighted average data from 3 manufacturing units
  properties: dry mass 1 kg, carbon content, fossil 0.862, wet mass 1 kg
- heat, district or industrial, other than natural gas: 0 MJ; = 11.66/0.04325; pedigree (1,1,1,1,1)
  Weighted average data from 3 manufacturing units
  properties: corresponding fuel use, propane, furnace >100kW 1.05263 MJ
  note on corresponding fuel use, propane, furnace >100kW: Lower heating value of the fuel input related to the heat/electricity output, taken directly from ecoinvent v3.0 dataset "heat production, natural gas, at industrial furnace >100kW, GLO 2000".
- cement factory: 0 unit; source European Commission (EC) 2011; pedigree (1,1,1,1,1)
  (same comment as for steel, low-alloyed)
- electricity, medium voltage: 0.000420657 kWh; source Marceau M. 2003, p. 6; lognormal variance with pedigree 0.002, pedigree (2,3,2,1,1)
  Weighted average data from 3 manufacturing units
- blast furnace gas: -0.0664581 MJ; lognormal variance with pedigree 0.0284, pedigree (3,3,2,1,2)
  Based on data received from integrated steel plants in India. This value corresponds to the net output. 0.45 MJ of BF gas is used as input and 4.79 MJ of BF gas is generated as output. So the net BF gas of 4.34 MJ is entered as byproduct.
  production volume 2.54771e11 MJ
- diesel: 5.33701e-7 kg; lognormal variance with pedigree 0.004, pedigree (3,3,2,1,2)
  Based on data received from integrated steel plants in Inida
- hard coal: 1.4533e-11 kg; lognormal variance with pedigree 0.004, pedigree (3,3,2,1,2)
  Based on data received from integrated steel plants in India
- iron pellet: 0.00359692 kg; lognormal variance with pedigree 0.004, pedigree (3,3,2,1,2)
  EcoSpold01Location=GLO
  Based on data received from integrated steel plants in India
- oxygen, liquid: 0.00155977 kg; lognormal variance with pedigree 0.004, pedigree (3,3,2,1,2)
  Based on data received from integrated steel plants in India
- coke: 0.21866 MJ; lognormal variance with pedigree 0.004025, pedigree (3,3,2,2,2)
  EcoSpold01Location=RER
  Based on data received from integrated steel plants in India
- dolomite: 0.000294799 kg; lognormal variance with pedigree 0.004, pedigree (3,3,2,1,2)
  Based on data received from integrated steel plants in India
- blast furnace: 2.58695e-13 unit; lognormal variance with pedigree 0.2934, pedigree (3,3,2,1,2)
  Based on ecoinvent dataset " pig iron production, GLO" accessed through ecoeditor on 20170815
  EcoSpold01Location=RER
- wastewater from pig iron production: -6.09659e-6 m3; lognormal variance with pedigree 0.0434, pedigree (3,3,2,1,2)
  It is assumed that 80% of water consumed as input to the process is sent out as wastewater for treatment. The wastewater after treatment is recycled and reused again in the process.
  production volume 3.94015e7 m3
- sinter, iron: 0.00835647 kg; lognormal variance with pedigree 0.004, pedigree (3,3,2,1,2)
  Based on data received from integrated steel plants in India
  EcoSpold01Location=GLO
- iron ore, beneficiated, 65% Fe: 0.00276036 kg; lognormal variance with pedigree 0.004, pedigree (3,3,2,1,2)
  Based on data received from integrated steel plants in India
  EcoSpold01Location=GLO
- steam, in chemical industry: 0.00137756 kg; lognormal variance with pedigree 0.004, pedigree (3,3,2,1,2)
  Based on data received from integrated steel plants in India
- nitrogen, liquid: 0.000854178 kg; lognormal variance with pedigree 0.004, pedigree (3,3,2,1,2)
  Based on data received from integrated steel plants in India
- limestone, unprocessed: 2.42519e-5 kg; lognormal variance with pedigree 0.043825, pedigree (3,3,5,2,2)
  EcoSpold01Location=CH
  Based on data received from integrated steel plants in India
- sponge iron: 0.000128835 kg; lognormal variance with pedigree 0.004, pedigree (3,3,2,1,2)
  Based on data received from integrated steel plants in Inida
- sludge, pig iron production: -0.00281577 kg; lognormal variance with pedigree 0.3034, pedigree (3,3,2,1,2)
  Based on data received from integrated steel plants in India
  EcoSpold01Location=CH
  production volume 1.81979e10 kg
- blast furnace slag: -0.00783919 kg; lognormal variance with pedigree 0.0284, pedigree (3,3,2,1,2)
  Based on data received from integrated steel plants in India
  production volume 2.36573e10 kg
- heat, district or industrial, other than natural gas: 0.00143449 MJ; lognormal variance with pedigree 0.004, pedigree (3,3,2,1,2)
  Based on data received from integrated steel plants in India
- lime: 0.000379819 kg; lognormal variance with pedigree 0.004, pedigree (3,3,2,1,2)
  Based on data received from integrated steel plants in India
- calcium carbide, technical grade: 3.14699e-5 kg; lognormal variance with pedigree 0.0094, pedigree (3,3,2,1,2)
  Based on data received from integrated steel plants in India
- copper: 7.27256e-5 kg; lognormal variance with pedigree 0.004, pedigree (3,3,2,1,2)
  Based on data received from integrated steel plants in India
- basic oxygen furnace waste: -0.000753085 kg; lognormal variance with pedigree 0.043225, pedigree (3,3,5,2,2)
  Based on data received from integrated steel plants in India
  EcoSpold01Location=CH
  production volume 3.57267e9 kg
- ferromanganese, high-coal, 74.5% Mn: 0.000128773 kg; lognormal variance with pedigree 0.004, pedigree (3,3,2,1,2)
  Based on data received from integrated steel plants in India
- dust, unalloyed electric arc furnace steel: -1.29943e-5 kg; lognormal variance with pedigree 0.004, pedigree (3,3,2,1,2)
  Based on ecoinvent dataset for steel production, converter, lowalloyed, GLO
  EcoSpold01Location=CH
  production volume 4.11264e7 kg
- manganese: 3.35487e-6 kg; lognormal variance with pedigree 0.004, pedigree (3,3,2,1,2)
  Based on data received from integrated steel plants in India
- blast oxygen furnace converter: 1.63061e-13 unit; lognormal variance with pedigree 0.2934, pedigree (3,3,2,1,2)
  EcoSpold01Location=RER
  Based on ecoinvent dataset for steel production, converter, unalloyed, GLO
- liquefied petroleum gas: 1.74992e-6 kg; lognormal variance with pedigree 0.004, pedigree (3,3,2,1,2)
  Based on data received from integrated steel plants in India
- pig iron: 0.00605674 kg; lognormal variance with pedigree 0.0034, pedigree (3,3,2,1,2)
  EcoSpold01Location=GLO
  Based on data received from integrated steel plants in India
- ferrosilicon: 1.25688e-6 kg; lognormal variance with pedigree 0.004, pedigree (3,3,2,1,2)
  Based on data received from integrated steel plants in India
- propane: 2.06684e-6 kg; lognormal variance with pedigree 0.004, pedigree (3,3,2,1,2)
  Based on data received from integrated steel plants in India
- iron scrap, sorted, pressed: 0.0017144 kg; lognormal variance with pedigree 0.004, pedigree (3,3,2,1,2)
  Based on data received from integrated steel plants in India
- wastewater, average: -5.39828e-5 m3; lognormal variance with pedigree 0.0434, pedigree (3,3,2,1,2)
  (same comment as for wastewater from pig iron production)
  production volume 2.13664e7 m3
- nickel, 99.5%: 4.898e-7 kg; lognormal variance with pedigree 0.004, pedigree (3,3,2,1,2)
  Based on data received from integrated steel plants in India
- aluminium, wrought alloy: 0.000108938 kg; lognormal variance with pedigree 0.004, pedigree (3,3,2,1,2)
  Based on data received from integrated steel plants in India
- argon, liquid: 1.93025e-5 kg; lognormal variance with pedigree 0.004, pedigree (3,3,2,1,2)
  Based on data received from integrated steel plants in India
- electrode, negative, Ni: 8.5669e-7 kg; lognormal variance with pedigree 0.004, pedigree (3,3,2,1,2)
  Based on data received from integrated steel plants in India
- tap water: 0.0562586 kg; lognormal variance with pedigree 0.0033, pedigree (2,2,3,1,1)
  Measured value. Represents tap water used for process and auxiliairies. Also includes water used for cleaning tanks which is disposed as hazadous wastes. Does not include closed-loop process water.
- heat, district or industrial, natural gas: 0.00403324 MJ; lognormal variance with pedigree 0.0026, pedigree (1,1,3,1,1)
  Calculated value. Based on primary data for process and heating of facility.
  Uncertainty: Calculated variable. Uncertainty will be determined from propagation of uncertainty factors of underlying variables.
- diesel, burned in diesel-electric generating set, 10MW: 2.49082e-5 MJ; lognormal variance with pedigree 0.0026, pedigree (1,1,3,1,1)
  Calculated value. Based on primary data for onsite treatement of wastewater.
  Uncertainty: Calculated variable. Uncertainty will be determined from propagation of uncertainty factors of underlying variables.
- sodium hydroxide, without water, in 50% solution state: 6.64392e-6 kg; lognormal variance with pedigree 0.0033, pedigree (2,2,3,1,1)
  Measured value. Chemical input for insitu wastewater treatment. Based on total water used in process. Note that around 45% of total water used in the process is treated, cooled and reused in closed loop.
- aluminium casting facility: 4.38741e-15 unit; lognormal variance with pedigree 0.0847, pedigree (5,4,3,3,4)
  Estimated value. Taken directly from ecoivent v.2.2 "aluminium, secondary" dataset. The land use, the machinery and buildings for an aluminium casting facility. The process used represents a facility with annual production of 130000 ton/yr for 50 yrs. The production levels were set according to the reference flow.
- waste mineral oil: -9.4674e-5 kg; lognormal variance with pedigree 0.0026, pedigree (1,1,3,1,1)
  Calculated value. Waste oil which includes oil separated from oily wastewater.
  Uncertainty: Calculated variable. Uncertainty will be determined from propagation of uncertainty factors of underlying variables.
- aluminium, primary, ingot: 0.000366173 kg; lognormal variance with pedigree 0.0052, pedigree (2,4,3,1,1)
  Calculated value. Based on reported content of primary aluminium from cold slabs in final product, aluminium losses in slag and internal aluminium recycling (remelting of internal scrap in closed loop).
- silver: 3.02871e-8 kg; lognormal variance with pedigree 0.0033, pedigree (2,2,3,1,1)
  Measured value. Input of metals as alloy additives for the given reference flow.
- magnesium: 2.20041e-7 kg; lognormal variance with pedigree 0.0033, pedigree (2,2,3,1,1)
  Measured value. Input of metals as alloy additives for the given reference flow.
- electricity, medium voltage: 0.0095622 kWh; lognormal variance with pedigree 0.0026, pedigree (1,1,3,1,1)
  Calculated value. Electricity requirements for process and auxiliairies (heating, maintenance of furnace when no production, etc.) and for wastewater treatment.
  Uncertainty: Calculated variable. Uncertainty will be determined from propagation of uncertainty factors of underlying variables.
- hazardous waste, for underground deposit: -2.03053e-5 kg; lognormal variance with pedigree 0.0026, pedigree (1,1,3,1,1)
  Measured value. Represents many types of hazardous wastes that are send to secure landfill. Wastes includes oil, fluoridric acid contamined solids, oil contaminated solids, disposal of HF contaminated rinsing water and "liquides pauvres" (no translation was found).
- potassium hydroxide: 1.57137e-7 kg; lognormal variance with pedigree 0.002, pedigree (1,1,3,1,1)
  Potassium hydroxide used in alkaline solution. Calculated value (see Exchange Properties).
  Uncertainty: Calculated variable. Uncertainty will be determined from propagation of uncertainty factors of underlying variables. Uncertainty of actual relation between variables not accounted at this time, although this could be included in a future update.
- soap: 2.6122e-5 kg; lognormal variance with pedigree 0.002, pedigree (1,1,3,1,1)
  EcoSpold01Location=RER
  Soap used in alkaline solution and used as proxy for extrusion lubricant (calcium stearate surfactants). Calculated value (see Exchange Properties).
  Uncertainty: Calculated variable. Uncertainty will be determined from propagation of uncertainty factors of underlying variables. Uncertainty of actual relation between variables not accounted at this time, although this could be included in a future update.
- steel, unalloyed: 0.00277633 kg; lognormal variance with pedigree 0.002, pedigree (1,1,3,1,1)
  Reported as 9.5 mm diameter carbon steel cast alloy rods. Calculated value (see Parameters).
  Uncertainty: Calculated variable. Uncertainty will be determined from propagation of uncertainty factors of underlying variables. Uncertainty of actual relation between variables not accounted at this time, although this could be included in a future update.
- sawnwood, softwood, raw, dried (u=20%): 3.92353e-7 m3; lognormal variance with pedigree 0.002, pedigree (1,1,3,1,1)
  Reported as coils for primary packaging. Calculated value (see Exchange Properties).
  Uncertainty: Calculated variable. Uncertainty will be determined from propagation of uncertainty factors of underlying variables. Uncertainty of actual relation between variables not accounted at this time, although this could be included in a future update.
- propane, burned in building machine: 3.0859e-7 MJ; lognormal variance with pedigree 0.002, pedigree (1,1,3,1,1)
  Reported as for forklift truck. Calculated value (see Exchange Properties).
  Uncertainty: Calculated variable. Uncertainty will be determined from propagation of uncertainty factors of underlying variables. Uncertainty of actual relation between variables not accounted at this time, although this could be included in a future update.
- rolling mill: 6.8753e-11 unit; lognormal variance with pedigree 0.52, pedigree (5,5,5,5,5)
  Proxy. Value taken directly from ecoinvent v3.0 dataset "wire drawing, steel, GLO 2002".
  Uncertainty: No data collected. The uncertainty has been maximized.
- chemical, inorganic: 3.84309e-7 kg; lognormal variance with pedigree 0.002, pedigree (1,1,3,1,1)
  Represents an input of chemical reported as inorganic chemicals and an input of tetrapotassium pyrophosphate (K4P2O7, NAS 7320-34-5) used in alkaline solution, calculated based on the solution concentration (see Exchange Properties).
  Uncertainty: Calculated variable. Uncertainty will be determined from propagation of uncertainty factors of underlying variables. Uncertainty of actual relation between variables not accounted at this time, although this could be included in a future update.
- sodium sulfate, anhydrite: 1.41541e-6 kg; lognormal variance with pedigree 0.0032, pedigree (2,1,3,1,1)
  Calculated value. Per meter value (in kg) calculated from per kg data for 3.67 mm diameter wire (assumed to be diameter or mass independent) from data providing manufacturing company.
- aluminium scrap, new: -0.000122379 kg; lognormal variance with pedigree 0.002, pedigree (1,1,3,1,1)
  Reported as new aluminium scrap, generated during co-extrusion of aluminium over steel core. Plus aluminium part of scrap (off-specifications) bi-metal wire. Calculated value (see Parameters).
  Uncertainty: Calculated variable. Uncertainty will be determined from propagation of uncertainty factors of underlying variables. Uncertainty of actual relation between variables not accounted at this time, although this could be included in a future update.
  production volume 51469.3 kg
- water, deionised: 9.73593e-6 kg; lognormal variance with pedigree 0.002, pedigree (1,1,3,1,1)
  Water used in alkaline solution. Calculated value (see Exchange Properties).
  Uncertainty: Calculated variable. Uncertainty will be determined from propagation of uncertainty factors of underlying variables. Uncertainty of actual relation between variables not accounted at this time, although this could be included in a future update.
- tetraethyl orthosilicate: 9.10104e-5 kg; lognormal variance with pedigree 0.0052, pedigree (2,4,3,1,1)
  Proxy. Reported as hydrolyzed ethyl silicate. Measured value.
- inert waste, for final disposal: -0.000762543 kg; lognormal variance with pedigree 0.0052, pedigree (2,4,3,1,1)
  Measured value. Includes waste ceramic mold (4.4359 kg), water based ceramic paste (1.3406 kg), aluminium oxide from sand blasting (0.1221 kg) and crucible (0.0402 kg, estimate based on silicon carbide crucible).
  production volume 4.63229e6 kg
- propylene glycol, liquid: 1.02708e-6 kg; lognormal variance with pedigree 0.0052, pedigree (2,4,3,1,1)
  Proxy. Represents polyakylene glycol fraction of chemical quencher. Measured value.
- carbon black: 8.9539e-7 kg; lognormal variance with pedigree 0.0052, pedigree (2,4,3,1,1)
  Proxy. Reported as activated carbon used for water treatment. Measured value.
- heat, district or industrial, natural gas: 0.0133855 MJ; lognormal variance with pedigree 0.002, pedigree (1,1,3,1,1)
  EcoSpold01Location=RER
  Calculated value. Reported as volume. Used for heating molds prior to casting
  Uncertainty: Calculated variable. Uncertainty will be determined from propagation of uncertainty factors of underlying variables.
- silicon carbide: 3.60248e-6 kg; lognormal variance with pedigree 0.0052, pedigree (2,4,3,1,1)
  Measured value. Reported as silicon carbide crucibles.
- methyl ethyl ketone: 9.47047e-8 kg; lognormal variance with pedigree 0.0052, pedigree (2,4,3,1,1)
  Measured value. Used as paint cleaner.
- zircon, 50% zirconium: 3.07147e-5 kg; lognormal variance with pedigree 0.0052, pedigree (2,4,3,1,1)
  Measured value. Reported as zircon flour or crude zirconium silicate. Used in ceramic mold.
- wax, lost-wax casting: 4.94466e-5 kg; lognormal variance with pedigree 0.0052, pedigree (2,4,3,1,1)
  Measured value. Includes different types of molding wax.
- nitric acid, without water, in 50% solution state: 5.64991e-6 kg; lognormal variance with pedigree 0.0052, pedigree (2,4,3,1,1)
  Measured value. Reported value from waste inventory (from occasionally discharged basin), input assumed equivalent to output. Assumption verified by data provider.
- waste x-ray film: -6.50019e-6 kg; lognormal variance with pedigree 0.0052, pedigree (2,4,3,1,1)
  Measured value. Used X-ray films (sold for silver content).
  production volume 56625 kg
- waste paint on metal: -3.5299e-7 kg; lognormal variance with pedigree 0.0052, pedigree (2,4,3,1,1)
  Measured value. Used paint containers.
  production volume 3075 kg
- scrap steel: -0.000389006 kg; lognormal variance with pedigree 0.0052, pedigree (2,4,3,1,1)
  Measured value. Steel from waste propane cylinders (sent to recycling).
  production volume 1000 kg
- silica sand: 0.000142779 kg; lognormal variance with pedigree 0.0052, pedigree (2,4,3,1,1)
  Measured value. Silica sand is used in molding.
- steel, low-alloyed, hot rolled: 0.000286777 kg; lognormal variance with pedigree 0.002, pedigree (1,1,3,1,1)
  Calculated value. From waste inventory.
  Uncertainty: Calculated variable. Uncertainty will be determined from propagation of uncertainty factors of underlying variables.
- titanium dioxide: 2.9736e-6 kg; lognormal variance with pedigree 0.0052, pedigree (2,4,3,1,1)
  Measured value. Represents component of an ingredient used for mold production.
- spent solvent mixture: -8.31468e-5 kg; lognormal variance with pedigree 0.0052, pedigree (2,4,3,1,1)
  Proxy. Represents hazardous waste: solvent based degreasing agent, refractory paste, deoxidizer agent and spent nitric acid sent to treatment (0.0631 kg). Measured value.
  production volume 724316 kg
- waste emulsion paint, separated: -5.73968e-8 kg; lognormal variance with pedigree 0.0052, pedigree (2,4,3,1,1)
  Measured value. Used filters from air filtration treatment used for epoxy paint vapor.
  production volume 500 kg
- ammonia, liquid: 2.37162e-6 kg; lognormal variance with pedigree 0.0052, pedigree (2,4,3,1,1)
  Measured value. Reported as ammonia anhydrous refrigerated grade.
- hazardous waste, for incineration: -5.0756e-5 kg; lognormal variance with pedigree 0.0052, pedigree (2,4,3,1,1)
  Measured value. Includes several hazardous waste types: sorbing agent with oil, degreasing agent, spent filtration media, green soluble wax and aerosol.
  production volume 442150 kg
- sulfuric acid: 1.32454e-6 kg; lognormal variance with pedigree 0.002, pedigree (1,1,3,1,1)
  Calculated value. Based on measured solution volume used, reported concentration 66 Bé which correspond to 96% (w/w). Mass of water is included in deionised water flow.
  Uncertainty: Calculated variable. Uncertainty will be determined from propagation of uncertainty factors of underlying variables.
- kaolin: 0.000109948 kg; lognormal variance with pedigree 0.0052, pedigree (2,4,3,1,1)
  Proxy. Reported as flour calcined China clay used for mold production. Measured value.
- fly ash and scrubber sludge: -1.15844e-5 kg; lognormal variance with pedigree 0.0052, pedigree (2,4,3,1,1)
  Measured value. Represents sludge from oil separator.
  production volume 100915 kg
- ethoxylated alcohol (AE7): 1.38523e-6 kg; lognormal variance with pedigree 0.0052, pedigree (2,4,3,1,1)
  Proxy. Represents ethoxyl alcohols (C6-C10 and C12-C15) and secondary alcohol ethoxylate fraction of chemical penetrant used for non-destructive testing. Measured value.
- isopropanol: 3.50098e-5 kg; lognormal variance with pedigree 0.0052, pedigree (2,4,3,1,1)
  Measured Value. Used in mold production.
- clay: 4.6853e-6 kg; lognormal variance with pedigree 0.0052, pedigree (2,4,3,1,1)
  Proxy. Reported as clay flocculent, a mix of clay, inorganic salt, and organic polymer. Measured value.
- polyethylene terephthalate, granulate, amorphous: 6.98168e-6 kg; lognormal variance with pedigree 0.002, pedigree (1,1,3,1,1)
  Proxy. Represents x-ray film used for non-destructive testing, PET is the mainly constituant of x-ray film. Calculated value
  Uncertainty: Calculated variable. Uncertainty will be determined from propagation of uncertainty factors of underlying variables.
- aluminium oxide, non-metallurgical: 0.000124555 kg; lognormal variance with pedigree 0.0052, pedigree (2,4,3,1,1)
  Measured Value. Include aluminium oxide used for molding (0.9963 kg) and sand blasting (0.1221 kg) and fused white alumina used for molding (0.2663 kg).
- sodium nitrite: 4.10834e-8 kg; lognormal variance with pedigree 0.0052, pedigree (2,4,3,1,1)
  Proxy. Represents sodium nitrile fraction of chemical quencher. Measured value.
- printed wiring board, for through-hole mounting, Pb free surface: 6.35263e-7 m2; lognormal variance with pedigree 0.0058, pedigree (1,4,3,4,2)
  This dataset is based on direct information from the Swiss manufacturer Brusa.
- printed wiring board, for through-hole mounting, Pb containing surface: 5.31777e-7 m2; lognormal variance with pedigree 0.0058, pedigree (1,4,3,4,2)
  This dataset is based on direct information from the Swiss manufacturer Brusa.
- heat, central or small-scale, other than natural gas: 0.00166563 MJ; source F. Habermacher 2011; lognormal variance with pedigree 0.0058, pedigree (1,4,3,4,2)
  This dataset is based on direct information from the Swiss manufacturer Brusa.
- selective coat, aluminium sheet, nickel pigmented aluminium oxide: 7.27451e-9 m2; source F. Habermacher 2011; lognormal variance with pedigree 0.0058, pedigree (1,4,3,4,2)
  This dataset is based on direct information from the Swiss manufacturer Brusa.
- wire drawing, copper: 3.47342e-5 kg; source F. Habermacher 2011; lognormal variance with pedigree 0.0058, pedigree (1,4,3,4,2)
  This dataset is based on direct information from the Swiss manufacturer Brusa.
- sheet rolling, steel: 0.000309146 kg; source F. Habermacher 2011; lognormal variance with pedigree 0.0058, pedigree (1,4,3,4,2)
  This dataset is based on direct information from the Swiss manufacturer Brusa.
- capacitor, film type, for through-hole mounting: 3.67036e-6 kg; source F. Habermacher 2011; lognormal variance with pedigree 0.0058, pedigree (1,4,3,4,2)
  This dataset is based on direct information from the Swiss manufacturer Brusa.
- sheet rolling, aluminium: 5.3045e-5 kg; source F. Habermacher 2011; lognormal variance with pedigree 0.0058, pedigree (1,4,3,4,2)
  This dataset is based on direct information from the Swiss manufacturer Brusa.
- polystyrene, high impact: 8.94921e-7 kg; source F. Habermacher 2011; lognormal variance with pedigree 0.0058, pedigree (1,4,3,4,2)
  This dataset is based on direct information from the Swiss manufacturer Brusa.
- steel, chromium steel 18/8, hot rolled: 0.000299444 kg; source F. Habermacher 2011; lognormal variance with pedigree 0.0058, pedigree (1,4,3,4,2)
  This dataset is based on direct information from the Swiss manufacturer Brusa.
- electricity, low voltage: 6.16999e-7 kWh; source F. Habermacher 2011; lognormal variance with pedigree 0.0058, pedigree (1,4,3,4,2)
  This dataset is based on direct information from the Swiss manufacturer Brusa.
- ferrite: 4.21612e-6 kg; source F. Habermacher 2011; lognormal variance with pedigree 0.0058, pedigree (1,4,3,4,2)
  This dataset is based on direct information from the Swiss manufacturer Brusa.
- resistor, auxilliaries and energy use: 8.44996e-7 kg; source F. Habermacher 2011; lognormal variance with pedigree 0.0058, pedigree (1,4,3,4,2)
  This dataset is based on direct information from the Swiss manufacturer Brusa.
- zinc coat, coils: 4.11624e-8 m2; source F. Habermacher 2011; lognormal variance with pedigree 0.0058, pedigree (1,4,3,4,2)
  This dataset is based on direct information from the Swiss manufacturer Brusa.
- printed wiring board, surface mounted, unspecified, Pb free: 4.39292e-6 kg; source F. Habermacher 2011; lognormal variance with pedigree 0.0058, pedigree (1,4,3,4,2)
  This dataset is based on direct information from the Swiss manufacturer Brusa.
- aluminium scrap, new: -6.87683e-6 kg; source F. Habermacher 2011; lognormal variance with pedigree 0.0064, pedigree (2,4,3,4,2)
  Total alumiunium scrap from production process.
  production volume 6415.2 kg
- silicone product: 5.3393e-6, 1.08114e-5 kg (2 suppliers, which the file names only by identifier); sum of these 1.61507e-5 kg; source F. Habermacher 2011; lognormal variance with pedigree 0.0058, pedigree (1,4,3,4,2)
  This dataset is based on direct information from the Swiss manufacturer Brusa.
- brass: 1.13387e-8, 2.25641e-6 kg (2 suppliers, which the file names only by identifier); sum of these 2.26775e-6 kg; source F. Habermacher 2011; lognormal variance with pedigree 0.0058, pedigree (1,4,3,4,2)
  This dataset is based on direct information from the Swiss manufacturer Brusa.
- waste plastic, industrial electronics: -2.26034e-8, -1.49618e-6 kg (2 suppliers, which the file names only by identifier); sum of these -1.51878e-6 kg; source F. Habermacher 2011; lognormal variance with pedigree 0.0064, pedigree (2,4,3,4,2)
  Total plastic scrap from production process.
  production volume 137.7 kg
- aluminium oxide, non-metallurgical: 9.65617e-8 kg; source F. Habermacher 2011; lognormal variance with pedigree 0.0058, pedigree (1,4,3,4,2)
  This dataset is based on direct information from the Swiss manufacturer Brusa.
- polyester resin, unsaturated: 1.46875e-7, 1.09272e-6 kg (2 suppliers, which the file names only by identifier); sum of these 1.2396e-6 kg; source F. Habermacher 2011; lognormal variance with pedigree 0.0058, pedigree (1,4,3,4,2)
  This dataset is based on direct information from the Swiss manufacturer Brusa.
- resistor, metal film type, through-hole mounting: 1.23467e-7 kg; lognormal variance with pedigree 0.0064, pedigree (2,4,3,4,2)
  Based on the direct inspection of a commercial device.
- transformer, low voltage use: 3.64264e-7 kg; lognormal variance with pedigree 0.0064, pedigree (2,4,3,4,2)
  Based on the direct inspection of a commercial device.
- integrated circuit, logic type: 5.09668e-8 kg; lognormal variance with pedigree 0.0064, pedigree (2,4,3,4,2)
  Based on the direct inspection of a commercial device.
- transistor, auxilliaries and energy use: 1.07926e-6 kg; lognormal variance with pedigree 0.0064, pedigree (2,4,3,4,2)
  Based on the direct inspection of a commercial device.
- transformer, high voltage use: 3.38451e-6 kg; lognormal variance with pedigree 0.0064, pedigree (2,4,3,4,2)
  Based on the direct inspection of a commercial device.
- fan, for power supply unit, desktop computer: 5.41521e-7 kg; lognormal variance with pedigree 0.0064, pedigree (2,4,3,4,2)
  Based on the direct inspection of a commercial device.
- transistor, surface-mounted: 1.00667e-7 kg; lognormal variance with pedigree 0.0064, pedigree (2,4,3,4,2)
  Based on the direct inspection of a commercial device.
- transistor, wired, small size, through-hole mounting: 1.87227e-8 kg; lognormal variance with pedigree 0.0064, pedigree (2,4,3,4,2)
  Based on the direct inspection of a commercial device.
- aluminium, cast alloy: 0.000255837 kg; lognormal variance with pedigree 0.0138, pedigree (2,4,3,4,3)
  Based on the direct inspection of a commercial device.
- diode, glass-, for through-hole mounting: 3.34907e-8 kg; lognormal variance with pedigree 0.0064, pedigree (2,4,3,4,2)
  Based on the direct inspection of a commercial device.
- plug, inlet and outlet, for computer cable: 2.0307e-5 unit; lognormal variance with pedigree 0.0064, pedigree (2,4,3,4,2)
  Based on the direct inspection of a commercial device.
- cable, printer cable, without plugs: 1.3538e-6 m; lognormal variance with pedigree 0.0064, pedigree (2,4,3,4,2)
  Based on the direct inspection of a commercial device.
- metal working, average for aluminium product manufacturing: 1.16054e-5 kg; lognormal variance with pedigree 0.0152, pedigree (3,4,3,4,3)
  Own assumption.
- switch, toggle type: 1.0695e-7 kg; lognormal variance with pedigree 0.0064, pedigree (2,4,3,4,2)
  Based on the direct inspection of a commercial device.
- inductor, auxilliaries and energy use: 2.24582e-6 kg; lognormal variance with pedigree 0.0064, pedigree (2,4,3,4,2)
  Based on the direct inspection of a commercial device.
- liquid crystal display, unmounted: 6.76901e-8 kg; lognormal variance with pedigree 0.0064, pedigree (2,4,3,4,2)
  Based on the direct inspection of a commercial device.
- mounting, through-hole technology, Pb-free solder: 3.55226e-7 m2; lognormal variance with pedigree 0.0064, pedigree (2,4,3,4,2)
  Based on the direct inspection of a commercial device.
- printed wiring board, through-hole mounted, unspecified, Pb free: 2.5174e-7 kg; lognormal variance with pedigree 0.0064, pedigree (2,4,3,4,2)
  Based on the direct inspection of a commercial device.
- inductor, miniature radio frequency chip: 1.13719e-10 kg; lognormal variance with pedigree 0.0064, pedigree (2,4,3,4,2)
  Based on the direct inspection of a commercial device.
- capacitor, electrolyte type, < 2cm height: 6.98562e-8 kg; lognormal variance with pedigree 0.0064, pedigree (2,4,3,4,2)
  Based on the direct inspection of a commercial device.
- potentiometer, unspecified: 8.2582e-8 kg; lognormal variance with pedigree 0.0064, pedigree (2,4,3,4,2)
  Based on the direct inspection of a commercial device.
- diode, auxilliaries and energy use: 3.65639e-8 kg; lognormal variance with pedigree 0.0064, pedigree (2,4,3,4,2)
  Based on the direct inspection of a commercial device.
- capacitor, auxilliaries and energy use: 6.39792e-6 kg; lognormal variance with pedigree 0.0064, pedigree (2,4,3,4,2)
  Based on the direct inspection of a commercial device.
- resistor, surface-mounted: 4.72888e-7 kg; lognormal variance with pedigree 0.0064, pedigree (2,4,3,4,2)
  Based on the direct inspection of a commercial device.
- cable, connector for computer, without plugs: 2.80914e-5 m; lognormal variance with pedigree 0.0064, pedigree (2,4,3,4,2)
  Based on the direct inspection of a commercial device.
- polyethylene, high density, granulate: 0.000142503 kg; lognormal variance with pedigree 0.0064, pedigree (2,4,3,4,2)
  Based on the direct inspection of a commercial device.
- inductor, ring core choke type: 2.24571e-6 kg; lognormal variance with pedigree 0.0064, pedigree (2,4,3,4,2)
  Based on the direct inspection of a commercial device.
- capacitor, for surface-mounting: 3.0636e-8 kg; lognormal variance with pedigree 0.0064, pedigree (2,4,3,4,2)
  Based on the direct inspection of a commercial device.
- light emitting diode: 4.16045e-8 kg; lognormal variance with pedigree 0.0064, pedigree (2,4,3,4,2)
  Based on the direct inspection of a commercial device.
- transistor, wired, big size, through-hole mounting: 8.58311e-8 kg; lognormal variance with pedigree 0.0064, pedigree (2,4,3,4,2)
  Based on the direct inspection of a commercial device.
- plug, inlet and outlet, for network cable: 3.04606e-5 unit; lognormal variance with pedigree 0.0064, pedigree (2,4,3,4,2)
  Based on the direct inspection of a commercial device.
- capacitor, electrolyte type, > 2cm height: 5.43889e-6 kg; lognormal variance with pedigree 0.0064, pedigree (2,4,3,4,2)
  Based on the direct inspection of a commercial device.
- synthetic rubber: 3.1132e-5 kg; lognormal variance with pedigree 0.0064, pedigree (2,4,3,4,2)
  Based on the direct inspection of a commercial device.
- resistor, wirewound, through-hole mounting: 4.83581e-8 kg; lognormal variance with pedigree 0.0064, pedigree (2,4,3,4,2)
  Based on the direct inspection of a commercial device.
- cable, ribbon cable, 20-pin, with plugs: 9.67163e-7 kg; lognormal variance with pedigree 0.0064, pedigree (2,4,3,4,2)
  Based on the direct inspection of a commercial device.
- insulated gate bipolar transistor, electric vehicle application: 1.18961e-5 kg; lognormal variance with pedigree 0.0064, pedigree (2,4,3,4,2)
  Based on the direct inspection of a commercial device.
- heat, district or industrial, natural gas: 0.00168492 MJ; lognormal variance with pedigree 0.0138, pedigree (2,4,3,4,3)
  Own estimate, based on values from automotive industry.
- polyphenylene sulfide: 2.78124e-5 kg; lognormal variance with pedigree 0.0064, pedigree (2,4,3,4,2)
  Based on the direct inspection of a commercial device.
- permanent magnet, for electric motor: 1.70898e-6 kg
- electricity, medium voltage: 0.00158459 kWh; lognormal variance with pedigree 0.0138, pedigree (2,4,3,4,3)
  Own estimate, based on values from automotive industry.
- copper scrap, sorted, pressed: -1.31352e-6 kg; lognormal variance with pedigree 0.0138, pedigree (2,4,3,4,3)
  Production scrap. Own estimate, based on values from automotive industry.
  production volume 157500 kg
- nylon 6: 3.4301e-7, 6.94551e-7 kg (2 suppliers, which the file names only by identifier); sum of these 1.03756e-6 kg; source F. Habermacher 2011; lognormal variance with pedigree 0.0972, pedigree (4,5,5,4,4)
  This dataset is based on direct information from the Swiss manufacturer Brusa.
- used glider, from electric scooter: -0.00033601 kg
  production volume 6.213e7 kg
- polyvinylchloride, suspension polymerised: 4.33253e-6 kg; source M. Leuenberger 2010; lognormal variance with pedigree 0.0466, pedigree (4,3,4,5,3)
  15% of passenger car
  EcoSpold01Location=RER
  Uncertainty: 15% of passenger car
- reinforcing steel: 0.000436938 kg; source M. Leuenberger 2010; lognormal variance with pedigree 0.0466, pedigree (4,3,4,5,3)
  5% of passenger car
  EcoSpold01Location=RER
  Uncertainty: 5% of passenger car
- polypropylene, granulate: 4.74009e-5 kg; source M. Leuenberger 2010; lognormal variance with pedigree 0.0466, pedigree (4,3,4,5,3)
  15% of passenger car
  EcoSpold01Location=RER
  Uncertainty: 15% of passenger car
- chromium: 6.74498e-7 kg; source M. Leuenberger 2010; lognormal variance with pedigree 0.1306, pedigree (4,3,5,5,4)
  Weight ratio scooter:passenger car
  EcoSpold01Location=RER
  Uncertainty: weight ratio scooter:passenger car
- road vehicle factory: 2.27668e-13 unit; source M. Leuenberger 2010; lognormal variance with pedigree 0.4306, pedigree (4,3,5,5,4)
  EcoSpold01Location=RER
  Weight ratio scooter:passenger car
  Uncertainty: weight ratio scooter:passenger car
- injection moulding: 7.72888e-5 kg; source M. Leuenberger 2010; lognormal variance with pedigree 0.1306, pedigree (4,3,5,5,4)
  All HDPE
  EcoSpold01Location=RER
  Uncertainty: All HDPE
- heat, district or industrial, other than natural gas: 4.76204e-5 MJ; source M. Leuenberger 2010; lognormal variance with pedigree 0.0366, pedigree (4,3,4,5,3)
  50% of Environmental report Honda, 2008
  EcoSpold01Location=RER
  Uncertainty: 50% of Environmental report Honda, 2008
- tap water: 0.00251904 kg; source M. Leuenberger 2010; lognormal variance with pedigree 0.1306, pedigree (4,3,5,5,4)
  (same comment as for chromium)
- section bar rolling, steel: 0.000281476 kg; source M. Leuenberger 2010; lognormal variance with pedigree 0.1306, pedigree (4,3,5,5,4)
  (same comment as for chromium)
- zinc: 2.09553e-6 kg; source M. Leuenberger 2010; lognormal variance with pedigree 0.1306, pedigree (4,3,5,5,4)
  (same comment as for chromium)
- alkyd paint, white, without solvent, in 60% solution state: 3.04022e-7, 1.44323e-6 kg (2 suppliers, which the file names only by identifier); sum of these 1.74725e-6 kg; source M. Leuenberger 2010; lognormal variance with pedigree 0.1306, pedigree (4,3,5,5,4)
  (same comment as for road vehicle factory)
- ethylene, average: 1.78142e-6, 5.39735e-8, 3.36394e-6 kg (3 suppliers, which the file names only by identifier); sum of these 5.19933e-6 kg; source M. Leuenberger 2010; lognormal variance with pedigree 0.1306, pedigree (4,3,5,5,4)
  (same comment as for chromium)
- printed wiring board, mounted mainboard, desktop computer, Pb free: 6.55547e-7 kg; source F. Habermacher 2011; lognormal variance with pedigree 0.0424, pedigree (1,3,5,4,2)
  Materialization based on average from literature values.
- acrylonitrile-butadiene-styrene copolymer: 1.44448e-6 kg; source F. Habermacher 2011; lognormal variance with pedigree 0.0424, pedigree (1,3,5,4,2)
  Materialization based on average from literature values.
- fibre, viscose: 5.69175e-6 kg; source F. Habermacher 2011; lognormal variance with pedigree 0.0424, pedigree (1,3,5,4,2)
  Materialization based on average from literature values.
- tempering, flat glass: 1.03491e-5 kg; source F. Habermacher 2011; lognormal variance with pedigree 0.0424, pedigree (1,3,5,4,2)
  Materialization based on average from literature values.
- lead: 2.07423e-5 kg; source F. Habermacher 2011; lognormal variance with pedigree 0.0424, pedigree (1,3,5,4,2)
  Materialization based on average from literature values.
- glass fibre reinforced plastic, polyester resin, hand lay-up: 1.37892e-7 kg; source F. Habermacher 2011; lognormal variance with pedigree 0.0424, pedigree (1,3,5,4,2)
  Materialization based on average from literature values.
- polyethylene, low density, granulate: 4.85485e-6 kg; source F. Habermacher 2011; lognormal variance with pedigree 0.0424, pedigree (1,3,5,4,2)
  Materialization based on average from literature values.
- used glider, passenger car: -0.000258598 kg; source F. Habermacher 2011
  Materialization based on average from literature values.
  production volume 4.8e10 kg
- flat glass, uncoated: 1.76723e-6, 8.58187e-6 kg (2 suppliers, which the file names only by identifier); sum of these 1.03491e-5 kg; source F. Habermacher 2011; lognormal variance with pedigree 0.0424, pedigree (1,3,5,4,2)
  Materialization based on average from literature values.
- coating powder: 1.25415e-6, 2.53949e-6 kg (2 suppliers, which the file names only by identifier); sum of these 3.79364e-6 kg; source F. Habermacher 2011; lognormal variance with pedigree 0.0424, pedigree (1,3,5,4,2)
  Materialization based on average from literature values.
- lubricating oil: 1.9586e-6 kg; source F. Habermacher 2011; lognormal variance with pedigree 0.0424, pedigree (1,3,5,4,2)
  Materialization based on average from literature values.
- epoxy resin, liquid: 6.60093e-7, 3.13354e-6 kg (2 suppliers, which the file names only by identifier); sum of these 3.79364e-6 kg; source F. Habermacher 2011; lognormal variance with pedigree 0.0424, pedigree (1,3,5,4,2)
  Materialization based on average from literature values.
- polyurethane, flexible foam: 1.57255e-6, 7.46508e-6 kg (2 suppliers, which the file names only by identifier); sum of these 9.03762e-6 kg; source F. Habermacher 2011; lognormal variance with pedigree 0.0424, pedigree (1,3,5,4,2)
  Materialization based on average from literature values.
- tin: 1.85582e-6 kg; lognormal variance with pedigree 0.0444, pedigree (2,4,5,4,2)
  Based on the direct inspection of a commercial device.
- epoxy resin insulator, Al2O3: 6.21241e-5 kg; lognormal variance with pedigree 0.0444, pedigree (2,4,5,4,2)
  Based on the direct inspection of a commercial device.
- silicon, electronics grade: 1.65579e-5 kg; lognormal variance with pedigree 0.0444, pedigree (2,4,5,4,2)
  Based on the direct inspection of a commercial device.
- used internal combustion engine, from passenger car: -0.000271393 kg; source H.-J. Althaus 2010
  production volume 1.65e10 kg
- platinum: 1.57901e-9 kg; source H.-J. Althaus 2010; lognormal variance with pedigree 0.0444, pedigree (2,4,5,4,2)
  Based on a Volkswagen Golf A4 materialization.
- palladium: 2.96065e-10 kg; source H.-J. Althaus 2010; lognormal variance with pedigree 0.0444, pedigree (2,4,5,4,2)
  Based on a Volkswagen Golf A4 materialization.
- sulfuric acid: 1.46354e-7 kg; source H.-J. Althaus 2010; lognormal variance with pedigree 0.0444, pedigree (2,4,5,4,2)
  Based on a Volkswagen Golf A4 materialization.
- waste plastic, mixture: -7.73928e-6, -5.96653e-7, -2.46439e-7, -2.34017e-7, -8.92977e-6, -9.95586e-8, -4.51239e-8, -6.25433e-5 kg (8 suppliers, which the file names only by identifier); sum of these -8.04341e-5 kg; source H.-J. Althaus 2010; lognormal variance with pedigree 0.0444, pedigree (2,4,5,4,2)
  Scrap fraction from production process.
  production volume 2.34e8 kg
- sheet rolling, chromium steel: 0.000289851 kg; source Stiesdal H. 2001; lognormal variance with pedigree 0.0406, pedigree (1,1,5,1,1)
  EcoSpold01Location=RER
  Estimation. Construction efforts for the whole amount of chromium steel used.
- polyvinylchloride, bulk polymerised: 3.47564e-6 kg; source Scholzen F. 1991; lognormal variance with pedigree 0.36, pedigree (1,1,5,1,1)
  EcoSpold01Location=RER
  Estimation. PVC is used in the electronical system.
- cast iron: 0.000140823 kg; source Stiesdal H. 2001; lognormal variance with pedigree 0.06, pedigree (1,1,5,1,1)
  Estimation. For the hub of the rotor 11'320 kg of cast iron is estimated. For the gear 9139 kg, the main bearing 1025 kg, for the generator 3382 kg and for the transformator 1500 kg of cast iron is used.
  Further references:
  Scholzen (1991): Oekobilanz von Windenergie am Beispiel einer 30 kW-Anlage auf dem Simplon. Semesterarbeit am Laboratorium für Energiesysteme, ETH Zürich.
  EcoSpold01Location=RER
- glass fibre reinforced plastic, polyamide, injection moulded: 0.000215489 kg; source Stiesdal H. 2001; lognormal variance with pedigree 0.05, pedigree (1,1,5,1,1)
  EcoSpold01Location=RER
  Estimation. The rotor blades have a total weight of 29'714 kg and are made of glass fibre reinforced plastic. For the cover of the nacelle 11'294 kg of glass fibre reinforced plastic are estimated.
- waste polyvinylchloride: -3.34547e-7, -2.57916e-8, -1.06529e-8, -1.01159e-8, -3.86009e-7, -4.30363e-9, -1.95058e-9, -2.70227e-6 kg (8 suppliers, which the file names only by identifier); sum of these -3.47564e-6 kg; lognormal variance with pedigree 0.0406, pedigree (1,1,5,1,1)
  EcoSpold01Location=CH
  Estimation. PVC used for the electrical cabinet is disposed in the municipial waste incineration. After 20 years of service reuse is hardly possible. The assumption of a complete disposal in the municipial waste incineration reflects a conservative position.
  production volume 1050 kg
- scrap copper: -5.39197e-6, -2.52979e-7, -1.13533e-5 kg (3 suppliers, which the file names only by identifier); sum of these -1.69982e-5 kg
  Estimation. It is assumed that 100% of that material is recycled.
  production volume 278250 kg
- scrap steel: -0.000125223, -1.58313e-7 kg (2 suppliers, which the file names only by identifier); sum of these -0.000125381 kg; lognormal variance with pedigree 0.0406, pedigree (1,1,5,1,1)
  Estimation. It is assumed that 100% of that material is recycled.
  production volume 1.64325e7 kg
- waste polyethylene: -4.84686e-7, -3.73665e-8, -1.54337e-8, -1.46557e-8, -5.59243e-7, -6.23503e-9, -2.82596e-9, -3.91501e-6 kg (8 suppliers, which the file names only by identifier); sum of these -5.03546e-6 kg; lognormal variance with pedigree 0.0406, pedigree (1,1,5,1,1)
  EcoSpold01Location=CH
  Estimation. PE out of the cable tube is disposed in the municipial waste incineration. After 20 years of service reuse is hardly possible. The assumption of a complete disposal in the municipial waste incineration reflects a conservative position.
  production volume 4725 kg
- waste mineral oil: -1.08922e-6, -2.52034e-8 kg (2 suppliers, which the file names only by identifier); sum of these -1.11442e-6 kg; lognormal variance with pedigree 0.0406, pedigree (1,1,5,1,1)
  EcoSpold01Location=CH
  Estimation. 100% of the oil from hydraulics is disposed after use.
  production volume 201250 kg
- waste glass: -2.13225e-5, -1.0346e-6, -9.65263e-8, -4.3192e-7, -1.12251e-5, -1.46581e-7, -2.34715e-8, -0.000105792 kg (8 suppliers, which the file names only by identifier); sum of these -0.000140073 kg; lognormal variance with pedigree 0.06, pedigree (1,1,5,1,1)
  EcoSpold01Location=CH
  Calculated value. Rotor blades and nacelle cover are disposed in the municipial waste incinerator as it is not possible to seperate the components of glass fibre reinforced plastic. Per kg of glass fiber reinforced plastic 0.65 kg waste is estimated (41'000 kg * 0.65 kg = 26'650 kg) (recommended by Gabor Doka, 28.7.2003).
  production volume 4.66375e6 kg
- waste polypropylene: -1.5327e-8, -1.18162e-9, -4.88051e-10, -4.6345e-10, -1.76846e-8, -1.97167e-10, -8.93639e-11, -1.23802e-7 kg (8 suppliers, which the file names only by identifier); sum of these -1.59233e-7 kg; lognormal variance with pedigree 0.0406, pedigree (1,1,5,1,1)
  EcoSpold01Location=CH
  Estimation. PP used for the electrical cabinet is disposed in the municipial waste incineration. After 20 years of service reuse is hardly possible. The assumption of a complete disposal in the municipial waste incineration reflects a conservative position.
  production volume 2.05763e6 kg
- copper sulfate: 5.32453e-7 kg; lognormal variance with pedigree 0.0026, pedigree (1,1,3,1,1)
  Measured value.
- foaming agent: 7.67941e-8 kg; lognormal variance with pedigree 0.002, pedigree (1,1,3,1,1)
  Measured value. Reported in litres as foaming agent (saponin).
  Uncertainty: Calculated variable. Uncertainty will be determined from propagation of uncertainty factors of underlying variables. Uncertainty of actual relation between variables not accounted for at this time, although this could be included in a future update.
- quicklime, milled, loose: 0.000123591 kg; lognormal variance with pedigree 0.0026, pedigree (1,1,3,1,1)
  Measured value. Quicklime is hydrated on site.
- strontium carbonate: 3.0182e-6 kg; lognormal variance with pedigree 0.0026, pedigree (1,1,3,1,1)
  Measured value.
- copper cake: -2.39565e-5 kg; lognormal variance with pedigree 0.0026, pedigree (1,1,3,1,1)
  Measured Value. Proxy created to estimate the treatment of the copper cake.
  production volume 2.40305e6 kg
- ammonium chloride: 1.65173e-6 kg; lognormal variance with pedigree 0.0026, pedigree (1,1,3,1,1)
  Measured value.
- sodium silicate, without water, in 37% solution state: 6.61997e-8 kg; lognormal variance with pedigree 0.002, pedigree (1,1,3,1,1)
  Measured value. Reported as 38% solution. Amount as been multiplied by concentration in order to have the active ingredient only.
  Uncertainty: Calculated variable. Uncertainty will be determined from propagation of uncertainty factors of underlying variables. Uncertainty of actual relation between variables not accounted for at this time, although this could be included in a future update.
- urea, as N: 5.12155e-8 kg; lognormal variance with pedigree 0.002, pedigree (1,1,3,1,1)
  Measured value.
  Uncertainty: Calculated variable. Uncertainty will be determined from propagation of uncertainty factors of underlying variables. Uncertainty of actual relation between variables not accounted for at this time, although this could be included in a future update.
- soda ash, dense: 0.000102944 kg; lognormal variance with pedigree 0.0026, pedigree (1,1,3,1,1)
  Measured value. Reported as sodium carbonate. Assumed to be dense soda ash.
- perlite: 2.36491e-7 kg; lognormal variance with pedigree 0.0026, pedigree (1,1,3,1,1)
  Measured value.
- diesel, burned in building machine: 0.000118993 MJ; lognormal variance with pedigree 0.002, pedigree (1,1,3,1,1)
  EcoSpold01Location=GLO
  Measured value. Reported in m³.
  Uncertainty: Calculated variable. Uncertainty will be determined from propagation of uncertainty factors of underlying variables. Uncertainty of actual relation between variables not accounted for at this time, although this could be included in a future update.
- zinc concentrate: 0.00523785 kg; lognormal variance with pedigree 0.008, pedigree (1,1,3,1,1)
  EcoSpold01Location=GLO
  Measured value.
- electricity, high voltage: 0.0122698 kWh; lognormal variance with pedigree 0.0026, pedigree (1,1,3,1,1)
  Measured value. Reported in kWh at 120 kV. According to following document, high voltage is between 44 kV and 315 kV in Quebec region: http://www.hydroquebec.com/transenergie/fr/commerce/pdf/characteristics-and-target-values-of-voltage.pdf
- retention aid, for paper production: 1.79647e-6 kg; lognormal variance with pedigree 0.0026, pedigree (1,1,3,1,1)
  Proxy, reported as "flocculants (polyacrilamide)". Measured value.
- heat, central or small-scale, other than natural gas: 1.37521e-5 MJ; lognormal variance with pedigree 0.002, pedigree (1,1,3,1,1)
  Calculated value based on reported fuel input (in m³), the Net Heating Value of the fuel and assumed efficiency (1/Fuel_use).
  Uncertainty: Calculated variable. Uncertainty will be determined from propagation of uncertainty factors of underlying variables. Uncertainty of actual relation between variables not accounted for at this time, although this could be included in a future update.
- transport, passenger car, large size, petrol, EURO 3: 2.49809e-6 km; lognormal variance with pedigree 0.2906, pedigree (2,5,5,5,5)
  Calculated value. Reported as liters of petrol used in pickup trucks (1.031E-4 liter/kg). Conversion using : 0,081237 kg/km (taken directly from ecoinvent v3.0 dataset "transport, passenger car, large size, petrol, EURO 3, GLO") and 0.75 kg/l (taken from Table 5.1 of the data quality guideline).
- heat, district or industrial, other than natural gas: 2.09518e-5 MJ; lognormal variance with pedigree 0.002, pedigree (1,1,3,1,1)
  (same comment as for heat, central or small-scale, other than natural gas)
- precious metal refinery: 1.99384e-13 unit; lognormal variance with pedigree 0.002, pedigree (1,1,3,1,1)
  Proxy. Estimated value. The service life, surface area covered and annual production volume of the actual plant, 50 years, 30 ha and more than 250 000 t respectively, are very different than the values assumed for the precious metal refinery modeled by the dataset, 25 years, 0,5 ha and 243 t respectively.
  Uncertainty: Calculated variable. Uncertainty will be determined from propagation of uncertainty factors of underlying variables. Uncertainty of actual relation between variables not accounted for at this time, although this could be included in a future update.
- heat, district or industrial, other than natural gas: 0.000599685 MJ; lognormal variance with pedigree 0.002, pedigree (1,1,3,1,1)
  EcoSpold01Location=RER
  Calculated value based on reported fuel input (in m³), the Net Heating Value of the fuel and assumed efficiency (1/Fuel_use).
  Uncertainty: Calculated variable. Uncertainty will be determined from propagation of uncertainty factors of underlying variables. Uncertainty of actual relation between variables not accounted for at this time, although this could be included in a future update.
- municipal solid waste: -9.2516e-6 kg; lognormal variance with pedigree 0.0026, pedigree (1,1,3,1,1)
  Measured value. Reported as household waste.
  production volume 928019 kg
- waste mineral oil: -1.69481e-7 kg; lognormal variance with pedigree 0.0026, pedigree (1,1,3,1,1)
  Measured value. Reported as used oil and grease and sent to an external company. Assumed to be incinerated (expert jugement).
  production volume 17000.5 kg
- sodium hydroxide, without water, in 50% solution state: 1.49071e-6 kg; lognormal variance with pedigree 0.002, pedigree (1,1,3,1,1)
  Measured value. Reported as 50% solution. Amount as been divided in half in order to have the active ingredient only.
  Uncertainty: Calculated variable. Uncertainty will be determined from propagation of uncertainty factors of underlying variables. Uncertainty of actual relation between variables not accounted for at this time, although this could be included in a future update.
- waste paper, unsorted: -2.39249e-7 kg; lognormal variance with pedigree 0.0026, pedigree (1,1,3,1,1)
  Measured value. Reported as cardboard/paper to recycling.
  production volume 23998.9 kg
- section bar extrusion, aluminium: 3.18894e-7 kg; lognormal variance with pedigree 0.002, pedigree (1,1,3,1,1)
  Measured value. Proxy for the production of the copper bars (anodes and equipotentials).
  Uncertainty: Calculated variable. Uncertainty will be determined from propagation of uncertainty factors of underlying variables. Uncertainty of actual relation between variables not accounted for at this time, although this could be included in a future update.
- hydrogen peroxide, without water, in 50% solution state: 1.44212e-8 kg; lognormal variance with pedigree 0.002, pedigree (1,1,3,1,1)
  Measured value. Reported as 50% solution. Amount as been multiplied by concentration in order to have the active ingredient only.
  Uncertainty: Calculated variable. Uncertainty will be determined from propagation of uncertainty factors of underlying variables. Uncertainty of actual relation between variables not accounted for at this time, although this could be included in a future update.
- potassium permanganate: 1.18626e-7 kg; lognormal variance with pedigree 0.0026, pedigree (1,1,3,1,1)
  Measured value.
- waste wood, untreated: -1.14634e-7 kg; lognormal variance with pedigree 0.0026, pedigree (1,1,3,1,1)
  Measured value. Reported as wood to recycling.
  production volume 11498.8 kg
- pyridine: 6.82969e-7 kg; lognormal variance with pedigree 0.0026, pedigree (1,1,3,1,1)
  Measured value. Reported as cyclic amine (confidential).
- sodium dithionite, anhydrous: 2.70035e-6 kg; lognormal variance with pedigree 0.0026, pedigree (1,1,3,1,1)
  Measured value.
- hydrogen, liquid: 1.20544e-5 kg; lognormal variance with pedigree 0.0026, pedigree (1,1,3,1,1)
  Reported as gaseous hydrogen in m³.
  The amount of hydrogen liquid in kg obtained by calculating the number of moles with the ideal gas law at SPT and converting this amount with the molar mass of hydrogen (2 g/mol).
- hot rolling, steel: 1.69364e-5 kg; lognormal variance with pedigree 0.002, pedigree (1,1,3,1,1)
  Measured value. Proxy for anodes production. Includes the amount of new metal and metal in the recycled anodes.
  Uncertainty: Calculated variable. Uncertainty will be determined from propagation of uncertainty factors of underlying variables. Uncertainty of actual relation between variables not accounted for at this time, although this could be included in a future update.
- cement, Portland: 0.000192545 kg; lognormal variance with pedigree 0.0026, pedigree (1,1,3,1,1)
  Measured value. Reported as Portland cement type10.
- manganese dioxide: 6.79817e-6 kg; lognormal variance with pedigree 0.0026, pedigree (1,1,3,1,1)
  Measured value.
- sodium sulfide: 9.41972e-7 kg; lognormal variance with pedigree 0.0026, pedigree (1,1,3,1,1)
  Measured value.
- iron pellet: 0.00412778 kg; lognormal variance with pedigree 0.0401, pedigree (1,2,5,1,1)
  EcoSpold01Location=GLO
- iron ore, beneficiated, 65% Fe: 0.00168518 kg; lognormal variance with pedigree 0.0401, pedigree (1,2,5,1,1)
  EcoSpold01Location=GLO
- sinter, iron: 0.0108354 kg; lognormal variance with pedigree 0.0401, pedigree (1,2,5,1,1)
  EcoSpold01Location=GLO
- refractory, fireclay, packed: 2.06389e-5 kg; lognormal variance with pedigree 0.0402, pedigree (1,2,5,3,1)
  EcoSpold01Location=DE
- limestone, unprocessed: 4.2179e-8, 0.000103152 kg (2 suppliers, which the file names only by identifier); sum of these 0.000103194 kg; lognormal variance with pedigree 0.0402, pedigree (1,2,5,3,1)
  EcoSpold01Location=CH
- sludge, pig iron production: -6.89258e-6, -0.000155378 kg (2 suppliers, which the file names only by identifier); sum of these -0.00016227 kg; lognormal variance with pedigree 0.3413, pedigree (2,3,5,3,1)
  The original value for this exchange was 0.0042553 kg. However, it was recalculated in order to take into account data collected for the geography covering India (IN). The amount from the geography IN has been scaled down based on the annual production volumes of the reference product in the IN and GLO datasets.
  EcoSpold01Location=CH
- hard coal: 6.43326e-5, 0.000106289, 0.000737139, 0.000104156, 2.47155e-5, 0.000155285, 8.10947e-5, 4.52005e-5, 0.000229705 kg (9 suppliers, which the file names only by identifier); sum of these 0.00154792 kg; lognormal variance with pedigree 0.0402, pedigree (1,2,5,3,1)
  EcoSpold01Location=UCTE
- natural gas, high pressure: 3.01397e-8, 5.71326e-7, 9.51096e-7, 4.24475e-6, 7.76555e-6, 1.31088e-6, 4.66806e-6, 1.82094e-5 m3 (8 suppliers, which the file names only by identifier); sum of these 3.77513e-5 m3; lognormal variance with pedigree 0.0402, pedigree (1,2,5,3,1)
  EcoSpold01Location=RER
- inert waste, for final disposal: -1.38468e-6 kg; lognormal variance with pedigree 0.0413, pedigree (2,3,5,3,1)
  EcoSpold01Location=CH
  production volume 2.40078e10 kg
- wastewater from pig iron production: -2.89077e-7, -9.66212e-7 m3 (2 suppliers, which the file names only by identifier); sum of these -1.25529e-6 m3; lognormal variance with pedigree 0.0413, pedigree (2,3,5,3,1)
  EcoSpold01Location=CH
  production volume 1.01374e8 m3
- pig iron: 0.00561516 kg; lognormal variance with pedigree 0.0432, pedigree (2,3,5,5,1)
  EcoSpold01Location=GLO
- molybdenite: 3.72154e-6 kg; lognormal variance with pedigree 0.0512, pedigree (2,5,5,5,1)
  EcoSpold01Location=GLO
- quicklime, in pieces, loose: 0.00026516 kg; lognormal variance with pedigree 0.0432, pedigree (2,3,5,5,1)
  EcoSpold01Location=CH
- ferrochromium, high-carbon, 68% Cr: 0.000204972 kg; lognormal variance with pedigree 0.042, pedigree (1,1,5,5,1)
  EcoSpold01Location=GLO
  composite
- ferronickel, 25% Ni: 0.000280758 kg; lognormal variance with pedigree 0.042, pedigree (1,1,5,5,1)
  EcoSpold01Location=GLO
  composite
- electricity, medium voltage: 4.32575e-6, 7.87104e-7, 1.33481e-5, 2.76983e-5, 9.07508e-5 kWh (5 suppliers, which the file names only by identifier); sum of these 0.00013691 kWh; lognormal variance with pedigree 0.0432, pedigree (2,3,5,5,1)
  EcoSpold01Location=UCTE

## Inputs from nature
- Water, unspecified natural origin [natural resource, in water]: 2.34058e-5 m3; name water_UNO_input; = 0.048+wastewater; source Marceau M. 2003, p. 5; lognormal variance with pedigree 0.0078, pedigree (3,3,3,5,2)
  Weighted average data from 3 manufacturing units. Amount of water associated with blast furnace slag were not known. So here amount of wastewater as byproduct considered as input. This has very high uncertainty.
- Water, unspecified natural origin [natural resource, in ground]: 7.62074e-6 m3; lognormal variance with pedigree 0.0134, pedigree (3,3,2,1,2)
  Based on data received from integrated steel plants in India
- Water, river [natural resource, in water]: 0.000560297 m3; lognormal variance with pedigree 0.0026, pedigree (1,1,3,1,1)
  Measured value. Used as cooling water.
- Occupation, inland waterbody, unspecified [natural resource, land]: 1.04677e-5 m2*year; lognormal variance with pedigree 0.002, pedigree (1,1,3,1,1)
  Calculated Value. Land use of the different ponds : tailings pond, wastewater treatment sludge pond and Jarofix disposal site.
  Uncertainty: Calculated variable. Uncertainty will be determined from propagation of uncertainty factors of underlying variables. Uncertainty of actual relation between variables not accounted for at this time, although this could be included in a future update.
- Transformation, to inland waterbody, unspecified [natural resource, land]: 1.04677e-7 m2; lognormal variance with pedigree 0.002, pedigree (1,1,3,1,1)
  (same comment as for Occupation, inland waterbody, unspecified)
- Transformation, from unspecified [natural resource, land]: 1.04677e-7 m2; lognormal variance with pedigree 0.002, pedigree (1,1,3,1,1)
  (same comment as for Occupation, inland waterbody, unspecified)
- Water, cooling, unspecified natural origin [natural resource, in water]: 7.65109e-5 m3; source Byers, W. 2003; lognormal variance with pedigree 0.052625, pedigree (3,3,5,2,1)
  Calculated based on literature, (Vionnet, S., Quantis Water Database - Technical Report, 2012).

## Emissions to nature
- Water [water, unspecified]: 5.46915e-5 m3; name water_to_water_unspecified; = 0.048*(1-fraction_PW_to_air); lognormal variance with pedigree 0.098025, pedigree (4,4,4,2,4)
  Calculated value based on literature values and expert opinion. See comments in the parametres' comment field.
  property fraction, origin: unspecified 1; name fraction_origin_unspecified_Ww
  property fraction, origin: salt water 0; name fraction_origin_salt_water_Ww
  property fraction, origin: fresh water 0; name fraction_origin_fresh_water_Ww
- Nitrogen oxides [air, unspecified]: 1.70095e-6 kg; lognormal variance with pedigree 0.0499, pedigree (2,2,4,4,2)
  (same comment as for steel, low-alloyed)
- Carbon dioxide, fossil [air, non-urban air or from high stacks]: 3.98749e-5 kg; lognormal variance with pedigree 0.0499, pedigree (2,2,4,4,2)
  (same comment as for steel, low-alloyed)
- Water [air, unspecified]: 5.29789e-5 m3; name water_to_air_unspecified; = 0.048*fraction_PW_to_air; lognormal variance with pedigree 0.098025, pedigree (4,4,4,2,4)
  (same comment as for Water)
  property fraction, origin: unspecified 1; name fraction_origin_unspecified
  property fraction, origin: fresh water 0; name fraction_origin_fresh_water
  property fraction, origin: salt water 0; name fraction_origin_salt_water
- Carbon monoxide, fossil [air, unspecified]: 8.38547e-5 kg; lognormal variance with pedigree 0.0499, pedigree (2,2,4,4,2)
  (same comment as for steel, low-alloyed)
- Particulates, > 2.5 um, and < 10um [air, unspecified]: 3.09607e-8 kg; name part_matter; source Marceau M. 2003, p. 5; lognormal variance with pedigree 0.3035, pedigree (2,2,2,5,2)
  (same comment as for steel, low-alloyed)
- Sulfur dioxide [air, unspecified]: 2.58015e-6 kg; lognormal variance with pedigree 0.0499, pedigree (2,2,4,4,2)
  (same comment as for steel, low-alloyed)
- Nickel [air, unspecified]: 3.09607e-10 kg; lognormal variance with pedigree 0.6534, pedigree (3,3,2,1,2)
  Based on ecoinvent dataset " pig iron production, GLO" accessed through ecoeditor on 20170815
- Lead [air, unspecified]: 7.64007e-9 kg; lognormal variance with pedigree 0.0134, pedigree (3,3,2,1,2)
  (same comment as for Nickel)
- Manganese [air, unspecified]: 8.84396e-9 kg; lognormal variance with pedigree 0.6534, pedigree (3,3,2,1,2)
  (same comment as for Nickel)
- Particulates, < 2.5 um [air, unspecified]: 1.13822e-6 kg; lognormal variance with pedigree 0.3034, pedigree (3,3,2,1,2)
  (same comment as for Nickel)
- Carbon dioxide, fossil [air, unspecified]: 0.011526 kg; lognormal variance with pedigree 0.0434, pedigree (3,3,2,1,2)
  Based on amount and types of fuel inputs and outputs
- Hydrogen sulfide [air, unspecified]: 2.08481e-7 kg; lognormal variance with pedigree 0.0434, pedigree (3,3,2,1,2)
  (same comment as for Nickel)
- Particulates, > 10 um [air, unspecified]: 3.09607e-8 kg; lognormal variance with pedigree 0.0434, pedigree (3,3,2,1,2)
  (same comment as for Nickel)
- Dioxins, measured as 2,3,7,8-tetrachlorodibenzo-p-dioxin [air, unspecified]: 0 kg; pedigree (1,1,1,1,1)
  (same comment as for Nickel)
- PAH, polycyclic aromatic hydrocarbons [air, unspecified]: 1.46759e-12 kg; lognormal variance with pedigree 0.3034, pedigree (3,3,2,1,2)
  Based on ecoinvent dataset for "steel production, converter, lowalloyed, GLO" accessed through ecoeditor on 20170815
- Chromium [air, unspecified]: 2.26253e-9 kg; lognormal variance with pedigree 0.6534, pedigree (3,3,2,1,2)
  (same comment as for PAH, polycyclic aromatic hydrocarbons)
- Copper [air, unspecified]: 3.05748e-10 kg; lognormal variance with pedigree 0.6534, pedigree (3,3,2,1,2)
  (same comment as for PAH, polycyclic aromatic hydrocarbons)
- Water [air, non-urban air or from high stacks]: 8.26736e-7 m3; lognormal variance with pedigree 0.0094, pedigree (3,3,2,1,2)
  Based on the formula given in ecoinvent dataset " pig iron production, GLO" accessed through ecoeditor on 20170815
- Nitrogen [air, unspecified]: 0.000301546 kg; lognormal variance with pedigree 0.002, pedigree (1,1,3,1,1)
  Calculated value. Emission of nitrogen to air calculated from mass balance assuming all of nitrogen input is emitted.
  Uncertainty: Calculated variable. Uncertainty will be determined from propagation of uncertainty factors of underlying variables.
- Propanol [air, urban air close to ground]: 2.20978e-5 kg; lognormal variance with pedigree 0.0052, pedigree (2,4,3,1,1)
  Measured value. Fugitive emission of isopronal.
- Water [air, urban air close to ground]: 5.81333e-6 m3; lognormal variance with pedigree 0.002, pedigree (1,1,3,1,1)
  Calculated value. Amount from water balance. Data provider confirmed that balance of water is evaporated.
  Uncertainty: Calculated variable. Uncertainty will be determined from propagation of uncertainty factors of underlying variables.
- Phosphate [water, surface water]: 2.81047e-10 kg; source M. Leuenberger 2010; lognormal variance with pedigree 0.1306, pedigree (4,3,5,5,4)
  Weight ratio scooter:passenger car
  Uncertainty: weight ratio scooter:passenger car
- BOD5, Biological Oxygen Demand [water, surface water]: 8.2406e-7 kg; source M. Leuenberger 2010; lognormal variance with pedigree 0.1306, pedigree (4,3,5,5,4)
  Weight ratio scooter:passenger car
  Uncertainty: weight ratio scooter:passenger car
- NMVOC, non-methane volatile organic compounds, unspecified origin [air, unspecified]: 3.75533e-6 kg; source M. Leuenberger 2010; lognormal variance with pedigree 0.1306, pedigree (4,3,5,5,4)
  Weight ratio scooter:passenger car
  Uncertainty: weight ratio scooter:passenger car
- TOC, Total Organic Carbon [water, surface water]: 4.99139e-7 kg; source M. Leuenberger 2010; lognormal variance with pedigree 0.1306, pedigree (4,3,5,5,4)
  Calculated by default as TOC (gC) = COD/2.7 (COD measured in g O2). Should more correctly be calculated from the carbon content of the specified emissions to water.
  Uncertainty: weight ratio scooter:passenger car
- DOC, Dissolved Organic Carbon [water, surface water]: 4.99139e-7 kg; source M. Leuenberger 2010; lognormal variance with pedigree 0.1306, pedigree (4,3,5,5,4)
  Calculated as equal to TOC.
  Uncertainty: weight ratio scooter:passenger car
- COD, Chemical Oxygen Demand [water, surface water]: 1.27938e-6 kg; source M. Leuenberger 2010; lognormal variance with pedigree 0.1306, pedigree (4,3,5,5,4)
  Weight ratio scooter:passenger car
  Uncertainty: weight ratio scooter:passenger car
- COD, Chemical Oxygen Demand [water, unspecified]: 9.67571e-8 kg; source F. Habermacher 2011; lognormal variance with pedigree 0.0452, pedigree (1,4,3,4,2)
  Extrapolated from ecoinvent v2.2 passenger car.
- BOD5, Biological Oxygen Demand [water, unspecified]: 1.30333e-8 kg; source F. Habermacher 2011; lognormal variance with pedigree 0.0832, pedigree (1,4,5,4,2)
  Extrapolated from ecoinvent v2.2 passenger car.
- TOC, Total Organic Carbon [water, unspecified]: 3.58359e-8 kg; lognormal variance with pedigree 0.0452, pedigree (1,4,3,4,2)
  Derived from COD as described in ecoinvent 3 Data Quality Guidelines (p. 49, paragraph 5.9.7). The same Pedigree matrix value as COD has been used.
- DOC, Dissolved Organic Carbon [water, unspecified]: 3.58359e-8 kg; lognormal variance with pedigree 0.0452, pedigree (1,4,3,4,2)
  (same comment as for TOC, Total Organic Carbon)
- Phosphate [water, unspecified]: 5.01296e-10 kg; source F. Habermacher 2011; lognormal variance with pedigree 0.0441, pedigree (1,4,3,3,1)
  Extrapolated from ecoinvent v2.2 passenger car.
- Copper, ion [water, surface water]: 1.83141e-9 kg; lognormal variance with pedigree 0.652, pedigree (1,1,3,1,1)
  Measured value.
- Cadmium [air, non-urban air or from high stacks]: 1.21516e-9 kg; lognormal variance with pedigree 0.652, pedigree (1,1,3,1,1)
  Measured value.
- Dioxins, measured as 2,3,7,8-tetrachlorodibenzo-p-dioxin [air, non-urban air or from high stacks]: 0 kg; pedigree (1,1,1,1,1)
  Measured value. Reported as Dioxins.
- Arsenic, ion [water, surface water]: 8.24554e-11 kg; lognormal variance with pedigree 0.652, pedigree (1,1,3,1,1)
  Measured value.
- Nitrogen oxides [air, non-urban air or from high stacks]: 4.18975e-7 kg; lognormal variance with pedigree 0.042, pedigree (1,1,3,1,1)
  Measured value. Reported as NO2.
- Copper [air, non-urban air or from high stacks]: 2.02369e-9 kg; lognormal variance with pedigree 0.652, pedigree (1,1,3,1,1)
  Measured value.
- Sulfur dioxide [air, non-urban air or from high stacks]: 5.32191e-5 kg; lognormal variance with pedigree 0.0026, pedigree (1,1,3,1,1)
  Measured value.
- Zinc, ion [water, surface water]: 2.56324e-8 kg; lognormal variance with pedigree 0.652, pedigree (1,1,3,1,1)
  Measured value.
- Carbon monoxide, fossil [air, non-urban air or from high stacks]: 1.54404e-7 kg; lognormal variance with pedigree 0.652, pedigree (1,1,3,1,1)
  Measured value.
- Sulfuric acid [air, non-urban air or from high stacks]: 5.44274e-7 kg; lognormal variance with pedigree 0.042, pedigree (1,1,3,1,1)
  Measured value.
- Fluoride [water, surface water]: 7.82788e-8 kg; source Xiao X. 2003; lognormal variance with pedigree 0.108, pedigree (1,5,5,5,3)
  Proxy. Taken directly from the ecoinvent v3.0 datatset "primary zinc production from concentrate, GLO 2003". The uncertainty has been adjusted accordingly
- Selenium [water, surface water]: 3.82988e-9 kg; lognormal variance with pedigree 0.652, pedigree (1,1,3,1,1)
  Measured value.
- Particulates, < 2.5 um [air, non-urban air or from high stacks]: 5.58721e-7 kg; lognormal variance with pedigree 0.302, pedigree (1,1,3,1,1)
  Measured value.
- Water [water, surface water]: 0.000552453 m3; lognormal variance with pedigree 0.002, pedigree (1,1,3,1,1)
  Estimation by data provider.
  Uncertainty: Calculated variable. Uncertainty will be determined from propagation of uncertainty factors of underlying variables. Uncertainty of actual relation between variables not accounted for at this time, although this could be included in a future update.
- Particulates, > 2.5 um, and < 10um [air, non-urban air or from high stacks]: 8.54499e-8 kg; lognormal variance with pedigree 0.122, pedigree (1,1,3,1,1)
  Measured value.
- Mercury [water, surface water]: 1.68825e-11 kg; lognormal variance with pedigree 0.652, pedigree (1,1,3,1,1)
  Measured value.
- Zinc [air, non-urban air or from high stacks]: 2.18944e-7 kg; lognormal variance with pedigree 0.652, pedigree (1,1,3,1,1)
  Measured value.
- Mercury [air, non-urban air or from high stacks]: 2.315e-10 kg; lognormal variance with pedigree 0.652, pedigree (1,1,3,1,1)
  Measured value.
- Cadmium, ion [water, surface water]: 3.63287e-10 kg; lognormal variance with pedigree 0.652, pedigree (1,1,3,1,1)
  Measured value.
- Particulates, > 10 um [air, non-urban air or from high stacks]: 8.16936e-8 kg; lognormal variance with pedigree 0.042, pedigree (1,1,3,1,1)
  Measured value.
- Lead [air, non-urban air or from high stacks]: 1.83482e-9 kg; lognormal variance with pedigree 0.652, pedigree (1,1,3,1,1)
  Measured value.
- Arsenic [air, non-urban air or from high stacks]: 2.38277e-10 kg; lognormal variance with pedigree 0.652, pedigree (1,1,3,1,1)
  Measured value.
- Lead [water, surface water]: 1.49728e-9 kg; lognormal variance with pedigree 0.652, pedigree (1,1,3,1,1)
  Measured value.

## Sampling procedure
Detailed questionnaire prepared and shared with respective units. Data obtained from units were analyzed and reviewed with industrial experts.

## Extrapolations
Some parameters were referred from ground granulated blast furnace slag global dataset (accessed 20170823) and uncertainity adjusted accordingly.

## Review by Bruno Peuportier 2017-10-27
OK, the water balance has been corrected
