# petroleum and gas production, off-shore

Dataset: EcoSpold 2, unit process
Geography: NL
Time period: 2000-01-01 to 2019-12-31
Technology level: current
Classification: ISIC rev.4 ecoinvent: 0610:Extraction of crude petroleum
Classification: EcoSpold01Categories: natural gas/production
Tags: Combined Production; combined production
Scenario: Business-as-Usual
System model: Allocation at the point of substitution
Share of production covered: 73 %
Generated by: Mireille Faist Emmenegger (obsolete)
Published in: Faist Emmenegger, M. 2007
Database: ecoinvent
isCopyrightProtected: true
accessRestrictedTo: 1

## General comment
According to Frischknecht et al. 1996, Tab. V.3.3 as well as other sources (mail from Dutch gas company) the ethane is ca. half of the weight of the higher hydrocarbons (C3+). The multioutput-process 'combined offshore gas and oil production' delivers the co-products 'natural gas' and 'crude oil'.

## Included activities end
exploration and production of oil and gas on the Continental Shelf (offshore). Data doesn't include combusted fuels for turbines, motors etc. It includes well testing (fuel requirements and emissions).

## Geography
Can be extrapolated for North Sea offshore production

## Technology
Emissions and discharges from the offshore combined production in the Netherlands (Continental Shelf). The part of oil production is however small (about 2% of total in both on- and offshore production). No information on technology.

## Time period
Production from NAM decreased in the last years. No average is calculated.

## Parameters
- fraction, process water, to air: 0.15 dimensionless; name fraction_PW_to_air; lognormal variance with pedigree 0.092025, pedigree (4,4,3,2,4)
  Literature value. In case when no industry/process specific data are available, default evaporation fraction value is used. This value is 15% and is based on literature (Statistics Canada, 2007 & Shaffer, K.H., 2008, Consumptive water use in the Great Lakes Basin, USGS & Shiklomanov, 2003, World Water Resources at the Beginning of the 21st Century) and has been approved by an expert.

## Reference product
- petroleum: 0 kg; CPC 12010: Petroleum oils and oils obtained from bituminous minerals, crude; By-product classification allocatable product
  production volume 0 kg; name petroleum_RP_PV
    kg of petroleum produced in the Netherlands in 2012. Approximated using OECD/IEA statistics (2013), reporting an average production of 51.7 thousand barrels per day in 2012. This includes both crude oil and natural gas liquids and may therefore be overestimated for petroleum production. Converted to kg assuming 1barrel = 158.987 liters, density of 0.88 kg/liter. It is further estimated that 33% are produced off-shore and 67% on-shore and that app. 9% of petroleum is produced in stand alone production activities and the rest is produced in activities where both natural gas and petroleum are produced. Reference(s): OECD/IEA, 2014. ENERGY SUPPLY SECURITY 2014. Part II. Chapter 4: Emergency response systems of individual IEA countries. The Netherlands. Retrieved online from https://www.iea.org/media/freepublications/security/EnergySupplySecurity2014_TheNetherlands.pdf, 31 August 2017.
  property price 0.192 EUR2005; name petroleum_price_EUR2005
    Temporary price data. Calculated as 90% of purchasers price based on: Crude oil prices from U.S. energy information administration_Independent statistics and analysis: Weekly All Countries Spot Price FOB Weighted by Estimated Export Volume (Dollars per Barrel) (http://tonto.eia.doe.gov/dnav/pet/pet_pri_wco_k_w.htm; accessed 06072010). Conversion factors - 0.159 m3/barrel with crude oil density of 853 kg/m3
  property amount in multioutput activity_kg 3.1941e8 kg; name petroleum_amount_MO_kg
  property carbon content 0.85
    carbon content on a dry matter basis (reserved; not for manual entry)
  properties: wet mass 1 kg, dry mass 1 kg, carbon content, fossil 0.85, water content 0, carbon content, non-fossil 0, water in wet mass 0 kg, carbon allocation 0.85 kg
- natural gas, high pressure: 1 m3; name natgas_high; CPC 12020: Natural gas, liquefied or in the gaseous state; By-product classification allocatable product
  EcoSpold01Location=NL
  production volume 6.13145e9 m3; name natural_gas_PV
    m3 of natural gas produced off-shore in co-production with petroleum, in NL in 2012 (BP, 2014). Value converted from BP LHV (1 cubic meter natural gas in (BP, 2014) corresponds to 0.9 kg oil equivalent. 1 kg oil equivalent corresponds to 42 MJ) to ecoinvent standard LHV of 39MJ/m3. (The source does not specify if the cubic meters are standard or norm cubic meters. See 2015, Faist Emmenegger, Mireille, Del Duce, Andrea; Zah, Rainer, Update and extension of the inventory data for energy gases, 3 - SeparatePublication.) It is further estimated that 33% are produced off-shore and 67% on-shore (http://www.gaselectricpartnership.com/HOffshore%20Infield.pdf) and that app. 70% of natural gas is produced in stand alone production activities and the rest is produced in activities where both natural gas and petroleum are produced. Refrence(s): BP (2014). Statistical Review of World Energy, June 2014. Retrieved online from http://www.bp.com/content/dam/bp/excel/energy-economics/statistical-review-2015/bp-statistical-review-of-world-energy-2015-workbook.xlsx, 30 August, 2017
  property amount in multioutput activity_m3 1.39e10 m3; name natgas_high_amount_MO_m3
  property price 0.166 EUR2005
    Temporary price data. Calculated as 90% of purchasers price based on: 2005 price for Europe-27 Import (US$ and kg) in UN Commodity Trade Statistics Database - Natural gas in gaseous state (http://data.un.org/Data.aspx?q=natural+gas&d=ComTrade&f=_l1Code%3a28%3bcmdCode%3a271121; accessed 4 January 2011), using density of natural gas of 0.8 kg/m3 for unit conversion.
  property carbon content 0.588095
    carbon content on a dry matter basis (reserved; not for manual entry)
  property true value 2.3074e9; name natgas_high_true_value
    allocation property applied in "true value" allocation // value calculated from revenue
  properties: carbon content, fossil 0.588095, water content 0, carbon content, non-fossil 0, wet mass 0.84 kg, water in wet mass 0 kg, dry mass 0.84 kg, carbon allocation 0.494 kg

## By-products
- heat, for reuse in municipal waste incineration only: 0 MJ; CPC 17300: Steam and hot water; By-product classification allocatable product; pedigree (1,1,1,1,1)
  Net electricity generated from this waste and used in internal MSWI plant energy redistribution.
  production volume 620319 MJ
  property true value relation 0.1842; name E_th_prod_MSWI_true_value_relation
    property to calculate 'true value' from
  property exergy 0.1842 MJ; name E_th_prod_MSWI_exergy
    This exergy property is based on the exergy content of the product.
  property price 0.0106 EUR2005; name E_th_prod_MSWI_price_EUR2005
    Average European district heat price from Ecoheatcool and Euroheat 2005-2006, Ecoheat Work package 1: The European heat market. Final report. 10.6 EUR/GJ i s the price of district heat. http://www.solarthermalworld.org/files/Ecoheatcool%20WP1%20Web.pdf?download
  property true value 8995.14
    allocation property applied in "true value" allocation // value calculated from true value relation
- electricity, for reuse in municipal waste incineration only: 0 kWh; CPC 17100: Electrical energy; By-product classification allocatable product; pedigree (1,1,1,1,1)
  (same comment as for heat, for reuse in municipal waste incineration only)
  production volume 84325.1 kWh
  property price 0.1 EUR2005; name E_el_prod_MSWI_price_EUR2005
    Estimated to be the same price as in case of electricity, medium voltage.
  property exergy 3.6 MJ; name E_el_prod_MSWI_exergy
    This exergy property is based on the exergy content of the product.
  property true value relation 3.6; name E_el_prod_MSWI_true_value_relation
    property to calculate 'true value' from
  property true value 23898
    (same comment as for heat, for reuse in municipal waste incineration only)
- iron scrap, sorted, pressed: 0 kg; By-product classification Recyclable; CPC 39310: Slag, dross, scalings and other waste from the manufacture of iron or steel; pedigree (1,1,1,1,1)
  Iron scrap recovered from this waste.
  Uncertainty: uncertainty calculated from uncertainty in waste composition, uncertainty of share of recyclable metal, uncertainty of transfer coefficient to bottom ash, uncertainty of the efficiency of scrap removal in MSWI plant.
  production volume 1677.01 kg
  property price 0.175 EUR2005
    Temporary price data. Calculated as 90% of purchasers price based on: 2005 import and export prices (total trades (USD) divided by total weight (kg) in biggest economies of the world: EU27, USA, Brasil, China, India, Japan and Russia) from UN Commodity Trade Statistics Database (http://data.un.org/Explorer.aspxDatabase [Accessed 2011.06.20]). Commodity: Waste or scrap, of cast iron
  property carbon content 0
    carbon content on a dry matter basis (reserved; not for manual entry)
  property true value 643.219
    allocation property applied in "true value" allocation // value calculated from revenue
  properties: dry mass 1 kg, water content 0, carbon content, non-fossil 0, water in wet mass 0 kg, carbon content, fossil 0, wet mass 1 kg, carbon allocation 0 kg
- copper: 0 kg; source Rentz O. 1999; By-product classification allocatable product; CPC 41413: Refined copper and copper alloys, unwrought; master alloys of copper
  Literature value. Copper uses: Before end-use copper is manufactured into semi fabricated products, such as shapes and ingots (known as 'semis'). These manufacturing processes are subdivided into hot working, cold working and, if necessary, process annealing. Few of the semis are ready for use as such. They more typically travel to first-stage manufacturers, who make metal rods, wire, and casting, and then to component manufacturers who produce such things as motors, valves, and insulated cables The components in turn are incorporated by final-stage manufacturers into a variety of finished products - automobiles, commercial buildings, residential housing, and so forth. These uses account for about 79% of the world-wide consumption of copper.
  production volume 16.1324 kg
  property price 5.52 EUR2005
    Literature value (http://www.economist.com/news/business/21576714-mining-industry-has-enriched-chile-its-future-precarious-copper-solution). Average price between 20015 and 2013.
  property carbon content 0
    carbon content on a dry matter basis (reserved; not for manual entry)
  property true value 195.175
    allocation property applied in "true value" allocation // value calculated from revenue
  properties: dry mass 1 kg, water in wet mass 0 kg, wet mass 1 kg, carbon content, non-fossil 0, water content 0, carbon content, fossil 0, carbon allocation 0 kg
- zinc concentrate: 0 kg; CPC 14290: Other non-ferrous metal ores and concentrates (other than uranium or thorium ores and concentrates); By-product classification allocatable product
  Calculated value from the knowledge of the properties of both products.
  production volume 1.28047e-8 kg
  property price 0.38 EUR2005; name ByP_price_EUR2005
    Temporary price data. Calculated as 90% of purchasers price based on: Zinc content in concentrate 53%. Concentrate price per kg Zn 86.5% of refined Zn price (13.5% treatment charges according to CHR Metals Limited 2005: Dynamic cost curves. http://www.minecost.com/dynamic.pdf). 2004 zinc price from USGS (2007) Mineral commodity summaries 2007. <http://minerals.usgs.gov/minerals/pubs/mcs/2007/mcs2007.pdf> [Accessed 25 May 2010]
  property zinc content 0.53; name zinc_C_zinc_concentrate
    Zinc content on a dry matter basis. Value taken from teh "zinc mine operation" /GLO dataset.
  property dry mass 1 kg; name DM_zinc_concentrate
  property carbon content 0
    carbon content on a dry matter basis (reserved; not for manual entry)
  property true value 1.06645e-8
    allocation property applied in "true value" allocation // value calculated from revenue
  properties: wet mass 1 kg, water content 0, carbon content, non-fossil 0, carbon content, fossil 0, water in wet mass 0 kg, carbon allocation 0 kg
- iron scrap, unsorted: 0 kg; source European Aluminium Association 2008; CPC 39310: Slag, dross, scalings and other waste from the manufacture of iron or steel; By-product classification Recyclable; pedigree (1,1,1,1,1)
  production volume 0.236648 kg
  property price 0.149 EUR2005; name ironScrapAmount_price_EUR2005
    Temporary price data. Calculated as 90% of purchasers price based on: estimated at 85% of sorted scrap
  property carbon content 0
    carbon content on a dry matter basis (reserved; not for manual entry)
  property true value 0.0772816
    allocation property applied in "true value" allocation // value calculated from revenue
  properties: water in wet mass 0 kg, water content 0, carbon content, fossil 0, carbon content, non-fossil 0, dry mass 1 kg, wet mass 1 kg, carbon allocation 0 kg
- aluminium oxide, non-metallurgical: 0 kg; source European Aluminium Association 2008; CPC 41432: Alumina (aluminium oxide), except artificial corundum; By-product classification allocatable product; CAS 1344-28-1; pedigree (1,1,1,1,1)
  production volume 14.8914 kg
  property carbon content, non-fossil 0; name C_content_non_fossil
  property price 0.28 EUR2005; name Al2O3Amount_price_EUR2005
    From UN trade database. http://data.un.org/ Import data from the largest economies of the world are used (Brazil, India, USA, China, Japan and EU-27).
  property dry mass 1 kg; name DM
  property water content 0; name water_content
  property wet mass 1 kg; name WM
  property water in wet mass 0 kg; name WWM
  property carbon content, fossil 0; name C_content_fossil
  property carbon content 0
    carbon content on a dry matter basis (reserved; not for manual entry)
  property true value 9.1386
    allocation property applied in "true value" allocation // value calculated from revenue
  properties: carbon allocation 0 kg
- aluminium, cast alloy: 0 kg; source European Aluminium Association 2008; By-product classification allocatable product; CPC 41431: Unwrought aluminium; pedigree (1,1,1,1,1)
  EcoSpold01Location=RER
  production volume 139.201 kg
  property price 1.3 EUR2005; name castAlloyAmount_price_EUR2005
    Temporary price data. Calculated as 90% of purchasers price based on: Source: London Metal Exchange, Aluminium alloy price for 2005
  property carbon content 0
    carbon content on a dry matter basis (reserved; not for manual entry)
  property true value 396.619
    allocation property applied in "true value" allocation // value calculated from revenue
  properties: water in wet mass 0 kg, carbon content, non-fossil 0, water content 0, dry mass 1 kg, carbon content, fossil 0, wet mass 1 kg, carbon allocation 0 kg
- aluminium, wrought alloy: 0 kg; source European Aluminium Association 2008; By-product classification allocatable product; CPC 4153: Semi-finished products of aluminium or aluminium alloys; pedigree (1,1,1,1,1)
  production volume 60.9397 kg
  property price 1.44 EUR2005; name secondaryAluminiumOutput_price_EUR2005
    Estimated based on literature values and expert judgement. Aluminium ccast alloys are about 90% of the price of aluminium wrought alloys.
  property carbon content 0
    carbon content on a dry matter basis (reserved; not for manual entry)
  property true value 192.331
    allocation property applied in "true value" allocation // value calculated from revenue
  properties: wet mass 1 kg, water content 0, carbon content, fossil 0, water in wet mass 0 kg, carbon content, non-fossil 0, dry mass 1 kg, carbon allocation 0 kg

## Inputs from technosphere
- offshore platform, petroleum: 0 unit; name offshore_plattform_petr; = offshore_plattform_petr_amount_MO_unit*(1* petroleum +0* natgas_high *0.84) /(1* 319410000 +0*13900000000 *0.84); pedigree (1,1,1,1,1)
  based on UK platform infrastructure and production
  product.
  EcoSpold01Location=OCE
  Uncertainty: based on UK platform infrastructure and production
  property amount in multioutput activity_unit 0.01632 unit; name offshore_plattform_petr_amount_MO_unit
- waste emulsion paint: -3.75933e-7 kg; name waste_em_paint; = ( waste_em_paint_amount_MO_kg*(0.5* petroleum +0.5* natgas_high *0.84)/(0.5* 319410000 +0.5*13900000000 *0.84))*-1; lognormal variance with pedigree 0.0581, pedigree (1,1,5,3,3)
  EcoSpold01Location=CH
  Norwegian environmental report
  Uncertainty: Norwegian environmental report
  production volume 2384.22 kg; = waste_em_paint*(0.5* petroleum_RP_PV +0.5* natural_gas_PV *0.84)/(0.5* 319410000+0.5*13900000000*0.84)
    Calculated from the production volume of natural gas, high pressure in proportion to the respective output amounts.
  property amount in multioutput activity_kg 5368.5 kg; name waste_em_paint_amount_MO_kg
  property price 0 EUR2005; name waste_em_paint_price_EUR2005
  properties: carbon content, fossil 0.27, wet mass 1 kg, dry mass 1 kg
  note on carbon content, fossil: Tab A.4, ecoinvent v2.2 report 13_I. C content has been calculated after data in the tables, and then referred to 1 kg DM
- waste wood, untreated: -6.06451e-6 kg; name waste_wood; = ( waste_wood_amount_MO_kg*(0.5* petroleum +0.5* natgas_high *0.84)/(0.5* 319410000 +0.5*13900000000 *0.84))*-1; lognormal variance with pedigree 0.0581, pedigree (1,1,5,3,3)
  (same comment as for waste emulsion paint)
  production volume 38461.9 kg; = waste_wood*(0.5* petroleum_RP_PV +0.5* natural_gas_PV *0.84)/(0.5* 319410000+0.5*13900000000*0.84)
    (same comment as for waste emulsion paint)
  property price 0 EUR2005; name waste_wood_price_EUR2005
  property amount in multioutput activity_kg 86604 kg; name waste_wood_amount_MO_kg
  properties: dry mass 0.8 kg, wet mass 1 kg, water content 0.25, carbon content, non-fossil 0.48632
  note on carbon content, non-fossil: Tab A.4, ecoinvent v2.2 report 13_I. C content has been referred to 1 kg DM,
- diesel, burned in diesel-electric generating set, 10MW: 0.00799204 MJ; name diesel_burned; = diesel_burned_amount_MO_MJ*(0.5* petroleum +0.5* natgas_high *0.84)/(0.5* 319410000 +0.5*13900000000 *0.84); lognormal variance with pedigree 0.0581, pedigree (1,2,5,1,3)
  Environmental report for 75% of gas produced in NL
  EcoSpold01Location=GLO
  Uncertainty: Environmental report for 75% of gas produced in NL, standard module
  property amount in multioutput activity_MJ 1.1413e8 MJ; name diesel_burned_amount_MO_MJ
- spent antifreezer liquid: -8.52283e-8 kg; name spent_antifreezer; = ( spent_antifreezer_amount_MO_kg*(0.5* petroleum +0.5* natgas_high *0.84)/(0.5* 319410000 +0.5*13900000000 *0.84))*-1; lognormal variance with pedigree 0.0581, pedigree (1,1,5,3,3)
  Norwegian environmental report
  EcoSpold01Location=CH
  Uncertainty: Norwegian environmental report
  production volume 540.529 kg; = spent_antifreezer*(0.5* petroleum_RP_PV +0.5* natural_gas_PV *0.84)/(0.5* 319410000+0.5*13900000000*0.84)
    (same comment as for waste emulsion paint)
  property price 0 EUR2005; name spent_antifreezer_price_EUR2005
  property amount in multioutput activity_kg 1217.1 kg; name spent_antifreezer_amount_MO_kg
  properties: wet mass 1 kg, water content 1.07469, dry mass 0.482 kg, carbon content, fossil 0.431328
  note on carbon content, fossil: Tab A.7, ecoinvent v2.2 report 13_I. C content has been calculated after data in the tables, and then referred to 1 kg DM
- offshore well, oil/gas: 6.99942e-6 m; name offshore_well; = offshore_well_amount_MO_m*(0.5* petroleum +0.5* natgas_high *0.84)/(0.5* 319410000 +0.5*13900000000 *0.84); lognormal variance with pedigree 0.0581, pedigree (1,2,5,1,3)
  Environmental report for 75% of gas produced in NL
  EcoSpold01Location=OCE
  Uncertainty: Environmental report for 75% of gas produced in NL, standard module
  property amount in multioutput activity_m 99955 m; name offshore_well_amount_MO_m
- ethylene glycol: 2.18515e-5 kg; name ethylene_glycol; = ethylene_glycol_amount_MO_kg*(0.4* petroleum +0.6* natgas_high *0.84)/(0.4* 319410000 +0.6*13900000000 *0.84); lognormal variance with pedigree 0.0401, pedigree (1,2,5,1,1)
  Environmental report for 75% of gas produced in NL
  EcoSpold01Location=RER
  Uncertainty: Environmental report for 75% of gas produced in NL
  property amount in multioutput activity_kg 309280 kg; name ethylene_glycol_amount_MO_kg
  properties: dry mass 1 kg, carbon content, fossil 0.387097, wet mass 1 kg
- chemical, organic: 1.02044e-6 kg; name chem_org; = chem_org_amount_MO_kg*(0.4* petroleum +0.6* natgas_high *0.84)/(0.4* 319410000 +0.6*13900000000 *0.84); lognormal variance with pedigree 0.0401, pedigree (1,2,5,1,1)
  Environmental report for 75% of gas produced in NL
  EcoSpold01Location=GLO
  Uncertainty: Environmental report for 75% of gas produced in NL
  property amount in multioutput activity_kg 14443 kg; name chem_org_amount_MO_kg
  properties: dry mass 1 kg, carbon content, fossil 0.628, wet mass 1 kg
  note on carbon content, fossil: This dataset is an unweighted average of 20 organic substances (listed in Tab 88.1, ecoinvent v2.2 report 8, part II), being part of the top100 chemicals included in this database. The C-content has also been calculated as an unweighted average of the C content of the substances composing this dataset.
- hazardous waste, for underground deposit: -3.76591e-5 kg; name hazwaste; = ( hazwaste_amount_MO_kg*(0.5* petroleum +0.5* natgas_high *0.84)/(0.5* 319410000 +0.5*13900000000 *0.84))*-1; lognormal variance with pedigree 0.0581, pedigree (1,1,5,3,3)
  EcoSpold01Location=DE
  Norwegian environmental report
  Uncertainty: Norwegian environmental report
  production volume 238839 kg; = hazwaste*(0.5* petroleum_RP_PV +0.5* natural_gas_PV *0.84)/(0.5* 319410000+0.5*13900000000*0.84)
    (same comment as for waste emulsion paint)
  property price 0 EUR2005; name hazwaste_price_EUR2005
  property amount in multioutput activity_kg 537790 kg; name hazwaste_amount_MO_kg
  properties: dry mass 1 kg, wet mass 1 kg, carbon content, fossil 0.554667
  note on carbon content, fossil: Tab A.6, ecoinvent v2.2 report 13_I, average hazardous waste composition was used, and referred to 0% water mass. No waste-specific emission are currently inventoried for underground deposits. Accordingly, no waste composition must be specified. For generic, average waste to underground deposit deposition in a 200 liter steel drum without cement solidification is assumed (ecoinvent v2.2 report 13_I).
- municipal solid waste: -2.78436e-5 kg; name MSW; = ( MSW_amount_MO_kg*(0.5* petroleum +0.5* natgas_high *0.84)/(0.5* 319410000 +0.5*13900000000 *0.84))*-1; lognormal variance with pedigree 0.0581, pedigree (1,1,5,3,3)
  (same comment as for spent antifreezer liquid)
  production volume 176588 kg; = MSW*(0.5* petroleum_RP_PV +0.5* natural_gas_PV *0.84)/(0.5* 319410000+0.5*13900000000*0.84)
    (same comment as for waste emulsion paint)
  property amount in multioutput activity_kg 397620 kg; name MSW_amount_MO_kg
  properties: dry mass 0.771 kg, wet mass 1 kg, carbon content, non-fossil 0.261655, water content 0.297017, carbon content, fossil 0.171549
  note on carbon content, non-fossil: MSW composition in tab 4.1, ecoinvent v2.2 report 13_I. C content referred to 1 kg DM
- chemical, inorganic: 1.34071e-6 kg; name chem_inorg; = chem_inorg_amount_MO_kg*(0.5* petroleum +0.5* natgas_high *0.84)/(0.5* 319410000 +0.5*13900000000 *0.84); lognormal variance with pedigree 0.0401, pedigree (1,2,5,1,1)
  EcoSpold01Location=GLO
  Environmental report for 75% of gas produced in NL
  Uncertainty: Environmental report for 75% of gas produced in NL
  property amount in multioutput activity_kg 19146 kg; name chem_inorg_amount_MO_kg
  properties: wet mass 1 kg, dry mass 1 kg, carbon content, fossil 0.003
  note on carbon content, fossil: This dataset is an unweighted average of 20 inorganic substances (listed in Tab 88.1, ecoinvent v2.2 report 8, part II), being part of the top100 chemicals included in this database. The C-content has also been calculated as an unweighted average of the C content of the substances composing this dataset.
- methanol: 3.52353e-5 kg; name CH4O_input; = CH4O_input_amount_MO_kg*(0.4* petroleum +0.6* natgas_high *0.84)/(0.4* 319410000 +0.6*13900000000 *0.84); lognormal variance with pedigree 0.0401, pedigree (1,2,5,1,1)
  Environmental report for 75% of gas produced in NL
  EcoSpold01Location=CH
  Uncertainty: Environmental report for 75% of gas produced in NL
  property amount in multioutput activity_kg 498710 kg; name CH4O_input_amount_MO_kg
  properties: dry mass 1 kg, wet mass 1 kg, carbon content, fossil 0.375
- electricity, medium voltage: 0.0116544 kWh; name electricity_MV; = electricity_MV_amount_MO_kWh*(0.5* petroleum +0.5* natgas_high *0.84)/(0.5* 319410000 +0.5*13900000000 *0.84); lognormal variance with pedigree 0.0581, pedigree (1,2,5,1,3)
  EcoSpold01Location=NL
  Environmental report for 75% of gas produced in NL
  Uncertainty: Environmental report for 75% of gas produced in NL, standard module
  property amount in multioutput activity_kWh 1.6643e8 kWh; name electricity_MV_amount_MO_kWh
- low level radioactive waste: 0 m3; name low_level_waste; = ( low_level_waste_amount_MO_m3*(1* petroleum +0* natgas_high *0.84) /(1* 319410000 +0*13900000000 *0.84))*-1; pedigree (1,1,1,1,1)
  EcoSpold01Location=CH
  Data for GB
  Uncertainty: data for GB
  production volume 28.3082 m3; = low_level_waste*(0.5* petroleum_RP_PV +0.5* natural_gas_PV *0.84)/(0.5* 319410000+0.5*13900000000*0.84)
    (same comment as for waste emulsion paint)
  property price 0 EUR2005; name low_level_waste_price_EUR2005
  property amount in multioutput activity_m3 63.741 m3; name low_level_waste_amount_MO_m3
  properties: wet mass 2500 kg, dry mass 2500 kg
- waste mineral oil: -3.12686e-5 kg; name waste_min_oil; = ( waste_min_oil_amount_MO_kg*(0.5* petroleum +0.5* natgas_high *0.84)/(0.5* 319410000 +0.5*13900000000 *0.84))*-1; lognormal variance with pedigree 0.0581, pedigree (1,1,5,3,3)
  (same comment as for spent antifreezer liquid)
  production volume 198309 kg; = waste_min_oil*(0.5* petroleum_RP_PV +0.5* natural_gas_PV *0.84)/(0.5* 319410000+0.5*13900000000*0.84)
    (same comment as for waste emulsion paint)
  property price 0 EUR2005; name waste_min_oil_price_EUR2005
  property amount in multioutput activity_kg 446530 kg; name waste_min_oil_amount_MO_kg
  properties: carbon content, fossil 0.864444, water content 0.111111, wet mass 1 kg, dry mass 0.9 kg
  note on carbon content, fossil: Tab A.6, ecoinvent v2.2 report 13_I. C content has been calculated after data in the tables, and then referred to 1 kg DM
- sweet gas, burned in gas turbine: 0.161833 MJ; name sweet_gas_burned; = sweet_gas_burned_amount_MO_MJ*(0.5* petroleum +0.5* natgas_high *0.84)/(0.5* 319410000 +0.5*13900000000 *0.84); lognormal variance with pedigree 0.0581, pedigree (1,2,5,1,3)
  Environmental report for 75% of gas produced in NL
  EcoSpold01Location=NO
  Uncertainty: Environmental report for 75% of gas produced in NL, standard module
  property amount in multioutput activity_MJ 2.31106e9 MJ; name sweet_gas_burned_amount_MO_MJ
  properties: dry mass 0.0247059 kg, wet mass 0.0247059 kg, carbon content, fossil 0.589286, heating value, gross 1 MJ
- offshore platform, natural gas: 3.61009e-11 unit; name offshore_plattform_NG; = offshore_plattform_NG_amount_MO_unit*(0* petroleum +1* natgas_high *0.84)/(0* 319410000 +1*13900000000 *0.84); lognormal variance with pedigree 0.4227, pedigree (2,4,5,3,4)
  (same comment as for offshore well, oil/gas)
  property amount in multioutput activity_unit 0.50181 unit; name offshore_plattform_NG_amount_MO_unit

## Inputs from nature
- Gas, natural, in ground [natural resource, in ground]: 1.00118 m3; name gas_ground; = gas_ground_amount_MO_m3*(0.001* petroleum +0.999* natgas_high *0.84)/(0.001* 319410000 +0.999*13900000000 *0.84); lognormal variance with pedigree 0.0401, pedigree (1,2,5,1,1)
  Environmental report for 75% of gas produced in NL
  Uncertainty: Environmental report for 75% of gas produced in NL
  property amount in multioutput activity_m3 1.3917e10 m3; name gas_ground_amount_MO_m3
- Water, salt, ocean [natural resource, in water]: 1.16239e-6 m3; name water_salt_ocean_input; = water_salt_ocean_input_amount_MO_m3*(0.99* petroleum +0.01* natgas_high *0.84)/(0.99* 319410000 +0.01*13900000000 *0.84); lognormal variance with pedigree 0.0407, pedigree (2,2,5,1,1)
  (same comment as for Gas, natural, in ground)
  property amount in multioutput activity_m3 59916 m3; name water_salt_ocean_input_amount_MO_m3
- Oil, crude, in ground [natural resource, in ground]: 0 kg; name oil_ground; = oil_ground_amount_MO_kg*(1* petroleum +0* natgas_high *0.84) /(1* 319410000 +0*13900000000 *0.84); pedigree (1,1,1,1,1)
  (same comment as for Gas, natural, in ground)
  property amount in multioutput activity_kg 3.1941e8 kg; name oil_ground_amount_MO_kg
- Water, salt, sole [natural resource, in water]: 3.00705e-6 m3; name water_salt_sole_input; = water_salt_sole_input_amount_MO_m3*(0.99* petroleum +0.01* natgas_high *0.84)/(0.99* 319410000 +0.01*13900000000 *0.84); lognormal variance with pedigree 0.0407, pedigree (2,2,5,1,1)
  (same comment as for Gas, natural, in ground)
  property amount in multioutput activity_m3 155000 m3; name water_salt_sole_input_amount_MO_m3

## Emissions to nature
- Oils, unspecified [water, ocean]: 5.04409e-8 kg; name oils; = oils_amount_MO_kg*(0.99* petroleum +0.01* natgas_high *0.84)/(0.99* 319410000 +0.01*13900000000 *0.84); lognormal variance with pedigree 0.3401, pedigree (1,2,5,1,1)
  (same comment as for Gas, natural, in ground)
  property amount in multioutput activity_kg 2600 kg; name oils_amount_MO_kg
- AOX, Adsorbable Organic Halogen as Cl [water, ocean]: 5.19541e-13 kg; name AOX; = AOX_amount_MO_kg*(0.99* petroleum +0.01* natgas_high *0.84)/(0.99* 319410000 +0.01*13900000000 *0.84); lognormal variance with pedigree 0.0901, pedigree (3,5,5,3,1)
  Extrapolation for sum parameter
  Uncertainty: Extrapolation for sum parameter
  property amount in multioutput activity_kg 0.02678 kg; name AOX_amount_MO_kg
- TOC, Total Organic Carbon [water, ocean]: 2.0964e-6 kg; name TOC; = TOC_amount_MO_kg*(0.99* petroleum +0.01* natgas_high *0.84)/(0.99* 319410000 +0.01*13900000000 *0.84); lognormal variance with pedigree 0.0901, pedigree (3,5,5,3,1)
  Extrapolation for sum parameter
  Uncertainty: Extrapolation for sum parameter
  property amount in multioutput activity_kg 108060 kg; name TOC_amount_MO_kg
- Cadmium, ion [water, ocean]: 3.10405e-11 kg; name Cd; = Cd_amount_MO_kg*(0.99* petroleum +0.01* natgas_high *0.84)/(0.99* 319410000 +0.01*13900000000 *0.84); lognormal variance with pedigree 0.6901, pedigree (1,2,5,1,1)
  (same comment as for Gas, natural, in ground)
  property amount in multioutput activity_kg 1.6 kg; name Cd_amount_MO_kg
- Nitrogen [water, ocean]: 3.89656e-11 kg; name N2; = N2_amount_MO_kg*(0.99* petroleum +0.01* natgas_high *0.84)/(0.99* 319410000 +0.01*13900000000 *0.84); lognormal variance with pedigree 0.0901, pedigree (3,5,5,3,1)
  Extrapolation for sum parameter
  Uncertainty: Extrapolation for sum parameter
  property amount in multioutput activity_kg 2.0085 kg; name N2_amount_MO_kg
- Hydrocarbons, aliphatic, alkanes, unspecified [air, non-urban air or from high stacks]: 4.47962e-5 kg; name hydroc_aliph_alkane; = hydroc_aliph_alkane_amount_MO_kg*(0.5* petroleum +0.5* natgas_high *0.84)/(0.5* 319410000 +0.5*13900000000 *0.84); lognormal variance with pedigree 0.0801, pedigree (1,2,5,1,1)
  Environmental report for 75% of gas produced in NL, reduced for combustion emissions
  Uncertainty: Environmental report for 75% of gas produced in NL, reduced for combustion emissions
  property amount in multioutput activity_kg 639710 kg; name hydroc_aliph_alkane_amount_MO_kg
- Sulfur [water, ocean]: 1.35083e-10 kg; name S2; = S2_amount_MO_kg*(0.99* petroleum +0.01* natgas_high *0.84)/(0.99* 319410000 +0.01*13900000000 *0.84); lognormal variance with pedigree 0.0901, pedigree (3,5,5,3,1)
  Extrapolation for sum parameter
  Uncertainty: Extrapolation for sum parameter
  property amount in multioutput activity_kg 6.9629 kg; name S2_amount_MO_kg
- Sulfur dioxide [air, non-urban air or from high stacks]: 1.08652e-6 kg; name SO2; = SO2_amount_MO_kg*(0.5* petroleum +0.5* natgas_high *0.84)/(0.5* 319410000 +0.5*13900000000 *0.84); lognormal variance with pedigree 0.0401, pedigree (1,2,5,1,1)
  (same comment as for Gas, natural, in ground)
  property amount in multioutput activity_kg 15516 kg; name SO2_amount_MO_kg
- COD, Chemical Oxygen Demand [water, ocean]: 7.39075e-6 kg; name COD; = COD_amount_MO_kg*(0.99* petroleum +0.01* natgas_high *0.84)/(0.99* 319410000 +0.01*13900000000 *0.84); lognormal variance with pedigree 0.0901, pedigree (3,5,5,3,1)
  Extrapolation for sum parameter
  Uncertainty: Extrapolation for sum parameter
  property amount in multioutput activity_kg 380960 kg; name COD_amount_MO_kg
- Hydrocarbons, aromatic [air, non-urban air or from high stacks]: 2.33718e-5 kg; name hydroc_aromatic; = hydroc_aromatic_amount_MO_kg*(0.5* petroleum +0.5* natgas_high *0.84)/(0.5* 319410000 +0.5*13900000000 *0.84); lognormal variance with pedigree 0.0801, pedigree (1,2,5,1,1)
  (same comment as for Hydrocarbons, aliphatic, alkanes, unspecified)
  property amount in multioutput activity_kg 333760 kg; name hydroc_aromatic_amount_MO_kg
- Carbon dioxide, fossil [air, non-urban air or from high stacks]: 0.00177578 kg; name CO2_fossil; = CO2_fossil_amount_MO_kg*(0.5* petroleum +0.5* natgas_high *0.84)/(0.5* 319410000 +0.5*13900000000 *0.84); lognormal variance with pedigree 0.0401, pedigree (1,2,5,1,1)
  (same comment as for Gas, natural, in ground)
  property amount in multioutput activity_kg 2.5359e7 kg; name CO2_fossil_amount_MO_kg
- Water [air, unspecified]: 6.25416e-7 m3; name water_to_air_unspecified; = (water_salt_ocean_input*fraction_PW_to_air)+(water_salt_sole_input*fraction_PW_to_air); lognormal variance with pedigree 0.0807, pedigree (2,2,5,1,1)
  Calculated value based on literature values and expert opinion. See comments in the parametres' comment field.
  Amount was scaled to the amount of reference product.
  Calculated value based on literature values and expert opinion. See comments in the parametres' comment field.
  Amount was scaled to the amount of reference product.
  property fraction, origin: unspecified 0; name fraction_origin_unspecified
  property amount in multioutput activity_m3 32237.4 m3; name water_to_air_unspecified_amount_MO_m3
  property fraction, origin: fresh water 0; name fraction_origin_fresh_water
  property fraction, origin: salt water 1; name fraction_origin_salt_water
- Methane, chlorodifluoro-, HCFC-22 [air, non-urban air or from high stacks]: 7.99204e-8 kg; name HCFC; = HCFC_amount_MO_kg*(0.5* petroleum +0.5* natgas_high *0.84)/(0.5* 319410000 +0.5*13900000000 *0.84); lognormal variance with pedigree 0.0981, pedigree (1,2,5,1,3)
  (same comment as for Gas, natural, in ground)
  property amount in multioutput activity_kg 1141.3 kg; name HCFC_amount_MO_kg
- Lead [water, ocean]: 2.09524e-9 kg; name Pb; = Pb_amount_MO_kg*(0.99* petroleum +0.01* natgas_high *0.84)/(0.99* 319410000 +0.01*13900000000 *0.84); lognormal variance with pedigree 0.6901, pedigree (1,2,5,1,1)
  (same comment as for Gas, natural, in ground)
  property amount in multioutput activity_kg 108 kg; name Pb_amount_MO_kg
- Zinc, ion [water, ocean]: 7.10052e-9 kg; name Zn; = Zn_amount_MO_kg*(0.99* petroleum +0.01* natgas_high *0.84)/(0.99* 319410000 +0.01*13900000000 *0.84); lognormal variance with pedigree 0.6901, pedigree (1,2,5,1,1)
  (same comment as for Gas, natural, in ground)
  property amount in multioutput activity_kg 366 kg; name Zn_amount_MO_kg
- Nickel, ion [water, ocean]: 2.32804e-10 kg; name Ni; = Ni_amount_MO_kg*(0.99* petroleum +0.01* natgas_high *0.84)/(0.99* 319410000 +0.01*13900000000 *0.84); lognormal variance with pedigree 0.6901, pedigree (1,2,5,1,1)
  (same comment as for Gas, natural, in ground)
  property amount in multioutput activity_kg 12 kg; name Ni_amount_MO_kg
- Nitrogen oxides [air, non-urban air or from high stacks]: 5.75247e-7 kg; name NOx; = NOx_amount_MO_kg*(0.5* petroleum +0.5* natgas_high *0.84)/(0.5* 319410000 +0.5*13900000000 *0.84); lognormal variance with pedigree 0.0801, pedigree (1,2,5,1,1)
  (same comment as for Gas, natural, in ground)
  property amount in multioutput activity_kg 8214.8 kg; name NOx_amount_MO_kg
- Methane, dichlorodifluoro-, CFC-12 [air, non-urban air or from high stacks]: 7.99204e-10 kg; name CFC; = CFC_amount_MO_kg*(0.5* petroleum +0.5* natgas_high *0.84)/(0.5* 319410000 +0.5*13900000000 *0.84); lognormal variance with pedigree 0.0981, pedigree (1,2,5,1,3)
  (same comment as for Gas, natural, in ground)
  property amount in multioutput activity_kg 11.413 kg; name CFC_amount_MO_kg
- DOC, Dissolved Organic Carbon [water, ocean]: 2.0964e-6 kg; name DOC; = DOC_amount_MO_kg*(0.99* petroleum +0.01* natgas_high *0.84)/(0.99* 319410000 +0.01*13900000000 *0.84); lognormal variance with pedigree 0.0901, pedigree (3,5,5,3,1)
  Extrapolation for sum parameter
  Uncertainty: Extrapolation for sum parameter
  property amount in multioutput activity_kg 108060 kg; name DOC_amount_MO_kg
- Triethylene glycol [water, ocean]: 7.76967e-6 kg; name triethylene_glycol; = triethylene_glycol_amount_MO_kg*(0* petroleum +1* natgas_high *0.84)/(0* 319410000 +1*13900000000 *0.84); lognormal variance with pedigree 0.3401, pedigree (1,2,5,1,1)
  (same comment as for Gas, natural, in ground)
  property amount in multioutput activity_kg 108000 kg; name triethylene_glycol_amount_MO_kg
- BOD5, Biological Oxygen Demand [water, ocean]: 7.39075e-6 kg; name BOD; = BOD_amount_MO_kg*(0.99* petroleum +0.01* natgas_high *0.84)/(0.99* 319410000 +0.01*13900000000 *0.84); lognormal variance with pedigree 0.0901, pedigree (3,5,5,3,1)
  Extrapolation for sum parameter
  Uncertainty: Extrapolation for sum parameter
  property amount in multioutput activity_kg 380960 kg; name BOD_amount_MO_kg
- Mercury [water, ocean]: 7.76013e-12 kg; name Hg_water; = Hg_water_amount_MO_kg*(0.99* petroleum +0.01* natgas_high *0.84)/(0.99* 319410000 +0.01*13900000000 *0.84); lognormal variance with pedigree 0.6901, pedigree (1,2,5,1,1)
  (same comment as for Gas, natural, in ground)
  property amount in multioutput activity_kg 0.4 kg; name Hg_water_amount_MO_kg
- Methane, fossil [air, non-urban air or from high stacks]: 0.000190022 kg; name CH4_fossil; = CH4_fossil_amount_MO_kg*(0.5* petroleum +0.5* natgas_high *0.84)/(0.5* 319410000 +0.5*13900000000 *0.84); lognormal variance with pedigree 0.0801, pedigree (1,2,5,1,1)
  (same comment as for Gas, natural, in ground)
  property amount in multioutput activity_kg 2.7136e6 kg; name CH4_fossil_amount_MO_kg
- Radon-222 [air, non-urban air or from high stacks]: 5.2333e-5 kBq; name Rd; = Rd_amount_MO_kBq*(0.5* petroleum +0.5* natgas_high *0.84)/(0.5* 319410000 +0.5*13900000000 *0.84); lognormal variance with pedigree 0.3761, pedigree (4,1,5,3,3)
  Data calculated on the basis of gas composition
  Uncertainty: data calculated on the basis of gas composition
  property amount in multioutput activity_kBq 747340 kBq; name Rd_amount_MO_kBq
- Carbon monoxide, fossil [air, non-urban air or from high stacks]: 3.19668e-5 kg; name CO_fossil; = CO_fossil_amount_MO_kg*(0.5* petroleum +0.5* natgas_high *0.84)/(0.5* 319410000 +0.5*13900000000 *0.84); lognormal variance with pedigree 0.0401, pedigree (1,2,5,1,1)
  (same comment as for Gas, natural, in ground)
  property amount in multioutput activity_kg 456500 kg; name CO_fossil_amount_MO_kg
- Methanol [water, ocean]: 1.03596e-5 kg; name CH4O_water; = CH4O_water_amount_MO_kg*(0* petroleum +1* natgas_high *0.84)/(0* 319410000 +1*13900000000 *0.84); lognormal variance with pedigree 0.3401, pedigree (1,2,5,1,1)
  (same comment as for Gas, natural, in ground)
  property amount in multioutput activity_kg 144000 kg; name CH4O_water_amount_MO_kg
- Mercury [air, non-urban air or from high stacks]: 1.49848e-10 kg; name Hg_air; = Hg_air_amount_MO_kg*(0.5* petroleum +0.5* natgas_high *0.84)/(0.5* 319410000 +0.5*13900000000 *0.84); lognormal variance with pedigree 0.0801, pedigree (1,2,5,1,1)
  (same comment as for Gas, natural, in ground)
  property amount in multioutput activity_kg 2.1399 kg; name Hg_air_amount_MO_kg
- Water [water, unspecified]: 3.54402e-6 m3; name water_to_water_unspecified; = water_salt_ocean_input*(1-fraction_PW_to_air)+water_salt_sole_input*(1-fraction_PW_to_air); lognormal variance with pedigree 0.0807, pedigree (2,2,5,1,1)
  (same comment as for Water)
  property water in wet mass 1000 kg; name WWM
  property dry mass 0 kg; name DM
  property fraction, origin: fresh water 0; name fraction_origin_fresh_water_Ww
  property wet mass 1000 kg; name WM
  property fraction, origin: salt water 1; name fraction_origin_salt_water_Ww
  property carbon content, non-fossil 0; name C_content_non_fossil
  property amount in multioutput activity_m3 182679 m3; name water_to_water_unspecifie_amount_MO_m3_0
  property fraction, origin: unspecified 0; name fraction_origin_unspecified_Ww
  property carbon content, fossil 0; name C_content_fossil

## Sampling procedure
Data is based on environmental report. No information about the sampling procedure.

## Extrapolations
The data of the NAM report are collected for onshore and offshore production; they are allocated totally to the offshore production for emissions and discharges in the ocean. The other emissions are allocated to the onshore resp. offshore production on the basis of the energy content of the production. The emissions of turbines and motors of the exploitation are calculated on the basis of the Norwegian production and subtracted from the total. The described process contains only the remaining emissions (flaring, venting, well testing etc.). The drilling activity is based on the official statistical data for all Netherlands and is an average of the drilled meters cumulated on 20 years (1980-1999) and the related cumulated HC production specific for offshore production. Processing is included in the data.

## Review by Michael Spielmann (obsolete) 2006-09-27
passed

## Review by Emilia Moreno Ruiz 2017-09-06
PV adjusted
