# epichlorohydrin production from allyl chloride

Dataset: EcoSpold 2, unit process
Geography: RER
Time period: 1998-01-01 to 2019-12-31
Technology level: current
Classification: ISIC rev.4 ecoinvent: 2011:Manufacture of basic chemicals
Classification: EcoSpold01Categories: chemicals/organics
Synonyms: 106-89-8
Tags: ConvertedDataset
Scenario: Business-as-Usual
System model: Allocation at the point of substitution
Generated by: Mike Chudacoff
Published in: Jungbluth N. 2007
Database: ecoinvent
isCopyrightProtected: true
accessRestrictedTo: 1

## General comment
Epichlorohydrin is formed from allyl chloride, which is mixed with dilute hypochlorous acid to produce glycerol dichlorohydrin (80% conversion). The output is fed to a series of separators to isolate the glycerol dichlorohydrin, to recover the allyl chloride for recycle back to the reactor, and to remove the unreacted acid-water solution. (This solution is neutralized and sewered). The glycerol dichlorohydrin is mixed with a calcium hydroxide slurry and sent to the hydrolysis reactor. The reactor produces epichlorohydrin (90% conversion). The reactor bottom is a waste slurry of calcium chloride. The calcium chloride is sold as a by-product. The tops are gaseous epichlorohydrin, unreacted glycerol dichlorohydrin, organic by-products and some water vapor. These are removed from the top of the reactor and separated in a series of distillation columns. The glycerol dichlorohydrin is recycled and the organic by-products exit the system in a waste stream. Trichloropropane is sold as a by-product. The epichlorohydrin is recovered by adding acetic acid. The mixture is separated in a distillation column. The acetic acid-water mixture is neutralized and sewered. The epichlorohydrin distilled to remove a small amount of organic contaminants, producing 97 % pure epichlorohydrin.

## Included activities start
The activity starts when the raw materials enter the process.

## Included activities end
Multi-output process that produces 1 kg epichlorohydrin, 1.375 kg calcium chloride, and 0.018 kg of trichloropropane at plant.

## Geography
The original data is based on industry data in the US. It is assumed to be representative for Europe.

## Technology
Based on industry data in the US (Overcash, 1998-2004).

## Parameters
- fraction, water, completely softened, to air: 0.205; name fraction_WCS_to_air; lognormal variance with pedigree 0.092025, pedigree (4,4,3,2,4)
  Water, completely softened is considered to be always used as process water, thus the process water fraction to air is applied for the water, completely softened input to calculate the amount of water consumed in the processe. The process water fraction to air is based on literature (Statistics Canada, 2007 & Shaffer, K.H., 2008, Consumptive water use in the Great Lakes Basin, USGS) (Vionnet, S., Quantis Water Database - Technical Report, 2012).

## Reference product
- calcium chloride: 1 kg; name cacl2; By-product classification allocatable product; CPC 34240: Phosphates of triammonium; salts and peroxysalts of inorganic acids and metals n.e.c.; CAS 10043-52-4; pedigree (1,1,1,1,1)
  Literature. The reactor bottom is a waste slurry of calcium chloride.The calcium chloride is sold as by-product.
  EcoSpold01Location=RER
  production volume 3.09375e8 kg; = RP_PV*(cacl2/RP)
    Calculated from the production volume of epichlorohydrin in proportion to the respective output amounts.
  property price 0.126 EUR2005
    Temporary price data. Calculated as 90% of purchasers price based on: 2004 import and export prices (total trades (USD) divided by total weight (kg) in EU27, USA, China, Japan and India) from UN data - Calcium chloride (http://data.un.org/Data.aspx?q=calcium+chloride&d=ComTrade&f=_l1Code%3a29%3bcmdCode%3a282720; accessed 1 June 10).
  property carbon content 0
    carbon content on a dry matter basis (reserved; not for manual entry)
  property true value 0.17325; name cacl2_true_value
    allocation property applied in "true value" allocation // value calculated from revenue
  properties: water in wet mass 0 kg, carbon content, non-fossil 0, carbon content, fossil 0, water content 0, wet mass 1 kg, dry mass 1 kg, carbon allocation 0 kg
- epichlorohydrin: 0 kg; name RP; CPC 34170: Ethers, alcohol peroxides, ether peroxides, epoxides, acetals and hemiacetals, and their halogenated, sulphona[…]; By-product classification allocatable product; CAS 106-89-8; pedigree (1,1,1,1,1)
  Literature. The reactor top is gaseous epichlorohydrin, unreacted glycerol dichlorohydrin, organic by-products and some water vapor. These are removed from the top of the reactor and separated in a series of distillation columns. The glycerol dichlorohydrin is recycled and the organic by-products exit the system in a waste stream. Trichloropropane is sold as a by-product. The epichlorohydrin is recovered by adding acetic acid. The mixture is separated in a distillation column. The acetic acid-water mixture is neutralized and sewered. The epichlorohydrin distilled to remove a small amount of organic contaminants, producing 97 % pure epichlorohydrin.
  EcoSpold01Location=RER
  production volume 2.25e8 kg; name RP_PV
    Disaggregation from global level based on GDP
  property price 1.04 EUR2005
    Temporary price data. Calculated as 90% of purchasers price based on: Source: 28 August 2006 issue of Chemical Market Reporter (ICIS)
  property carbon content 0.391304
    carbon content on a dry matter basis (reserved; not for manual entry)
  property true value 1.04; name RP_true_value
    allocation property applied in "true value" allocation // value calculated from revenue
  properties: carbon content, fossil 0.391304, water content 0, water in wet mass 0 kg, dry mass 1 kg, carbon content, non-fossil 0, wet mass 1 kg, carbon allocation 0.391304 kg

## By-products
- trichloropropane: 0 kg; name tcp; CPC 341: Basic organic chemicals; By-product classification allocatable product; CAS 96-18-4; pedigree (1,1,1,1,1)
  Literature.
  EcoSpold01Location=RER
  production volume 4.05e6 kg; = RP_PV*(tcp/RP)
    (same comment as for calcium chloride)
  property price 0.954 EUR2005
    Temporary price data. Calculated as 90% of purchasers price based on: Based on price relationship to epichlorohydrin in Ecoinvent report nr. 17, Table 24.6
  property carbon content 0.246575
    carbon content on a dry matter basis (reserved; not for manual entry)
  property true value 0.017172; name tcp_true_value
    allocation property applied in "true value" allocation // value calculated from revenue
  properties: dry mass 1 kg, water in wet mass 0 kg, carbon content, fossil 0.246575, wet mass 1 kg, water content 0, carbon content, non-fossil 0, carbon allocation 0.246575 kg
- electricity, for reuse in municipal waste incineration only: 0 kWh; CPC 17100: Electrical energy; By-product classification allocatable product; pedigree (1,1,1,1,1)
  Net electricity generated from this waste and used in internal MSWI plant energy redistribution.
  Uncertainty: uncertainty is calculated from uncertainties in waste composition and uncertainties in energy efficiency and the uncertainty in internal energy demand
  production volume 1045.93 kWh
  property exergy 3.6 MJ; name E_el_prod_MSWI_exergy
    This exergy property is based on the exergy content of the product.
  property true value relation 3.6; name E_el_prod_MSWI_true_value_relation
    property to calculate "true value" from
  property price 0.1 EUR2005; name E_el_prod_MSWI_price_EUR2005
    Estimated to be the same price as in case of electricity, medium voltage.
  property true value 5.97266e-7
    allocation property applied in "true value" allocation // value calculated from true value relation
- heat, for reuse in municipal waste incineration only: 0 MJ; CPC 17300: Steam and hot water; By-product classification allocatable product; pedigree (1,1,1,1,1)
  Net useful heat generated from this waste and used in internal MSWI plant energy redistribution.
  Uncertainty: uncertainty is calculated from uncertainties in waste composition and uncertainties in energy efficiency and the uncertainty in internal energy demand
  production volume 7399.84 MJ
  property true value relation 0.1842; name E_th_prod_MSWI_true_value_relation
    property to calculate "true value" from
  property exergy 0.1842 MJ; name E_th_prod_MSWI_exergy
    This exergy property is based on the exergy content of the product.
  property price 0.0106 EUR2005; name E_th_prod_MSWI_price_EUR2005
    Average European district heat price from Ecoheatcool and Euroheat 2005-2006, Ecoheat Work package 1: The European heat market. Final report. 10.6 EUR/GJ i s the price of district heat. http://www.solarthermalworld.org/files/Ecoheatcool%20WP1%20Web.pdf?download
  property true value 2.16208e-7
    (same comment as for electricity, for reuse in municipal waste incineration only)
- zinc concentrate: 0 kg; CPC 14290: Other non-ferrous metal ores and concentrates (other than uranium or thorium ores and concentrates); By-product classification allocatable product
  Calculated value from the knowledge of the properties of both products.
  production volume 0.185131 kg
  property price 0.38 EUR2005; name ByP_price_EUR2005
    Temporary price data. Calculated as 90% of purchasers price based on: Zinc content in concentrate 53%. Concentrate price per kg Zn 86.5% of refined Zn price (13.5% treatment charges according to CHR Metals Limited 2005: Dynamic cost curves. http://www.minecost.com/dynamic.pdf). 2004 zinc price from USGS (2007) Mineral commodity summaries 2007. <http://minerals.usgs.gov/minerals/pubs/mcs/2007/mcs2007.pdf> [Accessed 25 May 2010]
  property zinc content 0.53; name zinc_C_zinc_concentrate
    Zinc content on a dry matter basis. Value taken from teh "zinc mine operation" /GLO dataset.
  property dry mass 1 kg; name DM_zinc_concentrate
  property carbon content 0
    carbon content on a dry matter basis (reserved; not for manual entry)
  property true value 3.12665e-10
    allocation property applied in "true value" allocation // value calculated from revenue
  properties: wet mass 1 kg, water content 0, carbon content, non-fossil 0, carbon content, fossil 0, water in wet mass 0 kg, carbon allocation 0 kg

## Inputs from technosphere
- chlorine, liquid: 0.0888865 kg; lognormal variance with pedigree 0.0408, pedigree (2,2,5,3,1)
  Literature.
  EcoSpold01Location=RER
  Uncertainty: literature
  properties: wet mass 1 kg, dry mass 1 kg
- water, completely softened: 0.0246588 kg; name water_softened_input; lognormal variance with pedigree 0.0408, pedigree (2,2,5,3,1)
  Literature.
  EcoSpold01Location=RER
  Uncertainty: literature
  properties: wet mass 1 kg
- heat, district or industrial, natural gas: 0.134641 MJ; lognormal variance with pedigree 0.0408, pedigree (2,2,5,3,1)
  Approximation.
  Uncertainty: industry source
- heat, district or industrial, other than natural gas: 0.0751507 MJ; lognormal variance with pedigree 0.0408, pedigree (2,2,5,3,1)
  Approximation.
  Uncertainty: industry source
- chemical factory, organics: 4.09615e-11 unit; lognormal variance with pedigree 0.1786, pedigree (4,5,5,5,5)
  EcoSpold01Location=RER
  Literature. Infrastructure of a typical plant. No information was readily available about infrastructure and land-use of epichlorohydrin plants. Therefore, the infrastructure is estimated based on data from two chemical factories, the BASF site of Ludwigshafen and the chemical factory in Gendorf (which are both located in Germany), which produce a wide range of chemical substances. Based on this data, the following assumptions are made: the built area amounts to about 4.2 ha, the plant has an average output of 50'000 t/a and a lifespan of fifty years. The estimated infrastructure amount is therefore 4.00 E-10 units per kg of produced chemical.
  References:
  Althaus H.-J., Chudacoff M., Hischier R., Jungbluth N., Osses M. and Primas A. (2007) Life Cycle Inventories of Chemicals. ecoinvent report No. 8, v2.0. EMPA Dübendorf, Swiss Centre for Life Cycle Inventories, Dübendorf, CH.
  Gendorf (2000) Umwelterklärung 2000, Werk Gendorf. Werk Gendorf, Burgkirchen.
  Uncertainty: infrastructure of a typical plant
- wastewater, unpolluted: -1.96038e-5 m3; name wastewater; = ((water_softened_input/1000)*(1-fraction_WCS_to_air))*-1; lognormal variance with pedigree 0.0582, pedigree (4,2,5,3,1)
  EcoSpold01Location=CH
  Approximation.
  Uncertainty: approximation
  production volume 43073.1 m3; = RP_PV*(wastewater/RP)
    (same comment as for calcium chloride)
  property price 0 EUR2005; name wastewater_price_EUR2005
  properties: wet mass 1000 kg, dry mass 0.337476 kg, water content 2962.17, carbon content, non-fossil 0.00178991, carbon content, fossil 0.00178991
  note on carbon content, fossil: Assumed to be like in tap water. Bicarbonate content is 2.93 mol/m3. CO2 content is 0.1 mol/m3 (ecoinvent v2.2 report 8, Tab 93.1).
- spent solvent mixture: 0 kg; name solvent; pedigree (1,1,1,1,1)
  Literature. This output integrates the process emissions to air: allyl chloride (17.61 g), acetic acid (0.07 g) and chlorine (4.34 g). Source: Overcash 1998 - 2004, pre-treatment values! Air emissions are assumed to be completely removed by scrubbers. It is further assumed that the inventory “disposal, solvents mixture, 16.5% water, to hazardous waste incineration” is an acceptable approximation.
  EcoSpold01Location=CH
  Uncertainty: approximation
  production volume 0 kg
    (same comment as for calcium chloride)
  property price 0 EUR2005; name solvent_price_EUR2005
  properties: carbon content, fossil 0.571257, dry mass 0.835 kg, wet mass 1 kg, water content 0.197605
  note on carbon content, fossil: Tab A.7, ecoinvent v2.2 report 13_I. C content has been calculated after data in the tables, and then referred to 1 kg DM
- allyl chloride: 0.0901666 kg; lognormal variance with pedigree 0.0408, pedigree (2,2,5,3,1)
  Literature.
  EcoSpold01Location=RER
  Uncertainty: literature
  properties: wet mass 1 kg, dry mass 1 kg, carbon content, fossil 0.473684
- electricity, medium voltage: 0.00911173 kWh; lognormal variance with pedigree 0.0408, pedigree (2,2,5,3,1)
  Approximation.
  EcoSpold01Location=UCTE
  Uncertainty: literature
- quicklime, milled, packed: 0.0709863 kg; lognormal variance with pedigree 0.0408, pedigree (2,2,5,3,1)
  Calcium oxide. Literature.
  EcoSpold01Location=CH
  Uncertainty: literature
  properties: water content 0.010101, wet mass 1 kg, dry mass 0.99 kg
- spent solvent mixture: -0.00220467, -4.82142e-5 kg (2 entries); lognormal variance with pedigree 0.0582, pedigree (4,2,5,3,1)
  (same comment as for spent solvent mixture)
  production volume 4.95e6 kg

## Emissions to nature
- TOC, Total Organic Carbon [water, surface water]: 0.000134405 kg; lognormal variance with pedigree 0.0582, pedigree (4,2,5,3,1)
  Literature.
  Uncertainty: calculation
- COD, Chemical Oxygen Demand [water, surface water]: 0.000358413 kg; lognormal variance with pedigree 0.0582, pedigree (4,2,5,3,1)
  Literature.
  Uncertainty: calculation
- AOX, Adsorbable Organic Halogen as Cl [water, surface water]: 1.53606e-5 kg; lognormal variance with pedigree 0.0582, pedigree (4,2,5,3,1)
  Literature.
  Uncertainty: calculation
- BOD5, Biological Oxygen Demand [water, surface water]: 0.000358413 kg; lognormal variance with pedigree 0.0582, pedigree (4,2,5,3,1)
  Literature.
  Uncertainty: calculation
- Water [air, unspecified]: 5.05506e-6 m3; name water_to_air_unspecified; = (water_softened_input/1000)*fraction_WCS_to_air; lognormal variance with pedigree 0.0807, pedigree (2,2,5,1,1)
  Calculated value based on literature values and expert opinion. See comments in the parametres' comment field.
  property fraction, origin: fresh water 1; name fraction_origin_fresh_water
  property fraction, origin: salt water 0; name fraction_origin_salt_water
  property fraction, origin: unspecified 0; name fraction_origin_unspecified
- DOC, Dissolved Organic Carbon [water, surface water]: 0.000134405 kg; lognormal variance with pedigree 0.0582, pedigree (4,2,5,3,1)
  Literature.
  Uncertainty: calculation

## Sampling procedure
Literature data.
- Overcash, Michael (1998-2004). Chemical life cycle database, Chemical and Biomolecular Engineering, North Carolina State University, Raleigh, NC 27695-7905
- Jungbluth, N., Chudacoff, M., Dauriat, A., Dinkel, F., Doka, G., Faist Emmenegger, M., … Stettler, C. (2007). Life cycle inventories of bioenergy. Final report ecoinvent data v2.0 (2007). Uster.

## Extrapolations
Some data are derived from other or unknown plants or have been estimated (e.g. water to air).

## Review by Niels Jungbluth 2005-12-02
Passed.
