# treatment of hard coal ash, residual material landfill

Dataset: EcoSpold 2, unit process
Geography: BE
Time period: 1994-01-01 to 2019-12-31
Technology level: current
Classification: ISIC rev.4 ecoinvent: 3822:Treatment and disposal of hazardous waste
Classification: EcoSpold01Categories: waste management/residual material landfill
Tags: ConvertedDataset; Treatment
Scenario: Business-as-Usual
System model: Allocation at the point of substitution
Generated by: Gabor Doka (obsolete)
Published in: Doka G. 2009
Database: ecoinvent
isCopyrightProtected: true
accessRestrictedTo: 1

## General comment
Inventoried waste contains 100% BE hard coal ash; .
waste composition (wet, in ppm): H2O n.a.; O 607810; H n.a.; C n.a.; S 1987.4; N n.a.; P 1200.8; B 167.78; Cl 21.003; Br 22.848; F 90.701; I 1.8511; Ag n.a.; As 19.109; Ba 1420.7; Cd 1.233; Co 35.9; Cr 143.33; Cu 74.871; Hg 0.11291; Mn 435.62; Mo 11.828; Ni 92.554; Pb 68.448; Sb 3.6606; Se 5.6536; Sn 58.997; V 163.28; Zn 138.45; Be 10.747; Sc 32.659; Sr 1454.4; Ti 6299.8; Tl 4.3541; W 19.061; Si 156970; Fe 44325; Ca 13218; Al 107780; K 12180; Mg 37142; Na 6587.9;
Share of carbon in waste that is biogenic 60.4%.
[This dataset was already contained in the ecoinvent database version 2. It was not individually updated during the transfer to ecoinvent version 3. Life Cycle Impact Assessment results may still have changed, as they are affected by changes in the supply chain, i.e. in other datasets. This dataset was generated following the ecoinvent quality guidelines for version 2. It may have been subject to central changes described in the ecoinvent version 3 change report (http://www.ecoinvent.org/database/ecoinvent-version-3/reports-of-changes/), and the results of the central updates were reviewed extensively. The changes added e.g. consistent water flows and other information throughout the database. The documentation of this dataset can be found in the ecoinvent reports of version 2, which are still available via the ecoinvent website. The change report linked above covers all central changes that were made during the conversion process.]

## Included activities end
Waste-specific short-term emissions to water from leachate. Long-term emissions from landfill to ground water.

## Geography
Technology encountered in Switzerland in 2000. Landfill includes base seal and leachate collection system.

## Technology
Swiss residual material landfill for polluted, inorganic waste. With base seal and leachate collection system. Recultivation after closure.

## Time period
Waste composition as given in literature reference, theoretical data or other source. Transfer coefficients from prospective model.

## Reference product
- hard coal ash: -1 kg; CPC 39: Wastes or scraps; By-product classification Waste
  EcoSpold01Location=BE
  production volume 1.04371e7 kg
    Estimated. Energy prodcution in mainly responsible for hard coal ashes. The production volume is calculated as the sum of hard coal ashes resulting from electricity and heat and power co-generation production from hard coal in the respective country.
  property price 0 EUR2005
    Waste products are assigned a price of zero as they are assumed to require further treatment.
  property carbon content 0
    carbon content on a dry matter basis (reserved; not for manual entry)
  properties: wet mass 1 kg, dry mass 1 kg, water in wet mass 0 kg, water content 0, carbon content, non-fossil 0, carbon content, fossil 0, carbon allocation 0 kg

## Inputs from technosphere
- process-specific burdens, residual material landfill: 1 kg; lognormal variance with pedigree 0.04, pedigree (1,1,5,1,1)
  demands per kilogram waste. uncertainty is heeded in the module;activityLink introduced to establish a direct link to the corresponding regional supply of this product
  EcoSpold01Location=CH
- residual material landfill: 2.0833e-9 unit; lognormal variance with pedigree 0.04, pedigree (1,1,5,1,1)
  demands per kilogram waste. uncertainty is heeded in the module
  EcoSpold01Location=CH

## Emissions to nature
- Titanium, ion [water, surface water]: 3.1221e-6 kg; lognormal variance with pedigree 1.21, pedigree (1,1,5,1,1)
  uncertainty is calculated from uncertainties in waste composition and transfer coefficients in residual landfill
- Tin, ion [water, ground-, long-term]: 1.1179e-6 kg; lognormal variance with pedigree 5, pedigree (1,1,5,1,1)
  uncertainty is calculated from uncertainties in waste composition and transfer coefficients in incinerator and landfills.
- Iron, ion [water, surface water]: 3.7088e-7 kg; lognormal variance with pedigree 1.52, pedigree (1,1,5,1,1)
  (same comment as for Titanium, ion)
- Selenium [water, ground-, long-term]: 3.6598e-6 kg; lognormal variance with pedigree 1.39, pedigree (1,1,5,1,1)
  (same comment as for Tin, ion)
- Aluminium [water, surface water]: 5.3414e-5 kg; lognormal variance with pedigree 0.9, pedigree (1,1,5,1,1)
  (same comment as for Titanium, ion)
- Scandium [water, ground-, long-term]: 2.805e-5 kg; lognormal variance with pedigree 1.15, pedigree (1,1,5,1,1)
  (same comment as for Tin, ion)
- Chloride [water, ground-, long-term]: 1.4996e-5 kg; lognormal variance with pedigree 1.21, pedigree (1,1,5,1,1)
  (same comment as for Tin, ion)
- Aluminium [water, ground-, long-term]: 0.031995 kg; lognormal variance with pedigree 0.52, pedigree (1,1,5,1,1)
  (same comment as for Tin, ion)
- Molybdenum [water, surface water]: 1.1774e-5 kg; lognormal variance with pedigree 1.29, pedigree (1,1,5,1,1)
  (same comment as for Titanium, ion)
- Lead [water, surface water]: 5.9273e-10 kg; lognormal variance with pedigree 2.33, pedigree (1,1,5,1,1)
  (same comment as for Titanium, ion)
- Selenium [water, surface water]: 1.9938e-6 kg; lognormal variance with pedigree 1.41, pedigree (1,1,5,1,1)
  (same comment as for Titanium, ion)
- Mercury [water, ground-, long-term]: 5.3295e-9 kg; lognormal variance with pedigree 4.22, pedigree (1,1,5,1,1)
  (same comment as for Tin, ion)
- Arsenic, ion [water, ground-, long-term]: 1.9109e-14 kg; lognormal variance with pedigree 1.25, pedigree (1,1,5,1,1)
  (same comment as for Tin, ion)
- Bromine [water, ground-, long-term]: 4.4943e-6 kg; lognormal variance with pedigree 1.22, pedigree (1,1,5,1,1)
  (same comment as for Tin, ion)
- Phosphate [water, ground-, long-term]: 0.00082253 kg; lognormal variance with pedigree 1.23, pedigree (1,1,5,1,1)
  (same comment as for Tin, ion)
- Copper, ion [water, ground-, long-term]: 2.8821e-6 kg; lognormal variance with pedigree 3.69, pedigree (1,1,5,1,1)
  (same comment as for Tin, ion)
- Vanadium, ion [water, ground-, long-term]: 0.0001255 kg; lognormal variance with pedigree 0.95, pedigree (1,1,5,1,1)
  (same comment as for Tin, ion)
- Phosphate [water, surface water]: 1.3732e-6 kg; lognormal variance with pedigree 1.46, pedigree (1,1,5,1,1)
  (same comment as for Titanium, ion)
- Potassium, ion [water, surface water]: 0.0034334 kg; lognormal variance with pedigree 0.43, pedigree (1,1,5,1,1)
  (same comment as for Titanium, ion)
- Sodium, ion [water, surface water]: 0.0024723 kg; lognormal variance with pedigree 0.48, pedigree (1,1,5,1,1)
  (same comment as for Titanium, ion)
- Sodium, ion [water, ground-, long-term]: 0.0041156 kg; lognormal variance with pedigree 0.46, pedigree (1,1,5,1,1)
  (same comment as for Tin, ion)
- Antimony [water, surface water]: 1.291e-6 kg; lognormal variance with pedigree 1.47, pedigree (1,1,5,1,1)
  (same comment as for Titanium, ion)
- Calcium, ion [water, surface water]: 1.9939e-6 kg; lognormal variance with pedigree 1.28, pedigree (1,1,5,1,1)
  (same comment as for Titanium, ion)
- Potassium, ion [water, ground-, long-term]: 0.0087468 kg; lognormal variance with pedigree 0.39, pedigree (1,1,5,1,1)
  (same comment as for Tin, ion)
- Chloride [water, surface water]: 6.0072e-6 kg; lognormal variance with pedigree 1.25, pedigree (1,1,5,1,1)
  (same comment as for Titanium, ion)
- Antimony [water, ground-, long-term]: 2.3697e-6 kg; lognormal variance with pedigree 1.45, pedigree (1,1,5,1,1)
  (same comment as for Tin, ion)
- Zinc, ion [water, surface water]: 2.8327e-9 kg; lognormal variance with pedigree 2.12, pedigree (1,1,5,1,1)
  (same comment as for Titanium, ion)
- Arsenic, ion [water, surface water]: 1.9109e-5 kg; lognormal variance with pedigree 1.22, pedigree (1,1,5,1,1)
  (same comment as for Titanium, ion)
- Cadmium, ion [water, surface water]: 1.3975e-11 kg; lognormal variance with pedigree 2.83, pedigree (1,1,5,1,1)
  (same comment as for Titanium, ion)
- Thallium [water, surface water]: 2.6317e-9 kg; lognormal variance with pedigree 2.14, pedigree (1,1,5,1,1)
  (same comment as for Titanium, ion)
- Silicon [water, ground-, long-term]: 0.15662 kg; lognormal variance with pedigree 0.12, pedigree (1,1,5,1,1)
  (same comment as for Tin, ion)
- Iodide [water, ground-, long-term]: 1.8511e-13 kg; lognormal variance with pedigree 1.55, pedigree (1,1,5,1,1)
  (same comment as for Tin, ion)
- Tungsten [water, surface water]: 6.7222e-6 kg; lognormal variance with pedigree 1.25, pedigree (1,1,5,1,1)
  (same comment as for Titanium, ion)
- Cobalt [water, surface water]: 1.0246e-8 kg; lognormal variance with pedigree 1.95, pedigree (1,1,5,1,1)
  (same comment as for Titanium, ion)
- Strontium [water, ground-, long-term]: 0.00052654 kg; lognormal variance with pedigree 0.91, pedigree (1,1,5,1,1)
  (same comment as for Tin, ion)
- Chromium VI [water, surface water]: 8.616e-6 kg; lognormal variance with pedigree 1.12, pedigree (1,1,5,1,1)
  (same comment as for Titanium, ion)
- Bromine [water, surface water]: 1.8354e-5 kg; lognormal variance with pedigree 1.2, pedigree (1,1,5,1,1)
  (same comment as for Titanium, ion)
- Fluoride [water, surface water]: 4.9152e-6 kg; lognormal variance with pedigree 1.19, pedigree (1,1,5,1,1)
  (same comment as for Titanium, ion)
- Iodide [water, surface water]: 1.8511e-6 kg; lognormal variance with pedigree 1.53, pedigree (1,1,5,1,1)
  (same comment as for Titanium, ion)
- Vanadium, ion [water, surface water]: 4.0072e-7 kg; lognormal variance with pedigree 1.47, pedigree (1,1,5,1,1)
  (same comment as for Titanium, ion)
- Zinc, ion [water, ground-, long-term]: 1.6968e-6 kg; lognormal variance with pedigree 5.8, pedigree (1,1,5,1,1)
  (same comment as for Tin, ion)
- Nickel, ion [water, ground-, long-term]: 3.3508e-5 kg; lognormal variance with pedigree 1.27, pedigree (1,1,5,1,1)
  (same comment as for Tin, ion)
- Calcium, ion [water, ground-, long-term]: 0.0011943 kg; lognormal variance with pedigree 1.82, pedigree (1,1,5,1,1)
  (same comment as for Tin, ion)
- Boron [water, ground-, long-term]: 0.00016497 kg; lognormal variance with pedigree 0.93, pedigree (1,1,5,1,1)
  (same comment as for Tin, ion)
- Chromium VI [water, ground-, long-term]: 2.7217e-5 kg; lognormal variance with pedigree 0.96, pedigree (1,1,5,1,1)
  (same comment as for Tin, ion)
- Manganese [water, ground-, long-term]: 3.5984e-6 kg; lognormal variance with pedigree 6.56, pedigree (1,1,5,1,1)
  (same comment as for Tin, ion)
- Thallium [water, ground-, long-term]: 1.5764e-6 kg; lognormal variance with pedigree 1.68, pedigree (1,1,5,1,1)
  (same comment as for Tin, ion)
- Cobalt [water, ground-, long-term]: 6.1375e-6 kg; lognormal variance with pedigree 1.92, pedigree (1,1,5,1,1)
  (same comment as for Tin, ion)
- Scandium [water, surface water]: 4.6091e-6 kg; lognormal variance with pedigree 1.24, pedigree (1,1,5,1,1)
  (same comment as for Titanium, ion)
- Manganese [water, surface water]: 6.0073e-9 kg; lognormal variance with pedigree 2.02, pedigree (1,1,5,1,1)
  (same comment as for Titanium, ion)
- Magnesium [water, ground-, long-term]: 0.0042201 kg; lognormal variance with pedigree 1.44, pedigree (1,1,5,1,1)
  (same comment as for Tin, ion)
- Fluoride [water, ground-, long-term]: 8.5786e-5 kg; lognormal variance with pedigree 1.02, pedigree (1,1,5,1,1)
  (same comment as for Tin, ion)
- Sulfate [water, ground-, long-term]: 0.0053227 kg; lognormal variance with pedigree 0.61, pedigree (1,1,5,1,1)
  (same comment as for Tin, ion)
- Mercury [water, surface water]: 8.8973e-12 kg; lognormal variance with pedigree 2.88, pedigree (1,1,5,1,1)
  (same comment as for Titanium, ion)
- Nickel, ion [water, surface water]: 5.594e-8 kg; lognormal variance with pedigree 1.73, pedigree (1,1,5,1,1)
  (same comment as for Titanium, ion)
- Silicon [water, surface water]: 0.00035302 kg; lognormal variance with pedigree 0.67, pedigree (1,1,5,1,1)
  (same comment as for Titanium, ion)
- Boron [water, surface water]: 1.3146e-6 kg; lognormal variance with pedigree 1.33, pedigree (1,1,5,1,1)
  (same comment as for Titanium, ion)
- Titanium, ion [water, ground-, long-term]: 0.0018701 kg; lognormal variance with pedigree 0.83, pedigree (1,1,5,1,1)
  (same comment as for Tin, ion)
- Barium [water, surface water]: 1.9592e-8 kg; lognormal variance with pedigree 1.87, pedigree (1,1,5,1,1)
  (same comment as for Titanium, ion)
- Cadmium, ion [water, ground-, long-term]: 8.3709e-9 kg; lognormal variance with pedigree 7.81, pedigree (1,1,5,1,1)
  (same comment as for Tin, ion)
- Magnesium [water, surface water]: 7.0453e-6 kg; lognormal variance with pedigree 1.13, pedigree (1,1,5,1,1)
  (same comment as for Titanium, ion)
- Tin, ion [water, surface water]: 1.8664e-9 kg; lognormal variance with pedigree 2.18, pedigree (1,1,5,1,1)
  (same comment as for Titanium, ion)
- Molybdenum [water, ground-, long-term]: 5.4305e-8 kg; lognormal variance with pedigree 1.31, pedigree (1,1,5,1,1)
  (same comment as for Tin, ion)
- Iron, ion [water, ground-, long-term]: 0.00022215 kg; lognormal variance with pedigree 7.25, pedigree (1,1,5,1,1)
  (same comment as for Tin, ion)
- Copper, ion [water, surface water]: 4.8115e-9 kg; lognormal variance with pedigree 2.06, pedigree (1,1,5,1,1)
  (same comment as for Titanium, ion)
- Beryllium [water, surface water]: 6.4957e-9 kg; lognormal variance with pedigree 2.02, pedigree (1,1,5,1,1)
  (same comment as for Titanium, ion)
- Strontium [water, surface water]: 8.7904e-7 kg; lognormal variance with pedigree 1.37, pedigree (1,1,5,1,1)
  (same comment as for Titanium, ion)
- Barium [water, ground-, long-term]: 1.1735e-5 kg; lognormal variance with pedigree 6.4, pedigree (1,1,5,1,1)
  (same comment as for Tin, ion)
- Sulfate [water, surface water]: 0.00063969 kg; lognormal variance with pedigree 0.72, pedigree (1,1,5,1,1)
  (same comment as for Titanium, ion)
- Lead [water, ground-, long-term]: 3.5505e-7 kg; lognormal variance with pedigree 7.97, pedigree (1,1,5,1,1)
  (same comment as for Tin, ion)
- Tungsten [water, ground-, long-term]: 1.2339e-5 kg; lognormal variance with pedigree 1.23, pedigree (1,1,5,1,1)
  (same comment as for Tin, ion)
- Beryllium [water, ground-, long-term]: 3.8909e-6 kg; lognormal variance with pedigree 1.56, pedigree (1,1,5,1,1)
  (same comment as for Tin, ion)

## Sampling procedure
Landfill model based on observed leachate concentrations in literature. Extrapolated to 60'000 years heeding chemical characteristics. Initial waste composition from various literature sources.

## Extrapolations
This dataset has been extrapolated from year 2000 to the year of the calculation (2019). The uncertainty has been adjusted accordingly.

## Review by Niels Jungbluth 2009-02-15
passed.
