# nutrient supply from manure, liquid, cattle

Dataset: EcoSpold 2, unit process
Geography: GLO
Time period: 2009-01-01 to 2019-12-31
Technology level: current
Classification: ISIC rev.4 ecoinvent: 0161:Support activities for crop production
Scenario: Business-as-Usual
System model: Allocation at the point of substitution
Generated by: Lucia Valsasina
Database: ecoinvent
isCopyrightProtected: true
accessRestrictedTo: 1

## General comment
This inventory describes the application of liquid cattle manure for fertiliser use.

## Included activities start
Activity starting with the application of manure

## Included activities end
The activity ends with the provision of N-fertiliser, P-fertiliser and K-fertiliser

## Geography
inventory based on composition of liquid cattle manure

## Time period
Time validity adopted from dataset producing poultry manure, dried in the ecoinvent database

## Reference product
- phosphate fertiliser, as P2O5: 1 kg; name phosphate_fertiliser_output; = 0.8/1000; source Nemecek, T. 2007; CPC 3462: Mineral or chemical fertilizers, phosphatic; By-product classification allocatable product; pedigree (1,1,1,1,1)
  Literature data. Manure density is 1000kg/m3.
  Data compilation for nutrient content by Riedener, E. Agroscope, LCA Group, 2015, sources FAOSTAT (average of years 2009-2012), SALCA-Field_V1.3a and GRUDAF 2009. Results reported in Nemecek T., Bengoa X., Lansche J., Mouron P., Riedener E., Rossi V. & Humbert S. (2015) Methodological Guidelines for the Life Cycle Inventory of Agricultural Products. Version 3.0, July 2015. World Food LCA Database (WFLDB). Quantis and Agroscope, Lausanne and Zurich, Switzerland.
  Information on heavy metals taken from Nemecek T. & Schnetzer J. (2011) Methods of assessment of direct field emissions for LCIs of agricultural production systems. Data v3.0 (2012). Accessible in the database report section under the name "01 crop production-direct field emissions natural resources v1.2.pdf".
  Nitrogen was set as the reference product as considered the key nutrient in manure (Penn State Agronomy Guide 2015-2016. Retrieved from: http://extension.psu.edu/agronomy-guide/cm/sec2/sec29c, accessed 17th March 2016)
  References:
  FAOSTAT (2009-2012), Available at http://faostat.fao.org/
  Desaules A. & Studer K. 1993. Nationales Bodenbeobachtungsnetz - Messresultate 1985-1991. Schriftenreihe Umwelt Nr. 200. Bundesamt für Umwelt, Wald und Landschaft (Hrsg.), CH-3003 Bern.
  Freiermuth R. (2006) Modell zur Berechnung der Schwermetallflüsse in der Landwirtschaftlichen Ökobilanz. Agroscope FAL Reckenholz, 42 p., Available at http://www.agroscope.admin.ch/oekobilanzen/01194/
  Menzi & Kessler (1998) Heavy metal contents of livestock feeds and animal manures in England and Wales. Bioresource Technology, 70, pp. 23-31
  Nemecek T., Bengoa X., Lansche J., Mouron P., Riedener E., Rossi V. & Humbert S. (2015) Methodological Guidelines for the Life Cycle Inventory of Agricultural Products. Version 3.0, July 2015. World Food LCA Database (WFLDB). Quantis and Agroscope, Lausanne and Zurich, Switzerland.
  Nemecek T. & Schnetzer J. (2011) Methods of assessment of direct field emissions for LCIs of agricultural production systems. Data v3.0 (2012)
  SALCA-Field_V1.3a, Available at http://www.agroscope.admin.ch/oekobilanzen/01199/08127/index.html?lang=en
  GRUDAF 2009, Available at http://www.agroscope.admin.ch/aktuell/00198/00199/00344/04683/index.html?lang=fr&msg-id=25488
  Walther U., J.P. Ryser und R. Flisch: Grundlagen für die Düngung im Acker- und Futterbau 200. Agrarforsching, 8 (6), pp. 1-80.
  production volume 1.8337e8 kg; = 1467548724*18.375*1000*0.85* 0.01*phosphate_fertiliser_output
    Calculated based on literature data.
    1.47E+09 is the number of cattle being produced every year in the world (FAOSTAT, item code 866 Cattle, accessed 20151026).
    18.4 tons/year is the amount of manure produced by one animal each year (University of Wisconsin, http://learningstore.uwex.edu/Assets/pdfs/A3601.pdf, accessed 20151026 and World Bank, https://www.google.ch/url?sa=t&rct=j&q=&esrc=s&source=web&cd=10&cad=rja&uact=8&ved=0CE4QFjAJahUKEwiD_I_Cm-DIAhXh8HIKHZMdDLY&url=http%3A%2F%2Fsiteresources.worldbank.org%2FINTAPCFORUM%2FResources%2Fpart3.ppt&usg=AFQjCNGs7QNHFbEJyEG80btGpJtKy04C3A&sig2=1XdVmhpSsiSRhzx_XLP34Q&bvm=bv.105841590,d.bGQ, accessed 20151026).
    0.85 and 0.15 is the percentage of liquid and dry manure (World Bank, https://www.google.ch/url?sa=t&rct=j&q=&esrc=s&source=web&cd=10&cad=rja&uact=8&ved=0CE4QFjAJahUKEwiD_I_Cm-DIAhXh8HIKHZMdDLY&url=http%3A%2F%2Fsiteresources.worldbank.org%2FINTAPCFORUM%2FResources%2Fpart3.ppt&usg=AFQjCNGs7QNHFbEJyEG80btGpJtKy04C3A&sig2=1XdVmhpSsiSRhzx_XLP34Q&bvm=bv.105841590,d.bGQ, accessed 20151026).
    It is assumed that 1% of the manure is treated in this activity.
  property price 0.241 EUR2005; name phosphate_fertiliser_output_price_EUR200
    Temporary price data. Calculated as 90% of purchasers price based on: 2004 prices are calculated on basis of Import/Export data (tonnes and US$) from UN Trade Statistics Database (http://data.un.org/Browse.aspx?d=ComTrade, accessed 7/7-2010). N, P2O5, or K2O content (http://www.fertilizer.org/ifa/Home-Page/STATISTICS/Conversions-factors)
  property carbon content 0
    carbon content on a dry matter basis (reserved; not for manual entry)
  property true value 0.0001928; name phosphate_fertiliser_output_true_value
    allocation property applied in "true value" allocation // value calculated from revenue
  properties: dry mass 1 kg, carbon content, non-fossil 0, wet mass 1 kg, water content 0, carbon content, fossil 0, water in wet mass 0 kg, carbon allocation 0 kg
- nitrogen fertiliser, as N: 0 kg; name nitrogen_fertiliser_output; = 1.6/1000; CPC 3461: Mineral or chemical fertilizers, nitrogenous; By-product classification allocatable product
  (same comment as for phosphate fertiliser, as P2O5)
  production volume 3.6674e8 kg; = 1467548724*18.375*1000*0.85* 0.01*nitrogen_fertiliser_output
    Calculated based on literature data.
    1.47E+09 is the number of cattle being produced every year in the world (FAOSTAT, item code 866 Cattle, accessed 20151026).
    18.4 tons/year is the amount of manure produced by one animal each year (University of Wisconsin, http://learningstore.uwex.edu/Assets/pdfs/A3601.pdf, accessed 20151026 and World Bank, https://www.google.ch/url?sa=t&rct=j&q=&esrc=s&source=web&cd=10&cad=rja&uact=8&ved=0CE4QFjAJahUKEwiD_I_Cm-DIAhXh8HIKHZMdDLY&url=http%3A%2F%2Fsiteresources.worldbank.org%2FINTAPCFORUM%2FResources%2Fpart3.ppt&usg=AFQjCNGs7QNHFbEJyEG80btGpJtKy04C3A&sig2=1XdVmhpSsiSRhzx_XLP34Q&bvm=bv.105841590,d.bGQ, accessed 20151026).
    0.85 and 0.15 is the percentage of liquid and dry manure (World Bank, https://www.google.ch/url?sa=t&rct=j&q=&esrc=s&source=web&cd=10&cad=rja&uact=8&ved=0CE4QFjAJahUKEwiD_I_Cm-DIAhXh8HIKHZMdDLY&url=http%3A%2F%2Fsiteresources.worldbank.org%2FINTAPCFORUM%2FResources%2Fpart3.ppt&usg=AFQjCNGs7QNHFbEJyEG80btGpJtKy04C3A&sig2=1XdVmhpSsiSRhzx_XLP34Q&bvm=bv.105841590,d.bGQ, accessed 20151026).
    It is assumed that 1% of this manure is treated in this activity.
  property price 0.473 EUR2005; name nitrogen_fertiliser_output_price_EUR2005
    (same comment as for phosphate fertiliser, as P2O5)
  property carbon content 0
    carbon content on a dry matter basis (reserved; not for manual entry)
  property true value 0.0007568; name nitrogen_fertiliser_output_true_value
    allocation property applied in "true value" allocation // value calculated from revenue
  properties: carbon content, non-fossil 0, water in wet mass 0 kg, carbon content, fossil 0, dry mass 1 kg, wet mass 1 kg, water content 0, carbon allocation 0 kg

## By-products
- potassium fertiliser, as K2O: 0 kg; name potassium_fertiliser_output; = 4.9/1000; source Nemecek, T. 2007; CPC 3463: Mineral or chemical fertilizers, potassic; By-product classification allocatable product; pedigree (1,1,1,1,1)
  (same comment as for phosphate fertiliser, as P2O5)
  production volume 1.12314e9 kg; = 1467548724*18.375*1000*0.85* 0.01*potassium_fertiliser_output
    Calculated based on literature data.
    1.47E+09 is the number of cattle being produced every year in the world (FAOSTAT, item code 866 Cattle, accessed 20151026).
    18.4 tons/year is the amount of manure produced by one animal each year (University of Wisconsin, http://learningstore.uwex.edu/Assets/pdfs/A3601.pdf, accessed 20151026 and World Bank, https://www.google.ch/url?sa=t&rct=j&q=&esrc=s&source=web&cd=10&cad=rja&uact=8&ved=0CE4QFjAJahUKEwiD_I_Cm-DIAhXh8HIKHZMdDLY&url=http%3A%2F%2Fsiteresources.worldbank.org%2FINTAPCFORUM%2FResources%2Fpart3.ppt&usg=AFQjCNGs7QNHFbEJyEG80btGpJtKy04C3A&sig2=1XdVmhpSsiSRhzx_XLP34Q&bvm=bv.105841590,d.bGQ, accessed 20151026).
    0.85 and 0.15 is the percentage of liquid and dry manure (World Bank, https://www.google.ch/url?sa=t&rct=j&q=&esrc=s&source=web&cd=10&cad=rja&uact=8&ved=0CE4QFjAJahUKEwiD_I_Cm-DIAhXh8HIKHZMdDLY&url=http%3A%2F%2Fsiteresources.worldbank.org%2FINTAPCFORUM%2FResources%2Fpart3.ppt&usg=AFQjCNGs7QNHFbEJyEG80btGpJtKy04C3A&sig2=1XdVmhpSsiSRhzx_XLP34Q&bvm=bv.105841590,d.bGQ, accessed 20151026).
    It is assumed that 1% of manure is treated in this activity.
  property price 0.188 EUR2005; name potassium_fertiliser_output_price_EUR200
    Temporary price data. Calculated as 90% of purchasers price based on: 2004 import price calulated from FAOSTAT (http://faostat.fao.org/site/575/DesktopDefault.aspx?PageID=575#ancor [accessed 2011.01.27] Potash Fertilizers (K20 total nutrients) in kUSD/Mg
  property carbon content 0
    carbon content on a dry matter basis (reserved; not for manual entry)
  property true value 0.0009212; name potassium_fertiliser_output_true_value
    allocation property applied in "true value" allocation // value calculated from revenue
  properties: dry mass 1 kg, carbon content, fossil 0, carbon content, non-fossil 0, water in wet mass 0 kg, water content 0, wet mass 1 kg, carbon allocation 0 kg

## Inputs from technosphere
- manure, liquid, cattle: 128.822 kg; name liquid_catlle_manure
  property lead content 3.77e-6; name liquid_catlle_manure_Pb_content
  property nickel content 4.3e-6; name liquid_catlle_manure_Ni_content
  property mercury content 4e-7; name liquid_catlle_manure_Hg_content
  property chromium content 3.9e-6; name liquid_catlle_manure_Cr_content
  property zinc content 0.000162; name liquid_catlle_manure_Zn_content
  property price 0 EUR2005; name liquid_catlle_manure_price_EUR2005
  property copper content 3.71e-5; name liquid_catlle_manure_Cu_content
  property dry mass 0.09 kg; name dry_mass
  property cadmium content 1.78e-7; name liquid_catlle_manure_Cd_content
  properties: wet mass 1 kg, carbon content, non-fossil 0.68, water content 10.1111
  note on lead content: Literature data. Data compilation for nutrient content by Riedener, E. Agroscope, LCA Group, 2015, sources FAOSTAT (average of years 2009-2012), SALCA-Field_V1.3a and GRUDAF 2009. Results reported in Nemecek T., Bengoa X., Lansche J., Mouron P., Riedener E., Rossi V. & Humbert S. (2015) Methodological Guidelines for the Life Cycle Inventory of Agricultural Products. Version 3.0, July 2015. World Food LCA Database (WFLDB). Quantis and Agroscope, Lausanne and Zurich, Switzerland. Information on heavy metals (mg/kg DM) from Freiermuth 2006 from from Menzi & Kessler (1998) and Desaules & Studer (1993, p. 152)). Dry matter from Walther et al. (2001). In Nemecek T. & Schnetzer J. (2011) Methods of assessment of direct field emissions for LCIs of agricultural production systems. Data v3.0 (2012). Accessible in the database report section under the name "01 crop production-direct field emissions natural resources v1.2.pdf". References: FAOSTAT (2009-2012), Available at http://faostat.fao.org/ Desaules A. & Studer K. 1993. Nationales Bodenbeobachtungsnetz – Messresultate 1985-1991. Schriftenreihe Umwelt Nr. 200. Bundesamt für Umwelt, Wald und Landschaft (Hrsg.), CH-3003 Bern. Freiermuth R. (2006) Modell zur Berechnung der Schwermetallflüsse in der Landwirtschaftlichen Ökobilanz. Agroscope FAL Reckenholz, 42 p., Available at http://www.agroscope.admin.ch/oekobilanzen/01194/ Menzi & Kessler (1998) Heavy metal contents of livestock feeds and animal manures in England and Wales. Bioresource Technology, 70, pp. 23-31 Nemecek T., Bengoa X., Lansche J., Mouron P., Riedener E., Rossi V. & Humbert S. (2015) Methodological Guidelines for the Life Cycle Inventory of Agricultural Products. Version 3.0, July 2015. World Food LCA Database (WFLDB). Quantis and Agroscope, Lausanne and Zurich, Switzerland. Nemecek T. & Schnetzer J. (2011) Methods of assessment of direct field emissions for LCIs of agricultural production systems. Data v3.0 (2012) SALCA-Field_V1.3a, Available at http://www.agroscope.admin.ch/oekobilanzen/01199/08127/index.html?lang=en GRUDAF 2009, Available at http://www.agroscope.admin.ch/aktuell/00198/00199/00344/04683/index.html?lang=fr&msg-id=25488 Walther U., J.P. Ryser und R. Flisch: Grundlagen für die Düngung im Acker- und Futterbau 200. Agrarforsching, 8 (6), pp. 1-80.

## Sampling procedure
Dataset based on nutrient content of liquid cattle manure for fertiliser use
