# treatment of sulfidic tailings, from gold mine operation, tailings impoundment

Dataset: EcoSpold 2, unit process
Geography: AU
Time period: 2015-01-01 to 2019-12-31
Technology level: current
Classification: ISIC rev.4 ecoinvent: 3822:Treatment and disposal of hazardous waste
Synonyms: sulphidic; tails; pond; tailing
Scenario: Business-as-Usual
System model: Allocation at the point of substitution
Share of production covered: 80 %
Generated by: David Turner
Database: ecoinvent
isCopyrightProtected: true
accessRestrictedTo: 1

## General comment
This dataset represents the activity of waste disposal of sulfidic tailings, from gold mine operation in a tailings impoundment in Australia.
Background: Tailings, a waste material produced during mineral concentration (beneficiation), often contain significant quantities of mobile toxic metals and are typically produced in large quantities. To manage these wastes, tailings are commonly stored behind dammed impoundments, known as tailings ponds. These ponds pose a significant long-term pollution risk as metals may leach out into the surrounding environment, potentially over very long timeframes.
Modelling approach: This dataset was produced using a model developed specifically for assessing the long-term emissions of tailings disposal (see Doka, 2017). The tailings disposal model is based on the modelling framework applied in existing landfill process models used in ecoinvent and is based on a top-down approach. Literature data on measurements of deposited tailings compositions (solids) and measured current concentrations in leachate (liquid) form the basis of the model and are used to characterise pollutant mobility and calculate the currently occurring rate of emissions of the landfill. Heeding chief parameters, such as hydrology, pH development and elemental chemistry, these emissions are then projected into the future. Tailings composition is based on the typical composition of tailings at gold mine sites worldwide; i.e. composition is not region-specific. Land use was calculated following the approach described by Doka (2008). Based on an assumed generic final height of a tailings impoundment of 60 m and an assumed tailings density of 2200 kg/m3, a land area of 7.58E-06 m2 is required per kilogram of sulfidic tailings. The land is assumed to be converted from unknown origin to a disposal site. After an operational phase of 30 years, spontaneous restoration of a consolidated state is assumed to be reached after one hundred years. The total occupation time is therefore 130 years and the land occupation per kilogram tailings is 9.85E-04 m2.
Waste composition (wet, in ppm): H2O 300000; O 621300; H na; C 6145; S 305.88; N 5.0454; P 192.55; B 54.583; Cl 102.61; Br 0.22894; F 772.88; I na; Ag 9.7097; As 61.447; Ba 356.57; Cd 3.9592; Co 10.634; Cr 46.594; Cu 489.41; Hg 0.40262; Mn 142.11; Mo 10.949; Ni 17.077; Pb 155.09; Sb 34.059; Se 4.2887; Sn 26.979; V 142.69; Zn 190.19; Be 1.9806; Sc 13.343; Sr 100.02; Ti 122.75; Tl 2.6154; W 9.3995; Si 39700; Fe 10240; Ca 2631.2; Al 11955; K 2187; Mg 1408.9; Na 1044.1. // Share of carbon in waste that is biogenic 0%.
Activity extent: The dataset includes all potential emissions to the environment and land use changes. Input exchanges of infrastructure, materials, energy, and water are not included here but are accounted for in the activity, gold mine operation.
References
Doka, G. (2008). Life Cycle Inventory data of mining waste: Emissions from sulfidic tailings disposal. Zürich, Switzerland: Doka Life Cycle Assessments.
Doka, G. (2017). A model for waste-specific and climate-specific life cycle inventories of tailings impoundments. Zürich, Switzerland: Doka Life Cycle Assessments.

## Included activities start
The activity starts at the point of waste deposition in the impoundment. All upstream activities, including the pumping of tailings to the site, any dewatering or treatment, or other transport-related activities are excluded.

## Included activities end
Waste-specific short- and long-term emissions to the environment via impoundment leachate; land transformation and occupation. Note that the structural integrity of the site is assumed to be unwavering during the entie modelled time horizon; i.e. accidental releases of leachate (due to impoundment failure) are not considered.

## Geography
Given name of site is 'Gold deposits; Australia'. Impoundment site with mean annual temperature (MAT) of 14.151559848875 degC, mean annual precipitation (MAP) of 859.904626338235 mm/year, mean annual actual evaporation (EAT) of 725.988753465251 mm/year, and net infiltration of 496.91024960561 mm/year (using half of natural surface evapotranspiration).

## Technology
This is an inventory for an impoundment of copper ore beneficiation tailings waste. The following assumptions were made concerning technology: final impoundment height is 60 meters; operation phase duration is 30 years; and impoundment leachates are released into the environment untreated.

## Time period
'Data on average composition of tailings and tailings-derived leachates from literature sources published between 1994 and 2017 (mean publication date: 2009±6). Mean annual temperature and precipitation data for 1970-2000 (source: Fick and Hijmans, 2017); mean annual evapotranspiration for 1950-2000 (source: Fekete et al., 2002). Production volume based on world mine production data from the USGS Minerals Yearbook 2015. Transfer coefficients from prospective, tailings-specific model.
References:
Fekete, B. M., Vorosmarty, C. J. & Grabs, W. (2002). High-resolution fields of global runoff combining observed river discharge and simulated water balances. Global Biogeochemical Cycles, 16, 15-1 - 15-10.
Fick, S. E. & Hijmans, R. J. (2017). Worldclim 2: New 1-km spatial resolution climate surfaces for global land areas. International Journal of Climatology, 37, 4302-4315.'

## Reference product
- sulfidic tailings, from gold mine operation: -1 kg; By-product classification Waste
  main reference product of this activity (supply of disposal service).
  production volume 4.31e6 kg
    Estimate of the national tailings production volume from the mining and concentration of sulfidic gold ores, based on national mine production of gold from sulfide mineral deposits (kg) multiplied by estimated tailings generation rate per kg of mined gold (6328 kg per kg mined gold).
  property price 0 EUR2005
    Waste products are assigned a price of zero as they are assumed to require further treatment.
  property carbon content 0.0087785
    carbon content on a dry matter basis (reserved; not for manual entry)
  properties: carbon content, non-fossil 0, sodium content 0.0014916, oxygen content 0.88758, molybdenum content 1.5641e-5, barium content 0.00050938, water content 0.42857, chromium content 6.6562e-5, arsenic content 8.7781e-5, cobalt content 1.5191e-5, boron content 7.7976e-5, cadmium content 5.656e-6, manganese content 0.00020301, silver content 1.3871e-5, scandium content 1.9061e-5, bromine content 3.2706e-7, tungsten content 1.3428e-5, tin content 3.8541e-5, beryllium content 2.8295e-6, nitrogen content 7.2076e-6, iron content 0.014628, chlorine content 0.00014659, silicon content 0.056714, magnesium content 0.0020127, mercury content 5.7517e-7, aluminium content 0.017079, fluorine content 0.0011041, antimony content 4.8655e-5, selenium content 6.1267e-6, thallium content 3.7362e-6, titanium content 0.00017536, carbon content, fossil 0.0087785, zinc content 0.0002717, wet mass 1 kg, lead content 0.00022156, vanadium content 0.00020384, calcium content 0.0037589, copper content 0.00069916, potassium content 0.0031243, water in wet mass 0.3 kg, sulfur content 0.00043697, dry mass 0.7 kg, phosphorus content 0.00027508, strontium content 0.00014288, nickel content 2.4396e-5, carbon allocation 0.00614495 kg

## Emissions to nature
- Magnesium [water, ground-]: 2.743e-5 kg; lognormal variance with pedigree 0.22506, pedigree (1,1,1,1,1)
  burden from short-term leachate to groundwater in uncontrolled impoundment in moist cimate.
  Uncertainty: U
- Vanadium, ion [water, ground-]: 3.7255e-9 kg; lognormal variance with pedigree 0.512, pedigree (1,1,1,1,1)
  (same comment as for Magnesium)
- Nitrate [water, ground-, long-term]: 1.1247e-5 kg; lognormal variance with pedigree 0.34108, pedigree (1,1,1,1,1)
  Emissions from long-term leachate (>100a) directly from tailings impoundment.
  Uncertainty: U
- Iron, ion [water, ground-, long-term]: 0.010234 kg; lognormal variance with pedigree 0.091142, pedigree (1,1,1,1,1)
  (same comment as for Nitrate)
- Transformation, to dump site [natural resource, land]: 7.5758e-6 m2; lognormal variance with pedigree 0.030596, pedigree (1,1,1,1,1)
  conversion to impoundment area.
  Uncertainty: U
- Arsenic, ion [water, ground-, long-term]: 8.2259e-7 kg; lognormal variance with pedigree 1.4196, pedigree (1,1,1,1,1)
  (same comment as for Nitrate)
- Lead [water, ground-, long-term]: 0.00015507 kg; lognormal variance with pedigree 0.22591, pedigree (1,1,1,1,1)
  (same comment as for Nitrate)
- TOC, Total Organic Carbon [water, ground-]: 1.1344e-6 kg; lognormal variance with pedigree 0.32524, pedigree (1,1,1,1,1)
  (same comment as for Magnesium)
- Ammonium, ion [water, ground-, long-term]: 7.1252e-7 kg; lognormal variance with pedigree 0.34108, pedigree (1,1,1,1,1)
  (same comment as for Nitrate)
- Lead [water, ground-]: 1.8946e-8 kg; lognormal variance with pedigree 0.45817, pedigree (1,1,1,1,1)
  (same comment as for Magnesium)
- Transformation, from unspecified [natural resource, land]: 7.5758e-6 m2; lognormal variance with pedigree 0.030596, pedigree (1,1,1,1,1)
  conversion of impoundment area.
  Uncertainty: U
- Arsenic, ion [water, ground-]: 1.7507e-8 kg; lognormal variance with pedigree 0.46101, pedigree (1,1,1,1,1)
  (same comment as for Magnesium)
- Iron, ion [water, ground-]: 5.4101e-6 kg; lognormal variance with pedigree 0.27515, pedigree (1,1,1,1,1)
  (same comment as for Magnesium)
- TOC, Total Organic Carbon [water, ground-, long-term]: 0.00067953 kg; lognormal variance with pedigree 0.40967, pedigree (1,1,1,1,1)
  (same comment as for Nitrate)
- Ammonium, ion [water, ground-]: 4.4948e-7 kg; lognormal variance with pedigree 0.34575, pedigree (1,1,1,1,1)
  (same comment as for Magnesium)
- Hydrogen sulfide [water, ground-]: 3.7042e-5 kg; lognormal variance with pedigree 0.20704, pedigree (1,1,1,1,1)
  (same comment as for Magnesium)
- Titanium, ion [water, ground-, long-term]: 0.00012275 kg; lognormal variance with pedigree 0.23369, pedigree (1,1,1,1,1)
  (same comment as for Nitrate)
- Hydrogen sulfide [water, ground-, long-term]: 3.8694e-5 kg; lognormal variance with pedigree 0.20556, pedigree (1,1,1,1,1)
  (same comment as for Nitrate)
- Titanium, ion [water, ground-]: 5.1361e-9 kg; lognormal variance with pedigree 0.50142, pedigree (1,1,1,1,1)
  (same comment as for Magnesium)
- Fluoride [water, ground-, long-term]: 0.00039957 kg; lognormal variance with pedigree 0.2, pedigree (1,1,1,1,1)
  (same comment as for Nitrate)
- Tin, ion [water, ground-, long-term]: 2.6948e-5 kg; lognormal variance with pedigree 0.28409, pedigree (1,1,1,1,1)
  (same comment as for Nitrate)
- Fluoride [water, ground-]: 9.4008e-7 kg; lognormal variance with pedigree 0.3297, pedigree (1,1,1,1,1)
  (same comment as for Magnesium)
- Thallium [water, ground-, long-term]: 2.6148e-6 kg; lognormal variance with pedigree 0.36107, pedigree (1,1,1,1,1)
  (same comment as for Nitrate)
- DOC, Dissolved Organic Carbon [water, ground-]: 1.1344e-6 kg; lognormal variance with pedigree 0.32524, pedigree (1,1,1,1,1)
  (same comment as for Magnesium)
- Tin, ion [water, ground-]: 3.1011e-8 kg; lognormal variance with pedigree 0.44279, pedigree (1,1,1,1,1)
  (same comment as for Magnesium)
- DOC, Dissolved Organic Carbon [water, ground-, long-term]: 0.00067953 kg; lognormal variance with pedigree 0.40967, pedigree (1,1,1,1,1)
  (same comment as for Nitrate)
- Sulfate [water, ground-]: 0.00034422 kg; lognormal variance with pedigree 0.20704, pedigree (1,1,1,1,1)
  (same comment as for Magnesium)
- Copper, ion [water, ground-, long-term]: 0.00048915 kg; lognormal variance with pedigree 0.18784, pedigree (1,1,1,1,1)
  (same comment as for Nitrate)
- Thallium [water, ground-]: 5.3676e-10 kg; lognormal variance with pedigree 0.57618, pedigree (1,1,1,1,1)
  (same comment as for Magnesium)
- Copper, ion [water, ground-]: 2.6064e-7 kg; lognormal variance with pedigree 0.37158, pedigree (1,1,1,1,1)
  (same comment as for Magnesium)
- Sulfate [water, ground-, long-term]: 0.00035958 kg; lognormal variance with pedigree 0.20556, pedigree (1,1,1,1,1)
  (same comment as for Nitrate)
- COD, Chemical Oxygen Demand [water, ground-, long-term]: 6.1896e-5 kg; lognormal variance with pedigree 0.40967, pedigree (1,1,1,1,1)
  (same comment as for Nitrate)
- Strontium [water, ground-, long-term]: 9.9863e-5 kg; lognormal variance with pedigree 0.2405, pedigree (1,1,1,1,1)
  (same comment as for Nitrate)
- COD, Chemical Oxygen Demand [water, ground-]: 1.0333e-7 kg; lognormal variance with pedigree 0.32524, pedigree (1,1,1,1,1)
  (same comment as for Magnesium)
- Strontium [water, ground-]: 1.5474e-7 kg; lognormal variance with pedigree 0.38963, pedigree (1,1,1,1,1)
  (same comment as for Magnesium)
- Cobalt [water, ground-]: 1.1039e-7 kg; lognormal variance with pedigree 0.40496, pedigree (1,1,1,1,1)
  (same comment as for Magnesium)
- Silver, ion [water, ground-, long-term]: 9.7084e-6 kg; lognormal variance with pedigree 0.31795, pedigree (1,1,1,1,1)
  (same comment as for Nitrate)
- Cobalt [water, ground-, long-term]: 1.0523e-5 kg; lognormal variance with pedigree 0.31495, pedigree (1,1,1,1,1)
  (same comment as for Nitrate)
- Sodium, ion [water, ground-, long-term]: 0.0010313 kg; lognormal variance with pedigree 0.163, pedigree (1,1,1,1,1)
  (same comment as for Nitrate)
- Chromium VI [water, ground-, long-term]: 3.5854e-7 kg; lognormal variance with pedigree 1.7465, pedigree (1,1,1,1,1)
  (same comment as for Nitrate)
- Sodium, ion [water, ground-]: 1.1089e-5 kg; lognormal variance with pedigree 0.25233, pedigree (1,1,1,1,1)
  (same comment as for Magnesium)
- Chromium VI [water, ground-]: 7.6083e-9 kg; lognormal variance with pedigree 0.48859, pedigree (1,1,1,1,1)
  (same comment as for Magnesium)
- Silicon [water, ground-]: 4.309e-6 kg; lognormal variance with pedigree 0.28904, pedigree (1,1,1,1,1)
  (same comment as for Magnesium)
- Chloride [water, ground-]: 1.9739e-5 kg; lognormal variance with pedigree 0.25653, pedigree (1,1,1,1,1)
  (same comment as for Magnesium)
- Silicon [water, ground-, long-term]: 0.00020386 kg; lognormal variance with pedigree 1.7897, pedigree (1,1,1,1,1)
  (same comment as for Nitrate)
- Chloride [water, ground-, long-term]: 8.2872e-5 kg; lognormal variance with pedigree 0.24018, pedigree (1,1,1,1,1)
  (same comment as for Nitrate)
- Silver, ion [water, ground-]: 1.2613e-9 kg; lognormal variance with pedigree 0.54818, pedigree (1,1,1,1,1)
  (same comment as for Magnesium)
- Cadmium, ion [water, ground-, long-term]: 3.944e-6 kg; lognormal variance with pedigree 0.34749, pedigree (1,1,1,1,1)
  (same comment as for Nitrate)
- Selenium [water, ground-]: 3.7772e-9 kg; lognormal variance with pedigree 0.5122, pedigree (1,1,1,1,1)
  (same comment as for Magnesium)
- Calcium, ion [water, ground-]: 5.0338e-5 kg; lognormal variance with pedigree 0.20549, pedigree (1,1,1,1,1)
  (same comment as for Magnesium)
- Selenium [water, ground-, long-term]: 1.7495e-7 kg; lognormal variance with pedigree 0.98449, pedigree (1,1,1,1,1)
  (same comment as for Nitrate)
- Calcium, ion [water, ground-, long-term]: 0.0025809 kg; lognormal variance with pedigree 0.13321, pedigree (1,1,1,1,1)
  (same comment as for Nitrate)
- Scandium [water, ground-]: 4.5011e-8 kg; lognormal variance with pedigree 0.43181, pedigree (1,1,1,1,1)
  (same comment as for Magnesium)
- Bromine [water, ground-]: 2.7847e-10 kg; lognormal variance with pedigree 0.59659, pedigree (1,1,1,1,1)
  (same comment as for Magnesium)
- Potassium, ion [water, ground-, long-term]: 0.00044106 kg; lognormal variance with pedigree 0.29931, pedigree (1,1,1,1,1)
  (same comment as for Nitrate)
- Bromine [water, ground-, long-term]: 1.1836e-7 kg; lognormal variance with pedigree 0.4669, pedigree (1,1,1,1,1)
  (same comment as for Nitrate)
- Scandium [water, ground-, long-term]: 1.3298e-5 kg; lognormal variance with pedigree 0.30744, pedigree (1,1,1,1,1)
  (same comment as for Nitrate)
- Cadmium, ion [water, ground-]: 1.5232e-8 kg; lognormal variance with pedigree 0.46775, pedigree (1,1,1,1,1)
  (same comment as for Magnesium)
- Phosphate [water, ground-]: 3.6918e-5 kg; lognormal variance with pedigree 0.25967, pedigree (1,1,1,1,1)
  (same comment as for Magnesium)
- Boron [water, ground-, long-term]: 9.9936e-7 kg; lognormal variance with pedigree 1.2608, pedigree (1,1,1,1,1)
  (same comment as for Nitrate)
- Phosphate [water, ground-, long-term]: 0.00055316 kg; lognormal variance with pedigree 0.2188, pedigree (1,1,1,1,1)
  (same comment as for Nitrate)
- Boron [water, ground-]: 2.1323e-8 kg; lognormal variance with pedigree 0.45456, pedigree (1,1,1,1,1)
  (same comment as for Magnesium)
- Potassium, ion [water, ground-]: 8.2255e-7 kg; lognormal variance with pedigree 0.33426, pedigree (1,1,1,1,1)
  (same comment as for Magnesium)
- Beryllium [water, ground-]: 5.6857e-9 kg; lognormal variance with pedigree 0.49959, pedigree (1,1,1,1,1)
  (same comment as for Magnesium)
- Nickel, ion [water, ground-, long-term]: 1.7019e-5 kg; lognormal variance with pedigree 0.29926, pedigree (1,1,1,1,1)
  (same comment as for Nitrate)
- BOD5, Biological Oxygen Demand [water, ground-, long-term]: 1.2379e-6 kg; lognormal variance with pedigree 0.40967, pedigree (1,1,1,1,1)
  (same comment as for Nitrate)
- Occupation, dump site [natural resource, land]: 0.00098485 m2*year; lognormal variance with pedigree 0.14966, pedigree (1,1,1,1,1)
  for impoundment operation phase and 100 year renaturation phase.
  Uncertainty: U
- Beryllium [water, ground-, long-term]: 1.9749e-6 kg; lognormal variance with pedigree 0.37014, pedigree (1,1,1,1,1)
  (same comment as for Nitrate)
- Molybdenum [water, ground-, long-term]: 4.6989e-6 kg; lognormal variance with pedigree 0.35831, pedigree (1,1,1,1,1)
  (same comment as for Nitrate)
- BOD5, Biological Oxygen Demand [water, ground-]: 2.0666e-9 kg; lognormal variance with pedigree 0.32524, pedigree (1,1,1,1,1)
  (same comment as for Magnesium)
- Mercury [water, ground-, long-term]: 4.022e-7 kg; lognormal variance with pedigree 0.42167, pedigree (1,1,1,1,1)
  (same comment as for Nitrate)
- Barium [water, ground-]: 2.3419e-9 kg; lognormal variance with pedigree 0.52706, pedigree (1,1,1,1,1)
  (same comment as for Magnesium)
- Molybdenum [water, ground-]: 1.3108e-7 kg; lognormal variance with pedigree 0.39979, pedigree (1,1,1,1,1)
  (same comment as for Magnesium)
- Antimony [water, ground-, long-term]: 7.2349e-7 kg; lognormal variance with pedigree 1.2036, pedigree (1,1,1,1,1)
  (same comment as for Nitrate)
- Nickel, ion [water, ground-]: 5.8408e-8 kg; lognormal variance with pedigree 0.42321, pedigree (1,1,1,1,1)
  (same comment as for Magnesium)
- Vanadium, ion [water, ground-, long-term]: 1.7615e-7 kg; lognormal variance with pedigree 3.0319, pedigree (1,1,1,1,1)
  (same comment as for Nitrate)
- Barium [water, ground-, long-term]: 0.0002181 kg; lognormal variance with pedigree 0.2134, pedigree (1,1,1,1,1)
  (same comment as for Nitrate)
- Mercury [water, ground-]: 4.157e-10 kg; lognormal variance with pedigree 0.58385, pedigree (1,1,1,1,1)
  (same comment as for Magnesium)
- Zinc, ion [water, ground-]: 9.192e-7 kg; lognormal variance with pedigree 0.33231, pedigree (1,1,1,1,1)
  (same comment as for Magnesium)
- Antimony [water, ground-]: 1.546e-8 kg; lognormal variance with pedigree 0.46532, pedigree (1,1,1,1,1)
  (same comment as for Magnesium)
- Manganese [water, ground-, long-term]: 0.00014104 kg; lognormal variance with pedigree 0.22882, pedigree (1,1,1,1,1)
  (same comment as for Nitrate)
- Zinc, ion [water, ground-, long-term]: 0.00018927 kg; lognormal variance with pedigree 0.21913, pedigree (1,1,1,1,1)
  (same comment as for Nitrate)
- Aluminium [water, ground-, long-term]: 0.011946 kg; lognormal variance with pedigree 0.08654, pedigree (1,1,1,1,1)
  (same comment as for Nitrate)
- Manganese [water, ground-]: 1.0715e-6 kg; lognormal variance with pedigree 0.3284, pedigree (1,1,1,1,1)
  (same comment as for Magnesium)
- Tungsten [water, ground-, long-term]: 9.7047e-7 kg; lognormal variance with pedigree 0.64111, pedigree (1,1,1,1,1)
  (same comment as for Nitrate)
- Nitrate [water, ground-]: 7.0947e-6 kg; lognormal variance with pedigree 0.34575, pedigree (1,1,1,1,1)
  (same comment as for Magnesium)
- Magnesium [water, ground-, long-term]: 0.0013815 kg; lognormal variance with pedigree 0.15327, pedigree (1,1,1,1,1)
  (same comment as for Nitrate)
- Tungsten [water, ground-]: 2.1678e-8 kg; lognormal variance with pedigree 0.4554, pedigree (1,1,1,1,1)
  (same comment as for Magnesium)
- Aluminium [water, ground-]: 8.7781e-6 kg; lognormal variance with pedigree 0.25979, pedigree (1,1,1,1,1)
  (same comment as for Magnesium)

## Sampling procedure
Tailings model based on observed leachate concentrations in literature. Extrapolated to 60'000 years heeding chemical characteristics. Initial waste composition from various literature sources. Climate information for national copper deposits (identified from the USGS Major Mineral Deposits database) from literature as follows: global mean annual temperature and precipitation data from Fick and Hijmans (2017); global mean annual evapotranspiration data from Fekete et al. (2002).

References:
Fekete, B. M., Vorosmarty, C. J. & Grabs, W. (2002). High-resolution fields of global runoff combining observed river discharge and simulated water balances. Global Biogeochemical Cycles, 16, 15-1 - 15-10.
Fick, S. E. & Hijmans, R. J. (2017). Worldclim 2: New 1-km spatial resolution climate surfaces for global land areas. International Journal of Climatology, 37, 4302-4315.

## Extrapolations
Climate data collected for gold deposits in Australia and aggregated to reflect average climatic conditions of gold deposits in the country. Initial tailings composition based on global average gold tailings composition, derived from literature data. Initial leachate concentration based on generic global average data also obtained from the literature.
