# power adapter production, for laptop

Dataset: EcoSpold 2, unit process
Geography: GLO
Time period: 2003-01-01 to 2019-12-31
Technology level: current
Classification: EcoSpold01Categories: electronics/component
Classification: ISIC rev.4 ecoinvent: 2710:Manufacture of electric motors, generators, transformers and electricity di
Tags: ConvertedDataset
Scenario: Business-as-Usual
System model: Allocation at the point of substitution
Generated by: Martin Lehmann
Published in: Hischier R. 2007
Database: ecoinvent
isCopyrightProtected: false
accessRestrictedTo: 1

## General comment
This dataset represents the production of 1 unit of power adapter. It is based on a typical power adapter for laptops, with a total weight of 0.357 kg (without the belonging cables, which weigh an additional 0.174 kg). Main data are based on a study carried out with a leading laptop producer.
[This dataset was already contained in the ecoinvent database version 2. It was not individually updated during the transfer to ecoinvent version 3. Life Cycle Impact Assessment results may still have changed, as they are affected by changes in the supply chain, i.e. in other datasets. This dataset was generated following the ecoinvent quality guidelines for version 2. It may have been subject to central changes described in the ecoinvent version 3 change report (http://www.ecoinvent.org/database/ecoinvent-version-3/reports-of-changes/), and the results of the central updates were reviewed extensively. The changes added e.g. consistent water flows and other information throughout the database. The documentation of this dataset can be found in the ecoinvent reports of version 2, which are still available via the ecoinvent website. The change report linked above covers all central changes that were made during the conversion process.]

## Included activities start
From reception of raw materials and auxiliares at the factory gate.

## Included activities end
This dataset includes the materials steel, copper, HIPS and PVC with their respective manufacturing processes. Infrastructure and electricity are included. Emissions and waste are not taken into account.

## Geography
The data describes a typical power adapter for a laptop in 2003. The kind of laptop power adapter is produced by a leading international computer manufacturer and available all over the world. Therefore a global dataset is justifiable.

## Technology
The manufacturing process is inventoried through plastic extrusion (for HIPS and PVC), rolling of steel into plates, and wire drawing for copper.

## Reference product
- power adapter, for laptop: 1 unit; By-product classification allocatable product; CPC 461: Electric motors, generators and transformers, and parts thereof
  The PC’s power supply must accept a relatively high-voltage alternating current (AC) ranging in different countries from 100 to 240 V, and convert it into much lower voltage direct current (DC), which operates the electronic devices inside. Voltage variation outside the accepted standards can cause data errors or system crashes. The power supply runs all subsystems inside the system unit and is vital to the proper operation of any PC.
  EcoSpold01Location=GLO
  production volume 1 unit
    Unknown
    Dummy value to be replaced by value to be calculated from the demand for this treatment activity
  property carbon content, fossil 0.298152
    Calculated as the addition of C contents in the product composition
  property price 9.03 EUR2005
    From UN trade-database. Import data. (USD/kg). Category: Parts of primary cells and primary batteries. Weight: 0.357 kg. Data on Battery is used because data on power adapter not were easily available.
  property carbon content 0.298152
    carbon content on a dry matter basis (reserved; not for manual entry)
  property true value 9.03
    allocation property applied in "true value" allocation // value calculated from revenue
  properties: carbon content, non-fossil 0, water in wet mass 0 kg, dry mass 0.531 kg, wet mass 0.531 kg, water content 0, carbon allocation 0.158318 kg

## By-products
- iron scrap, sorted, pressed: 0 kg; By-product classification Recyclable; CPC 39310: Slag, dross, scalings and other waste from the manufacture of iron or steel; pedigree (1,1,1,1,1)
  replaces the original flow "Fe fraction of used IT accessory from mechanical treatment"
  production volume 0.129574 kg
  property price 0.175 EUR2005
    Temporary price data. Calculated as 90% of purchasers price based on: 2005 import and export prices (total trades (USD) divided by total weight (kg) in biggest economies of the world: EU27, USA, Brasil, China, India, Japan and Russia) from UN Commodity Trade Statistics Database (http://data.un.org/Explorer.aspxDatabase [Accessed 2011.06.20]). Commodity: Waste or scrap, of cast iron
  property carbon content 0
    carbon content on a dry matter basis (reserved; not for manual entry)
  property true value 0.0226755
    allocation property applied in "true value" allocation // value calculated from revenue
  properties: water content 0, carbon content, fossil 0, water in wet mass 0 kg, wet mass 1 kg, dry mass 1 kg, carbon content, non-fossil 0, carbon allocation 0 kg
- iron scrap, unsorted: 0 kg; source European Aluminium Association 2008; CPC 39310: Slag, dross, scalings and other waste from the manufacture of iron or steel; By-product classification Recyclable; pedigree (1,1,1,1,1)
  production volume 1.20343e-5 kg
  property price 0.149 EUR2005; name ironScrapAmount_price_EUR2005
    Temporary price data. Calculated as 90% of purchasers price based on: estimated at 85% of sorted scrap
  property carbon content 0
    carbon content on a dry matter basis (reserved; not for manual entry)
  property true value 1.79311e-6
    allocation property applied in "true value" allocation // value calculated from revenue
  properties: water in wet mass 0 kg, water content 0, carbon content, fossil 0, carbon content, non-fossil 0, dry mass 1 kg, wet mass 1 kg, carbon allocation 0 kg
- aluminium oxide, non-metallurgical: 0 kg; source European Aluminium Association 2008; CPC 41432: Alumina (aluminium oxide), except artificial corundum; By-product classification allocatable product; CAS 1344-28-1; pedigree (1,1,1,1,1)
  production volume 0.000757272 kg
  property carbon content, non-fossil 0; name C_content_non_fossil
  property price 0.28 EUR2005; name Al2O3Amount_price_EUR2005
    From UN trade database. http://data.un.org/ Import data from the largest economies of the world are used (Brazil, India, USA, China, Japan and EU-27).
  property dry mass 1 kg; name DM
  property water content 0; name water_content
  property wet mass 1 kg; name WM
  property water in wet mass 0 kg; name WWM
  property carbon content, fossil 0; name C_content_fossil
  property carbon content 0
    carbon content on a dry matter basis (reserved; not for manual entry)
  property true value 0.000212036
    allocation property applied in "true value" allocation // value calculated from revenue
  properties: carbon allocation 0 kg
- aluminium, cast alloy: 0 kg; source European Aluminium Association 2008; By-product classification allocatable product; CPC 41431: Unwrought aluminium; pedigree (1,1,1,1,1)
  EcoSpold01Location=RER
  production volume 0.00707882 kg
  property price 1.3 EUR2005; name castAlloyAmount_price_EUR2005
    Temporary price data. Calculated as 90% of purchasers price based on: Source: London Metal Exchange, Aluminium alloy price for 2005
  property carbon content 0
    carbon content on a dry matter basis (reserved; not for manual entry)
  property true value 0.00920246
    allocation property applied in "true value" allocation // value calculated from revenue
  properties: water in wet mass 0 kg, carbon content, non-fossil 0, water content 0, dry mass 1 kg, carbon content, fossil 0, wet mass 1 kg, carbon allocation 0 kg
- heat, for reuse in municipal waste incineration only: 0 MJ; CPC 17300: Steam and hot water; By-product classification allocatable product; pedigree (1,1,1,1,1)
  Net electricity generated from this waste and used in internal MSWI plant energy redistribution.
  Uncertainty: uncertainty is calculated from uncertainties in waste composition and uncertainties in energy efficiency and the uncertainty in internal energy demand
  production volume 2.04303 MJ
  property exergy 0.1842 MJ; name E_th_prod_MSWI_exergy
    This exergy property is based on the exergy content of the product.
  property true value relation 0.1842; name E_th_prod_MSWI_true_value_relation
    property to calculate "true value" from
  property price 0.0106 EUR2005; name E_th_prod_MSWI_price_EUR2005
    Average European district heat price from Ecoheatcool and Euroheat 2005-2006, Ecoheat Work package 1: The European heat market. Final report. 10.6 EUR/GJ i s the price of district heat. http://www.solarthermalworld.org/files/Ecoheatcool%20WP1%20Web.pdf?download
  property true value 0.0134053
    allocation property applied in "true value" allocation // value calculated from true value relation
- electricity, for reuse in municipal waste incineration only: 0 kWh; CPC 17100: Electrical energy; By-product classification allocatable product; pedigree (1,1,1,1,1)
  (same comment as for heat, for reuse in municipal waste incineration only)
  production volume 0.2922 kWh
  property exergy 3.6 MJ; name E_el_prod_MSWI_exergy
    This exergy property is based on the exergy content of the product.
  property true value relation 3.6; name E_el_prod_MSWI_true_value_relation
    property to calculate "true value" from
  property price 0.1 EUR2005; name E_el_prod_MSWI_price_EUR2005
    Estimated to be the same price as in case of electricity, medium voltage.
  property true value 0.0374709
    (same comment as for heat, for reuse in municipal waste incineration only)
- aluminium, wrought alloy: 0 kg; source European Aluminium Association 2008; By-product classification allocatable product; CPC 4153: Semi-finished products of aluminium or aluminium alloys; pedigree (1,1,1,1,1)
  production volume 0.00309897 kg
  property price 1.44 EUR2005; name secondaryAluminiumOutput_price_EUR2005
    Estimated based on literature values and expert judgement. Aluminium ccast alloys are about 90% of the price of aluminium wrought alloys.
  property carbon content 0
    carbon content on a dry matter basis (reserved; not for manual entry)
  property true value 0.00446252
    allocation property applied in "true value" allocation // value calculated from revenue
  properties: wet mass 1 kg, water content 0, carbon content, fossil 0, water in wet mass 0 kg, carbon content, non-fossil 0, dry mass 1 kg, carbon allocation 0 kg
- lead: 0 kg; CPC 41441: Lead, unwrought; By-product classification allocatable product
  EcoSpold01Location=SE
  production volume 0.00228147 kg
  property price 0.744 EUR2005
    Temporary price data. Calculated as 90% of purchasers price based on: Source: ecoinvent v2 report 10-part IX, Tab 5.10 & 2.5
  property carbon content 0
    carbon content on a dry matter basis (reserved; not for manual entry)
  property true value 0.00169741
    allocation property applied in "true value" allocation // value calculated from revenue
  properties: wet mass 1 kg, water content 0, carbon content, non-fossil 0, carbon content, fossil 0, dry mass 1 kg, water in wet mass 0 kg, carbon allocation 0 kg
- copper: 0 kg; By-product classification allocatable product; CPC 41413: Refined copper and copper alloys, unwrought; master alloys of copper
  EcoSpold01Location=SE
  production volume 0.0349529 kg
  properties: water content 0, water in wet mass 0 kg, carbon content, fossil 0, carbon content, non-fossil 0, dry mass 1 kg, wet mass 1 kg, price 5.52 EUR2005, carbon content 0, carbon allocation 0 kg, true value 0.19294
- nickel, 99.5%: 0 kg; CPC 41422: Unwrought nickel; By-product classification allocatable product
  EcoSpold01Location=SE
  production volume 0.0047625 kg
  property price 10.4 EUR2005
    Temporary price data. Calculated as 90% of purchasers price based on: 2004 nickel price from USGS (2007) Mineral commodity summaries 2007. <http://minerals.usgs.gov/minerals/pubs/mcs/2007/mcs2007.pdf> [Accessed 25 May 2010]
  property carbon content 0
    carbon content on a dry matter basis (reserved; not for manual entry)
  property true value 0.04953
    allocation property applied in "true value" allocation // value calculated from revenue
  properties: water in wet mass 0 kg, wet mass 1 kg, carbon content, non-fossil 0, dry mass 1 kg, water content 0, carbon content, fossil 0, carbon allocation 0 kg
- silver: 0 kg; CPC 41310: Silver (including silver plated with gold or platinum), unwrought or in semi-manufactured forms, or in powder […]; By-product classification allocatable product; CAS 7440-22-4
  EcoSpold01Location=SE
  production volume 0.000786479 kg
  property price 178 EUR2005
    (same comment as for lead)
  property carbon content 0
    carbon content on a dry matter basis (reserved; not for manual entry)
  property true value 0.139993
    allocation property applied in "true value" allocation // value calculated from revenue
  properties: wet mass 1 kg, carbon content, non-fossil 0, dry mass 1 kg, water content 0, carbon content, fossil 0, water in wet mass 0 kg, carbon allocation 0 kg
- palladium: 0 kg; CPC 4160: Other non-ferrous metals and articles thereof (including waste and scrap of some metals); cermets and articles […]; By-product classification allocatable product
  EcoSpold01Location=SE
  production volume 4.35368e-5 kg
  property price 5640 EUR2005
    Temporary price data. Calculated as 90% of purchasers price based on: 2004 price from USGS (2007) Mineral commodity summaries 2007. <http://minerals.usgs.gov/minerals/pubs/mcs/2007/mcs2007.pdf> [Accessed 25 May 2010]
  property carbon content 0
    carbon content on a dry matter basis (reserved; not for manual entry)
  property true value 0.245547
    allocation property applied in "true value" allocation // value calculated from revenue
  properties: wet mass 1 kg, carbon content, fossil 0, water in wet mass 0 kg, water content 0, carbon content, non-fossil 0, dry mass 1 kg, carbon allocation 0 kg
- gold: 0 kg; CPC 41320: Gold (including gold plated with platinum), unwrought or in semi-manufactured forms, or in powder form; By-product classification allocatable product; CAS 7440-57-5
  EcoSpold01Location=SE
  production volume 2.38754e-5 kg
  property price 10600 EUR2005
    Temporary price data. Calculated as 90% of purchasers price based on: Source: ecoinvent v2 report 10-part IX, Tab 2.5
  property carbon content 0
    carbon content on a dry matter basis (reserved; not for manual entry)
  property true value 0.253079
    allocation property applied in "true value" allocation // value calculated from revenue
  properties: wet mass 1 kg, carbon content, fossil 0, dry mass 1 kg, carbon content, non-fossil 0, water content 0, water in wet mass 0 kg, carbon allocation 0 kg
- zinc concentrate: 0 kg; CPC 14290: Other non-ferrous metal ores and concentrates (other than uranium or thorium ores and concentrates); By-product classification allocatable product
  Calculated value from the knowledge of the properties of both products.
  production volume 8.04143e-7 kg
  property price 0.38 EUR2005; name ByP_price_EUR2005
    Temporary price data. Calculated as 90% of purchasers price based on: Zinc content in concentrate 53%. Concentrate price per kg Zn 86.5% of refined Zn price (13.5% treatment charges according to CHR Metals Limited 2005: Dynamic cost curves. http://www.minecost.com/dynamic.pdf). 2004 zinc price from USGS (2007) Mineral commodity summaries 2007. <http://minerals.usgs.gov/minerals/pubs/mcs/2007/mcs2007.pdf> [Accessed 25 May 2010]
  property zinc content 0.53; name zinc_C_zinc_concentrate
    Zinc content on a dry matter basis. Value taken from teh "zinc mine operation" /GLO dataset.
  property dry mass 1 kg; name DM_zinc_concentrate
  property carbon content 0
    carbon content on a dry matter basis (reserved; not for manual entry)
  property true value 3.05574e-7
    allocation property applied in "true value" allocation // value calculated from revenue
  properties: wet mass 1 kg, water content 0, carbon content, non-fossil 0, carbon content, fossil 0, water in wet mass 0 kg, carbon allocation 0 kg

## Inputs from technosphere
- printed wiring board mounting facility: 6.70517e-8 unit; lognormal variance with pedigree 0.3701, pedigree (1,4,5,3,3)
  EcoSpold01Location=GLO
  Proxy, due to a lack of data printed wiring mounting plant is used.
- copper: 0.0483546 kg; source von Geibler J. 2003; lognormal variance with pedigree 0.0521, pedigree (1,4,5,3,1)
  EcoSpold01Location=RER
  Literature Value.
  properties: dry mass 1 kg, wet mass 1 kg
- sheet rolling, steel: 0.161182 kg; source von Geibler J. 2003; lognormal variance with pedigree 0.0521, pedigree (1,4,5,3,1)
  Literature Value.
  EcoSpold01Location=RER
- steel, chromium steel 18/8, hot rolled: 0.161182 kg; source von Geibler J. 2003; lognormal variance with pedigree 0.0521, pedigree (1,4,5,3,1)
  Literature Value.
  EcoSpold01Location=RER
  properties: dry mass 1 kg, carbon content, fossil 0.0008, wet mass 1 kg
  note on carbon content, fossil: Stainless steel model is the grade 304 steel (18/8 stainless, 18% chromium 8% nickel; max. 0.08% C)
- polyvinylchloride, emulsion polymerised: 0.0041153 kg; source von Geibler J. 2003; lognormal variance with pedigree 0.0521, pedigree (1,4,5,3,1)
  EcoSpold01Location=RER
  Literature Value.
  properties: dry mass 1 kg, wet mass 1 kg, carbon content, fossil 0.387097
  note on carbon content, fossil: Monomer is vynyl chloride, C2H3Cl (ecoinvent v2.2 report 11_II). MW=62 g/mol
- used IT accessory: -0.47858 kg; source von Geibler J. 2003; lognormal variance with pedigree 0.0701, pedigree (1,4,5,3,3)
  EcoSpold01Location=CH
  Literature Value.
  production volume 0.53 kg
    Calculated from the production volume of power adapter, for laptop in proportion to the respective output amounts.
  properties: wet mass 1 kg, dry mass 1 kg, carbon content, fossil 0.470164
  note on carbon content, fossil: The composition of the IT accessory is an average of the keyboard, optical mouse and external power adapter (for laptop) composition (ecoinvent v2.2 report 18_V, pg 67). The C content was calculated from Tab 4.43 and 4.44: 16.19% is cables and 83.81 goes to mechanical treatment. According to the European company, 1 kg cable is split up into 0.66 kg of copper and 0.34 kg of plastics (ecoinvent v2.2 report 18_V, pg 97). Plastic C content was calculated using data in Tab A.2, ecoinvent v2.2 report 13_I. From shredder, only plastic and other (others was also considered plastic (from pg 70, ecoinvent v2.2 report 18_V)) were considered to have a carbon content, and it was calculated using data in Tab A.2, ecoinvent v2.2 report 13_I.
- extrusion, plastic pipes: 0.112827 kg; source von Geibler J. 2003; lognormal variance with pedigree 0.0521, pedigree (1,4,5,3,1)
  EcoSpold01Location=RER
  Literature Value.
- cable, connector for computer, without plugs: 1.62536 m; source von Geibler J. 2003; lognormal variance with pedigree 0.0521, pedigree (1,4,5,3,1)
  EcoSpold01Location=GLO
  Literature Value.
  properties: dry mass 0.065 kg, carbon content, fossil 0.359823, wet mass 0.065 kg
  note on carbon content, fossil: Calculated as the addition of C contents in the product composition. Then referred to 1 kg DM
- wire drawing, copper: 0.0483546 kg; source von Geibler J. 2003; lognormal variance with pedigree 0.0521, pedigree (1,4,5,3,1)
  Literature Value.
  EcoSpold01Location=RER
- electricity, medium voltage: 0.25083 kWh; source Stachura 2006; lognormal variance with pedigree 0.0421, pedigree (1,4,5,3,1)
  Estimation, based on literature.
  EcoSpold01Location=UCTE
- plug, inlet and outlet, for computer cable: 0.90298 unit; source von Geibler J. 2003; lognormal variance with pedigree 0.0521, pedigree (1,4,5,3,1)
  Literature Value.
  EcoSpold01Location=GLO
  properties: dry mass 0.0585 kg, carbon content, fossil 0.3397, wet mass 0.0585 kg
  note on carbon content, fossil: Calculated as the addition of C contents in the product composition
- polyvinylchloride, suspension polymerised: 0.0281211 kg; source von Geibler J. 2003; lognormal variance with pedigree 0.0521, pedigree (1,4,5,3,1)
  EcoSpold01Location=RER
  Literature Value.
  properties: carbon content, fossil 0.387097, wet mass 1 kg, dry mass 1 kg
- polystyrene, high impact: 0.080591 kg; source von Geibler J. 2003; lognormal variance with pedigree 0.0521, pedigree (1,4,5,3,1)
  EcoSpold01Location=RER
  Literature Value.
  properties: wet mass 1 kg, dry mass 1 kg, carbon content, fossil 0.923077
  note on carbon content, fossil: Chemical formula of polystyrene is (C8H8)n (ecoinvent v2.2 report 11_II)

## Sampling procedure
Literature and own assumptions for cable input and electricity consumption.

## Review by Roland Hischier 2011-09-22
Transfer of documentation done.

## Review by Jürgen Sutter 2007-11-08
passed.
-
