# operation, printer, laser, black/white, per kg printed paper

Dataset: EcoSpold 2, unit process
Geography: CH
Time period: 2002-01-01 to 2019-12-31
Technology level: current
Classification: EcoSpold01Categories: electronics/services
Classification: ISIC rev.4 ecoinvent: 8219:Photocopying, document preparation and other specialized office support act
Tags: Operation
Scenario: Business-as-Usual
System model: Allocation at the point of substitution
Generated by: Martin Lehmann
Published in: Hischier R. 2007
Database: ecoinvent
isCopyrightProtected: false
accessRestrictedTo: 1

## General comment
The laser jet printer use (b/w, office) is calculated via the active mode electricity consumption taken from literature information. The dataset includes the share of the printer production (assumed life span 4 years), the energy consumption for the different modes in the use-phase, the toner usage as well as the benzene emissions for the printing of 1 kg of paper.
Reccomended printing volume for this kind of printer is 20,000 pages/months (http://www.epson.de/de/en/viewcon/corporatesite/products/mainunits/specs/9538). Paper quality assumptions; one sheet of paper weights 5g (80g/m2 as an average printing paper).

## Included activities end
Describes the use of a laser jet printer (monochrome) in an office. Calculated per 1 kg of printed paper. Swiss supply mix applied for electricity consumption (low voltage).

## Geography
The data is based on information by international printer manufacturers and literature. Due to relatively vague literature data for laser jet printer life span and mode splits, assumptions had to be made.

## Technology
No technology involved, except for the production of printer and toner, which are represented in the individual subdatasets.

## Reference product
- printed paper: 1 kg; name printed_paper_RP; CPC 32129: Other uncoated paper and paperboard, of a kind used for writing, printing or other graphic purposes, and punch[…]; By-product classification allocatable product
  production volume 8.85876e7 kg; = (15680441.25*20000*12*0.005)*(2.66E+11/5.65E+13)
    Calculated based on literature value and estimates. 1.57E+07 is the amount of black/white laser printers produced in the world in 2003 (UN data). Commodity: 'Printers'. 50% is assumed to be black-white and 50% colour. 20,000 pg/month is the reccomended production volume by the manufacturer for this kind of printer (http://www.epson.de/de/en/viewcon/corporatesite/products/mainunits/specs/9538). 0.005 kg is the weight of one sheet of paper. The GLO production is scaled to swiss production using GDP; Switzerland (5.65E+13 USD/year 2005), GLO (5.65E+13 USD/year 2005) from IMF (www.imf.org).
  property dry mass 0.945 kg; name printed_paper_RP_DM
  property wet mass 1 kg; name printed_paper_RP_WM
  property price 5.4392 EUR2005; name printed_paper_RP_price_EUR2005
    Calculated based on inputs: The price of the product has been calculated as a sum of the values of the material and energy inputs for this product. This value is therefore a rough estimation. It may underestimate the real price since there are additional expenses when producing any product. These expences can include for example labour costs, treatment of waste materials and profit for the producer. Please consider carefully whether this level of data quality is acceptable for your application.
  property carbon content, fossil 0.032531; name printed_paper_RP_C_content_fossil
    fossil carbon content on a dry matter basis
  property water in wet mass 0.055 kg; name printed_paper_RP_WWM; = printed_paper_RP_WM-printed_paper_RP_DM
  property water content 0.0582011; name printed_paper_RP_water_content; = printed_paper_RP_WWM/printed_paper_RP_DM
  property carbon content 0.032531
    carbon content on a dry matter basis (reserved; not for manual entry)
  property true value 5.4392; name printed_paper_RP_true_value
    allocation property applied in "true value" allocation // value calculated from revenue
  properties: carbon allocation 0.0307418 kg

## By-products
- toner module, laser printer, black/white: 0 unit; By-product classification allocatable product; CPC 44922: Parts for the goods of subclasses 44914, 44917 and 45150; pedigree (1,1,1,1,1)
  Calculated value based on literature. The weight of one toner module, laser printer, black/white is assumed to be 0.88 kg (based on ecoinvent v2 report no. 18 II., pg. 200). Further it is assumed that the toner module is recycled (re-manufactured) twice.
  production volume 1.88514e6 unit
  properties: price 121 EUR2005, wet mass 1.14 kg, dry mass 1.14 kg, water in wet mass 0 kg, carbon content, non-fossil 0, carbon content, fossil 0.510352, water content 0, carbon content 0.510352, carbon allocation 0.581801 kg, true value 2.57488
- electricity, for reuse in municipal waste incineration only: 0 kWh; CPC 17100: Electrical energy; By-product classification allocatable product; pedigree (1,1,1,1,1)
  Net electricity generated from this waste and used in internal MSWI plant energy redistribution.
  Uncertainty: uncertainty is calculated from uncertainties in waste composition and uncertainties in energy efficiency and the uncertainty in internal energy demand
  production volume 795933 kWh
  property true value relation 3.6; name E_el_prod_MSWI_true_value_relation
    property to calculate "true value" from
  property exergy 3.6 MJ; name E_el_prod_MSWI_exergy
    This exergy property is based on the exergy content of the product.
  property price 0.1 EUR2005; name E_el_prod_MSWI_price_EUR2005
    Estimated to be the same price as in case of electricity, medium voltage.
  property true value 0.00115152
    allocation property applied in "true value" allocation // value calculated from true value relation
- heat, for reuse in municipal waste incineration only: 0 MJ; CPC 17300: Steam and hot water; By-product classification allocatable product; pedigree (1,1,1,1,1)
  Net useful heat generated from this waste and used in internal MSWI plant energy redistribution.
  Uncertainty: uncertainty is calculated from uncertainties in waste composition and uncertainties in energy efficiency and the uncertainty in internal energy demand
  production volume 5.54576e6 MJ
  property true value relation 0.1842; name E_th_prod_MSWI_true_value_relation
    property to calculate "true value" from
  property exergy 0.1842 MJ; name E_th_prod_MSWI_exergy
    This exergy property is based on the exergy content of the product.
  property price 0.0106 EUR2005; name E_th_prod_MSWI_price_EUR2005
    Average European district heat price from Ecoheatcool and Euroheat 2005-2006, Ecoheat Work package 1: The European heat market. Final report. 10.6 EUR/GJ i s the price of district heat. http://www.solarthermalworld.org/files/Ecoheatcool%20WP1%20Web.pdf?download
  property true value 0.000410529
    (same comment as for electricity, for reuse in municipal waste incineration only)
- zinc concentrate: 0 kg; CPC 14290: Other non-ferrous metal ores and concentrates (other than uranium or thorium ores and concentrates); By-product classification allocatable product
  Calculated value from the knowledge of the properties of both products.
  production volume 25.5222 kg
  property price 0.38 EUR2005; name ByP_price_EUR2005
    Temporary price data. Calculated as 90% of purchasers price based on: Zinc content in concentrate 53%. Concentrate price per kg Zn 86.5% of refined Zn price (13.5% treatment charges according to CHR Metals Limited 2005: Dynamic cost curves. http://www.minecost.com/dynamic.pdf). 2004 zinc price from USGS (2007) Mineral commodity summaries 2007. <http://minerals.usgs.gov/minerals/pubs/mcs/2007/mcs2007.pdf> [Accessed 25 May 2010]
  property zinc content 0.53; name zinc_C_zinc_concentrate
    Zinc content on a dry matter basis. Value taken from teh "zinc mine operation" /GLO dataset.
  property dry mass 1 kg; name DM_zinc_concentrate
  property carbon content 0
    carbon content on a dry matter basis (reserved; not for manual entry)
  property true value 1.09479e-7
    allocation property applied in "true value" allocation // value calculated from revenue
  properties: wet mass 1 kg, water content 0, carbon content, non-fossil 0, carbon content, fossil 0, water in wet mass 0 kg, carbon allocation 0 kg
- waste paperboard, sorted: 0 kg; CPC 39240: Waste and scrap of paper or paperboard; By-product classification Recyclable; pedigree (1,1,1,1,1)
  It is assumed that 86.3% (wet weight) of waste paperboard, unsorted is segregated to waste paperboard, sorted. Waste paper, sorted is later used in recycling industry where maximum 79% of it, is transformed into new paperboard.
  production volume 2.47085e6 kg
  property price 0.0436 EUR2005; name ByP_waste_paperboard_sorted_price_EUR200
    Estimated value; three different sources were used to determine the price for waste paperboard, sorted. 35 AUD/tonne (http://larimer.org/solidwaste/charts/Current.htm, accessed 20130328), 70 GBP/tonne (http://www.letsrecycle.com/prices/waste%20paper, accessed 20130328) and 20 USD/tonne (http://www.oxpaperboard.com/1/post/2013/03/ox-paperboard-announces-price-adjustment-to-uncoated-recycled-paperboard.html, accessed 20130328).
  property water content 0.243781; = WWM_waste_paperboard_sorted/ DM_waste_paperboard_sorted
  property water in wet mass 0.196 kg; name WWM_waste_paperboard_sorted; = WM_waste_paperboard_sorted- DM_waste_paperboard_sorted
  property dry mass 0.804 kg; name DM_waste_paperboard_sorted
  property wet mass 1 kg; name WM_waste_paperboard_sorted
  property carbon content 0.483259
    carbon content on a dry matter basis (reserved; not for manual entry)
  property true value 0.00121607
    allocation property applied in "true value" allocation // value calculated from revenue
  properties: carbon content, non-fossil 0.483259, carbon content, fossil 0, carbon allocation 0.38854 kg

## Inputs from technosphere
- paper, woodcontaining, lightweight coated: 0.67847 kg
  properties: dry mass 0.945 kg, water content 0.0582011, wet mass 1 kg, carbon content, fossil 0.032531, carbon content, non-fossil 0.247213
- electricity, low voltage: 0.0522422 kWh; lognormal variance with pedigree 0.041225, pedigree (2,3,5,2,1)
  EcoSpold01Location=CH
- used toner module, laser printer, black/white: -0.0238822 kg; = (0.88*toner_module_LP_BW_input)*-1; lognormal variance with pedigree 0.0526, pedigree (4,4,5,5,1)
  Measured value. The weight of 1 toner module is 0.88 kg.
  production volume 3.11828e6 kg; = (Ref('67bec09e-e63f-4141-91db-b9aec327d0fb')*-1)/ printed_paper_RP* Ref('048e5c7f-a225-4c6d-8abc-0a4bf2a20941', 'ProductionVolume')
    Calculated from production volume of reference product using the relative outputs.
- printer, laser, black/white: 0.000141348 unit; = printed_paper_RP/(20000*12*4*0.005); lognormal variance with pedigree 0.052625, pedigree (3,3,5,2,1)
  EcoSpold01Location=GLO
  Calculated based on literature values and estimates. The monthly production volume of this type of printer is 20,000 pg (http://www.epson.de/de/en/viewcon/corporatesite/products/mainunits/specs/9538). The weight of one page is 0.005kg. The lifetime of a printer is estimated to be 4 years. In its lifetime the printer is able to print on (20,000*12*4=) 960,000 pages, of total weight (960,000*0.005=) 4800 kg.
  property lifetime 4 year; name printer_LT
  properties: wet mass 6 kg, dry mass 6 kg, lifetime capacity [kg] 4800 kg, carbon content, fossil 0.571055
  note on lifetime capacity [kg]: Calculated value; reccomended printing volume for this kind of printer is 20,000 pages/months (http://www.epson.de/de/en/viewcon/corporatesite/products/mainunits/specs/9538). Paper quality assumptions; one sheet of paper weights 5g (80g/m2 as an average printing paper). The lifetime of a printer is estimated to be 4 years.
  note on carbon content, fossil: Calculated as the addition of C contents in the product composition, then referred to 1 kg DM
- toner module, laser printer, black/white: 0.0271388 unit; name toner_module_LP_BW_input; = printed_paper_RP/(5000*0.005); lognormal variance with pedigree 0.051225, pedigree (2,3,5,2,1)
  Calculated based on literature and estimates. Toner module capacity is 5000 pages, one page weight 0.005 kg, thus total weight of paper one toner module can print on is (5000*0.005=) 25 kg. In order to print on paper of total weight of 1 kg (1/25=) 0.04 units of toner module is needed.
  properties: wet mass 1.14 kg, dry mass 1.14 kg, carbon content, fossil 0.510352
  note on carbon content, fossil: C content was calculated as the addition of C content in the components

## Emissions to nature
- Benzene [air, unspecified]: 1.25259e-7 kg; lognormal variance with pedigree 0.1787, pedigree (2,5,5,3,1)

## Sampling procedure
Manufacturers, literature and own assumptions.

## Extrapolations
see Geography and Technology

## Review by Jürgen Sutter 2007-09-14
passed
none

## Review by Emilia Moreno Ruiz 2013-01-15
paper has been added as input from technosphere; and printed paper as a reference product
