# treatment of wastewater, average, capacity 4.7E10l/year

Dataset: EcoSpold 2, unit process
Geography: CH
Time period: 1994-01-01 to 2019-12-31
Technology level: current
Classification: EcoSpold01Categories: waste management/wastewater treatment
Classification: ISIC rev.4 ecoinvent: 3700:Sewerage
Tags: Treatment; ConvertedDataset
Scenario: Business-as-Usual
System model: Allocation at the point of substitution
Generated by: Gabor Doka (obsolete)
Published in: Doka G. 2008
Database: ecoinvent
isCopyrightProtected: true
accessRestrictedTo: 1

## General comment
Wastewater purified in a large municipal wastewater treatment plant (capacity class 1), with an average capacity size of 233000 per-captia-equivalents PCE.
Wastewater contains (in kg/m3): COD: 0.1556 (GSD=122.5%); BOD: 0.1036 (GSD=122.5%); DOC: 0.04575 (GSD=122.5%); TOC: 0.0673 (GSD=122.5%); SO4-S: 0.044 (GSD=122.5%); S part.: 0.002 (GSD=122.5%); NH4-N: 0.01495 (GSD=122.5%); NO3-N: 0.00105 (GSD=122.5%); NO2-N: 0.0004 (GSD=122.5%); N part.: 0.003279 (GSD=122.5%); N org. solv.: 0.008392 (GSD=122.5%); PO4-P: 0.002459 (GSD=122.5%); P part.: 0.0006147 (GSD=122.5%); Cl: 0.03003 (GSD=224.1%); F: 0.00003277 (GSD=224.1%); As: 0.0000009 (GSD=224.1%); Cd: 0.0000002806 (GSD=223.8%); Co: 0.000001618 (GSD=223.8%); Cr: 0.00001223 (GSD=223.8%); Cu: 0.00003744 (GSD=223.8%); Hg: 0.0000002 (GSD=223.8%); Mn: 0.000053 (GSD=224.1%); Mo: 0.0000009574 (GSD=223.8%); Ni: 0.000006589 (GSD=223.8%); Pb: 0.000008631 (GSD=223.8%); Sn: 0.0000034 (GSD=224.1%); Zn: 0.0001094 (GSD=223.8%); Si: 0.003126 (GSD=224.1%); Fe: 0.007093 (GSD=224.1%); Ca: 0.05083 (GSD=224.1%); Al: 0.001038 (GSD=224.1%); K: 0.0003989 (GSD=224.1%); Mg: 0.005707 (GSD=224.1%); Na: 0.002186 (GSD=224.1%);
[This dataset was already contained in the ecoinvent database version 2. It was not individually updated during the transfer to ecoinvent version 3. Life Cycle Impact Assessment results may still have changed, as they are affected by changes in the supply chain, i.e. in other datasets. This dataset was generated following the ecoinvent quality guidelines for version 2. It may have been subject to central changes described in the ecoinvent version 3 change report (http://www.ecoinvent.org/database/ecoinvent-version-3/reports-of-changes/), and the results of the central updates were reviewed extensively. The changes added e.g. consistent water flows and other information throughout the database. The documentation of this dataset can be found in the ecoinvent reports of version 2, which are still available via the ecoinvent website. The change report linked above covers all central changes that were made during the conversion process.]

## Included activities end
Infrastructure materials for municipal wastewater treatment plant, transports, dismantling. Land use burdens.

## Geography
Specific to the technology mix encountered in Switzerland in 2000. Well applicable to modern treatment practices in Europe, North America or Japan.

## Technology
Three stage wastewater treatment (mechanical, biological, chemical) including sludge digestion (fermentation) according to the average technology in Switzerland

## Parameters
- fraction, process water, to air: 0.1 dimensionless; name fraction_PW_to_air; lognormal variance with pedigree 0.092025, pedigree (4,4,3,2,4)
  Literature value (Statistics Canada, 2007 & Shaffer, K.H., 2008, Consumptive water use in the Great Lakes Basin, USGS) (Vionnet, S., Quantis Water Database - Technical Report, 2012).

## Reference product
- wastewater, average: -1 m3; CPC 39920: Sewage sludge; By-product classification Waste
  production volume 2.81588e8 m3
    (year 2000) source: ecoinvent v2, report 13IV p.2
  property price 0 EUR2005
    Waste products are assigned a price of zero as they are assumed to require further treatment.
  property carbon content, non-fossil 0.194039
    0.0673 kg TOC/m3 (Tab A.17, ecoinvent v2.2 report 13_I). TOC was considered as Total Carbon.
  property carbon content 0.194039
    carbon content on a dry matter basis (reserved; not for manual entry)
  properties: wet mass 1000 kg, water content 2882.2, carbon content, fossil 0, water in wet mass 999.653 kg, dry mass 0.346837 kg, carbon allocation 0.0673 kg

## By-products
- electricity, for reuse in municipal waste incineration only: 0 kWh; CPC 17100: Electrical energy; By-product classification allocatable product; pedigree (1,1,1,1,1)
  Net electricity generated from this waste and used in internal MSWI plant energy redistribution.
  Uncertainty: uncertainty is calculated from uncertainties in waste composition and uncertainties in energy efficiency and the uncertainty in internal energy demand
  property exergy 3.6 MJ; name E_el_prod_MSWI_exergy
    This exergy property is based on the exergy content of the product.
  property true value relation 3.6; name E_el_prod_MSWI_true_value_relation
    property to calculate "true value" from
  property price 0.1 EUR2005; name E_el_prod_MSWI_price_EUR2005
    Estimated to be the same price as in case of electricity, medium voltage.
- heat, for reuse in municipal waste incineration only: 0 MJ; CPC 17300: Steam and hot water; By-product classification allocatable product; pedigree (1,1,1,1,1)
  Net useful heat generated from this waste and used in internal MSWI plant energy redistribution.
  Uncertainty: uncertainty is calculated from uncertainties in waste composition and uncertainties in energy efficiency and the uncertainty in internal energy demand
  property true value relation 0.1842; name E_th_prod_MSWI_true_value_relation
    property to calculate "true value" from
  property exergy 0.1842 MJ; name E_th_prod_MSWI_exergy
    This exergy property is based on the exergy content of the product.
  property price 0.0106 EUR2005; name E_th_prod_MSWI_price_EUR2005
    Average European district heat price from Ecoheatcool and Euroheat 2005-2006, Ecoheat Work package 1: The European heat market. Final report. 10.6 EUR/GJ i s the price of district heat. http://www.solarthermalworld.org/files/Ecoheatcool%20WP1%20Web.pdf?download
- zinc concentrate: 0 kg; CPC 14290: Other non-ferrous metal ores and concentrates (other than uranium or thorium ores and concentrates); By-product classification allocatable product
  Calculated value from the knowledge of the properties of both products.
  property price 0.38 EUR2005; name ByP_price_EUR2005
    Temporary price data. Calculated as 90% of purchasers price based on: Zinc content in concentrate 53%. Concentrate price per kg Zn 86.5% of refined Zn price (13.5% treatment charges according to CHR Metals Limited 2005: Dynamic cost curves. http://www.minecost.com/dynamic.pdf). 2004 zinc price from USGS (2007) Mineral commodity summaries 2007. <http://minerals.usgs.gov/minerals/pubs/mcs/2007/mcs2007.pdf> [Accessed 25 May 2010]
  property zinc content 0.53; name zinc_C_zinc_concentrate
    Zinc content on a dry matter basis. Value taken from teh "zinc mine operation" /GLO dataset.
  property dry mass 1 kg; name DM_zinc_concentrate
  property carbon content 0
    carbon content on a dry matter basis (reserved; not for manual entry)
  properties: wet mass 1 kg, water content 0, carbon content, non-fossil 0, carbon content, fossil 0, water in wet mass 0 kg, carbon allocation 0 kg

## Inputs from technosphere
- cement, unspecified: 0.0017323 kg; lognormal variance with pedigree 0.08, pedigree (1,1,5,1,1)
  burden from sludge incineration. Uncertainty calculated from wastewater composition and treatment model
  properties: dry mass 1 kg, wet mass 1 kg
- iron (III) chloride, without water, in 40% solution state: 0.015948 kg; lognormal variance with pedigree 0.1, pedigree (1,1,5,1,1)
  direct wastewater treatment plant burden plus burden from sludge incineration. Uncertainty calculated from wastewater composition and treatment model
  properties: wet mass 1 kg, dry mass 1 kg
- wastewater treatment facility, capacity 4.7E10l/year: 6.0643e-10 unit; lognormal variance with pedigree 0.04, pedigree (1,1,5,1,1)
  uncertainty heeded in exchanges of the module
- chromium oxide, flakes: 4.9242e-8 kg; lognormal variance with pedigree 0.54, pedigree (1,1,5,1,1)
  (same comment as for cement, unspecified)
  properties: wet mass 1 kg, dry mass 1 kg
- quicklime, milled, packed: 1.4666e-6 kg; lognormal variance with pedigree 0.08, pedigree (1,1,5,1,1)
  (same comment as for cement, unspecified)
  properties: dry mass 0.99 kg, wet mass 1 kg, water content 0.010101
- municipal waste incineration facility: 3.7921e-11 unit; lognormal variance with pedigree 0.04, pedigree (1,1,5,1,1)
  (same comment as for cement, unspecified)
- process-specific burdens, residual material landfill: 0.0043308 kg; lognormal variance with pedigree 0.07, pedigree (1,1,5,1,1)
  burden from sludge incineration. Uncertainty calculated from wastewater composition and treatment model;activityLink introduced to establish a direct link to the corresponding regional supply of this product
- liquid manure spreading, by vacuum tanker: 0.00023908 m3; lognormal variance with pedigree 0.04, pedigree (1,1,5,1,1)
  burden from sludge spreading. Uncertainty calculated from wastewater composition and treatment model
  This exchange has an activity link directly to the producing activity because the product is primarily consumed in the same geographical area where it is produced.
- sodium hydroxide, without water, in 50% solution state: 0.00041192 kg; lognormal variance with pedigree 0.09, pedigree (1,1,5,1,1)
  (same comment as for cement, unspecified)
  properties: wet mass 1 kg, dry mass 1 kg
- chemical, organic: 6.1468e-7 kg; lognormal variance with pedigree 0.43, pedigree (1,1,5,1,1)
  (same comment as for cement, unspecified)
  properties: carbon content, fossil 0.628, dry mass 1 kg, wet mass 1 kg
  note on carbon content, fossil: This dataset is an unweighted average of 20 organic substances (listed in Tab 88.1, ecoinvent v2.2 report 8, part II), being part of the top100 chemicals included in this database. The C-content has also been calculated as an unweighted average of the C content of the substances composing this dataset.
- iron sulfate: 0.01166 kg; lognormal variance with pedigree 0.1, pedigree (1,1,5,1,1)
  direct wastewater treatment plant burden. Uncertainty calculated from wastewater composition and treatment model
  properties: dry mass 1 kg, wet mass 1 kg
- ammonia, liquid: 8.4292e-5 kg; lognormal variance with pedigree 0.22, pedigree (1,1,5,1,1)
  (same comment as for cement, unspecified)
  properties: wet mass 1 kg, dry mass 1 kg
- chemical, inorganic: 7.7017e-7 kg; lognormal variance with pedigree 0.08, pedigree (1,1,5,1,1)
  (same comment as for cement, unspecified)
  properties: wet mass 1 kg, dry mass 1 kg, carbon content, fossil 0.003
  note on carbon content, fossil: This dataset is an unweighted average of 20 inorganic substances (listed in Tab 88.1, ecoinvent v2.2 report 8, part II), being part of the top100 chemicals included in this database. The C-content has also been calculated as an unweighted average of the C content of the substances composing this dataset.
- heat, district or industrial, other than natural gas: 0.12722 MJ; lognormal variance with pedigree 0.04, pedigree (1,1,5,1,1)
  (same comment as for cement, unspecified)
- process-specific burdens, municipal waste incineration: 0.15169 kg; lognormal variance with pedigree 0.04, pedigree (1,1,5,1,1)
  (same comment as for process-specific burdens, residual material landfill)
- waste plastic, mixture: -0.0155 kg; lognormal variance with pedigree 0.04, pedigree (1,1,5,1,1)
  (same comment as for iron sulfate)
  production volume 4.36461e6 kg; = (Ref('9352c74b-4b14-48bb-82f7-ed93379cfa56')*-1)* Ref('5b4c171f-e473-4962-b79f-3b46dfef04f2', 'ProductionVolume')/ABS( Ref('5b4c171f-e473-4962-b79f-3b46dfef04f2'))
    Calculated from the production volume of sewage, average in proportion to the respective output amounts.
  properties: wet mass 1 kg, water content 0.180638, carbon content, fossil 0.747344, dry mass 0.847 kg
  note on carbon content, fossil: C content in 1 kg DM was calculated using data in Tab A.2, ecoinvent v2.2 report 13_I
- electricity, high voltage: 0.021808 kWh; lognormal variance with pedigree 0.49, pedigree (1,1,5,1,1)
  (same comment as for cement, unspecified)
- waste cement, hydrated: -0.0043308 kg; lognormal variance with pedigree 0.08, pedigree (1,1,5,1,1)
  (same comment as for cement, unspecified)
  production volume 1.2195e6 kg; = (Ref('0d279b35-4a75-49f6-8f09-9ff60ac4a345')*-1)* Ref('5b4c171f-e473-4962-b79f-3b46dfef04f2', 'ProductionVolume')/ABS( Ref('5b4c171f-e473-4962-b79f-3b46dfef04f2'))
    (same comment as for waste plastic, mixture)
  properties: dry mass 1 kg, wet mass 1 kg
- heat, district or industrial, natural gas: 0.00739836 MJ; lognormal variance with pedigree 0.22, pedigree (1,1,5,1,1)
  (same comment as for cement, unspecified)
- waste graphical paper: -0.0155 kg; lognormal variance with pedigree 0.04, pedigree (1,1,5,1,1)
  (same comment as for iron sulfate)
  production volume 4.36461e6 kg; = (Ref('8a3c625a-cb36-41a7-8510-14f824255340')*-1)* Ref('5b4c171f-e473-4962-b79f-3b46dfef04f2', 'ProductionVolume')/ABS( Ref('5b4c171f-e473-4962-b79f-3b46dfef04f2'))
    (same comment as for waste plastic, mixture)
  properties: carbon content, non-fossil 0.454955, water content 0.126126, wet mass 1 kg, dry mass 0.888 kg
- slag landfill: 4.9107e-11 unit; lognormal variance with pedigree 0.07, pedigree (1,1,5,1,1)
  (same comment as for cement, unspecified)
- residual material landfill: 9.0224e-12 unit; lognormal variance with pedigree 0.07, pedigree (1,1,5,1,1)
  (same comment as for cement, unspecified)
- hydrochloric acid, without water, in 30% solution state: 4.621e-7 kg; lognormal variance with pedigree 0.08, pedigree (1,1,5,1,1)
  (same comment as for cement, unspecified)
  properties: wet mass 1 kg, dry mass 1 kg
- electricity, low voltage: 0.20571 kWh; lognormal variance with pedigree 0.06, pedigree (1,1,5,1,1)
  (same comment as for iron sulfate)
- titanium dioxide: 2.4129e-6 kg; lognormal variance with pedigree 0.54, pedigree (1,1,5,1,1)
  (same comment as for cement, unspecified)
  properties: dry mass 1 kg, wet mass 1 kg
- process-specific burdens, slag landfill: 0.027623 kg; lognormal variance with pedigree 0.07, pedigree (1,1,5,1,1)
  (same comment as for process-specific burdens, residual material landfill)
- sewer grid, 4.7E10l/year, 583 km: 1.2376e-7 km; lognormal variance with pedigree 0.04, pedigree (1,1,5,1,1)
  uncertainty heeded in exchanges of the module
- aluminium sulfate, powder: 0.0031512 kg; lognormal variance with pedigree 0.1, pedigree (1,1,5,1,1)
  (same comment as for iron sulfate)
  properties: wet mass 1 kg, dry mass 1 kg

## Emissions to nature
- Manganese [water, surface water]: 2.6899e-5 kg; lognormal variance with pedigree 0.66, pedigree (1,1,5,1,1)
  sewer overload discharge plus direct wastewater treatment plant emission plus emission from sludge incineration. Uncertainty calculated from wastewater composition and treatment model
- Molybdenum [soil, agricultural]: 1.3327e-7 kg; lognormal variance with pedigree 0.71, pedigree (1,1,5,1,1)
  emission from sludge spreading. Uncertainty calculated from wastewater composition and treatment model
- Carbon dioxide, non-fossil [air, urban air close to ground]: 0.19905 kg; lognormal variance with pedigree 0.06, pedigree (1,1,5,1,1)
  direct wastewater treatment plant emission plus direct digester gas emission plus emission from sludge incineration. Uncertainty calculated from wastewater composition and treatment model
- Cadmium, ion [water, surface water]: 1.4246e-7 kg; lognormal variance with pedigree 0.66, pedigree (1,1,5,1,1)
  (same comment as for Manganese)
- Arsenic, ion [water, surface water]: 7.6834e-7 kg; lognormal variance with pedigree 0.6, pedigree (1,1,5,1,1)
  (same comment as for Manganese)
- Cyanide [air, urban air close to ground]: 1.5037e-6 kg; lognormal variance with pedigree 0.24, pedigree (1,1,5,1,1)
  emission from sludge incineration. Uncertainty calculated from wastewater composition and treatment model
- Water [water, unspecified]: 0.9 m3; name water_to_water_unspecified; lognormal variance with pedigree 0.0807, pedigree (2,2,5,1,1)
  Calculated value based on water balance.
  property wet mass 1000 kg; name WM
  property dry mass 0 kg; name DM
  property fraction, origin: fresh water 1; name fraction_origin_fresh_water_Ww
  property water in wet mass 1000 kg; name WWM
  property carbon content, non-fossil 0; name C_content_non_fossil
  property carbon content, fossil 0; name C_content_fossil
  property fraction, origin: salt water 0; name fraction_origin_salt_water_Ww
  property fraction, origin: unspecified 0; name fraction_origin_unspecified_Ww
- Arsenic [air, urban air close to ground]: 2.5337e-10 kg; lognormal variance with pedigree 0.73, pedigree (1,1,5,1,1)
  direct digester gas emission plus emission from sludge incineration. Uncertainty calculated from wastewater composition and treatment model
- Sulfate [water, ground-, long-term]: 0.0027689 kg; lognormal variance with pedigree 0.1, pedigree (1,1,5,1,1)
  (same comment as for Cyanide)
- Water [air, unspecified]: 0.1 m3; name water_to_air_unspecified; lognormal variance with pedigree 0.0807, pedigree (2,2,5,1,1)
  Calculated value based on water balance.
  property fraction, origin: unspecified 1; name fraction_origin_unspecified
  property fraction, origin: fresh water 0; name fraction_origin_fresh_water
  property fraction, origin: salt water 0; name fraction_origin_salt_water
- Molybdenum [air, urban air close to ground]: 6.7655e-10 kg; lognormal variance with pedigree 0.73, pedigree (1,1,5,1,1)
  (same comment as for Arsenic)
- Copper, ion [water, surface water]: 9.7127e-6 kg; lognormal variance with pedigree 0.65, pedigree (1,1,5,1,1)
  (same comment as for Manganese)
- Chromium [air, urban air close to ground]: 3.1955e-13 kg; lognormal variance with pedigree 0.8, pedigree (1,1,5,1,1)
  (same comment as for Arsenic)
- Nitrogen [water, surface water]: 0.00049 kg; lognormal variance with pedigree 0.08, pedigree (1,1,5,1,1)
  direct wastewater treatment plant emission. Uncertainty calculated from wastewater composition and treatment model
- Mercury [water, surface water]: 6.2894e-8 kg; lognormal variance with pedigree 0.64, pedigree (1,1,5,1,1)
  (same comment as for Manganese)
- Nickel [soil, agricultural]: 7.3297e-7 kg; lognormal variance with pedigree 0.71, pedigree (1,1,5,1,1)
  (same comment as for Molybdenum)
- Nitrate [water, ground-, long-term]: 6.0021e-5 kg; lognormal variance with pedigree 0.08, pedigree (1,1,5,1,1)
  (same comment as for Cyanide)
- Sulfate [water, surface water]: 0.14497 kg; lognormal variance with pedigree 0.08, pedigree (1,1,5,1,1)
  (same comment as for Manganese)
- Iron [air, urban air close to ground]: 3.1782e-7 kg; lognormal variance with pedigree 0.2, pedigree (1,1,5,1,1)
  (same comment as for Arsenic)
- Arsenic, ion [water, ground-, long-term]: 7.6517e-8 kg; lognormal variance with pedigree 0.71, pedigree (1,1,5,1,1)
  (same comment as for Cyanide)
- Mercury [soil, agricultural]: 3.9061e-8 kg; lognormal variance with pedigree 0.71, pedigree (1,1,5,1,1)
  (same comment as for Molybdenum)
- Nickel, ion [water, surface water]: 3.9968e-6 kg; lognormal variance with pedigree 0.66, pedigree (1,1,5,1,1)
  (same comment as for Manganese)
- Cadmium [air, urban air close to ground]: 5.5219e-12 kg; lognormal variance with pedigree 0.74, pedigree (1,1,5,1,1)
  (same comment as for Arsenic)
- Cadmium [soil, agricultural]: 3.9061e-8 kg; lognormal variance with pedigree 0.71, pedigree (1,1,5,1,1)
  (same comment as for Molybdenum)
- Silicon [soil, agricultural]: 0.00083056 kg; lognormal variance with pedigree 0.72, pedigree (1,1,5,1,1)
  (same comment as for Molybdenum)
- Methane, non-fossil [air, urban air close to ground]: 0.00050249 kg; lognormal variance with pedigree 0.14, pedigree (1,1,5,1,1)
  (same comment as for Arsenic)
- COD, Chemical Oxygen Demand [water, surface water]: 0.030152 kg; lognormal variance with pedigree 0.08, pedigree (1,1,5,1,1)
  (same comment as for Manganese)
- Manganese [water, ground-, long-term]: 1.6125e-5 kg; lognormal variance with pedigree 0.87, pedigree (1,1,5,1,1)
  (same comment as for Cyanide)
- Zinc, ion [water, ground-, long-term]: 8.403e-7 kg; lognormal variance with pedigree 5.51, pedigree (1,1,5,1,1)
  (same comment as for Cyanide)
- Carbon monoxide, non-fossil [air, urban air close to ground]: 0.00017404 kg; lognormal variance with pedigree 0.15, pedigree (1,1,5,1,1)
  (same comment as for Arsenic)
- Magnesium [soil, agricultural]: 0.00015823 kg; lognormal variance with pedigree 0.71, pedigree (1,1,5,1,1)
  (same comment as for Molybdenum)
- Cadmium, ion [water, ground-, long-term]: 9.9486e-10 kg; lognormal variance with pedigree 6.9, pedigree (1,1,5,1,1)
  (same comment as for Cyanide)
- DOC, Dissolved Organic Carbon [water, surface water]: 0.0075379 kg; lognormal variance with pedigree 0.08, pedigree (1,1,5,1,1)
  (same comment as for Manganese)
- Aluminium [soil, agricultural]: 0.00041634 kg; lognormal variance with pedigree 0.46, pedigree (1,1,5,1,1)
  (same comment as for Molybdenum)
- Manganese [soil, agricultural]: 7.3771e-6 kg; lognormal variance with pedigree 0.71, pedigree (1,1,5,1,1)
  (same comment as for Molybdenum)
- Manganese [air, urban air close to ground]: 1.0196e-13 kg; lognormal variance with pedigree 0.83, pedigree (1,1,5,1,1)
  (same comment as for Arsenic)
- Chloride [water, surface water]: 0.040484 kg; lognormal variance with pedigree 0.48, pedigree (1,1,5,1,1)
  (same comment as for Manganese)
- Copper [soil, agricultural]: 7.8374e-6 kg; lognormal variance with pedigree 0.71, pedigree (1,1,5,1,1)
  (same comment as for Molybdenum)
- Calcium [soil, agricultural]: 0.0014094 kg; lognormal variance with pedigree 0.71, pedigree (1,1,5,1,1)
  (same comment as for Molybdenum)
- Aluminium [air, urban air close to ground]: 1.6509e-6 kg; lognormal variance with pedigree 0.47, pedigree (1,1,5,1,1)
  (same comment as for Arsenic)
- Tin, ion [water, ground-, long-term]: 7.1319e-7 kg; lognormal variance with pedigree 1.26, pedigree (1,1,5,1,1)
  (same comment as for Cyanide)
- Zinc, ion [water, surface water]: 3.3811e-5 kg; lognormal variance with pedigree 0.65, pedigree (1,1,5,1,1)
  (same comment as for Manganese)
- Lead [soil, agricultural]: 2.1713e-6 kg; lognormal variance with pedigree 0.71, pedigree (1,1,5,1,1)
  (same comment as for Molybdenum)
- Fluoride [water, surface water]: 3.2769e-5 kg; lognormal variance with pedigree 0.67, pedigree (1,1,5,1,1)
  (same comment as for Manganese)
- Calcium, ion [water, ground-, long-term]: 0.0031132 kg; lognormal variance with pedigree 0.71, pedigree (1,1,5,1,1)
  (same comment as for Cyanide)
- Iron [soil, agricultural]: 0.0037505 kg; lognormal variance with pedigree 0.17, pedigree (1,1,5,1,1)
  (same comment as for Molybdenum)
- Magnesium [water, ground-, long-term]: 0.00037076 kg; lognormal variance with pedigree 0.71, pedigree (1,1,5,1,1)
  (same comment as for Cyanide)
- Dinitrogen monoxide [air, urban air close to ground]: 0.00010014 kg; lognormal variance with pedigree 0.07, pedigree (1,1,5,1,1)
  direct wastewater treatment plant emission plus direct digester gas emission plus emission from sludge incineration plus emission from sludge spreading. Uncertainty calculated from wastewater composition and treatment model
- Molybdenum [water, ground-, long-term]: 2.7982e-7 kg; lognormal variance with pedigree 0.71, pedigree (1,1,5,1,1)
  (same comment as for Cyanide)
- Cobalt [air, urban air close to ground]: 1.8147e-14 kg; lognormal variance with pedigree 0.81, pedigree (1,1,5,1,1)
  (same comment as for Arsenic)
- Iron, ion [water, surface water]: 0.0036028 kg; lognormal variance with pedigree 0.66, pedigree (1,1,5,1,1)
  (same comment as for Manganese)
- Carbon [soil, agricultural]: 0.0048869 kg; lognormal variance with pedigree 0.11, pedigree (1,1,5,1,1)
  (same comment as for Molybdenum)
- Silicon [air, urban air close to ground]: 4.9081e-6 kg; lognormal variance with pedigree 0.73, pedigree (1,1,5,1,1)
  (same comment as for Arsenic)
- Molybdenum [water, surface water]: 5.4368e-7 kg; lognormal variance with pedigree 0.57, pedigree (1,1,5,1,1)
  (same comment as for Manganese)
- Magnesium [air, urban air close to ground]: 5.5305e-7 kg; lognormal variance with pedigree 0.72, pedigree (1,1,5,1,1)
  (same comment as for Arsenic)
- DOC, Dissolved Organic Carbon [water, ground-, long-term]: 0.00012113 kg; lognormal variance with pedigree 0.11, pedigree (1,1,5,1,1)
  (same comment as for Cyanide)
- NMVOC, non-methane volatile organic compounds, unspecified origin [air, urban air close to ground]: 2.2813e-6 kg; lognormal variance with pedigree 0.26, pedigree (1,1,5,1,1)
  direct digester gas emission. Uncertainty calculated from wastewater composition and treatment model
- Nitrogen oxides [air, urban air close to ground]: 0.00070765 kg; lognormal variance with pedigree 0.08, pedigree (1,1,5,1,1)
  (same comment as for Arsenic)
- Lead [water, ground-, long-term]: 3.9268e-7 kg; lognormal variance with pedigree 6.92, pedigree (1,1,5,1,1)
  (same comment as for Cyanide)
- Arsenic [soil, agricultural]: 5.4891e-8 kg; lognormal variance with pedigree 0.71, pedigree (1,1,5,1,1)
  (same comment as for Molybdenum)
- BOD5, Biological Oxygen Demand [water, ground-, long-term]: 0.00010013 kg; lognormal variance with pedigree 0.11, pedigree (1,1,5,1,1)
  (same comment as for Cyanide)
- Chromium [soil, agricultural]: 1.7026e-6 kg; lognormal variance with pedigree 0.71, pedigree (1,1,5,1,1)
  (same comment as for Molybdenum)
- Chromium VI [water, ground-, long-term]: 4.575e-7 kg; lognormal variance with pedigree 1.09, pedigree (1,1,5,1,1)
  (same comment as for Cyanide)
- Zinc [air, urban air close to ground]: 8.8543e-10 kg; lognormal variance with pedigree 0.76, pedigree (1,1,5,1,1)
  (same comment as for Arsenic)
- Ammonium, ion [water, surface water]: 0.011027 kg; lognormal variance with pedigree 0.06, pedigree (1,1,5,1,1)
  (same comment as for Nitrogen)
- Silicon [water, ground-, long-term]: 0.00018307 kg; lognormal variance with pedigree 5.46, pedigree (1,1,5,1,1)
  (same comment as for Cyanide)
- Nitrite [water, surface water]: 0.000644 kg; lognormal variance with pedigree 0.08, pedigree (1,1,5,1,1)
  (same comment as for Nitrogen)
- Potassium, ion [water, surface water]: 0.0003989 kg; lognormal variance with pedigree 0.67, pedigree (1,1,5,1,1)
  (same comment as for Manganese)
- Zinc [soil, agricultural]: 2.1352e-5 kg; lognormal variance with pedigree 0.71, pedigree (1,1,5,1,1)
  (same comment as for Molybdenum)
- Phosphate [water, ground-, long-term]: 0.00018223 kg; lognormal variance with pedigree 4.25, pedigree (1,1,5,1,1)
  (same comment as for Cyanide)
- Phosphate [water, ground-]: 1.0707e-5 kg; lognormal variance with pedigree 0.13, pedigree (1,1,5,1,1)
  (same comment as for Molybdenum)
- Calcium [air, urban air close to ground]: 5.9636e-6 kg; lognormal variance with pedigree 0.72, pedigree (1,1,5,1,1)
  (same comment as for Arsenic)
- Sulfur dioxide [air, urban air close to ground]: 0.00088683 kg; lognormal variance with pedigree 0.1, pedigree (1,1,5,1,1)
  (same comment as for Arsenic)
- Nitrate [water, surface water]: 0.048308 kg; lognormal variance with pedigree 0.06, pedigree (1,1,5,1,1)
  (same comment as for Manganese)
- Cobalt [water, surface water]: 8.211e-7 kg; lognormal variance with pedigree 0.66, pedigree (1,1,5,1,1)
  (same comment as for Manganese)
- TOC, Total Organic Carbon [water, surface water]: 0.0072994 kg; lognormal variance with pedigree 0.08, pedigree (1,1,5,1,1)
  (same comment as for Manganese)
- Phosphorus [air, urban air close to ground]: 1.5559e-6 kg; lognormal variance with pedigree 0.1, pedigree (1,1,5,1,1)
  (same comment as for Arsenic)
- Chromium, ion [water, surface water]: 1.3774e-8 kg; lognormal variance with pedigree 0.72, pedigree (1,1,5,1,1)
  (same comment as for Cyanide)
- Sulfur [soil, agricultural]: 0.00043493 kg; lognormal variance with pedigree 0.11, pedigree (1,1,5,1,1)
  (same comment as for Molybdenum)
- Tin [air, urban air close to ground]: 1.8824e-9 kg; lognormal variance with pedigree 0.73, pedigree (1,1,5,1,1)
  (same comment as for Arsenic)
- Magnesium [water, surface water]: 0.0051486 kg; lognormal variance with pedigree 0.67, pedigree (1,1,5,1,1)
  (same comment as for Manganese)
- Mercury [air, urban air close to ground]: 3.3733e-13 kg; lognormal variance with pedigree 0.74, pedigree (1,1,5,1,1)
  (same comment as for Arsenic)
- Nickel, ion [water, ground-, long-term]: 1.7419e-6 kg; lognormal variance with pedigree 0.71, pedigree (1,1,5,1,1)
  (same comment as for Cyanide)
- Ammonia [air, urban air close to ground]: 0.00028033 kg; lognormal variance with pedigree 0.25, pedigree (1,1,5,1,1)
  direct digester gas emission plus emission from sludge incineration plus emission from sludge spreading. Uncertainty calculated from wastewater composition and treatment model
- Mercury [water, ground-, long-term]: 5.1586e-9 kg; lognormal variance with pedigree 2.97, pedigree (1,1,5,1,1)
  (same comment as for Cyanide)
- Aluminium [water, surface water]: 6.2333e-5 kg; lognormal variance with pedigree 0.55, pedigree (1,1,5,1,1)
  (same comment as for Manganese)
- Chromium VI [water, surface water]: 6.3486e-6 kg; lognormal variance with pedigree 0.64, pedigree (1,1,5,1,1)
  (same comment as for Manganese)
- Cobalt [water, ground-, long-term]: 5.0042e-7 kg; lognormal variance with pedigree 0.71, pedigree (1,1,5,1,1)
  (same comment as for Cyanide)
- Calcium, ion [water, surface water]: 0.04586 kg; lognormal variance with pedigree 0.67, pedigree (1,1,5,1,1)
  (same comment as for Manganese)
- COD, Chemical Oxygen Demand [water, ground-, long-term]: 0.00030611 kg; lognormal variance with pedigree 0.11, pedigree (1,1,5,1,1)
  (same comment as for Cyanide)
- Tin [soil, agricultural]: 5.5894e-7 kg; lognormal variance with pedigree 0.71, pedigree (1,1,5,1,1)
  (same comment as for Molybdenum)
- Copper, ion [water, ground-, long-term]: 1.6081e-5 kg; lognormal variance with pedigree 0.73, pedigree (1,1,5,1,1)
  (same comment as for Cyanide)
- Nickel [air, urban air close to ground]: 8.0297e-14 kg; lognormal variance with pedigree 0.81, pedigree (1,1,5,1,1)
  (same comment as for Arsenic)
- Copper [air, urban air close to ground]: 1.4685e-10 kg; lognormal variance with pedigree 0.76, pedigree (1,1,5,1,1)
  (same comment as for Arsenic)
- Lead [air, urban air close to ground]: 2.0486e-10 kg; lognormal variance with pedigree 0.75, pedigree (1,1,5,1,1)
  (same comment as for Arsenic)
- Silicon [water, surface water]: 0.00018795 kg; lognormal variance with pedigree 0.57, pedigree (1,1,5,1,1)
  (same comment as for Manganese)
- Cobalt [soil, agricultural]: 2.2517e-7 kg; lognormal variance with pedigree 0.71, pedigree (1,1,5,1,1)
  (same comment as for Molybdenum)
- Phosphate [water, surface water]: 0.0026903 kg; lognormal variance with pedigree 0.08, pedigree (1,1,5,1,1)
  sewer overload discharge plus direct wastewater treatment plant emission plus emission from sludge incineration plus emission from sludge spreading. Uncertainty calculated from wastewater composition and treatment model
- BOD5, Biological Oxygen Demand [water, surface water]: 0.009823 kg; lognormal variance with pedigree 0.07, pedigree (1,1,5,1,1)
  (same comment as for Manganese)
- Sodium, ion [water, surface water]: 0.002186 kg; lognormal variance with pedigree 0.67, pedigree (1,1,5,1,1)
  (same comment as for Manganese)
- Iron, ion [water, ground-, long-term]: 0.0044593 kg; lognormal variance with pedigree 0.99, pedigree (1,1,5,1,1)
  (same comment as for Cyanide)
- Aluminium [water, ground-, long-term]: 0.00078208 kg; lognormal variance with pedigree 0.46, pedigree (1,1,5,1,1)
  (same comment as for Cyanide)
- TOC, Total Organic Carbon [water, ground-, long-term]: 0.00012113 kg; lognormal variance with pedigree 0.11, pedigree (1,1,5,1,1)
  (same comment as for Cyanide)
- Lead [water, surface water]: 9.4875e-7 kg; lognormal variance with pedigree 0.6, pedigree (1,1,5,1,1)
  (same comment as for Manganese)
- Tin, ion [water, surface water]: 1.4223e-6 kg; lognormal variance with pedigree 0.66, pedigree (1,1,5,1,1)
  (same comment as for Manganese)

## Extrapolations
This dataset has been extrapolated from year 2000 to the year of the calculation (2019). The uncertainty has been adjusted accordingly.

## Review by Niels Jungbluth 2009-01-22
passed.
