# treatment of sulfidic tailings, from gold mine operation, tailings impoundment

Dataset: EcoSpold 2, unit process
Geography: AR
Time period: 2015-01-01 to 2019-12-31
Technology level: current
Classification: ISIC rev.4 ecoinvent: 3822:Treatment and disposal of hazardous waste
Synonyms: pond; tails; tailing; sulphidic
Scenario: Business-as-Usual
System model: Allocation at the point of substitution
Share of production covered: 80 %
Generated by: David Turner
Database: ecoinvent
isCopyrightProtected: true
accessRestrictedTo: 1

## General comment
This dataset represents the activity of waste disposal of sulfidic tailings, from gold mine operation in a tailings impoundment in Argentina.
Background: Tailings, a waste material produced during mineral concentration (beneficiation), often contain significant quantities of mobile toxic metals and are typically produced in large quantities. To manage these wastes, tailings are commonly stored behind dammed impoundments, known as tailings ponds. These ponds pose a significant long-term pollution risk as metals may leach out into the surrounding environment, potentially over very long timeframes.
Modelling approach: This dataset was produced using a model developed specifically for assessing the long-term emissions of tailings disposal (see Doka, 2017). The tailings disposal model is based on the modelling framework applied in existing landfill process models used in ecoinvent and is based on a top-down approach. Literature data on measurements of deposited tailings compositions (solids) and measured current concentrations in leachate (liquid) form the basis of the model and are used to characterise pollutant mobility and calculate the currently occurring rate of emissions of the landfill. Heeding chief parameters, such as hydrology, pH development and elemental chemistry, these emissions are then projected into the future. Tailings composition is based on the typical composition of tailings at gold mine sites worldwide; i.e. composition is not region-specific. Land use was calculated following the approach described by Doka (2008). Based on an assumed generic final height of a tailings impoundment of 60 m and an assumed tailings density of 2200 kg/m3, a land area of 7.58E-06 m2 is required per kilogram of sulfidic tailings. The land is assumed to be converted from unknown origin to a disposal site. After an operational phase of 30 years, spontaneous restoration of a consolidated state is assumed to be reached after one hundred years. The total occupation time is therefore 130 years and the land occupation per kilogram tailings is 9.85E-04 m2.
Waste composition (wet, in ppm): H2O 300000; O 621300; H na; C 6145; S 305.88; N 5.0454; P 192.55; B 54.583; Cl 102.61; Br 0.22894; F 772.88; I na; Ag 9.7097; As 61.447; Ba 356.57; Cd 3.9592; Co 10.634; Cr 46.594; Cu 489.41; Hg 0.40262; Mn 142.11; Mo 10.949; Ni 17.077; Pb 155.09; Sb 34.059; Se 4.2887; Sn 26.979; V 142.69; Zn 190.19; Be 1.9806; Sc 13.343; Sr 100.02; Ti 122.75; Tl 2.6154; W 9.3995; Si 39700; Fe 10240; Ca 2631.2; Al 11955; K 2187; Mg 1408.9; Na 1044.1. // Share of carbon in waste that is biogenic 0%.
Activity extent: The dataset includes all potential emissions to the environment and land use changes. Input exchanges of infrastructure, materials, energy, and water are not included here but are accounted for in the activity, gold mine operation.
References
Doka, G. (2008). Life Cycle Inventory data of mining waste: Emissions from sulfidic tailings disposal. Zürich, Switzerland: Doka Life Cycle Assessments.
Doka, G. (2017). A model for waste-specific and climate-specific life cycle inventories of tailings impoundments. Zürich, Switzerland: Doka Life Cycle Assessments.

## Included activities start
The activity starts at the point of waste deposition in the impoundment. All upstream activities, including the pumping of tailings to the site, any dewatering or treatment, or other transport-related activities are excluded.

## Included activities end
Waste-specific short- and long-term emissions to the environment via impoundment leachate; land transformation and occupation. Note that the structural integrity of the site is assumed to be unwavering during the entie modelled time horizon; i.e. accidental releases of leachate (due to impoundment failure) are not considered.

## Geography
Given name of site is 'Gold deposits; Argentina'. Impoundment site with mean annual temperature (MAT) of 12.5626036998667 degC, mean annual precipitation (MAP) of 128.7499968582 mm/year, mean annual actual evaporation (EAT) of 196.99999932 mm/year, and net infiltration of 30.2499971982 mm/year (using half of natural surface evapotranspiration).

## Technology
This is an inventory for an impoundment of copper ore beneficiation tailings waste. The following assumptions were made concerning technology: final impoundment height is 60 meters; operation phase duration is 30 years; and impoundment leachates are released into the environment untreated.

## Time period
'Data on average composition of tailings and tailings-derived leachates from literature sources published between 1994 and 2017 (mean publication date: 2009±6). Mean annual temperature and precipitation data for 1970-2000 (source: Fick and Hijmans, 2017); mean annual evapotranspiration for 1950-2000 (source: Fekete et al., 2002). Production volume based on world mine production data from the USGS Minerals Yearbook 2015. Transfer coefficients from prospective, tailings-specific model.
References:
Fekete, B. M., Vorosmarty, C. J. & Grabs, W. (2002). High-resolution fields of global runoff combining observed river discharge and simulated water balances. Global Biogeochemical Cycles, 16, 15-1 - 15-10.
Fick, S. E. & Hijmans, R. J. (2017). Worldclim 2: New 1-km spatial resolution climate surfaces for global land areas. International Journal of Climatology, 37, 4302-4315.'

## Reference product
- sulfidic tailings, from gold mine operation: -1 kg; By-product classification Waste
  main reference product of this activity (supply of disposal service).
  production volume 992000 kg
    Estimate of the national tailings production volume from the mining and concentration of sulfidic gold ores, based on national mine production of gold from sulfide mineral deposits (kg) multiplied by estimated tailings generation rate per kg of mined gold (6328 kg per kg mined gold).
  property price 0 EUR2005
    Waste products are assigned a price of zero as they are assumed to require further treatment.
  property carbon content 0.0087785
    carbon content on a dry matter basis (reserved; not for manual entry)
  properties: boron content 7.7976e-5, carbon content, non-fossil 0, lead content 0.00022156, nitrogen content 7.2076e-6, tin content 3.8541e-5, wet mass 1 kg, titanium content 0.00017536, sodium content 0.0014916, copper content 0.00069916, aluminium content 0.017079, cadmium content 5.656e-6, scandium content 1.9061e-5, fluorine content 0.0011041, sulfur content 0.00043697, water content 0.42857, water in wet mass 0.3 kg, magnesium content 0.0020127, selenium content 6.1267e-6, manganese content 0.00020301, vanadium content 0.00020384, strontium content 0.00014288, zinc content 0.0002717, bromine content 3.2706e-7, phosphorus content 0.00027508, cobalt content 1.5191e-5, carbon content, fossil 0.0087785, chromium content 6.6562e-5, molybdenum content 1.5641e-5, antimony content 4.8655e-5, dry mass 0.7 kg, potassium content 0.0031243, barium content 0.00050938, chlorine content 0.00014659, mercury content 5.7517e-7, silicon content 0.056714, arsenic content 8.7781e-5, tungsten content 1.3428e-5, thallium content 3.7362e-6, calcium content 0.0037589, nickel content 2.4396e-5, iron content 0.014628, oxygen content 0.88758, beryllium content 2.8295e-6, silver content 1.3871e-5, carbon allocation 0.00614495 kg

## Emissions to nature
- Mercury [water, ground-]: 2.5288e-11 kg; lognormal variance with pedigree 0.67596, pedigree (1,1,1,1,1)
  burden from short-term leachate to groundwater in uncontrolled impoundment in moist cimate.
  Uncertainty: U
- Transformation, to dump site [natural resource, land]: 7.5758e-6 m2; lognormal variance with pedigree 0.030596, pedigree (1,1,1,1,1)
  conversion to impoundment area.
  Uncertainty: U
- Nitrate [water, ground-, long-term]: 1.7804e-5 kg; lognormal variance with pedigree 0.33955, pedigree (1,1,1,1,1)
  Emissions from long-term leachate (>100a) directly from tailings impoundment.
  Uncertainty: U
- Magnesium [water, ground-, long-term]: 0.00099949 kg; lognormal variance with pedigree 0.16062, pedigree (1,1,1,1,1)
  (same comment as for Nitrate)
- Tungsten [water, ground-, long-term]: 7.5837e-7 kg; lognormal variance with pedigree 0.71504, pedigree (1,1,1,1,1)
  (same comment as for Nitrate)
- Aluminium [water, ground-]: 5.3399e-7 kg; lognormal variance with pedigree 0.35211, pedigree (1,1,1,1,1)
  (same comment as for Mercury)
- Magnesium [water, ground-]: 1.6686e-6 kg; lognormal variance with pedigree 0.311, pedigree (1,1,1,1,1)
  (same comment as for Mercury)
- Tungsten [water, ground-]: 1.3202e-9 kg; lognormal variance with pedigree 0.54667, pedigree (1,1,1,1,1)
  (same comment as for Mercury)
- Nitrate [water, ground-]: 5.3766e-7 kg; lognormal variance with pedigree 0.40001, pedigree (1,1,1,1,1)
  (same comment as for Mercury)
- Lead [water, ground-, long-term]: 6.9037e-7 kg; lognormal variance with pedigree 2.0582, pedigree (1,1,1,1,1)
  (same comment as for Nitrate)
- Vanadium, ion [water, ground-]: 2.2663e-10 kg; lognormal variance with pedigree 0.60372, pedigree (1,1,1,1,1)
  (same comment as for Mercury)
- Arsenic, ion [water, ground-, long-term]: 6.347e-7 kg; lognormal variance with pedigree 1.5636, pedigree (1,1,1,1,1)
  (same comment as for Nitrate)
- Lead [water, ground-]: 1.1525e-9 kg; lognormal variance with pedigree 0.55063, pedigree (1,1,1,1,1)
  (same comment as for Mercury)
- Transformation, from unspecified [natural resource, land]: 7.5758e-6 m2; lognormal variance with pedigree 0.030596, pedigree (1,1,1,1,1)
  conversion of impoundment area.
  Uncertainty: U
- Arsenic, ion [water, ground-]: 1.0651e-9 kg; lognormal variance with pedigree 0.55356, pedigree (1,1,1,1,1)
  (same comment as for Mercury)
- Hydrogen sulfide [water, ground-, long-term]: 7.3482e-5 kg; lognormal variance with pedigree 0.20339, pedigree (1,1,1,1,1)
  (same comment as for Nitrate)
- TOC, Total Organic Carbon [water, ground-]: 6.9011e-8 kg; lognormal variance with pedigree 0.41778, pedigree (1,1,1,1,1)
  (same comment as for Mercury)
- Ammonium, ion [water, ground-, long-term]: 1.1279e-6 kg; lognormal variance with pedigree 0.33955, pedigree (1,1,1,1,1)
  (same comment as for Nitrate)
- Iron, ion [water, ground-, long-term]: 0.00019714 kg; lognormal variance with pedigree 1.0664, pedigree (1,1,1,1,1)
  (same comment as for Nitrate)
- TOC, Total Organic Carbon [water, ground-, long-term]: 4.1337e-5 kg; lognormal variance with pedigree 1.6701, pedigree (1,1,1,1,1)
  (same comment as for Nitrate)
- Ammonium, ion [water, ground-]: 3.4063e-8 kg; lognormal variance with pedigree 0.40001, pedigree (1,1,1,1,1)
  (same comment as for Mercury)
- Iron, ion [water, ground-]: 3.2911e-7 kg; lognormal variance with pedigree 0.3676, pedigree (1,1,1,1,1)
  (same comment as for Mercury)
- Titanium, ion [water, ground-, long-term]: 1.8715e-7 kg; lognormal variance with pedigree 2.8629, pedigree (1,1,1,1,1)
  (same comment as for Nitrate)
- Hydrogen sulfide [water, ground-]: 2.2533e-6 kg; lognormal variance with pedigree 0.26345, pedigree (1,1,1,1,1)
  (same comment as for Mercury)
- Titanium, ion [water, ground-]: 3.1244e-10 kg; lognormal variance with pedigree 0.59342, pedigree (1,1,1,1,1)
  (same comment as for Mercury)
- Fluoride [water, ground-, long-term]: 3.3525e-5 kg; lognormal variance with pedigree 0.78819, pedigree (1,1,1,1,1)
  (same comment as for Nitrate)
- Tin, ion [water, ground-]: 1.8865e-9 kg; lognormal variance with pedigree 0.53482, pedigree (1,1,1,1,1)
  (same comment as for Mercury)
- Fluoride [water, ground-]: 5.722e-8 kg; lognormal variance with pedigree 0.42166, pedigree (1,1,1,1,1)
  (same comment as for Mercury)
- Thallium [water, ground-, long-term]: 1.9559e-8 kg; lognormal variance with pedigree 1.8591, pedigree (1,1,1,1,1)
  (same comment as for Nitrate)
- DOC, Dissolved Organic Carbon [water, ground-]: 6.9011e-8 kg; lognormal variance with pedigree 0.41778, pedigree (1,1,1,1,1)
  (same comment as for Mercury)
- Tin, ion [water, ground-, long-term]: 1.13e-6 kg; lognormal variance with pedigree 0.91326, pedigree (1,1,1,1,1)
  (same comment as for Nitrate)
- DOC, Dissolved Organic Carbon [water, ground-, long-term]: 4.1337e-5 kg; lognormal variance with pedigree 1.6701, pedigree (1,1,1,1,1)
  (same comment as for Nitrate)
- Thallium [water, ground-]: 3.2653e-11 kg; lognormal variance with pedigree 0.66873, pedigree (1,1,1,1,1)
  (same comment as for Mercury)
- Copper, ion [water, ground-]: 1.5855e-8 kg; lognormal variance with pedigree 0.46403, pedigree (1,1,1,1,1)
  (same comment as for Mercury)
- Sulfate [water, ground-]: 2.094e-5 kg; lognormal variance with pedigree 0.26345, pedigree (1,1,1,1,1)
  (same comment as for Mercury)
- COD, Chemical Oxygen Demand [water, ground-]: 6.2859e-9 kg; lognormal variance with pedigree 0.41778, pedigree (1,1,1,1,1)
  (same comment as for Mercury)
- Sulfate [water, ground-, long-term]: 0.00068286 kg; lognormal variance with pedigree 0.20339, pedigree (1,1,1,1,1)
  (same comment as for Nitrate)
- Copper, ion [water, ground-, long-term]: 9.4972e-6 kg; lognormal variance with pedigree 1.1591, pedigree (1,1,1,1,1)
  (same comment as for Nitrate)
- Strontium [water, ground-]: 9.4132e-9 kg; lognormal variance with pedigree 0.4814, pedigree (1,1,1,1,1)
  (same comment as for Mercury)
- COD, Chemical Oxygen Demand [water, ground-, long-term]: 3.7653e-6 kg; lognormal variance with pedigree 1.6701, pedigree (1,1,1,1,1)
  (same comment as for Nitrate)
- Strontium [water, ground-, long-term]: 5.6385e-6 kg; lognormal variance with pedigree 0.75736, pedigree (1,1,1,1,1)
  (same comment as for Nitrate)
- Cobalt [water, ground-, long-term]: 4.0225e-6 kg; lognormal variance with pedigree 0.37399, pedigree (1,1,1,1,1)
  (same comment as for Nitrate)
- Silver, ion [water, ground-, long-term]: 4.596e-8 kg; lognormal variance with pedigree 2.1089, pedigree (1,1,1,1,1)
  (same comment as for Nitrate)
- Cobalt [water, ground-]: 6.7154e-9 kg; lognormal variance with pedigree 0.49312, pedigree (1,1,1,1,1)
  (same comment as for Mercury)
- Sodium, ion [water, ground-]: 6.7798e-7 kg; lognormal variance with pedigree 0.34026, pedigree (1,1,1,1,1)
  (same comment as for Mercury)
- Chloride [water, ground-, long-term]: 0.00010124 kg; lognormal variance with pedigree 0.23965, pedigree (1,1,1,1,1)
  (same comment as for Nitrate)
- Sodium, ion [water, ground-, long-term]: 0.00033632 kg; lognormal variance with pedigree 0.24319, pedigree (1,1,1,1,1)
  (same comment as for Nitrate)
- Chromium VI [water, ground-]: 4.6287e-10 kg; lognormal variance with pedigree 0.58111, pedigree (1,1,1,1,1)
  (same comment as for Mercury)
- Silicon [water, ground-]: 2.6213e-7 kg; lognormal variance with pedigree 0.38146, pedigree (1,1,1,1,1)
  (same comment as for Mercury)
- Chromium VI [water, ground-, long-term]: 2.7643e-7 kg; lognormal variance with pedigree 1.909, pedigree (1,1,1,1,1)
  (same comment as for Nitrate)
- Silicon [water, ground-, long-term]: 0.00015701 kg; lognormal variance with pedigree 1.9661, pedigree (1,1,1,1,1)
  (same comment as for Nitrate)
- Calcium, ion [water, ground-]: 3.0622e-6 kg; lognormal variance with pedigree 0.2915, pedigree (1,1,1,1,1)
  (same comment as for Mercury)
- Silver, ion [water, ground-]: 7.6729e-11 kg; lognormal variance with pedigree 0.64065, pedigree (1,1,1,1,1)
  (same comment as for Mercury)
- Chloride [water, ground-]: 1.325e-6 kg; lognormal variance with pedigree 0.32324, pedigree (1,1,1,1,1)
  (same comment as for Mercury)
- Selenium [water, ground-]: 2.2987e-10 kg; lognormal variance with pedigree 0.6044, pedigree (1,1,1,1,1)
  (same comment as for Mercury)
- Calcium, ion [water, ground-, long-term]: 0.0018343 kg; lognormal variance with pedigree 0.14132, pedigree (1,1,1,1,1)
  (same comment as for Nitrate)
- Scandium [water, ground-, long-term]: 1.6402e-6 kg; lognormal variance with pedigree 0.58206, pedigree (1,1,1,1,1)
  (same comment as for Nitrate)
- Cadmium, ion [water, ground-, long-term]: 5.5504e-7 kg; lognormal variance with pedigree 0.58875, pedigree (1,1,1,1,1)
  (same comment as for Nitrate)
- Selenium [water, ground-, long-term]: 1.355e-7 kg; lognormal variance with pedigree 1.0908, pedigree (1,1,1,1,1)
  (same comment as for Nitrate)
- Cadmium, ion [water, ground-]: 9.2661e-10 kg; lognormal variance with pedigree 0.55827, pedigree (1,1,1,1,1)
  (same comment as for Mercury)
- Scandium [water, ground-]: 2.7382e-9 kg; lognormal variance with pedigree 0.52255, pedigree (1,1,1,1,1)
  (same comment as for Mercury)
- Bromine [water, ground-]: 1.695e-11 kg; lognormal variance with pedigree 0.68856, pedigree (1,1,1,1,1)
  (same comment as for Mercury)
- Potassium, ion [water, ground-, long-term]: 2.9773e-5 kg; lognormal variance with pedigree 1.2929, pedigree (1,1,1,1,1)
  (same comment as for Nitrate)
- Boron [water, ground-, long-term]: 7.7161e-7 kg; lognormal variance with pedigree 1.3943, pedigree (1,1,1,1,1)
  (same comment as for Nitrate)
- Phosphate [water, ground-, long-term]: 0.00058784 kg; lognormal variance with pedigree 0.21872, pedigree (1,1,1,1,1)
  (same comment as for Nitrate)
- Bromine [water, ground-, long-term]: 9.9307e-9 kg; lognormal variance with pedigree 1.0551, pedigree (1,1,1,1,1)
  (same comment as for Nitrate)
- Potassium, ion [water, ground-]: 5.0046e-8 kg; lognormal variance with pedigree 0.42678, pedigree (1,1,1,1,1)
  (same comment as for Mercury)
- BOD5, Biological Oxygen Demand [water, ground-]: 1.2572e-10 kg; lognormal variance with pedigree 0.41778, pedigree (1,1,1,1,1)
  (same comment as for Mercury)
- Phosphate [water, ground-]: 2.2458e-6 kg; lognormal variance with pedigree 0.33932, pedigree (1,1,1,1,1)
  (same comment as for Mercury)
- Boron [water, ground-]: 1.2974e-9 kg; lognormal variance with pedigree 0.54709, pedigree (1,1,1,1,1)
  (same comment as for Mercury)
- Occupation, dump site [natural resource, land]: 0.00098485 m2*year; lognormal variance with pedigree 0.14966, pedigree (1,1,1,1,1)
  for impoundment operation phase and 100 year renaturation phase.
  Uncertainty: U
- Beryllium [water, ground-, long-term]: 2.0718e-7 kg; lognormal variance with pedigree 0.68868, pedigree (1,1,1,1,1)
  (same comment as for Nitrate)
- Nickel, ion [water, ground-, long-term]: 2.1283e-6 kg; lognormal variance with pedigree 0.57029, pedigree (1,1,1,1,1)
  (same comment as for Nitrate)
- BOD5, Biological Oxygen Demand [water, ground-, long-term]: 7.5306e-8 kg; lognormal variance with pedigree 1.6701, pedigree (1,1,1,1,1)
  (same comment as for Nitrate)
- Nickel, ion [water, ground-]: 3.5531e-9 kg; lognormal variance with pedigree 0.51392, pedigree (1,1,1,1,1)
  (same comment as for Mercury)
- Barium [water, ground-, long-term]: 8.5336e-8 kg; lognormal variance with pedigree 4.5431, pedigree (1,1,1,1,1)
  (same comment as for Nitrate)
- Molybdenum [water, ground-, long-term]: 3.8865e-6 kg; lognormal variance with pedigree 0.381, pedigree (1,1,1,1,1)
  (same comment as for Nitrate)
- Beryllium [water, ground-]: 3.4588e-10 kg; lognormal variance with pedigree 0.59059, pedigree (1,1,1,1,1)
  (same comment as for Mercury)
- Molybdenum [water, ground-]: 8.019e-9 kg; lognormal variance with pedigree 0.48731, pedigree (1,1,1,1,1)
  (same comment as for Mercury)
- Antimony [water, ground-, long-term]: 5.5884e-7 kg; lognormal variance with pedigree 1.3321, pedigree (1,1,1,1,1)
  (same comment as for Nitrate)
- Mercury [water, ground-, long-term]: 1.5148e-8 kg; lognormal variance with pedigree 1.0941, pedigree (1,1,1,1,1)
  (same comment as for Nitrate)
- Vanadium, ion [water, ground-, long-term]: 1.3569e-7 kg; lognormal variance with pedigree 3.2546, pedigree (1,1,1,1,1)
  (same comment as for Nitrate)
- Antimony [water, ground-]: 9.407e-10 kg; lognormal variance with pedigree 0.55781, pedigree (1,1,1,1,1)
  (same comment as for Mercury)
- Manganese [water, ground-, long-term]: 3.4237e-5 kg; lognormal variance with pedigree 0.35541, pedigree (1,1,1,1,1)
  (same comment as for Nitrate)
- Zinc, ion [water, ground-]: 5.5917e-8 kg; lognormal variance with pedigree 0.42239, pedigree (1,1,1,1,1)
  (same comment as for Mercury)
- Barium [water, ground-]: 1.4246e-10 kg; lognormal variance with pedigree 0.61772, pedigree (1,1,1,1,1)
  (same comment as for Mercury)
- Manganese [water, ground-]: 6.5414e-8 kg; lognormal variance with pedigree 0.41734, pedigree (1,1,1,1,1)
  (same comment as for Mercury)
- Zinc, ion [water, ground-, long-term]: 3.3494e-5 kg; lognormal variance with pedigree 0.40762, pedigree (1,1,1,1,1)
  (same comment as for Nitrate)
- Aluminium [water, ground-, long-term]: 0.00031986 kg; lognormal variance with pedigree 0.90603, pedigree (1,1,1,1,1)
  (same comment as for Nitrate)

## Sampling procedure
Tailings model based on observed leachate concentrations in literature. Extrapolated to 60'000 years heeding chemical characteristics. Initial waste composition from various literature sources. Climate information for national copper deposits (identified from the USGS Major Mineral Deposits database) from literature as follows: global mean annual temperature and precipitation data from Fick and Hijmans (2017); global mean annual evapotranspiration data from Fekete et al. (2002).

References:
Fekete, B. M., Vorosmarty, C. J. & Grabs, W. (2002). High-resolution fields of global runoff combining observed river discharge and simulated water balances. Global Biogeochemical Cycles, 16, 15-1 - 15-10.
Fick, S. E. & Hijmans, R. J. (2017). Worldclim 2: New 1-km spatial resolution climate surfaces for global land areas. International Journal of Climatology, 37, 4302-4315.

## Extrapolations
Climate data collected for gold deposits in Argentina and aggregated to reflect average climatic conditions of gold deposits in the country. Initial tailings composition based on global average gold tailings composition, derived from literature data. Initial leachate concentration based on generic global average data also obtained from the literature.
