# softwood forestry, paraná pine, sustainable forest management

Dataset: EcoSpold 2, unit process
Geography: BR
Time period: 2000-01-01 to 2019-12-31
Technology level: current
Classification: ISIC rev.4 ecoinvent: 0220:Logging
Classification: EcoSpold01Categories: wooden materials/extraction
Synonyms: Araucaria angustifolia
Scenario: Business-as-Usual
System model: Allocation at the point of substitution
Generated by: Frank Werner (obsolete)
Published in: Althaus H.J. 2007
Database: ecoinvent
isCopyrightProtected: true
accessRestrictedTo: 1

## General comment
dataset represents average of two well-documented, large-scale logging companies. both companies own also natural forests where (some) Paraná pine is extracted. Percentage of plantation trees and trees from managed natural forests as well as intensity of management are not known. Data of the two companies differs considerably. emissions from biomass burning according to IPCC 2003:
data refers to wood 'under bark'. CO2 assimilation is based on 49.4% carbon in the wood including the bark (15%). Biomass energy equals gross calorific value including bark.

## Included activities end
includes plantation establishment and management, harvesting and hauling operations incl. emissions from burning of branchings; fuel consumption and gravel for forest road construction is unknown; land use of forest roads and gravel are distregarded; branchings are left to rot on the ground includes the CO2 absorption from air and the land use for the trees to grow (including 15% bark). Forest road area is not included in the land useDensity: 500 kg/m3 (u=0)

## Technology
state-of-the art technology; forest operations largely based on manual labor, some mechanisation is currently undertaken
natural growth; relates to the forest area and CO2 from air needed to produce Paraná pine

## Parameters
- fraction, tap water, to air: 0.55; name fraction_TW_to_air; = fraction_PW_to_air; lognormal variance with pedigree 0.092025, pedigree (4,4,3,2,4)
  Calculated value. See comment in the other parametres present in this dataset. Tap water is considered to be always used as process water, thus process water fractions to air are applied to all tap water input flows to calculate the amount of water consumed in the processes.
- fraction, process water, to air: 0.55 dimensionless; name fraction_PW_to_air; lognormal variance with pedigree 0.092025, pedigree (4,4,3,2,4)
  Literature value (Statistics Canada, 2007 & Shaffer, K.H., 2008, Consumptive water use in the Great Lakes Basin, USGS) (Vionnet, S., Quantis Water Database - Technical Report, 2012).

## Reference product
- roundwood, paraná pine from sustainable forest management, under bark: 1 m3; By-product classification allocatable product; CPC 031: Wood in the rough
  production volume 8.83285e6 m3
    Calculated. Parana pine plantations in Brasil were 0.1 million ha in 2003 (link: http://www.worldforestinvestment.com/southern.pdf, accessed 20150929) the prentage of sustainable forest management is calculated to be 32.71% from : "Instruments for sustainable private sector forestry in Brazil" Viana et al. 2002 (link: http://pubs.iied.org/pdfs/9131IIED.pdf, accessed 20150929). With an average of 270 m3/ha (link: https://books.google.ch/books?id=6yRz-MQdqDUC&pg=PA29&lpg=PA29&dq=1+ha+of+parana+pine+in+m3&source=bl&ots=v9hxuDMaYU&sig=gGQL8d5p1DWixhSj3v6Cjw_d2Oo&hl=de&sa=X&ved=0CCAQ6AEwAGoVChMIzrz36dSeyAIVwbUUCh0-FgZO#v=onepage&q=1%20ha%20of%20parana%20pine%20in%20m3&f=false, accessed 20150930)
  property carbon content, non-fossil 0.494
    C content of dry mass is 0.494 kgC/kg dry wood (ecoinvent v2.2 report 21).
  property price 64.06 EUR2005
    Calculated based on inputs: The price of the product has been calculated as a sum of the values of the material and energy inputs for this product. This value is therefore a rough estimation. It may underestimate the real price since there are additional expenses when producing any product. These expences can include for example labour costs, treatment of waste materials and profit for the producer. Please consider carefully whether this level of data quality is acceptable for your application.
  property carbon content 0.494
    carbon content on a dry matter basis (reserved; not for manual entry)
  properties: carbon content, fossil 0, dry mass 500 kg, water content 0.5, water in wet mass 250 kg, wet mass 750 kg, carbon allocation 247 kg

## Inputs from technosphere
- chemical, organic: 0.11 kg; lognormal variance with pedigree 0.1241, pedigree (3,4,5,3,4)
  properties: carbon content, fossil 0.628, wet mass 1 kg, dry mass 1 kg
  note on carbon content, fossil: This dataset is an unweighted average of 20 organic substances (listed in Tab 88.1, ecoinvent v2.2 report 8, part II), being part of the top100 chemicals included in this database. The C-content has also been calculated as an unweighted average of the C content of the substances composing this dataset.
- power sawing, without catalytic converter: 0.4 hour; lognormal variance with pedigree 0.0541, pedigree (3,4,5,3,1)
- diesel, burned in building machine: 1684 MJ; lognormal variance with pedigree 0.0541, pedigree (3,4,5,3,1)
- chemical, inorganic: 0.0023 kg; lognormal variance with pedigree 0.1241, pedigree (3,4,5,3,4)
  properties: carbon content, fossil 0.003, dry mass 1 kg, wet mass 1 kg
  note on carbon content, fossil: This dataset is an unweighted average of 20 inorganic substances (listed in Tab 88.1, ecoinvent v2.2 report 8, part II), being part of the top100 chemicals included in this database. The C-content has also been calculated as an unweighted average of the C content of the substances composing this dataset.
- tap water: 68.75 kg; name tap_water_input; lognormal variance with pedigree 0.0541, pedigree (3,4,5,3,1)
  properties: water content 2962.17, wet mass 1 kg, carbon content, fossil 0.00178991, dry mass 0.000337476 kg
  note on carbon content, fossil: Bicarbonate content is 2.93 mol/m3. CO2 content is 0.1 mol/m3 (ecoinvent v2.2 report 8, Tab 93.1).

## Inputs from nature
- Wood, soft, standing [natural resource, biotic]: 1 m3; lognormal variance with pedigree 0.0541, pedigree (3,4,5,3,1)
- Transformation, from forest, intensive [natural resource, land]: 136 m2; lognormal variance with pedigree 0.28, pedigree (5,5,5,5,5)
- Carbon dioxide, in air [natural resource, in air]: 2080 kg; lognormal variance with pedigree 0.0541, pedigree (3,4,5,3,1)
- Occupation, forest, intensive [natural resource, land]: 6120 m2*year; lognormal variance with pedigree 0.21, pedigree (5,5,5,5,5)
- Energy, gross calorific value, in biomass [natural resource, biotic]: 30200 MJ
- Transformation, to forest, intensive [natural resource, land]: 136 m2; lognormal variance with pedigree 0.28, pedigree (5,5,5,5,5)

## Emissions to nature
- Dinitrogen monoxide [air, non-urban air or from high stacks]: 0.0071077 kg; lognormal variance with pedigree 0.0941, pedigree (3,4,5,3,1)
- Water [water, unspecified]: 0.0309375 m3; name water_to_water_unspecified; = (tap_water_input/1000)*(1-fraction_TW_to_air); lognormal variance with pedigree 0.0807, pedigree (2,2,5,1,1)
  Calculated value based on literature values and expert opinion. See comments in the parametres' comment field.
  property carbon content, fossil 0; name C_content_fossil
  property dry mass 0 kg; name DM
  property fraction, origin: salt water 0; name fraction_origin_salt_water_Ww
  property fraction, origin: unspecified 0; name fraction_origin_unspecified_Ww
  property fraction, origin: fresh water 1; name fraction_origin_fresh_water_Ww
  property water in wet mass 1000 kg; name WWM
  property carbon content, non-fossil 0; name C_content_non_fossil
  property wet mass 1000 kg; name WM
- Particulates, < 2.5 um [air, non-urban air or from high stacks]: 3 kg; lognormal variance with pedigree 0.0941, pedigree (3,4,5,3,1)
- Methane, non-fossil [air, non-urban air or from high stacks]: 1.0338 kg; lognormal variance with pedigree 0.0941, pedigree (3,4,5,3,1)
- Carbon dioxide, non-fossil [air, unspecified]: 1182.5 kg; lognormal variance with pedigree 0.0541, pedigree (3,4,5,3,1)
- Particulates, > 10 um [air, non-urban air or from high stacks]: 2 kg; lognormal variance with pedigree 0.0941, pedigree (3,4,5,3,1)
- Particulates, > 2.5 um, and < 10um [air, non-urban air or from high stacks]: 2.5 kg; lognormal variance with pedigree 0.0941, pedigree (3,4,5,3,1)
- Water [air, unspecified]: 0.0378125 m3; name water_to_air_unspecified; = (tap_water_input/1000*fraction_TW_to_air); lognormal variance with pedigree 0.0807, pedigree (2,2,5,1,1)
  (same comment as for Water)
  property fraction, origin: salt water 0; name fraction_origin_salt_water
  property fraction, origin: fresh water 1; name fraction_origin_fresh_water
  property fraction, origin: unspecified 0; name fraction_origin_unspecified

## Sampling procedure
literature, partly relying on estimates (fuel consumption)

## Extrapolations
This dataset has been extrapolated from year 2005 to the year of the calculation (2019). The uncertainty has been adjusted accordingly.

## Review by Emilia Moreno Ruiz 2013-04-12
PV set to 1

## Review by Hans-Jörg Althaus 2009-01-22
Passed

## Review by Emilia Moreno Ruiz 2014-05-21
restructured to fit new sector (CO2 intake and land use merged into the forestry dataset)

## Review by Emilia Moreno Ruiz 2015-10-02
PV adjusted
