# stirling heat and power co-generation unit construction, 3kW electrical, future

Dataset: EcoSpold 2, unit process
Geography: RoW
Time period: 2000-01-01 to 2019-12-31
Technology level: current
Classification: ISIC rev.4 ecoinvent: 4220a: Construction of utility projects for electricity production, except for liquid fuels
Classification: EcoSpold01Categories: biomass/cogeneration
Tags: ConvertedDataset
Scenario: Business-as-Usual
System model: Allocation at the point of substitution
Generated by: Alex Primas
Published in: Primas A. 2007
Database: ecoinvent
isCopyrightProtected: true
accessRestrictedTo: 1

## General comment
The module reflects a Stirling cogeneration unit with 3 kW electrical output. Operation of the unit with wood pellets. Inventory based on information of a pilot unit from literature and from one manufacturer. Life time operation is 80'000 h or 15 years.
[This dataset was already contained in the ecoinvent database version 2. It was not individually updated during the transfer to ecoinvent version 3. Life Cycle Impact Assessment results may still have changed, as they are affected by changes in the supply chain, i.e. in other datasets. This dataset was generated following the ecoinvent quality guidelines for version 2. It may have been subject to central changes described in the ecoinvent version 3 change report (http://www.ecoinvent.org/database/ecoinvent-version-3/reports-of-changes/), and the results of the central updates were reviewed extensively. The changes added e.g. consistent water flows and other information throughout the database. The documentation of this dataset can be found in the ecoinvent reports of version 2, which are still available via the ecoinvent website. The change report linked above covers all central changes that were made during the conversion process.]

## Included activities end
The module includes the most important materials used for production, the energy needed for production, planning and engineering. Also included is the transport of the raw materials the installation on the site.

## Geography
Process applicable in central European conditions.

## Technology
Stirling motor for combustion of wood pellets. Power range: 1-3 kW electrical output, 4.5-10.5 kW heat output. Includes pellet storage volume for one day of operation. Electrical efficiency 23%, total efficiency 90%. Performance and lifetime according to expected future values for a serial product.

## Parameters
- fraction, process water, to air: 0.15 dimensionless; name fraction_PW_to_air; lognormal variance with pedigree 0.092025, pedigree (4,4,3,2,4)

## Reference product
- stirling heat and power co-generation unit, 3kW electrical, future: 1 unit; By-product classification allocatable product; CPC 53262: Power plants
  EcoSpold01Location=CH
  production volume 3.96633 unit
    This is a placeholder value that does not reflect real-world production volumes. This dataset does not currently require a real-world production volume to work in the database framework, and no actual data were collected yet. This has no negative effect on the results of the ecoinvent database.
  property price 721.875 EUR2005
    Calculated based on inputs: The price of the product has been calculated as a sum of the values of the material and energy inputs for this product. This value is therefore a rough estimation. It may underestimate the real price since there are additional expenses when producing any product. These expences can include for example labour costs, treatment of waste materials and profit for the producer. Please consider carefully whether this level of data quality is acceptable for your application.
  property true value 721.875
    allocation property applied in "true value" allocation // value calculated from revenue

## By-products
- heat, for reuse in municipal waste incineration only: 0 MJ; CPC 17300: Steam and hot water; By-product classification allocatable product; pedigree (1,1,1,1,1)
  Net electricity generated from this waste and used in internal MSWI plant energy redistribution.
  Uncertainty: uncertainty is calculated from uncertainties in waste composition and uncertainties in energy efficiency and the uncertainty in internal energy demand
  production volume 39.601 MJ
  property exergy 0.1842 MJ; name E_th_prod_MSWI_exergy
    This exergy property is based on the exergy content of the product.
  property price 0.0106 EUR2005; name E_th_prod_MSWI_price_EUR2005
    Average European district heat price from Ecoheatcool and Euroheat 2005-2006, Ecoheat Work package 1: The European heat market. Final report. 10.6 EUR/GJ i s the price of district heat. http://www.solarthermalworld.org/files/Ecoheatcool%20WP1%20Web.pdf?download
  property true value relation 0.1842; name E_th_prod_MSWI_true_value_relation
    property to calculate "true value" from
  property true value 0.0621949
    allocation property applied in "true value" allocation // value calculated from true value relation
- electricity, for reuse in municipal waste incineration only: 0 kWh; CPC 17100: Electrical energy; By-product classification allocatable product; pedigree (1,1,1,1,1)
  (same comment as for heat, for reuse in municipal waste incineration only)
  production volume 5.65332 kWh
  property price 0.1 EUR2005; name E_el_prod_MSWI_price_EUR2005
    Estimated to be the same price as in case of electricity, medium voltage.
  property exergy 3.6 MJ; name E_el_prod_MSWI_exergy
    This exergy property is based on the exergy content of the product.
  property true value relation 3.6; name E_el_prod_MSWI_true_value_relation
    property to calculate "true value" from
  property true value 0.173516
    (same comment as for heat, for reuse in municipal waste incineration only)

## Inputs from technosphere
- waste mineral wool: 0 kg; pedigree (1,1,1,1,1)
  EcoSpold01Location=CH
  Approximation for disposal of insulation material
  Uncertainty: approximation for disposal of insulation material
  production volume 0 kg
    Calculated from the production volume of stirling cogen unit, 3kWe, wood pellet, future in proportion to the respective output amounts.
  properties: dry mass 1 kg, wet mass 1 kg
- aluminium, wrought alloy: 2.39922 kg; lognormal variance with pedigree 0.0546, pedigree (2,4,5,5,1)
  EcoSpold01Location=RER
  Data from pilot plant design
  Uncertainty: data from pilot plant design
  properties: dry mass 1 kg, wet mass 1 kg
- building, multi-storey: 0.0729762 m3; lognormal variance with pedigree 0.372, pedigree (4,4,5,5,1)
  EcoSpold01Location=RER
  Rough estimation based on company data
  Uncertainty: rough estimation based on company data
- tin: 0.259915 kg; lognormal variance with pedigree 0.0546, pedigree (2,4,5,5,1)
  (same comment as for aluminium, wrought alloy)
  properties: dry mass 1 kg, wet mass 1 kg
- sheet rolling, chromium steel: 30.9899 kg; lognormal variance with pedigree 0.0546, pedigree (2,4,5,5,1)
  EcoSpold01Location=RER
  Based on material input
  Uncertainty: based on material input
- polyvinylchloride, emulsion polymerised: 0.153142 kg; lognormal variance with pedigree 0.0546, pedigree (2,4,5,5,1)
  Data from pilot plant design
  EcoSpold01Location=RER
  Uncertainty: data from pilot plant design
  properties: carbon content, fossil 0.387097, dry mass 1 kg, wet mass 1 kg
  note on carbon content, fossil: Monomer is vynyl chloride, C2H3Cl (ecoinvent v2.2 report 11_II). MW=62 g/mol
- building, hall, steel construction: 0.0119961 m2; lognormal variance with pedigree 0.372, pedigree (4,4,5,5,1)
  Rough estimation based on company data
  EcoSpold01Location=CH
  Uncertainty: rough estimation based on company data
- heat, central or small-scale, other than natural gas: 0 MJ; pedigree (1,1,1,1,1)
  EcoSpold01Location=CH
  Estimation based on specific energy demand of engineering hours
  Uncertainty: estimation based on specific energy demand of engineering hours
- inert waste, for final disposal: -0.524829 kg; lognormal variance with pedigree 0.072, pedigree (4,4,5,5,1)
  Based on material input of ceramic parts
  EcoSpold01Location=CH
  Uncertainty: based on material input of ceramic parts
  production volume 1.575 kg
    (same comment as for waste mineral wool)
  properties: wet mass 1 kg, water content 0.00502513, dry mass 0.995 kg
- wastewater, from residence: -0.426861 m3; lognormal variance with pedigree 0.142, pedigree (4,4,5,5,4)
  Approximation for waste water treatment
  EcoSpold01Location=CH
  Uncertainty: approximation for waste water treatment
  production volume 1.281 m3
    (same comment as for waste mineral wool)
  properties: dry mass 0.337476 kg, wet mass 1000 kg, water content 2962.17, carbon content, non-fossil 0.199421
  note on carbon content, non-fossil: 0.0673 kg TOC/m3 (Tab A.17, ecoinvent v2.2 report 13_I). TOC was considered as Total Carbon.
- zinc: 0.0399869 kg; lognormal variance with pedigree 0.0546, pedigree (2,4,5,5,1)
  (same comment as for aluminium, wrought alloy)
  properties: dry mass 1 kg, wet mass 1 kg
- waste polyethylene/polypropylene product: 0 kg; pedigree (1,1,1,1,1)
  EcoSpold01Location=CH
  Approximation for disposal of plastic parts
  Uncertainty: approximation for disposal of plastic parts
  production volume 0 kg
    (same comment as for waste mineral wool)
  properties: wet mass 1 kg, carbon content, fossil 0.748045, water content 0.180638, dry mass 0.847 kg
  note on carbon content, fossil: Mixed various plastics was used to estimate the C content of this waste (Tab A.2, ecoinvent v2.2 report 13_I)
- lead: 0.119961 kg; lognormal variance with pedigree 0.0546, pedigree (2,4,5,5,1)
  (same comment as for aluminium, wrought alloy)
  properties: dry mass 1 kg, wet mass 1 kg
- stone wool, packed: 11.9961 kg; lognormal variance with pedigree 0.0546, pedigree (2,4,5,5,1)
  EcoSpold01Location=CH
  Data from pilot plant design
  Uncertainty: data from pilot plant design
  properties: wet mass 1 kg, dry mass 1 kg, carbon content, fossil 0.015401
  note on carbon content, fossil: The chemical composition of the glass fibres used in the rock wool production is similar to the composition of naturally cooled volcano basalt and has a composition listed in Tab. 3.1 and 3.2 in ecoinvent v2.2 report 16, part XIV. Rock wool contains: a minimum of 96% mineral fibres,between 0.5 and 3.0 weight percent of phenolic resin depending on the specific product characteristics, and about 0.2 percent mineral oil (ecoinvent v2.2 report 16, part XIV). An average composition of 1.8% phenolic resin, 0.2% mineral oil, and 98% mineral fibres has been assumed and used to calculate C content of the rock wool
- electricity, low voltage: 0 kWh; pedigree (1,1,1,1,1)
  (same comment as for heat, central or small-scale, other than natural gas)
- sheet rolling, steel: 135.956 kg; lognormal variance with pedigree 0.0546, pedigree (2,4,5,5,1)
  (same comment as for aluminium, wrought alloy)
- heat, district or industrial, natural gas: 0 MJ; pedigree (1,1,1,1,1)
  Approximation with company data of similar branch
  EcoSpold01Location=RER
  Uncertainty: approximation with company data of similar branch
- sheet rolling, aluminium: 2.39922 kg; lognormal variance with pedigree 0.0546, pedigree (2,4,5,5,1)
  EcoSpold01Location=RER
  Based on material input
  Uncertainty: based on material input
- reinforcing steel: 135.956 kg; lognormal variance with pedigree 0.0546, pedigree (2,4,5,5,1)
  (same comment as for polyvinylchloride, emulsion polymerised)
  properties: carbon content, fossil 0.004, dry mass 1 kg, wet mass 1 kg
- steel, chromium steel 18/8, hot rolled: 30.9899 kg; lognormal variance with pedigree 0.056, pedigree (3,4,5,5,1)
  Data from pilot plant design, assumption
  EcoSpold01Location=RER
  Uncertainty: data from pilot plant design, assumption
  properties: wet mass 1 kg, dry mass 1 kg, carbon content, fossil 0.0008
  note on carbon content, fossil: Stainless steel model is the grade 304 steel (18/8 stainless, 18% chromium 8% nickel; max. 0.08% C)
- transport, passenger car: 399.869 km; lognormal variance with pedigree 0.2, pedigree (4,4,5,5,3)
  Estimation
  EcoSpold01Location=CH
  Uncertainty: estimation
- wire drawing, copper: 4.19863 kg; lognormal variance with pedigree 0.0546, pedigree (2,4,5,5,1)
  Based on material input
  EcoSpold01Location=RER
  Uncertainty: based on material input
- copper: 4.49853 kg; lognormal variance with pedigree 0.0546, pedigree (2,4,5,5,1)
  (same comment as for polyvinylchloride, emulsion polymerised)
  properties: wet mass 1 kg, dry mass 1 kg
- cast iron: 147.952 kg; lognormal variance with pedigree 0.0546, pedigree (2,4,5,5,1)
  (same comment as for polyvinylchloride, emulsion polymerised)
  properties: carbon content, fossil 0.04, dry mass 1 kg, wet mass 1 kg
  note on carbon content, fossil: Cast iron is made by remelting pig iron in small furnaces (e.g. cupola furnaces or electric arc furnaces) and poured into moulds to make castings. It usually contains 2% to 6% carbon (ecoinvent v2.2 report 10_partII). An average content of 4% was considered
- electricity, medium voltage: 0 kWh; pedigree (1,1,1,1,1)
  EcoSpold01Location=UCTE
  Approximation with company data of similar branch
  Uncertainty: approximation with company data of similar branch
- heating and sanitary equipment, mini CHP plant: 0.749755 unit; lognormal variance with pedigree 0.39, pedigree (4,4,5,5,3)
  Approximation based on similar process
  EcoSpold01Location=CH
  Uncertainty: approximation based on similar process
- nickel, 99.5%: 0.0599804 kg; lognormal variance with pedigree 0.0546, pedigree (2,4,5,5,1)
  Data from pilot plant design
  EcoSpold01Location=GLO
  Uncertainty: data from pilot plant design
  properties: wet mass 1 kg, dry mass 1 kg
- waste polyvinylchloride product: 0 kg; pedigree (1,1,1,1,1)
  Approximation for disposal of plastic parts
  EcoSpold01Location=CH
  Uncertainty: approximation for disposal of plastic parts
  production volume 0 kg
    (same comment as for waste mineral wool)
  properties: water content 0.00200401, dry mass 0.998 kg, carbon content, fossil 0.440882, wet mass 1 kg
- ceramic tile: 0.499837 kg; lognormal variance with pedigree 0.072, pedigree (4,4,5,5,1)
  Estimation
  EcoSpold01Location=CH
  Uncertainty: estimation
  properties: wet mass 1 kg, dry mass 1 kg
- polyvinylchloride, suspension polymerised: 1.04647 kg; lognormal variance with pedigree 0.0546, pedigree (2,4,5,5,1)
  (same comment as for aluminium, wrought alloy)
  properties: dry mass 1 kg, carbon content, fossil 0.387097, wet mass 1 kg
- polyethylene, high density, granulate: 12.5959 kg; lognormal variance with pedigree 0.0546, pedigree (2,4,5,5,1)
  (same comment as for aluminium, wrought alloy)
  properties: dry mass 1 kg, carbon content, fossil 0.857143, wet mass 1 kg
  note on carbon content, fossil: Polyethylene is formed out of a huge amount of ethylene monomers (C2H4) (ecoinvent v2.2 report 11_II). MW=28 g/mol
- waste mineral wool: -3.48866, -8.50742 kg (2 entries); lognormal variance with pedigree 0.0726, pedigree (2,4,5,5,3)
  (same comment as for waste mineral wool)
  production volume 36 kg
- heat, central or small-scale, other than natural gas: 3.97283, 277.935 MJ (2 entries); lognormal variance with pedigree 0.064, pedigree (3,4,5,5,3)
  (same comment as for heat, central or small-scale, other than natural gas)
- waste polyethylene/polypropylene product: -3.56305, -9.03283 kg (2 entries); lognormal variance with pedigree 0.0726, pedigree (2,4,5,5,3)
  (same comment as for waste polyethylene/polypropylene product)
  production volume 37.8 kg
- electricity, low voltage: 0.427294, 0.074942, 1.69969, 6.09381, 1.23235, 18.6367, 3.07192, 8.75026 kWh (8 entries); lognormal variance with pedigree 0.064, pedigree (3,4,5,5,3)
  (same comment as for heat, central or small-scale, other than natural gas)
- heat, district or industrial, natural gas: 15.8438, 361.011, 895.729 MJ (3 entries); lognormal variance with pedigree 0.1246, pedigree (2,4,5,5,4)
  (same comment as for heat, district or industrial, natural gas)
- electricity, medium voltage: 1.95963, 0.35657, 8.23067, 28.0127, 6.04689, 87.6736, 12.5477, 41.1115 kWh (8 entries); lognormal variance with pedigree 0.1246, pedigree (2,4,5,5,4)
  (same comment as for electricity, medium voltage)
- waste polyvinylchloride product: -0.335717, -0.863891 kg (2 entries); lognormal variance with pedigree 0.0726, pedigree (2,4,5,5,3)
  (same comment as for waste polyvinylchloride product)
  production volume 3.6 kg

## Inputs from nature
- Transformation, to industrial area [natural resource, land]: 0.0439856 m2; lognormal variance with pedigree 0.192, pedigree (4,4,5,5,1)
  Rough estimation based on company data
  Uncertainty: rough estimation based on company data
- Water, unspecified natural origin [natural resource, in water]: 0.426861 m3; name water_UNO_input; lognormal variance with pedigree 0.1246, pedigree (2,4,5,5,4)
  Approximation with company data of similar branch
  Uncertainty: approximation with company data of similar branch
- Transformation, from unspecified [natural resource, land]: 0.0439856 m2; lognormal variance with pedigree 0.192, pedigree (4,4,5,5,1)
  Rough estimation based on company data
  Uncertainty: rough estimation based on company data
- Occupation, industrial area [natural resource, land]: 2.18929 m2*year; lognormal variance with pedigree 0.112, pedigree (4,4,5,5,1)
  Rough estimation based on company data
  Uncertainty: rough estimation based on company data

## Emissions to nature
- Water [air, unspecified]: 0.0640291 m3; name water_to_air_unspecified; lognormal variance with pedigree 0.0827, pedigree (2,2,5,5,1)
  Calculated value based on literature values and expert opinion. See comments in the parametres' comment field.
  property fraction, origin: unspecified 1; name fraction_origin_unspecified
  property fraction, origin: fresh water 0; name fraction_origin_fresh_water
  property fraction, origin: salt water 0; name fraction_origin_salt_water

## Sampling procedure
Literature data and manufacturer information

## Extrapolations
none This dataset has been copied from an original dataset covering the geography CH. The uncertainty has been adjusted accordingly.

## Review by Rolf Frischknecht 2007-08-13
passed
none
