# cement production, blast furnace slag 35-70%

Dataset: EcoSpold 2, unit process
Geography: RoW
Time period: 2016-01-01 to 2019-12-31
Technology level: current
Classification: ISIC rev.4 ecoinvent: 2394:Manufacture of cement, lime and plaster
Synonyms: blast-furnace slag cement; slag cement; CP III
Scenario: Business-as-Usual
System model: Allocation at the point of substitution
Generated by: [System]
Published in: Silva, F. B. 2017
Database: ecoinvent
isCopyrightProtected: true
accessRestrictedTo: 1

## General comment
The dataset describes the production of Portland blast-furnace slag cement in Brazil. Portland blast-furnace slag cement in Brazil (CP III) has between 35% to 70% of blast-furnace slag in mass composition.
Granulated blast furnace slag is a byproduct of iron production and, when finely ground, it is also a cementing material with hydraulic properties. Slag hydration alone is too slow to give structural properties to cement, but when the slag is combined with Portland cement, the hydration is accelerated due to the extra amount of calcium hydroxide and gypsum. The blast furnace slag is granulated in the iron industry, but usually ground in the cement plant. This extra energy for grinding may be important; however, it is not evaluated due to the lack of specific data of energy consumption per type of cement (electricity consumption in cement plants are informed as a whole).
Six types of Portland and blended cement types represent Brazilian production. The table below presents the different cement types and compositions according to Brazilian standards (NBR 11578:1991, NBR 5735:1991, NBR 5736:1991, NBR 5733:1991).
The CP III cement type represents 14.2% of the market according to the National Union of the Cement Industry (SNIC, 2013). This cement is produced in regions next to iron industrial areas using its byproduct blast-furnace slag. CP III applications range from reinforced and ordinary concrete to coating mortars. The blast furnace slag in cement gives properties to concrete such as lower hydration heat and protection against sulfate and chloride attack. The CP III cement consists of clinker, calcium sulfate, milled limestone, and 35-70% blast furnace slag (see composition in the table).
This dataset contains information from clinker stockpile to cement ready to be shipped in bulk. After the clinker is cooled from the rotary kiln, it is ground in ball or roller mills to particles under 75 μm size. Then it goes to silos where it is mixed with calcium sulphate (gypsum) and SCMs. The mixed cement goes to a finishing mill and then it is stored in cement silos, ready to be shipped in bulk or packed.
Primary data were gathered from six cement manufacturers in Brazil, who informed the total values of inputs and outputs related to cement production in 2016, considering all their cement production sites. All types of flows were reported, namely: primary and secondary raw materials and fuels, auxiliary materials, electricity and water consumption. It corresponds to 70% market share, considered a good representativeness level. Although particulate emissions may occur, they are not reported due to lack of specific data for the cement grinding step (air emissions are monitored for the integrated clinker-cement plant as a whole and reported in the clinker production process).

## Included activities start
The activity starts with the reception of raw materials in the cement plant. In plants which are integrated with clinker production, clinker is stored in the silo after cooling in the upstream process (clinker production /BR).

## Included activities end
The activity includes the drying of raw materials, the grinding and mixing of raw materials for cement production in the cement mill (with grinding aids) and ends with cement stored in silos, ready to be shipped. Waste or particulate emission are not considered due to the lack of data. The dataset does not include packaging and administration.

## Geography
This dataset is a copy of the corresponding BR dataset. Uncertainty has been adjusted accordingly.

## Technology
Current technology for cement production in Brazil.

## Time period
Time period corresponds to data collection period (2016).

## Reference product
- cement, blast furnace slag 35-70%: 1 kg; name cement; By-product classification allocatable product; CPC 37440: Portland cement, aluminous cement, slag cement and similar hydraulic cements, except in the form of clinkers; EcoSpold01Categories construction materials/binder
  Cement’s bulk density ranges from 2,8 g/cm³ to 3,2 g/cm³.
  production volume 5.048e9 kg; name APV_cement
    The global production volume was calculated as follows:
    1) The total production volume of each country was calculated
    2) The production volume was scaled based construction output (*)
    3) The average of the results was assumed to be the GLO PV
    4) The share of each different technology per country was calculated
    5) The weighted average of the shares for each country was used to split the GLO PV into different technologies
    (*)
    Construction output assumed per country
    Country Share
    CO 1%
    PE 0%
    BR 2%
    ZA 1%
    IN 10%
    US 8%
    CA-QC 0%
    CH 0%
    Europe without Switzerland 20%
    Source:
    OECD. 2018. Input-Output Tables. http://www.oecd.org/trade/input-outputtables.htm.
    United Nations Statistics Division. 2019. UN data. A world of information. http://data.un.org/.
    Timmer, M.P., E. Dietzenbacher, B. Los, R. Stehrer, and G.J. de Vries. 2015. An Illustrated User Guide to the World Input-Output Database: the Case of Global Automotive Production. Review of International Economics 23(3): 575-605. http://doi.wiley.com/10.1111/roie.12178.
    The data was adjusted based on PPP, data from:
    The World Bank. 2019. World Bank Open Data. https://data.worldbank.org/
  property price 0.0615 EUR2005
    2005 import and export prices (total trades (USD) divided by total weight (kg) in China, India, USA, Japan, Russia and Europe, major producers and consumers (http://www.cementchina.net/freport/showfre.asp?id=749) from UN Commodity Trade Statistics Database (http://data.un.org/Explorer.aspxDatabase [Accessed 2 July 2010]). Commodity: Cement (portland, aluminious, slag or hydraulic)
  property carbon content 0
    carbon content on a dry matter basis (reserved; not for manual entry)
  property true value 0.0615; name cement_true_value
    allocation property applied in "true value" allocation // value calculated from revenue
  properties: water content 0, wet mass 1 kg, carbon content, fossil 0, water in wet mass 0 kg, dry mass 1 kg, carbon content, non-fossil 0, carbon allocation 0 kg

## By-products
- iron scrap, sorted, pressed: 0 kg; By-product classification Recyclable; CPC 39310: Slag, dross, scalings and other waste from the manufacture of iron or steel; pedigree (1,1,1,1,1)
  Iron scrap recovered from this waste.
  Uncertainty: uncertainty calculated from uncertainty in waste composition, uncertainty of share of recyclable metal, uncertainty of transfer coefficient to bottom ash, uncertainty of the efficiency of scrap removal in MSWI plant.
  production volume 39791.2 kg
  property price 0.175 EUR2005
    Temporary price data. Calculated as 90% of purchasers price based on: 2005 import and export prices (total trades (USD) divided by total weight (kg) in biggest economies of the world: EU27, USA, Brasil, China, India, Japan and Russia) from UN Commodity Trade Statistics Database (http://data.un.org/Explorer.aspxDatabase [Accessed 2011.06.20]). Commodity: Waste or scrap, of cast iron
  property carbon content 0
    carbon content on a dry matter basis (reserved; not for manual entry)
  property true value 3.81761e-8
    allocation property applied in "true value" allocation // value calculated from revenue
  properties: wet mass 1 kg, water in wet mass 0 kg, carbon content, non-fossil 0, carbon content, fossil 0, dry mass 1 kg, water content 0, carbon allocation 0 kg
- electricity, for reuse in municipal waste incineration only: 0 kWh; CPC 17100: Electrical energy; By-product classification allocatable product; pedigree (1,1,1,1,1)
  Net electricity generated from this waste and used in internal MSWI plant energy redistribution.
  Uncertainty: uncertainty is calculated from uncertainties in waste composition and uncertainties in energy efficiency and the uncertainty in internal energy demand
  production volume 80180.8 kWh
  property exergy 3.6 MJ; name E_el_prod_MSWI_exergy
    This exergy property is based on the exergy content of the product.
  property true value relation 3.6; name E_el_prod_MSWI_true_value_relation
    property to calculate "true value" from
  property price 0.1 EUR2005; name E_el_prod_MSWI_price_EUR2005
    Estimated to be the same price as in case of electricity, medium voltage.
  property true value 1.01662e-6
    allocation property applied in "true value" allocation // value calculated from true value relation
- heat, for reuse in municipal waste incineration only: 0 MJ; CPC 17300: Steam and hot water; By-product classification allocatable product; pedigree (1,1,1,1,1)
  Net useful heat generated from this waste and used in internal MSWI plant energy redistribution.
  Uncertainty: uncertainty is calculated from uncertainties in waste composition and uncertainties in energy efficiency and the uncertainty in internal energy demand
  production volume 564556 MJ
  property true value relation 0.1842; name E_th_prod_MSWI_true_value_relation
    property to calculate "true value" from
  property exergy 0.1842 MJ; name E_th_prod_MSWI_exergy
    This exergy property is based on the exergy content of the product.
  property price 0.0106 EUR2005; name E_th_prod_MSWI_price_EUR2005
    Average European district heat price from Ecoheatcool and Euroheat 2005-2006, Ecoheat Work package 1: The European heat market. Final report. 10.6 EUR/GJ i s the price of district heat. http://www.solarthermalworld.org/files/Ecoheatcool%20WP1%20Web.pdf?download
  property true value 3.66997e-7
    (same comment as for electricity, for reuse in municipal waste incineration only)
- zinc concentrate: 0 kg; CPC 14290: Other non-ferrous metal ores and concentrates (other than uranium or thorium ores and concentrates); By-product classification allocatable product
  Calculated value from the knowledge of the properties of both products.
  production volume 54.451 kg
  property price 0.38 EUR2005; name ByP_price_EUR2005
    Temporary price data. Calculated as 90% of purchasers price based on: Zinc content in concentrate 53%. Concentrate price per kg Zn 86.5% of refined Zn price (13.5% treatment charges according to CHR Metals Limited 2005: Dynamic cost curves. http://www.minecost.com/dynamic.pdf). 2004 zinc price from USGS (2007) Mineral commodity summaries 2007. <http://minerals.usgs.gov/minerals/pubs/mcs/2007/mcs2007.pdf> [Accessed 25 May 2010]
  property zinc content 0.53; name zinc_C_zinc_concentrate
    Zinc content on a dry matter basis. Value taken from teh "zinc mine operation" /GLO dataset.
  property dry mass 1 kg; name DM_zinc_concentrate
  property carbon content 0
    carbon content on a dry matter basis (reserved; not for manual entry)
  property true value 1.65275e-10
    allocation property applied in "true value" allocation // value calculated from revenue
  properties: wet mass 1 kg, water content 0, carbon content, non-fossil 0, carbon content, fossil 0, water in wet mass 0 kg, carbon allocation 0 kg

## Inputs from technosphere
- tap water: 0 kg; name tap_water; pedigree (1,1,1,1,1)
  Measured value. Weighted average of values informed by manufacturers. Water for sanitary purposes.
  Uncertainty: Basic uncertainty calculated from sample.
  properties: water content 2962.17, carbon content, fossil 0.00178991, dry mass 0.000337476 kg, wet mass 1 kg
  note on carbon content, fossil: Bicarbonate content is 2.93 mol/m3. CO2 content is 0.1 mol/m3 (ecoinvent v2.2 report 8, Tab 93.1).
- gypsum, mineral: 0 kg; pedigree (1,1,1,1,1)
  Measured value. Weighted average of values informed by manufacturers. Raw material for cement production.
  Uncertainty: Basic uncertainty calculated from sample.
  properties: wet mass 1 kg, dry mass 1 kg
- scrap steel: 0 kg; pedigree (1,1,1,1,1)
  Estimation based on corresponding input.
  Uncertainty: Basic uncertainty calculated from sample.
  production volume 0 kg
    Calculated from production volume of reference product using the relative outputs.
  properties: carbon content, fossil 0.005, dry mass 1 kg, wet mass 1 kg
- wastewater, average: 0 m3; name wastewater; pedigree (1,1,1,1,1)
  Estimation. Calculated as: (tap_water /1000)* cement. All tap water was considered to leave the process as an effluent.
  Uncertainty: Basic uncertainty calculated from sample.
  production volume 0 m3
    Calculated from production volume of reference product using the relative outputs.
  property price 0 EUR2005; name wastewater_price_EUR2005
  properties: carbon content, non-fossil 0.194039, dry mass 0.346837 kg, water content 2882.2, wet mass 1000 kg
  note on carbon content, non-fossil: 0.0673 kg TOC/m3 (Tab A.17, ecoinvent v2.2 report 13_I). TOC was considered as Total Carbon.
- diethylene glycol: 0.000185996 kg; lognormal variance with pedigree 0.0669, pedigree (2,2,2,5,1)
  Measured value. Weighted average of values informed by manufacturers. Grinding aid for cement production.
  Uncertainty: Basic uncertainty calculated from sample.
  properties: carbon content, fossil 0.45283, dry mass 1 kg, wet mass 1 kg
- heat, district or industrial, natural gas: 0 MJ; pedigree (1,1,1,1,1)
  Measured value. Weighted average of values informed by manufacturers. Heat for drying of raw materials.
  Uncertainty: Basic uncertainty calculated from sample.
- synthetic rubber: 8.7998e-6 kg; name rubber; lognormal variance with pedigree 0.6689, pedigree (2,2,2,5,1)
  Measured value. Weighted average of values informed by manufacturers. Replacement of wearing parts of process equipment.
  Uncertainty: Basic uncertainty calculated from sample.
  properties: wet mass 1 kg, carbon content, fossil 0.871949, dry mass 1 kg
  note on carbon content, fossil: EPDM (Ethylene-propene-diene terpolymer) rubber is a terpolymer of ethylene, propene, and a diene with the residual unsaturated portion of the diene in the side chain (ecoinvent v2.2 report 7-part XX & Ullmann). Chemical formula (deduced from Evidences of Solvent-Induced Miscibility in Polychloroprene-co-Ethylene-Propene Diene Terpolymer Blends, Dubey et al., Journal of Applied Polymer Science, 2009, 111:1884–1891): C20H35
- electricity, medium voltage: 0 kWh; pedigree (1,1,1,1,1)
  Measured value. Weighted average of values informed by manufacturers. Electricity for grinding and factory operation.
  Uncertainty: Basic uncertainty calculated from sample.
- heat, district or industrial, other than natural gas: 0 MJ; pedigree (1,1,1,1,1)
  (same comment as for heat, district or industrial, natural gas)
  properties: corresponding fuel use, propane, furnace >100kW 1.05263 MJ
  note on corresponding fuel use, propane, furnace >100kW: Lower heating value of the fuel input related to the heat/electricity output, taken directly from ecoinvent v3.0 dataset "heat production, natural gas, at industrial furnace >100kW, GLO 2000".
- cement factory: 2.72994e-11 unit; source Kellenberger D. 2007; lognormal variance with pedigree 0.32, pedigree (3,5,4,5,1)
  Literature value from the dataset cement production, Portland /CH (accessed 20170810)
  Uncertainty: Variance of log-transformed data was taken from ecoinvent report no 1, table 10.3. Value represents demand of infrastructure for input/output group c.
- waste mineral oil: 0 kg; pedigree (1,1,1,1,1)
  (same comment as for scrap steel)
  production volume 0 kg
    Calculated from production volume of reference product using the relative outputs.
  properties: carbon content, fossil 0.864444, dry mass 0.9 kg, water content 0.111111, wet mass 1 kg
  note on carbon content, fossil: Tab A.6, ecoinvent v2.2 report 13_I. C content has been calculated after data in the tables, and then referred to 1 kg DM
- steel, low-alloyed: 7.09984e-5 kg; name steel; lognormal variance with pedigree 0.4079, pedigree (2,2,2,5,1)
  (same comment as for synthetic rubber)
  property carbon content, fossil 0.005; name C_content_fossil
  property dry mass 1 kg; name DM
  property water content 0; name water_content
  property water in wet mass 0 kg; name WWM
  property wet mass 1 kg; name WM
  property carbon content, non-fossil 0; name C_content_non_fossil
- waste rubber, unspecified: 0 kg; pedigree (1,1,1,1,1)
  (same comment as for scrap steel)
  production volume 0 kg
    Calculated from production volume of reference product using the relative outputs.
  properties: wet mass 1 kg, dry mass 1 kg, carbon content, fossil 0.853
- clinker: 0 kg; pedigree (1,1,1,1,1)
  (same comment as for gypsum, mineral)
  properties: wet mass 1 kg, dry mass 1 kg
- lubricating oil: 5.49987e-6 kg; name oil; lognormal variance with pedigree 0.5039, pedigree (2,2,2,5,1)
  Measured value. Weighted average of values informed by manufacturers. Maintenance of process equipment.
  Uncertainty: Basic uncertainty calculated from sample.
  properties: carbon content, fossil 0.75, wet mass 1 kg, dry mass 1 kg
  note on carbon content, fossil: Lubricating oil is produced from diesel. C-content/dry mass of fats and oils considered 75%, from: ecoinvent v2.2 report, n 15a, pg 40
- granulated blast furnace slag: 0.539988 kg; lognormal variance with pedigree 0.0079, pedigree (2,2,2,5,1)
  Measured value. Weighted average of values informed by manufacturers. Raw material for cement production.In Brazil, around 70% of the blast furnace slag used in cement making is ground along with clinker in the cement plant, not in the steel making plant. The energy for grinding is declared in the cement dataset (average aggregate data for all cement types).
  Uncertainty: Basic uncertainty calculated from sample.
  property carbon content, fossil 0; name GBFS_C_content_fossil
  property carbon content, non-fossil 0; name GBFS_C_content_non_fossil
  properties: dry mass 1 kg, wet mass 1 kg
- water, harvested from rainwater: 0.00396991 kg; name rainwater_input; lognormal variance with pedigree 1.6319, pedigree (2,2,2,5,1)
  Measured value. Weighted average of values informed by manufacturers. Water for equipment cooling and dust control.
  Uncertainty: Basic uncertainty calculated from sample.
  properties: wet mass 1 kg, carbon content, fossil 0.0017899, water content 2940.2, dry mass 0.00034 kg
- limestone, crushed, for mill: 0 kg; pedigree (1,1,1,1,1)
  (same comment as for gypsum, mineral)
  properties: wet mass 1 kg, dry mass 1 kg, carbon content, fossil 0.117492
- tap water: 1.6449e-6, 0.00058576, 2.71846e-6, 6.85488e-5, 1.78328e-6, 5.07251e-6, 0.000784439 kg (7 entries); lognormal variance with pedigree 0.6809, pedigree (2,2,2,5,1)
  (same comment as for tap water)
- gypsum, mineral: 0.0226341, 0.00508355, 0.00228166 kg (3 entries); lognormal variance with pedigree 0.0679, pedigree (2,2,2,5,1)
  (same comment as for gypsum, mineral)
- scrap steel: -8.96463e-8, -7.09087e-5 kg (2 entries); lognormal variance with pedigree 0.4079, pedigree (2,2,2,5,1)
  (same comment as for scrap steel)
  production volume 358408 kg
- wastewater, average: -1.41547e-7, -1.30842e-6 m3 (2 entries); lognormal variance with pedigree 0.6809, pedigree (2,2,2,5,1)
  (same comment as for wastewater, average)
  production volume 7319.59 m3
- heat, district or industrial, natural gas: 0.000211303, 0.00481858 MJ (2 entries); lognormal variance with pedigree 3.0999, pedigree (2,2,2,5,1)
  (same comment as for heat, district or industrial, natural gas)
- electricity, medium voltage: 0.000574867, 0.000104602, 0.00241451, 0.00177388, 0.0257195, 0.00835122, 0.0120603 kWh (7 entries); lognormal variance with pedigree 0.0239, pedigree (2,2,2,5,1)
  (same comment as for electricity, medium voltage)
- heat, district or industrial, other than natural gas: 0.000254351, 0.0152453 MJ (2 entries); lognormal variance with pedigree 2.2249, pedigree (2,2,2,5,1)
  (same comment as for heat, district or industrial, natural gas)
- waste mineral oil: -1.24383e-7, -5.37549e-6 kg (2 entries); lognormal variance with pedigree 0.5039, pedigree (2,2,2,5,1)
  (same comment as for scrap steel)
  production volume 27764 kg
- waste rubber, unspecified: -3.54531e-7, -8.44527e-6 kg (2 entries); lognormal variance with pedigree 0.6689, pedigree (2,2,2,5,1)
  (same comment as for scrap steel)
  production volume 44422.4 kg
- clinker: 0.0918766, 0.00480312, 0.0036852, 0.00615742, 0.00149904, 0.291969 kg (6 entries); lognormal variance with pedigree 0.0119, pedigree (2,2,2,5,1)
  (same comment as for gypsum, mineral)
- limestone, crushed, for mill: 0.00956852, 0.0204308 kg (2 entries); lognormal variance with pedigree 0.0589, pedigree (2,2,2,5,1)
  (same comment as for gypsum, mineral)

## Inputs from nature
- Water, river [natural resource, in water]: 0.000123997 m3; name water_river_input; lognormal variance with pedigree 0.2769, pedigree (2,2,2,5,1)
  (same comment as for water, harvested from rainwater)
- Water, well, in ground [natural resource, in water]: 5.64987e-5 m3; name water_well_input; lognormal variance with pedigree 0.4169, pedigree (2,2,2,5,1)
  (same comment as for water, harvested from rainwater)
- Water, unspecified natural origin [natural resource, in water]: 2.02995e-6 m3; name water_unsp_input; lognormal variance with pedigree 1.7189, pedigree (2,2,2,5,1)
  (same comment as for water, harvested from rainwater)

## Emissions to nature
- Water [air, unspecified]: 0.000186996 m3; lognormal variance with pedigree 0.1089, pedigree (2,2,2,5,1)
  Estimation. Calculated as: ( water_unsp_input+ water_well_input+ water_river_input+ (rainwater_input/1000))*cement. All water input except for tap water was considered to leave the system as evaporated water, as water is used for cooling and dust control.
  Uncertainty: Basic uncertainty calculated from sample.

## Sampling procedure
Data represent circa 70% of the Brazilian cement production in 2016, which is considered a good representativeness level. Data were provided by six cement manufacturers, via confidential questionnaires, regarding the production of cement during the year of 2016.
Raw materials flows are the weighted average of the cement composition informed by each cement manufacturer. The weighing factor used is the total cement production volume, since manufacturers did not report the production volumes of each cement type due to confidentiality. Basic uncertainty was calculated based on the sample's weighted standard deviation and represents variation of composition between manufacturers/factories.
For other input flows (grinding aids, materials for equipment maintenance, fuels, electricity, water consumption), the weighted average of each manufacturer's unit flows was calculated. Except for the grinding aids, all other flows are not distinguished by cement type, as their consumption is reported for the whole cement plant, which usually produces more than one cement type.
Water consumption was usually reported for the whole integrated cement plants (clinker + cement production operations). Based on literature and expert opinion, the total water volume was divided equally between the clinker and the cement production processes and then converted into unit flows.
Raw materials and fuel inputs were considered to be dry. As water is mainly used for cooling and dust control, it was considered that all water evaporates, except for the "tap water" input, which was considered to be used as drinking water and whose output is modelled as an effluent.
Fuel consumption was informed by manufacturers in terms of volume or mass. They were converted into energy using their lower heating values and modelled as a heat input, to simplify the dataset and allow the consideration of corresponding air emissions.
Infrastructure input flow (cement factory) was extrapolated from "cement Portland/CH" dataset (accessed 08.10.2017).
The amounts of the exchanges were calculated considering the weighted average of the sample. No conversion to the geometric mean of the lognormal distribution was done, for consistency reasons with other ecoinvent datasets.

## Extrapolations
This dataset is created as copy of the corresponding regional BR dataset. The production volume is set equal to the regional activity to avoid the creation of the RoW.
