# urea formaldehyde foam production, in situ foaming

Dataset: EcoSpold 2, unit process
Geography: RoW
Time period: 1997-01-01 to 2019-12-31
Technology level: current
Classification: ISIC rev.4 ecoinvent: 2220:Manufacture of plastics products
Classification: EcoSpold01Categories: insulation materials/production
Tags: ConvertedDataset
Scenario: Business-as-Usual
System model: Allocation at the point of substitution
Generated by: Hans-Jörg Althaus
Published in: Kellenberger D. 2004
Database: ecoinvent
isCopyrightProtected: true
accessRestrictedTo: 1

## General comment
Foam has a density of 10 - 30 kg /m3 and a thermal conductivity of 0.035 W/mK. Data is based on crude assumptions.
[This dataset was already contained in the ecoinvent database version 2. It was not individually updated during the transfer to ecoinvent version 3. Life Cycle Impact Assessment results may still have changed, as they are affected by changes in the supply chain, i.e. in other datasets. This dataset was generated following the ecoinvent quality guidelines for version 2. It may have been subject to central changes described in the ecoinvent version 3 change report (http://www.ecoinvent.org/database/ecoinvent-version-3/reports-of-changes/), and the results of the central updates were reviewed extensively. The changes added e.g. consistent water flows and other information throughout the database. The documentation of this dataset can be found in the ecoinvent reports of version 2, which are still available via the ecoinvent website. The change report linked above covers all central changes that were made during the conversion process.]

## Included activities end
Includes raw materials and in situ production of foam. Transports to application site are not included.

## Geography
data for Switzerland

## Technology
On site production of foam from two components using a compressor and a portable injection device.

## Parameters
- fraction, tap water, to air: 0.15; name fraction_TW_to_air; lognormal variance with pedigree 0.092025, pedigree (4,4,3,2,4)
- fraction, process water, to air: 0.15 dimensionless; name fraction_PW_to_air; lognormal variance with pedigree 0.092025, pedigree (4,4,3,2,4)

## Reference product
- urea formaldehyde foam, in situ foaming: 1 kg; By-product classification allocatable product; CPC 363: Semi-manufactures of plastics
  EcoSpold01Location=CH
  production volume 3.96633 kg
    This is a placeholder value that does not reflect real-world production volumes. This dataset does not currently require a real-world production volume to work in the database framework, and no actual data were collected yet. This has no negative effect on the results of the ecoinvent database.
  property carbon content, fossil 0.390963
    Based on urea formaldehyde (95.6%). Hardener is phosphoric acid (ecoinvent v2.2 report 16_part XIV), H3PO4.
  property carbon content 0.390963
    carbon content on a dry matter basis (reserved; not for manual entry)
  property true value 1.77
    allocation property applied in "true value" allocation // value calculated from revenue
  properties: price 1.77 EUR2005, water content 0, carbon content, non-fossil 0, dry mass 1 kg, wet mass 1 kg, water in wet mass 0 kg, carbon allocation 0.390963 kg

## By-products
- electricity, for reuse in municipal waste incineration only: 0 kWh; CPC 17100: Electrical energy; By-product classification allocatable product; pedigree (1,1,1,1,1)
  Net electricity generated from this waste and used in internal MSWI plant energy redistribution.
  Uncertainty: uncertainty is calculated from uncertainties in waste composition and uncertainties in energy efficiency and the uncertainty in internal energy demand
  production volume 0.0185636 kWh
  property exergy 3.6 MJ; name E_el_prod_MSWI_exergy
    This exergy property is based on the exergy content of the product.
  property true value relation 3.6; name E_el_prod_MSWI_true_value_relation
    property to calculate "true value" from
  property price 0.1 EUR2005; name E_el_prod_MSWI_price_EUR2005
    Estimated to be the same price as in case of electricity, medium voltage.
  property true value 0.000592292
    allocation property applied in "true value" allocation // value calculated from true value relation
- heat, for reuse in municipal waste incineration only: 0 MJ; CPC 17300: Steam and hot water; By-product classification allocatable product; pedigree (1,1,1,1,1)
  (same comment as for electricity, for reuse in municipal waste incineration only)
  production volume 0.130543 MJ
  property exergy 0.1842 MJ; name E_th_prod_MSWI_exergy
    This exergy property is based on the exergy content of the product.
  property true value relation 0.1842; name E_th_prod_MSWI_true_value_relation
    property to calculate "true value" from
  property price 0.0106 EUR2005; name E_th_prod_MSWI_price_EUR2005
    Average European district heat price from Ecoheatcool and Euroheat 2005-2006, Ecoheat Work package 1: The European heat market. Final report. 10.6 EUR/GJ i s the price of district heat. http://www.solarthermalworld.org/files/Ecoheatcool%20WP1%20Web.pdf?download
  property true value 0.000213116
    (same comment as for electricity, for reuse in municipal waste incineration only)

## Inputs from technosphere
- alkylbenzene sulfonate, linear, petrochemical: 0.0524761 kg; lognormal variance with pedigree 0.38, pedigree (5,5,5,5,5)
  EcoSpold01Location=RER
  properties: dry mass 1 kg, wet mass 1 kg, carbon content, fossil 0.407018
  note on carbon content, fossil: European LAS is a mixture of differ-ent homologues (C10-C13 alkyl chains) including all positional isomers with the exception of 1-alkyl substituted ones. The typical homologue distribution is 15%, 30%, 30% and 25% for C10, C11, C12 and C13 with an average alkyl chain of C11.6 and an average molecular weight of 342 as the sodium salt (ecoinvent v2.2 report 12)
- industrial machine, heavy, unspecified: 0.000499773 kg; lognormal variance with pedigree 0.68, pedigree (5,5,5,5,5)
  EcoSpold01Location=RER
- electricity, low voltage: 0 kWh; pedigree (1,1,1,1,1)
  EcoSpold01Location=CH
- waste polyurethane: 0 kg; pedigree (1,1,1,1,1)
  EcoSpold01Location=CH
  production volume 0 kg
    Calculated from the production volume of urea formaldehyde foam, in situ foaming in proportion to the respective output amounts.
  properties: carbon content, fossil 0.641283, water content 0.00200401, dry mass 0.998 kg, wet mass 1 kg
  note on carbon content, fossil: C content was calculated for 1 kg DM, using data in Tab A.2, ecoinvent v2.2 report 13_I.
- urea formaldehyde resin: 0.955565 kg; lognormal variance with pedigree 0.38, pedigree (5,5,5,5,5)
  EcoSpold01Location=RER
  properties: carbon content, fossil 0.408958, wet mass 1 kg, dry mass 1 kg
  note on carbon content, fossil: Chemical formula of the urea formaldehide monomer was assumed to be C3H8N2O
- phosphoric acid, industrial grade, without water, in 85% solution state: 0.0524761 kg; lognormal variance with pedigree 0.38, pedigree (5,5,5,5,5)
  EcoSpold01Location=RER
  properties: wet mass 1 kg, dry mass 1 kg
- tap water: 0 kg; name tap_water_input; pedigree (1,1,1,1,1)
  EcoSpold01Location=CH
  properties: dry mass 0.000337476 kg, water content 2962.17, carbon content, fossil 0.00178991, wet mass 1 kg
  note on carbon content, fossil: Bicarbonate content is 2.93 mol/m3. CO2 content is 0.1 mol/m3 (ecoinvent v2.2 report 8, Tab 93.1).
- electricity, low voltage: 0.000133512, 2.34164e-5, 0.000531085, 0.00190407, 0.000385059, 0.00582321, 0.000959852, 0.00273411 kWh (8 entries); lognormal variance with pedigree 0.38, pedigree (5,5,5,5,5)
  EcoSpold01Location=CH
- waste polyurethane: -0.00555956, -0.000371469, -2.80936e-5, -0.00015343, -6.19839e-5, -0.000145696, -0.00473701, -0.03892 kg (8 entries); lognormal variance with pedigree 0.38, pedigree (5,5,5,5,5)
  EcoSpold01Location=CH
  production volume 0.15 kg
- tap water: 0.000459828, 0.00382002, 0.000759941, 0.163406, 0.0191627, 0.000498513, 0.00141801, 0.219289 kg (8 entries); lognormal variance with pedigree 0.38, pedigree (5,5,5,5,5)
  EcoSpold01Location=CH

## Emissions to nature
- Formaldehyde [air, urban air close to ground]: 0.000955565 kg; lognormal variance with pedigree 0.5, pedigree (5,5,5,5,5)
- Water [air, unspecified]: 6.13221e-5 m3; name water_to_air_unspecified; lognormal variance with pedigree 0.0827, pedigree (2,2,5,5,1)
  Calculated value based on literature values and expert opinion. See comments in the parametres' comment field.
  property fraction, origin: salt water 0; name fraction_origin_salt_water
  property fraction, origin: unspecified 0; name fraction_origin_unspecified
  property fraction, origin: fresh water 1; name fraction_origin_fresh_water
- Water [water, unspecified]: 0.000347492 m3; name water_to_water_unspecified; lognormal variance with pedigree 0.0827, pedigree (2,2,5,5,1)
  (same comment as for Water)
  property carbon content, fossil 0; name C_content_fossil
  property fraction, origin: salt water 0; name fraction_origin_salt_water_Ww
  property fraction, origin: unspecified 0; name fraction_origin_unspecified_Ww
  property fraction, origin: fresh water 1; name fraction_origin_fresh_water_Ww
  property carbon content, non-fossil 0; name C_content_non_fossil
  property dry mass 0 kg; name DM
  property wet mass 1000 kg; name WM
  property water in wet mass 1000 kg; name WWM

## Extrapolations
none This dataset has been copied from an original dataset covering the geography CH. The uncertainty has been adjusted accordingly.

## Review by Roberto Dones 2004-04-01
passed
