# tube insulation production, elastomere

Dataset: EcoSpold 2, unit process
Geography: DE
Time period: 1997-01-01 to 2019-12-31
Technology level: current
Classification: EcoSpold01Categories: insulation materials/production
Classification: ISIC rev.4 ecoinvent: 2219:Manufacture of other rubber products
Synonyms: PUR; armaflex; aeroflex; PVC
Tags: ConvertedDataset
Scenario: Business-as-Usual
System model: Allocation at the point of substitution
Share of production covered: 100 %
Generated by: Niels Jungbluth
Published in: Kellenberger D. 2007
Database: ecoinvent
isCopyrightProtected: true
accessRestrictedTo: 1

## General comment
Tube insulation materials can be used for different technical applications. Within this project their use as insulation material for warm water pipes of solar collectors is of interest. The inventory of tube insulation materials can be considered as a reliable data base for the assessment of this material in connection with technical applications. It is not meant to be used for the comparison of different insulation materials. Therefore detailed information about product properties and type of application would be necessary. Transport distances should be multiplied by 14 to account for low specific weight of 75kg/m3.
[This dataset was already contained in the ecoinvent database version 2. It was not individually updated during the transfer to ecoinvent version 3. Life Cycle Impact Assessment results may still have changed, as they are affected by changes in the supply chain, i.e. in other datasets. This dataset was generated following the ecoinvent quality guidelines for version 2. It may have been subject to central changes described in the ecoinvent version 3 change report (http://www.ecoinvent.org/database/ecoinvent-version-3/reports-of-changes/), and the results of the central updates were reviewed extensively. The changes added e.g. consistent water flows and other information throughout the database. The documentation of this dataset can be found in the ecoinvent reports of version 2, which are still available via the ecoinvent website. The change report linked above covers all central changes that were made during the conversion process.]

## Included activities end
The production of tube insulation materials is investigated from gate to gate for one producer with production places in Münster and Zeulenroda, Germany.

## Geography
Production in Germany

## Technology
The production process can roughly be divided into pre-production and finishing process. Synthetic rubber is delivered in bulk to the plant. In a first stage different raw materials are kneaded. The rubber mass is rolled out in size of the latter rubber basic furs which are brought to an intermediate storage. For a part of these furs the finishing process takes place in Zeulenroda. The bulk is further processed in Münster. These rubber basic furs are warmed up again in the next rolling mill and some necessary raw materials are added. The mass is extruded to the form of the final product. Than the tubes are brought to the batch-ovens or to the conti-ovens for vulcanisation. During this process they simultaneously blow out to their final size. The product is cut to size, labelled and packed in cardboard. Most (82%) of the production wastes are recycled within the same production process.

## Time period
Year of environmental reporting. Two different production places.

## Parameters
- fraction, process water, to air: 0.15 dimensionless; name fraction_PW_to_air; lognormal variance with pedigree 0.092025, pedigree (4,4,3,2,4)
  Literature value. In case when no industry/process specific data are available, default evaporation fraction value is used. This value is 15% and is based on literature (Statistics Canada, 2007 & Shaffer, K.H., 2008, Consumptive water use in the Great Lakes Basin, USGS & Shiklomanov, 2003, World Water Resources at the Beginning of the 21st Century) and has been approved by an expert.
- fraction, tap water, to air: 0.15; name fraction_TW_to_air; = fraction_PW_to_air; lognormal variance with pedigree 0.092025, pedigree (4,4,3,2,4)
  Calculated value. See comment in the other parametres present in this dataset. Tap water is considered to be always used as process water, thus process water fractions to air are applied to all tap water input flows to calculate the amount of water consumed in the processes.

## Reference product
- tube insulation, elastomere: 1 kg; CPC 36230: Tubes, pipes and hoses of vulcanized rubber other than hard rubber; By-product classification allocatable product
  SDG for output: 1.5; Estimation from aggregated figures
  EcoSpold01Location=DE
  production volume 0.242058 kg
    This is a placeholder value that does not reflect real-world production volumes. This dataset does not currently require a real-world production volume to work in the database framework, and no actual data were collected yet. This has no negative effect on the results of the ecoinvent database. The placeholder value of this activity was scaled according to the nominal GDP of 2005 (source: United Nations, http://data.un.org/Glossary.aspx?q=GDP+%28current+US%24%29, accessed 20130726) to reflect an appropriate share of the global production volume, which is also a placeholder value.
  property price 1.22 EUR2005
    From UN trade-database. Import data. (USD/kg). Category: Mixtures of natural and synthetic rubbers. Main input to product is 'synthetic rubber'.
  property carbon content, fossil 0.837817
    The main raw material (93%) is synthetic rubber (Ethylene propylene diene monomer (EPDM)), that is used together with PVC (ecoinvent v2.2 report 7_XV), C2H3Cl
  property carbon content 0.837817
    carbon content on a dry matter basis (reserved; not for manual entry)
  property true value 1.22
    allocation property applied in "true value" allocation // value calculated from revenue
  properties: wet mass 1 kg, dry mass 1 kg, carbon content, non-fossil 0, water content 0, water in wet mass 0 kg, carbon allocation 0.837817 kg

## By-products
- heat, for reuse in municipal waste incineration only: 0 MJ; CPC 17300: Steam and hot water; By-product classification allocatable product; pedigree (1,1,1,1,1)
  Net electricity generated from this waste and used in internal MSWI plant energy redistribution.
  Uncertainty: uncertainty is calculated from uncertainties in waste composition and uncertainties in energy efficiency and the uncertainty in internal energy demand
  production volume 0.573018 MJ
  property exergy 0.1842 MJ; name E_th_prod_MSWI_exergy
    This exergy property is based on the exergy content of the product.
  property price 0.0106 EUR2005; name E_th_prod_MSWI_price_EUR2005
    Average European district heat price from Ecoheatcool and Euroheat 2005-2006, Ecoheat Work package 1: The European heat market. Final report. 10.6 EUR/GJ i s the price of district heat. http://www.solarthermalworld.org/files/Ecoheatcool%20WP1%20Web.pdf?download
  property true value relation 0.1842; name E_th_prod_MSWI_true_value_relation
    property to calculate "true value" from
  property true value 0.00376331
    allocation property applied in "true value" allocation // value calculated from true value relation
- electricity, for reuse in municipal waste incineration only: 0 kWh; CPC 17100: Electrical energy; By-product classification allocatable product; pedigree (1,1,1,1,1)
  (same comment as for heat, for reuse in municipal waste incineration only)
  production volume 0.0814892 kWh
  property price 0.1 EUR2005; name E_el_prod_MSWI_price_EUR2005
    Estimated to be the same price as in case of electricity, medium voltage.
  property exergy 3.6 MJ; name E_el_prod_MSWI_exergy
    This exergy property is based on the exergy content of the product.
  property true value relation 3.6; name E_el_prod_MSWI_true_value_relation
    property to calculate "true value" from
  property true value 0.0104596
    (same comment as for heat, for reuse in municipal waste incineration only)
- iron scrap, sorted, pressed: 0 kg; By-product classification Recyclable; CPC 39310: Slag, dross, scalings and other waste from the manufacture of iron or steel; pedigree (1,1,1,1,1)
  Iron scrap recovered from this waste.
  Uncertainty: uncertainty calculated from uncertainty in waste composition, uncertainty of share of recyclable metal, uncertainty of transfer coefficient to bottom ash, uncertainty of the efficiency of scrap removal in MSWI plant.
  production volume 1.24556e-5 kg
  property price 0.175 EUR2005
    Temporary price data. Calculated as 90% of purchasers price based on: 2005 import and export prices (total trades (USD) divided by total weight (kg) in biggest economies of the world: EU27, USA, Brasil, China, India, Japan and Russia) from UN Commodity Trade Statistics Database (http://data.un.org/Explorer.aspxDatabase [Accessed 2011.06.20]). Commodity: Waste or scrap, of cast iron
  property carbon content 0
    carbon content on a dry matter basis (reserved; not for manual entry)
  property true value 2.17973e-6
    allocation property applied in "true value" allocation // value calculated from revenue
  properties: dry mass 1 kg, water content 0, carbon content, non-fossil 0, water in wet mass 0 kg, carbon content, fossil 0, wet mass 1 kg, carbon allocation 0 kg
- iron scrap, unsorted: 0 kg; source European Aluminium Association 2008; CPC 39310: Slag, dross, scalings and other waste from the manufacture of iron or steel; By-product classification Recyclable; pedigree (1,1,1,1,1)
  production volume 1.75841e-9 kg
  property price 0.149 EUR2005; name ironScrapAmount_price_EUR2005
    Temporary price data. Calculated as 90% of purchasers price based on: estimated at 85% of sorted scrap
  property carbon content 0
    carbon content on a dry matter basis (reserved; not for manual entry)
  property true value 2.62003e-10
    allocation property applied in "true value" allocation // value calculated from revenue
  properties: water in wet mass 0 kg, water content 0, carbon content, fossil 0, carbon content, non-fossil 0, dry mass 1 kg, wet mass 1 kg, carbon allocation 0 kg
- aluminium oxide, non-metallurgical: 0 kg; source European Aluminium Association 2008; CPC 41432: Alumina (aluminium oxide), except artificial corundum; By-product classification allocatable product; CAS 1344-28-1; pedigree (1,1,1,1,1)
  production volume 1.1065e-7 kg
  property carbon content, non-fossil 0; name C_content_non_fossil
  property price 0.28 EUR2005; name Al2O3Amount_price_EUR2005
    From UN trade database. http://data.un.org/ Import data from the largest economies of the world are used (Brazil, India, USA, China, Japan and EU-27).
  property dry mass 1 kg; name DM
  property water content 0; name water_content
  property wet mass 1 kg; name WM
  property water in wet mass 0 kg; name WWM
  property carbon content, fossil 0; name C_content_fossil
  property carbon content 0
    carbon content on a dry matter basis (reserved; not for manual entry)
  property true value 3.09821e-8
    allocation property applied in "true value" allocation // value calculated from revenue
  properties: carbon allocation 0 kg
- aluminium, cast alloy: 0 kg; source European Aluminium Association 2008; By-product classification allocatable product; CPC 41431: Unwrought aluminium; pedigree (1,1,1,1,1)
  EcoSpold01Location=RER
  production volume 1.03433e-6 kg
  property price 1.3 EUR2005; name castAlloyAmount_price_EUR2005
    Temporary price data. Calculated as 90% of purchasers price based on: Source: London Metal Exchange, Aluminium alloy price for 2005
  property carbon content 0
    carbon content on a dry matter basis (reserved; not for manual entry)
  property true value 1.34463e-6
    allocation property applied in "true value" allocation // value calculated from revenue
  properties: water in wet mass 0 kg, carbon content, non-fossil 0, water content 0, dry mass 1 kg, carbon content, fossil 0, wet mass 1 kg, carbon allocation 0 kg
- aluminium, wrought alloy: 0 kg; source European Aluminium Association 2008; By-product classification allocatable product; CPC 4153: Semi-finished products of aluminium or aluminium alloys; pedigree (1,1,1,1,1)
  production volume 4.52812e-7 kg
  property price 1.44 EUR2005; name secondaryAluminiumOutput_price_EUR2005
    Estimated based on literature values and expert judgement. Aluminium ccast alloys are about 90% of the price of aluminium wrought alloys.
  property carbon content 0
    carbon content on a dry matter basis (reserved; not for manual entry)
  property true value 6.52049e-7
    allocation property applied in "true value" allocation // value calculated from revenue
  properties: wet mass 1 kg, water content 0, carbon content, fossil 0, water in wet mass 0 kg, carbon content, non-fossil 0, dry mass 1 kg, carbon allocation 0 kg
- copper: 0 kg; source Rentz O. 1999; By-product classification allocatable product; CPC 41413: Refined copper and copper alloys, unwrought; master alloys of copper
  Literature value. Copper uses: Before end-use copper is manufactured into semi fabricated products, such as shapes and ingots (known as 'semis'). These manufacturing processes are subdivided into hot working, cold working and, if necessary, process annealing. Few of the semis are ready for use as such. They more typically travel to first-stage manufacturers, who make metal rods, wire, and casting, and then to component manufacturers who produce such things as motors, valves, and insulated cables The components in turn are incorporated by final-stage manufacturers into a variety of finished products - automobiles, commercial buildings, residential housing, and so forth. These uses account for about 79% of the world-wide consumption of copper.
  production volume 1.1967e-7 kg
  property price 5.52 EUR2005
    Literature value (http://www.economist.com/news/business/21576714-mining-industry-has-enriched-chile-its-future-precarious-copper-solution). Average price between 20015 and 2013.
  property carbon content 0
    carbon content on a dry matter basis (reserved; not for manual entry)
  property true value 6.6058e-7
    allocation property applied in "true value" allocation // value calculated from revenue
  properties: dry mass 1 kg, water in wet mass 0 kg, wet mass 1 kg, carbon content, non-fossil 0, water content 0, carbon content, fossil 0, carbon allocation 0 kg
- zinc concentrate: 0 kg; CPC 14290: Other non-ferrous metal ores and concentrates (other than uranium or thorium ores and concentrates); By-product classification allocatable product
  Calculated value from the knowledge of the properties of both products.
  production volume 9.49856e-17 kg
  property price 0.38 EUR2005; name ByP_price_EUR2005
    Temporary price data. Calculated as 90% of purchasers price based on: Zinc content in concentrate 53%. Concentrate price per kg Zn 86.5% of refined Zn price (13.5% treatment charges according to CHR Metals Limited 2005: Dynamic cost curves. http://www.minecost.com/dynamic.pdf). 2004 zinc price from USGS (2007) Mineral commodity summaries 2007. <http://minerals.usgs.gov/minerals/pubs/mcs/2007/mcs2007.pdf> [Accessed 25 May 2010]
  property zinc content 0.53; name zinc_C_zinc_concentrate
    Zinc content on a dry matter basis. Value taken from teh "zinc mine operation" /GLO dataset.
  property dry mass 1 kg; name DM_zinc_concentrate
  property carbon content 0
    carbon content on a dry matter basis (reserved; not for manual entry)
  property true value 3.60945e-17
    allocation property applied in "true value" allocation // value calculated from revenue
  properties: wet mass 1 kg, water content 0, carbon content, non-fossil 0, carbon content, fossil 0, water in wet mass 0 kg, carbon allocation 0 kg

## Inputs from technosphere
- polyurethane, rigid foam: 0.0544648 kg; lognormal variance with pedigree 0.0806, pedigree (1,3,5,1,1)
  EcoSpold01Location=RER
  Environmental report
  Uncertainty: Environmental report
  properties: carbon content, fossil 0.69089, dry mass 1 kg, wet mass 1 kg
  note on carbon content, fossil: Polyurethanes (PUR) is the collective name for an extensive group of polymers with very different compositions and correspondingly varied property profiles, though their molecule chain contains all a urethane group (-NH-CO-O-). All PURs are built on a common principle : they are produced by the diisocyanate polyaddition process, that links polyols and (di)isocyanates. In this dataset, an example of typical polyurethane mixture is described (Ullmann, Polyurethanes, Dieterich et al. & ecoinvent v2 report 11_II). C content was calculated as an addition of C contents in its components.
- corrugated board box: 0.00635588 kg; lognormal variance with pedigree 0.0808, pedigree (2,2,5,3,1)
  EcoSpold01Location=RER
  Questionnaire, product packaging
  Uncertainty: Questionnaire, product packaging
  properties: carbon content, non-fossil 0.432275, wet mass 1 kg, dry mass 0.945 kg, water content 0.0582011, carbon content, fossil 0.000656085
  note on carbon content, non-fossil: Biogenic C content was calculated after biogenic C contents of chemicals used in the production of board (Tab 10.15 & 10.16, ecoinvent v2.2 report 11_III, part 10).
  note on carbon content, fossil: Fossil C content was calculated after fossil C contents of chemicals used in the production of board (Tab 10-15 & 10.16 ecoinvent v2.2 report 11_III, part 10)
- waste plastic, mixture: -0.0739377 kg; lognormal variance with pedigree 0.0801, pedigree (1,2,5,1,1)
  EcoSpold01Location=CH
  Environmental report
  Uncertainty: Environmental report
  production volume 0.0748 kg
    Calculated from the production volume of tube insulation, elastomere in proportion to the respective output amounts.
  properties: water content 0.180638, wet mass 1 kg, dry mass 0.847 kg, carbon content, fossil 0.747344
  note on carbon content, fossil: C content in 1 kg DM was calculated using data in Tab A.2, ecoinvent v2.2 report 13_I
- polyvinylchloride, emulsion polymerised: 0.00946413 kg; lognormal variance with pedigree 0.1001, pedigree (3,2,5,1,3)
  EcoSpold01Location=RER
  Therotical assumptions
  Uncertainty: Therotical assumptions
  properties: dry mass 1 kg, carbon content, fossil 0.387097, wet mass 1 kg
  note on carbon content, fossil: Monomer is vynyl chloride, C2H3Cl (ecoinvent v2.2 report 11_II). MW=62 g/mol
- chemical, organic: 0.0642507 kg; lognormal variance with pedigree 0.3021, pedigree (3,2,5,1,5)
  EcoSpold01Location=GLO
  Assumption 6.5% of extrusion agent 1,1-azobisformamide
  Uncertainty: Assumption 6.5% of extrusion agent 1,1-azobisformamide
  properties: carbon content, fossil 0.628, dry mass 1 kg, wet mass 1 kg
  note on carbon content, fossil: This dataset is an unweighted average of 20 organic substances (listed in Tab 88.1, ecoinvent v2.2 report 8, part II), being part of the top100 chemicals included in this database. The C-content has also been calculated as an unweighted average of the C content of the substances composing this dataset.
- polyvinylchloride, suspension polymerised: 0.0646713 kg; lognormal variance with pedigree 0.1001, pedigree (3,2,5,1,3)
  Therotical assumptions
  EcoSpold01Location=RER
  Uncertainty: Therotical assumptions
  properties: carbon content, fossil 0.387097, dry mass 1 kg, wet mass 1 kg
- electricity, medium voltage: 1.41352 kWh; lognormal variance with pedigree 0.0801, pedigree (1,2,5,1,1)
  EcoSpold01Location=DE
  Environmental report
  Uncertainty: Environmental report
- tap water: 1.32455 kg; name tap_water_input; lognormal variance with pedigree 0.0801, pedigree (1,2,5,1,1)
  Environmental report
  EcoSpold01Location=RER
  Uncertainty: Environmental report
  properties: water content 2962.17, wet mass 1 kg, dry mass 0.000337476 kg, carbon content, fossil 0.00178991
  note on carbon content, fossil: Bicarbonate content is 2.93 mol/m3. CO2 content is 0.1 mol/m3 (ecoinvent v2.2 report 8, Tab 93.1).
- wastewater, from residence: -0.00132455 m3; lognormal variance with pedigree 0.0801, pedigree (1,2,5,1,1)
  Environmental report, Sanitary and cooling water
  EcoSpold01Location=CH
  Uncertainty: Environmental report, Sanitary and cooling water
  production volume 0.00134 m3
    (same comment as for waste plastic, mixture)
  properties: wet mass 1000 kg, dry mass 0.337476 kg, carbon content, non-fossil 0.199421, water content 2962.17
  note on carbon content, non-fossil: 0.0673 kg TOC/m3 (Tab A.17, ecoinvent v2.2 report 13_I). TOC was considered as Total Carbon.
- synthetic rubber: 0.919279 kg; lognormal variance with pedigree 0.1021, pedigree (3,2,5,1,1)
  EcoSpold01Location=RER
  Therotical assumptions, Bulk transport
  Uncertainty: Therotical assumptions, Bulk transport
  properties: carbon content, fossil 0.871949, dry mass 1 kg, wet mass 1 kg
  note on carbon content, fossil: EPDM (Ethylene-propene-diene terpolymer) rubber is a terpolymer of ethylene, propene, and a diene with the residual unsaturated portion of the diene in the side chain (ecoinvent v2.2 report 7-part XX & Ullmann). Chemical formula (deduced from Evidences of Solvent-Induced Miscibility in Polychloroprene-co-Ethylene-Propene Diene Terpolymer Blends, Dubey et al., Journal of Applied Polymer Science, 2009, 111:1884–1891): C20H35
- natural gas, high pressure: 0.115829 m3; lognormal variance with pedigree 0.0801, pedigree (1,2,5,1,1)
  Environmental report, 36.3MJ/Nm3
  EcoSpold01Location=DE
  Uncertainty: Environmental report, 36.3MJ/Nm3
  properties: carbon content, fossil 0.602381, dry mass 0.84 kg, wet mass 0.84 kg, heating value, gross 39 MJ
  note on carbon content, fossil: An average C content of 0.506 kg C/ m3 has been assumed (this average has been calculated using data in Tab 3.5, ecoinvent v2.2 report 6_V
- municipal solid waste: -0.00126524 kg; lognormal variance with pedigree 0.0801, pedigree (1,2,5,1,1)
  Environmental report
  EcoSpold01Location=CH
  Uncertainty: Environmental report
  production volume 0.00128 kg
    (same comment as for waste plastic, mixture)
  properties: carbon content, fossil 0.171549, water content 0.297017, wet mass 1 kg, dry mass 0.771 kg, carbon content, non-fossil 0.261655
  note on carbon content, fossil: MSW composition in tab 4.1, ecoinvent v2.2 report 13_I. C content referred to 1 kg DM
- tube insulation factory: 3.95389e-9 unit; lognormal variance with pedigree 0.0801, pedigree (1,2,5,1,1)
  Environmental report
  EcoSpold01Location=DE
  Uncertainty: Environmental report

## Emissions to nature
- Nitrogen oxides [air, urban air close to ground]: 0.000289622 kg; lognormal variance with pedigree 0.1301, pedigree (1,2,5,1,1)
  Environmental report
  Uncertainty: Environmental report
- Sulfur dioxide [air, urban air close to ground]: 0.0119605 kg; lognormal variance with pedigree 0.1301, pedigree (1,2,5,1,1)
  Environmental report
  Uncertainty: Environmental report
- Carbon dioxide, fossil [air, urban air close to ground]: 0.222406 kg; lognormal variance with pedigree 0.0801, pedigree (1,2,5,1,1)
  Environmental report, Calculated for Zeulenroda
  Uncertainty: Environmental report, Calculated for Zeulenroda
- Water [air, unspecified]: 0.000198683 m3; name water_to_air_unspecified; = (tap_water_input/1000*fraction_TW_to_air); lognormal variance with pedigree 0.0807, pedigree (2,2,5,1,1)
  Calculated value based on literature values and expert opinion. See comments in the parametres' comment field.
  property fraction, origin: salt water 0; name fraction_origin_salt_water
  property fraction, origin: fresh water 1; name fraction_origin_fresh_water
  property fraction, origin: unspecified 0; name fraction_origin_unspecified
- Particulates, > 10 um [air, urban air close to ground]: 4.9819e-5 kg; lognormal variance with pedigree 0.2001, pedigree (1,2,5,1,1)
  Environmental report, Aerosoles measured as dust, estimation >10um
  Uncertainty: Environmental report, Aerosoles measured as dust, estimation >10um
- Carbon monoxide, fossil [air, urban air close to ground]: 0.00023921 kg; lognormal variance with pedigree 0.7401, pedigree (1,2,5,1,1)
  Environmental report
  Uncertainty: Environmental report

## Sampling procedure
Environmental report.

## Extrapolations
Data for one producer are used for the total production. Packaging estimated with data from a plant in TH.

## Review by Daniel Kellenberger (obsolete) 2003-06-18
passed with further remark:
It seems not plausible that only two German factories cover the total German consumer market (no import?)
