# refrigeration machine production, R134a as refrigerant

Dataset: EcoSpold 2, unit process
Geography: GLO
Time period: 2010-01-01 to 2019-12-31
Technology level: current
Classification: ISIC rev.4 ecoinvent: 2920:Manufacture of bodies (coachwork) for motor vehicles; manufacture of traile
Synonyms: reefer machine
Scenario: Business-as-Usual
System model: Allocation at the point of substitution
Generated by: Tereza Levova
Database: ecoinvent
isCopyrightProtected: true
accessRestrictedTo: 1

## General comment
This dataset represents production of refrigeration machine which is later on build into reefer (refrigerated container).
Refrigeration machine, Star Cool (Source: Maersk Container Industry, 2014, http://www.mcicontainers.com/products/reefermachines/pages/starcoolpictureframeunit.aspx, accessed 20141022).
This refrigeration machine is an electric powered integrated cooling and heating system operating on refrigerant R134a. The system is designed to maintain cargo temperatures in a range from -30°C to +30°C. The system is designed to operate in ambient temperatures from -30°C to +50°C.

## Included activities start
The activity starts when all the individual parts are brought to the assembly hall for assembling.

## Included activities end
The activity ends when the refrigeration machine is ready to be inserted into the reefer (refrigerated container).

## Technology
The dataset is primarily build based on information on Star Cool refrigeration machine model SCI-40.
The system consists of following modules; condenser (compressor module), evaporator module and evaporator fan module. The cooling system is also equiped with a two-stage compressor, electrically driven through a frequency converter.

The cooling system is also equipped with an economizer, which performs the task of sub-cooling the liquid from the receiver to the evaporator, thereby increasing the cooling capacity of the cooling system.

The evaporators are controlled by electronically expansion valves. The equipment is designed to operate on a nominal 410 V AC / 450 V AC, 3 phase, 50/60 Hz, primary power source, according to ISO 1496-2. An integrated dual wound transformer supplies control circuit voltage. An automatic system, power supply sensing and correction, is provided to ensure the correct direction of rotation for the fan motors. This is done regardless of the incoming phase sequence from the primary power supply, provided that all fan motors are wired correctly.
The most used refrigerant in these refrigeration machines is the R134a. Since this refrigerant has a high global warming potential the refrigeration technology producers started producing referigeration machines with alternative refrigerants (Carrier, 2014, http://dms.hvacpartners.com//docs/2000/Public/0D/62-11665.pdf, accessed 20141105). One of them is liquid carbon dioxide.
Further references:
- Restrepo, G., 2007, Ranking of refrigerants, Environmental Science and Technology
- Bovea, M.D., 2007, Comparative Life Cycle Assessment of Commonly Used Refrigerants in Commercial Refrigeration Systems

## Parameters
- density of glass fibre reinforced polypropylene: 1050 kg/m3; name density_GFP_polypropylene; lognormal variance with pedigree 0.0032, pedigree (3,3,1,1,1)
  Literature value (http://cdn.intechopen.com/pdfs-wm/34071.pdf, accessed 20141016). The filler content is assumed to be 20%.
- thickness of glass fibre reinforced polypropylene liner: 1.89692 mm; name thickness_liner; lognormal variance with pedigree 0.0032, pedigree (3,3,1,1,1)
  Literature data (http://ipaper.ipapercms.dk/MCI/Brochures/Qliner/, accessed 20141016).
- thickness of insulation_front wall: 65 mm; name thickness_insulation_front_wall; lognormal variance with pedigree 0.0018, pedigree (2,3,1,1,1)
  Literature data (Mearsk Container Industry, 2012, Technical Specifications for 40'x8'x9'6'' refrigerated container with integrated star cool machine, http://www1.cma-cgm.com/mnr/page/DocAndProg/Spec%20for%20TAL%2040'hc%20SCIF%20x%201,000%20boxes(provisional%20CA).pdf, accessed 20141016).
- density of polyurethane foam insulation_front wall: 50 kg/m3; name density_insulation_front_wall; lognormal variance with pedigree 0.0106, pedigree (4,4,1,1,1)
  (same comment as for thickness of insulation_front wall)

## Reference product
- refrigeration machine, R134a as refrigerant: 1 unit; name refrigeration_machine_RP; By-product classification allocatable product; CPC 43913: Refrigerating and freezing equipment and heat pumps, except household type equipment
  production volume 109800 unit; = 45000+(1200000*0.2*0.3*0.9)
    Calculated based on literature value.
    This type of refrigeration machine can be used in reefers as well as different type of lorries.
    There are 40500 reefers produced/year using R134a as refrigerant and using this size of refrigeration unit.
    1200000 units of trucks in operation world wide in 2002 (IPCC/TEAP Special Report: Safeguarding the Ozone Layer and the Global Climate System).
    It is estimated, that 20% of this amount is renewed every year. It is estimated, that 30% of them use refrigeration machine of this size.
    It is estimated, that 90% of those trucks use R134a as refrigerant and 10% use carbon dioxide, liquid as refrigerant.
  property width, external 2.025 m; name width_machine
    Literature value.
  property price 15000 EUR2005; name refrigeration_machine_RP_price_EUR2005
    Estimated price based on prices offered online (alibaba and ebay). The price calculated based on the amount of the materials entering the production is 550 Euro. The price of 550 EURO is assumed to be heavily underestimated, since not all the products entering the production of the container have price in the database.
  property weight 380 kg; name weight_machine
    Literature value.
  property lifetime capacity [unit] 1 unit; name refrigeration_machine_lifetime_capacity
    Estimated value. One refrigeration machine is meant to be used by one reefer container in its lifetime.
  property height, external 2.235 m; name height_machine
    Literature value.
  property lifetime 10 year; name refrigeration_machine_RP_lifetime
    Estimated to be the same as in case of the reefer container.
  property length, external 0.42 m; name length_machine
    Literature value.
  property true value 15000; name refrigeration_machine_RP_true_value
    allocation property applied in "true value" allocation // value calculated from revenue

## By-products
- copper: 0 kg; By-product classification allocatable product; CPC 41413: Refined copper and copper alloys, unwrought; master alloys of copper
  production volume 1.91553e6 kg
  properties: water in wet mass 0 kg, water content 0, carbon content, non-fossil 0, dry mass 1 kg, carbon content, fossil 0, price 5.52 EUR2005, wet mass 1 kg, carbon content 0, carbon allocation 0 kg, true value 96.2999
- electricity, for reuse in municipal waste incineration only: 0 kWh; CPC 17100: Electrical energy; By-product classification allocatable product; pedigree (1,1,1,1,1)
  Net electricity generated from this waste and used in internal MSWI plant energy redistribution.
  Uncertainty: uncertainty is calculated from uncertainties in waste composition and uncertainties in energy efficiency and the uncertainty in internal energy demand
  production volume 939315 kWh
  property price 0.1 EUR2005; name E_el_prod_MSWI_price_EUR2005
    Estimated to be the same price as in case of electricity, medium voltage.
  property exergy 3.6 MJ; name E_el_prod_MSWI_exergy
    This exergy property is based on the exergy content of the product.
  property true value relation 3.6; name E_el_prod_MSWI_true_value_relation
    property to calculate "true value" from
  property true value 1.10982
    allocation property applied in "true value" allocation // value calculated from true value relation
- heat, for reuse in municipal waste incineration only: 0 MJ; CPC 17300: Steam and hot water; By-product classification allocatable product; pedigree (1,1,1,1,1)
  Net useful heat generated from this waste and used in internal MSWI plant energy redistribution.
  Uncertainty: uncertainty is calculated from uncertainties in waste composition and uncertainties in energy efficiency and the uncertainty in internal energy demand
  production volume 7.04852e6 MJ
  property true value relation 0.1842; name E_th_prod_MSWI_true_value_relation
    property to calculate "true value" from
  property exergy 0.1842 MJ; name E_th_prod_MSWI_exergy
    This exergy property is based on the exergy content of the product.
  property price 0.0106 EUR2005; name E_th_prod_MSWI_price_EUR2005
    Average European district heat price from Ecoheatcool and Euroheat 2005-2006, Ecoheat Work package 1: The European heat market. Final report. 10.6 EUR/GJ i s the price of district heat. http://www.solarthermalworld.org/files/Ecoheatcool%20WP1%20Web.pdf?download
  property true value 0.426115
    (same comment as for electricity, for reuse in municipal waste incineration only)
- zinc concentrate: 0 kg; CPC 14290: Other non-ferrous metal ores and concentrates (other than uranium or thorium ores and concentrates); By-product classification allocatable product
  Calculated value from the knowledge of the properties of both products.
  production volume 28.4222 kg
  property price 0.38 EUR2005; name ByP_price_EUR2005
    Temporary price data. Calculated as 90% of purchasers price based on: Zinc content in concentrate 53%. Concentrate price per kg Zn 86.5% of refined Zn price (13.5% treatment charges according to CHR Metals Limited 2005: Dynamic cost curves. http://www.minecost.com/dynamic.pdf). 2004 zinc price from USGS (2007) Mineral commodity summaries 2007. <http://minerals.usgs.gov/minerals/pubs/mcs/2007/mcs2007.pdf> [Accessed 25 May 2010]
  property zinc content 0.53; name zinc_C_zinc_concentrate
    Zinc content on a dry matter basis. Value taken from teh "zinc mine operation" /GLO dataset.
  property dry mass 1 kg; name DM_zinc_concentrate
  property carbon content 0
    carbon content on a dry matter basis (reserved; not for manual entry)
  property true value 9.83648e-5
    allocation property applied in "true value" allocation // value calculated from revenue
  properties: wet mass 1 kg, water content 0, carbon content, non-fossil 0, carbon content, fossil 0, water in wet mass 0 kg, carbon allocation 0 kg
- refrigerant R134a: 0 kg; CPC 34: Basic chemicals; By-product classification allocatable product; pedigree (1,1,1,1,1)
  Calculated value.
  production volume 133259 kg
  property price 5 EUR2005; name refrigerant_ByP_price_EUR2005
  properties: dry mass 1 kg, water content 0, carbon content, non-fossil 0, water in wet mass 0 kg, wet mass 1 kg, carbon content, fossil 0.235294, carbon content 0.235294, carbon allocation 0.235294 kg, true value 6.06825
- lead: 0 kg; CPC 41441: Lead, unwrought; By-product classification allocatable product
  EcoSpold01Location=SE
  production volume 26356 kg
  property price 0.744 EUR2005
    Temporary price data. Calculated as 90% of purchasers price based on: Source: ecoinvent v2 report 10-part IX, Tab 5.10 & 2.5
  property carbon content 0
    carbon content on a dry matter basis (reserved; not for manual entry)
  property true value 0.178587
    allocation property applied in "true value" allocation // value calculated from revenue
  properties: wet mass 1 kg, water content 0, carbon content, non-fossil 0, carbon content, fossil 0, dry mass 1 kg, water in wet mass 0 kg, carbon allocation 0 kg
- nickel, 99.5%: 0 kg; CPC 41422: Unwrought nickel; By-product classification allocatable product
  EcoSpold01Location=SE
  production volume 55017.4 kg
  property price 10.4 EUR2005
    Temporary price data. Calculated as 90% of purchasers price based on: 2004 nickel price from USGS (2007) Mineral commodity summaries 2007. <http://minerals.usgs.gov/minerals/pubs/mcs/2007/mcs2007.pdf> [Accessed 25 May 2010]
  property carbon content 0
    carbon content on a dry matter basis (reserved; not for manual entry)
  property true value 5.21112
    allocation property applied in "true value" allocation // value calculated from revenue
  properties: water in wet mass 0 kg, wet mass 1 kg, carbon content, non-fossil 0, dry mass 1 kg, water content 0, carbon content, fossil 0, carbon allocation 0 kg
- silver: 0 kg; CPC 41310: Silver (including silver plated with gold or platinum), unwrought or in semi-manufactured forms, or in powder […]; By-product classification allocatable product; CAS 7440-22-4
  EcoSpold01Location=SE
  production volume 9085.58 kg
  property price 178 EUR2005
    (same comment as for lead)
  property carbon content 0
    carbon content on a dry matter basis (reserved; not for manual entry)
  property true value 14.7289
    allocation property applied in "true value" allocation // value calculated from revenue
  properties: wet mass 1 kg, carbon content, non-fossil 0, dry mass 1 kg, water content 0, carbon content, fossil 0, water in wet mass 0 kg, carbon allocation 0 kg
- palladium: 0 kg; CPC 4160: Other non-ferrous metals and articles thereof (including waste and scrap of some metals); cermets and articles […]; By-product classification allocatable product
  EcoSpold01Location=SE
  production volume 502.946 kg
  property price 5640 EUR2005
    Temporary price data. Calculated as 90% of purchasers price based on: 2004 price from USGS (2007) Mineral commodity summaries 2007. <http://minerals.usgs.gov/minerals/pubs/mcs/2007/mcs2007.pdf> [Accessed 25 May 2010]
  property carbon content 0
    carbon content on a dry matter basis (reserved; not for manual entry)
  property true value 25.8344
    allocation property applied in "true value" allocation // value calculated from revenue
  properties: wet mass 1 kg, carbon content, fossil 0, water in wet mass 0 kg, water content 0, carbon content, non-fossil 0, dry mass 1 kg, carbon allocation 0 kg
- gold: 0 kg; CPC 41320: Gold (including gold plated with platinum), unwrought or in semi-manufactured forms, or in powder form; By-product classification allocatable product; CAS 7440-57-5
  EcoSpold01Location=SE
  production volume 275.814 kg
  property price 10600 EUR2005
    Temporary price data. Calculated as 90% of purchasers price based on: Source: ecoinvent v2 report 10-part IX, Tab 2.5
  property carbon content 0
    carbon content on a dry matter basis (reserved; not for manual entry)
  property true value 26.6268
    allocation property applied in "true value" allocation // value calculated from revenue
  properties: wet mass 1 kg, carbon content, fossil 0, dry mass 1 kg, carbon content, non-fossil 0, water content 0, water in wet mass 0 kg, carbon allocation 0 kg
- iron scrap, unsorted: 0 kg; source European Aluminium Association 2008; CPC 39310: Slag, dross, scalings and other waste from the manufacture of iron or steel; By-product classification Recyclable; pedigree (1,1,1,1,1)
  production volume 4475.06 kg
  property price 0.149 EUR2005; name ironScrapAmount_price_EUR2005
    Temporary price data. Calculated as 90% of purchasers price based on: estimated at 85% of sorted scrap
  property carbon content 0
    carbon content on a dry matter basis (reserved; not for manual entry)
  property true value 0.00607271
    allocation property applied in "true value" allocation // value calculated from revenue
  properties: water in wet mass 0 kg, water content 0, carbon content, fossil 0, carbon content, non-fossil 0, dry mass 1 kg, wet mass 1 kg, carbon allocation 0 kg
- aluminium oxide, non-metallurgical: 0 kg; source European Aluminium Association 2008; CPC 41432: Alumina (aluminium oxide), except artificial corundum; By-product classification allocatable product; CAS 1344-28-1; pedigree (1,1,1,1,1)
  production volume 281598 kg
  property carbon content, non-fossil 0; name C_content_non_fossil
  property price 0.28 EUR2005; name Al2O3Amount_price_EUR2005
    From UN trade database. http://data.un.org/ Import data from the largest economies of the world are used (Brazil, India, USA, China, Japan and EU-27).
  property dry mass 1 kg; name DM
  property water content 0; name water_content
  property wet mass 1 kg; name WM
  property water in wet mass 0 kg; name WWM
  property carbon content, fossil 0; name C_content_fossil
  property carbon content 0
    carbon content on a dry matter basis (reserved; not for manual entry)
  property true value 0.718102
    allocation property applied in "true value" allocation // value calculated from revenue
  properties: carbon allocation 0 kg
- aluminium, cast alloy: 0 kg; source European Aluminium Association 2008; By-product classification allocatable product; CPC 41431: Unwrought aluminium; pedigree (1,1,1,1,1)
  EcoSpold01Location=RER
  production volume 2.63232e6 kg
  property price 1.3 EUR2005; name castAlloyAmount_price_EUR2005
    Temporary price data. Calculated as 90% of purchasers price based on: Source: London Metal Exchange, Aluminium alloy price for 2005
  property carbon content 0
    carbon content on a dry matter basis (reserved; not for manual entry)
  property true value 31.1659
    allocation property applied in "true value" allocation // value calculated from revenue
  properties: water in wet mass 0 kg, carbon content, non-fossil 0, water content 0, dry mass 1 kg, carbon content, fossil 0, wet mass 1 kg, carbon allocation 0 kg
- aluminium, wrought alloy: 0 kg; source European Aluminium Association 2008; By-product classification allocatable product; CPC 4153: Semi-finished products of aluminium or aluminium alloys; pedigree (1,1,1,1,1)
  production volume 1.15238e6 kg
  property price 1.44 EUR2005; name secondaryAluminiumOutput_price_EUR2005
  properties: wet mass 1 kg, water content 0, carbon content, fossil 0, water in wet mass 0 kg, carbon content, non-fossil 0, dry mass 1 kg, carbon content 0, carbon allocation 0 kg, true value 15.1132
- iron scrap, sorted, pressed: 0 kg; By-product classification Recyclable; CPC 39310: Slag, dross, scalings and other waste from the manufacture of iron or steel; pedigree (1,1,1,1,1)
  Iron scrap recovered from this waste.
  production volume 11702.9 kg
  property price 0.175 EUR2005
    Temporary price data. Calculated as 90% of purchasers price based on: 2005 import and export prices (total trades (USD) divided by total weight (kg) in biggest economies of the world: EU27, USA, Brasil, China, India, Japan and Russia) from UN Commodity Trade Statistics Database (http://data.un.org/Explorer.aspxDatabase [Accessed 2011.06.20]). Commodity: Waste or scrap, of cast iron
  property carbon content 0
    carbon content on a dry matter basis (reserved; not for manual entry)
  property true value 0.0186521
    allocation property applied in "true value" allocation // value calculated from revenue
  properties: water content 0, water in wet mass 0 kg, carbon content, fossil 0, dry mass 1 kg, carbon content, non-fossil 0, wet mass 1 kg, carbon allocation 0 kg

## Inputs from technosphere
- used refrigeration machine, R134a as refrigerant: -0.985318 unit; = (refrigeration_machine_RP)*-1; lognormal variance with pedigree 0.0026, pedigree (1,1,3,1,1)
  Calculated value.
  production volume 109800 unit; = Ref('186dcc0d-7b93-414c-bf76-39bf0620c535', 'ProductionVolume') * ((Ref('b6b49d68-a6fd-4c5a-9258-61b7dd6600b9')*-1) / refrigeration_machine_RP)
    Calculated from production volume of reference product using the relative outputs.
  properties: carbon content, non-fossil 5.26316e-6, carbon content, fossil 0.0862605, wet mass 380 kg, dry mass 380 kg
- steel, low-alloyed, hot rolled: 140.195 kg; name steel_in; = 16.7*( width_machine*2+ height_machine*2); lognormal variance with pedigree 0.0186, pedigree (4,5,3,1,1)
  Calculated value.
  16.7 kg/m is the weight of HE 100A I beam (height 96mm)
  Following parts of the refrigeration machine are also made from steel;
  - receiver of capacity 6.2l is made from stainelss steel.
  - economiser
  - evaporator fan motor
  - condenser fan motor
  - evaporator coil heaters
  properties: dry mass 1 kg, wet mass 1 kg, carbon content, fossil 0.005
  note on carbon content, fossil: Low alloyed steel composition given in Tab. 3.2 ecoinvent v2.2 report 10_partII. Steel assumed to have a C content of 0.5%
- electronics, for control units: 14.7798 kg; name control_unit_in; lognormal variance with pedigree 0.0186, pedigree (4,5,3,1,1)
  Estimated based on picture.
  properties: wet mass 1 kg, carbon content, non-fossil 0.00013442, dry mass 1 kg, carbon content, fossil 0.337146
  note on carbon content, non-fossil: The control unit has a composition of 46% steel (housing), 32% plastics, 14% printed wiring boards and 8% cables (various types).;
- maintenance, refrigeration machine: 0.985318 unit; lognormal variance with pedigree 0.0026, pedigree (1,1,3,1,1)
  Calculated value.
- air compressor, screw-type compressor, 4kW: 0.408203 unit; = (58/140); source Maersk Container Industry 2013; lognormal variance with pedigree 0.0186, pedigree (4,5,3,1,1)
  Calculated value.
  The weight od the air compressor present in the database is 140kg. The weight of the compressor needed for the refrigeration unit is 58kg. The amount of the exchange needed is scaled accordingly.
  The original Star Cool refrigeration machine the compressor's description:
  Make; Bitzer
  Type: Semi – hermetic two-stage reciprocating.
  Number of cylinders: 2 Low stages cylinders, 2 High stage cylinders.
  Speed: Variable in interval from 20 Hz – 110 Hz controlled by the frequency converter.
  Model: S4BCF – 5.2Y
  Nominal power: 5.5 kW
  Compressor oil type: Reniso Triton SEZ 55 or equivalent
  Compressor housing: Seawater resistant aluminium, unpainted.
  Displacement: 42 m3/h @ 110 Hz
  Weight: 58 Kg
  property weight 58 kg; name weight_compressor
- building, hall: 0.00488704 m2; = 1/((lifetime_building*365)/( width_machine* height_machine*20)); lognormal variance with pedigree 0.0186, pedigree (4,5,3,1,1)
  Calculated value based on estimates.
  1m2 of hall is available every day for 50 years
  1 refrigeration machine occupies the area of its base for the period of 20 days
  property lifetime 50 year; name lifetime_building
- refrigerant R134a: 4.43393 kg; lognormal variance with pedigree 0.0186, pedigree (4,5,3,1,1)
  Literature value.
  properties: dry mass 1 kg, wet mass 1 kg, carbon content, fossil 0.235294
- polypropylene, granulate: 8.43835 kg; name PP_in; = ((width_machine* height_machine)*(thickness_liner/1000)* density_GFP_polypropylene*0.95)+(((POWER((0.440/2),2))*3.1416)*0.002); source Maersk Container Industry 2013; lognormal variance with pedigree 0.0186, pedigree (4,5,3,1,1)
  Calcualetd value.
  The rear bulkhead of the refrigeration machine is covered by polypropylene fibre reinforced thermoplastic. Since this product is not available in the database ordinary polypropylene is used instead.
  The condenser fan is made of glass fibre reinforced polypropylene.
  440mm is the diameter of the fan
  2mm is the thickness of the blades
  properties: dry mass 1 kg, carbon content, fossil 0.857143, wet mass 1 kg
- zinc coat, pieces: 17.8377 m2; = width_machine* height_machine*4; lognormal variance with pedigree 0.0052, pedigree (3,3,3,1,1)
  Calcualted value. It is assumed, that majority of the steel and aluminium surfaces are coated.
- glass fibre reinforced plastic, polyamide, injection moulded: 0.000307149 kg; name polyamide_in; = ((POWER((0.315/2),2))*3.1416)*0.002*2; source Maersk Container Industry 2013; lognormal variance with pedigree 0.0186, pedigree (4,5,3,1,1)
  Calculated value based on literature.
  The two evaporater fans which are part of the evaporator fan module are made of polyamide, glass reinforced.
  315mm is the diameter of a fan
  2mm is the estimated thickness of the blades.
  properties: dry mass 1 kg, wet mass 1 kg, carbon content, fossil 0.446018
- metal working, average for aluminium product manufacturing: 114.531 kg; = aluminium_in; lognormal variance with pedigree 0.0052, pedigree (3,3,3,1,1)
  Calculated value.
- aluminium, wrought alloy: 114.531 kg; name aluminium_in; = weight_machine- weight_compressor- steel_in- PP_in-copper_in- polyamide_in- control_unit_in-( cable_in* cable_DM)- PUR_foam_input; source Maersk Container Industry 2013; lognormal variance with pedigree 0.0186, pedigree (4,5,3,1,1)
  Calculated based on estimates and literature.
  Aluminium is in the refrigerated machine used foe many parts. It is used in the evaporator and condenser coils; the fins are made of aluminium. In the evaporator fan module; the cover for the fans.
  property bulk density 2700 kg/m3; name aluminium_wrought_density
  properties: wet mass 1 kg, dry mass 1 kg
  note on bulk density: Literature data. The aluminium used for the floor in the reefer is aluminium 6082 t6 (Mearsk Container Industry, 2012, Technical Specifications for 40'x8'x9'6'' refrigerated container with integrated star cool machine, http://www1.cma-cgm.com/mnr/page/DocAndProg/Spec%20for%20TAL%2040'hc%20SCIF%20x%201,000%20boxes(provisional%20CA).pdf, accessed 20141016) which has density 2700 kg/m3 (http://www.aalco.co.uk/datasheets/Aluminium-Alloy-6082-T6T651-Plate_148.ashx, accessed 20141017).
- welding, arc, steel: 8.39491 m; = width_machine*2+ height_machine*2; lognormal variance with pedigree 0.0052, pedigree (3,3,3,1,1)
  Calculated value.
- metal working, average for steel product manufacturing: 140.195 kg; = steel_in; lognormal variance with pedigree 0.0186, pedigree (4,5,3,1,1)
  Calculated value. The amount of steel needed is calculated as a difference between known weight of the whole refrigerated machine and all the individual parts.
- polyurethane, rigid foam: 0 kg; name PUR_foam_input; source Maersk Container Industry 2013; pedigree (1,1,1,1,1)
  Calculated value. The rear bulkhead of the refrigeration machine is covered by polyurethane insulation foam.
  properties: wet mass 1 kg, dry mass 1 kg, carbon content, fossil 0.69089
- copper: 6.38969 kg; name copper_in; = (12*0.253* width_machine)+(4*0.1685*0.5); source Maersk Container Industry 2013; lognormal variance with pedigree 0.0186, pedigree (4,5,3,1,1)
  Calculated based on assumptions.
  Copper is used in the refrigerated machine as a part of evaporator coil module and condenser coil module. The tubes are made of copper.
  6*2=12 is the number of copper coils present in the evaporator coil module.
  0.253 kg is the weight of 1m of copper coil with diameter of 10mm and wall thickness of 1mm (http://www.copper-tubes.net/soft.html, accessed 20141022).
  4 is the number of rows of copper coils present in the condenser coil module
  0.1685 kg is the weight of 1m of copper coil with diameter of 7mm and wall thickness of 1mm (calculated based on http://www.copper-tubes.net/soft.html, accessed 20141022).
  properties: wet mass 1 kg, dry mass 1 kg
- cable, three-conductor cable: 17.7357 m; name cable_in; source Maersk Container Industry 2013; lognormal variance with pedigree 0.0052, pedigree (3,3,3,1,1)
  Literature value.
  property dry mass 1.04 kg; name cable_DM
  properties: wet mass 1.04 kg, carbon content, fossil 0.451335
  note on carbon content, fossil: Calculated as the addition of C contents in the product composition. Then referred to 1 kg DM
- polyurethane, rigid foam: 4.79132, 9.70182 kg (2 entries); source Maersk Container Industry 2013; lognormal variance with pedigree 0.0052, pedigree (3,3,3,1,1)
  (same comment as for polyurethane, rigid foam)
