# anode production, for metal electrolysis

Dataset: EcoSpold 2, unit process
Geography: RER
Time period: 1995-01-01 to 2019-12-31
Technology level: current
Classification: EcoSpold01Categories: metals/extraction
Classification: ISIC rev.4 ecoinvent: 2790:Manufacture of other electrical equipment
Tags: ConvertedDataset
Scenario: Business-as-Usual
System model: Allocation at the point of substitution
Share of production covered: 98 %
Generated by: Hans-Jörg Althaus
Published in: Althaus H.-J. 2000
Database: ecoinvent
isCopyrightProtected: true
accessRestrictedTo: 1

## General comment
[This dataset was already contained in the ecoinvent database version 2. It was not individually updated during the transfer to ecoinvent version 3. Life Cycle Impact Assessment results may still have changed, as they are affected by changes in the supply chain, i.e. in other datasets. This dataset was generated following the ecoinvent quality guidelines for version 2. It may have been subject to central changes described in the ecoinvent version 3 change report (http://www.ecoinvent.org/database/ecoinvent-version-3/reports-of-changes/), and the results of the central updates were reviewed extensively. The changes added e.g. consistent water flows and other information throughout the database. The documentation of this dataset can be found in the ecoinvent reports of version 2, which are still available via the ecoinvent website. The change report linked above covers all central changes that were made during the conversion process.]

## Included activities end
Includes anode production (with it's plant), transports of materials to the plant and the disposal of the wastes.

## Geography
Some Swiss datasets are used for European processes.

## Technology
Average technology for the aluminium consumed in Europe (85% prebaked, 15% Söderberg

## Parameters
- fraction, cooling water, to air: 0.16; name fraction_CW_to_air; lognormal variance with pedigree 0.041425, pedigree (2,3,2,2,1)
  Calculated value based on literature value (EAA,2008) (Vionnet, S., Quantis Water Database - Technical Report, 2012).
- fraction, cooling water, once-through system, to air: 0.004; name fraction_CW_OT_to_air; lognormal variance with pedigree 0.0413, pedigree (2,3,1,3,1)
  Calculated based on literature value (Scown, C.D., 2011, Water Footprint of U.S. Transportation Fuels and supplying information of the article) (Vionnet, S., Quantis Water Database - Technical Report, 2012).
- fraction, process water, to air: 0.16 dimensionless; name fraction_PW_to_air; lognormal variance with pedigree 0.092025, pedigree (4,4,3,2,4)
  Calculated based on literature value (EAA, 2008) (Vionnet, S., Quantis Water Database - Technical Report, 2012).
- fraction, cooling water, cooling pond system, to air: 0.032; name fraction_CW_CP_to_air; lognormal variance with pedigree 0.0413, pedigree (2,3,1,3,1)
  (same comment as for fraction, cooling water, once-through system, to air)
- fraction, cooling water, recirculating system, to air: 0.771; name fraction_CW_R_to_air; lognormal variance with pedigree 0.0413, pedigree (2,3,1,3,1)
  (same comment as for fraction, cooling water, once-through system, to air)

## Reference product
- anode, for metal electrolysis: 1 kg; CPC 42950: Wire, rods, tubes, plates, electrodes and similar products, of base metal or of metal carbides, coated or core[…]; By-product classification allocatable product
  EcoSpold01Location=RER
  production volume 1.32237 kg
    This is a placeholder value that does not reflect real-world production volumes. This dataset does not currently require a real-world production volume to work in the database framework, and no actual data were collected yet. This has no negative effect on the results of the ecoinvent database. The placeholder value of this activity was scaled according to the nominal GDP of 2005 (source: United Nations, http://data.un.org/Glossary.aspx?q=GDP+%28current+US%24%29, accessed 20130726) to reflect an appropriate share of the global production volume, which is also a placeholder value.
  property price 9.02 EUR2005
    From UN trade-database. Import data. (USD/kg). Category: Parts of primary cells and primary batteries. Weight: 0.591 kg
  property carbon content, fossil 0.865971
    The main component of the anode is carbon, coming from bitumen and petroleum coke (ecoinvent v2.2 report 10). The C content in those components of the anode has been taken into account to calculate the anode final C content.
  property carbon content 0.865971
    carbon content on a dry matter basis (reserved; not for manual entry)
  property true value 9.02
    allocation property applied in "true value" allocation // value calculated from revenue
  properties: carbon content, non-fossil 0, water in wet mass 0 kg, water content 0, dry mass 1 kg, wet mass 1 kg, carbon allocation 0.865971 kg

## By-products
- electricity, for reuse in municipal waste incineration only: 0 kWh; CPC 17100: Electrical energy; By-product classification allocatable product; pedigree (1,1,1,1,1)
  Net electricity generated from this waste and used in internal MSWI plant energy redistribution.
  Uncertainty: uncertainty is calculated from uncertainties in waste composition and uncertainties in energy efficiency and the uncertainty in internal energy demand
  production volume 4.2418e-8 kWh
  property exergy 3.6 MJ; name E_el_prod_MSWI_exergy
    This exergy property is based on the exergy content of the product.
  property true value relation 3.6; name E_el_prod_MSWI_true_value_relation
    property to calculate "true value" from
  property price 0.1 EUR2005; name E_el_prod_MSWI_price_EUR2005
    Estimated to be the same price as in case of electricity, medium voltage.
  property true value 5.44994e-9
    allocation property applied in "true value" allocation // value calculated from true value relation
- heat, for reuse in municipal waste incineration only: 0 MJ; CPC 17300: Steam and hot water; By-product classification allocatable product; pedigree (1,1,1,1,1)
  Net useful heat generated from this waste and used in internal MSWI plant energy redistribution.
  Uncertainty: uncertainty is calculated from uncertainties in waste composition and uncertainties in energy efficiency and the uncertainty in internal energy demand
  production volume 3.00082e-7 MJ
  property exergy 0.1842 MJ; name E_th_prod_MSWI_exergy
    This exergy property is based on the exergy content of the product.
  property true value relation 0.1842; name E_th_prod_MSWI_true_value_relation
    property to calculate "true value" from
  property price 0.0106 EUR2005; name E_th_prod_MSWI_price_EUR2005
    Average European district heat price from Ecoheatcool and Euroheat 2005-2006, Ecoheat Work package 1: The European heat market. Final report. 10.6 EUR/GJ i s the price of district heat. http://www.solarthermalworld.org/files/Ecoheatcool%20WP1%20Web.pdf?download
  property true value 1.97274e-9
    (same comment as for electricity, for reuse in municipal waste incineration only)
- zinc concentrate: 0 kg; CPC 14290: Other non-ferrous metal ores and concentrates (other than uranium or thorium ores and concentrates); By-product classification allocatable product
  Calculated value from the knowledge of the properties of both products.
  production volume 1.06439e-11 kg
  property price 0.38 EUR2005; name ByP_price_EUR2005
    Temporary price data. Calculated as 90% of purchasers price based on: Zinc content in concentrate 53%. Concentrate price per kg Zn 86.5% of refined Zn price (13.5% treatment charges according to CHR Metals Limited 2005: Dynamic cost curves. http://www.minecost.com/dynamic.pdf). 2004 zinc price from USGS (2007) Mineral commodity summaries 2007. <http://minerals.usgs.gov/minerals/pubs/mcs/2007/mcs2007.pdf> [Accessed 25 May 2010]
  property zinc content 0.53; name zinc_C_zinc_concentrate
    Zinc content on a dry matter basis. Value taken from teh "zinc mine operation" /GLO dataset.
  property dry mass 1 kg; name DM_zinc_concentrate
  property carbon content 0
    carbon content on a dry matter basis (reserved; not for manual entry)
  property true value 4.0447e-12
    allocation property applied in "true value" allocation // value calculated from revenue
  properties: wet mass 1 kg, water content 0, carbon content, non-fossil 0, carbon content, fossil 0, water in wet mass 0 kg, carbon allocation 0 kg

## Inputs from technosphere
- refractory spent pot liner from Al electrolysis: -0.0039 kg; lognormal variance with pedigree 0.04, pedigree (1,1,5,1,1)
  EcoSpold01Location=CH
  production volume 0.0039 kg
    Calculated from the production volume of anode, for aluminium electrolysis in proportion to the respective output amounts.
  properties: dry mass 1 kg, wet mass 1 kg
- waste asphalt: -0.0007 kg; lognormal variance with pedigree 0.04, pedigree (1,1,5,1,1)
  EcoSpold01Location=CH
  production volume 0.0007 kg
    (same comment as for refractory spent pot liner from Al electrolysis)
  properties: water content 0.001001, carbon content, fossil 0.0440796, dry mass 0.999 kg, wet mass 1 kg
  note on carbon content, fossil: The waste contains 94.7% inert material (see Tab A.5 for details) 5.3% bitumen (see Tab A.6 for details), ecoinvent v2.2 report 13_I
- anode factory: 2.5e-10 unit; lognormal variance with pedigree 0.5, pedigree (5,5,5,5,5)
  Rough guess
  EcoSpold01Location=RER
  Uncertainty: rough guess
- refractory, fireclay, packed: 0.0101 kg; lognormal variance with pedigree 0.04, pedigree (1,1,5,1,1)
  EcoSpold01Location=DE
  properties: dry mass 1 kg, wet mass 1 kg
- heat, district or industrial, natural gas: 1.9 MJ; lognormal variance with pedigree 0.04, pedigree (1,1,5,1,1)
  EcoSpold01Location=RER
- pitch: 0 kg; pedigree (1,1,1,1,1)
  EcoSpold01Location=RER
  properties: carbon content, fossil 0.83, dry mass 1 kg, wet mass 1 kg
- heat, district or industrial, other than natural gas: 0.935 MJ; lognormal variance with pedigree 0.04, pedigree (1,1,5,1,1)
  EcoSpold01Location=CH
- inert waste, for final disposal: -0.0105 kg; lognormal variance with pedigree 0.04, pedigree (1,1,5,1,1)
  EcoSpold01Location=CH
  production volume 0.0105 kg
    (same comment as for refractory spent pot liner from Al electrolysis)
  properties: water content 0.00502513, wet mass 1 kg, dry mass 0.995 kg
- electricity, medium voltage: 0.131 kWh; lognormal variance with pedigree 0.04, pedigree (1,1,5,1,1)
  EcoSpold01Location=UCTE
- cast iron: 0.00781 kg; lognormal variance with pedigree 0.04, pedigree (1,1,5,1,1)
  EcoSpold01Location=RER
  properties: wet mass 1 kg, dry mass 1 kg, carbon content, fossil 0.04
  note on carbon content, fossil: Cast iron is made by remelting pig iron in small furnaces (e.g. cupola furnaces or electric arc furnaces) and poured into moulds to make castings. It usually contains 2% to 6% carbon (ecoinvent v2.2 report 10_partII). An average content of 4% was considered
- petroleum coke: 0.649 kg; lognormal variance with pedigree 0.04, pedigree (1,1,5,1,1)
  EcoSpold01Location=RER
  properties: carbon content, fossil 0.885, wet mass 1 kg, dry mass 1 kg
- pitch: 0.162929, 0.00107124 kg (2 entries); lognormal variance with pedigree 0.04, pedigree (1,1,5,1,1)
  EcoSpold01Location=RER

## Inputs from nature
- Water, unspecified natural origin [natural resource, in water]: 0.00088 m3; name water_UNO_input; source EAA - European Aluminium Association 2008; lognormal variance with pedigree 0.052625, pedigree (3,3,5,2,1)
  Calculated based on literature, (Vionnet, S., Quantis Water Database - Technical Report, 2012). Assumed to have the same data as for anode, aluminium electrolysis / GLO. The process starts with unloading of process materials to their storage areas on site. It includes the processes: recovery of spent anode materials, anode mix preparation, anode block or briquette forming and baking, rodding of baked anodes, maintenance and repair of plant and equipment and treatment of process air, liquids and solids. It is assumed that only the total water use is reported and that 80% is used as cooling water and 20% is used as process water.
  property wet mass 1000 kg; name WM
  property water content 9081.65; name water_content
  property dry mass 0.1101 kg; name DM
  property carbon content, non-fossil 0; name C_content_non_fossil
  property carbon content, fossil 0.0104329; name C_content_fossil
  property water in wet mass 999.89 kg; name WWM
- Water, cooling, unspecified natural origin [natural resource, in water]: 0.00352 m3; name water_cooling_UNO_input; source EAA - European Aluminium Association 2008; lognormal variance with pedigree 0.0587, pedigree (2,2,5,1,3)
  Calculated based on literature, (Vionnet, S., Quantis Water Database - Technical Report, 2012). Assumed to have the same data as for anode, aluminium electrolysis / GLO. The process starts with unloading of process materials to their storage areas on site. It includes the processes: recovery of spent anode materials, anode mix preparation, anode block or briquette forming and baking, rodding of baked anodes, maintenance and repair of plant and equipment and treatment of process air, liquids and solids. The process ends when the output (rodded anodes or briquettes) is ready to be transported to an electrolysis plant (primary aluminium smelter). It is assumed that only the total water use is reported and that 80% is used as cooling water and 20% is used as process water.

## Emissions to nature
- Hydrogen fluoride [air, unspecified]: 9e-5 kg; lognormal variance with pedigree 0.08, pedigree (1,1,5,1,1)
- Nitrogen oxides [air, unspecified]: 0.00019 kg; lognormal variance with pedigree 0.08, pedigree (1,1,5,1,1)
- Particulates, < 2.5 um [air, unspecified]: 8.68e-5 kg; lognormal variance with pedigree 0.34, pedigree (1,1,5,1,1)
- PAH, polycyclic aromatic hydrocarbons [air, unspecified]: 9.48e-5 kg; lognormal variance with pedigree 0.34, pedigree (1,1,5,1,1)
- Carbon dioxide, fossil [air, unspecified]: 0.253 kg; lognormal variance with pedigree 0.04, pedigree (1,1,5,1,1)
- Water [air, unspecified]: 0.000704 m3; name water_to_air_unspecified; = (water_cooling_UNO_input*fraction_CW_to_air)+(water_UNO_input*fraction_PW_to_air); lognormal variance with pedigree 0.0807, pedigree (2,2,5,1,1)
  Calculated value based on literature values and expert opinion. See comments in the parametres' comment field.
  property fraction, origin: fresh water 0; name fraction_origin_fresh_water
  property fraction, origin: unspecified 1; name fraction_origin_unspecified
  property fraction, origin: salt water 0; name fraction_origin_salt_water
- Sulfur dioxide [air, unspecified]: 0.00084 kg; lognormal variance with pedigree 0.04, pedigree (1,1,5,1,1)
- Particulates, > 2.5 um, and < 10um [air, unspecified]: 0.000143 kg; lognormal variance with pedigree 0.16, pedigree (1,1,5,1,1)
- Water [water, unspecified]: 0.003696 m3; name water_to_water_unspecified; = water_cooling_UNO_input*(1-fraction_CW_to_air)+water_UNO_input*(1-fraction_PW_to_air); lognormal variance with pedigree 0.0807, pedigree (2,2,5,1,1)
  (same comment as for Water)
  property fraction, origin: fresh water 0; name fraction_origin_fresh_water_Ww
  property fraction, origin: unspecified 1; name fraction_origin_unspecified_Ww
  property fraction, origin: salt water 0; name fraction_origin_salt_water_Ww
- Carbon monoxide, fossil [air, unspecified]: 0.00104 kg; lognormal variance with pedigree 0.69, pedigree (1,1,5,1,1)
- Benzo(a)pyrene [air, unspecified]: 3.18e-6 kg; lognormal variance with pedigree 0.34, pedigree (1,1,5,1,1)
- Particulates, > 10 um [air, unspecified]: 0.00013 kg; lognormal variance with pedigree 0.08, pedigree (1,1,5,1,1)

## Sampling procedure
Literature / Survey

## Extrapolations
see Geography

## Review by Roland Hischier 2003-06-10
Passed.
