# polystyrene production, extruded, CO2 blown

Dataset: EcoSpold 2, unit process
Geography: CA-QC
Time period: 1994-01-01 to 2019-12-31
Technology level: current
Classification: ISIC rev.4 ecoinvent: 2013:Manufacture of plastics and synthetic rubber in primary forms
Classification: EcoSpold01Categories: insulation materials/production
Synonyms: XPS
Tags: recontextualization
Scenario: Business-as-Usual
System model: Allocation at the point of substitution
Generated by: Pascal Lesage
Published in: Hischier, R. 2009
Database: ecoinvent
isCopyrightProtected: true
accessRestrictedTo: 1

## General comment
This dataset can be used in the construction building sector. The cutting of the extruded polystyrene blocks is not included in the process. Blowing agent is CO2 (50.7% w/w). Co-blowing agent ist aceton (49.3% w/w). Process emissions are 25% (w/w) for aceton.
[This dataset was already contained in the ecoinvent database version 2. It was not individually updated during the transfer to ecoinvent version 3. Life Cycle Impact Assessment results may still have changed, as they are affected by changes in the supply chain, i.e. in other datasets. This dataset was generated following the ecoinvent quality guidelines for version 2. It may have been subject to central changes described in the ecoinvent version 3 change report (http://www.ecoinvent.org/database/ecoinvent-version-3/reports-of-changes/), and the results of the central updates were reviewed extensively. The changes added e.g. consistent water flows and other information throughout the database. The documentation of this dataset can be found in the ecoinvent reports of version 2, which are still available via the ecoinvent website. The change report linked above covers all central changes that were made during the conversion process.]
Child dataset exchanges identical to GLO dataset. Created to enable linking to regional markets (e.g. for electricity). Data quality indicators adjusted accordingly.

## Included activities end
The dataset describes the production of extruded polystyrene. Included processes are the melting of polystyrene pearls in the extruder, the discharge through a slot die, as well as the cooling with water.

## Geography
Data for leading polystyrene XPS producers in Germany and the USA. Applicable for Europe and North America.
Child dataset exchanges identical to GLO dataset. Created to enable linking to regional markets (e.g. for electricity). Data quality indicators adjusted accordingly.

## Technology
Extrusion process of expandable polystyrene including discharge via slot die. CO2 as blowing agents, aceton as Co-blowing agent.

## Time period
Technology in 1994 was still using CFC or HCFC as blowing agent. In 2005, already more than 50% of companies in Europe are using CO2 as blowing agent. Though mainly in the USA, HFC-134a and HFC-152a as a blowing agent are still common.

## Parameters
- Quebec gross domestic product 2011: 3.11e11 USD(2011); name quebecGDP2011; lognormal variance with pedigree 0.0006, pedigree (1,1,1,1,1)
  Quebec Gross domestic product for 2011, expressed in 2011 USD. Source: Institut de la statistique du Québec. Converted from CAD to USD using a yearly average exchange rate of 0.989 CAD/USD (Source: bank of Canada).
- world gross domestic product 2011: 7e13 USD(2011); name worldGDP2011; lognormal variance with pedigree 0.0006, pedigree (1,1,1,1,1)
  World Gross domestic product for 2011, expressed in 2011 USD. Source: World Bank.
- fraction, cooling water, to air: 0.3875; lognormal variance with pedigree 0.092025, pedigree (4,4,3,2,4)
- fraction, cooling water, cooling pond system, to air: 0.032; lognormal variance with pedigree 0.0413, pedigree (2,3,1,3,1)
- fraction, cooling water, recirculating system, to air: 0.771; lognormal variance with pedigree 0.0413, pedigree (2,3,1,3,1)
- fraction, cooling water, once-through system, to air: 0.004; lognormal variance with pedigree 0.0413, pedigree (2,3,1,3,1)

## Reference product
- polystyrene, extruded: 1 kg; CPC 34720: Polymers of styrene, in primary forms; By-product classification allocatable product
  EcoSpold01Location=RER
  production volume 4.31846e6 kg; = PARENTVALUE * quebecGDP2011/worldGDP2011
    Gross approximation of Quebec production volume using relative value of Quebec GDP to world GDP
  property price 1.29 EUR2005
    Estimated price to be the same as polystyrene, general purpose.
  property carbon content, fossil 0.873427
    XPS consists in 91% of polystyrene, 7% of blowing agent and the remaining 2% are flame retardants (bromine compounds) and other additives (ecoinvent v2.2 report 16_part XIV). The chemical formula of polystyrene is (C8H8)n. Here, the blowing agent is CO2 (3.55% w/w), and co-blowing agent is acetone -C3H6O- (3.45% w/w). Process emissions are 25% (w/w) for aceton (Tab 4.24, ecoinvent v2.2 report 16, part XIV), that means that contribution to the C content of the final product are 3.55% for CO2 and 2.6% for acetone
  property carbon content 0.873427
    carbon content on a dry matter basis (reserved; not for manual entry)
  property true value 1.29
    allocation property applied in "true value" allocation // value calculated from revenue
  properties: water in wet mass 0 kg, water content 0, carbon content, non-fossil 0, wet mass 1 kg, dry mass 1 kg, carbon allocation 0.873427 kg

## By-products
- electricity, for reuse in municipal waste incineration only: 0 kWh; CPC 17100: Electrical energy; By-product classification allocatable product; pedigree (1,1,1,1,1)
  Net electricity generated from this waste and used in internal MSWI plant energy redistribution.
  Uncertainty: uncertainty is calculated from uncertainties in waste composition and uncertainties in energy efficiency and the uncertainty in internal energy demand
  production volume 65.0471 kWh
  property true value relation 3.6; name E_el_prod_MSWI_true_value_relation
    property to calculate "true value" from
  property exergy 3.6 MJ; name E_el_prod_MSWI_exergy
    This exergy property is based on the exergy content of the product.
  property price 0.1 EUR2005; name E_el_prod_MSWI_price_EUR2005
    Estimated to be the same price as in case of electricity, medium voltage.
  property true value 1.92935e-6
    allocation property applied in "true value" allocation // value calculated from true value relation
- heat, for reuse in municipal waste incineration only: 0 MJ; CPC 17300: Steam and hot water; By-product classification allocatable product; pedigree (1,1,1,1,1)
  (same comment as for electricity, for reuse in municipal waste incineration only)
  production volume 451.578 MJ
  property exergy 0.1842 MJ; name E_th_prod_MSWI_exergy
    This exergy property is based on the exergy content of the product.
  property price 0.0106 EUR2005; name E_th_prod_MSWI_price_EUR2005
    Average European district heat price from Ecoheatcool and Euroheat 2005-2006, Ecoheat Work package 1: The European heat market. Final report. 10.6 EUR/GJ i s the price of district heat. http://www.solarthermalworld.org/files/Ecoheatcool%20WP1%20Web.pdf?download
  property true value relation 0.1842; name E_th_prod_MSWI_true_value_relation
    property to calculate "true value" from
  property true value 6.85337e-7
    (same comment as for electricity, for reuse in municipal waste incineration only)

## Inputs from technosphere
- waste polystyrene: -9.99998e-5 kg; lognormal variance with pedigree 0.0546, pedigree (2,4,5,5,1)
  EcoSpold01Location=CH
  production volume 431.846 kg; = PARENTVALUE * quebecGDP2011/worldGDP2011
    (same comment as for polystyrene, extruded)
  properties: water content 0.00200401, dry mass 0.998 kg, carbon content, fossil 0.922579, wet mass 1 kg
- acetone, liquid: 0.0329999 kg; lognormal variance with pedigree 0.0546, pedigree (2,4,5,5,1)
  EcoSpold01Location=RER
  properties: wet mass 1 kg, carbon content, fossil 0.62069, dry mass 1 kg
- polystyrene, expandable: 0.921438 kg; lognormal variance with pedigree 0.0546, pedigree (2,4,5,5,1)
  EcoSpold01Location=RER
  properties: carbon content, fossil 0.923077, wet mass 1 kg, dry mass 1 kg
  note on carbon content, fossil: Chemical formula of polystyrene is (C8H8)n (ecoinvent v2.2 report 11_II)
- fluorspar, 97% purity: 0.00499999 kg; lognormal variance with pedigree 0.056, pedigree (3,4,5,5,1)
  EcoSpold01Location=GLO
  properties: dry mass 1 kg, wet mass 1 kg
- carbon dioxide, liquid: 0.0339999 kg; lognormal variance with pedigree 0.0532, pedigree (2,3,5,5,1)
  EcoSpold01Location=RER
  properties: carbon content, fossil 0.272727, dry mass 1 kg, wet mass 1 kg
- explosives factory: 6.66999e-9 unit; lognormal variance with pedigree 0.35, pedigree (5,5,5,5,5)
  EcoSpold01Location=CH
- electricity, medium voltage: 0.999998 kWh; lognormal variance with pedigree 0.0546, pedigree (2,4,5,5,1)
  EcoSpold01Location=UCTE
- sodium chloride, powder: 0.00499999 kg; lognormal variance with pedigree 0.056, pedigree (3,4,5,5,1)
  EcoSpold01Location=RER
  properties: dry mass 1 kg, wet mass 1 kg
- chemical, inorganic: 0.00999998 kg; lognormal variance with pedigree 0.0546, pedigree (2,4,5,5,1)
  EcoSpold01Location=GLO
  properties: carbon content, fossil 0.003, wet mass 1 kg, dry mass 1 kg
  note on carbon content, fossil: This dataset is an unweighted average of 20 inorganic substances (listed in Tab 88.1, ecoinvent v2.2 report 8, part II), being part of the top100 chemicals included in this database. The C-content has also been calculated as an unweighted average of the C content of the substances composing this dataset.

## Inputs from nature
- Water, cooling, unspecified natural origin [natural resource, in water]: 0.0197 m3; lognormal variance with pedigree 0.056, pedigree (3,4,5,5,1)

## Emissions to nature
- Styrene [air, unspecified]: 9.21438e-5 kg; lognormal variance with pedigree 0.096, pedigree (3,4,5,5,1)
- Water [water, unspecified]: 0.0120662 m3; lognormal variance with pedigree 0.0827, pedigree (2,2,5,5,1)
  Calculated value based on literature values and expert opinion. See comments in the parametres' comment field.
  property carbon content, fossil 0; name C_content_fossil
  property carbon content, non-fossil 0; name C_content_non_fossil
  property wet mass 1000 kg; name WM
  property water in wet mass 1000 kg; name WWM
  property dry mass 0 kg; name DM
- Acetone [air, unspecified]: 0.00824998 kg; lognormal variance with pedigree 0.0946, pedigree (2,4,5,5,1)
- Water [air, unspecified]: 0.00763373 m3; lognormal variance with pedigree 0.0827, pedigree (2,2,5,5,1)
  (same comment as for Water)

## Sampling procedure
Literature, database

## Extrapolations
see Geography. GLO dataset extrapolated from European dataset, which in turn was used to create this child dataset. Exchanges identical to GLO dataset. Created to enable linking to regional markets (e.g. for electricity). Data quality indicators adjusted accordingly.

## Review by Hans-Jörg Althaus 2009-02-05
passed
