# operation, dried roughage store, air dried, solar

Dataset: EcoSpold 2, unit process
Geography: CA-QC
Time period: 1994-01-01 to 2019-12-31
Technology level: current
Classification: ISIC rev.4 ecoinvent: 0163:Post-harvest crop activities
Classification: EcoSpold01Categories: agricultural means of production/buildings
Tags: recontextualization; Operation
Scenario: Business-as-Usual
System model: Allocation at the point of substitution
Generated by: Pascal Lesage
Published in: Nemecek, T. 2007
Database: ecoinvent
isCopyrightProtected: true
accessRestrictedTo: 1

## General comment
The module includes the use of energy and auxiliary materials for the operation of lighting, impeller blower and ventilator. The functional unit is kg DM hay (DM: dry matter). Child dataset exchanges identical to GLO dataset. Created to enable linking to regional markets (e.g. for electricity). Data quality indicators adjusted accordingly.
[This dataset was already contained in the ecoinvent database version 2. It was not individually updated during the transfer to ecoinvent version 3. Life Cycle Impact Assessment results may still have changed, as they are affected by changes in the supply chain, i.e. in other datasets. This dataset was generated following the ecoinvent quality guidelines for version 2. It may have been subject to central changes described in the ecoinvent version 3 change report (http://www.ecoinvent.org/database/ecoinvent-version-3/reports-of-changes/), and the results of the central updates were reviewed extensively. The changes added e.g. consistent water flows and other information throughout the database. The documentation of this dataset can be found in the ecoinvent reports of version 2, which are still available via the ecoinvent website. The change report linked above covers all central changes that were made during the conversion process.]

## Included activities end
The inventory takes into account the energy and auxiliary materials like water, lubricating oil and cleaning agents. Also included is the use of the infrastructure. Not taken into account were the direct emission of the animal husbandry, fodder production and produced waste water.

## Geography
The original inventory on which the GLO is based applies to Swiss agricultural buildings. Child dataset exchanges identical to GLO dataset. Created to enable linking to regional markets (e.g. for electricity). Data quality indicators adjusted accordingly.

## Technology
The use of energy and auxiliary materials are calculated for the conditions defined in the infrastructure-module with literature data and experts knowledge.

## Time period
Period indicated in the reference.

## Reference product
- operation, dried roughage store, air dried, solar: 1 kg; CPC 86111: Post-harvest crop services; By-product classification allocatable product
  EcoSpold01Location=CH
  production volume 4.14e9 kg; = 0.9*4600000000
    All roughage in Quebec is supposedly sun dried (Mr Salah Zoghlami, Fédération des producteurs de cultures commerciales du Québec (FPCCQ), oral communication (450 679-0540 post 8635), june 2012).
  property price 0.0243876 EUR2005
    Calculated based on inputs: The price of the product has been calculated as a sum of the values of the material and energy inputs for this product. This value is therefore a rough estimation. It may underestimate the real price since there are additional expenses when producing any product. These expences can include for example labour costs, treatment of waste materials and profit for the producer. Please consider carefully whether this level of data quality is acceptable for your application.

## Inputs from technosphere
- electricity, low voltage: 0.0891 kWh; lognormal variance with pedigree 0.0427, pedigree (2,2,5,5,1)
  EcoSpold01Location=CH
- dried roughage store, air dried, solar: 0.000253 m3; lognormal variance with pedigree 0.3427, pedigree (2,2,5,5,1)
  EcoSpold01Location=CH

## Inputs from nature
- Energy, solar, converted [natural resource, in air]: 16 MJ; lognormal variance with pedigree 0.0411444, pedigree (2,2,5,1,1)

## Sampling procedure
In the use of energy and auxiliary materials are big differences between the farms. The inventory is based on mean values from CH and WEU.

## Extrapolations
This dataset has been extrapolated from year 2002 to the year of the calculation (2019). The uncertainty has been adjusted accordingly.

## Review by Roland Hischier 2003-08-06
Passed.
