# treatment of waste polyethylene terephthalate, municipal incineration with fly ash extraction

Dataset: EcoSpold 2, unit process
Geography: CH
Time period: 2006-01-01 to 2019-12-31
Technology level: current
Classification: ISIC rev.4 ecoinvent: 3821:Treatment and disposal of non-hazardous waste
Synonyms: municipal waste incineration
Scenario: Business-as-Usual
System model: Allocation at the point of substitution
Share of production covered: 1.8 %
Generated by: Gabor Doka
Published in: Doka G. 2015
Database: ecoinvent
isCopyrightProtected: true
accessRestrictedTo: 1

## General comment
This dataset represents the activity of waste disposal of waste polyethylene terephtalate in a municipal solid waste incinerator (MSWI) // Recommended use of this dataset: For PET, which goes to disposal as part of communal waste mixture. Larger amounts of clean, separated PET could go to recycling. // // Waste composition (wet, in ppm): upper heating value 23.13 MJ/kg; lower heating value 22.95 MJ/kg; H2O 2000; O 368750; H 63380; C 553640; S 147.87; N 6456.8; P n.a.; B n.a.; Cl 788.62; Br 69.004; F 11.829; I n.a.; Ag n.a.; As 1.873; Ba 49.289; Cd 3.2531; Co 31.052; Cr 5.4218; Cu 11.829; Hg 0.08872; Mn 17.744; Mo n.a.; Ni 3.9431; Pb 5.5203; Sb 159.2; Se 2.0701; Sn 0.98577; V 1281.5; Zn 68.676; Be 0.49289; Sc n.a.; Sr 87.241; Ti 985.77; Tl 0.39431; W n.a.; Si n.a.; Fe 98.577; Ca 295.73; Al 197.15; K n.a.; Mg n.a.; Na 1444.7; // Share of carbon in waste that is biogenic 0%. // Share of metals in waste not oxidised and bulk-recyclable (exclude very small or thin parts) Iron: 0%; Alu: 0%; Copper: 0%. // Recovery of metal scrap from bottom ash to recycling: 0g iron scrap, 0g aluminium scrap, 0g copper scrap. From this waste, the FLUWA process in the technology mix recovers 0.000192kg (DM) of a hydroxide sludge to be recycled in zinc furnaces. // Ultimately one kg of this waste produces 0.01888 kg of bottom ash (can include some washed ash) and 0.00337 kg of residues, which are landfilled (technology mix). Additional solidification of residues with 0.001348 kg of cement.Net energy production: 2.97MJ/kg electric energy and 5.81MJ/kg thermal energy. //

## Included activities start
waste incineration from waste reception gate and delivery into waste bunker at incinerator plant site (without transports to the incinerator)

## Included activities end
Waste-specific short-term emissions to water from leachate. Long-term emissions from landfill to ground water.

## Geography
Specific to the technology mix encountered in Switzerland in 2012.

## Technology
average Swiss MSWI plants in 2010 (grate incinerators) with electrostatic precipitator for fly ash (ESP), wet flue gas scrubber and 25% SNCR , 42.77% SCR-high dust , 32.68% SCR-low dust -DeNOx facilities and 0% without Denox (weighted according to mass of burnt waste, representing Swiss average). Efficiency of iron scrap separation from slag : 58%. Efficiency of non-ferrous scrap separation from slag : 31%. The technology mix for this dataset includes a filter ash treatment (FLUWA) of a share of 46.22%. Gross electric efficiency technology mix 15.84% and Gross thermal efficiency technology mix 28.51%

## Time period
Waste composition as given in literature reference, theoretical data or other source. Transfer coefficients for modern MSWI.

## Reference product
- waste polyethylene terephthalate: 0 kg; By-product classification Waste; CPC 39270: Waste, parings and scrap of plastics; CAS 25038-59-9
  Main reference product of this activity (supply of disposal service).
  production volume 0 kg
    based on corresponding global production volume of MSW fraction in conventional MSWI (wo fly ash extraction) and scaled down to annual Swiss incinerated MSW mass of 3.02 mio. tonnes.
  property price 0 EUR2005
    Waste products are assigned a price of zero as they are assumed to require further treatment.
  property carbon content 0.55475
    carbon content on a dry matter basis (reserved; not for manual entry)
  properties: sulfur content 0.00014816, oxygen content 0.36949, hydrogen content 0.063507, nitrogen content 0.0064698, nickel content 3.951e-6, chlorine content 0.0007902, manganese content 1.7779e-5, cobalt content 3.1114e-5, lead content 5.5314e-6, copper content 1.1853e-5, fluorine content 1.1853e-5, arsenic content 1.8767e-6, chromium content 5.4326e-6, cadmium content 3.2596e-6, mercury content 8.8897e-8, bromine content 6.9142e-5, antimony content 0.00015952, barium content 4.9387e-5, selenium content 2.0743e-6, titanium content 0.00098775, strontium content 8.7416e-5, zinc content 6.8813e-5, thallium content 3.951e-7, tin content 9.8775e-7, vanadium content 0.0012841, dry mass 0.998 kg, calcium content 0.00029632, beryllium content 4.9387e-7, water in wet mass 0.002 kg, iron content 9.8775e-5, carbon content, fossil 0.55475, aluminium content 0.00019755, water content 0.002004, sodium content 0.0014475, wet mass 1 kg, carbon allocation 0.55364 kg
- electricity, for reuse in municipal waste incineration only: 1 kWh; CPC 17100: Electrical energy; By-product classification allocatable product; pedigree (1,1,1,1,1)
  Net electricity generated from this waste and used in internal MSWI plant energy redistribution.
  Uncertainty: uncertainty is calculated from uncertainties in waste composition and uncertainties in energy efficiency and the uncertainty in internal energy demand
  production volume 3.776e7 kWh

## By-products
- electricity, for reuse in municipal waste incineration only: 0 kWh; name E_el_prod_MSWI; CPC 17100: Electrical energy; By-product classification allocatable product; pedigree (1,1,1,1,1)
  (same comment as for electricity, for reuse in municipal waste incineration only)
  production volume 0 kWh
    calculated in proportion to reference product waste input to incinerator
  property exergy 3.6 MJ; name E_el_prod_MSWI_exergy
    This exergy property is based on the exergy content of the product.
  property price 0.1 EUR2005; name E_el_prod_MSWI_price_EUR2005
    Estimated to be the same price as in case of electricity, medium voltage.
  property true value relation 3.6; name E_el_prod_MSWI_true_value_relation
    property to calculate "true value" from
- heat, for reuse in municipal waste incineration only: 0 MJ; name E_th_prod_MSWI; CPC 17300: Steam and hot water; By-product classification allocatable product; pedigree (1,1,1,1,1)
  Net useful heat generated from this waste and used in internal MSWI plant energy redistribution.
  Uncertainty: uncertainty is calculated from uncertainties in waste composition and uncertainties in energy efficiency and the uncertainty in internal energy demand
  production volume 0 MJ
    calculated in proportion to reference product waste input to incinerator
  property exergy 0.1842 MJ; name E_th_prod_MSWI_exergy
    This exergy property is based on the exergy content of the product.
  property true value relation 0.1842; name E_th_prod_MSWI_true_value_relation
    property to calculate "true value" from
  property price 0.0106 EUR2005; name E_th_prod_MSWI_price_EUR2005
    Average European district heat price from Ecoheatcool and Euroheat 2005-2006, Ecoheat Work package 1: The European heat market. Final report. 10.6 EUR/GJ i s the price of district heat. http://www.solarthermalworld.org/files/Ecoheatcool%20WP1%20Web.pdf?download
- zinc concentrate: 0 kg; CPC 14290: Other non-ferrous metal ores and concentrates (other than uranium or thorium ores and concentrates); By-product classification allocatable product
  Calculated value from the knowledge of the properties of both products.
  property price 0.38 EUR2005; name ByP_price_EUR2005
    Temporary price data. Calculated as 90% of purchasers price based on: Zinc content in concentrate 53%. Concentrate price per kg Zn 86.5% of refined Zn price (13.5% treatment charges according to CHR Metals Limited 2005: Dynamic cost curves. http://www.minecost.com/dynamic.pdf). 2004 zinc price from USGS (2007) Mineral commodity summaries 2007. <http://minerals.usgs.gov/minerals/pubs/mcs/2007/mcs2007.pdf> [Accessed 25 May 2010]
  property zinc content 0.53; name zinc_C_zinc_concentrate
    Zinc content on a dry matter basis. Value taken from teh "zinc mine operation" /GLO dataset.
  property dry mass 1 kg; name DM_zinc_concentrate
  property carbon content 0
    carbon content on a dry matter basis (reserved; not for manual entry)
  properties: wet mass 1 kg, water content 0, carbon content, non-fossil 0, carbon content, fossil 0, water in wet mass 0 kg, carbon allocation 0 kg

## Inputs from technosphere
- residual material landfill: 0 unit; pedigree (1,1,1,1,1)
  Landfill infrastructure required for landfilling of incineration residues.
  Uncertainty: uncertainty is calculated from uncertainties in waste composition and transfer coefficients in incinerator
- transport, freight, lorry, unspecified: 0 metric ton*km; pedigree (1,1,1,1,1)
  Transport services to transport incineration residues to landfills and filter ash to external treatments (FLUWA).
  Uncertainty: uncertainty calculated from uncertainty of the waste composition of this waste, uncertainty of transfer coefficients and the uncertainty in generic transportation distances
- hydrochloric acid, without water, in 30% solution state: 0 kg; pedigree (1,1,1,1,1)
  Auxilliary inputs for the wastewater treatment stage of the incinerator plant.
  Uncertainty: uncertainty calculated from uncertainty in average HCl input, of transfer coefficients in the incinerator, and the uncertainty of the waste composition of this waste
  properties: wet mass 1 kg, dry mass 1 kg
- sodium hydroxide, without water, in 50% solution state: 0 kg; pedigree (1,1,1,1,1)
  Auxilliary inputs for the flue gas treatment stage of the incinerator plant, and partially in the filter ash treatment (FLUWA).
  Uncertainty: uncertainty calculated from uncertainty in average NaOH input, of transfer coefficients in the incinerator, and the uncertainty of the waste composition of this waste
  properties: wet mass 1 kg, dry mass 1 kg
- water, decarbonised: 0 kg; pedigree (1,1,1,1,1)
  Incinerator process water used in flue gas scrubber stage.
  Uncertainty: uncertainty calculated from uncertainty in average water input, and the uncertainty of the waste composition of this waste
  properties: wet mass 1 kg
- waste cement, hydrated: 0 kg; pedigree (1,1,1,1,1)
  Hydrated cement output for solidification of landfilled residual material.
  Uncertainty: Uncertainty calculated from uncertainty of the waste composition of this waste and transfer coefficients in the incinerator and of the solidification recipe.
  production volume 0 kg
    calculated in proportion to reference product waste input to incinerator
  properties: dry mass 1 kg, wet mass 1 kg
- quicklime, milled, packed: 0 kg; pedigree (1,1,1,1,1)
  Auxilliary inputs for the flue gas treatment stage of the incinerator plant.
  Uncertainty: uncertainty calculated from uncertainty in average CaO input, of transfer coefficients in the incinerator, and the uncertainty of the waste composition of this waste
  properties: dry mass 0.99 kg, water content 0.010101, wet mass 1 kg
- slag landfill: 0 unit; pedigree (1,1,1,1,1)
  Landfill infrastructure required for landfilling of bottom ash.
  Uncertainty: uncertainty is calculated from uncertainties in waste composition and transfer coefficients in incinerator
- spent activated carbon with mercury: 0 kg; pedigree (1,1,1,1,1)
  Spent ion exchanger charged with mercury, from FLUWA filter ash treatment, approximated here with Spent activated carbon with mercury, deposited undergound in a polyethylene Big Bag.
  Uncertainty: uncertainty calculated from uncertainty in of transfer coefficients in the incinerator, and the uncertainty of the waste composition of this waste.
  production volume 0 kg; = ABS(Ref('0423e508-6886-4d3b-88a8-abfa11002d05', 'ProductionVolume') * (Ref('4969d964-98d7-4c0f-b3f3-aa77be07013e') / Ref('0423e508-6886-4d3b-88a8-abfa11002d05')))
    Calculated from production volume of reference product using the relative outputs.
  properties: dry mass 1 kg, wet mass 1 kg, carbon content, fossil 0.6
- ammonia, liquid: 0 kg; pedigree (1,1,1,1,1)
  Input to DeNOx stage (100% NH3).
  Uncertainty: uncertainty calculated from uncertainty in average DeNOx input, uncertainty in the share of thermal NOx, uncertainty of nitrogen content in average municipal waste and the uncertainty in nitrogen content in *this* waste.
  properties: wet mass 1 kg, dry mass 1 kg
- titanium dioxide: 0 kg; pedigree (1,1,1,1,1)
  Input to DeNOx stage (TiO2 catalyst carrier)
  Uncertainty: uncertainty calculated from uncertainty in average DeNOx input, uncertainty in the share of thermal NOx, uncertainty of nitrogen content in average municipal waste and the uncertainty in nitrogen content in *this* waste.
  properties: dry mass 1 kg, wet mass 1 kg
- municipal waste incineration facility: 0 unit
  Demands per kilogram waste.
- heat, district or industrial, natural gas: 0 MJ; pedigree (1,1,1,1,1)
  Input to DeNOx stage, to heat up flue gas in low-dust SCR.
  Uncertainty: uncertainty calculated from uncertainty in average DeNOx input, uncertainty in the share of thermal NOx, uncertainty of nitrogen content in average municipal waste and the uncertainty in nitrogen content in *this* waste.
- iron (III) chloride, without water, in 40% solution state: 0 kg; pedigree (1,1,1,1,1)
  Auxilliary inputs for the wastewater treatment stage of the incinerator plant.
  Uncertainty: uncertainty calculated from uncertainty in average FeCl3 input, of transfer coefficients in the incinerator, and the uncertainty of the waste composition of this waste
  properties: dry mass 1 kg, wet mass 1 kg
- chromium oxide, flakes: 0 kg; pedigree (1,1,1,1,1)
  Input to DeNOx stage. Active component in SCR catalyst (vanadium pentoxide, V2O5), here approximated with the available chromium trioxide.
  Uncertainty: uncertainty calculated from uncertainty in average DeNOx input, uncertainty in the share of thermal NOx, uncertainty of nitrogen content in average municipal waste and the uncertainty in nitrogen content in *this* waste.
  properties: dry mass 1 kg, wet mass 1 kg
- process-specific burdens, slag landfill: 0 kg; pedigree (1,1,1,1,1)
  Mass-specific expenditures required for landfilling of bottom ash.;activityLink introduced to establish a direct link to the corresponding regional supply of this product
  Uncertainty: uncertainty is calculated from uncertainties in waste composition and transfer coefficients in incinerator
- chemical, organic: 0 kg; pedigree (1,1,1,1,1)
  Auxilliary inputs for the wastewater treatment stage of the incinerator plant. Proxy for (pure) Trisodium-trimercapto-s-triazine (CAS 17766-26-6), used as 15% diluted solution, aka TMT15.
  Uncertainty: uncertainty calculated from uncertainty in average TMT15 input, of transfer coefficients in the incinerator, and the uncertainty of the waste composition of this waste
  properties: dry mass 1 kg, carbon content, fossil 0.628, wet mass 1 kg
- process-specific burdens, residual material landfill: 0 kg; pedigree (1,1,1,1,1)
  Mass-specific expenditures required for landfilling of incineration residues.;activityLink introduced to establish a direct link to the corresponding regional supply of this product
  Uncertainty: uncertainty is calculated from uncertainties in waste composition and transfer coefficients in incinerator
- chemical, inorganic: 0 kg; pedigree (1,1,1,1,1)
  Auxilliary inputs for the wastewater treatment stage of the incinerator plant. Proxy for Polyelectrolyte.
  Uncertainty: uncertainty calculated from uncertainty in average Polyelectrolyte input, of transfer coefficients in the incinerator, and the uncertainty of the waste composition of this waste
  properties: dry mass 1 kg, wet mass 1 kg, carbon content, fossil 0.003
- metalliferous hydroxide sludge: 0 kg; pedigree (1,1,1,1,1)
  Metalliferous hydroxide sludge from filter ash leaching (FLUWA).
  Uncertainty: uncertainty is calculated from uncertainties in waste composition and transfer coefficients to filter ash in incinerator and the uncertainty of the transfer coefficients of the FLUWA process.
  production volume 0 kg
    calculated in proportion to reference product waste input to incinerator
  properties: zinc content 0.063184, dry mass 0.25 kg, wet mass 1 kg, antimony content 0.0090116, carbon content, fossil 0.15021, water content 3, oxygen content 0.49596, sodium content 0.061899, chlorine content 0.099181, sulfur content 0.047435, vanadium content 0.038077, calcium content 0.015561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
- hydrogen peroxide, without water, in 50% solution state: 0 kg; pedigree (1,1,1,1,1)
  Auxilliary oxidising agent for filter ash treatment (FLUWA).
  Uncertainty: uncertainty calculated from uncertainty in of transfer coefficients in the incinerator, and the uncertainty of the waste composition of this waste
  properties: dry mass 1 kg, wet mass 1 kg
- cement, unspecified: 0 kg; pedigree (1,1,1,1,1)
  Cement required for solidification of landfilled residual material.
  Uncertainty: Uncertainty calculated from uncertainty of the waste composition of this waste, of transfer coefficients in the incinerator and of the solidification recipe.
  properties: dry mass 1 kg, wet mass 1 kg
- cationic resin: 0 kg; pedigree (1,1,1,1,1)
  Auxilliary input for mercury removal in filter ash treatment (FLUWA).
  Uncertainty: uncertainty calculated from uncertainty in of transfer coefficients in the incinerator, and the uncertainty of the waste composition of this waste
  properties: carbon content, fossil 0.521606, dry mass 0.5 kg, wet mass 1 kg, water content 1
- waste bulk iron, excluding reinforcement: -0.00076652 kg; lognormal variance with pedigree 0.072, pedigree (3,4,5,1,3)
  EcoSpold01Location=CH
  Estimation based on data of Questionnaire
  Uncertainty: Estimation based on data of Questionnaire
- blower and heat exchange unit, central, 600-1200 m3/h: 7.31316e-6 unit; lognormal variance with pedigree 0.044, pedigree (3,4,5,1,1)
  Questionnaire, Data related to building considered
  EcoSpold01Location=RER
  Uncertainty: Questionnaire, Data related to building considered
- used air filter in exhaust air valve: -0.00517188 unit; lognormal variance with pedigree 0.044, pedigree (3,4,5,1,1)
  Questionnaire, Data related to building considered
  EcoSpold01Location=CH
  Uncertainty: Questionnaire, Data related to building considered
  production volume 0.0226 unit
- used air filter central unit, 600 m3/h: -0.000354828 unit; lognormal variance with pedigree 0.044, pedigree (3,4,5,1,1)
  (same comment as for used air filter in exhaust air valve)
  production volume 0.00251 unit
- used silencer steel, DN 315: -1.46828e-5 unit; lognormal variance with pedigree 0.044, pedigree (3,4,5,1,1)
  EcoSpold01Location=CH
  Questionnaire, Data related to building considered
  Uncertainty: Questionnaire, Data related to building considered
  production volume 0.000103 unit
- electricity, low voltage: 0.777202 kWh; lognormal variance with pedigree 0.0412, pedigree (2,3,5,1,1)
  EcoSpold01Location=CH
  Questionnaire, tecnical informations, related to system used
  Uncertainty: Questionnaire, tecnical informations, related to system used
- air filter, central unit, 600 m3/h: 0.000354828 unit; lognormal variance with pedigree 0.044, pedigree (3,4,5,1,1)
  (same comment as for blower and heat exchange unit, central, 600-1200 m3/h)
- air filter, in exhaust air valve: 0.00517188 unit; lognormal variance with pedigree 0.044, pedigree (3,4,5,1,1)
  EcoSpold01Location=RER
  Questionnaire, Data related to building considered
  Uncertainty: Questionnaire, Data related to building considered
- ventilation system, central, 1 x 720 m3/h, polyethylene ducts, with earth tube heat exchanger: 1.80588e-6 unit; lognormal variance with pedigree 0.044, pedigree (3,4,5,1,1)
  (same comment as for used silencer steel, DN 315)
- silencer, steel, DN 315, 50 mm: 1.46828e-5 unit; lognormal variance with pedigree 0.044, pedigree (3,4,5,1,1)
  (same comment as for used silencer steel, DN 315)
- used flexible duct aluminium/PET, DN of 125: -0.000191711 m; lognormal variance with pedigree 0.044, pedigree (3,4,5,1,1)
  (same comment as for used air filter in exhaust air valve)
  production volume 0.000513 m
- used ventilation control and wiring central unit: -7.31316e-6 unit; lognormal variance with pedigree 0.044, pedigree (3,4,5,1,1)
  (same comment as for used air filter in exhaust air valve)
  production volume 5.13e-5 unit
- ventilation control and wiring, central unit: 7.31316e-6 unit; lognormal variance with pedigree 0.044, pedigree (3,4,5,1,1)
  (same comment as for blower and heat exchange unit, central, 600-1200 m3/h)
- used silencer steel, DN 125: -0.000214908 unit; lognormal variance with pedigree 0.044, pedigree (3,4,5,1,1)
  (same comment as for used air filter in exhaust air valve)
  production volume 0.000615 unit
- used blower and heat exchange unit central, 600-1200 m3/h: -7.31316e-6 unit; lognormal variance with pedigree 0.044, pedigree (3,4,5,1,1)
  (same comment as for used air filter in exhaust air valve)
  production volume 5.13e-5 unit
- flexible duct, aluminium/PET, DN of 125: 0.000191711 m; lognormal variance with pedigree 0.044, pedigree (3,4,5,1,1)
  (same comment as for air filter, in exhaust air valve)
- silencer, steel, DN 125: 0.000214908 unit; lognormal variance with pedigree 0.044, pedigree (3,4,5,1,1)
  (same comment as for used silencer steel, DN 315)
- ventilation system, central, 1 x 720 m3/h, steel ducts, with earth tube heat exchanger: 1.81178e-6 unit; lognormal variance with pedigree 0.044, pedigree (3,4,5,1,1)
  (same comment as for used air filter in exhaust air valve)
- spiral-seam duct, steel, DN 400: 5.87956e-6 m; lognormal variance with pedigree 0.0426, pedigree (2,4,5,1,1)
  (same comment as for blower and heat exchange unit, central, 600-1200 m3/h)
- insulation spiral-seam duct, rockwool, DN 400, 30 mm: 4.28702e-6 m; lognormal variance with pedigree 0.0426, pedigree (2,4,5,1,1)
  (same comment as for blower and heat exchange unit, central, 600-1200 m3/h)
- exhaust air roof hood, steel, DN 400: 1.39026e-7 unit; lognormal variance with pedigree 0.04, pedigree (1,1,5,1,1)
  EcoSpold01Location=CH
  2,4,1,1,1,nA; Questionnaire, Data related to building considered
- used insulation spiral-seam duct rockwool, DN 400: -4.28702e-6 m; lognormal variance with pedigree 0.0426, pedigree (2,4,5,1,1)
  (same comment as for used air filter in exhaust air valve)
  production volume 0.67336 m
- waste polyethylene/polypropylene product: -8.76263e-5 kg; lognormal variance with pedigree 0.0426, pedigree (2,4,5,1,1)
  (same comment as for used silencer steel, DN 315)
  production volume 16.5647 kg
- excavation, hydraulic digger: 1.90466e-5 m3; lognormal variance with pedigree 0.06, pedigree (4,4,5,1,1)
  Assumption, Data related to building considered
  EcoSpold01Location=RER
  Uncertainty: Assumption, Data related to building considered
- used exhaust air valve in-wall housing, plastic/steel: -1.65004e-5 unit; lognormal variance with pedigree 0.0426, pedigree (2,4,5,1,1)
  (same comment as for used silencer steel, DN 315)
  production volume 0.606024 unit
- used sealing tape aluminium/PE, 50 mm wide: -0.000499345 m; lognormal variance with pedigree 0.0426, pedigree (2,4,5,1,1)
  (same comment as for used silencer steel, DN 315)
  production volume 6.7336 m
- used room-connecting overflow element steel, approx. 40 m3/h: -1.65004e-5 unit; lognormal variance with pedigree 0.0426, pedigree (2,4,5,1,1)
  (same comment as for used air filter in exhaust air valve)
  production volume 0.606024 unit
- spiral-seam duct, steel, DN 125: 1.10003e-5 m; lognormal variance with pedigree 0.0426, pedigree (2,4,5,1,1)
  (same comment as for air filter, in exhaust air valve)
- outside air intake, stainless steel, DN 370: 1.39026e-7 unit; lognormal variance with pedigree 0.0426, pedigree (2,4,5,1,1)
  (same comment as for air filter, in exhaust air valve)
- used outside air intake stainless steel, DN 370: -1.39026e-7 unit; lognormal variance with pedigree 0.0426, pedigree (2,4,5,1,1)
  (same comment as for used air filter in exhaust air valve)
  production volume 0.033668 unit
- supply air inlet, steel/SS, DN 75: 2.75006e-5 unit; lognormal variance with pedigree 0.0426, pedigree (2,4,5,1,1)
  (same comment as for blower and heat exchange unit, central, 600-1200 m3/h)
- room-connecting overflow element, steel, approx. 40 m3/h: 1.65004e-5 unit; lognormal variance with pedigree 0.0426, pedigree (2,4,5,1,1)
  (same comment as for blower and heat exchange unit, central, 600-1200 m3/h)
- polyethylene pipe, DN 200, SDR 41: 1.66832e-5 m; lognormal variance with pedigree 0.0426, pedigree (2,4,5,1,1)
  (same comment as for air filter, in exhaust air valve)
- air distribution terminal panel, steel, 120 m3/h: 1.10003e-5 unit; lognormal variance with pedigree 0.0426, pedigree (2,4,5,1,1)
  (same comment as for used silencer steel, DN 315)
- exhaust air valve, in-wall housing, plastic/steel, DN 125: 1.65004e-5 unit; lognormal variance with pedigree 0.0426, pedigree (2,4,5,1,1)
  (same comment as for used air filter in exhaust air valve)
- polyethylene pipe, corrugated, DN 75: 0.000113869 m; lognormal variance with pedigree 0.0426, pedigree (2,4,5,1,1)
  (same comment as for air filter, in exhaust air valve)
- used air distribution terminal panel steel, 120 m3/h: -1.10003e-5 unit; lognormal variance with pedigree 0.0426, pedigree (2,4,5,1,1)
  (same comment as for used silencer steel, DN 315)
  production volume 0.404016 unit
- sealing tape, aluminium/PE, 50 mm wide: 0.000499345 m; lognormal variance with pedigree 0.0426, pedigree (2,4,5,1,1)
  (same comment as for blower and heat exchange unit, central, 600-1200 m3/h)
- used exhaust air roof hood steel, DN 400: -1.39026e-7 unit; lognormal variance with pedigree 0.0426, pedigree (2,4,5,1,1)
  (same comment as for used silencer steel, DN 315)
  production volume 0.033668 unit
- ventilation duct, steel, 100x50 mm: 0.000379209 m; lognormal variance with pedigree 0.0426, pedigree (2,4,5,1,1)
  (same comment as for air filter, in exhaust air valve)
- ventilation duct, connection piece, steel, 100x50 mm: 9.48023e-5 unit; lognormal variance with pedigree 0.0426, pedigree (2,4,5,1,1)
  (same comment as for blower and heat exchange unit, central, 600-1200 m3/h)
- ventilation duct, elbow 90°, steel, 100x50 mm: 0.000144099 unit; lognormal variance with pedigree 0.0426, pedigree (2,4,5,1,1)
  (same comment as for blower and heat exchange unit, central, 600-1200 m3/h)
- ventilation control and wiring, decentralized unit: 3.1852e-5 unit; lognormal variance with pedigree 0.044, pedigree (3,4,5,1,1)
  (same comment as for blower and heat exchange unit, central, 600-1200 m3/h)
- air filter, decentralized unit, 180-250 m3/h: 0.0013209 unit; lognormal variance with pedigree 0.044, pedigree (3,4,5,1,1)
  (same comment as for blower and heat exchange unit, central, 600-1200 m3/h)
- ventilation system, decentralized, 6 x 120 m3/h, polyethylene ducts, with earth tube heat exchanger: 5.51187e-7 unit; lognormal variance with pedigree 0.044, pedigree (3,4,5,1,1)
  (same comment as for used silencer steel, DN 315)
- used ventilation control and wiring decentralized unit: -3.1852e-5 unit; lognormal variance with pedigree 0.044, pedigree (3,4,5,1,1)
  (same comment as for used silencer steel, DN 315)
  production volume 0.000308 unit
- used air filter decentralized unit, 180-250 m3/h: -0.0013209 unit; lognormal variance with pedigree 0.044, pedigree (3,4,5,1,1)
  (same comment as for used air filter in exhaust air valve)
  production volume 0.0151 unit
- blower and heat exchange unit, decentralized, 180-250 m3/h: 3.1852e-5 unit; lognormal variance with pedigree 0.044, pedigree (3,4,5,1,1)
  (same comment as for air filter, in exhaust air valve)
- used blower and heat exchange unit decentralized, 180-250 m3/h: -3.1852e-5 unit; lognormal variance with pedigree 0.044, pedigree (3,4,5,1,1)
  (same comment as for used silencer steel, DN 315)
  production volume 0.000308 unit
- ventilation system, decentralized, 6 x 120 m3/h, polyethylene ducts: 5.51187e-7 unit; lognormal variance with pedigree 0.044, pedigree (3,4,5,1,1)
  (same comment as for used silencer steel, DN 315)
- ventilation system, decentralized, 6 x 120 m3/h, steel ducts, with earth tube heat exchanger: 5.5984e-7 unit; lognormal variance with pedigree 0.04, pedigree (1,1,5,1,1)
  3,4,1,1,1,nA; Questionnaire, Data related to building considered
  EcoSpold01Location=CH
- ventilation system, decentralized, 6 x 120 m3/h, steel ducts: 5.5984e-7 unit; lognormal variance with pedigree 0.044, pedigree (3,4,5,1,1)
  (same comment as for used air filter in exhaust air valve)
- exhaust air outlet, steel/aluminium, 85x365 mm: 9.33194e-6 unit; lognormal variance with pedigree 0.0426, pedigree (2,4,5,1,1)
  (same comment as for used silencer steel, DN 315)

## Inputs from nature
- Oxygen [natural resource, in air]: 0 kg; pedigree (1,1,1,1,1)
  Oxygen from ambient air needed to combust and oxidise this waste. Net demand, i.e. without O2 leaving the plant in flue gas uncombusted.
  Uncertainty: uncertainty is calculated from uncertainties in waste composition and transfer coefficients to flue gas and soild residues in incinerator

## Emissions to nature
All rows: pedigree (1,1,1,1,1)
- DOC, Dissolved Organic Carbon [water, ground-, long-term]: 0 kg
  Long-term emissions from landfilling of incineration residues.
  Uncertainty: uncertainty is calculated from uncertainties in waste composition and transfer coefficients in incinerator and landfills.
- Aluminium [air, urban air close to ground]: 0 kg
  Emission to air from waste composition and transfer coefficients.
  Uncertainty: uncertainty is calculated from uncertainties in waste composition and transfer coefficients in incinerator
- Heat, waste [air, urban air close to ground]: 0 MJ
  Waste heat generated from heating value of this waste plus any electricity required to process it.
  Uncertainty: uncertainty is calculated from uncertainties in waste composition and uncertainties in energy efficiency and the uncertainty in internal energy demand
- Sulfate [water, ground-, long-term]: 0 kg
  (same comment as for DOC, Dissolved Organic Carbon)
- Sodium [air, urban air close to ground]: 0 kg
  (same comment as for Aluminium)
- Heat, waste [water, surface water]: 0 MJ
  (same comment as for Heat, waste)
- Nitrate [water, ground-, long-term]: 0 kg
  (same comment as for DOC, Dissolved Organic Carbon)
- TOC, Total Organic Carbon [water, surface water]: 0 kg
  Emissions to water from waste composition and transfer coefficients in incinerator and landfills.
  Uncertainty: uncertainty is calculated from uncertainties in waste composition and transfer coefficients in incinerator and landfills
- Water [air, urban air close to ground]: 0 m3
  Water vapour from waste humidity, hydrogen oxidation and part of the process water.
  Uncertainty: Uncertainty calculated from uncertainty in waste composition, process water input and the uncertainty of fraction to air.
- Chloride [water, ground-, long-term]: 0 kg
  (same comment as for DOC, Dissolved Organic Carbon)
- COD, Chemical Oxygen Demand [water, surface water]: 0 kg
  (same comment as for TOC, Total Organic Carbon)
- Water [water, surface water]: 0 m3
  Process water released to surface water.
  Uncertainty: uncertainty calculated from uncertainty in process water input and the uncertainty of fraction to surface water.
- Bromine [water, ground-, long-term]: 0 kg
  (same comment as for DOC, Dissolved Organic Carbon)
- BOD5, Biological Oxygen Demand [water, surface water]: 0 kg
  (same comment as for TOC, Total Organic Carbon)
- Fluoride [water, ground-, long-term]: 0 kg
  (same comment as for DOC, Dissolved Organic Carbon)
- DOC, Dissolved Organic Carbon [water, surface water]: 0 kg
  (same comment as for TOC, Total Organic Carbon)
- Carbon monoxide, fossil [air, urban air close to ground]: 0 kg
  Incomplete combustion product emitted to air.
  Uncertainty: uncertainty calculated from uncertainty in average operation emissions, and the uncertainty of the flue gas volume from this waste.
- Arsenic, ion [water, ground-, long-term]: 0 kg
  (same comment as for DOC, Dissolved Organic Carbon)
- Sulfate [water, surface water]: 0 kg
  (same comment as for TOC, Total Organic Carbon)
- Carbon dioxide, fossil [air, urban air close to ground]: 0 kg
  (same comment as for Aluminium)
- Barium [water, ground-, long-term]: 0 kg
  (same comment as for DOC, Dissolved Organic Carbon)
- Chloride [water, surface water]: 0 kg
  (same comment as for TOC, Total Organic Carbon)
- Methane, fossil [air, urban air close to ground]: 0 kg
  (same comment as for Carbon monoxide, fossil)
- Cadmium, ion [water, ground-, long-term]: 0 kg
  (same comment as for DOC, Dissolved Organic Carbon)
- Nitrate [water, surface water]: 0 kg
  (same comment as for TOC, Total Organic Carbon)
- Sulfur dioxide [air, urban air close to ground]: 0 kg
  (same comment as for Aluminium)
- Cobalt [water, ground-, long-term]: 0 kg
  (same comment as for DOC, Dissolved Organic Carbon)
- Bromine [water, surface water]: 0 kg
  (same comment as for TOC, Total Organic Carbon)
- Nitrogen oxides [air, urban air close to ground]: 0 kg
  Sum of fuel-Nox and thermal-NOx emitted to air after DeNOx stage.
  Uncertainty: uncertainty calculated from uncertainty in average N-emissions and uncertainty in the share of thermal NOx and the uncertainty in nitrogen content in *this* waste.
- Chromium VI [water, ground-, long-term]: 0 kg
  (same comment as for DOC, Dissolved Organic Carbon)
- Arsenic, ion [water, surface water]: 0 kg
  (same comment as for TOC, Total Organic Carbon)
- Ammonia [air, urban air close to ground]: 0 kg
  Nitrogen species emitted to air after DeNOx stage.
  Uncertainty: uncertainty calculated from uncertainty in average N-emissions and uncertainty in the share of thermal NOx and the uncertainty in nitrogen content in *this* waste.
- Copper, ion [water, ground-, long-term]: 0 kg
  (same comment as for DOC, Dissolved Organic Carbon)
- Fluoride [water, surface water]: 0 kg
  (same comment as for TOC, Total Organic Carbon)
- Dinitrogen monoxide [air, urban air close to ground]: 0 kg
  (same comment as for Ammonia)
- Mercury [water, ground-, long-term]: 0 kg
  (same comment as for DOC, Dissolved Organic Carbon)
- Barium [water, surface water]: 0 kg
  (same comment as for TOC, Total Organic Carbon)
- Cyanide [air, urban air close to ground]: 0 kg
  (same comment as for Ammonia)
- Manganese [water, ground-, long-term]: 0 kg
  (same comment as for DOC, Dissolved Organic Carbon)
- Cadmium, ion [water, surface water]: 0 kg
  (same comment as for TOC, Total Organic Carbon)
- Hydrogen chloride [air, urban air close to ground]: 0 kg
  (same comment as for Aluminium)
- Nickel, ion [water, ground-, long-term]: 0 kg
  (same comment as for DOC, Dissolved Organic Carbon)
- Cobalt [water, surface water]: 0 kg
  (same comment as for TOC, Total Organic Carbon)
- Bromine [air, urban air close to ground]: 0 kg
  (same comment as for Aluminium)
- Lead [water, ground-, long-term]: 0 kg
  (same comment as for DOC, Dissolved Organic Carbon)
- Chromium VI [water, surface water]: 0 kg
  (same comment as for TOC, Total Organic Carbon)
- Hydrogen fluoride [air, urban air close to ground]: 0 kg
  (same comment as for Aluminium)
- Antimony [water, ground-, long-term]: 0 kg
  (same comment as for DOC, Dissolved Organic Carbon)
- Copper, ion [water, surface water]: 0 kg
  (same comment as for TOC, Total Organic Carbon)
- Arsenic [air, urban air close to ground]: 0 kg
  (same comment as for Aluminium)
- Selenium [water, ground-, long-term]: 0 kg
  (same comment as for DOC, Dissolved Organic Carbon)
- Mercury [water, surface water]: 0 kg
  (same comment as for TOC, Total Organic Carbon)
- Tin, ion [water, ground-, long-term]: 0 kg
  (same comment as for DOC, Dissolved Organic Carbon)
- Manganese [water, surface water]: 0 kg
  (same comment as for TOC, Total Organic Carbon)
- Vanadium, ion [water, ground-, long-term]: 0 kg
  (same comment as for DOC, Dissolved Organic Carbon)
- Nickel, ion [water, surface water]: 0 kg
  (same comment as for TOC, Total Organic Carbon)
- Zinc, ion [water, ground-, long-term]: 0 kg
  (same comment as for DOC, Dissolved Organic Carbon)
- Lead [water, surface water]: 0 kg
  (same comment as for TOC, Total Organic Carbon)
- Barium [air, urban air close to ground]: 0 kg
  (same comment as for Aluminium)
- Beryllium [water, ground-, long-term]: 0 kg
  (same comment as for DOC, Dissolved Organic Carbon)
- Antimony [water, surface water]: 0 kg
  (same comment as for TOC, Total Organic Carbon)
- Cadmium [air, urban air close to ground]: 0 kg
  (same comment as for Aluminium)
- Strontium [water, ground-, long-term]: 0 kg
  (same comment as for DOC, Dissolved Organic Carbon)
- Selenium [water, surface water]: 0 kg
  (same comment as for TOC, Total Organic Carbon)
- Cobalt [air, urban air close to ground]: 0 kg
  (same comment as for Aluminium)
- Titanium, ion [water, ground-, long-term]: 0 kg
  (same comment as for DOC, Dissolved Organic Carbon)
- Tin, ion [water, surface water]: 0 kg
  (same comment as for TOC, Total Organic Carbon)
- Chromium [air, urban air close to ground]: 0 kg
  (same comment as for Aluminium)
- Thallium [water, ground-, long-term]: 0 kg
  (same comment as for DOC, Dissolved Organic Carbon)
- Vanadium, ion [water, surface water]: 0 kg
  (same comment as for TOC, Total Organic Carbon)
- Copper [air, urban air close to ground]: 0 kg
  (same comment as for Aluminium)
- Silicon [water, ground-, long-term]: 0 kg
  (same comment as for DOC, Dissolved Organic Carbon)
- Zinc, ion [water, surface water]: 0 kg
  (same comment as for TOC, Total Organic Carbon)
- Mercury [air, urban air close to ground]: 0 kg
  (same comment as for Aluminium)
- Iron, ion [water, ground-, long-term]: 0 kg
  (same comment as for DOC, Dissolved Organic Carbon)
- Beryllium [water, surface water]: 0 kg
  (same comment as for TOC, Total Organic Carbon)
- Manganese [air, urban air close to ground]: 0 kg
  (same comment as for Aluminium)
- Calcium, ion [water, ground-, long-term]: 0 kg
  (same comment as for DOC, Dissolved Organic Carbon)
- Strontium [water, surface water]: 0 kg
  (same comment as for TOC, Total Organic Carbon)
- Nickel [air, urban air close to ground]: 0 kg
  (same comment as for Aluminium)
- Aluminium [water, ground-, long-term]: 0 kg
  (same comment as for DOC, Dissolved Organic Carbon)
- Titanium, ion [water, surface water]: 0 kg
  (same comment as for TOC, Total Organic Carbon)
- Lead [air, urban air close to ground]: 0 kg
  (same comment as for Aluminium)
- Sodium, ion [water, ground-, long-term]: 0 kg
  (same comment as for DOC, Dissolved Organic Carbon)
- Thallium [water, surface water]: 0 kg
  (same comment as for TOC, Total Organic Carbon)
- Antimony [air, urban air close to ground]: 0 kg
  (same comment as for Aluminium)
- NMVOC, non-methane volatile organic compounds, unspecified origin [air, urban air close to ground]: 0 kg
  (same comment as for Carbon monoxide, fossil)
- Silicon [water, surface water]: 0 kg
  (same comment as for TOC, Total Organic Carbon)
- Selenium [air, urban air close to ground]: 0 kg
  (same comment as for Aluminium)
- Particulates, < 2.5 um [air, urban air close to ground]: 0 kg
  (same comment as for Carbon monoxide, fossil)
- Iron, ion [water, surface water]: 0 kg
  (same comment as for TOC, Total Organic Carbon)
- Tin [air, urban air close to ground]: 0 kg
  (same comment as for Aluminium)
- Particulates, > 2.5 um, and < 10um [air, urban air close to ground]: 0 kg
  (same comment as for Carbon monoxide, fossil)
- Calcium, ion [water, surface water]: 0 kg
  (same comment as for TOC, Total Organic Carbon)
- Vanadium [air, urban air close to ground]: 0 kg
  (same comment as for Aluminium)
- Dioxins, measured as 2,3,7,8-tetrachlorodibenzo-p-dioxin [air, urban air close to ground]: 0 kg
  (same comment as for Carbon monoxide, fossil)
- Aluminium [water, surface water]: 0 kg
  (same comment as for TOC, Total Organic Carbon)
- Zinc [air, urban air close to ground]: 0 kg
  (same comment as for Aluminium)
- Benzene [air, urban air close to ground]: 0 kg
  (same comment as for Carbon monoxide, fossil)
- Sodium, ion [water, surface water]: 0 kg
  (same comment as for TOC, Total Organic Carbon)
- Strontium [air, urban air close to ground]: 0 kg
  (same comment as for Aluminium)
- Toluene [air, urban air close to ground]: 0 kg
  (same comment as for Carbon monoxide, fossil)
- Chromium, ion [water, surface water]: 0 kg
  (same comment as for TOC, Total Organic Carbon)
- Titanium [air, urban air close to ground]: 0 kg
  (same comment as for Aluminium)
- Benzene, pentachloro- [air, urban air close to ground]: 0 kg
  (same comment as for Carbon monoxide, fossil)
- COD, Chemical Oxygen Demand [water, ground-, long-term]: 0 kg
  (same comment as for DOC, Dissolved Organic Carbon)
- Thallium [air, urban air close to ground]: 0 kg
  (same comment as for Aluminium)
- Benzene, hexachloro- [air, urban air close to ground]: 0 kg
  (same comment as for Carbon monoxide, fossil)
- BOD5, Biological Oxygen Demand [water, ground-, long-term]: 0 kg
  (same comment as for DOC, Dissolved Organic Carbon)
- Iron [air, urban air close to ground]: 0 kg
  (same comment as for Aluminium)
- Phenol, pentachloro- [air, urban air close to ground]: 0 kg
  (same comment as for Carbon monoxide, fossil)
- TOC, Total Organic Carbon [water, ground-, long-term]: 0 kg
  (same comment as for DOC, Dissolved Organic Carbon)
- Calcium [air, urban air close to ground]: 0 kg
  (same comment as for Aluminium)
- Benzo(a)pyrene [air, urban air close to ground]: 0 kg
  (same comment as for Carbon monoxide, fossil)
