# molybdenum production

Dataset: EcoSpold 2, unit process
Geography: RER
Time period: 2000-01-01 to 2019-12-31
Technology level: current
Classification: EcoSpold01Categories: metals/extraction
Classification: ISIC rev.4 ecoinvent: 2420:Manufacture of basic precious and other non-ferrous metals
Scenario: Business-as-Usual
System model: Allocation at the point of substitution
Generated by: Hans-Jörg Althaus
Published in: Classen M. 2009
Database: ecoinvent
isCopyrightProtected: true
accessRestrictedTo: 1

## General comment
This dataset represents the production of 1 kg of molybdenum, in RER, in 2003. For this, molybdenum trioxide or molybdenite is used. For a lack of specific data, the metallurgical process of the zinc production is used as a proxy. Only the input of the concentrate is adapted. Although zinc and molybdenum concentrate are both sulfidic and the metal content is almost the same, this is a crude assumption and the data quality therefore is poor. The data set must only be used if the relevance of molybdenum is low in a LCA study. If the focus of such a study would lie on molybdenum, the process would need to be further investigated.
[This dataset was already contained in the ecoinvent database version 2. It was not individually updated during the transfer to ecoinvent version 3. Life Cycle Impact Assessment results may still have changed, as they are affected by changes in the supply chain, i.e. in other datasets. This dataset was generated following the ecoinvent quality guidelines for version 2. It may have been subject to central changes described in the ecoinvent version 3 change report (http://www.ecoinvent.org/database/ecoinvent-version-3/reports-of-changes/), and the results of the central updates were reviewed extensively. The changes added e.g. consistent water flows and other information throughout the database. The documentation of this dataset can be found in the ecoinvent reports of version 2, which are still available via the ecoinvent website. The change report linked above covers all central changes that were made during the conversion process.]

## Included activities start
From reception of raw materials at the factory gate.

## Included activities end
This activity ends with production of high grade primary molybdenum by pyro- and hydrometallurgical processes.

The dataset includes the disposal of the slag and the treatment of the waste water.

## Technology
A mix of 80% hydrometallurgical and 20% pyrometallurgical production of zinc is chosen to represent the molybdenum production

## Parameters
- fraction, process water, to air: 0.15 dimensionless; name fraction_PW_to_air; lognormal variance with pedigree 0.092025, pedigree (4,4,3,2,4)
  Literature value. In case when no industry/process specific data are available, default evaporation fraction value is used. This value is 15% and is based on literature (Statistics Canada, 2007 & Shaffer, K.H., 2008, Consumptive water use in the Great Lakes Basin, USGS & Shiklomanov, 2003, World Water Resources at the Beginning of the 21st Century) and has been approved by an expert.

## Reference product
- molybdenum: 0 kg; By-product classification allocatable product; CPC 41601: Tungsten, molybdenum, tantalum, magnesium, cobalt, cadmium, titanium, zirconium, beryllium, gallium, hafnium, […]
  Estimation from dataset author.
  Molybdenum uses: In the steel and foundry industry molybdenum is added to melts, either as technical oxide or in the form of ferromolybdenum [11121-95-2]. Compared to pure molybdenum, ferromolybdenum dissolves much more easily in the steel melt and is cheaper to produce.
  EcoSpold01Location=RER
  production volume 3e6 kg; = 3000*1000
    Literature value. The total world production volume of molybdenum in 2005 was 1.85E5 tonnes (USGS, http://minerals.usgs.gov/minerals/pubs/commodity/molybdenum/molybmcs07.pdf, accessed 20140619). The only significant producer of molybdenum which is partly in Europe is Russia. The production of molybdenum in 2005 in Russia was 3000 tonnes.
  property price 62.5 EUR2005
    Calculated based on literature data. The price of molybdenum in 2005 was between 70 and 81 USD (http://minerals.usgs.gov/minerals/pubs/commodity/molybdenum/molybmyb05.pdf, accessed 20140612).
  property carbon content 0
    carbon content on a dry matter basis (reserved; not for manual entry)
  property true value 62.5
    allocation property applied in "true value" allocation // value calculated from revenue
  properties: carbon content, fossil 0, wet mass 1 kg, water content 0, carbon content, non-fossil 0, dry mass 1 kg, water in wet mass 0 kg, carbon allocation 0 kg
- indium rich leaching residues, from zinc production: 1 kg; By-product classification allocatable product; CPC 41601: Tungsten, molybdenum, tantalum, magnesium, cobalt, cadmium, titanium, zirconium, beryllium, gallium, hafnium, […]
  Estimation from dataset author.
  production volume 1.01817e6 kg; = Ref('22169c42-36c3-4d77-9cf5-4e962e5dcea2', 'ProductionVolume') * (Ref('57288d3c-781c-4063-909a-46ecefee92d4') / Ref('22169c42-36c3-4d77-9cf5-4e962e5dcea2'))
    Calculated from production volume of reference product using the relative outputs.
  property price 0.0043 EUR2005
    Temporary price data.The price of zinc is 1.04 Euro (calculated as 90% of purchasers price based on: Source: ecoinvent v2 report 10-part IX, Tab 5.10 & 2.5). When producing 1kg of zinc, 0.33939kg of indium rich leaching residues, from zinc production is produced as a by-product. The economic allocation factor in eiv2.2 was 99.86% for zinc and 0.17% for the indium rich leaching residues, from zinc production. Following this assumption the price of the indium rich leaching residues, from zinc production is calculated to be ((0.0014*1*1.04)/(0.33939-0.0014*0.33939)=) 0.0043 Euro.
  property carbon content 0
    carbon content on a dry matter basis (reserved; not for manual entry)
  property true value 0.00145938
    allocation property applied in "true value" allocation // value calculated from revenue
  properties: water content 0, water in wet mass 0 kg, dry mass 1 kg, wet mass 1 kg, carbon content, fossil 0, carbon content, non-fossil 0, carbon allocation 0 kg

## By-products
- cadmium sludge from zinc electrolysis: 0 kg; CPC 39367: Waste and scrap of tungsten, molybdenum, tantalum, magnesium, cobalt, cadmium, titanium, zirconium, beryllium […]; By-product classification allocatable product
  Estimation from dataset author.
  production volume 10133.4 kg; = Ref('1e94689a-1de1-4f93-a184-802efaf7e1b7')/ Ref('22169c42-36c3-4d77-9cf5-4e962e5dcea2')* Ref('22169c42-36c3-4d77-9cf5-4e962e5dcea2', 'ProductionVolume')
    Calculated from production volume of reference product using the relative outputs.
  property price 1.157 EUR2005
    Estimated based on the price of cadmium and cadmium content of cadmium sludge. Based on the production process of primary cadmium, it is assumed that the value of cadmium sludge is equal to 80% of the value of cadmium it contains.
  property carbon content 0
    carbon content on a dry matter basis (reserved; not for manual entry)
  property true value 0.00390811
    allocation property applied in "true value" allocation // value calculated from revenue
  properties: carbon content, non-fossil 0, water in wet mass 0 kg, carbon content, fossil 0, dry mass 1 kg, wet mass 1 kg, water content 0, carbon allocation 0 kg
- electricity, for reuse in municipal waste incineration only: 0 kWh; CPC 17100: Electrical energy; By-product classification allocatable product; pedigree (1,1,1,1,1)
  Net electricity generated from this waste and used in internal MSWI plant energy redistribution.
  Uncertainty: uncertainty is calculated from uncertainties in waste composition and uncertainties in energy efficiency and the uncertainty in internal energy demand
  production volume 2838.17 kWh
  property exergy 3.6 MJ; name E_el_prod_MSWI_exergy
    This exergy property is based on the exergy content of the product.
  property true value relation 3.6; name E_el_prod_MSWI_true_value_relation
    property to calculate "true value" from
  property price 0.1 EUR2005; name E_el_prod_MSWI_price_EUR2005
    Estimated to be the same price as in case of electricity, medium voltage.
  property true value 0.000121552
    allocation property applied in "true value" allocation // value calculated from true value relation
- heat, for reuse in municipal waste incineration only: 0 MJ; CPC 17300: Steam and hot water; By-product classification allocatable product; pedigree (1,1,1,1,1)
  Net useful heat generated from this waste and used in internal MSWI plant energy redistribution.
  Uncertainty: uncertainty is calculated from uncertainties in waste composition and uncertainties in energy efficiency and the uncertainty in internal energy demand
  production volume 20079.7 MJ
  property true value relation 0.1842; name E_th_prod_MSWI_true_value_relation
    property to calculate "true value" from
  property exergy 0.1842 MJ; name E_th_prod_MSWI_exergy
    This exergy property is based on the exergy content of the product.
  property price 0.0106 EUR2005; name E_th_prod_MSWI_price_EUR2005
    Average European district heat price from Ecoheatcool and Euroheat 2005-2006, Ecoheat Work package 1: The European heat market. Final report. 10.6 EUR/GJ i s the price of district heat. http://www.solarthermalworld.org/files/Ecoheatcool%20WP1%20Web.pdf?download
  property true value 4.40016e-5
    (same comment as for electricity, for reuse in municipal waste incineration only)
- zinc concentrate: 0 kg; CPC 14290: Other non-ferrous metal ores and concentrates (other than uranium or thorium ores and concentrates); By-product classification allocatable product
  Calculated value from the knowledge of the properties of both products.
  production volume 0.502357 kg
  property price 0.38 EUR2005; name ByP_price_EUR2005
    Temporary price data. Calculated as 90% of purchasers price based on: Zinc content in concentrate 53%. Concentrate price per kg Zn 86.5% of refined Zn price (13.5% treatment charges according to CHR Metals Limited 2005: Dynamic cost curves. http://www.minecost.com/dynamic.pdf). 2004 zinc price from USGS (2007) Mineral commodity summaries 2007. <http://minerals.usgs.gov/minerals/pubs/mcs/2007/mcs2007.pdf> [Accessed 25 May 2010]
  property zinc content 0.53; name zinc_C_zinc_concentrate
    Zinc content on a dry matter basis. Value taken from teh "zinc mine operation" /GLO dataset.
  property dry mass 1 kg; name DM_zinc_concentrate
  property carbon content 0
    carbon content on a dry matter basis (reserved; not for manual entry)
  property true value 6.36319e-8
    allocation property applied in "true value" allocation // value calculated from revenue
  properties: wet mass 1 kg, water content 0, carbon content, non-fossil 0, carbon content, fossil 0, water in wet mass 0 kg, carbon allocation 0 kg

## Inputs from technosphere
- electricity, high voltage: 0.000225644 kWh; lognormal variance with pedigree 0.2626, pedigree (3,3,5,1,5)
  Modelled, based on “ISIC 2420” - pdf-document on the dedicated talk page of ecoinvent (www.ecoinvent.org/documentation).
  See section: Regarding “primary zinc production from concentrate, GLO 2003” dataset.
  Estimation: Electricity consumption for electrolysis is aproximated with that consumed in aluminum electrolysis.
- inert waste, for final disposal: -2.20333e-6 kg; lognormal variance with pedigree 0.0606, pedigree (3,3,5,1,3)
  Proxy: "inert waste, 5% water" is used as a proxy for the portion of the waste fraction that is not further processed for extracting byproduct metals, but rather disposed of.
  production volume 96084 kg; = Ref('22169c42-36c3-4d77-9cf5-4e962e5dcea2', 'ProductionVolume') * ((Ref('c547b992-b172-47e1-8469-b707e558b8fd')*-1) / Ref('22169c42-36c3-4d77-9cf5-4e962e5dcea2'))
    Calculated from production volume of reference product using the relative outputs.
  properties: wet mass 1 kg, dry mass 0.995 kg, water content 0.00502513
- steam, in chemical industry: 7.52468e-5 kg; lognormal variance with pedigree 0.0606, pedigree (3,3,5,1,3)
  Modelled, based on “ISIC 2420” - pdf-document on the dedicated talk page of ecoinvent (www.ecoinvent.org/documentation).
  See section: Regarding “primary zinc production from concentrate, GLO 2003” dataset.
  properties: wet mass 1 kg, dry mass 1 kg
- molybdenite: 0.000126141 kg; lognormal variance with pedigree 0.286025, pedigree (4,5,5,2,5)
  EcoSpold01Location=GLO
  Estimation from dataset author.
  Estimated value: The amount of molybdenite concentrate is calculated assuming the same yield as for zinc concentrate to zinc. It is slightly lower than the amount of zinc concentrate, because the metal concentration is slightly higher (55% Mo vs. 53% Zn).
  properties: wet mass 1 kg, dry mass 1 kg
- heat, district or industrial, natural gas: 0.000104443 MJ; lognormal variance with pedigree 0.0606, pedigree (3,3,5,1,3)
  Modelled, based on "ISIC 2420" - pdf-document on the dedicated talk page of ecoinvent (www.ecoinvent.org/documentation).
  See section: Regarding "primary zinc production from concentrate, GLO 2003" dataset.
- heat, district or industrial, other than natural gas: 0.000381393 MJ; lognormal variance with pedigree 0.0606, pedigree (3,3,5,1,3)
  (same comment as for steam, in chemical industry)
- electricity, medium voltage: 1.44467e-5 kWh; lognormal variance with pedigree 0.2626, pedigree (3,3,5,1,5)
  (same comment as for steam, in chemical industry)
- diesel, burned in building machine: 2.88549e-6 MJ; lognormal variance with pedigree 0.0606, pedigree (3,3,5,1,3)
  Calculated value: This value stands for diesel and gasoline consumption.
- oxygen, liquid: 7.45726e-6 kg; lognormal variance with pedigree 0.0606, pedigree (3,3,5,1,3)
  (same comment as for heat, district or industrial, natural gas)
  properties: dry mass 1 kg, wet mass 1 kg
- wastewater, unpolluted: -2.68021e-6 m3; lognormal variance with pedigree 0.0606, pedigree (3,3,5,1,3)
  (same comment as for steam, in chemical industry)
  production volume 116880 m3; = Ref('22169c42-36c3-4d77-9cf5-4e962e5dcea2', 'ProductionVolume') * ((Ref('cd3c0e89-ad1c-4732-8a70-5afac4f935ce')*-1) / Ref('22169c42-36c3-4d77-9cf5-4e962e5dcea2'))
    Calculated from production volume of reference product using the relative outputs.
  properties: carbon content, fossil 0.00178991, carbon content, non-fossil 0.00178991, dry mass 0.337476 kg, water content 2962.17, wet mass 1000 kg
  note on carbon content, fossil: Assumed to be like in tap water. Bicarbonate content is 2.93 mol/m3. CO2 content is 0.1 mol/m3 (ecoinvent v2.2 report 8, Tab 93.1).

## Inputs from nature
- Water, river [natural resource, in water]: 2.68021e-6 m3; name water_river_input; lognormal variance with pedigree 0.0606, pedigree (3,3,5,1,3)
  Modelled, based on "ISIC 2420" - pdf-document on the dedicated talk page of ecoinvent (www.ecoinvent.org/documentation).
  See section: Regarding "primary zinc production from concentrate, GLO 2003" dataset.
  Modelled, based on "ISIC 2420" - pdf-document on the dedicated talk page of ecoinvent (www.ecoinvent.org/documentation).
  See section: Regarding "primary zinc production from concentrate, GLO 2003" dataset.
  property water content 9081.65; name water_content

## Emissions to nature
- Lead [air, non-urban air or from high stacks]: 7.15457e-9 kg; lognormal variance with pedigree 0.694, pedigree (3,4,5,1,1)
  Modelled, based on “ISIC 2420” - pdf-document on the dedicated talk page of ecoinvent (www.ecoinvent.org/documentation).
  See section: Regarding “primary zinc production from concentrate, GLO 2003” dataset.
  Further references:
  EEA (ed.) (2003) Primary Zinc Production (B335-1). In: EMEP / CORINAIR Emission Inventory Guidebook. February 2003 Edition Edition. European Enviornmental Agency, Online-Version under: <http://reports.eea.eu.int/technical_report_2001_3/en/en/tab_content_RLR>.
  EEA (ed.) (1999b) Primary Zinc Production (B335-1). In: EMEP / CORINAIR Emission Inventory Guidebook. 3rd edition October 2002 Update Edition. European Enviornmental Agency, Online-Version under: http://reports.eea.eu.int/ technical_report_2001_3/en/en/tab_content_RLR <http://reports.eea.eu.int/technical_report_2001_3/en/en/tab_content_RLR>.
- COD, Chemical Oxygen Demand [water, surface water]: 3.20855e-8 kg; lognormal variance with pedigree 0.1007, pedigree (3,3,5,3,3)
  (same comment as for steam, in chemical industry)
- Dioxins, measured as 2,3,7,8-tetrachlorodibenzo-p-dioxin [air, non-urban air or from high stacks]: 3.4397e-15 kg; lognormal variance with pedigree 1.37, pedigree (1,1,5,1,1)
  Estimation: The dioxin emissions are approximated with the reported emission factor of 50 μg-TEQ / t for secondary zinc production.
- Lead [water, surface water]: 2.88934e-9 kg; lognormal variance with pedigree 0.6907, pedigree (1,3,5,3,1)
  (same comment as for steam, in chemical industry)
- Arsenic [air, non-urban air or from high stacks]: 8.69555e-10 kg; lognormal variance with pedigree 0.694, pedigree (3,4,5,1,1)
  (same comment as for steam, in chemical industry)
- Copper, ion [water, surface water]: 2.75176e-10 kg; lognormal variance with pedigree 0.6907, pedigree (1,3,5,3,1)
  (same comment as for steam, in chemical industry)
- Particulates, > 2.5 um, and < 10um [air, non-urban air or from high stacks]: 2.47658e-9 kg; lognormal variance with pedigree 0.054, pedigree (3,4,5,1,1)
  (same comment as for steam, in chemical industry)
- BOD5, Biological Oxygen Demand [water, surface water]: 2.13901e-8 kg; lognormal variance with pedigree 0.1181, pedigree (3,5,5,3,3)
  (same comment as for steam, in chemical industry)
- Arsenic, ion [water, surface water]: 8.11768e-11 kg; lognormal variance with pedigree 0.6907, pedigree (1,3,5,3,1)
  (same comment as for steam, in chemical industry)
- Particulates, < 2.5 um [air, non-urban air or from high stacks]: 1.29333e-8 kg; lognormal variance with pedigree 0.354, pedigree (3,4,5,1,1)
  (same comment as for steam, in chemical industry)
- Zinc [air, non-urban air or from high stacks]: 1.43091e-7 kg; lognormal variance with pedigree 0.694, pedigree (3,4,5,1,1)
  Modelled, based on “ISIC 2420” - pdf-document on the dedicated talk page of ecoinvent (www.ecoinvent.org/documentation).
  See section: Regarding “primary zinc production from concentrate, GLO 2003” dataset.
  Further references:
  EEA (ed.) (1999b) Primary Zinc Production (B335-1). In: EMEP / CORINAIR Emission Inventory Guidebook. 3rd edition October 2002 Update Edition. European Enviornmental Agency, Online-Version under: http://reports.eea.eu.int/ technical_report_2001_3/en/en/tab_content_RLR <http://reports.eea.eu.int/technical_report_2001_3/en/en/tab_content_RLR>.
- DOC, Dissolved Organic Carbon [water, surface water]: 1.25459e-8 kg; lognormal variance with pedigree 0.1181, pedigree (3,5,5,3,3)
  (same comment as for steam, in chemical industry)
- TOC, Total Organic Carbon [water, surface water]: 1.25459e-8 kg; lognormal variance with pedigree 0.1181, pedigree (3,5,5,3,3)
  (same comment as for steam, in chemical industry)
- Mercury [water, surface water]: 1.18601e-11 kg; lognormal variance with pedigree 0.6907, pedigree (1,3,5,3,1)
  (same comment as for steam, in chemical industry)
- Cadmium, ion [water, surface water]: 2.53162e-10 kg; lognormal variance with pedigree 0.6907, pedigree (1,3,5,3,1)
  (same comment as for steam, in chemical industry)
- Zinc, ion [water, surface water]: 3.15076e-9 kg; lognormal variance with pedigree 0.6907, pedigree (1,3,5,3,1)
  (same comment as for steam, in chemical industry)
- Mercury [air, non-urban air or from high stacks]: 2.75176e-10 kg; lognormal variance with pedigree 0.694, pedigree (3,4,5,1,1)
  Modelled, based on “ISIC 2420” - pdf-document on the dedicated talk page of ecoinvent (www.ecoinvent.org/documentation).
  See section: Regarding “primary zinc production from concentrate, GLO 2003” dataset.
  Further references:
  EEA (ed.) (2003) Primary Zinc Production (B335-1). In: EMEP / CORINAIR Emission Inventory Guidebook. February 2003 Edition Edition. European Enviornmental Agency, Online-Version under: <http://reports.eea.eu.int/technical_report_2001_3/en/en/tab_content_RLR>.
- Sulfur dioxide [air, non-urban air or from high stacks]: 1.20245e-6 kg; lognormal variance with pedigree 0.054, pedigree (3,4,5,1,1)
  (same comment as for steam, in chemical industry)
- Fluoride [water, surface water]: 2.05006e-9 kg; lognormal variance with pedigree 0.0987, pedigree (1,3,5,3,3)
  (same comment as for steam, in chemical industry)
- Particulates, > 10 um [air, non-urban air or from high stacks]: 2.47658e-9 kg; lognormal variance with pedigree 0.074, pedigree (3,4,5,1,1)
  (same comment as for steam, in chemical industry)
- Water [air, unspecified]: 4.02032e-7 m3; name water_to_air_unspecified; = (water_river_input*fraction_PW_to_air); lognormal variance with pedigree 0.0807, pedigree (2,2,5,1,1)
  Calculated value based on literature values and expert opinion. See comments in the parametres' comment field.
  property fraction, origin: salt water 0; name fraction_origin_salt_water
  property carbon content, fossil 0; name C_content_fossil
  property carbon content, non-fossil 0; name C_content_non_fossil
  property fraction, origin: fresh water 1; name fraction_origin_fresh_water
  property wet mass 1000 kg; name WM
  property dry mass 0 kg; name DM
  property fraction, origin: unspecified 0; name fraction_origin_unspecified
  property water in wet mass 1000 kg; name WWM

## Sampling procedure
literature

## Extrapolations
see Technology

## Review by Bo Weidema 2012-09-28
obsolete resource allocation correction removed

## Review by Roland Hischier 2009-02-05
validated in version 1

## Review by Roland Hischier 2011-09-19
Transfer of documentation done.
