# strawberry production, in unheated greenhouse

Dataset: EcoSpold 2, unit process
Geography: CH
Time period: 2009-01-01 to 2019-12-31
Technology level: current
Classification: ISIC rev.4 ecoinvent: 0125:Growing of other tree and bush fruits and nuts
Tags: WFLDB
Scenario: Business-as-Usual
System model: Allocation at the point of substitution
Generated by: Violaine Magaud
Published in: Nemecek T. 2015
Database: ecoinvent
isCopyrightProtected: true
accessRestrictedTo: 1

## General comment
This dataset represents the production of 1 kg of strawberry. The reference flow is the average yield per ha.yr and year, from 2009 - 2012: yield (60t/ha.y) obtained under irrigated conditions (total amount of water 493 m3/ha.y). The data are representative for strawberry production in Switzerland under non-heated greenhouse conditions. Typically, greenhouses are heated from March to May as to enable a first early harvest. Greenhouses are then non-heated from May to October which results in two additional harvests. Mineral NPK fertiliser input is 288-108-384 kg/ha. No organic fertilisers are applied. Total active ingredients (a.i.) applied as pesticides amount to 27.5 kg a.i./ha.
The dataset was modelled within the project 'World Food LCA database (WFLDB)'. The aim of this project was to provide inventories of a broad variety of agricultural products and processes and to cover for each product at least 50% of the global export market.
PEF-Quality: data quality rating (DQR) = 2.0 (i.e. very good quality). This dataset refers to an average situation; for specific situations exchanges might differ substantially due to site specific parameters

## Included activities start
This activity starts with soil cultivation after the harvest of the previous crop.

## Included activities end
This activity ends with harvest and transport to the farm gate. Storage is not included.
The dataset includes all activities during a cycle, i.e. all machine operations, corresponding infrastructure, fuel use and sheds. Machine operations include: soil cultivation, fertilisation, pesticide application, harvesting, and on-farm transport. Further, direct field emissions and land use change are included. Irrigation is included, as well as greenhouses infrastructures and energy consumption when relevant. The inputs of seedlings, fertilisers and pesticides as well as packaging of fertilisers and pesticides are considered. Heavy metal uptake by the crop is considered.

## Technology
Conventional production

## Parameters
- LUC_crop_specific: 1
  This parameter allows to switch between a 'crop specific' and a 'country specific' approach when calculating the LUC of a crop. By default, the chosen approach is 'crop specific', so the value of the parameter is 1. If you want to apply a 'country specific' approach, turn the parameter to 0.
- heavyMetalUptakeSwitch: 1

## Reference product
- strawberry: 1 kg; CPC 01354: Strawberries; By-product classification allocatable product
  Yield = 60000.0 kg/ha
  production volume 1.16002e6 kg
    Source: FAOSTAT. Average, 2009-2012. Assumption: 80% open field, 15% greenhouse non heated, 5% greenhouse heated
  property price 1.81 EUR2005
    Calculated from the trade statistics for the year 2005 published by the UN (COMTRADE database, accessed 20151105) as an average of 5 biggest importers of strawberry in the world; FR, DE, CA, UK and USA. Comtrade cathegory: 81010: Strawberries, fresh.
  property carbon content 0.04617
    carbon content on a dry matter basis (reserved; not for manual entry)
  properties: dry mass 0.101 kg, carbon content, fossil 0, wet mass 1 kg, water content 8.90099, carbon content, non-fossil 0.04617, water in wet mass 0.899 kg, carbon allocation 0.00466317 kg

## Inputs from technosphere
- urea, as N: 0.000317067 kg; source Stoessel F. 2012; lognormal variance with pedigree 0.118177, pedigree (2,1,3,1,1)
  Calculated based on literature values or expert estimation: The total amount of nutrient (Stoessel et al. 2012) multiplied by the country-share of fertiliser type (IFA 2014). See supporting documentation 'WFLDB-Documentation.pdf' chapter 'Fertiliser application' for L3 and L4 data (https://ecoquery.ecoinvent.org/File/Reports).
  Corresponds to 19.0 kg N/ha
  properties: carbon content, fossil 0.2, dry mass 1 kg, wet mass 1 kg
- electricity, low voltage: 2.05 kWh; source Stoessel F. 2012; lognormal variance with pedigree 0.118177, pedigree (2,1,3,1,1)
  Literature value or expert estimation (Stoessel et al. 2012).
- transport, freight, lorry, unspecified: 0.00163073 metric ton*km
  This represent the transport of fertilizers that are directly linked to their supplying activities, to better represent the fertilizer mix of the activity. Transport distance based on US BTS Commodity Flow Surveys 1993, 1997, 2002, 2007, US Dep. Of Transportation, Bureau of Transportation Statistics. Of the total road transport, 6% is assumed to be by delivery van for goods with a large share of retail sale, and 3% for goods that are mainly sold via wholesale.
- transport, freight train: 0.00302646 metric ton*km
  This represent the transport of fertilizers that are directly linked to their supplying activities, to better represent the fertilizer mix of the activity. Transport distance based on US BTS Commodity Flow Surveys 1993, 1997, 2002, 2007, US Dep. Of Transportation, Bureau of Transportation Statistics.
- potassium sulfate, as K2O: 0.00028445 kg; source Stoessel F. 2012; lognormal variance with pedigree 0.118177, pedigree (2,1,3,1,1)
  Calculated based on literature values or expert estimation: The total amount of nutrient (Stoessel et al. 2012) multiplied by the country-share of fertiliser type (IFA 2014). See supporting documentation 'WFLDB-Documentation.pdf' chapter 'Fertiliser application' for L3 and L4 data (https://ecoquery.ecoinvent.org/File/Reports).
  Corresponds to 17.1 kg/ha
  properties: dry mass 1 kg, wet mass 1 kg
- nitrogen fertiliser, as N: 0.000317067, 0.000197583 kg (2 suppliers, which the file names only by identifier); sum of these 0.00051465 kg; source Stoessel F. 2012; lognormal variance with pedigree 0.118177, pedigree (2,1,3,1,1)
  Calculated based on literature values or expert estimation: The total amount of nutrient (Stoessel et al. 2012) multiplied by the country-share of fertiliser type (IFA 2014). See supporting documentation 'WFLDB-Documentation.pdf' chapter 'Fertiliser application' for L3 and L4 data (https://ecoquery.ecoinvent.org/File/Reports).
  Corresponds to 217 kg N/ha
  properties: dry mass 1 kg, wet mass 1 kg
- irrigation: 0.00822217 m3; source Stoessel F. 2012; lognormal variance with pedigree 0.118177, pedigree (2,1,3,1,1)
  Literature value: Total amount of water used for irrigation (Stoessel et al. 2012). See supporting documentation 'WFLDB-Documentation.pdf' chapter 'Water use for irrigation' (https://ecoquery.ecoinvent.org/File/Reports).
  properties: wet mass 1000 kg, dry mass 0.11 kg, water content 9089.91
- nitrogen fertiliser, as N: 0.000441133, 0.000197583, 0.00178383, 0.000128662 kg (4 suppliers, which the file names only by identifier); sum of these 0.00255121 kg; source Stoessel F. 2012; lognormal variance with pedigree 0.118177, pedigree (2,1,3,1,1)
  (same comment as for nitrogen fertiliser, as N)
  properties: wet mass 1 kg, dry mass 1 kg
- greenhouse, plastic walls and roof: 0.166667 m2*year; source USF 2014; lognormal variance with pedigree 0.118177, pedigree (2,1,3,1,1)
  Calculated value: 1 ha divided by the yield in kg/ha. Note: greenhouse dataset stands for 1 m2 used over 1 year
  properties: Surface 7 m2, lifetime 25 year
- mulching: 1.66667e-5 ha; lognormal variance with pedigree 0.118177, pedigree (2,1,3,1,1)
  Proxy: Similar crop and country used.
- packaging, for pesticides: 0.000915467 kg; lognormal variance with pedigree 0.0532, pedigree (4,3,3,5,4)
  Total amount of active substance/s of pesticides needed for the production of strawberry is calculated to be circa 4.58E-04 kg. Pesticide/s used in this dataset is/are: '[thio]carbamate-compound', 'acetamide-anillide-compound, unspecified', 'boric acid, anhydrous, powder', 'glyphosate', 'pyrethroid-compound', 'trichloromethane'. The total amount of active substance/s is doubled in order to account for the packaging of the dilluted product of pesticide/s that is/are applied. Therefore, 9.15E-04 kg of packaging for pesticides is justified with this exchange.
  properties: dry mass 1 kg, price 0.0642 EUR2005, carbon content, fossil 0.85714, wet mass 1 kg
- transport, tractor and trailer, agricultural: 0.002 metric ton*km; lognormal variance with pedigree 0.156439, pedigree (4,1,3,1,1)
  On-farm transport: Yield (in tonnes) multiplied by the average distance from field to farm. The distance was assumed to be 2 km (proxy).
- sowing: 1.66667e-5 ha; lognormal variance with pedigree 0.118177, pedigree (2,1,3,1,1)
  Proxy: Similar crop and country used.
- [thio]carbamate-compound: 2.85348e-7 kg; lognormal variance with pedigree 0.00784984, pedigree (2,2,3,1,1)
  Proxy: Source for total amount of pesticides: literature value or expert estimation (Stoessel et al. 2012). Active ingredient is calculated based on the ecoinvent dataset Strawberry, open field, macro tunnel ES. For calculations see supporting documentation 'WFLDB-Documentation.pdf' (https://ecoquery.ecoinvent.org/File/Reports).
  properties: dry mass 1 kg, carbon content, fossil 0.626349, wet mass 1 kg
- phosphate fertiliser, as P2O5: 0.00054545, 0.00054545 kg (2 suppliers, which the file names only by identifier); sum of these 0.0010909 kg; source Stoessel F. 2012; lognormal variance with pedigree 0.118177, pedigree (2,1,3,1,1)
  Calculated based on literature values or expert estimation: The total amount of nutrient (Stoessel et al. 2012) multiplied by the country-share of fertiliser type (IFA 2014). See supporting documentation 'WFLDB-Documentation.pdf' chapter 'Fertiliser application' for L3 and L4 data (https://ecoquery.ecoinvent.org/File/Reports).
  Corresponds to 108 kg P2O5/ha
  properties: dry mass 1 kg, wet mass 1 kg
- acetamide-anillide-compound, unspecified: 1.13713e-6 kg; lognormal variance with pedigree 0.00784984, pedigree (2,2,3,1,1)
  (same comment as for [thio]carbamate-compound)
  properties: wet mass 1 kg, carbon content, fossil 0.659175, dry mass 1 kg
- phosphate fertiliser, as P2O5: 0.00024545, 0.000463633 kg (2 suppliers, which the file names only by identifier); sum of these 0.000709083 kg; source Stoessel F. 2012; lognormal variance with pedigree 0.118177, pedigree (2,1,3,1,1)
  (same comment as for phosphate fertiliser, as P2O5)
  properties: wet mass 1 kg, dry mass 1 kg
- boric acid, anhydrous, powder: 1.07325e-5 kg; lognormal variance with pedigree 0.00784984, pedigree (2,2,3,1,1)
  (same comment as for [thio]carbamate-compound)
  properties: wet mass 1 kg, dry mass 1 kg
- packaging, for fertilisers: 0.0260472 kg; lognormal variance with pedigree 0.0532, pedigree (4,3,3,5,4)
  Total amount of active substance/s of fertilisers needed for the production of 'strawberry' is calculated to be circa 1.30E-02 kg. Fertiliser/s used in this dataset is/are: 'ammonia, liquid', 'ammonium nitrate, as N', 'ammonium sulfate, as N', 'nitrogen fertiliser, as N', 'nitrogen fertiliser, as N', 'nitrogen fertiliser, as N', 'nitrogen fertiliser, as N', 'nitrogen fertiliser, as N', 'nitrogen fertiliser, as N', 'phosphate fertiliser, as P2O5', 'phosphate fertiliser, as P2O5', 'phosphate fertiliser, as P2O5', 'phosphate fertiliser, as P2O5', 'potassium fertiliser, as K2O', 'potassium sulfate, as K2O', 'urea, as N'. The total amount of active substance/s is doubled in order to account for the packaging of the dilluted product of fertiliser/s that is/are applied. Therefore, 2.60E-02 kg of packaging for fertilisers is justified with this exchange.
  properties: price 0.0642 EUR2005, carbon content, fossil 0.825301, dry mass 1 kg, wet mass 1 kg
  note on carbon content, fossil: Considering a chemical formula (C2H4)n for polyethylene, carbon content-fossil is calculated to be 0.856286 kg of Carbon per kg of dry mass.
- trichloromethane: 0.000425893 kg; lognormal variance with pedigree 0.00784984, pedigree (2,2,3,1,1)
  (same comment as for [thio]carbamate-compound)
  properties: dry mass 1 kg, wet mass 1 kg, carbon content, fossil 0.101695
- glyphosate: 1.95485e-5 kg; lognormal variance with pedigree 0.00784984, pedigree (2,2,3,1,1)
  (same comment as for [thio]carbamate-compound)
  properties: wet mass 1 kg, carbon content, fossil 0.214286, dry mass 1 kg
- potassium fertiliser, as K2O: 0.0061155 kg; source Stoessel F. 2012; lognormal variance with pedigree 0.118177, pedigree (2,1,3,1,1)
  Calculated based on literature values or expert estimation: The total amount of nutrient (Stoessel et al. 2012) multiplied by the country-share of fertiliser type (IFA 2014). See supporting documentation 'WFLDB-Documentation.pdf' chapter 'Fertiliser application' for L3 and L4 data (https://ecoquery.ecoinvent.org/File/Reports).
  Corresponds to 367.0 kg/ha
  properties: dry mass 1 kg, wet mass 1 kg
- strawberry seedling, for planting: 0.716667 unit; source CDDL 2009; lognormal variance with pedigree 0.118177, pedigree (2,1,3,1,1)
  Literature value or expert estimation (CDDL 2009).
  properties: dry mass 0.578035 kg, wet mass 1 kg, carbon content, non-fossil 0.439481, water content 0.73
  note on carbon content, non-fossil: calculation: C-content of components according to ecoinvent report No. 15a. Source of composition: https://ndb.nal.usda.gov/ndb/search/. Unspecific seedling used as proxy.
- pyrethroid-compound: 1.37031e-7 kg; lognormal variance with pedigree 0.00784984, pedigree (2,2,3,1,1)
  (same comment as for [thio]carbamate-compound)
  properties: carbon content, fossil 0.623, wet mass 1 kg, dry mass 1 kg
- transport, freight, inland waterways, barge: 0.000511731 metric ton*km
  (same comment as for transport, freight train)
- packaging film, low density polyethylene: 0.00316667 kg; source USF 2014
  Literature value or expert estimation (Personal communication with Union Suisse Fruit, 2014). Plastic film as soil cover (PE film). Lifespan: 1 year.
  properties: carbon content, fossil 0.857143, wet mass 1 kg, dry mass 1 kg
- land use change, annual crop: 9.3e-7 ha; = 9.3e-07*LUC_crop_specific+0.0*(1-LUC_crop_specific)
  Calculated value. Land use change (LUC) combines land transformation areas calculated with the adapted 'Direct Land Use Change Assessment Tool' version 2014 developed by Blonk Consultants and the carbon losses from soil organic carbon (SOC) and vegetation (VEG) as calculated in ecoinvent v3. See 'WFLDB-Guidelines.pdf', available at https://ecoquery.ecoinvent.org/File/Reports.
- ammonia, liquid: 0.000133913 kg; source Stoessel F. 2012; lognormal variance with pedigree 0.118177, pedigree (2,1,3,1,1)
  Calculated based on literature values or expert estimation: The total amount of nutrient (Stoessel et al. 2012) multiplied by the country-share of fertiliser type (IFA 2014). See supporting documentation 'WFLDB-Documentation.pdf' chapter 'Fertiliser application' for L3 and L4 data (https://ecoquery.ecoinvent.org/File/Reports).
  Corresponds to 8.03 kg N/ha
  properties: dry mass 1 kg, wet mass 1 kg
- ammonium nitrate, as N: 0.00113038 kg; source Stoessel F. 2012; lognormal variance with pedigree 0.118177, pedigree (2,1,3,1,1)
  Calculated based on literature values or expert estimation: The total amount of nutrient (Stoessel et al. 2012) multiplied by the country-share of fertiliser type (IFA 2014). See supporting documentation 'WFLDB-Documentation.pdf' chapter 'Fertiliser application' for L3 and L4 data (https://ecoquery.ecoinvent.org/File/Reports).
  Corresponds to 67.8 kg N/ha
  properties: wet mass 1 kg, dry mass 1 kg
- ammonium sulfate, as N: 0.00017645 kg; source Stoessel F. 2012; lognormal variance with pedigree 0.118177, pedigree (2,1,3,1,1)
  Calculated based on literature values or expert estimation: The total amount of nutrient (Stoessel et al. 2012) multiplied by the country-share of fertiliser type (IFA 2014). See supporting documentation 'WFLDB-Documentation.pdf' chapter 'Fertiliser application' for L3 and L4 data (https://ecoquery.ecoinvent.org/File/Reports).
  Corresponds to 10.6 kg N/ha
  properties: wet mass 1 kg, dry mass 1 kg

## Inputs from nature
- Energy, gross calorific value, in biomass [natural resource, biotic]: 1.93717 MJ; lognormal variance with pedigree 0.00784984, pedigree (2,2,3,1,1)
- Carbon dioxide, in air [natural resource, in air]: 0.182867 kg; lognormal variance with pedigree 0.00784984, pedigree (2,2,3,1,1)
  CO2 uptake by biomass
- Transformation, from arable land, unspecified use [natural resource, land]: 0.166667 m2
  Land transformation: 1 ha divided by yield
- Transformation, to arable land, unspecified use [natural resource, land]: 0.166667 m2
  Land transformation: 1 ha divided by yield
- Occupation, annual crop [natural resource, land]: 0.167117 m2*year
  Related to the duration from harvest date of previous crop to harvest date of main crop.

## Emissions to nature
- Phosphate [water, surface water]: 1.63314e-5 kg; source Prasuhn V.  2006; lognormal variance with pedigree 0.179266, pedigree (3,2,3,1,3)
  Calculated value - Prasuhn (2006). See 'WFLDB-Guidelines.pdf', available at https://ecoquery.ecoinvent.org/File/Reports.
- Kresoxim-methyl [soil, agricultural]: 2.16883e-7 kg; lognormal variance with pedigree 0.0387216, pedigree (2,2,3,1,1)
  Calculated value - Direct emissions from pesticides 100% emitted to soil. See 'WFLDB-Guidelines.pdf', available at https://ecoquery.ecoinvent.org/File/Reports.
- Pyraclostrobin (prop) [soil, agricultural]: 2.90624e-7 kg; lognormal variance with pedigree 0.0387216, pedigree (2,2,3,1,1)
  (same comment as for Kresoxim-methyl)
- Dinitrogen monoxide [air, non-urban air or from high stacks]: 7.68411e-5 kg; source IPCC 2006; lognormal variance with pedigree 0.118664, pedigree (2,2,3,1,1)
  Calculated value - IPCC (2006). See 'WFLDB-Guidelines.pdf', available at https://ecoquery.ecoinvent.org/File/Reports.
- Glyphosate [soil, agricultural]: 1.99099e-5 kg; lognormal variance with pedigree 0.0387216, pedigree (2,2,3,1,1)
  (same comment as for Kresoxim-methyl)
- Chloropicrin [soil, agricultural]: 0.000433767 kg; lognormal variance with pedigree 0.0387216, pedigree (2,2,3,1,1)
  Calculated value - Direct emissions from pesticides 100% emitted to soil. See 'WFLDB-Guidelines.pdf', available at https://ecoquery.ecoinvent.org/File/Reports. This active ingredient is no longer registered in this specific country, but is used as a proxy
- Water [air, non-urban air or from high stacks]: 0.0074 m3; lognormal variance with pedigree 0.118177, pedigree (2,1,3,1,1)
  Calculated value - Emission calculated from water balance. See 'WFLDB-Guidelines.pdf', available at https://ecoquery.ecoinvent.org/File/Reports.
- Boron [soil, agricultural]: 1.93936e-6 kg; lognormal variance with pedigree 0.0387216, pedigree (2,2,3,1,1)
  (same comment as for Chloropicrin)
- Phosphate [water, ground-]: 5.1437e-6 kg; source Prasuhn V.  2006; lognormal variance with pedigree 0.169866, pedigree (2,2,3,1,1)
  (same comment as for Phosphate)
- Acrinathrin [soil, agricultural]: 4.06656e-8 kg; lognormal variance with pedigree 0.0387216, pedigree (2,2,3,1,1)
  (same comment as for Kresoxim-methyl)
- Spinosad [soil, agricultural]: 3.12312e-7 kg; lognormal variance with pedigree 0.0387216, pedigree (2,2,3,1,1)
  (same comment as for Kresoxim-methyl)
- Cadmium, ion [water, ground-]: 7.69509e-10 kg; source Freiermuth R.  2006; lognormal variance with pedigree 0.350938, pedigree (2,2,3,1,1)
  Calculated value - Freiermuth (2006). See 'WFLDB-Guidelines.pdf', available at https://ecoquery.ecoinvent.org/File/Reports.
- Chromium, ion [water, ground-]: 3.39751e-7 kg; source Freiermuth R.  2006; lognormal variance with pedigree 0.350938, pedigree (2,2,3,1,1)
  (same comment as for Cadmium, ion)
- Copper, ion [water, ground-]: 5.45636e-8 kg; source Freiermuth R.  2006; lognormal variance with pedigree 0.350938, pedigree (2,2,3,1,1)
  (same comment as for Cadmium, ion)
- Lead [water, ground-]: 3.75154e-9 kg; source Freiermuth R.  2006; lognormal variance with pedigree 0.350938, pedigree (2,2,3,1,1)
  (same comment as for Cadmium, ion)
- Mercury [water, ground-]: 1.7358e-11 kg; source Freiermuth R.  2006; lognormal variance with pedigree 0.350938, pedigree (2,2,3,1,1)
  (same comment as for Cadmium, ion)
- Nitrogen oxides [air, non-urban air or from high stacks]: 0.000169939 kg; source EEA 2013; lognormal variance with pedigree 0.118664, pedigree (2,2,3,1,1)
  Calculated value - EEA/EMEP (2013). See 'WFLDB-Guidelines.pdf', available at https://ecoquery.ecoinvent.org/File/Reports.
- Zinc, ion [water, ground-]: 3.56062e-7 kg; source Freiermuth R.  2006; lognormal variance with pedigree 0.350938, pedigree (2,2,3,1,1)
  (same comment as for Cadmium, ion)
- Water [water, surface water]: 0.000657333 m3; lognormal variance with pedigree 0.118177, pedigree (2,1,3,1,1)
  (same comment as for Water)
- Lambda-cyhalothrin [soil, agricultural]: 9.88988e-8 kg; lognormal variance with pedigree 0.0387216, pedigree (2,2,3,1,1)
  (same comment as for Kresoxim-methyl)
- Water [water, ground-]: 0.000164333 m3; lognormal variance with pedigree 0.118177, pedigree (2,1,3,1,1)
  (same comment as for Water)
- Nitrate [water, ground-]: 0.00141636 kg; lognormal variance with pedigree 0.169866, pedigree (2,2,3,1,1)
  Calculated value - SQCB-NO. See 'WFLDB-Guidelines.pdf', available at https://ecoquery.ecoinvent.org/File/Reports.
- Cadmium [soil, agricultural]: 1.24373e-7 kg; = 1.35034852287e-07 + ( - 1.06617e-08)*heavyMetalUptakeSwitch; source Freiermuth R.  2006
  Comment on mathematicalRelation:
  1.35034852287e-07 from Calculated value - Freiermuth (2006). See 'WFLDB-Guidelines.pdf', available at https://ecoquery.ecoinvent.org/File/Reports.
  -1.06617e-08 from Crop, default, heavy metals uptake model
  Heavy metal uptake can be excluded by setting the parameter heavyMetalUptakeSwitch to zero.
- Ammonia [air, non-urban air or from high stacks]: 0.000260663 kg; source EEA 2013; lognormal variance with pedigree 0.0387216, pedigree (2,2,3,1,1)
  Calculated value - EMEP/EEA (2013). See 'WFLDB-Guidelines.pdf', available at https://ecoquery.ecoinvent.org/File/Reports.
- Chromium [soil, agricultural]: 1.02349e-6 kg; = 1.08071980396e-06 + ( - 5.7225e-08)*heavyMetalUptakeSwitch; source Freiermuth R.  2006
  Comment on mathematicalRelation:
  1.08071980396e-06 from Calculated value - Freiermuth (2006). See 'WFLDB-Guidelines.pdf', available at https://ecoquery.ecoinvent.org/File/Reports.
  -5.7225e-08 from Crop, default, heavy metals uptake model
  Heavy metal uptake can be excluded by setting the parameter heavyMetalUptakeSwitch to zero.
- Copper [soil, agricultural]: -3.60702e-7 kg; = 3.35122745877e-07 + ( - 6.958245e-07)*heavyMetalUptakeSwitch; source Freiermuth R.  2006
  Comment on mathematicalRelation:
  -6.958245e-07 from Crop, default, heavy metals uptake model
  Heavy metal uptake can be excluded by setting the parameter heavyMetalUptakeSwitch to zero.
- Lead [soil, agricultural]: 1.25774e-7 kg; = 1.82554469122e-07 + ( - 5.678085e-08)*heavyMetalUptakeSwitch; source Freiermuth R.  2006
  Comment on mathematicalRelation:
  1.82554469122e-07 from Calculated value - Freiermuth (2006). See 'WFLDB-Guidelines.pdf', available at https://ecoquery.ecoinvent.org/File/Reports.
  -5.678085e-08 from Crop, default, heavy metals uptake model
  Heavy metal uptake can be excluded by setting the parameter heavyMetalUptakeSwitch to zero.
- Mercury [soil, agricultural]: -9.6421e-10 kg; = 3.29416963263e-09 + ( - 4.25838e-09)*heavyMetalUptakeSwitch; source Freiermuth R.  2006
  Comment on mathematicalRelation:
  -4.25838e-09 from Crop, default, heavy metals uptake model
  Heavy metal uptake can be excluded by setting the parameter heavyMetalUptakeSwitch to zero.
- Carbon dioxide, fossil [air, non-urban air or from high stacks]: 0.000746667 kg; lognormal variance with pedigree 0.00784984, pedigree (2,2,3,1,1)
  Calculated value - CO2 emissions from urea and lime. See 'WFLDB-Guidelines.pdf', available at https://ecoquery.ecoinvent.org/File/Reports.
- Nickel [soil, agricultural]: 2.34078e-7 kg; = 3.43761173005e-07 + ( - 1.09683e-07)*heavyMetalUptakeSwitch; source Freiermuth R.  2006
  Comment on mathematicalRelation:
  -1.09683e-07 from Crop, default, heavy metals uptake model
  Heavy metal uptake can be excluded by setting the parameter heavyMetalUptakeSwitch to zero.
- Zinc [soil, agricultural]: -9.73623e-7 kg; = 2.38879176035e-06 + ( - 3.362415e-06)*heavyMetalUptakeSwitch; source Freiermuth R.  2006
  Comment on mathematicalRelation:
  2.38879176035e-06 from Calculated value - Freiermuth (2006). See 'WFLDB-Guidelines.pdf', available at https://ecoquery.ecoinvent.org/File/Reports.
  Heavy metal uptake can be excluded by setting the parameter heavyMetalUptakeSwitch to zero.
- Boscalid [soil, agricultural]: 1.15816e-6 kg; lognormal variance with pedigree 0.0387216, pedigree (2,2,3,1,1)
  (same comment as for Kresoxim-methyl)

## Sampling procedure
WFLDB Methodological Guidelines for the Life Cycle Inventory of Agricultural Products in the latest version, available at: https://ecoquery.ecoinvent.org/File/Reports. Data sources: Data were categorised from level 0 (L0) to level (L4) as follows: L0 = estimate, proxy; L1 = statistical data (e.g. FAOSTAT); L2 = L1 adapted to crop and country; L3 = literature data or L1 resp. L2 data approved by experts; medium detailing (i.e. kg of total N-fertiliser); L4 = L3 data of high detailing (i.e. portion N-fertiliser types).In this dataset data were obtained for yield: L3; Fertilisers: L4; Pesticides: L1; Machinery: L0; Irrigation: L2. For information regarding the calculation of individual exchanges see supporting documentation WFLDB-Documentation.pdf

## Extrapolations
This dataset has been extrapolated from year 2012 to the year of the calculation (2019). The uncertainty has been adjusted accordingly.

## Review by Assumpció ANTON 2016-05-30
Be aware that the use of statistics in input calculations could provide some specific inputs not common for specific crops, this should be corrected if better information is available and better reflexed in DQR . Currently, I would dissent for some of good marks provided, being a revision of criteria applied advisable.

Pesticides will need to be amended periodically checking for update of pesticides' ban.
