# stone groundwood pulp production

Dataset: EcoSpold 2, unit process
Geography: RER
Time period: 1993-01-01 to 2019-12-31
Technology level: current
Classification: ISIC rev.4 ecoinvent: 1701:Manufacture of pulp, paper and paperboard
Classification: EcoSpold01Categories: paper & cardboard/pulps
Tags: ConvertedDataset
Scenario: Business-as-Usual
System model: Allocation at the point of substitution
Generated by: Roland Hischier
Published in: Hischier R. 2007
Database: ecoinvent
isCopyrightProtected: true
accessRestrictedTo: 1

## General comment
[This dataset was already contained in the ecoinvent database version 2. It was not individually updated during the transfer to ecoinvent version 3. Life Cycle Impact Assessment results may still have changed, as they are affected by changes in the supply chain, i.e. in other datasets. This dataset was generated following the ecoinvent quality guidelines for version 2. It may have been subject to central changes described in the ecoinvent version 3 change report (http://www.ecoinvent.org/database/ecoinvent-version-3/reports-of-changes/), and the results of the central updates were reviewed extensively. The changes added e.g. consistent water flows and other information throughout the database. The documentation of this dataset can be found in the ecoinvent reports of version 2, which are still available via the ecoinvent website. The change report linked above covers all central changes that were made during the conversion process.]

## Included activities end
This module includes the production of bleached stone ground wood pulp (SGW) - including transports to the pulp mill, wood handling, mechanical pulping and bleaching, drying process, energy production on-site and internal waste water treatment.

## Geography
Data from a Swiss and a German LCA study used as European average data

## Technology
Modern average technology.

## Parameters
- fraction, process water, to air: 0.15 dimensionless; name fraction_PW_to_air; lognormal variance with pedigree 0.092025, pedigree (4,4,3,2,4)
  Literature value. In case when no industry/process specific data are available, default evaporation fraction value is used. This value is 15% and is based on literature (Statistics Canada, 2007 & Shaffer, K.H., 2008, Consumptive water use in the Great Lakes Basin, USGS & Shiklomanov, 2003, World Water Resources at the Beginning of the 21st Century) and has been approved by an expert.

## Reference product
- stone groundwood pulp: 1 kg; CPC 321: Pulp, paper and paperboard; By-product classification allocatable product
  EcoSpold01Location=RER
  production volume 1.32237 kg
    This is a placeholder value that does not reflect real-world production volumes. This dataset does not currently require a real-world production volume to work in the database framework, and no actual data were collected yet. This has no negative effect on the results of the ecoinvent database. The placeholder value of this activity was scaled according to the nominal GDP of 2005 (source: United Nations, http://data.un.org/Glossary.aspx?q=GDP+%28current+US%24%29, accessed 20130726) to reflect an appropriate share of the global production volume, which is also a placeholder value.
  property price 0.286 EUR2005
    Export prices for the World+ according to: http://faostat.fao.org/site/626/DesktopDefault.aspx?PageID=626#ancor downloaded 5 May 2009; calculated as export value divided by export volume.
  property carbon content, non-fossil 0.494
    C content of dry mass is 0.494 kgC/kg dry wood (ecoinvent v2.2 report 6_IX & ecoinvent v2.2 report 9). No other C containing products in the formulation of the pulp.
  property carbon content 0.494
    carbon content on a dry matter basis (reserved; not for manual entry)
  property true value 0.286
    allocation property applied in "true value" allocation // value calculated from revenue
  properties: carbon content, fossil 0, water content 0.111111, water in wet mass 0.1 kg, wet mass 1 kg, dry mass 0.9 kg, carbon allocation 0.4446 kg

## By-products
- electricity, for reuse in municipal waste incineration only: 0 kWh; CPC 17100: Electrical energy; By-product classification allocatable product; pedigree (1,1,1,1,1)
  Net electricity generated from this waste and used in internal MSWI plant energy redistribution.
  Uncertainty: uncertainty is calculated from uncertainties in waste composition and uncertainties in energy efficiency and the uncertainty in internal energy demand
  production volume 1.19317e-5 kWh
  property true value relation 3.6; name E_el_prod_MSWI_true_value_relation
    property to calculate "true value" from
  property exergy 3.6 MJ; name E_el_prod_MSWI_exergy
    This exergy property is based on the exergy content of the product.
  property price 0.1 EUR2005; name E_el_prod_MSWI_price_EUR2005
    Estimated to be the same price as in case of electricity, medium voltage.
  property true value 1.53834e-6
    allocation property applied in "true value" allocation // value calculated from true value relation
- heat, for reuse in municipal waste incineration only: 0 MJ; CPC 17300: Steam and hot water; By-product classification allocatable product; pedigree (1,1,1,1,1)
  Net useful heat generated from this waste and used in internal MSWI plant energy redistribution.
  Uncertainty: uncertainty is calculated from uncertainties in waste composition and uncertainties in energy efficiency and the uncertainty in internal energy demand
  production volume 8.6225e-5 MJ
  property exergy 0.1842 MJ; name E_th_prod_MSWI_exergy
    This exergy property is based on the exergy content of the product.
  property true value relation 0.1842; name E_th_prod_MSWI_true_value_relation
    property to calculate "true value" from
  property price 0.0106 EUR2005; name E_th_prod_MSWI_price_EUR2005
    Average European district heat price from Ecoheatcool and Euroheat 2005-2006, Ecoheat Work package 1: The European heat market. Final report. 10.6 EUR/GJ i s the price of district heat. http://www.solarthermalworld.org/files/Ecoheatcool%20WP1%20Web.pdf?download
  property true value 5.68814e-7
    (same comment as for electricity, for reuse in municipal waste incineration only)
- zinc concentrate: 0 kg; CPC 14290: Other non-ferrous metal ores and concentrates (other than uranium or thorium ores and concentrates); By-product classification allocatable product
  Calculated value from the knowledge of the properties of both products.
  production volume 1.42528e-8 kg
  property price 0.38 EUR2005; name ByP_price_EUR2005
    Temporary price data. Calculated as 90% of purchasers price based on: Zinc content in concentrate 53%. Concentrate price per kg Zn 86.5% of refined Zn price (13.5% treatment charges according to CHR Metals Limited 2005: Dynamic cost curves. http://www.minecost.com/dynamic.pdf). 2004 zinc price from USGS (2007) Mineral commodity summaries 2007. <http://minerals.usgs.gov/minerals/pubs/mcs/2007/mcs2007.pdf> [Accessed 25 May 2010]
  property zinc content 0.53; name zinc_C_zinc_concentrate
    Zinc content on a dry matter basis. Value taken from teh "zinc mine operation" /GLO dataset.
  property dry mass 1 kg; name DM_zinc_concentrate
  property carbon content 0
    carbon content on a dry matter basis (reserved; not for manual entry)
  property true value 5.41607e-9
    allocation property applied in "true value" allocation // value calculated from revenue
  properties: wet mass 1 kg, water content 0, carbon content, non-fossil 0, carbon content, fossil 0, water in wet mass 0 kg, carbon allocation 0 kg
- iron scrap, sorted, pressed: 0 kg; By-product classification Recyclable; CPC 39310: Slag, dross, scalings and other waste from the manufacture of iron or steel; pedigree (1,1,1,1,1)
  Iron scrap recovered from this waste.
  production volume 2.87547e-6 kg
  property price 0.175 EUR2005
    Temporary price data. Calculated as 90% of purchasers price based on: 2005 import and export prices (total trades (USD) divided by total weight (kg) in biggest economies of the world: EU27, USA, Brasil, China, India, Japan and Russia) from UN Commodity Trade Statistics Database (http://data.un.org/Explorer.aspxDatabase [Accessed 2011.06.20]). Commodity: Waste or scrap, of cast iron
  property carbon content 0
    carbon content on a dry matter basis (reserved; not for manual entry)
  property true value 1.39262e-8
    allocation property applied in "true value" allocation // value calculated from revenue
  properties: water content 0, water in wet mass 0 kg, carbon content, fossil 0, dry mass 1 kg, carbon content, non-fossil 0, wet mass 1 kg, carbon allocation 0 kg

## Inputs from technosphere
- hydrogen peroxide, without water, in 50% solution state: 0.0149999 kg; lognormal variance with pedigree 0.0686, pedigree (2,5,5,1,1)
  EcoSpold01Location=RER
  Average value from range indicated in IPPC
  Uncertainty: average value from range indicated in IPPC
  properties: dry mass 1 kg, wet mass 1 kg
- pulp factory: 4.99996e-11 unit; lognormal variance with pedigree 0.448, pedigree (4,5,5,5,5)
  EcoSpold01Location=RER
  Own assumption
  Uncertainty: own assumption
- waste plastic, mixture: -0.000232998 kg; lognormal variance with pedigree 0.0413, pedigree (2,3,5,3,1)
  Average swedish data from SE-EPA
  EcoSpold01Location=CH
  Uncertainty: average swedish data from SE-EPA
  production volume 0.000233 kg
    Calculated from the production volume of stone groundwood pulp in proportion to the respective output amounts.
  properties: dry mass 0.847 kg, wet mass 1 kg, water content 0.180638, carbon content, fossil 0.747344
  note on carbon content, fossil: C content in 1 kg DM was calculated using data in Tab A.2, ecoinvent v2.2 report 13_I
- heat, district or industrial, other than natural gas: 2.4398 MJ; lognormal variance with pedigree 0.0413, pedigree (2,3,5,3,1)
  Average data from SE-EPA and 1 CH LCA study
  EcoSpold01Location=RER
  Uncertainty: average data from SE-EPA and 1 CH LCA study
- scrap steel: 0 kg; pedigree (1,1,1,1,1)
  EcoSpold01Location=CH
  Average swedish data from SE-EPA
  Uncertainty: average swedish data from SE-EPA
  production volume 0 kg
    (same comment as for waste plastic, mixture)
  properties: wet mass 1 kg, dry mass 1 kg
- waste textile, soiled: -2.40998e-5 kg; lognormal variance with pedigree 0.0413, pedigree (2,3,5,3,1)
  (same comment as for scrap steel)
  production volume 2.41e-5 kg
    (same comment as for waste plastic, mixture)
  properties: water content 0.333333, carbon content, non-fossil 0.570519, wet mass 1 kg, dry mass 0.75 kg
  note on carbon content, non-fossil: C content of 1 kg DM was calculated after data in Tab A.4, ecoinvent v2.2 report 13_I,
- sodium silicate, spray powder, 80%: 0.0199999 kg; lognormal variance with pedigree 0.0686, pedigree (2,5,5,1,1)
  (same comment as for hydrogen peroxide, without water, in 50% solution state)
  properties: wet mass 1 kg, dry mass 1 kg
- sawlog and veneer log, softwood, measured as solid wood under bark: 0 m3; pedigree (1,1,1,1,1)
  Average data from 1 CH and 1 DE LCA study
  EcoSpold01Location=NORDEL
  Uncertainty: average data from 1 CH and 1 DE LCA study
  properties: dry mass 450 kg, carbon content, non-fossil 0.494, water content 0.7, wet mass 765 kg
  note on carbon content, non-fossil: C content of dry mass is 0.494 kgC/kg dry wood (ecoinvent v2.2 report 9)
- wood ash mixture, pure: 0 kg; pedigree (1,1,1,1,1)
  (same comment as for waste plastic, mixture)
  production volume 0 kg
    (same comment as for waste plastic, mixture)
  properties: carbon content, non-fossil 0.012, dry mass 1 kg, wet mass 1 kg
- waste wood, untreated: -1.29999e-5 kg; lognormal variance with pedigree 0.0413, pedigree (2,3,5,3,1)
  (same comment as for waste plastic, mixture)
  production volume 1.3e-5 kg
    (same comment as for waste plastic, mixture)
  properties: water content 0.25, carbon content, non-fossil 0.48632, wet mass 1 kg, dry mass 0.8 kg
  note on carbon content, non-fossil: Tab A.4, ecoinvent v2.2 report 13_I. C content has been referred to 1 kg DM,
- waste graphical paper: -7.39994e-5 kg; lognormal variance with pedigree 0.0413, pedigree (2,3,5,3,1)
  (same comment as for scrap steel)
  production volume 7.4e-5 kg
    (same comment as for waste plastic, mixture)
  properties: water content 0.126126, dry mass 0.888 kg, carbon content, non-fossil 0.454955, wet mass 1 kg
- electricity, medium voltage: 1.70199 kWh; lognormal variance with pedigree 0.0413, pedigree (2,3,5,3,1)
  EcoSpold01Location=NORDEL
  Average data from SE-EPA and 1 CH LCA study
  Uncertainty: average data from SE-EPA and 1 CH LCA study
- municipal solid waste: -0.000569996 kg; lognormal variance with pedigree 0.0413, pedigree (2,3,5,3,1)
  (same comment as for waste plastic, mixture)
  production volume 0.00057 kg
    (same comment as for waste plastic, mixture)
  properties: water content 0.297017, carbon content, non-fossil 0.261655, carbon content, fossil 0.171549, dry mass 0.771 kg, wet mass 1 kg
  note on carbon content, non-fossil: MSW composition in tab 4.1, ecoinvent v2.2 report 13_I. C content referred to 1 kg DM
- EDTA, ethylenediaminetetraacetic acid: 0.00249998 kg; lognormal variance with pedigree 0.0686, pedigree (2,5,5,1,1)
  Average value from range indicated in IPPC
  EcoSpold01Location=RER
  Uncertainty: average value from range indicated in IPPC
  properties: carbon content, fossil 0.410959, dry mass 1 kg, wet mass 1 kg
- scrap steel: -2.58671e-5, -3.27025e-8 kg (2 entries); lognormal variance with pedigree 0.0413, pedigree (2,3,5,3,1)
  (same comment as for scrap steel)
  production volume 2.59e-5 kg
- sawlog and veneer log, softwood, measured as solid wood under bark: 0.00302955, 0.00014543 m3 (2 entries); lognormal variance with pedigree 0.0413, pedigree (2,3,5,3,1)
  (same comment as for sawlog and veneer log, softwood, measured as solid wood under bark)
- wood ash mixture, pure: -0.00220497, -4.50149e-5 kg (2 entries); lognormal variance with pedigree 0.0413, pedigree (2,3,5,3,1)
  (same comment as for waste plastic, mixture)
  production volume 0.00225 kg

## Inputs from nature
- Water, unspecified natural origin [natural resource, in water]: 0.0229998 m3; name water_UNO_input; lognormal variance with pedigree 0.0413, pedigree (2,3,5,3,1)
  Average swedish data from SE-EPA
  Uncertainty: average swedish data from SE-EPA

## Emissions to nature
- Phosphorus [water, surface water]: 9.99993e-6 kg; lognormal variance with pedigree 0.0813, pedigree (2,3,5,3,1)
  Average swedish data from SE-EPA
  Uncertainty: average swedish data from SE-EPA
- Water [air, unspecified]: 0.00344997 m3; name water_to_air_unspecified; = (water_UNO_input*fraction_PW_to_air); lognormal variance with pedigree 0.0807, pedigree (2,2,5,1,1)
  Calculated value based on literature values and expert opinion. See comments in the parametres' comment field.
  property fraction, origin: salt water 0; name fraction_origin_salt_water
  property fraction, origin: unspecified 1; name fraction_origin_unspecified
  property fraction, origin: fresh water 0; name fraction_origin_fresh_water
- Nitrogen oxides [air, urban air close to ground]: 0.000154999 kg; lognormal variance with pedigree 0.0813, pedigree (2,3,5,3,1)
  Average swedish data from SE-EPA
  Uncertainty: average swedish data from SE-EPA
- BOD5, Biological Oxygen Demand [water, surface water]: 0.00909993 kg; lognormal variance with pedigree 0.0813, pedigree (2,3,5,3,1)
  Average swedish data from SE-EPA
  Uncertainty: average swedish data from SE-EPA
- Nitrogen [water, surface water]: 7.99994e-5 kg; lognormal variance with pedigree 0.0813, pedigree (2,3,5,3,1)
  Average swedish data from SE-EPA
  Uncertainty: average swedish data from SE-EPA
- DOC, Dissolved Organic Carbon [water, surface water]: 0.0093703 kg; lognormal variance with pedigree 0.0813, pedigree (2,3,5,3,1)
  Calculated as equal to TOC.
  Uncertainty: average swedish data from SE-EPA
- TOC, Total Organic Carbon [water, surface water]: 0.0093703 kg; lognormal variance with pedigree 0.0813, pedigree (2,3,5,3,1)
  Calculated by default as TOC (gC) = COD/2.7 (COD measured in g O2). Should more correctly be calculated from the carbon content of the specified emissions to water.
  Uncertainty: average swedish data from SE-EPA
- COD, Chemical Oxygen Demand [water, surface water]: 0.0252998 kg; lognormal variance with pedigree 0.0813, pedigree (2,3,5,3,1)
  Average swedish data from SE-EPA
  Uncertainty: average swedish data from SE-EPA
- Water [water, unspecified]: 0.0195499 m3; name water_to_water_unspecified; = water_UNO_input*(1-fraction_PW_to_air); lognormal variance with pedigree 0.0807, pedigree (2,2,5,1,1)
  (same comment as for Water)
  property fraction, origin: unspecified 1; name fraction_origin_unspecified_Ww
  property fraction, origin: fresh water 0; name fraction_origin_fresh_water_Ww
  property fraction, origin: salt water 0; name fraction_origin_salt_water_Ww
  property dry mass 0 kg; name DM
  property carbon content, fossil 0; name C_content_fossil
  property carbon content, non-fossil 0; name C_content_non_fossil
  property water in wet mass 1000 kg; name WWM
  property wet mass 1000 kg; name WM
- Suspended solids, unspecified [water, surface water]: 0.00134999 kg; lognormal variance with pedigree 0.0813, pedigree (2,3,5,3,1)
  Average swedish data from SE-EPA
  Uncertainty: average swedish data from SE-EPA

## Review by Hans-Jörg Althaus 2003-08-29
Passed
