# treatment of used door, outer, wood-aluminium, collection for final disposal

Dataset: EcoSpold 2, unit process
Geography: CH
Time period: 2005-01-01 to 2019-12-31
Technology level: current
Classification: EcoSpold01Categories: waste management/building demolition
Classification: ISIC rev.4 ecoinvent: 3821:Treatment and disposal of non-hazardous waste
Tags: ConvertedDataset; Treatment
Scenario: Business-as-Usual
System model: Allocation at the point of substitution
Generated by: Martin Lehmann
Published in: Kellenberger D. 2007
Database: ecoinvent
isCopyrightProtected: true
accessRestrictedTo: 1

## General comment
The dataset can be applied for a standard outer door (wood-aluminium) disposal process in Switzerland.
[This dataset was already contained in the ecoinvent database version 2. It was not individually updated during the transfer to ecoinvent version 3. Life Cycle Impact Assessment results may still have changed, as they are affected by changes in the supply chain, i.e. in other datasets. This dataset was generated following the ecoinvent quality guidelines for version 2. It may have been subject to central changes described in the ecoinvent version 3 change report (http://www.ecoinvent.org/database/ecoinvent-version-3/reports-of-changes/), and the results of the central updates were reviewed extensively. The changes added e.g. consistent water flows and other information throughout the database. The documentation of this dataset can be found in the ecoinvent reports of version 2, which are still available via the ecoinvent website. The change report linked above covers all central changes that were made during the conversion process.]

## Included activities end
The dataset describes the disposal of a wood-aluminium outer door in a municipal incineration. The door frame out of steel is recycled at 100%. The rest of the materials (rest of steel parts, aluminium, rubber, plastics, mortar, paints and wood) is disposed in a municipal solid waste incineration.

## Geography
Dataset represents standard in Europe and/or Switzerland.

## Technology
The technology in this dataset represents standard incineration technology in Europe.

## Reference product
- used door, outer, wood-aluminium: -1 m2; By-product classification Waste; CPC 39: Wastes or scraps
  EcoSpold01Location=CH
  production volume 0.0336675 m2
    This is a placeholder value that does not reflect real-world production volumes. This dataset does not currently require a real-world production volume to work in the database framework, and no actual data were collected yet. This has no negative effect on the results of the ecoinvent database. The placeholder value of this activity was scaled according to the nominal GDP of 2005 (source: United Nations, http://data.un.org/Glossary.aspx?q=GDP+%28current+US%24%29, accessed 20130726) to reflect an appropriate share of the global production volume, which is also a placeholder value.
  property price 0 EUR2005
    Waste products are assigned a price of zero as they are assumed to require further treatment.
  property carbon content 0.301526
    carbon content on a dry matter basis (reserved; not for manual entry)
  properties: water in wet mass 1.94 kg, carbon content, non-fossil 0.275711, carbon content, fossil 0.025815, dry mass 36.86 kg, water content 0.0526316, wet mass 38.8 kg, carbon allocation 11.1142 kg

## By-products
- iron scrap, unsorted: 0 kg; source European Aluminium Association 2008; CPC 39310: Slag, dross, scalings and other waste from the manufacture of iron or steel; By-product classification Recyclable; pedigree (1,1,1,1,1)
  property price 0.149 EUR2005; name ironScrapAmount_price_EUR2005
    Temporary price data. Calculated as 90% of purchasers price based on: estimated at 85% of sorted scrap
  property carbon content 0
    carbon content on a dry matter basis (reserved; not for manual entry)
  properties: water in wet mass 0 kg, water content 0, carbon content, fossil 0, carbon content, non-fossil 0, dry mass 1 kg, wet mass 1 kg, carbon allocation 0 kg
- aluminium oxide, non-metallurgical: 0 kg; source European Aluminium Association 2008; CPC 41432: Alumina (aluminium oxide), except artificial corundum; By-product classification allocatable product; CAS 1344-28-1; pedigree (1,1,1,1,1)
  property carbon content, non-fossil 0; name C_content_non_fossil
  property price 0.28 EUR2005; name Al2O3Amount_price_EUR2005
    From UN trade database. http://data.un.org/ Import data from the largest economies of the world are used (Brazil, India, USA, China, Japan and EU-27).
  property dry mass 1 kg; name DM
  property water content 0; name water_content
  property wet mass 1 kg; name WM
  property water in wet mass 0 kg; name WWM
  property carbon content, fossil 0; name C_content_fossil
  property carbon content 0
    carbon content on a dry matter basis (reserved; not for manual entry)
  properties: carbon allocation 0 kg
- aluminium, cast alloy: 0 kg; source European Aluminium Association 2008; By-product classification allocatable product; CPC 41431: Unwrought aluminium; pedigree (1,1,1,1,1)
  EcoSpold01Location=RER
  property price 1.3 EUR2005; name castAlloyAmount_price_EUR2005
    Temporary price data. Calculated as 90% of purchasers price based on: Source: London Metal Exchange, Aluminium alloy price for 2005
  property carbon content 0
    carbon content on a dry matter basis (reserved; not for manual entry)
  properties: water in wet mass 0 kg, carbon content, non-fossil 0, water content 0, dry mass 1 kg, carbon content, fossil 0, wet mass 1 kg, carbon allocation 0 kg
- heat, for reuse in municipal waste incineration only: 0 MJ; CPC 17300: Steam and hot water; By-product classification allocatable product; pedigree (1,1,1,1,1)
  Net electricity generated from this waste and used in internal MSWI plant energy redistribution.
  Uncertainty: uncertainty is calculated from uncertainties in waste composition and uncertainties in energy efficiency and the uncertainty in internal energy demand
  property exergy 0.1842 MJ; name E_th_prod_MSWI_exergy
    This exergy property is based on the exergy content of the product.
  property true value relation 0.1842; name E_th_prod_MSWI_true_value_relation
    property to calculate "true value" from
  property price 0.0106 EUR2005; name E_th_prod_MSWI_price_EUR2005
    Average European district heat price from Ecoheatcool and Euroheat 2005-2006, Ecoheat Work package 1: The European heat market. Final report. 10.6 EUR/GJ i s the price of district heat. http://www.solarthermalworld.org/files/Ecoheatcool%20WP1%20Web.pdf?download
- electricity, for reuse in municipal waste incineration only: 0 kWh; CPC 17100: Electrical energy; By-product classification allocatable product; pedigree (1,1,1,1,1)
  (same comment as for heat, for reuse in municipal waste incineration only)
  property exergy 3.6 MJ; name E_el_prod_MSWI_exergy
    This exergy property is based on the exergy content of the product.
  property true value relation 3.6; name E_el_prod_MSWI_true_value_relation
    property to calculate "true value" from
  property price 0.1 EUR2005; name E_el_prod_MSWI_price_EUR2005
    Estimated to be the same price as in case of electricity, medium voltage.
- aluminium, wrought alloy: 0 kg; source European Aluminium Association 2008; By-product classification allocatable product; CPC 4153: Semi-finished products of aluminium or aluminium alloys; pedigree (1,1,1,1,1)
  property price 1.44 EUR2005; name secondaryAluminiumOutput_price_EUR2005
    Estimated based on literature values and expert judgement. Aluminium ccast alloys are about 90% of the price of aluminium wrought alloys.
  property carbon content 0
    carbon content on a dry matter basis (reserved; not for manual entry)
  properties: wet mass 1 kg, water content 0, carbon content, fossil 0, water in wet mass 0 kg, carbon content, non-fossil 0, dry mass 1 kg, carbon allocation 0 kg
- zinc concentrate: 0 kg; CPC 14290: Other non-ferrous metal ores and concentrates (other than uranium or thorium ores and concentrates); By-product classification allocatable product
  Calculated value from the knowledge of the properties of both products.
  property price 0.38 EUR2005; name ByP_price_EUR2005
    Temporary price data. Calculated as 90% of purchasers price based on: Zinc content in concentrate 53%. Concentrate price per kg Zn 86.5% of refined Zn price (13.5% treatment charges according to CHR Metals Limited 2005: Dynamic cost curves. http://www.minecost.com/dynamic.pdf). 2004 zinc price from USGS (2007) Mineral commodity summaries 2007. <http://minerals.usgs.gov/minerals/pubs/mcs/2007/mcs2007.pdf> [Accessed 25 May 2010]
  property zinc content 0.53; name zinc_C_zinc_concentrate
    Zinc content on a dry matter basis. Value taken from teh "zinc mine operation" /GLO dataset.
  property dry mass 1 kg; name DM_zinc_concentrate
  property carbon content 0
    carbon content on a dry matter basis (reserved; not for manual entry)
  properties: wet mass 1 kg, water content 0, carbon content, non-fossil 0, carbon content, fossil 0, water in wet mass 0 kg, carbon allocation 0 kg
- iron scrap, sorted, pressed: 0 kg; By-product classification Recyclable; CPC 39310: Slag, dross, scalings and other waste from the manufacture of iron or steel; pedigree (1,1,1,1,1)
  Iron scrap recovered from this waste.
  Uncertainty: uncertainty calculated from uncertainty in waste composition, uncertainty of share of recyclable metal, uncertainty of transfer coefficient to bottom ash, uncertainty of the efficiency of scrap removal in MSWI plant.
  property price 0.175 EUR2005
    Temporary price data. Calculated as 90% of purchasers price based on: 2005 import and export prices (total trades (USD) divided by total weight (kg) in biggest economies of the world: EU27, USA, Brasil, China, India, Japan and Russia) from UN Commodity Trade Statistics Database (http://data.un.org/Explorer.aspxDatabase [Accessed 2011.06.20]). Commodity: Waste or scrap, of cast iron
  property carbon content 0
    carbon content on a dry matter basis (reserved; not for manual entry)
  properties: wet mass 1 kg, water in wet mass 0 kg, carbon content, non-fossil 0, carbon content, fossil 0, dry mass 1 kg, water content 0, carbon allocation 0 kg

## Inputs from technosphere
All rows: lognormal variance with pedigree 0.0507, pedigree (1,3,5,3,1)
- waste emulsion paint: -0.262 kg
  activityLink introduced to establish a direct link to the corresponding regional supply of this product
  EcoSpold01Location=CH
  production volume 0.0088209 kg; = (Ref('2ef17046-3d99-4451-b500-d737bdb5e047')*-1)* Ref('a643020c-aaa9-4089-94bc-20d3b12c875b', 'ProductionVolume')/ABS( Ref('a643020c-aaa9-4089-94bc-20d3b12c875b'))
    Calculated from the production volume of used door, outer, wood-aluminium in proportion to the respective output amounts.
  properties: wet mass 1 kg, carbon content, fossil 0.27, dry mass 1 kg
  note on carbon content, fossil: Tab A.4, ecoinvent v2.2 report 13_I. C content has been calculated after data in the tables, and then referred to 1 kg DM
- scrap aluminium: -2.85 kg
  EcoSpold01Location=CH
  production volume 0.0959525 kg; = (Ref('ba593605-e9d1-40dd-abac-56a33ad633c8')*-1)* Ref('a643020c-aaa9-4089-94bc-20d3b12c875b', 'ProductionVolume')/ABS( Ref('a643020c-aaa9-4089-94bc-20d3b12c875b'))
    (same comment as for waste emulsion paint)
  properties: dry mass 1 kg, wet mass 1 kg
- scrap steel: -0.475 kg
  EcoSpold01Location=CH
  activityLink introduced to establish a direct link to the corresponding regional supply of this product
  production volume 0.0159921 kg; = (Ref('b84350cb-856d-4bc4-964a-3a04bf486e06')*-1)* Ref('a643020c-aaa9-4089-94bc-20d3b12c875b', 'ProductionVolume')/ABS( Ref('a643020c-aaa9-4089-94bc-20d3b12c875b'))
    (same comment as for waste emulsion paint)
  properties: wet mass 1 kg, dry mass 1 kg
- waste rubber, unspecified: -0.312 kg
  EcoSpold01Location=CH
  production volume 0.0105043 kg; = (Ref('23c27c2e-96f4-4a7d-84a9-fafcd25aeb71')*-1)* Ref('a643020c-aaa9-4089-94bc-20d3b12c875b', 'ProductionVolume')/ABS( Ref('a643020c-aaa9-4089-94bc-20d3b12c875b'))
    (same comment as for waste emulsion paint)
  properties: dry mass 1 kg, carbon content, fossil 0.853, wet mass 1 kg
- waste plastic, mixture: -0.114 kg
  EcoSpold01Location=CH
  production volume 0.0038381 kg; = (Ref('4bf663f9-5ba1-4fd5-9d8f-2afd8744f545')*-1)* Ref('a643020c-aaa9-4089-94bc-20d3b12c875b', 'ProductionVolume')/ABS( Ref('a643020c-aaa9-4089-94bc-20d3b12c875b'))
    (same comment as for waste emulsion paint)
  properties: carbon content, fossil 0.747344, wet mass 1 kg, water content 0.180638, dry mass 0.847 kg
  note on carbon content, fossil: C content in 1 kg DM was calculated using data in Tab A.2, ecoinvent v2.2 report 13_I
- waste wood, untreated: -24.3 kg
  EcoSpold01Location=CH
  production volume 0.818121 kg; = (Ref('5ef4a8c7-24d4-402d-bd5c-25178ed8f0ea')*-1)* Ref('a643020c-aaa9-4089-94bc-20d3b12c875b', 'ProductionVolume')/ABS( Ref('a643020c-aaa9-4089-94bc-20d3b12c875b'))
    (same comment as for waste emulsion paint)
  properties: wet mass 1 kg, carbon content, non-fossil 0.48632, dry mass 0.8 kg, water content 0.25
  note on carbon content, non-fossil: Tab A.4, ecoinvent v2.2 report 13_I. C content has been referred to 1 kg DM,
- waste mineral plaster: -50 kg
  EcoSpold01Location=CH
  production volume 1.68338 kg; = (Ref('ae4c4b88-e1ea-4746-ac80-95fa7c7ddde5')*-1)* Ref('a643020c-aaa9-4089-94bc-20d3b12c875b', 'ProductionVolume')/ABS( Ref('a643020c-aaa9-4089-94bc-20d3b12c875b'))
    (same comment as for waste emulsion paint)
  properties: dry mass 1 kg, wet mass 1 kg

## Sampling procedure
Calculation from waste composition

## Extrapolations
This dataset has been extrapolated from year 2005 to the year of the calculation (2019). The uncertainty has been adjusted accordingly.

## Review by Rolf Frischknecht 2007-11-07
passed
