# treatment of municipal solid waste, incineration

Dataset: EcoSpold 2, unit process
Geography: CA-NS
Time period: 2006-01-01 to 2019-12-31
Technology level: current
Classification: ISIC rev.4 ecoinvent: 3821:Treatment and disposal of non-hazardous waste
Synonyms: municipal waste incineration; Siedlungsabfallverbrennung; Kehrichtverbrennung
Scenario: Business-as-Usual
System model: Allocation at the point of substitution
Share of production covered: 1.8 %
Generated by: Karin Treyer
Published in: Doka G. 2013
Database: ecoinvent
isCopyrightProtected: true
accessRestrictedTo: 1

## General comment
This dataset represents the activity of waste disposal of municipal solid waste in a municipal solid waste incinerator (MSWI) // Recommended use of this dataset: For average municipal/communal waste mixture. Not suitable to represent any single specific waste material, like plastics, paper, cardboard. If your waste is a specific mixture of waste materials, inventory the respective waste materials individually. // Inventoried waste contains 92.8% average municipal solid waste, burnable part; 7.23% average municipal solid waste, unburnable (inert) part; . // Waste composition (wet, in ppm): upper heating value 13.05 MJ/kg; lower heating value 11.7 MJ/kg; H2O 225260; O 261060; H 43105; C 338960; S 1532.3; N 3206.1; P 757.42; B 7.3826; Cl 6670; Br 129.32; F 366.39; I 0.012418; Ag 0.73279; As 1.4061; Ba 152.96; Cd 8.0053; Co 1.3807; Cr 139.58; Cu 930.87; Hg 0.65684; Mn 266.19; Mo 2.0065; Ni 52.342; Pb 413.61; Sb 53.368; Se 0.3281; Sn 99.553; V 9.4572; Zn 1127.9; Be 470.85; Sc n.a.; Sr n.a.; Ti 2616.4; Tl n.a.; W n.a.; Si 49786; Fe 23628; Ca 18346; Al 11395; K 2132.7; Mg 2568.9; Na 4741.6; // Share of carbon in waste that is biogenic 61.1%. // Share of metals in waste not oxidised and bulk-recyclable (exclude very small or thin parts) Iron: 72.06%; Alu: 38.71%; Copper: 45.44%. // One kg of this waste produces 0.2221 kg of slag and 0.02224 kg of residues, which are landfilled. Additional solidification with 0.008896 kg of cement. // Net energy production: 1.39MJ/kg electric energy and 2.85MJ/kg thermal energy. // Recovery of metal scrap to recycling: 9.7909g iron scrap, 1.2162g aluminium scrap, 0.12319g copper scrap.

## Included activities start
waste incineration from waste reception gate and delivery into waste bunker at incinerator plant site (without transports to the incinerator)

## Included activities end
Waste-specific short-term emissions to water from leachate. Long-term emissions from landfill to ground water.

## Geography
Specific to the technology mix encountered in Switzerland in 2010. Well applicable to modern incineration practices in Europe, North America or Japan.

## Technology
average Swiss MSWI plants in 2010 (grate incinerators) with electrostatic precipitator for fly ash (ESP), wet flue gas scrubber and 25% SNCR , 42.77% SCR-high dust , 32.68% SCR-low dust -DeNOx facilities and 0% without Denox (weighted according to mass of burnt waste, representing Swiss average). Efficiency of iron scrap separation from slag : 58%. Efficiency of non-ferrous scrap separation from slag : 31%. Gross electric efficiency technology mix 15.84% and Gross thermal efficiency technology mix 28.51%

## Time period
Waste composition as given in literature reference, theoretical data or other source. Transfer coefficients for modern MSWI.

## Reference product
- municipal solid waste: -1 kg; CPC 39910: Municipal waste; By-product classification Waste
  Main reference product of this activity (supply of disposal service).
  production volume 0 kg
    Calculated value/estimation. The amount of electricity produced in municipal solid waste incineration plants and supplied to the public electricity grid is known from electricity statistics. The amount of waste treated is estimated based on this electricity amount.
  property price 0 EUR2005
    Waste products are assigned a price of zero as they are assumed to require further treatment.
  property carbon content 0.433204
    carbon content on a dry matter basis (reserved; not for manual entry)
  properties: carbon content, non-fossil 0.261655, water in wet mass 0.229 kg, carbon content, fossil 0.171549, wet mass 1 kg, dry mass 0.771 kg, water content 0.297017, carbon allocation 0.334 kg

## By-products
- iron scrap, sorted, pressed: 0 kg; By-product classification Recyclable; CPC 39310: Slag, dross, scalings and other waste from the manufacture of iron or steel; pedigree (1,1,1,1,1)
  Iron scrap recovered from this waste.
  Uncertainty: uncertainty calculated from uncertainty in waste composition, uncertainty of share of recyclable metal, uncertainty of transfer coefficient to bottom ash, uncertainty of the efficiency of scrap removal in MSWI plant.
  production volume 0 kg
    calculated in proportion to reference product waste input to incinerator
  property price 0.175 EUR2005
    Temporary price data. Calculated as 90% of purchasers price based on: 2005 import and export prices (total trades (USD) divided by total weight (kg) in biggest economies of the world: EU27, USA, Brasil, China, India, Japan and Russia) from UN Commodity Trade Statistics Database (http://data.un.org/Explorer.aspxDatabase [Accessed 2011.06.20]). Commodity: Waste or scrap, of cast iron
  property carbon content 0
    carbon content on a dry matter basis (reserved; not for manual entry)
  properties: water in wet mass 0 kg, dry mass 1 kg, carbon content, non-fossil 0, wet mass 1 kg, water content 0, carbon content, fossil 0, carbon allocation 0 kg
- heat, for reuse in municipal waste incineration only: 0 MJ; name E_th_prod_MSWI; CPC 17300: Steam and hot water; By-product classification allocatable product; pedigree (4,5,5,3,4)
  Based on literarure data, the majority of MSW in Canada is landfilled with only 5% of them actually incinerated. Canada has 14 incineration plants where not all of them generate energy out of their processes. Additionally, statistical data from electricity production do not quote electricity production from MSWI plants. Due to that information the amount of energy produced in MSWI in Canada is neglected and thus this amount is set to 0.
  Literature: Human Activity and the Environment 2012 has been prepared by the Environment Accounts and Statistics Division under the direction of Robert Smith (Director) and Doug Trant (Chief). Michelle Tait was the editor and project
  manager and Iman Mustapha managed dissemination and production.
  State of Waste Management in Canada, Prepared for: Canadian Council of Ministers of Environment, 2014, Prepared by: Giroux Environmental Consulting.
  Uncertainty: uncertainty is calculated from uncertainties in waste composition and uncertainties in energy efficiency and the uncertainty in internal energy demand
  production volume 0 MJ
    calculated in proportion to reference product waste input to incinerator
  property exergy 0.1842 MJ; name E_th_prod_MSWI_exergy
    This exergy property is based on the exergy content of the product.
  property true value relation 0.1842; name E_th_prod_MSWI_true_value_relation
    property to calculate "true value" from
  property price 0.0106 EUR2005; name E_th_prod_MSWI_price_EUR2005
    Average European district heat price from Ecoheatcool and Euroheat 2005-2006, Ecoheat Work package 1: The European heat market. Final report. 10.6 EUR/GJ i s the price of district heat. http://www.solarthermalworld.org/files/Ecoheatcool%20WP1%20Web.pdf?download
- electricity, for reuse in municipal waste incineration only: 0 kWh; name E_el_prod_MSWI; CPC 17100: Electrical energy; By-product classification allocatable product; pedigree (4,5,5,3,4)
  (same comment as for heat, for reuse in municipal waste incineration only)
  production volume 0 kWh
    Literature value, valid for 2008. Value for electricity from municipal solid waste incineration which is supplied to the public grid.
    This volume has been calculated using the total production volume in Canada and split by provinces using installed power or power generated per province (StatCan, 2007).
    StatCan (2007) Electric Power Generation, Transmission and Distribution
    In this value, electricity production from municipal waste and industrial waste is taken into account.
    (Net = gross production minus direct electricity use needed for electricity production at the power plant)
  property true value relation 3.6; name E_el_prod_MSWI_true_value_relation
    property to calculate "true value" from
  property price 0.1 EUR2005; name E_el_prod_MSWI_price_EUR2005
    Estimated to be the same price as in case of electricity, medium voltage.
  property exergy 3.6 MJ; name E_el_prod_MSWI_exergy
    This exergy property is based on the exergy content of the product.
- iron scrap, unsorted: 0 kg; source European Aluminium Association 2008; CPC 39310: Slag, dross, scalings and other waste from the manufacture of iron or steel; By-product classification Recyclable; pedigree (1,1,1,1,1)
  property price 0.149 EUR2005; name ironScrapAmount_price_EUR2005
    Temporary price data. Calculated as 90% of purchasers price based on: estimated at 85% of sorted scrap
  property carbon content 0
    carbon content on a dry matter basis (reserved; not for manual entry)
  properties: water in wet mass 0 kg, water content 0, carbon content, fossil 0, carbon content, non-fossil 0, dry mass 1 kg, wet mass 1 kg, carbon allocation 0 kg
- aluminium oxide, non-metallurgical: 0 kg; source European Aluminium Association 2008; CPC 41432: Alumina (aluminium oxide), except artificial corundum; By-product classification allocatable product; CAS 1344-28-1; pedigree (1,1,1,1,1)
  property carbon content, non-fossil 0; name C_content_non_fossil
  property price 0.28 EUR2005; name Al2O3Amount_price_EUR2005
    From UN trade database. http://data.un.org/ Import data from the largest economies of the world are used (Brazil, India, USA, China, Japan and EU-27).
  property dry mass 1 kg; name DM
  property water content 0; name water_content
  property wet mass 1 kg; name WM
  property water in wet mass 0 kg; name WWM
  property carbon content, fossil 0; name C_content_fossil
  property carbon content 0
    carbon content on a dry matter basis (reserved; not for manual entry)
  properties: carbon allocation 0 kg
- aluminium, cast alloy: 0 kg; source European Aluminium Association 2008; By-product classification allocatable product; CPC 41431: Unwrought aluminium; pedigree (1,1,1,1,1)
  EcoSpold01Location=RER
  property price 1.3 EUR2005; name castAlloyAmount_price_EUR2005
    Temporary price data. Calculated as 90% of purchasers price based on: Source: London Metal Exchange, Aluminium alloy price for 2005
  property carbon content 0
    carbon content on a dry matter basis (reserved; not for manual entry)
  properties: water in wet mass 0 kg, carbon content, non-fossil 0, water content 0, dry mass 1 kg, carbon content, fossil 0, wet mass 1 kg, carbon allocation 0 kg
- aluminium, wrought alloy: 0 kg; source European Aluminium Association 2008; By-product classification allocatable product; CPC 4153: Semi-finished products of aluminium or aluminium alloys; pedigree (1,1,1,1,1)
  property price 1.44 EUR2005; name secondaryAluminiumOutput_price_EUR2005
    Estimated based on literature values and expert judgement. Aluminium ccast alloys are about 90% of the price of aluminium wrought alloys.
  property carbon content 0
    carbon content on a dry matter basis (reserved; not for manual entry)
  properties: wet mass 1 kg, water content 0, carbon content, fossil 0, water in wet mass 0 kg, carbon content, non-fossil 0, dry mass 1 kg, carbon allocation 0 kg
- copper: 0 kg; source Rentz O. 1999; By-product classification allocatable product; CPC 41413: Refined copper and copper alloys, unwrought; master alloys of copper
  Literature value. Copper uses: Before end-use copper is manufactured into semi fabricated products, such as shapes and ingots (known as 'semis'). These manufacturing processes are subdivided into hot working, cold working and, if necessary, process annealing. Few of the semis are ready for use as such. They more typically travel to first-stage manufacturers, who make metal rods, wire, and casting, and then to component manufacturers who produce such things as motors, valves, and insulated cables The components in turn are incorporated by final-stage manufacturers into a variety of finished products - automobiles, commercial buildings, residential housing, and so forth. These uses account for about 79% of the world-wide consumption of copper.
  property price 5.52 EUR2005
    Literature value (http://www.economist.com/news/business/21576714-mining-industry-has-enriched-chile-its-future-precarious-copper-solution). Average price between 20015 and 2013.
  property carbon content 0
    carbon content on a dry matter basis (reserved; not for manual entry)
  properties: dry mass 1 kg, water in wet mass 0 kg, wet mass 1 kg, carbon content, non-fossil 0, water content 0, carbon content, fossil 0, carbon allocation 0 kg
- zinc concentrate: 0 kg; CPC 14290: Other non-ferrous metal ores and concentrates (other than uranium or thorium ores and concentrates); By-product classification allocatable product
  Calculated value from the knowledge of the properties of both products.
  property price 0.38 EUR2005; name ByP_price_EUR2005
    Temporary price data. Calculated as 90% of purchasers price based on: Zinc content in concentrate 53%. Concentrate price per kg Zn 86.5% of refined Zn price (13.5% treatment charges according to CHR Metals Limited 2005: Dynamic cost curves. http://www.minecost.com/dynamic.pdf). 2004 zinc price from USGS (2007) Mineral commodity summaries 2007. <http://minerals.usgs.gov/minerals/pubs/mcs/2007/mcs2007.pdf> [Accessed 25 May 2010]
  property zinc content 0.53; name zinc_C_zinc_concentrate
    Zinc content on a dry matter basis. Value taken from teh "zinc mine operation" /GLO dataset.
  property dry mass 1 kg; name DM_zinc_concentrate
  property carbon content 0
    carbon content on a dry matter basis (reserved; not for manual entry)
  properties: wet mass 1 kg, water content 0, carbon content, non-fossil 0, carbon content, fossil 0, water in wet mass 0 kg, carbon allocation 0 kg

## Inputs from technosphere
- slag landfill: 3.9215e-10 unit; lognormal variance with pedigree 0.026077, pedigree (1,1,3,1,1)
  Landfill infrastructure required for landfilling of bottom ash.
  Uncertainty: uncertainty is calculated from uncertainties in waste composition and transfer coefficients in incinerator
- heat, district or industrial, natural gas: 0.13071 MJ; lognormal variance with pedigree 0.67077, pedigree (1,1,3,1,1)
  Input to DeNOx stage, to heat up flue gas in low-dust SCR.
  Uncertainty: uncertainty calculated from uncertainty in average DeNOx input, uncertainty in the share of thermal NOx, uncertainty of nitrogen content in average municipal waste and the uncertainty in nitrogen content in *this* waste.
- residual material landfill: 4.6333e-11 unit; lognormal variance with pedigree 0.021969, pedigree (1,1,3,1,1)
  Landfill infrastructure required for landfilling of incineration residues.
  Uncertainty: uncertainty is calculated from uncertainties in waste composition and transfer coefficients in incinerator
- chemical, organic: 1.284e-5 kg; lognormal variance with pedigree 1.4029, pedigree (1,1,3,1,1)
  Auxilliary inputs for the wastewater treatment stage of the incinerator plant. Proxy for (pure) Trisodium-trimercapto-s-triazine (CAS 17766-26-6), used as 15% diluted solution, aka TMT15.
  Uncertainty: uncertainty calculated from uncertainty in average TMT15 input, of transfer coefficients in the incinerator, and the uncertainty of the waste composition of this waste
  properties: wet mass 1 kg, carbon content, fossil 0.628, dry mass 1 kg
- municipal waste incineration facility: 2.5e-10 unit
  Demands per kilogram waste.
- process-specific burdens, residual material landfill: 0.02224 kg; lognormal variance with pedigree 0.021969, pedigree (1,1,3,1,1)
  Mass-specific expenditures required for landfilling of incineration residues.
  Uncertainty: uncertainty is calculated from uncertainties in waste composition and transfer coefficients in incinerator
- chromium oxide, flakes: 8.9376e-7 kg; lognormal variance with pedigree 1.012, pedigree (1,1,3,1,1)
  Input to DeNOx stage.
  Uncertainty: uncertainty calculated from uncertainty in average DeNOx input, uncertainty in the share of thermal NOx, uncertainty of nitrogen content in average municipal waste and the uncertainty in nitrogen content in *this* waste.
  properties: dry mass 1 kg, wet mass 1 kg
- titanium dioxide: 4.3794e-5 kg; lognormal variance with pedigree 1.012, pedigree (1,1,3,1,1)
  Input to DeNOx stage (TiO2 catalyst carrier)
  Uncertainty: uncertainty calculated from uncertainty in average DeNOx input, uncertainty in the share of thermal NOx, uncertainty of nitrogen content in average municipal waste and the uncertainty in nitrogen content in *this* waste.
  properties: dry mass 1 kg, wet mass 1 kg
- chemical, inorganic: 0.000218 kg; lognormal variance with pedigree 0.27728, pedigree (1,1,3,1,1)
  Auxilliary inputs for the wastewater treatment stage of the incinerator plant. Proxy for Polyelectrolyte.
  Uncertainty: uncertainty calculated from uncertainty in average Polyelectrolyte input, of transfer coefficients in the incinerator, and the uncertainty of the waste composition of this waste
  properties: dry mass 1 kg, wet mass 1 kg, carbon content, fossil 0.003
- cement, unspecified: 0.008896 kg; lognormal variance with pedigree 0.031053, pedigree (1,1,3,1,1)
  Cement required for solidification of landfilled residual material.
  Uncertainty: Uncertainty calculated from uncertainty of the waste composition of this waste, of transfer coefficients in the incinerator and of the solidification recipe.
  properties: dry mass 1 kg, wet mass 1 kg
- iron (III) chloride, without water, in 40% solution state: 5.96e-5 kg; lognormal variance with pedigree 0.23923, pedigree (1,1,3,1,1)
  Auxilliary inputs for the wastewater treatment stage of the incinerator plant.
  Uncertainty: uncertainty calculated from uncertainty in average FeCl3 input, of transfer coefficients in the incinerator, and the uncertainty of the waste composition of this waste
  properties: dry mass 1 kg, wet mass 1 kg
- transport, freight, lorry, unspecified: 0.0097129 metric ton*km; lognormal variance with pedigree 0.022083, pedigree (1,1,3,1,1)
  Transport services to transport incineration residues to landfills.
  Uncertainty: uncertainty calculated from uncertainty of the waste composition of this waste, uncertainty of transfer coefficients and the uncertainty in generic transportation distances
- water, decarbonised: 1.39 kg; lognormal variance with pedigree 0.23923, pedigree (1,1,3,1,1)
  Incinerator process water used in flue gas scrubber stage.
  Uncertainty: uncertainty calculated from uncertainty in average water input, and the uncertainty of the waste composition of this waste
  properties: wet mass 1 kg
- aluminium scrap, post-consumer, prepared for melting: -0.0012162 kg; lognormal variance with pedigree 0.3638, pedigree (1,1,3,1,1)
  Aluminium scrap recovered from this waste.
  Uncertainty: uncertainty calculated from uncertainty in waste composition, uncertainty of share of recyclable metal, uncertainty of transfer coefficient to bottom ash, uncertainty of the efficiency of scrap removal in MSWI plant.
  production volume 0 kg; = (Ref('fe3bf381-fa09-41c4-964f-abfa11000dbf')*-1)/ Ref('fe3bf381-fa09-41c4-964f-abfa11000dc5')* Ref('fe3bf381-fa09-41c4-964f-abfa11000dc5', 'ProductionVolume')*(-1)
    calculated in proportion to reference product waste input to incinerator
  properties: wet mass 1 kg, dry mass 1 kg, price 0.806 EUR2005
- copper scrap, sorted, pressed: -0.00012319 kg; lognormal variance with pedigree 0.67892, pedigree (1,1,3,1,1)
  Copper scrap recovered from this waste.
  Uncertainty: uncertainty calculated from uncertainty in waste composition, uncertainty of share of recyclable metal, uncertainty of transfer coefficient to bottom ash, uncertainty of the efficiency of scrap removal in MSWI plant.
  production volume 0 kg; = (Ref('fe3bf381-fa09-41c4-964f-abfa11000dc2')*-1)/ Ref('fe3bf381-fa09-41c4-964f-abfa11000dc5')* Ref('fe3bf381-fa09-41c4-964f-abfa11000dc5', 'ProductionVolume')*(-1)
    calculated in proportion to reference product waste input to incinerator
  properties: wet mass 1 kg, dry mass 1 kg, price 2.84 EUR2005
- waste cement, hydrated: -0.02224 kg; lognormal variance with pedigree 0.031053, pedigree (1,1,3,1,1)
  Hydrated cement output for solidification of landfilled residual material.
  Uncertainty: Uncertainty calculated from uncertainty of the waste composition of this waste and transfer coefficients in the incinerator and of the solidification recipe.
  production volume 0 kg; = (Ref('fe3bf381-fa09-41c4-964f-abfa11000d9b')*-1)/ Ref('fe3bf381-fa09-41c4-964f-abfa11000dc5')* Ref('fe3bf381-fa09-41c4-964f-abfa11000dc5', 'ProductionVolume')*(-1)
    calculated in proportion to reference product waste input to incinerator
  properties: dry mass 1 kg, wet mass 1 kg
- process-specific burdens, slag landfill: 0.22058 kg; lognormal variance with pedigree 0.026077, pedigree (1,1,3,1,1)
  Mass-specific expenditures required for landfilling of bottom ash.
  Uncertainty: uncertainty is calculated from uncertainties in waste composition and transfer coefficients in incinerator
- sodium hydroxide, without water, in 50% solution state: 0.001122 kg; lognormal variance with pedigree 0.21504, pedigree (1,1,3,1,1)
  Auxilliary inputs for the flue gas treatment stage of the incinerator plant.
  Uncertainty: uncertainty calculated from uncertainty in average NaOH input, of transfer coefficients in the incinerator, and the uncertainty of the waste composition of this waste
  properties: wet mass 1 kg, dry mass 1 kg
- hydrochloric acid, without water, in 30% solution state: 5.73e-5 kg; lognormal variance with pedigree 0.27728, pedigree (1,1,3,1,1)
  Auxilliary inputs for the wastewater treatment stage of the incinerator plant.
  Uncertainty: uncertainty calculated from uncertainty in average HCl input, of transfer coefficients in the incinerator, and the uncertainty of the waste composition of this waste
  properties: dry mass 1 kg, wet mass 1 kg
- ammonia, liquid: 0.000699 kg; lognormal variance with pedigree 0.67077, pedigree (1,1,3,1,1)
  Input to DeNOx stage (100% NH3).
  Uncertainty: uncertainty calculated from uncertainty in average DeNOx input, uncertainty in the share of thermal NOx, uncertainty of nitrogen content in average municipal waste and the uncertainty in nitrogen content in *this* waste.
  properties: wet mass 1 kg, dry mass 1 kg
- quicklime, milled, packed: 0.0032775 kg; lognormal variance with pedigree 0.40045, pedigree (1,1,3,1,1)
  Auxilliary inputs for the flue gas treatment stage of the incinerator plant.
  Uncertainty: uncertainty calculated from uncertainty in average CaO input, of transfer coefficients in the incinerator, and the uncertainty of the waste composition of this waste
  properties: dry mass 0.99 kg, water content 0.010101, wet mass 1 kg

## Inputs from nature
- Oxygen [natural resource, in air]: 1.3366 kg; lognormal variance with pedigree 0.032396, pedigree (1,1,3,1,1)
  Oxygen from ambient air needed to combust and oxidise this waste. Net demand, i.e. without O2 leaving the plant in flue gas uncombusted.
  Uncertainty: uncertainty is calculated from uncertainties in waste composition and transfer coefficients to flue gas and soild residues in incinerator

## Emissions to nature
- Carbon monoxide, fossil [air, urban air close to ground]: 2.2619e-5 kg; lognormal variance with pedigree 0.84953, pedigree (1,1,3,1,1)
  Incomplete combustion product emitted to air.
  Uncertainty: uncertainty calculated from uncertainty in average operation emissions, and the uncertainty of the flue gas volume from this waste.
- Calcium, ion [water, ground-, long-term]: 0.015386 kg; lognormal variance with pedigree 0.28478, pedigree (1,1,3,1,1)
  Long-term emissions from landfilling of incineration residues.
  Uncertainty: uncertainty is calculated from uncertainties in waste composition and transfer coefficients in incinerator and landfills.
- Nickel, ion [water, surface water]: 3.4079e-8 kg; lognormal variance with pedigree 1.681, pedigree (1,1,3,1,1)
  Emissions to water from waste composition and transfer coefficients in incinerator and landfills.
  Uncertainty: uncertainty is calculated from uncertainties in waste composition and transfer coefficients in incinerator and landfills
- Cadmium, ion [water, ground-, long-term]: 6.929e-7 kg; lognormal variance with pedigree 6.6165, pedigree (1,1,3,1,1)
  (same comment as for Calcium, ion)
- Mercury [water, surface water]: 8.7829e-10 kg; lognormal variance with pedigree 1.2467, pedigree (1,1,3,1,1)
  (same comment as for Nickel, ion)
- Cadmium [air, urban air close to ground]: 4.0205e-9 kg; lognormal variance with pedigree 1.3258, pedigree (1,1,3,1,1)
  Emission to air from waste composition and transfer coefficients.
  Uncertainty: uncertainty is calculated from uncertainties in waste composition and transfer coefficients in incinerator
- Boron [water, surface water]: 5.7843e-8 kg; lognormal variance with pedigree 1.5333, pedigree (1,1,3,1,1)
  (same comment as for Nickel, ion)
- Aluminium [water, ground-, long-term]: 0.0076603 kg; lognormal variance with pedigree 0.33301, pedigree (1,1,3,1,1)
  (same comment as for Calcium, ion)
- Vanadium [air, urban air close to ground]: 3.5323e-8 kg; lognormal variance with pedigree 1.2894, pedigree (1,1,3,1,1)
  (same comment as for Cadmium)
- Barium [water, surface water]: 2.2754e-8 kg; lognormal variance with pedigree 1.6919, pedigree (1,1,3,1,1)
  (same comment as for Nickel, ion)
- DOC, Dissolved Organic Carbon [water, ground-, long-term]: 0.0018466 kg; lognormal variance with pedigree 0.032738, pedigree (1,1,3,1,1)
  (same comment as for Calcium, ion)
- Benzene [air, urban air close to ground]: 3.4246e-8 kg; lognormal variance with pedigree 0.10352, pedigree (1,1,3,1,1)
  (same comment as for Carbon monoxide, fossil)
- Benzene, pentachloro- [air, urban air close to ground]: 1.8093e-10 kg; lognormal variance with pedigree 0.10352, pedigree (1,1,3,1,1)
  (same comment as for Carbon monoxide, fossil)
- Zinc, ion [water, ground-, long-term]: 0.00053977 kg; lognormal variance with pedigree 1.7763, pedigree (1,1,3,1,1)
  (same comment as for Calcium, ion)
- Silver, ion [water, surface water]: 1.4952e-9 kg; lognormal variance with pedigree 1.5761, pedigree (1,1,3,1,1)
  (same comment as for Nickel, ion)
- Heat, waste [air, urban air close to ground]: 9.579 MJ; lognormal variance with pedigree 0.058428, pedigree (1,1,3,1,1)
  Waste heat generated from heating value of this waste plus any electricity required to process it.
  Uncertainty: uncertainty is calculated from uncertainties in waste composition and uncertainties in energy efficiency and the uncertainty in internal energy demand
- Tin [air, urban air close to ground]: 4.9776e-11 kg; lognormal variance with pedigree 1.04, pedigree (1,1,3,1,1)
  (same comment as for Cadmium)
- Copper, ion [water, ground-, long-term]: 0.00075344 kg; lognormal variance with pedigree 0.6601, pedigree (1,1,3,1,1)
  (same comment as for Calcium, ion)
- Manganese [water, surface water]: 1.8522e-8 kg; lognormal variance with pedigree 1.4837, pedigree (1,1,3,1,1)
  (same comment as for Nickel, ion)
- Chromium, ion [water, surface water]: 1.9086e-9 kg; lognormal variance with pedigree 0.96817, pedigree (1,1,3,1,1)
  (same comment as for Nickel, ion)
- DOC, Dissolved Organic Carbon [water, surface water]: 0.00017534 kg; lognormal variance with pedigree 0.054289, pedigree (1,1,3,1,1)
  (same comment as for Nickel, ion)
- Water [air, urban air close to ground]: 0.001459 m3; lognormal variance with pedigree 0.67368, pedigree (1,1,3,1,1)
  Water vapour from waste humidity, hydrogen oxidation and part of the process water.
  Uncertainty: Uncertainty calculated from uncertainty in waste composition, process water input and the uncertainty of fraction to air.
- BOD5, Biological Oxygen Demand [water, surface water]: 0.00039198 kg; lognormal variance with pedigree 0.05628, pedigree (1,1,3,1,1)
  (same comment as for Nickel, ion)
- Chromium VI [water, ground-, long-term]: 3.0074e-6 kg; lognormal variance with pedigree 3.4806, pedigree (1,1,3,1,1)
  (same comment as for Calcium, ion)
- Sulfur dioxide [air, urban air close to ground]: 1.5247e-5 kg; lognormal variance with pedigree 0.61636, pedigree (1,1,3,1,1)
  (same comment as for Cadmium)
- Chromium [air, urban air close to ground]: 2.1464e-8 kg; lognormal variance with pedigree 0.95177, pedigree (1,1,3,1,1)
  (same comment as for Cadmium)
- Ammonia [air, urban air close to ground]: 8.2185e-7 kg; lognormal variance with pedigree 0.72328, pedigree (1,1,3,1,1)
  Nitrogen species emitted to air after DeNOx stage.
  Uncertainty: uncertainty calculated from uncertainty in average N-emissions and uncertainty in the share of thermal NOx and the uncertainty in nitrogen content in *this* waste.
- Lead [air, urban air close to ground]: 2.0575e-8 kg; lognormal variance with pedigree 0.81229, pedigree (1,1,3,1,1)
  (same comment as for Cadmium)
- Selenium [water, ground-, long-term]: 2.182e-7 kg; lognormal variance with pedigree 1.1843, pedigree (1,1,3,1,1)
  (same comment as for Calcium, ion)
- Sodium, ion [water, ground-, long-term]: 0.0037138 kg; lognormal variance with pedigree 0.29948, pedigree (1,1,3,1,1)
  (same comment as for Calcium, ion)
- Methane, non-fossil [air, urban air close to ground]: 3.1409e-7 kg; lognormal variance with pedigree 0.10352, pedigree (1,1,3,1,1)
  (same comment as for Carbon monoxide, fossil)
- Iron [air, urban air close to ground]: 1.1832e-8 kg; lognormal variance with pedigree 0.34749, pedigree (1,1,3,1,1)
  (same comment as for Cadmium)
- Silicon [water, surface water]: 5.1658e-6 kg; lognormal variance with pedigree 0.57019, pedigree (1,1,3,1,1)
  (same comment as for Nickel, ion)
- Aluminium [water, surface water]: 7.9785e-7 kg; lognormal variance with pedigree 0.74099, pedigree (1,1,3,1,1)
  (same comment as for Nickel, ion)
- TOC, Total Organic Carbon [water, ground-, long-term]: 0.0018466 kg; lognormal variance with pedigree 0.032738, pedigree (1,1,3,1,1)
  (same comment as for Calcium, ion)
- Bromine [air, urban air close to ground]: 6.4593e-8 kg; lognormal variance with pedigree 0.95177, pedigree (1,1,3,1,1)
  (same comment as for Cadmium)
- Mercury [water, ground-, long-term]: 4.7813e-8 kg; lognormal variance with pedigree 3.0445, pedigree (1,1,3,1,1)
  (same comment as for Calcium, ion)
- Manganese [water, ground-, long-term]: 0.00024822 kg; lognormal variance with pedigree 0.85106, pedigree (1,1,3,1,1)
  (same comment as for Calcium, ion)
- Water [water, surface water]: 0.00046375 m3; lognormal variance with pedigree 1.0483, pedigree (1,1,3,1,1)
  Process water released to surface water.
  Uncertainty: uncertainty calculated from uncertainty in process water input and the uncertainty of fraction to surface water.
- Potassium, ion [water, surface water]: 0.00046364 kg; lognormal variance with pedigree 0.33145, pedigree (1,1,3,1,1)
  (same comment as for Nickel, ion)
- Vanadium, ion [water, ground-, long-term]: 1.5379e-6 kg; lognormal variance with pedigree 2.0634, pedigree (1,1,3,1,1)
  (same comment as for Calcium, ion)
- Heat, waste [water, surface water]: 2.5451 MJ; lognormal variance with pedigree 0.058428, pedigree (1,1,3,1,1)
  (same comment as for Heat, waste)
- Magnesium [water, ground-, long-term]: 0.0023487 kg; lognormal variance with pedigree 0.52323, pedigree (1,1,3,1,1)
  (same comment as for Calcium, ion)
- Titanium [air, urban air close to ground]: 1.3305e-6 kg; lognormal variance with pedigree 0.55954, pedigree (1,1,3,1,1)
  (same comment as for Cadmium)
- Magnesium [water, surface water]: 1.1409e-5 kg; lognormal variance with pedigree 0.78749, pedigree (1,1,3,1,1)
  (same comment as for Nickel, ion)
- Iodide [water, surface water]: 1.2412e-8 kg; lognormal variance with pedigree 1.4365, pedigree (1,1,3,1,1)
  (same comment as for Nickel, ion)
- Mercury [air, urban air close to ground]: 1.8438e-8 kg; lognormal variance with pedigree 1.6286, pedigree (1,1,3,1,1)
  (same comment as for Cadmium)
- Calcium [air, urban air close to ground]: 9.0376e-5 kg; lognormal variance with pedigree 0.30879, pedigree (1,1,3,1,1)
  (same comment as for Cadmium)
- Toluene [air, urban air close to ground]: 6.8492e-8 kg; lognormal variance with pedigree 0.10352, pedigree (1,1,3,1,1)
  (same comment as for Carbon monoxide, fossil)
- Beryllium [water, ground-, long-term]: 0.00044076 kg; lognormal variance with pedigree 0.71806, pedigree (1,1,3,1,1)
  (same comment as for Calcium, ion)
- Magnesium [air, urban air close to ground]: 2.0069e-6 kg; lognormal variance with pedigree 0.55954, pedigree (1,1,3,1,1)
  (same comment as for Cadmium)
- Bromine [water, surface water]: 0.00011679 kg; lognormal variance with pedigree 0.43571, pedigree (1,1,3,1,1)
  (same comment as for Nickel, ion)
- Sulfate [water, surface water]: 0.00075429 kg; lognormal variance with pedigree 0.28332, pedigree (1,1,3,1,1)
  (same comment as for Nickel, ion)
- Antimony [air, urban air close to ground]: 2.6684e-11 kg; lognormal variance with pedigree 1.1209, pedigree (1,1,3,1,1)
  (same comment as for Cadmium)
- Tin, ion [water, ground-, long-term]: 5.2384e-5 kg; lognormal variance with pedigree 1.3328, pedigree (1,1,3,1,1)
  (same comment as for Calcium, ion)
- Sodium, ion [water, surface water]: 0.0010044 kg; lognormal variance with pedigree 0.22579, pedigree (1,1,3,1,1)
  (same comment as for Nickel, ion)
- Manganese [air, urban air close to ground]: 8.9524e-9 kg; lognormal variance with pedigree 0.87827, pedigree (1,1,3,1,1)
  (same comment as for Cadmium)
- Iron, ion [water, surface water]: 2.3409e-7 kg; lognormal variance with pedigree 0.93606, pedigree (1,1,3,1,1)
  (same comment as for Nickel, ion)
- Cobalt [water, surface water]: 2.2149e-10 kg; lognormal variance with pedigree 2.0887, pedigree (1,1,3,1,1)
  (same comment as for Nickel, ion)
- Dioxins, measured as 2,3,7,8-tetrachlorodibenzo-p-dioxin [air, urban air close to ground]: 6.8487e-14 kg; lognormal variance with pedigree 0.44449, pedigree (1,1,3,1,1)
  (same comment as for Carbon monoxide, fossil)
- Benzene, hexachloro- [air, urban air close to ground]: 7.1606e-11 kg; lognormal variance with pedigree 0.10352, pedigree (1,1,3,1,1)
  (same comment as for Carbon monoxide, fossil)
- Methane, fossil [air, urban air close to ground]: 1.996e-7 kg; lognormal variance with pedigree 0.10352, pedigree (1,1,3,1,1)
  (same comment as for Carbon monoxide, fossil)
- Nickel [air, urban air close to ground]: 3.33e-8 kg; lognormal variance with pedigree 1.0695, pedigree (1,1,3,1,1)
  (same comment as for Cadmium)
- Lead [water, surface water]: 2.6881e-8 kg; lognormal variance with pedigree 0.72269, pedigree (1,1,3,1,1)
  (same comment as for Nickel, ion)
- Iodide [water, ground-, long-term]: 0 kg; pedigree (1,1,1,1,1)
  (same comment as for Calcium, ion)
- Carbon dioxide, fossil [air, urban air close to ground]: 0.47757 kg; lognormal variance with pedigree 0.033966, pedigree (1,1,3,1,1)
  (same comment as for Cadmium)
- Cobalt [water, ground-, long-term]: 1.2509e-6 kg; lognormal variance with pedigree 1.4895, pedigree (1,1,3,1,1)
  (same comment as for Calcium, ion)
- Antimony [water, surface water]: 1.1495e-5 kg; lognormal variance with pedigree 1.047, pedigree (1,1,3,1,1)
  (same comment as for Nickel, ion)
- Boron [water, ground-, long-term]: 6.2781e-6 kg; lognormal variance with pedigree 1.1437, pedigree (1,1,3,1,1)
  (same comment as for Calcium, ion)
- Carbon monoxide, non-fossil [air, urban air close to ground]: 3.5595e-5 kg; lognormal variance with pedigree 0.84953, pedigree (1,1,3,1,1)
  (same comment as for Carbon monoxide, fossil)
- Sodium [air, urban air close to ground]: 2.3358e-5 kg; lognormal variance with pedigree 0.47553, pedigree (1,1,3,1,1)
  (same comment as for Cadmium)
- Phenol, pentachloro- [air, urban air close to ground]: 1.4914e-11 kg; lognormal variance with pedigree 0.10352, pedigree (1,1,3,1,1)
  (same comment as for Carbon monoxide, fossil)
- Tin, ion [water, surface water]: 2.3895e-9 kg; lognormal variance with pedigree 1.5178, pedigree (1,1,3,1,1)
  (same comment as for Nickel, ion)
- Arsenic, ion [water, ground-, long-term]: 6.9776e-7 kg; lognormal variance with pedigree 1.5274, pedigree (1,1,3,1,1)
  (same comment as for Calcium, ion)
- Silver, ion [water, ground-, long-term]: 5.9299e-7 kg; lognormal variance with pedigree 1.5734, pedigree (1,1,3,1,1)
  (same comment as for Calcium, ion)
- Phosphate [water, surface water]: 4.2208e-7 kg; lognormal variance with pedigree 0.52652, pedigree (1,1,3,1,1)
  (same comment as for Nickel, ion)
- Cyanide [air, urban air close to ground]: 1.0273e-5 kg; lognormal variance with pedigree 1.2838, pedigree (1,1,3,1,1)
  (same comment as for Ammonia)
- Potassium, ion [water, ground-, long-term]: 0.0016585 kg; lognormal variance with pedigree 0.28389, pedigree (1,1,3,1,1)
  (same comment as for Calcium, ion)
- Chloride [water, surface water]: 0.0051848 kg; lognormal variance with pedigree 0.27995, pedigree (1,1,3,1,1)
  (same comment as for Nickel, ion)
- Aluminium [air, urban air close to ground]: 5.6947e-9 kg; lognormal variance with pedigree 0.42753, pedigree (1,1,3,1,1)
  (same comment as for Cadmium)
- Particulates, > 2.5 um, and < 10um [air, urban air close to ground]: 2.0546e-8 kg; lognormal variance with pedigree 0.21588, pedigree (1,1,3,1,1)
  (same comment as for Carbon monoxide, fossil)
- Sulfate [water, ground-, long-term]: 0.0038197 kg; lognormal variance with pedigree 0.35365, pedigree (1,1,3,1,1)
  (same comment as for Calcium, ion)
- Iron, ion [water, ground-, long-term]: 0.0070942 kg; lognormal variance with pedigree 0.39286, pedigree (1,1,3,1,1)
  (same comment as for Calcium, ion)
- Barium [air, urban air close to ground]: 1.4517e-7 kg; lognormal variance with pedigree 0.9297, pedigree (1,1,3,1,1)
  (same comment as for Cadmium)
- Carbon dioxide, non-fossil [air, urban air close to ground]: 0.75153 kg; lognormal variance with pedigree 0.033966, pedigree (1,1,3,1,1)
  (same comment as for Cadmium)
- Molybdenum [water, surface water]: 3.2368e-7 kg; lognormal variance with pedigree 0.94592, pedigree (1,1,3,1,1)
  (same comment as for Nickel, ion)
- Molybdenum [water, ground-, long-term]: 1.6815e-6 kg; lognormal variance with pedigree 1.4802, pedigree (1,1,3,1,1)
  (same comment as for Calcium, ion)
- Beryllium [water, surface water]: 2.9532e-7 kg; lognormal variance with pedigree 1.3404, pedigree (1,1,3,1,1)
  (same comment as for Nickel, ion)
- Particulates, < 2.5 um [air, urban air close to ground]: 4.0887e-6 kg; lognormal variance with pedigree 0.44449, pedigree (1,1,3,1,1)
  (same comment as for Carbon monoxide, fossil)
- Dinitrogen monoxide [air, urban air close to ground]: 4.7817e-5 kg; lognormal variance with pedigree 1.2838, pedigree (1,1,3,1,1)
  (same comment as for Ammonia)
- Selenium [water, surface water]: 1.0556e-7 kg; lognormal variance with pedigree 1.3817, pedigree (1,1,3,1,1)
  (same comment as for Nickel, ion)
- Nitrogen oxides [air, urban air close to ground]: 0.00026025 kg; lognormal variance with pedigree 0.72328, pedigree (1,1,3,1,1)
  Sum of fuel-Nox and thermal-NOx emitted to air after DeNOx stage.
  Uncertainty: uncertainty calculated from uncertainty in average N-emissions and uncertainty in the share of thermal NOx and the uncertainty in nitrogen content in *this* waste.
- Zinc [air, urban air close to ground]: 5.6648e-7 kg; lognormal variance with pedigree 0.66682, pedigree (1,1,3,1,1)
  (same comment as for Cadmium)
- Molybdenum [air, urban air close to ground]: 1.3371e-9 kg; lognormal variance with pedigree 1.4996, pedigree (1,1,3,1,1)
  (same comment as for Cadmium)
- Cobalt [air, urban air close to ground]: 1.2717e-9 kg; lognormal variance with pedigree 1.5499, pedigree (1,1,3,1,1)
  (same comment as for Cadmium)
- Barium [water, ground-, long-term]: 0.00013458 kg; lognormal variance with pedigree 0.95583, pedigree (1,1,3,1,1)
  (same comment as for Calcium, ion)
- Silicon [water, ground-, long-term]: 0.0019035 kg; lognormal variance with pedigree 5.4864, pedigree (1,1,3,1,1)
  (same comment as for Calcium, ion)
- Lead [water, ground-, long-term]: 0.00028461 kg; lognormal variance with pedigree 2.5247, pedigree (1,1,3,1,1)
  (same comment as for Calcium, ion)
- Phosphate [water, ground-, long-term]: 0.00010078 kg; lognormal variance with pedigree 4.8172, pedigree (1,1,3,1,1)
  (same comment as for Calcium, ion)
- Titanium, ion [water, surface water]: 6.0282e-7 kg; lognormal variance with pedigree 0.4267, pedigree (1,1,3,1,1)
  (same comment as for Nickel, ion)
- COD, Chemical Oxygen Demand [water, surface water]: 0.00040223 kg; lognormal variance with pedigree 0.054054, pedigree (1,1,3,1,1)
  (same comment as for Nickel, ion)
- Benzo(a)pyrene [air, urban air close to ground]: 7.6208e-13 kg; lognormal variance with pedigree 0.44449, pedigree (1,1,3,1,1)
  (same comment as for Carbon monoxide, fossil)
- COD, Chemical Oxygen Demand [water, ground-, long-term]: 0.0046666 kg; lognormal variance with pedigree 0.032738, pedigree (1,1,3,1,1)
  (same comment as for Calcium, ion)
- Fluoride [water, ground-, long-term]: 0.0003285 kg; lognormal variance with pedigree 0.43451, pedigree (1,1,3,1,1)
  (same comment as for Calcium, ion)
- Selenium [air, urban air close to ground]: 3.7185e-9 kg; lognormal variance with pedigree 1.7208, pedigree (1,1,3,1,1)
  (same comment as for Cadmium)
- Vanadium, ion [water, surface water]: 6.1158e-9 kg; lognormal variance with pedigree 1.4796, pedigree (1,1,3,1,1)
  (same comment as for Nickel, ion)
- Potassium [air, urban air close to ground]: 1.0506e-5 kg; lognormal variance with pedigree 0.57372, pedigree (1,1,3,1,1)
  (same comment as for Cadmium)
- BOD5, Biological Oxygen Demand [water, ground-, long-term]: 0.0015264 kg; lognormal variance with pedigree 0.032738, pedigree (1,1,3,1,1)
  (same comment as for Calcium, ion)
- Chromium VI [water, surface water]: 6.9028e-7 kg; lognormal variance with pedigree 0.99986, pedigree (1,1,3,1,1)
  (same comment as for Nickel, ion)
- Hydrogen fluoride [air, urban air close to ground]: 2.4719e-6 kg; lognormal variance with pedigree 0.80268, pedigree (1,1,3,1,1)
  (same comment as for Cadmium)
- Copper, ion [water, surface water]: 7.6217e-8 kg; lognormal variance with pedigree 0.81983, pedigree (1,1,3,1,1)
  (same comment as for Nickel, ion)
- Iodine [air, urban air close to ground]: 6.8922e-12 kg; lognormal variance with pedigree 1.9446, pedigree (1,1,3,1,1)
  (same comment as for Cadmium)
- Silicon [air, urban air close to ground]: 2.4893e-8 kg; lognormal variance with pedigree 0.26499, pedigree (1,1,3,1,1)
  (same comment as for Cadmium)
- Zinc, ion [water, surface water]: 8.4669e-8 kg; lognormal variance with pedigree 0.59584, pedigree (1,1,3,1,1)
  (same comment as for Nickel, ion)
- Cadmium, ion [water, surface water]: 8.1641e-10 kg; lognormal variance with pedigree 1.1326, pedigree (1,1,3,1,1)
  (same comment as for Nickel, ion)
- Arsenic, ion [water, surface water]: 7.0038e-7 kg; lognormal variance with pedigree 1.4106, pedigree (1,1,3,1,1)
  (same comment as for Nickel, ion)
- Copper [air, urban air close to ground]: 4.6516e-8 kg; lognormal variance with pedigree 0.71024, pedigree (1,1,3,1,1)
  (same comment as for Cadmium)
- Chloride [water, ground-, long-term]: 0.0014819 kg; lognormal variance with pedigree 0.37761, pedigree (1,1,3,1,1)
  (same comment as for Calcium, ion)
- Calcium, ion [water, surface water]: 0.00015708 kg; lognormal variance with pedigree 0.30761, pedigree (1,1,3,1,1)
  (same comment as for Nickel, ion)
- Phosphorus [air, urban air close to ground]: 7.6203e-7 kg; lognormal variance with pedigree 0.71749, pedigree (1,1,3,1,1)
  (same comment as for Cadmium)
- Titanium, ion [water, ground-, long-term]: 0.00078316 kg; lognormal variance with pedigree 0.76185, pedigree (1,1,3,1,1)
  (same comment as for Calcium, ion)
- Antimony [water, ground-, long-term]: 2.4086e-5 kg; lognormal variance with pedigree 0.87576, pedigree (1,1,3,1,1)
  (same comment as for Calcium, ion)
- Arsenic [air, urban air close to ground]: 7.9133e-9 kg; lognormal variance with pedigree 1.5356, pedigree (1,1,3,1,1)
  (same comment as for Cadmium)
- Hydrogen chloride [air, urban air close to ground]: 3.4257e-6 kg; lognormal variance with pedigree 0.44236, pedigree (1,1,3,1,1)
  (same comment as for Cadmium)
- TOC, Total Organic Carbon [water, surface water]: 0.00017534 kg; lognormal variance with pedigree 0.054289, pedigree (1,1,3,1,1)
  (same comment as for Nickel, ion)
- Nickel, ion [water, ground-, long-term]: 5.1263e-5 kg; lognormal variance with pedigree 1.0363, pedigree (1,1,3,1,1)
  (same comment as for Calcium, ion)
- Nitrate [water, ground-, long-term]: 0.00011531 kg; lognormal variance with pedigree 0.51618, pedigree (1,1,3,1,1)
  (same comment as for Calcium, ion)
- Bromine [water, ground-, long-term]: 1.2464e-5 kg; lognormal variance with pedigree 0.93279, pedigree (1,1,3,1,1)
  (same comment as for Calcium, ion)
- Nitrate [water, surface water]: 4.0869e-5 kg; lognormal variance with pedigree 0.35622, pedigree (1,1,3,1,1)
  (same comment as for Nickel, ion)
- Fluoride [water, surface water]: 2.8016e-5 kg; lognormal variance with pedigree 0.48196, pedigree (1,1,3,1,1)
  (same comment as for Nickel, ion)
- NMVOC, non-methane volatile organic compounds, unspecified origin [air, urban air close to ground]: 1.5585e-6 kg; lognormal variance with pedigree 0.10352, pedigree (1,1,3,1,1)
  (same comment as for Carbon monoxide, fossil)

## Extrapolations
This dataset has been extrapolated from year 2012 to the year of the calculation (2019). The uncertainty has been adjusted accordingly.
