# heat production, wood pellet, at furnace 9kW, state-of-the-art 2014

Dataset: EcoSpold 2, unit process
Geography: RoW
Time period: 2014-01-01 to 2019-12-31
Technology level: modern
Classification: ISIC rev.4 ecoinvent: 3530:Steam and air conditioning supply
Classification: EcoSpold01Categories: wood energy/heating systems
Scenario: Business-as-Usual
System model: Allocation at the point of substitution
Share of production covered: 0.1 %
Generated by: Christian Bauer
Published in: Bauer, C. 2007
Database: ecoinvent
isCopyrightProtected: true
accessRestrictedTo: 1

## General comment
Activity represents combustion of wood pellets in new (=installed in 2014) small wood pellet furnaces in Switzerland. Only uncertainty factors were adjusted in order to provide a GLO activity. The inventory shall be considered valid for boilers with nominal capacities in the approximate range of 5 to 20 kW. The activity represents average annual operation including start/stop (warm up and cool down), which reduces the efficiency compared to rated values provided by boiler manufacturers and increases some emission factors such as CO. Air emission factors as well as other exchanges correspond to v2.2 except of PM, CO, NOx, CH4 and NMVOC. These key emission factors were updated based on latest available information.

## Included activities start
From reception of wood pellets.

## Included activities end
This activity describes the combustion of wood pellets until heat production at the boiler outlet. Included are the infrastructure, the wood requirements (average pellets, u=10%), the emissions to air, the electricity needed for operation, and the disposal of the ashes.

## Geography
based on data from Switzerland

## Technology
Modern boiler technology installed in CH in 2014

## Time period
Some emission data are from the second half of the 1990´s. However, key emission factors (PM, CO, NOx and CH4, NMVOC) are updated in 2014. Activity can be considered as representative for new installations until 2020.

## Parameters
- scaling factor: 1.33333 dimensionless; name scaling_factor; = 1/0.75
  the scaling factor corresponds to the inverse of the annual use efficiency. This efficiency represents an average annual value including start/stop operation (warm-up and cool down), which reduces the efficiency compared to rated values of the manufacturer. Source: Thomas Nussbaumer, Verenum, January 2014, personal communication.

## Reference product
- heat, central or small-scale, other than natural gas: 1 MJ; = 0.75 * scaling_factor; source T. Nussbaumer 2014; By-product classification allocatable product; CPC 17300: Steam and hot water
  EcoSpold01Location=CH
  Original dataset referred to 1MJ energy input (end energy). Amount was scaled to 1 using annual use efficiency of 0.75 (according to source).
  production volume 2.66802e12 MJ; = 5350000000000*0.5
    Literature value / calculation.
    Data taken from BFE (2012) and extrapolated to global conditions with a factor 1:40 between total Europe (RER):GLO.
    Total energy input from wood in different types of plants in 2009 in Switzerland amounts to 36800 TJ. Out of it, only a certain share is turned into heat due to efficiencies lower than 1. These efficiencies could be calculated with data present for the year 2012, which were taken over for calculating the heat output for 2009. The resulting output of 23852 TJ was evenly distributed between the six 9 datasets modelling heat production with wood in the database (3 datasets for heat production with mixed logs, 2 datasets for heat production with hardwood, softwood and wood pellets each). 50% of this APV is allocated to current and 50% to modern technology (according to data from Switzerland).
    BFE. 2012. Schweizerische Gesamtenergiestatistik 2012. Bundesamt für Energie, Bern, Switzerland.
  property price 0.0106 EUR2005
    Average European district heat price from Ecoheatcool and Euroheat 2005-2006, Ecoheat Work package 1: The European heat market. Final report. 10.6 EUR/GJ i s the price of district heat. http://www.solarthermalworld.org/files/Ecoheatcool%20WP1%20Web.pdf?download
  property true value 0.0106
    allocation property applied in "true value" allocation // value calculated from revenue
  properties: Corresponding fuel use 1.22 MJ

## By-products
- heat, for reuse in municipal waste incineration only: 0 MJ; CPC 17300: Steam and hot water; By-product classification allocatable product; pedigree (1,1,1,1,1)
  Net electricity generated from this waste and used in internal MSWI plant energy redistribution.
  Uncertainty: uncertainty is calculated from uncertainties in waste composition and uncertainties in energy efficiency and the uncertainty in internal energy demand
  production volume 21492.2 MJ
  property exergy 0.1842 MJ; name E_th_prod_MSWI_exergy
    This exergy property is based on the exergy content of the product.
  property price 0.0106 EUR2005; name E_th_prod_MSWI_price_EUR2005
    (same comment as for heat, central or small-scale, other than natural gas)
  property true value relation 0.1842; name E_th_prod_MSWI_true_value_relation
    property to calculate "true value" from
  property true value 3.51858e-11
    allocation property applied in "true value" allocation // value calculated from true value relation
- electricity, for reuse in municipal waste incineration only: 0 kWh; CPC 17100: Electrical energy; By-product classification allocatable product; pedigree (1,1,1,1,1)
  (same comment as for heat, for reuse in municipal waste incineration only)
  production volume 3026.68 kWh
  property price 0.1 EUR2005; name E_el_prod_MSWI_price_EUR2005
    Estimated to be the same price as in case of electricity, medium voltage.
  property exergy 3.6 MJ; name E_el_prod_MSWI_exergy
    This exergy property is based on the exergy content of the product.
  property true value relation 3.6; name E_el_prod_MSWI_true_value_relation
    property to calculate "true value" from
  property true value 9.68426e-11
    (same comment as for heat, for reuse in municipal waste incineration only)

## Inputs from technosphere
- wood pellet, measured as dry mass: 0.0711533 kg; = 0.053365 * scaling_factor; lognormal variance with pedigree 0.5127, pedigree (2,2,5,5,4)
  EcoSpold01Location=RER
  Literature value. Original amount (from the source, ecoinvent v2.2) was scaled to the amount of the new reference product using the annual efficiency. Corresponds to a LHV of 18.7 MJ/kg.
  properties: carbon content, non-fossil 0.494, wet mass 1.1 kg, water content 0.1, dry mass 1 kg
  note on carbon content, non-fossil: C content of dry mass is 0.494 kgC/kg dry wood (ecoinvent v2.2 report 9).
- furnace, pellets, 9kW: 1.02881e-6 unit; = 1/(20*2000*9*3.6) * scaling_factor; lognormal variance with pedigree 0.5127, pedigree (2,2,5,5,4)
  Calculated value. Assuming 20 years lifetime, 2000 operational hours per year, 9kW capactiy.
- electricity, low voltage: 0 kWh; pedigree (1,1,1,1,1)
  EcoSpold01Location=CH
  general assuption
- wood ash mixture, pure: -0.000317333 kg; = (0.000238 * scaling_factor)*-1; source Bauer, C. 2007; lognormal variance with pedigree 0.002, pedigree (1,1,3,1,1)
  homogeneous fuel
  EcoSpold01Location=CH
  production volume 1.27503e9 kg
    Calculated from the production volume of wood pellet, mixed, burned in furnace 15kW in proportion to the respective output amounts.
  properties: wet mass 1 kg, carbon content, non-fossil 0.012, dry mass 1 kg
- electricity, low voltage: 7.37963e-5, 1.29429e-5, 0.000212834, 0.00321866, 0.000530539, 0.00151122 kWh (6 entries); lognormal variance with pedigree 0.5127, pedigree (2,2,5,5,4)
  EcoSpold01Location=CH
  general assuption

## Emissions to nature
- Carbon monoxide, non-fossil [air, urban air close to ground]: 0.000333333 kg; = 2.5E-04 * scaling_factor; source T. Nussbaumer 2014; lognormal variance with pedigree 0.0452, pedigree (2,3,3,5,4)
  estimation
- Mercury [air, urban air close to ground]: 4e-10 kg; = 3E-10 * scaling_factor; source Bauer, C. 2007; lognormal variance with pedigree 0.0832, pedigree (2,3,5,5,4)
  extrapolation, based on measuring data of other emissions
- Hydrocarbons, aliphatic, unsaturated [air, urban air close to ground]: 4.13333e-6 kg; = 3.1E-06 * scaling_factor; source Bauer, C. 2007; lognormal variance with pedigree 0.0832, pedigree (2,3,5,5,4)
  extrapolation, based on measuring data of other emissions
- Phenol, pentachloro- [air, urban air close to ground]: 1.08e-11 kg; = 8.1E-12 * scaling_factor; source Bauer, C. 2007; lognormal variance with pedigree 0.0832, pedigree (2,3,5,5,4)
  extrapolation, based on measuring data of other emissions
- Sodium [air, urban air close to ground]: 1.73333e-6 kg; = 1.3E-06 * scaling_factor; source Bauer, C. 2007; lognormal variance with pedigree 0.0832, pedigree (2,3,5,5,4)
  extrapolation, based on measuring data of other emissions
- NMVOC, non-methane volatile organic compounds, unspecified origin [air, urban air close to ground]: 3.54667e-5 kg; = 26.6E-06 * scaling_factor; source T. Nussbaumer 2014; lognormal variance with pedigree 0.0452, pedigree (2,3,3,5,4)
  estimation
- Ammonia [air, urban air close to ground]: 2.30667e-6 kg; = 1.73E-06 * scaling_factor; source Bauer, C. 2007; lognormal variance with pedigree 0.0832, pedigree (2,3,5,5,4)
  extrapolation, based on measuring data of other emissions
- Arsenic [air, urban air close to ground]: 1.33333e-9 kg; = 1E-09 * scaling_factor; source Bauer, C. 2007; lognormal variance with pedigree 0.0832, pedigree (2,3,5,5,4)
  extrapolation, based on measuring data of other emissions
- Nickel [air, urban air close to ground]: 8e-9 kg; = 6E-09 * scaling_factor; source Bauer, C. 2007; lognormal variance with pedigree 0.0832, pedigree (2,3,5,5,4)
  extrapolation, based on measuring data of other emissions
- Chlorine [air, urban air close to ground]: 2.4e-7 kg; = 1.8E-07 * scaling_factor; source Bauer, C. 2007; lognormal variance with pedigree 0.0832, pedigree (2,3,5,5,4)
  extrapolation, based on measuring data of other emissions
- Bromine [air, urban air close to ground]: 8e-8 kg; = 6E-08 * scaling_factor; source Bauer, C. 2007; lognormal variance with pedigree 0.0832, pedigree (2,3,5,5,4)
  extrapolation, based on measuring data of other emissions
- Benzene, hexachloro- [air, urban air close to ground]: 9.6e-15 kg; = 7.2E-15 * scaling_factor; source Bauer, C. 2007; lognormal variance with pedigree 0.0832, pedigree (2,3,5,5,4)
  extrapolation, based on measuring data of other emissions
- Dinitrogen monoxide [air, urban air close to ground]: 4e-6 kg; = 3E-06 * scaling_factor; source Bauer, C. 2007; lognormal variance with pedigree 0.0832, pedigree (2,3,5,5,4)
  extrapolation, based on measuring data of other emissions
- Methane, non-fossil [air, urban air close to ground]: 1.52e-5 kg; = 11.4e-6 * scaling_factor; source Bauer, C. 2007; lognormal variance with pedigree 0.0832, pedigree (2,3,5,5,4)
  extrapolation, based on measuring data of other emissions
- Toluene [air, urban air close to ground]: 4e-7 kg; = 3E-07 * scaling_factor; source Bauer, C. 2007; lognormal variance with pedigree 0.0832, pedigree (2,3,5,5,4)
  extrapolation, based on measuring data of other emissions
- Calcium [air, urban air close to ground]: 7.8e-6 kg; = 5.85E-06 * scaling_factor; source Bauer, C. 2007; lognormal variance with pedigree 0.0832, pedigree (2,3,5,5,4)
  extrapolation, based on measuring data of other emissions
- Nitrogen oxides [air, urban air close to ground]: 8e-5 kg; = 6E-05 * scaling_factor; source T. Nussbaumer 2014; lognormal variance with pedigree 0.0452, pedigree (2,3,3,5,4)
  estimation
- Particulates, < 2.5 um [air, urban air close to ground]: 4.8e-5 kg; = 36E-06 * scaling_factor; source T. Nussbaumer 2014; lognormal variance with pedigree 0.0452, pedigree (2,3,3,5,4)
  estimation
- Manganese [air, urban air close to ground]: 2.26667e-7 kg; = 1.7E-07 * scaling_factor; source Bauer, C. 2007; lognormal variance with pedigree 0.0832, pedigree (2,3,5,5,4)
  extrapolation, based on measuring data of other emissions
- Fluorine [air, urban air close to ground]: 6.66667e-8 kg; = 5E-08 * scaling_factor; source Bauer, C. 2007; lognormal variance with pedigree 0.0832, pedigree (2,3,5,5,4)
  extrapolation, based on measuring data of other emissions
- Lead [air, urban air close to ground]: 3.33333e-8 kg; = 2.5E-08 * scaling_factor; source Bauer, C. 2007; lognormal variance with pedigree 0.0832, pedigree (2,3,5,5,4)
  extrapolation, based on measuring data of other emissions
- Benzo(a)pyrene [air, urban air close to ground]: 6.66667e-10 kg; = 5E-10 * scaling_factor; source Bauer, C. 2007; lognormal variance with pedigree 0.0832, pedigree (2,3,5,5,4)
  extrapolation, based on measuring data of other emissions
- Carbon dioxide, non-fossil [air, urban air close to ground]: 0.128667 kg; = 0.0965 * scaling_factor; source Bauer, C. 2007; lognormal variance with pedigree 0.0832, pedigree (2,3,5,5,4)
  uncertainty of carbon content in the wood
- Magnesium [air, urban air close to ground]: 4.8e-7 kg; = 3.6E-07 * scaling_factor; source Bauer, C. 2007; lognormal variance with pedigree 0.0832, pedigree (2,3,5,5,4)
  extrapolation, based on measuring data of other emissions
- Water [air, urban air close to ground]: 7.12e-5 m3; lognormal variance with pedigree 0.0083, pedigree (2,2,3,1,2)
  calculated value, supposed to ensure correct water balance
- Benzene, ethyl- [air, urban air close to ground]: 4e-8 kg; = 3E-08 * scaling_factor; source Bauer, C. 2007; lognormal variance with pedigree 0.0832, pedigree (2,3,5,5,4)
  extrapolation, based on measuring data of other emissions
- Chromium [air, urban air close to ground]: 5.28e-9 kg; = 3.96E-09 * scaling_factor; source Bauer, C. 2007; lognormal variance with pedigree 0.0832, pedigree (2,3,5,5,4)
  extrapolation, based on measuring data of other emissions
- Particulates, > 2.5 um, and < 10um [air, urban air close to ground]: 2.66667e-6 kg; = 2e-6*scaling_factor; source T. Nussbaumer 2014; lognormal variance with pedigree 0.0452, pedigree (2,3,3,5,4)
  estimation
- Chromium VI [air, urban air close to ground]: 5.33333e-11 kg; = 4E-11 * scaling_factor; source Bauer, C. 2007; lognormal variance with pedigree 0.0832, pedigree (2,3,5,5,4)
  range of data
- Benzene [air, urban air close to ground]: 1.21333e-6 kg; = 9.1E-07 * scaling_factor; source Bauer, C. 2007; lognormal variance with pedigree 0.0832, pedigree (2,3,5,5,4)
  extrapolation, based on measuring data of other emissions
- Phosphorus [air, urban air close to ground]: 4e-7 kg; = 3E-07 * scaling_factor; source Bauer, C. 2007; lognormal variance with pedigree 0.0832, pedigree (2,3,5,5,4)
  extrapolation, based on measuring data of other emissions
- Dioxins, measured as 2,3,7,8-tetrachlorodibenzo-p-dioxin [air, urban air close to ground]: 4.13333e-14 kg; = 3.1E-14 * scaling_factor; source Bauer, C. 2007; lognormal variance with pedigree 0.0832, pedigree (2,3,5,5,4)
  extrapolation, based on measuring data of other emissions
- Copper [air, urban air close to ground]: 2.93333e-8 kg; = 2.2E-08 * scaling_factor; source Bauer, C. 2007; lognormal variance with pedigree 0.0832, pedigree (2,3,5,5,4)
  extrapolation, based on measuring data of other emissions
- Formaldehyde [air, urban air close to ground]: 1.73333e-7 kg; = 1.3E-07 * scaling_factor; source Bauer, C. 2007; lognormal variance with pedigree 0.0832, pedigree (2,3,5,5,4)
  extrapolation, based on measuring data of other emissions
- m-Xylene [air, urban air close to ground]: 1.6e-7 kg; = 1.2E-07 * scaling_factor; source Bauer, C. 2007; lognormal variance with pedigree 0.0832, pedigree (2,3,5,5,4)
  extrapolation, based on measuring data of other emissions
- Sulfur dioxide [air, urban air close to ground]: 3.33333e-6 kg; = 2.5E-06 * scaling_factor; source Bauer, C. 2007; lognormal variance with pedigree 0.0832, pedigree (2,3,5,5,4)
  extrapolation, based on measuring data of other emissions
- Acetaldehyde [air, urban air close to ground]: 8.13333e-8 kg; = 6.1E-08 * scaling_factor; source Bauer, C. 2007; lognormal variance with pedigree 0.0832, pedigree (2,3,5,5,4)
  extrapolation, based on measuring data of other emissions
- Potassium [air, urban air close to ground]: 3.12e-5 kg; = 2.34E-05 * scaling_factor; source Bauer, C. 2007; lognormal variance with pedigree 0.0832, pedigree (2,3,5,5,4)
  extrapolation, based on measuring data of other emissions
- Zinc [air, urban air close to ground]: 4e-7 kg; = 3E-07 * scaling_factor; source Bauer, C. 2007; lognormal variance with pedigree 0.0832, pedigree (2,3,5,5,4)
  extrapolation, based on measuring data of other emissions
- PAH, polycyclic aromatic hydrocarbons [air, urban air close to ground]: 1.48e-8 kg; = 1.11E-08 * scaling_factor; source Bauer, C. 2007; lognormal variance with pedigree 0.0832, pedigree (2,3,5,5,4)
  extrapolation, based on measuring data of other emissions
- Hydrocarbons, aliphatic, alkanes, unspecified [air, urban air close to ground]: 1.21333e-6 kg; = 9.1E-07 * scaling_factor; source Bauer, C. 2007; lognormal variance with pedigree 0.0832, pedigree (2,3,5,5,4)
  extrapolation, based on measuring data of other emissions
- Cadmium [air, urban air close to ground]: 9.33333e-10 kg; = 7E-10 * scaling_factor; source Bauer, C. 2007; lognormal variance with pedigree 0.0832, pedigree (2,3,5,5,4)
  extrapolation, based on measuring data of other emissions

## Sampling procedure
extrapolation

## Extrapolations
inventory data representative for Switzerland. Uncertainty factors adjusted accordingly
