# board, softwood, raw, kiln drying to u=10%

Dataset: EcoSpold 2, unit process
Geography: RoW
Time period: 2011-01-01 to 2019-12-31
Technology level: current
Classification: ISIC rev.4 ecoinvent: 1610:Sawmilling and planing of wood
Scenario: Business-as-Usual
System model: Allocation at the point of substitution
Generated by: [System]
Published in: Bauer, C. 2007
Database: ecoinvent
isCopyrightProtected: true
accessRestrictedTo: 1

## General comment
This dataset represents the service of kiln drying of one m3 sawn softwood board. The wood chip used in the process is considered to be supplied internally which are generated from slabs and sidings when sawing. Characteristics of the of wood chips to be burned: Dry wood density 440 kg/m3;the low heating value 3007 MJ/m3., humidity when burned is estimated to be around 50%, which is achieved after some weeks of drying in the storage. Air emission factors as well as the boiler efficiency represent average annual operation including start and stop (warm-up and shut-down). The boiler used is considered to be 300 kW and emission profile refers to the facility.
The data was provided by and approved by the Swiss forest industry (Holzindustrie Schweiz HIS).
Within ecoinvent, three products - boards, beams and laths - are distinguished:
After being sawn, the resulting products can either be air dried down to a moisture content of u=20% (mass of water per dry mass), kiln dried down to u=20% or kiln dried down to u=10%. The activity name indicates the respective product, drying technology and target moisture.

## Included activities start
Kiln drying process starting from sawn softwood, at the sawmill site, assumed to lose some water before the start of the kiln drying process.

## Included activities end
This activity ends with kiln dried softwood board, at sawmill. The dataset includes kiln drying of wet wood assumed as u=60% down to u=10%,shrinkage and emissions associated with wood chip incineration. The dataset does not include air emissions released from the wood, as the emissions are assumed to be equivalent to emissions from natural drying of wood during decomposition and rotting.

## Geography
Represents average Swiss conditions.

## Parameters
- emission of Particulates >2.5 to <10: 6.66667e-6 kg/MJ; name Particulates2_5_to_10
  updated emission profile (amount of emission in kg/MJ used heat) based on personal communication, PSI, 2014
- scaling factor: 1.33333 dimensionless; name scaling_factor; lognormal variance with pedigree 0.0016, pedigree (2,1,1,1,1)
  The scaling factor corresponds to the inverse of the average annual efficiency of the heating system, including start/stop (warm up and cool down). Therefore, this efficiency will be lower than figures provided by manufacturers. The estimated value was provided by T.Nussbaumer, Verenum, and represents the average installed boiler in this size category in Switzerland.
- emission of Particulates >10: 6.66667e-6 kg/MJ; name Particulates_higher_10
  (same comment as for emission of Particulates >2.5 to <10)
- emission of Potassium: 3.12e-5 kg/MJ; name Potassium
  (same comment as for emission of Particulates >2.5 to <10)
- emission of Phosphorus: 4e-7 kg/MJ; name Phosphorus
  (same comment as for emission of Particulates >2.5 to <10)
- emission of arsenic: 1.33333e-9 kg/MJ; name arsenic
  (same comment as for emission of Particulates >2.5 to <10)
- total heat: 702 MJ; name heat_woodchip
  total thermal energy required for the drying process per m3 of output
- emission of sodium: 1.73333e-6 kg/MJ; name sodium
  (same comment as for emission of Particulates >2.5 to <10)
- wood density, dry: 440 kg/m3; name dry_wood_d
  kg oven-dry matter/oven-dry volume
- moisture content board: 10 dimensionless; name moisture_board
  moisture content of board
- emission of m-Xylene: 1.6e-7 kg/MJ; name mXylene
  (same comment as for emission of Particulates >2.5 to <10)
- emission of acetaldehyde: 8.13333e-8 kg/MJ; name acet
  (same comment as for emission of Particulates >2.5 to <10)
- emission of toluene: 4e-7 kg/MJ; name toluene
  (same comment as for emission of Particulates >2.5 to <10)
- moisture content wood chip: 50 dimensionless; name moisture_woodchip
  moisture content of wood chip
- emission of ammonia: 2.30667e-6 kg/MJ; name ammonia
  (same comment as for emission of Particulates >2.5 to <10)
- wood density, basic: 422.4 kg/m3; name basic_wood_d
  kg oven-dry matter/wet volume
- emission of benzene, ethyl: 4e-8 kg/MJ; name ben_ethyl
  (same comment as for emission of Particulates >2.5 to <10)
- emission of benzo(a)pyrene: 6.66667e-10 kg/MJ; name benzo
  (same comment as for emission of Particulates >2.5 to <10)
- emission of benzene: 1.21333e-6 kg/MJ; name benzene
  (same comment as for emission of Particulates >2.5 to <10)
- emission of benzene, hexachloro: 9.6e-15 kg/MJ; name ben_hexa
  (same comment as for emission of Particulates >2.5 to <10)
- shrinkage ratio (u=30% - 0%): 0.004 dimensionless; name shrinkage_ratio
  shrinkage in % of volume per % of change in moisture content between u=30% to 0%
- emission of bromine: 8e-8 kg/MJ; name bro
  (same comment as for emission of Particulates >2.5 to <10)
- emission of cadmium: 9.33333e-10 kg/MJ; name cadmium
  (same comment as for emission of Particulates >2.5 to <10)
- emission of Hydrocarbons, aliphatic, alkanes, unspecified: 1.21333e-6 kg/MJ; name Hydrocarbons_aliphatic_alkanes
  (same comment as for emission of Particulates >2.5 to <10)
- emission of calcium: 7.8e-6 kg/MJ; name calcium
  (same comment as for emission of Particulates >2.5 to <10)
- emission of carbon monoxide, non-fossil: 0.0004 kg/MJ; name co
  (same comment as for emission of Particulates >2.5 to <10)
- emission of dinitrogen monoxide: 3.06667e-6 kg/MJ; name N2O
  (same comment as for emission of Particulates >2.5 to <10)
- emission of Magnesium: 4.8e-7 kg/MJ; name Magnesium
  (same comment as for emission of Particulates >2.5 to <10)
- emission of Hydrocarbons, aliphatic, unsaturated: 4.13333e-6 kg/MJ; name Hydrocarbons_aliphatic
  (same comment as for emission of Particulates >2.5 to <10)
- emission of Fluorine: 6.66667e-8 kg/MJ; name Fluorine
  (same comment as for emission of Particulates >2.5 to <10)
- emission of copper: 2.93333e-8 kg/MJ; name copper
  (same comment as for emission of Particulates >2.5 to <10)
- emission of chlorine: 2.4e-7 kg/MJ; name ch
  (same comment as for emission of Particulates >2.5 to <10)
- emission of dioxin measured as 2,3,7,8-tetrachlorodibenzo-p-dioxin: 4.13333e-14 kg/MJ; name tetrachloro
  (same comment as for emission of Particulates >2.5 to <10)
- emission of Methane, non-fossil: 5.33333e-7 kg/MJ; name Methane_nonfossil
  (same comment as for emission of Particulates >2.5 to <10)
- emission of chromium 4: 5.33333e-11 kg/MJ; name chroIV
  (same comment as for emission of Particulates >2.5 to <10)
- emission of chromium: 5.28e-9 kg/MJ; name chromium
  (same comment as for emission of Particulates >2.5 to <10)
- emission of Mercury: 4e-10 kg/MJ; name Mercury
  (same comment as for emission of Particulates >2.5 to <10)
- emission of Phenol, pentachloro-: 1.08e-11 kg/MJ; name Phenol_pentachloro
  (same comment as for emission of Particulates >2.5 to <10)
- emission of Formaldehyde: 1.73333e-7 kg/MJ; name Formaldehyde
  (same comment as for emission of Particulates >2.5 to <10)
- emission of lead: 3.33333e-8 kg/MJ; name lead
  (same comment as for emission of Particulates >2.5 to <10)
- emission of polycyclic aromatic hydrocarbons: 1.48e-8 kg/MJ; name PAH
  (same comment as for emission of Particulates >2.5 to <10)
- emission of Manganese: 2.26667e-7 kg/MJ; name Manganese
  (same comment as for emission of Particulates >2.5 to <10)
- emission of Particulates 2.5: 0.00012 kg/MJ; name Particulate2_5
  (same comment as for emission of Particulates >2.5 to <10)
- wood ash: 0.000634667 kg/MJ; name woodash
  generation of wood ash per MJ
- emission of Nitrogen oxides: 0.00024 kg/MJ; name no2
  (same comment as for emission of Particulates >2.5 to <10)
- emission of Nickel: 8e-9 kg/MJ; name Nickel
  (same comment as for emission of Particulates >2.5 to <10)
- furnace, wood chip: 2.31481e-8 unit/MJ; name furnace_energy
  inventory of furnace over MJ heating demand
- emission of non-methane volatile organic compounds, unspecified origin: 1.4e-5 kg/MJ; name NMVOC
  (same comment as for emission of Particulates >2.5 to <10)
- emission of sulfur dioxide: 3.33333e-6 kg/MJ; name SO2
  (same comment as for emission of Particulates >2.5 to <10)
- emission of zinc: 4e-7 kg/MJ; name zinc
  (same comment as for emission of Particulates >2.5 to <10)

## Reference product
- sawnwood, board, softwood, raw, dried (u=10%): 1 m3; name board_kiln_raw; CPC 31101: Wood, sawn or chipped lengthwise, sliced or peeled, of a thickness exceeding 6 mm, of coniferous wood; By-product classification allocatable product
  production volume 6.06206e7 m3; name p_sawnwood_dried; = 230041.728/1079420*296662059
    extrapolation from Swiss production volumes via the production of sawnwood (C= coniferous) in Switzerland and globally as reported in FAOStat
  property price 160 EUR2005; name board_kiln_raw_price_EUR2005
    Expert judgement (Urs Luginbühl, Swiss Sawmilling industry, personal communication in June 2014). Cross-reference; FAOSTAT (accessed 20140428). The price is calculated by using data on total world import quantity (m3) and import value (1000 USD), year 2005. 109432798 m3 of Sawnwood (C) - coniferous was imported in the world in 2005. The import value was 22249842000 USD. The calculated price is thus (22249842000/109432798=203*0.8=) 164 Euro.
  property water content 0.1; name water_content
  property dry mass 422.4 kg; = basic_wood_d
  property wet mass 464.64 kg; = basic_wood_d*(1+ water_content)
  property water in wet mass 42.24 kg; name WWM_dried; = basic_wood_d* water_content
  property carbon content 0.494
    carbon content on a dry matter basis (reserved; not for manual entry)
  properties: carbon content, fossil 0, carbon content, non-fossil 0.494, carbon allocation 208.666 kg

## Inputs from technosphere
- furnace, wood chips, with silo, 300kW: 8.94887e-6 unit; name furnace; lognormal variance with pedigree 0.4346, pedigree (2,1,3,5,1)
  data for heat generation from wooden chip
- technical wood drying facility: 3.66e-6 unit; name wooddrying; lognormal variance with pedigree 0.4346, pedigree (2,1,3,5,1)
  data from industry
- electricity, medium voltage: 0 kWh; name elec_midvol; pedigree (1,1,1,1,1)
  electricity consumed in the kiln. Data from industry
- sawnwood, softwood, raw: 1.08696 m3; name sawnwood; source Rudi Wagenführ 2000; lognormal variance with pedigree 0.0046, pedigree (2,1,3,5,1)
  processed internally within the sawmill
  property water in wet mass 271.04 kg; name WWM_raw
  properties: wet mass 658.24 kg, water content 0.7, carbon content, non-fossil 0.494, dry mass 387.2 kg
- wood ash mixture, pure: -0.245357 kg; name wood_ash; lognormal variance with pedigree 0.0052, pedigree (2,1,3,5,1)
  calculated from parameters according to the input wood chips for heat production; based on an updated emissions profile for industrial wood combustion (source: communication from PSI - Switzerland)
  production volume 1.48276e7 kg; = wood_ash*p_sawnwood_dried/board_kiln_raw
    Extrapolated from the amount of ash per m3 of sawnwood product via the production volume of the sawnwood product
  property price 0 EUR2005; name wood_ash_price_EUR2005
  properties: dry mass 1 kg, carbon content, non-fossil 0.012, wet mass 1 kg
- wood chips, wet, measured as dry mass: 50.2685 kg; name woodchip_soft; lognormal variance with pedigree 0.0046, pedigree (2,1,3,5,1)
  fuel used for heat generation for drying; CH industry data
  property water content 0.5; name woodchip_soft_water_content
  property wet mass 1.5 kg; name woodchip_soft_WM
  property carbon content, fossil 0; name woodchip_soft_C_content_fossil
  property heating value, gross 20.4 MJ; name woodchip_soft_Gross_Heat_Value
  property carbon content, non-fossil 0.494; name woodchip_soft_C_content_non_fossil
  property heating value, net 12.4133 MJ; name woodchip_soft_Net_Heat_Value
  property dry mass 1 kg; name woodchip_soft_DM
  property water in wet mass 0.5 kg; name woodchip_soft_WWM
  note on heating value, gross: gross (upper) heating (calorific) value according to ecoinvent guidelines 2.2
  note on heating value, net: net (lower) heating (calorific) value; calculated according to ecoinvent guidelines 2.2
- electricity, medium voltage: 0.212628, 0.0386893, 0.893062, 0.31357, 3.03949, 0.656113, 9.51295, 1.36148, 3.97202 kWh (9 entries); lognormal variance with pedigree 0.0046, pedigree (2,1,3,5,1)
  electricity consumed in the kiln. Data from industry

## Emissions to nature
- Zinc [air, urban air close to ground]: 0.000154637 kg; lognormal variance with pedigree 0.0052, pedigree (2,1,3,5,1)
  (same comment as for wood ash mixture, pure)
- Dioxins, measured as 2,3,7,8-tetrachlorodibenzo-p-dioxin [air, urban air close to ground]: 1.59791e-11 kg; lognormal variance with pedigree 0.0052, pedigree (2,1,3,5,1)
  (same comment as for wood ash mixture, pure)
- Phosphorus [air, urban air close to ground]: 0.000154637 kg; lognormal variance with pedigree 0.0052, pedigree (2,1,3,5,1)
  (same comment as for wood ash mixture, pure)
- Chromium [air, urban air close to ground]: 2.0412e-6 kg; lognormal variance with pedigree 0.0052, pedigree (2,1,3,5,1)
  (same comment as for wood ash mixture, pure)
- Formaldehyde [air, urban air close to ground]: 6.70092e-5 kg; lognormal variance with pedigree 0.0052, pedigree (2,1,3,5,1)
  (same comment as for wood ash mixture, pure)
- Potassium [air, urban air close to ground]: 0.0120616 kg; lognormal variance with pedigree 0.0052, pedigree (2,1,3,5,1)
  (same comment as for wood ash mixture, pure)
- Arsenic [air, urban air close to ground]: 5.15455e-7 kg; lognormal variance with pedigree 0.0052, pedigree (2,1,3,5,1)
  (same comment as for wood ash mixture, pure)
- Hydrocarbons, aliphatic, alkanes, unspecified [air, urban air close to ground]: 0.000469064 kg; lognormal variance with pedigree 0.0052, pedigree (2,1,3,5,1)
  (same comment as for wood ash mixture, pure)
- Sodium [air, urban air close to ground]: 0.000670092 kg; lognormal variance with pedigree 0.0052, pedigree (2,1,3,5,1)
  (same comment as for wood ash mixture, pure)
- Benzene [air, urban air close to ground]: 0.000469064 kg; lognormal variance with pedigree 0.0052, pedigree (2,1,3,5,1)
  (same comment as for wood ash mixture, pure)
- Hydrocarbons, aliphatic, unsaturated [air, urban air close to ground]: 0.00159791 kg; lognormal variance with pedigree 0.0052, pedigree (2,1,3,5,1)
  (same comment as for wood ash mixture, pure)
- Sulfur dioxide [air, urban air close to ground]: 0.00128864 kg; lognormal variance with pedigree 0.0052, pedigree (2,1,3,5,1)
  (same comment as for wood ash mixture, pure)
- Acetaldehyde [air, urban air close to ground]: 3.14428e-5 kg; lognormal variance with pedigree 0.0052, pedigree (2,1,3,5,1)
  (same comment as for wood ash mixture, pure)
- Lead [air, urban air close to ground]: 1.28864e-5 kg; lognormal variance with pedigree 0.0052, pedigree (2,1,3,5,1)
  (same comment as for wood ash mixture, pure)
- Toluene [air, urban air close to ground]: 0.000154637 kg; lognormal variance with pedigree 0.0052, pedigree (2,1,3,5,1)
  (same comment as for wood ash mixture, pure)
- Ammonia [air, urban air close to ground]: 0.000891737 kg; lognormal variance with pedigree 0.0052, pedigree (2,1,3,5,1)
  (same comment as for wood ash mixture, pure)
- Magnesium [air, urban air close to ground]: 0.000185564 kg; lognormal variance with pedigree 0.0052, pedigree (2,1,3,5,1)
  (same comment as for wood ash mixture, pure)
- Water [air, unspecified]: 0.252369 m3; = (sawnwood*WWM_raw-board_kiln_raw*WWM_dried)/1000; lognormal variance with pedigree 0.008, pedigree (1,1,3,1,1)
  difference in water in wet mass of raw and dried sawnwood, converted to m3
- Benzene, ethyl- [air, urban air close to ground]: 1.54637e-5 kg; lognormal variance with pedigree 0.0052, pedigree (2,1,3,5,1)
  (same comment as for wood ash mixture, pure)
- Manganese [air, urban air close to ground]: 8.76274e-5 kg; lognormal variance with pedigree 0.0052, pedigree (2,1,3,5,1)
  (same comment as for wood ash mixture, pure)
- Benzene, hexachloro- [air, urban air close to ground]: 3.71128e-12 kg; lognormal variance with pedigree 0.0052, pedigree (2,1,3,5,1)
  (same comment as for wood ash mixture, pure)
- Mercury [air, urban air close to ground]: 1.54637e-7 kg; lognormal variance with pedigree 0.0052, pedigree (2,1,3,5,1)
  (same comment as for wood ash mixture, pure)
- Benzo(a)pyrene [air, urban air close to ground]: 2.57728e-7 kg; lognormal variance with pedigree 0.0052, pedigree (2,1,3,5,1)
  (same comment as for wood ash mixture, pure)
- Methane, non-fossil [air, urban air close to ground]: 0.000206182 kg; lognormal variance with pedigree 0.0052, pedigree (2,1,3,5,1)
  (same comment as for wood ash mixture, pure)
- Bromine [air, urban air close to ground]: 3.09273e-5 kg; lognormal variance with pedigree 0.0052, pedigree (2,1,3,5,1)
  (same comment as for wood ash mixture, pure)
- m-Xylene [air, urban air close to ground]: 6.18546e-5 kg; lognormal variance with pedigree 0.0052, pedigree (2,1,3,5,1)
  (same comment as for wood ash mixture, pure)
- Cadmium [air, urban air close to ground]: 3.60819e-7 kg; lognormal variance with pedigree 0.0052, pedigree (2,1,3,5,1)
  (same comment as for wood ash mixture, pure)
- Nickel [air, urban air close to ground]: 3.09273e-6 kg; lognormal variance with pedigree 0.0052, pedigree (2,1,3,5,1)
  (same comment as for wood ash mixture, pure)
- Calcium [air, urban air close to ground]: 0.00301541 kg; lognormal variance with pedigree 0.0052, pedigree (2,1,3,5,1)
  (same comment as for wood ash mixture, pure)
- Nitrogen oxides [air, urban air close to ground]: 0.0927819 kg; lognormal variance with pedigree 0.0052, pedigree (2,1,3,5,1)
  (same comment as for wood ash mixture, pure)
- Carbon dioxide, non-fossil [air, urban air close to ground]: 91.0531 kg; lognormal variance with pedigree 0.0052, pedigree (2,1,3,5,1)
  calculated from parameters based on wood input oven-dry x carbon content x molar relationship of CO2/C
- PAH, polycyclic aromatic hydrocarbons [air, urban air close to ground]: 5.72155e-6 kg; lognormal variance with pedigree 0.0052, pedigree (2,1,3,5,1)
  (same comment as for wood ash mixture, pure)
- Carbon monoxide, non-fossil [air, urban air close to ground]: 0.154637 kg; lognormal variance with pedigree 0.0052, pedigree (2,1,3,5,1)
  (same comment as for wood ash mixture, pure)
- Fluorine [air, urban air close to ground]: 2.57728e-5 kg; lognormal variance with pedigree 0.0446, pedigree (5,1,3,5,1)
  (same comment as for wood ash mixture, pure)
- Chlorine [air, urban air close to ground]: 9.27819e-5 kg; lognormal variance with pedigree 0.0052, pedigree (2,1,3,5,1)
  (same comment as for wood ash mixture, pure)
- Particulates, > 2.5 um, and < 10um [air, unspecified]: 0.00257728 kg; lognormal variance with pedigree 0.0106, pedigree (2,1,3,5,1)
  (same comment as for wood ash mixture, pure)
- Chromium VI [air, urban air close to ground]: 2.06182e-8 kg; lognormal variance with pedigree 0.0052, pedigree (2,1,3,5,1)
  (same comment as for wood ash mixture, pure)
- NMVOC, non-methane volatile organic compounds, unspecified origin [air, urban air close to ground]: 0.009828 kg; lognormal variance with pedigree 0.0052, pedigree (2,1,3,5,1)
  (same comment as for wood ash mixture, pure)
- Copper [air, urban air close to ground]: 1.134e-5 kg; lognormal variance with pedigree 0.0052, pedigree (2,1,3,5,1)
  (same comment as for wood ash mixture, pure)
- Particulates, < 2.5 um [air, urban air close to ground]: 0.08424 kg; lognormal variance with pedigree 0.0052, pedigree (2,1,3,5,1)
  (same comment as for wood ash mixture, pure)
- Dinitrogen monoxide [air, urban air close to ground]: 0.00118555 kg; lognormal variance with pedigree 0.0052, pedigree (2,1,3,5,1)
  (same comment as for wood ash mixture, pure)
- Phenol, pentachloro- [air, urban air close to ground]: 4.17519e-9 kg; lognormal variance with pedigree 0.0052, pedigree (2,1,3,5,1)
  (same comment as for wood ash mixture, pure)

## Sampling procedure
complementary literature and sampling from sawmills

## Extrapolations
extrapolated from CH data. Uncertainties have been adjusted accordingly
