# treatment of waste glass pane in burnable frame, sorting plant

Dataset: EcoSpold 2, unit process
Geography: CH
Time period: 1994-01-01 to 2019-12-31
Technology level: current
Classification: EcoSpold01Categories: waste management/building demolition
Classification: ISIC rev.4 ecoinvent: 3830:Materials recovery
Tags: ConvertedDataset; Treatment
Scenario: Business-as-Usual
System model: Allocation at the point of substitution
Generated by: Gabor Doka (obsolete)
Published in: Doka G. 2007
Database: ecoinvent
isCopyrightProtected: true
accessRestrictedTo: 1

## General comment
The waste contains 1kg inert material (GSD=100%) Waste density is 2500 kg/m3.
[This dataset was already contained in the ecoinvent database version 2. It was not individually updated during the transfer to ecoinvent version 3. Life Cycle Impact Assessment results may still have changed, as they are affected by changes in the supply chain, i.e. in other datasets. This dataset was generated following the ecoinvent quality guidelines for version 2. It may have been subject to central changes described in the ecoinvent version 3 change report (http://www.ecoinvent.org/database/ecoinvent-version-3/reports-of-changes/), and the results of the central updates were reviewed extensively. The changes added e.g. consistent water flows and other information throughout the database. The documentation of this dataset can be found in the ecoinvent reports of version 2, which are still available via the ecoinvent website. The change report linked above covers all central changes that were made during the conversion process.]

## Included activities end
machines for handling in sorting plant, electricity demand for sorting plant, transport to dismantling facilities, final disposal of waste material,

## Geography
Specific to the technology mix encountered in Switzerland in late 1990ies

## Technology
Building demolition with skid-steer loaders. Dry sorting plant for building wastes with pre-sorting of mixed waste, crushing and manual sorting.

## Reference product
- waste glass pane in burnable frame: -1 kg; CPC 37111: Glass in the mass, in balls (except microspheres), rods or tubes, unworked; waste and scrap of glass; By-product classification Waste
  production volume 18 kg
    estimated proportion; source: ecoinvent v2; value to be replaced by value to be calculated from the demand for this treatment activity
  property price 0 EUR2005
    Waste products are assigned a price of zero as they are assumed to require further treatment.
  property carbon content 0
    carbon content on a dry matter basis (reserved; not for manual entry)
  properties: carbon content, non-fossil 0, carbon content, fossil 0, dry mass 1 kg, wet mass 1 kg, water content 0, water in wet mass 0 kg, carbon allocation 0 kg

## By-products
- heat, for reuse in municipal waste incineration only: 0 MJ; CPC 17300: Steam and hot water; By-product classification allocatable product; pedigree (1,1,1,1,1)
  Net useful heat generated from this waste and used in internal MSWI plant energy redistribution.
  Uncertainty: uncertainty is calculated from uncertainties in waste composition and uncertainties in energy efficiency and the uncertainty in internal energy demand
  property price 0.0106 EUR2005; name E_th_prod_MSWI_price_EUR2005
    Average European district heat price from Ecoheatcool and Euroheat 2005-2006, Ecoheat Work package 1: The European heat market. Final report. 10.6 EUR/GJ i s the price of district heat. http://www.solarthermalworld.org/files/Ecoheatcool%20WP1%20Web.pdf?download

## Inputs from technosphere
- excavation, hydraulic digger: 0.000444 m3; lognormal variance with pedigree 0.05, pedigree (1,1,5,1,1)
  handling in sorting plant. Uncertainty from range in literature
- electricity, low voltage: 0.0022 kWh; lognormal variance with pedigree 0.05, pedigree (1,1,5,1,1)
  demand in sorting plant. Uncertainty from range in literature
- waste glass: -1 kg; lognormal variance with pedigree 0.04, pedigree (1,1,5,1,1)
  disposed masses. Uncertainty calculated from uncertainty in transfer coefficients and uncertainty of waste fractions
  production volume 18 kg; = (Ref('5f067669-5143-47fc-8014-73882fb12db5')*-1)* Ref('5081fd7c-8795-46ef-9f26-1e064e43a376', 'ProductionVolume')/ABS( Ref('5081fd7c-8795-46ef-9f26-1e064e43a376'))
    Calculated from the production volume of waste glass pane in burnable frame in proportion to the respective output amounts.
  properties: wet mass 1 kg, dry mass 1 kg
- sorting facility, for construction waste: 1e-10 unit; lognormal variance with pedigree 0.04, pedigree (1,1,5,1,1)
  Uncertainty heeded in exchanges, 1kg = 1kg
  This exchange has an activity link directly to the producing activity because the product is primarily consumed in the same geographical area where it is produced.

## Sampling procedure
waste-specific calculation based on literature data

## Extrapolations
This dataset has been extrapolated from year 2002 to the year of the calculation (2019). The uncertainty has been adjusted accordingly.

## Review by Niels Jungbluth 2003-05-22
Passed. Calculation for standard deviation 95 of transport services differs from standard Pedigree approach in this project and figure obtained by this procedure (2.09). Uncertainty for estimation of distance is not included.
