# wind turbine construction, 750kW, onshore

Dataset: EcoSpold 2, unit process
Geography: RoW
Time period: 2008-01-01 to 2019-12-31
Technology level: modern
Classification: ISIC rev.4 ecoinvent: 4220a: Construction of utility projects for electricity production, except for liquid fuels
Tags: infrastructure; wind power
Scenario: Business-as-Usual
System model: Allocation at the point of substitution
Generated by: Pablo Tirado
Published in: Elsam Engineering A/S,Fredericia,Denmark 2004
Database: ecoinvent
isCopyrightProtected: true
accessRestrictedTo: 1

## General comment
This dataset represents the construction of a wind turbine with a capacity of 750kW for onshore use. The term "wind turbine" inludes moving parts such as nacelle, rotor, rotor blades, transition piece as well as fixed parts such as the tower and the foundation.

The LCI model is based on collected data from the Wind Energy Technocentre in Quebec, that estimated the bill of materials in the different parts ot the turbine. The NEG Micon 750kW/48 has been taken as reference technology for wind turbines with a capacity lower than 1MW.
Some missing data were completed by extrapolation from 2MW turbine dataset.

Parts of the wind turbine are the following:
- Rotor: Rotor blades, rotor hub, extender
- Nacelle: The nacelle consists of the nacelle cover, which includes generator, gear, main shaft, yaw system, flanges etc.
- Electronics
- Tower (steel)
- Foundation

## Included activities start
From the transformation of pasture land to industrial site, and from the reception and treatment of building materials and turbine parts.

## Included activities end
This activity ends with the decommissioning of the wind turbine and the treatment of the resulting materials in the end of the lifetime.

This dataset includes
- all materials for the construction of the wind turbine and their treatment, but not the energy for their assembling
- land transformation and use
- energy needed for erection and dismantling of the wind turbine.

This dataset doesn't include
- the connection to the grid, which is modeled in a separate dataset.
- the operation and maintenance of the fully finished wind power plant. It is assumed that all parts will hold for the lifetime of 20 years and don't have to be replaced.
- auxiliary materials such as packaging materials or vacuum fleece.
- any losses of materials (waste) during the processing of the different wind turbine parts.
- neither the energy use for assembly of the different wind turbine parts nor their transportation from manufacture to the construction site.

## Technology
Operational parameters:
Nominal output 750 kW
Power regulation Stall
Nominal wind speed 16 m/s
Cut-in 4 m/s
Cut-out 25 m/s
Rotor:
Rotor diameter 48.2 m
Rotor swept area 1824 m2
Number of blades 3
Rotor revolutions 22/15 rpm
Rotor placing Upwind rotor
Brake system:
Blade tip air brake Hydraulic, fail-safe
Disk brake Hydraulic, fail-safe
Drive train
Gear type Planetary - parallel axle
Ratio 1:67.5
Main shaft Forged shaft and flange
Main bearing Spherical roller bearing
Cooling Heat exchanger with pump
Generator:
Type Asynchronous, 4/6 pole
Nominal voltage 690 V
Nominal frequence 50 Hz
Name plate rating 750/200 kW
Cooling Liquid-cooled with pump
Yaw system:
Type Ball bearing
Yaw brake 3 Friction brake/motor brake
Drive mechanism 4 electrical planetary gears
Tower:
Type Conical, steel, painted
Hub height In accordance with approval
Controller:
Type Computer controlling
Computer controlling Soft by thyristors
Capacitor bank No-load compensated
Remote control By modem
Weight:Tower weight 60t
Rotor+Nacelle weight: 30.5 tSource:

## Time period
Turbines present in 2008 in Quebec wind power park. Lifespan of 20 years

## Parameters
- Percentage of onshore wind power plant class capacity on total: 1; name percentage_onshore; lognormal variance with pedigree 0.009325, pedigree (2,2,1,2,2)
  Percentages onshore 2008 of the three wind power plant classes (average from 41 countries worldwide): <1MW 19.7%; 1-3MW 69.6%; >3MW 10.7% [compilation out of "The Wind Power Database, 2011"]. These percentages are taken to calculate the number of new wind power plants per class with the assumption of average capacity values (0.8MW, 2MW, 4.5MW) .
  Source:
  The Wind Power. 2011. Wind power and wind farms database. www.thewindpower.net
- Installed capacity: 26911 MW; name capacity_installed_new; lognormal variance with pedigree 0.0018, pedigree (2,1,1,1,2)
  Literature value/statistics. New installed capacity of wind power in the world, onshore, 2008. Calculated from the total new installed capacity (27261 MW) minus new capacity offshore (350 MW). [WWEA, 2009. World Wind Energy Report 2008. World Wind Energy Association, Bonn. Table p.12f and chapter "offshore wind energy", p.8]

## Reference product
- wind turbine, 750kW, onshore: 1 unit; name wind_turbine; By-product classification allocatable product; CPC 53262: Power plants
  production volume 1787.42 unit; name APV_turbine; = capacity_installed_new* percentage_onshore/ (wind_turbine_capacity* wind_turbine_lifetime)
    Calculated value based on installed capacity of this category in the 1999-2012 period and the lifetime of the turbines.
  property price 177540 EUR2005; name wind_turbine_price_EUR2005
    Calculated based on inputs: The price of the product has been calculated as a sum of the values of the material and energy inputs for this product. This value is therefore a rough estimation. It may underestimate the real price since there are additional expenses when producing any product. These expences can include for example labour costs, treatment of waste materials and profit for the producer. Please consider carefully whether this level of data quality is acceptable for your application.
  property capacity [MW] 0.75 MW; name wind_turbine_capacity
  property lifetime 20 year; name wind_turbine_lifetime
  property true value 177540; name wind_turbine_true_value
    allocation property applied in "true value" allocation // value calculated from revenue

## By-products
- iron scrap, unsorted: 0 kg; source European Aluminium Association 2008; CPC 39310: Slag, dross, scalings and other waste from the manufacture of iron or steel; By-product classification Recyclable; pedigree (1,1,1,1,1)
  Reported as "Iron scrap"
  production volume 50243.1 kg
  property price 0.149 EUR2005; name ironScrapAmount_price_EUR2005
    Temporary price data. Calculated as 90% of purchasers price based on: estimated at 85% of sorted scrap
  property carbon content 0
    carbon content on a dry matter basis (reserved; not for manual entry)
  property true value 4.18829
    allocation property applied in "true value" allocation // value calculated from revenue
  properties: water content 0, water in wet mass 0 kg, dry mass 1 kg, carbon content, non-fossil 0, wet mass 1 kg, carbon content, fossil 0, carbon allocation 0 kg
- aluminium oxide, non-metallurgical: 0 kg; source European Aluminium Association 2008; CPC 41432: Alumina (aluminium oxide), except artificial corundum; By-product classification allocatable product; CAS 1344-28-1; pedigree (1,1,1,1,1)
  production volume 102275 kg
  property carbon content, non-fossil 0; name C_content_non_fossil
  property price 0.28 EUR2005; name Al2O3Amount_price_EUR2005
    From UN trade database. http://data.un.org/ Import data from the largest economies of the world are used (Brazil, India, USA, China, Japan and EU-27).
  property dry mass 1 kg; name DM
  property water content 0; name water_content
  property wet mass 1 kg; name WM
  property water in wet mass 0 kg; name WWM
  property carbon content, fossil 0; name C_content_fossil
  property carbon content 0
    carbon content on a dry matter basis (reserved; not for manual entry)
  property true value 16.0215
    allocation property applied in "true value" allocation // value calculated from revenue
  properties: carbon allocation 0 kg
- aluminium, cast alloy: 0 kg; source European Aluminium Association 2008; By-product classification allocatable product; CPC 41431: Unwrought aluminium; pedigree (1,1,1,1,1)
  EcoSpold01Location=RER
  production volume 956046 kg
  property price 1.3 EUR2005; name castAlloyAmount_price_EUR2005
  properties: water in wet mass 0 kg, carbon content, non-fossil 0, water content 0, dry mass 1 kg, carbon content, fossil 0, wet mass 1 kg, carbon content 0, carbon allocation 0 kg, true value 695.338
- heat, for reuse in municipal waste incineration only: 0 MJ; CPC 17300: Steam and hot water; By-product classification allocatable product; pedigree (1,1,1,1,1)
  Net electricity generated from this waste and used in internal MSWI plant energy redistribution.
  Uncertainty: uncertainty is calculated from uncertainties in waste composition and uncertainties in energy efficiency and the uncertainty in internal energy demand
  production volume 8.955e7 MJ
  property exergy 0.1842 MJ; name E_th_prod_MSWI_exergy
    This exergy property is based on the exergy content of the product.
  property true value relation 0.1842; name E_th_prod_MSWI_true_value_relation
    property to calculate "true value" from
  property price 0.0106 EUR2005; name E_th_prod_MSWI_price_EUR2005
    Average European district heat price from Ecoheatcool and Euroheat 2005-2006, Ecoheat Work package 1: The European heat market. Final report. 10.6 EUR/GJ i s the price of district heat. http://www.solarthermalworld.org/files/Ecoheatcool%20WP1%20Web.pdf?download
  property true value 20.522
    allocation property applied in "true value" allocation // value calculated from true value relation
- electricity, for reuse in municipal waste incineration only: 0 kWh; CPC 17100: Electrical energy; By-product classification allocatable product; pedigree (1,1,1,1,1)
  (same comment as for heat, for reuse in municipal waste incineration only)
  production volume 1.29088e7 kWh
  property exergy 3.6 MJ; name E_el_prod_MSWI_exergy
    This exergy property is based on the exergy content of the product.
  property true value relation 3.6; name E_el_prod_MSWI_true_value_relation
    property to calculate "true value" from
  property price 0.1 EUR2005; name E_el_prod_MSWI_price_EUR2005
    Estimated to be the same price as in case of electricity, medium voltage.
  property true value 57.4891
    (same comment as for heat, for reuse in municipal waste incineration only)
- aluminium, wrought alloy: 0 kg; source European Aluminium Association 2008; By-product classification allocatable product; CPC 4153: Semi-finished products of aluminium or aluminium alloys; pedigree (1,1,1,1,1)
  production volume 418538 kg
  property price 1.44 EUR2005; name secondaryAluminiumOutput_price_EUR2005
  properties: wet mass 1 kg, water content 0, carbon content, fossil 0, water in wet mass 0 kg, carbon content, non-fossil 0, dry mass 1 kg, carbon content 0, carbon allocation 0 kg, true value 337.188
- copper: 0 kg; source Rentz O. 1999; By-product classification allocatable product; CPC 41413: Refined copper and copper alloys, unwrought; master alloys of copper
  Literature value. Copper uses: Before end-use copper is manufactured into semi fabricated products, such as shapes and ingots (known as 'semis'). These manufacturing processes are subdivided into hot working, cold working and, if necessary, process annealing. Few of the semis are ready for use as such. They more typically travel to first-stage manufacturers, who make metal rods, wire, and casting, and then to component manufacturers who produce such things as motors, valves, and insulated cables The components in turn are incorporated by final-stage manufacturers into a variety of finished products - automobiles, commercial buildings, residential housing, and so forth. These uses account for about 79% of the world-wide consumption of copper.
  production volume 2.64587e6 kg
  properties: dry mass 1 kg, water in wet mass 0 kg, wet mass 1 kg, carbon content, non-fossil 0, water content 0, price 5.52 EUR2005, carbon content, fossil 0, carbon content 0, carbon allocation 0 kg, true value 4117.18
- zinc concentrate: 0 kg; CPC 14290: Other non-ferrous metal ores and concentrates (other than uranium or thorium ores and concentrates); By-product classification allocatable product
  Calculated value from the knowledge of the properties of both products.
  production volume 837.61 kg
  property price 0.38 EUR2005; name ByP_price_EUR2005
    Temporary price data. Calculated as 90% of purchasers price based on: Zinc content in concentrate 53%. Concentrate price per kg Zn 86.5% of refined Zn price (13.5% treatment charges according to CHR Metals Limited 2005: Dynamic cost curves. http://www.minecost.com/dynamic.pdf). 2004 zinc price from USGS (2007) Mineral commodity summaries 2007. <http://minerals.usgs.gov/minerals/pubs/mcs/2007/mcs2007.pdf> [Accessed 25 May 2010]
  property zinc content 0.53; name zinc_C_zinc_concentrate
    Zinc content on a dry matter basis. Value taken from teh "zinc mine operation" /GLO dataset.
  property dry mass 1 kg; name DM_zinc_concentrate
  property carbon content 0
    carbon content on a dry matter basis (reserved; not for manual entry)
  property true value 0.00899885
    allocation property applied in "true value" allocation // value calculated from revenue
  properties: wet mass 1 kg, water content 0, carbon content, non-fossil 0, carbon content, fossil 0, water in wet mass 0 kg, carbon allocation 0 kg
- iron scrap, sorted, pressed: 0 kg; By-product classification Recyclable; CPC 39310: Slag, dross, scalings and other waste from the manufacture of iron or steel; pedigree (1,1,1,1,1)
  metallic iron scrap removed from ash reamains and recycled.
  Uncertainty: uncertainty is calculated from uncertainties in waste composition and transfer coefficients to soild residues
  production volume 1.68939e7 kg
  property price 0.175 EUR2005
    Temporary price data. Calculated as 90% of purchasers price based on: 2005 import and export prices (total trades (USD) divided by total weight (kg) in biggest economies of the world: EU27, USA, Brasil, China, India, Japan and Russia) from UN Commodity Trade Statistics Database (http://data.un.org/Explorer.aspxDatabase [Accessed 2011.06.20]). Commodity: Waste or scrap, of cast iron
  property carbon content 0
    carbon content on a dry matter basis (reserved; not for manual entry)
  property true value 46.8981
    allocation property applied in "true value" allocation // value calculated from revenue
  properties: carbon content, non-fossil 0, wet mass 1 kg, dry mass 1 kg, water content 0, carbon content, fossil 0, water in wet mass 0 kg, carbon allocation 0 kg
- lead: 0 kg; CPC 41441: Lead, unwrought; By-product classification allocatable product
  EcoSpold01Location=SE
  production volume 4004.42 kg
  property price 0.744 EUR2005
    Temporary price data. Calculated as 90% of purchasers price based on: Source: ecoinvent v2 report 10-part IX, Tab 5.10 & 2.5
  property carbon content 0
    carbon content on a dry matter basis (reserved; not for manual entry)
  property true value 0.733397
    allocation property applied in "true value" allocation // value calculated from revenue
  properties: wet mass 1 kg, water content 0, carbon content, non-fossil 0, carbon content, fossil 0, dry mass 1 kg, water in wet mass 0 kg, carbon allocation 0 kg
- nickel, 99.5%: 0 kg; CPC 41422: Unwrought nickel; By-product classification allocatable product
  EcoSpold01Location=SE
  production volume 8359.12 kg
  property price 10.4 EUR2005
    Temporary price data. Calculated as 90% of purchasers price based on: 2004 nickel price from USGS (2007) Mineral commodity summaries 2007. <http://minerals.usgs.gov/minerals/pubs/mcs/2007/mcs2007.pdf> [Accessed 25 May 2010]
  property carbon content 0
    carbon content on a dry matter basis (reserved; not for manual entry)
  property true value 21.4003
    allocation property applied in "true value" allocation // value calculated from revenue
  properties: water in wet mass 0 kg, wet mass 1 kg, carbon content, non-fossil 0, dry mass 1 kg, water content 0, carbon content, fossil 0, carbon allocation 0 kg
- silver: 0 kg; CPC 41310: Silver (including silver plated with gold or platinum), unwrought or in semi-manufactured forms, or in powder […]; By-product classification allocatable product; CAS 7440-22-4
  EcoSpold01Location=SE
  production volume 1380.42 kg
  property price 178 EUR2005
    (same comment as for lead)
  property carbon content 0
    carbon content on a dry matter basis (reserved; not for manual entry)
  property true value 60.4867
    allocation property applied in "true value" allocation // value calculated from revenue
  properties: wet mass 1 kg, carbon content, non-fossil 0, dry mass 1 kg, water content 0, carbon content, fossil 0, water in wet mass 0 kg, carbon allocation 0 kg
- palladium: 0 kg; CPC 4160: Other non-ferrous metals and articles thereof (including waste and scrap of some metals); cermets and articles […]; By-product classification allocatable product
  EcoSpold01Location=SE
  production volume 76.4155 kg
  property price 5640 EUR2005
    Temporary price data. Calculated as 90% of purchasers price based on: 2004 price from USGS (2007) Mineral commodity summaries 2007. <http://minerals.usgs.gov/minerals/pubs/mcs/2007/mcs2007.pdf> [Accessed 25 May 2010]
  property carbon content 0
    carbon content on a dry matter basis (reserved; not for manual entry)
  property true value 106.093
    allocation property applied in "true value" allocation // value calculated from revenue
  properties: wet mass 1 kg, carbon content, fossil 0, water in wet mass 0 kg, water content 0, carbon content, non-fossil 0, dry mass 1 kg, carbon allocation 0 kg
- gold: 0 kg; CPC 41320: Gold (including gold plated with platinum), unwrought or in semi-manufactured forms, or in powder form; By-product classification allocatable product; CAS 7440-57-5
  EcoSpold01Location=SE
  production volume 41.906 kg
  property price 10600 EUR2005
    Temporary price data. Calculated as 90% of purchasers price based on: Source: ecoinvent v2 report 10-part IX, Tab 2.5
  property carbon content 0
    carbon content on a dry matter basis (reserved; not for manual entry)
  property true value 109.347
    allocation property applied in "true value" allocation // value calculated from revenue
  properties: wet mass 1 kg, carbon content, fossil 0, dry mass 1 kg, carbon content, non-fossil 0, water content 0, water in wet mass 0 kg, carbon allocation 0 kg

## Inputs from technosphere
- steel, chromium steel 18/8: 18710.6 kg; name chromium_steel; source Elsam Engineering A/S,Fredericia,Denmark 2004, p. p. 25, Tab. 5.3; lognormal variance with pedigree 0.0116, pedigree (3,1,4,1,2)
  Literature value. Steel used in moving parts
  Uncertainty: estimated variance. higher uncertainty because of the fact discussed in the comment.
  properties: wet mass 1 kg, dry mass 1 kg, carbon content, fossil 0.0008
  note on carbon content, fossil: Stainless steel model is the grade 304 steel (18/8 stainless, 18% chromium 8% nickel; max. 0.08% C)
- epoxy resin, liquid: 4265.62 kg; name epoxy; = 10000*0.4*1.1; lognormal variance with pedigree 0.0186, pedigree (3,1,4,1,3)
  Literature value. Used for the rotor blades. Steel and aluminium blades are used for small wind turbines. For large ones, they have problems of weight or metal fatigue. Most modern rotor blades on large wind turbines are made of glass fiber reinforced polyester or epoxy. Carbon fiber or Kevlar seems to be too expensive for large turbines. [Chataignere A. and Le Boulch D. (2003) Wind Turbine Systems. Final report ECLIPSE. EDF R&D, Clamart Cedex, France.]
  Prepreg is used as material for the blades in this dataset. It was not possible to get information on the exact composition of Prepreg. From the supplier’s PrePreg safety data sheets it is assumed that Prepreg consists of approx 40% epoxy and 60% glass fibre. Total Prepreg mass is 21507 kg. When using PrePreg in the manufacturing process, up to 10% of the PrePreg turns into waste due to cutoffs.
  properties: wet mass 1 kg, carbon content, fossil 0.42325, dry mass 1 kg
- aluminium scrap, post-consumer: -969.46 kg; name scrap_alu; = (alu_cast+alu_wrought)*-1; lognormal variance with pedigree 0.008, pedigree (1,1,4,1,1)
  Calculated value. It can be assumed that 100% of the aluminium enter a recycling process.
  Uncertainty: Calculated variable. Uncertainty will be determined from propagation of uncertainty factors of underlying variables. Uncertainty of actual relation between variables not accounted at this time, although this could be included in a future update.
  production volume 1.78742e6 kg; = APV_turbine * scrap_alu / wind_turbine
    Calculated from production volume of reference product using the relative outputs.
  property lifetime 20 year; name scrap_alu_lifetime
  property price 0.685 EUR2005; name scrap_alu_price_EUR2005
  properties: wet mass 1 kg, dry mass 1 kg
- wire drawing, copper: 2811.43 kg; = copper; lognormal variance with pedigree 0.008, pedigree (1,1,4,1,1)
  Estimated value.
  Uncertainty: Calculated variable. Uncertainty will be determined from propagation of uncertainty factors of underlying variables. Uncertainty of actual relation between variables not accounted at this time, although this could be included in a future update.
- aluminium, wrought alloy: 659.233 kg; name alu_wrought; = 0.68*1000; source Elsam Engineering A/S,Fredericia,Denmark 2004, p. p. 25, Tab. 5.3; lognormal variance with pedigree 0.059025, pedigree (4,4,5,2,3)
  Literature value/calculated value. The shares of cast alloy and wrought alloy aluminium in the cancelled ecoinvent v2 "aluminium production mix" dataset amounted to 32% (cast alloy) and 68% (wrought alloy) respectively. These shares have been overtaken to distribute the original amount of 1678 kg aluminium.
  Uncertainty: estimated variance. slightly higher technological score because of the split of the aluminium use in the two aluminium types.
  properties: dry mass 1 kg, wet mass 1 kg
- scrap steel: 0 kg; name scrap_steel; pedigree (1,1,1,1,1)
  Calculated value. The zinc coating of the steel tower is included in the scrap steel, which is a simplification. It can be assumed that 100% of the steel enter a recycling process.
  Uncertainty: Calculated variable. Uncertainty will be determined from propagation of uncertainty factors of underlying variables. Uncertainty of actual relation between variables not accounted at this time, although this could be included in a future update.
  production volume 0 kg
    Calculated from production volume of reference product using the relative outputs.
  property price 0 EUR2005; name scrap_steel_price_EUR2005
  property lifetime 20 year; name scrap_steel_lifetime
  properties: dry mass 1 kg, wet mass 1 kg
- excavation, hydraulic digger: 128.311 m3; = concrete_foundation; lognormal variance with pedigree 0.008, pedigree (1,1,4,1,1)
  (same comment as for wire drawing, copper)
- electronics, for control units: 426.562 kg; name electronics; source Vestas 2011, p. p.41; lognormal variance with pedigree 0.065025, pedigree (4,5,5,2,3)
  Estimated value. This amount corresponds to a 2MW turbine
  Uncertainty: estimated variance
  properties: wet mass 1 kg, carbon content, non-fossil 0.00013442, dry mass 1 kg, carbon content, fossil 0.337146
  note on carbon content, non-fossil: The control unit has a composition of 46% steel (housing), 32% plastics, 14% printed wiring boards and 8% cables (various types).;
- sheet rolling, chromium steel: 18710.6 kg; = chromium_steel; lognormal variance with pedigree 0.008, pedigree (1,1,4,1,1)
  (same comment as for wire drawing, copper)
- waste reinforced concrete: 0 kg; name waste_concrete_reinforced; pedigree (1,1,1,1,1)
  Calculated value. A density of 2400kg/m3 is assumed for the reinforced concrete.
  Uncertainty: Calculated variable. Uncertainty will be determined from propagation of uncertainty factors of underlying variables. Uncertainty of actual relation between variables not accounted at this time, although this could be included in a future update.
  production volume 0 kg
    Calculated from production volume of reference product using the relative outputs.
  property price 0 EUR2005; name waste_concrete_reinforced_price_EUR2005
  property lifetime 20 year; name waste_concrete_reinforced_lifetime
  properties: dry mass 0.99418 kg, wet mass 1 kg, water content 0.00585407
  note on lifetime: Literature value. 10% of this waste type incur during the construction of the wind turbine and therefore would only have a very short lifetime.
- welding, arc, steel: 184.197 m; source Burger, B. 2007; lognormal variance with pedigree 0.211, pedigree (5,5,5,5,5)
  Estimated value. For the tower the most common welding process (MAG-C-process) is assumed. Welding is accounted at a length of 3.8 m height of the tower. The expenses for material consumption are estimated with a weld of 0.166 kg/m and is rounded up generously. A total of 190 m of welding seam in different forms and strenghts are estimated.
  Uncertainty: empiric factor, high uncertainty
- waste glass: 0 kg; name waste_glass; pedigree (1,1,1,1,1)
  Estimation. The glass fibre reinforced plastic of the rotor is disposed of as 50% glass and 50% plastic. When using PrePreg in the manufacturing process, up to 10% of the PrePreg turns into waste due to cutoffs directly. The remaining amount will turn into waste/by-product after 20 years.
  Today, it is not possible to recycle the turbine blades. When the turbine’s lifetime expires, the blades will
  be dismantled into smaller pieces, which are deposited at controlled waste deposits.[Elsam. 2004b. Life Cycle Assessment of turbines PSO 1999. Elsam Engineering A/S, Fredericia, Denmark]
  Uncertainty: Calculated variable. Uncertainty will be determined from propagation of uncertainty factors of underlying variables. Uncertainty of actual relation between variables not accounted at this time, although this could be included in a future update.
  production volume 0 kg
    Calculated from production volume of reference product using the relative outputs.
  property price 0 EUR2005; name waste_glass_price_EUR2005
  property lifetime 20 year; name waste_glass_lifetime
  properties: dry mass 1 kg, wet mass 1 kg
- waste polyethylene/polypropylene product: 0 kg; name waste_polyethypropy; pedigree (1,1,1,1,1)
  Calculated value. Proxy for the treatment of the epoxy resin (polyepoxide, formed from reaction of an epoxide resin with polyamine hardener). When using PrePreg in the manufacturing process, up to 10% of the PrePreg turns into waste due to cutoffs directly. The remaining amount will turn into waste/by-product after 20 years.
  Uncertainty: Calculated variable. Uncertainty will be determined from propagation of uncertainty factors of underlying variables. Uncertainty of actual relation between variables not accounted at this time, although this could be included in a future update.
  production volume 0 kg
    Calculated from production volume of reference product using the relative outputs.
  property lifetime 20 year; name waste_polyethypropy_lifetime
  property price 0 EUR2005; name waste_polyethypropy_price_EUR2005
  properties: wet mass 1 kg, water content 0.180638, dry mass 0.847 kg, carbon content, fossil 0.748045
  note on carbon content, fossil: Mixed various plastics was used to estimate the C content of this waste (Tab A.2, ecoinvent v2.2 report 13_I)
- scrap copper: 0 kg; name scrap_copper; pedigree (1,1,1,1,1)
  Calculated value. It can be assumed that 100% of the copper enter a recycling process.
  Uncertainty: Calculated variable. Uncertainty will be determined from propagation of uncertainty factors of underlying variables. Uncertainty of actual relation between variables not accounted at this time, although this could be included in a future update.
  production volume 0 kg
    Calculated from production volume of reference product using the relative outputs.
  property price 0 EUR2005; name scrap_copper_price_EUR2005
  property lifetime 20 year; name scrap_copper_lifetime
  properties: dry mass 1 kg, wet mass 1 kg
- glass fibre reinforced plastic, polyamide, injection moulded: 6398.44 kg; name glass_plastic; = 10000*0.6*1.1; source Elsam Engineering A/S,Fredericia,Denmark 2004, p. p. 25, Tab. 5.3; lognormal variance with pedigree 0.0186, pedigree (3,1,4,1,3)
  Literature value. Used for the rotor blades. Steel and aluminium blades are used for small wind turbines. For large ones, they have problems of weight or metal fatigue. Most modern rotor blades on large wind turbines are made of glass fiber reinforced polyester or epoxy. Carbon fiber or Kevlar seems to be too expensive for large turbines. [Chataignere A. and Le Boulch D. (2003) Wind Turbine Systems. Final report ECLIPSE. EDF R&D, Clamart Cedex, France.]
  Prepreg is a glass fibre mat impregnated with epoxy resin used for the blades in this dataset. It was not possible to get information on the exact composition of Prepreg. From the supplier’s PrePreg safety data sheets it is assumed that Prepreg consists of approx 40% epoxy and 60% glass fibre. Total Prepreg mass is 21507 kg. When using PrePreg in the manufacturing process, up to 10% of the PrePreg turns into waste due to cutoffs.
  properties: carbon content, fossil 0.446018, wet mass 1 kg, dry mass 1 kg
  note on carbon content, fossil: Polyamide resin assimilate to Nylon 66 (ecoinvent v2.2 report 7_XIII). Nylon 66 is derived from hexamethylene diamine and adipic acid and has the following structure: -(HN-(CH2)6-NH-CO-(CH2)4-CO)n- (ecoinvent v2.2 report 11_II), C12H22N2O2. MW=226 g/mol. Here Nylon 66 is – mainly for improved stiffness and stability – modified with glass fibres. The glass fibre content in the product is assumed of 30%. (ecoinvent v2.2 report 11_II)
- concrete, normal: 0 m3; name concrete_foundation; source Elsam Engineering A/S,Fredericia,Denmark 2004, p. p. 13, 21+25, Tab. 5.3; pedigree (1,1,1,1,1)
  Literature value. Used for foundation.
  315t of concrete used for the foundation
  Uncertainty: estimated variance
  property wet mass 2380 kg; name concreteWM
  property dry mass 2190 kg; name concreteDM
  properties: water content 0.086758
- polyethylene, high density, granulate: 602.035 kg; name hdpe; source Elsam Engineering A/S,Fredericia,Denmark 2004, p. p. 25, Tab. 5.3; lognormal variance with pedigree 0.366, pedigree (5,5,4,5,3)
  Estimation. Used for the network connectionand for the electronical system.
  Further references:
  Scholzen (1991): Oekobilanz von Windenergie am Beispiel einer 30 kW-Anlage auf dem Simplon. Semesterarbeit am Laboratorium für Energiesysteme, ETH Zürich.
  properties: carbon content, fossil 0.857143, wet mass 1 kg, dry mass 1 kg
  note on carbon content, fossil: Polyethylene is formed out of a huge amount of ethylene monomers (C2H4) (ecoinvent v2.2 report 11_II). MW=28 g/mol
- zinc coat, pieces: 852.349 m2; = 70*4*3.14; lognormal variance with pedigree 0.032625, pedigree (4,5,4,2,3)
  Calculated value. The surface for zinc coating is estimated with a diameter and a height of the tower of 4 m and 70 m, respectively.
- zinc: 196.8 kg; source Elsam Engineering A/S,Fredericia,Denmark 2004, p. p. 25, Tab. 5.3; lognormal variance with pedigree 0.097025, pedigree (5,5,5,2,3)
  Literature value
  Uncertainty: estimated variance
  properties: dry mass 1 kg, wet mass 1 kg
- aluminium, cast alloy: 310.227 kg; name alu_cast; = 0.32*1000; source Elsam Engineering A/S,Fredericia,Denmark 2004, p. p. 25, Tab. 5.3; lognormal variance with pedigree 0.059025, pedigree (4,4,5,2,3)
  (same comment as for aluminium, wrought alloy)
  properties: wet mass 1 kg, dry mass 1 kg
- reinforcing steel: 9898.27 kg; name steel_reinforcing; = 27000* concrete_foundation/350; source Elsam Engineering A/S,Fredericia,Denmark 2004, p. p. 21; lognormal variance with pedigree 0.025, pedigree (4,5,4,1,1)
  Literature value. Used in the foundation.
  It is assumed the same ratio reinforcing steel/concrete than in other foundations.
  reinforcing steel in 2MW turbine=27t
  concrete in 2MW turbine= 350m3
  Uncertainty: estimated variance. higher uncertainty because of the fact discussed in the comment.
  properties: wet mass 1 kg, dry mass 1 kg, carbon content, fossil 0.004
- road: 7755.68 m*year; = (10000/25)* lifetime; source Vestas 2011, p. p.81; lognormal variance with pedigree 0.065025, pedigree (4,5,5,2,3)
  Literature value/estimation. Generally a combination of tarred roads and dirt roads need to be built to provide access to the power plant turbines, which are often located in remote locations. It has been estimated that 10 km of tarred road is needed for a power plant with 25 wind turbines.
  No maintenance is assumed.
  Uncertainty: estimated variance
- electricity, medium voltage: 0 kWh; source Burger, B. 2007; pedigree (1,1,1,1,1)
  Literatur value / calculation: Additional to energy requirements for material processing, a factor of 0.5 kWh/kg material (except of concrete for the foundation) after is included.Total wind turbine weight is about 286000 kg (see Technology comment for details). This should also cover the energy required for mounting and removal of the turbine.
  Uncertainty: rough estimation
- waste polyethylene: 0 kg; name waste_polyethy; pedigree (1,1,1,1,1)
  Calculated value
  Uncertainty: Calculated variable. Uncertainty will be determined from propagation of uncertainty factors of underlying variables. Uncertainty of actual relation between variables not accounted at this time, although this could be included in a future update.
  production volume 0 kg
    Calculated from production volume of reference product using the relative outputs.
  property price 0 EUR2005; name waste_polyethy_price_EUR2005
  property lifetime 20 year; name waste_polyethy_lifetime
  properties: water content 0.00401606, dry mass 0.996 kg, wet mass 1 kg, carbon content, fossil 0.825301
  note on carbon content, fossil: C content in 1 kg DM was calculated using data in Tab A.1, ecoinvent v2.2 report 13_I
- sheet rolling, steel: 62627.1 kg; = steel_lowalloyed; lognormal variance with pedigree 0.008, pedigree (1,1,4,1,1)
  Estimated value.The steel is delivered to in steel plates, which have already been pre-cut. In addition, there is no waste of steel. The plates for the tower sections are rolled. Every section is welded lengthwise, then the individual sections are welded together.
  Uncertainty: Calculated variable. Uncertainty will be determined from propagation of uncertainty factors of underlying variables. Uncertainty of actual relation between variables not accounted at this time, although this could be included in a future update.
- electronics scrap from control units: -426.562 kg; name electronics_scrap; = (electronics)*-1; lognormal variance with pedigree 0.008, pedigree (1,1,4,1,1)
  (same comment as for waste polyethylene)
  production volume 1.78742e6 kg; = APV_turbine * (scrap_alu*-1) / wind_turbine
    Calculated from production volume of reference product using the relative outputs.
  property price 0 EUR2005; name electronics_scrap_price_EUR2005
  property lifetime 20 year; name lifetime
  properties: carbon content, non-fossil 0.00013442, dry mass 1 kg, carbon content, fossil 0.337146, wet mass 1 kg
- steel, low-alloyed: 62627.1 kg; name steel_lowalloyed; source Elsam Engineering A/S,Fredericia,Denmark 2004, p. p. 25, Tab. 5.3; lognormal variance with pedigree 0.0102, pedigree (2,1,4,1,2)
  Literature value. Used in the tower. It is assumed that the steel is delivered in steel plates, which have already been pre-cut. In addition, there is no waste of steel. The plates for the tower sections are rolled. Every section is welded lengthwise, then the individual sections are welded together. Subsequent surface treatment (i.e. sandblasting) is not taken into account in this dataset.
  Uncertainty: estimated variance
  properties: wet mass 1 kg, carbon content, fossil 0.005, dry mass 1 kg
  note on carbon content, fossil: Low alloyed steel composition given in Tab. 3.2 ecoinvent v2.2 report 10_partII. Steel assumed to have a C content of 0.5%
- sheet rolling, aluminium: 969.46 kg; = alu_cast+alu_wrought; lognormal variance with pedigree 0.008, pedigree (1,1,4,1,1)
  Estimated value. Proxy for wire drawing of aluminium.
  Uncertainty: Calculated variable. Uncertainty will be determined from propagation of uncertainty factors of underlying variables. Uncertainty of actual relation between variables not accounted at this time, although this could be included in a future update.
- copper: 2811.43 kg; source Elsam Engineering A/S,Fredericia,Denmark 2004, p. p. 25, Tab. 5.3; lognormal variance with pedigree 0.0116, pedigree (3,1,4,1,2)
  Literature value. Used in moving parts (nacelle, gearbox, generator)
  Uncertainty: estimated variance
  properties: wet mass 1 kg, dry mass 1 kg
- waste plastic, mixture: 0 kg; name waste_plastic; pedigree (1,1,1,1,1)
  Estimation. The glass fibre reinforced plastic of the rotor is disposed of as 50% glass and 50% plastic. When using PrePreg in the manufacturing process, up to 10% of the PrePreg turns into waste due to cutoffs directly. A large percentage of this waste is sent to recycling as it is directly used in the production of e.g. high-strength construction panels. The remaining glass fibre reinforced plastic amount will turn into waste/by-product after 20 years.
  Today, it is not possible to recycle the turbine blades. When the turbine’s lifetime expires, the blades will
  be dismantled into smaller pieces, which are deposited at controlled waste deposits.[Elsam. 2004b. Life Cycle Assessment of turbines PSO 1999. Elsam Engineering A/S, Fredericia, Denmark]
  Uncertainty: Calculated variable. Uncertainty will be determined from propagation of uncertainty factors of underlying variables. Uncertainty of actual relation between variables not accounted at this time, although this could be included in a future update.
  production volume 0 kg
    Calculated from production volume of reference product using the relative outputs.
  property price 0 EUR2005; name waste_plastic_price_EUR2005
  property lifetime 20 year; name waste_plastic_lifetime
  properties: carbon content, fossil 0.747344, wet mass 1 kg, water content 0.180638, dry mass 0.847 kg
  note on carbon content, fossil: C content in 1 kg DM was calculated using data in Tab A.2, ecoinvent v2.2 report 13_I
- scrap steel: -102.95, -81431.5 kg (2 entries); lognormal variance with pedigree 0.008, pedigree (1,1,4,1,1)
  (same comment as for scrap steel)
  production volume 1.50327e8 kg
  properties: lifetime 20 year, dry mass 1 kg, wet mass 1 kg
- waste reinforced concrete: -3305.59, -311973 kg (2 entries); lognormal variance with pedigree 0.008, pedigree (1,1,4,1,1)
  (same comment as for waste reinforced concrete)
  production volume 5.81286e8 kg
  properties: dry mass 0.99418 kg, wet mass 1 kg, water content 0.00585407, lifetime 20 year
- waste glass: -1047.58, -96.5529, -2.19046, -9.00824, -13.6795, -40.3086, -1989.9 kg (7 entries); lognormal variance with pedigree 0.008, pedigree (1,1,4,1,1)
  (same comment as for waste glass)
  production volume 5.89848e6 kg
  properties: dry mass 1 kg, wet mass 1 kg, lifetime 20 year
- waste polyethylene/polypropylene product: -124.271, -4141.35 kg (2 entries); lognormal variance with pedigree 0.008, pedigree (1,1,4,1,1)
  (same comment as for waste polyethylene/polypropylene product)
  production volume 7.86463e6 kg
  properties: wet mass 1 kg, water content 0.180638, dry mass 0.847 kg, carbon content, fossil 0.748045, lifetime 20 year
- scrap copper: -125.995, -2685.44 kg (2 entries); lognormal variance with pedigree 0.008, pedigree (1,1,4,1,1)
  (same comment as for scrap copper)
  production volume 5.18351e6 kg
  properties: lifetime 20 year, dry mass 1 kg, wet mass 1 kg
- concrete, normal: 0.0929807, 3.08627, 0.321585, 2.60346, 1.46445, 0.209173, 120.533 m3 (7 entries); source Elsam Engineering A/S,Fredericia,Denmark 2004, p. p. 13, 21+25, Tab. 5.3; lognormal variance with pedigree 0.041, pedigree (1,1,5,1,1)
  (same comment as for concrete, normal)
  properties: wet mass 2380 kg, water content 0.086758, dry mass 2190 kg
- electricity, medium voltage: 564.62, 102.737, 2371.47, 832.665, 1742.26, 25261, 8202.35, 3615.33, 10547.4 kWh (9 entries); source Burger, B. 2007; lognormal variance with pedigree 0.1006, pedigree (5,4,5,4,3)
  (same comment as for electricity, medium voltage)
- waste polyethylene: -300.491, -20.0776, -1.51844, -8.29278, -3.35019, -7.87477, -260.43 kg (7 entries); lognormal variance with pedigree 0.008, pedigree (1,1,4,1,1)
  (same comment as for waste polyethylene)
  production volume 1.10999e6 kg
  properties: water content 0.00401606, dry mass 0.996 kg, wet mass 1 kg, carbon content, fossil 0.825301, lifetime 20 year
- waste plastic, mixture: -1596.81, -106.693, -8.069, -44.0679, -17.8029, -41.8466, -1383.93 kg (7 entries); lognormal variance with pedigree 0.008, pedigree (1,1,4,1,1)
  (same comment as for waste plastic, mixture)
  production volume 5.89848e6 kg
  properties: carbon content, fossil 0.747344, wet mass 1 kg, water content 0.180638, dry mass 0.847 kg, lifetime 20 year

## Inputs from nature
- Occupation, industrial area [natural resource, land]: 2346.09 m2*year; = land_from*lifetime; lognormal variance with pedigree 0.008, pedigree (1,1,4,1,1)
  (same comment as for waste polyethylene)
- Transformation, to industrial area [natural resource, land]: 117.305 m2; = land_from; lognormal variance with pedigree 0.008, pedigree (1,1,4,1,1)
  (same comment as for waste polyethylene)
- Transformation, from pasture, man made [natural resource, land]: 117.305 m2; name land_from; = 11*11; source Elsam Engineering A/S,Fredericia,Denmark 2004; lognormal variance with pedigree 0.33, pedigree (5,5,5,5,5)
  Estimated value. The foundation for the onshore turbine consists of plate foundations made with reinforced concrete.
  The assumed size is 11 × 11 metres and 2 metres deep.
  Uncertainty: Estimated variance.

## Sampling procedure
Literature, estimations

## Extrapolations
This dataset combines data from the collection at the Technocentre Eolien in Quebec, the ecoinvent 2.2 version representing the wind turbine 800kW and from the producers.

## Review by Christian Bauer 2014-02-20
This dataset was thoroughfully reviewed and complies with the Data Quality Guidelines.
