# glass tube production, borosilicate

Dataset: EcoSpold 2, unit process
Geography: DE
Time period: 2000-01-01 to 2019-12-31
Technology level: current
Classification: ISIC rev.4 ecoinvent: 2310:Manufacture of glass and glass products
Classification: EcoSpold01Categories: glass/construction
Tags: ConvertedDataset
Scenario: Business-as-Usual
System model: Allocation at the point of substitution
Generated by: Niels Jungbluth
Published in: Kellenberger D. 2007
Database: ecoinvent
isCopyrightProtected: true
accessRestrictedTo: 1

## General comment
Production of borosilicate glass tubes.
[This dataset was already contained in the ecoinvent database version 2. It was not individually updated during the transfer to ecoinvent version 3. Life Cycle Impact Assessment results may still have changed, as they are affected by changes in the supply chain, i.e. in other datasets. This dataset was generated following the ecoinvent quality guidelines for version 2. It may have been subject to central changes described in the ecoinvent version 3 change report (http://www.ecoinvent.org/database/ecoinvent-version-3/reports-of-changes/), and the results of the central updates were reviewed extensively. The changes added e.g. consistent water flows and other information throughout the database. The documentation of this dataset can be found in the ecoinvent reports of version 2, which are still available via the ecoinvent website. The change report linked above covers all central changes that were made during the conversion process.]

## Included activities end
Gate to gate inventory for the production of glass tubes.

## Geography
Production plant in DE. Some pre-products and waste treatment services estimated with European and Swiss data.

## Technology
Tube glass manufacturing. Plant data for joint production of borosilicate (20%) and lime-natron-glass (80%) tubes.

## Time period
Production data for one business year.

## Parameters
- fraction, tap water, to air: 0.15; name fraction_TW_to_air; = fraction_PW_to_air; lognormal variance with pedigree 0.092025, pedigree (4,4,3,2,4)
  Calculated value. See comment in the other parametres present in this dataset. Tap water is considered to be always used as process water, thus process water fractions to air are applied to all tap water input flows to calculate the amount of water consumed in the processes.
- fraction, process water, to air: 0.15 dimensionless; name fraction_PW_to_air; lognormal variance with pedigree 0.092025, pedigree (4,4,3,2,4)
  Literature value. In case when no industry/process specific data are available, default evaporation fraction value is used. This value is 15% and is based on literature (Statistics Canada, 2007 & Shaffer, K.H., 2008, Consumptive water use in the Great Lakes Basin, USGS & Shiklomanov, 2003, World Water Resources at the Beginning of the 21st Century) and has been approved by an expert.

## Reference product
- glass tube, borosilicate: 1 kg; CPC 3719: Other glass articles; By-product classification allocatable product
  EcoSpold01Location=DE
  production volume 0.242058 kg
    This is a placeholder value that does not reflect real-world production volumes. This dataset does not currently require a real-world production volume to work in the database framework, and no actual data were collected yet. This has no negative effect on the results of the ecoinvent database. The placeholder value of this activity was scaled according to the nominal GDP of 2005 (source: United Nations, http://data.un.org/Glossary.aspx?q=GDP+%28current+US%24%29, accessed 20130726) to reflect an appropriate share of the global production volume, which is also a placeholder value.
  property price 3.16 EUR2005
    Assumed to be equal to 'flat glass, coated, at plant' and 'flat glass, uncoated, at plant'.
  property carbon content 0
    carbon content on a dry matter basis (reserved; not for manual entry)
  property true value 3.16
    allocation property applied in "true value" allocation // value calculated from revenue
  properties: water content 0, carbon content, fossil 0, dry mass 1 kg, carbon content, non-fossil 0, wet mass 1 kg, water in wet mass 0 kg, carbon allocation 0 kg

## By-products
- heat, for reuse in municipal waste incineration only: 0 MJ; CPC 17300: Steam and hot water; By-product classification allocatable product; pedigree (1,1,1,1,1)
  Net electricity generated from this waste and used in internal MSWI plant energy redistribution.
  Uncertainty: uncertainty is calculated from uncertainties in waste composition and uncertainties in energy efficiency and the uncertainty in internal energy demand
  production volume 0.00949582 MJ
  property price 0.0106 EUR2005; name E_th_prod_MSWI_price_EUR2005
    Average European district heat price from Ecoheatcool and Euroheat 2005-2006, Ecoheat Work package 1: The European heat market. Final report. 10.6 EUR/GJ i s the price of district heat. http://www.solarthermalworld.org/files/Ecoheatcool%20WP1%20Web.pdf?download
  property exergy 0.1842 MJ; name E_th_prod_MSWI_exergy
    This exergy property is based on the exergy content of the product.
  property true value relation 0.1842; name E_th_prod_MSWI_true_value_relation
    property to calculate "true value" from
  property true value 6.2823e-5
    allocation property applied in "true value" allocation // value calculated from true value relation
- electricity, for reuse in municipal waste incineration only: 0 kWh; CPC 17100: Electrical energy; By-product classification allocatable product; pedigree (1,1,1,1,1)
  (same comment as for heat, for reuse in municipal waste incineration only)
  production volume 0.00129121 kWh
  property true value relation 3.6; name E_el_prod_MSWI_true_value_relation
    property to calculate "true value" from
  property price 0.1 EUR2005; name E_el_prod_MSWI_price_EUR2005
    Estimated to be the same price as in case of electricity, medium voltage.
  property exergy 3.6 MJ; name E_el_prod_MSWI_exergy
    This exergy property is based on the exergy content of the product.
  property true value 0.000166954
    (same comment as for heat, for reuse in municipal waste incineration only)
- zinc concentrate: 0 kg; CPC 14290: Other non-ferrous metal ores and concentrates (other than uranium or thorium ores and concentrates); By-product classification allocatable product
  Calculated value from the knowledge of the properties of both products.
  production volume 2.78445e-11 kg
  property price 0.38 EUR2005; name ByP_price_EUR2005
    Temporary price data. Calculated as 90% of purchasers price based on: Zinc content in concentrate 53%. Concentrate price per kg Zn 86.5% of refined Zn price (13.5% treatment charges according to CHR Metals Limited 2005: Dynamic cost curves. http://www.minecost.com/dynamic.pdf). 2004 zinc price from USGS (2007) Mineral commodity summaries 2007. <http://minerals.usgs.gov/minerals/pubs/mcs/2007/mcs2007.pdf> [Accessed 25 May 2010]
  property zinc content 0.53; name zinc_C_zinc_concentrate
    Zinc content on a dry matter basis. Value taken from teh "zinc mine operation" /GLO dataset.
  property dry mass 1 kg; name DM_zinc_concentrate
  property carbon content 0
    carbon content on a dry matter basis (reserved; not for manual entry)
  property true value 1.05809e-11
    allocation property applied in "true value" allocation // value calculated from revenue
  properties: wet mass 1 kg, water content 0, carbon content, non-fossil 0, carbon content, fossil 0, water in wet mass 0 kg, carbon allocation 0 kg
- iron scrap, sorted, pressed: 0 kg; By-product classification Recyclable; CPC 39310: Slag, dross, scalings and other waste from the manufacture of iron or steel; pedigree (1,1,1,1,1)
  Iron scrap recovered from this waste.
  Uncertainty: uncertainty calculated from uncertainty in waste composition, uncertainty of share of recyclable metal, uncertainty of transfer coefficient to bottom ash, uncertainty of the efficiency of scrap removal in MSWI plant.
  production volume 2.36462e-5 kg
  property price 0.175 EUR2005
    Temporary price data. Calculated as 90% of purchasers price based on: 2005 import and export prices (total trades (USD) divided by total weight (kg) in biggest economies of the world: EU27, USA, Brasil, China, India, Japan and Russia) from UN Commodity Trade Statistics Database (http://data.un.org/Explorer.aspxDatabase [Accessed 2011.06.20]). Commodity: Waste or scrap, of cast iron
  property carbon content 0
    carbon content on a dry matter basis (reserved; not for manual entry)
  property true value 4.13808e-6
    allocation property applied in "true value" allocation // value calculated from revenue
  properties: dry mass 1 kg, water content 0, carbon content, non-fossil 0, water in wet mass 0 kg, carbon content, fossil 0, wet mass 1 kg, carbon allocation 0 kg
- iron scrap, unsorted: 0 kg; source European Aluminium Association 2008; CPC 39310: Slag, dross, scalings and other waste from the manufacture of iron or steel; By-product classification Recyclable; pedigree (1,1,1,1,1)
  production volume 3.33824e-9 kg
  property price 0.149 EUR2005; name ironScrapAmount_price_EUR2005
    Temporary price data. Calculated as 90% of purchasers price based on: estimated at 85% of sorted scrap
  property carbon content 0
    carbon content on a dry matter basis (reserved; not for manual entry)
  property true value 4.97397e-10
    allocation property applied in "true value" allocation // value calculated from revenue
  properties: water in wet mass 0 kg, water content 0, carbon content, fossil 0, carbon content, non-fossil 0, dry mass 1 kg, wet mass 1 kg, carbon allocation 0 kg
- aluminium oxide, non-metallurgical: 0 kg; source European Aluminium Association 2008; CPC 41432: Alumina (aluminium oxide), except artificial corundum; By-product classification allocatable product; CAS 1344-28-1; pedigree (1,1,1,1,1)
  production volume 2.10063e-7 kg
  property carbon content, non-fossil 0; name C_content_non_fossil
  property price 0.28 EUR2005; name Al2O3Amount_price_EUR2005
  property dry mass 1 kg; name DM
  property water content 0; name water_content
  property wet mass 1 kg; name WM
  property water in wet mass 0 kg; name WWM
  property carbon content, fossil 0; name C_content_fossil
  properties: carbon content 0, carbon allocation 0 kg, true value 5.88175e-8
- aluminium, cast alloy: 0 kg; source European Aluminium Association 2008; By-product classification allocatable product; CPC 41431: Unwrought aluminium; pedigree (1,1,1,1,1)
  EcoSpold01Location=RER
  production volume 1.96362e-6 kg
  property price 1.3 EUR2005; name castAlloyAmount_price_EUR2005
    Temporary price data. Calculated as 90% of purchasers price based on: Source: London Metal Exchange, Aluminium alloy price for 2005
  property carbon content 0
    carbon content on a dry matter basis (reserved; not for manual entry)
  property true value 2.5527e-6
    allocation property applied in "true value" allocation // value calculated from revenue
  properties: water in wet mass 0 kg, carbon content, non-fossil 0, water content 0, dry mass 1 kg, carbon content, fossil 0, wet mass 1 kg, carbon allocation 0 kg
- aluminium, wrought alloy: 0 kg; source European Aluminium Association 2008; By-product classification allocatable product; CPC 4153: Semi-finished products of aluminium or aluminium alloys; pedigree (1,1,1,1,1)
  production volume 8.59635e-7 kg
  property price 1.44 EUR2005; name secondaryAluminiumOutput_price_EUR2005
    Estimated based on literature values and expert judgement. Aluminium ccast alloys are about 90% of the price of aluminium wrought alloys.
  property carbon content 0
    carbon content on a dry matter basis (reserved; not for manual entry)
  property true value 1.23787e-6
    allocation property applied in "true value" allocation // value calculated from revenue
  properties: wet mass 1 kg, water content 0, carbon content, fossil 0, water in wet mass 0 kg, carbon content, non-fossil 0, dry mass 1 kg, carbon allocation 0 kg
- copper: 0 kg; source Rentz O. 1999; By-product classification allocatable product; CPC 41413: Refined copper and copper alloys, unwrought; master alloys of copper
  Literature value. Copper uses: Before end-use copper is manufactured into semi fabricated products, such as shapes and ingots (known as 'semis'). These manufacturing processes are subdivided into hot working, cold working and, if necessary, process annealing. Few of the semis are ready for use as such. They more typically travel to first-stage manufacturers, who make metal rods, wire, and casting, and then to component manufacturers who produce such things as motors, valves, and insulated cables The components in turn are incorporated by final-stage manufacturers into a variety of finished products - automobiles, commercial buildings, residential housing, and so forth. These uses account for about 79% of the world-wide consumption of copper.
  production volume 2.27187e-7 kg
  property price 5.52 EUR2005
    Literature value (http://www.economist.com/news/business/21576714-mining-industry-has-enriched-chile-its-future-precarious-copper-solution). Average price between 20015 and 2013.
  property carbon content 0
    carbon content on a dry matter basis (reserved; not for manual entry)
  property true value 1.25407e-6
    allocation property applied in "true value" allocation // value calculated from revenue
  properties: dry mass 1 kg, water in wet mass 0 kg, wet mass 1 kg, carbon content, non-fossil 0, water content 0, carbon content, fossil 0, carbon allocation 0 kg

## Inputs from technosphere
- hazardous waste, for incineration: -0.00325975 kg; lognormal variance with pedigree 0.0508, pedigree (2,2,5,3,1)
  EcoSpold01Location=CH
  Questionnaire, concentrated solvents
  Uncertainty: Questionnaire, concentrated solvents
  production volume 0.00326 kg
    Calculated from the production volume of glass tube, borosilicate in proportion to the respective output amounts.
  properties: dry mass 0.75 kg, wet mass 1 kg, water content 0.333333, carbon content, fossil 0.554667
  note on carbon content, fossil: Tab A.6, ecoinvent v2.2 report 13_I. C content has been calculated after data in the tables, and then referred to 1 kg DM
- tap water: 0.542959 kg; name tap_water_input; lognormal variance with pedigree 0.0508, pedigree (2,2,5,3,1)
  Questionnaire
  Calculated value. The amount of water in this flow on the input to the process as provided by the data provider for eiv2 was 0.326kg. This amount is adjusted, so the water balance is achieved.
  EcoSpold01Location=RER
  Uncertainty: Questionnaire
  properties: water content 2962.17, wet mass 1 kg, carbon content, fossil 0.00178991, dry mass 0.000337476 kg
  note on carbon content, fossil: Bicarbonate content is 2.93 mol/m3. CO2 content is 0.1 mol/m3 (ecoinvent v2.2 report 8, Tab 93.1).
- electricity, medium voltage: 1.12991 kWh; lognormal variance with pedigree 0.0508, pedigree (2,2,5,3,1)
  Questionnaire
  EcoSpold01Location=DE
  Uncertainty: Questionnaire
- aluminium oxide, non-metallurgical: 0.0499962 kg; lognormal variance with pedigree 0.0522, pedigree (3,2,5,3,1)
  EcoSpold01Location=RER
  Estimation for 5% feldspar
  Uncertainty: Estimation for 5% feldspar
  properties: wet mass 1 kg, dry mass 1 kg
- waste glass: -0.000956928 kg; lognormal variance with pedigree 0.0508, pedigree (2,2,5,3,1)
  Glass used as sealing material
  EcoSpold01Location=CH
  Uncertainty: Glass used as sealing material
  production volume 0.000957 kg
    (same comment as for hazardous waste, for incineration)
  properties: dry mass 1 kg, wet mass 1 kg
- silica sand: 0.702947 kg; lognormal variance with pedigree 0.0508, pedigree (2,2,5,3,1)
  EcoSpold01Location=DE
  Questionnaire
  Uncertainty: Questionnaire
  properties: wet mass 1 kg, water content 0.010101, dry mass 0.99 kg
- soda ash, light, crystalline, heptahydrate: 0.157988 kg; lognormal variance with pedigree 0.0508, pedigree (2,2,5,3,1)
  EcoSpold01Location=RER
  Reduction for feldspar + boron plus production wastes
  Uncertainty: Reduction for feldspar + boron plus production wastes
  properties: dry mass 1 kg, carbon content, fossil 0.0517241, wet mass 1 kg
- heat, district or industrial, natural gas: 11.9691 MJ; lognormal variance with pedigree 0.0508, pedigree (2,2,5,3,1)
  Questionnaire
  EcoSpold01Location=RER
  Uncertainty: Questionnaire
- heat, district or industrial, other than natural gas: 3.03027 MJ; lognormal variance with pedigree 0.0508, pedigree (2,2,5,3,1)
  EcoSpold01Location=RER
  Questionnaire
  Uncertainty: Questionnaire
- waste mineral wool, for final disposal: -0.000727945 kg; lognormal variance with pedigree 0.0688, pedigree (2,2,5,3,3)
  EcoSpold01Location=CH
  Questionnaire, asbestos
  Uncertainty: Questionnaire, asbestos
  production volume 0.000728 kg
    (same comment as for hazardous waste, for incineration)
  properties: dry mass 1 kg, wet mass 1 kg
- glass tube factory: 9.99924e-9 unit; lognormal variance with pedigree 0.3508, pedigree (2,2,5,3,1)
  EcoSpold01Location=DE
  Questionnaire
  Uncertainty: Questionnaire
- waste wood, untreated: -0.000738944 kg; lognormal variance with pedigree 0.0508, pedigree (2,2,5,3,1)
  EcoSpold01Location=CH
  Questionnaire, wood wastes
  Uncertainty: Questionnaire, wood wastes
  production volume 0.000739 kg
    (same comment as for hazardous waste, for incineration)
  properties: water content 0.25, wet mass 1 kg, dry mass 0.8 kg, carbon content, non-fossil 0.48632
  note on carbon content, non-fossil: Tab A.4, ecoinvent v2.2 report 13_I. C content has been referred to 1 kg DM,
- boric acid, anhydrous, powder: 0.0999924 kg; lognormal variance with pedigree 0.0522, pedigree (3,2,5,3,1)
  EcoSpold01Location=RER
  Estimation for 10% boron trioxide
  Uncertainty: Estimation for 10% boron trioxide
  properties: dry mass 1 kg, wet mass 1 kg
- wastewater from glass production: -0.000542959 m3; name wastewater_output; lognormal variance with pedigree 0.0508, pedigree (2,2,5,3,1)
  Questionnaire
  EcoSpold01Location=CH
  Uncertainty: Questionnaire
  production volume 0.000543 m3
    (same comment as for hazardous waste, for incineration)
  property price 0 EUR2005; name wastewater_output_price_EUR2005
  properties: water content 913.443, carbon content, fossil 0.0455242, wet mass 1000 kg, dry mass 1.09356 kg
  note on carbon content, fossil: COD= 0.115 kg/m3 (Tab A.18, ecoinvent v2.2 report 13_I). COD was converted to TOC, using conversion factors in Tab 4.10 (ecoinvent v2.2 report 13_IV). TOC was considered as Total Carbon.
- municipal solid waste: -0.00242982 kg; lognormal variance with pedigree 0.0508, pedigree (2,2,5,3,1)
  Questionnaire, unspecific wastes
  EcoSpold01Location=CH
  Uncertainty: Questionnaire, unspecific wastes
  production volume 0.00243 kg
    (same comment as for hazardous waste, for incineration)
  properties: water content 0.297017, carbon content, non-fossil 0.261655, carbon content, fossil 0.171549, wet mass 1 kg, dry mass 0.771 kg
  note on carbon content, non-fossil: MSW composition in tab 4.1, ecoinvent v2.2 report 13_I. C content referred to 1 kg DM

## Emissions to nature
- Carbon dioxide, fossil [air, urban air close to ground]: 0.0109992 kg; lognormal variance with pedigree 0.0882, pedigree (4,2,5,3,1)
  Estimation for decomposition of carbonates
  Uncertainty: Estimation for decomposition of carbonates
- Particulates, < 2.5 um [air, urban air close to ground]: 0.000149989 kg; lognormal variance with pedigree 0.3508, pedigree (2,2,5,3,1)
  Waste gas purification
  Uncertainty: Waste gas purification
- Nitrogen oxides [air, urban air close to ground]: 0.00651951 kg; lognormal variance with pedigree 0.0808, pedigree (2,2,5,3,1)
  Questionnaire
  Uncertainty: Questionnaire

## Sampling procedure
Questionnaire.

## Extrapolations
Input of raw materials is calculated with data for borosilicate glass. Other data are from a plant with a production mix of borosilicate (20%) and lime-natron-glass (80%).

## Review by Daniel Kellenberger (obsolete) 2003-07-25
Passed.
