# aluminium production, primary, cast alloy slab from continuous casting

Dataset: EcoSpold 2, unit process
Geography: RoW
Time period: 2012-01-01 to 2019-12-31
Technology level: current
Classification: ISIC rev.4 ecoinvent: 2420:Manufacture of basic precious and other non-ferrous metals
Synonyms: aluminium busbar; Continuous casting; aluminium cast alloy
Tags: single enterprise data
Scenario: Business-as-Usual
System model: Allocation at the point of substitution
Share of production covered: 0.04 %
Generated by: Marylène Dussault
Database: ecoinvent
isCopyrightProtected: true
accessRestrictedTo: 1

## General comment
This dataset represents the manufacturing of aluminium cast alloy by direct chilled horizontal continuous casting from primary liquid aluminium. This process can also be used for production of bus bar, anode beams and anode studs for aluminium smelters or substation. Hot liquid primary aluminium transported by truck using crucibles is used as the main aluminium bearing input (90-95%). The liquid aluminium is pre-treated in reverberatory furnace were pre-heated aluminium scrap, aluminum based alloy additives and pure metals are added to obtain desired alloy composition. Scrap aluminium is used as aluminium input up to 5%. Alloy composition represented in this dataset is mainly cast alloy product from the 1xx.x series (minimum 99% aluminium), but alloy composition that can reach up to 5% of final alloy. Molten aluminium alloy is degassed with argon and cast by direct chilled horizontal continuous casting. Final product is cut to the desired length. Duration of casting varies from 2 Tons per hour to 6 Tons per hour depending on end product desired. Wastewater from chilling is treated on site by diffused air filtration and is mainly recirculated in closed-loop. The operations covered by this dataset include: pre-treatment of hot metal, recovery and handling of internal process scrap, batching, alloying, metal treatment, casting operations, sawing and cooling activities, maintenance and repair of plant and equipment, treatment of process air, liquids and solids.

## Included activities start
Activity starts with the arrival of hot liquid aluminium input and other additives at reverbatory furnace.

## Included activities end
This activity ends with cooling of casted product by direct chilled horizontal casting. The dataset includes material and energy related to the alloy production and casting: scrap and primary metal input, preheating, melting in reverbatory furance, alloying, degassing, water use and casting). It also includes waste treatment and onsite wastewater treatment. Infrastructure is estimated using an available ecoinvent 3.0 dataset.

## Parameters
- electricity process and auxiliairies: 0.264 kWh; name kWh_process; lognormal variance with pedigree 0.0032, pedigree (2,4,1,1,1)
  Measured value. Electricity requirements for process and auxiliairies (heating, maintenance of furnace when no production, etc.).
- Quebec gross domestic product 2011: 3.11e11 USD(2011); name quebecGDP2011; lognormal variance with pedigree 0.0086, pedigree (1,1,4,1,1)
  Quebec Gross domestic product for 2011, expressed in 2011 USD. Source: Institut de la statistique du Québec. Converted from CAD to USD using a yearly average exchange rate of 0.989 CAD/USD (Source: bank of Canada).
- electricity wastewater treatment: 0.05 kWh; name kWh_ww; lognormal variance with pedigree 0.0032, pedigree (2,4,1,1,1)
  Measured value. Electricity input for insitu wastewater treatment. Based on total water used in process. Note that around 42% of total water used in the process is treated, cooled and reused in closed loop.
- world gross domestic product 2011: 7e13 USD(2011); name worldGDP2011; lognormal variance with pedigree 0.0086, pedigree (1,1,4,1,1)
  World Gross domestic product for 2011, expressed in 2011 USD. Source: World Bank
- quebec_production_volume: 1.8e7 kg; name PV_Qc; lognormal variance with pedigree 0.0027, pedigree (3,2,1,1,1)
  Production volume comment: Extrapolated from the data provider's PV and his estimations of the market shares of his different products. He estimates that his activities represent nearly 100% of the Québec production.

## Reference product
- aluminium, primary, cast alloy slab from continuous casting: 0 kg; name ref; CPC 41431: Unwrought aluminium; By-product classification allocatable product
  reference flow
  production volume 0 kg; name ref_pv
    Approximation of production volume based on the ratio of liquid aluminium consumed by "aluminium, primary, cast alloy slab from continuous casting" in Quebec over the total liquid aluminium produced in Quebec and assuming this ratio is valid globally.
  property price 3.67 EUR2005; name ref_price_EUR2005
    Estimated to be the same as in case of aluminium, primary, liquid.
  property carbon content 0
    carbon content on a dry matter basis (reserved; not for manual entry)
  properties: dry mass 1 kg, water in wet mass 0 kg, carbon content, non-fossil 0, water content 0, carbon content, fossil 0, wet mass 1 kg, carbon allocation 0 kg
- aluminium scrap, new: 0 kg; CPC 39363: Waste and scrap of aluminium; By-product classification Recyclable; pedigree (1,1,1,1,1)
  Measured value. Input of main aluminum source for the given reference flow.
  properties: carbon content, fossil 0, dry mass 1 kg, wet mass 1 kg, water in wet mass 0 kg, carbon content, non-fossil 0, water content 0, carbon content 0, carbon allocation 0 kg
- iron scrap, unsorted: 1 kg; CPC 39310: Slag, dross, scalings and other waste from the manufacture of iron or steel; By-product classification Recyclable; pedigree (1,1,1,1,1)
  Extrapolated process. The process represents a proxy for a metallic metal wastes which include iron, copper and aluminium.
  production volume 172.667 kg

## By-products
- iron scrap, unsorted: 0 kg; name scrap; CPC 39310: Slag, dross, scalings and other waste from the manufacture of iron or steel; By-product classification Recyclable; pedigree (1,1,1,1,1)
  (same comment as for iron scrap, unsorted)
  production volume 0 kg; = ref_pv * scrap / ref
    Calculated from production volume of reference product using the relative outputs.
  property price 0.149 EUR2005; name scrap_price_EUR2005
    Temporary price data. Calculated as 90% of purchasers price based on: estimated at 85% of sorted scrap
  property carbon content 0
    carbon content on a dry matter basis (reserved; not for manual entry)
  properties: water content 0, carbon content, non-fossil 0, dry mass 1 kg, carbon content, fossil 0, wet mass 1 kg, water in wet mass 0 kg, carbon allocation 0 kg
- aluminium, primary, cast alloy slab from continuous casting: 0 kg; CPC 41431: Unwrought aluminium; By-product classification allocatable product
  reference flow
  properties: dry mass 1 kg, water in wet mass 0 kg, carbon content, non-fossil 0, water content 0, carbon content, fossil 0, wet mass 1 kg, carbon content 0, carbon allocation 0 kg
- ground granulated blast furnace slag: 0 kg; By-product classification allocatable product; CPC 37440: Portland cement, aluminous cement, slag cement and similar hydraulic cements, except in the form of clinkers
  Functional unit of LCI by Marceau & VanGeem (2003) was 1 short ton of slag cement (GGBFS) output which was converted to 907.18 kg for the present inventory.
  property water content 0; name GGBFS_water_content
  property carbon content, non-fossil 0; name GGBFS_C_content_non_fossil
  property water in wet mass 0 kg; name GGBFS_WWM
  property carbon content, fossil 0; name GGBFS_C_content_fossil
    Industry value; Arcelor Mittal, chemical composition of blast furnace slag (http://www.cst.com.br/english/products/co_products/catalog_products/blast_slag/blast_slag.asp, accessed: 20121003).
  property price 0.0615 EUR2005; name GGBFS_price_EUR2005
    2005 import and export prices (total trades (USD) divided by total weight (kg) in China, India, USA, Japan, Russia and Europe, major producers and consumers (http://www.cementchina.net/freport/showfre.asp?id=749) from UN Commodity Trade Statistics Database (http://data.un.org/Explorer.aspxDatabase [Accessed 2 July 2010]). Commodity: Cement (portland, aluminious, slag or hydraulic)
  property carbon content 0
    carbon content on a dry matter basis (reserved; not for manual entry)
  properties: wet mass 1 kg, dry mass 1 kg, carbon allocation 0 kg
- heat, for reuse in municipal waste incineration only: 0 MJ; CPC 17300: Steam and hot water; By-product classification allocatable product; pedigree (1,1,1,1,1)
  Net electricity generated from this waste and used in internal MSWI plant energy redistribution.
  Uncertainty: uncertainty is calculated from uncertainties in waste composition and uncertainties in energy efficiency and the uncertainty in internal energy demand
  property exergy 0.1842 MJ; name E_th_prod_MSWI_exergy
    This exergy property is based on the exergy content of the product.
  property price 0.0106 EUR2005; name E_th_prod_MSWI_price_EUR2005
    Average European district heat price from Ecoheatcool and Euroheat 2005-2006, Ecoheat Work package 1: The European heat market. Final report. 10.6 EUR/GJ i s the price of district heat. http://www.solarthermalworld.org/files/Ecoheatcool%20WP1%20Web.pdf?download
  property true value relation 0.1842; name E_th_prod_MSWI_true_value_relation
    property to calculate "true value" from
- electricity, for reuse in municipal waste incineration only: 0 kWh; CPC 17100: Electrical energy; By-product classification allocatable product; pedigree (1,1,1,1,1)
  (same comment as for heat, for reuse in municipal waste incineration only)
  property price 0.1 EUR2005; name E_el_prod_MSWI_price_EUR2005
    Estimated to be the same price as in case of electricity, medium voltage.
  property exergy 3.6 MJ; name E_el_prod_MSWI_exergy
    This exergy property is based on the exergy content of the product.
  property true value relation 3.6; name E_el_prod_MSWI_true_value_relation
    property to calculate "true value" from
- zinc concentrate: 0 kg; CPC 14290: Other non-ferrous metal ores and concentrates (other than uranium or thorium ores and concentrates); By-product classification allocatable product
  Calculated value from the knowledge of the properties of both products.
  property price 0.38 EUR2005; name ByP_price_EUR2005
    Temporary price data. Calculated as 90% of purchasers price based on: Zinc content in concentrate 53%. Concentrate price per kg Zn 86.5% of refined Zn price (13.5% treatment charges according to CHR Metals Limited 2005: Dynamic cost curves. http://www.minecost.com/dynamic.pdf). 2004 zinc price from USGS (2007) Mineral commodity summaries 2007. <http://minerals.usgs.gov/minerals/pubs/mcs/2007/mcs2007.pdf> [Accessed 25 May 2010]
  property zinc content 0.53; name zinc_C_zinc_concentrate
    Zinc content on a dry matter basis. Value taken from teh "zinc mine operation" /GLO dataset.
  property dry mass 1 kg; name DM_zinc_concentrate
  property carbon content 0
    carbon content on a dry matter basis (reserved; not for manual entry)
  properties: wet mass 1 kg, water content 0, carbon content, non-fossil 0, carbon content, fossil 0, water in wet mass 0 kg, carbon allocation 0 kg
- granulated blast furnace slag: 0 kg; By-product classification allocatable product
  property wet mass 1 kg; name GBFS_WM
  property dry mass 1 kg; name GBFS_DM
  property price 0.0615 EUR2005; name GBFS_price_EUR2005
    (same comment as for ground granulated blast furnace slag)
  property water in wet mass 0 kg; name GBFS_WWM
  property carbon content, non-fossil 0; name GBFS_C_content_non_fossil
    biogene carbon content on a dry matter basis
  property carbon content, fossil 0; name GBFS_C_content_fossil
    fossil carbon content on a dry matter basis
  property water content 0; name GBFS_water_content
  property carbon content 0
    carbon content on a dry matter basis (reserved; not for manual entry)
  properties: carbon allocation 0 kg

## Inputs from technosphere
- sludge, pig iron production: 0 kg; name sludge; pedigree (1,1,1,1,1)
  Approximated process. Represents metallic containing sludge. Value based on primary data.
  production volume 0 kg; = ref_pv * sludge / ref
    Calculated from production volume of reference product using the relative outputs.
  property price 0 EUR2005; name sludge_price_EUR2005
  properties: water content 0.0940919, dry mass 0.914 kg, wet mass 1 kg, carbon content, fossil 0.339168
- sodium hypochlorite, without water, in 15% solution state: 0 kg; pedigree (1,1,1,1,1)
  Measured value. Chemical input for insitu wastewater treatment. Based on total water used in process. Note that around 45% of total water used in the process is treated, cooled and reused in closed loop.
  properties: dry mass 1 kg, wet mass 1 kg
- electricity, medium voltage: 0 kWh; = kWh_ww+ kWh_process; pedigree (1,1,1,1,1)
  Calculated value. Electricity requirements for process and auxiliairies (heating, maintenance of furnace when no production, etc.) and for wastewater treatment.
  Uncertainty: Calculated variable. Uncertainty will be determined from propagation of uncertainty factors of underlying variables.
- refractory spent pot liner from Al electrolysis: 0 kg; name refrac; pedigree (1,1,1,1,1)
  Measured value. Based on reported waste per year for this process. Assumed that "refractories" were "refractory spent pot liner"
  production volume 0 kg; = ref_pv * refrac / ref
    Calculated from production volume of reference product using the relative outputs.
  property price 0 EUR2005; name refrac_price_EUR2005
  properties: wet mass 1 kg, dry mass 1 kg
- aluminium, primary, liquid: 0 kg; = 0.93889+slag*slag_Al_content; pedigree (1,1,1,1,1)
  Measured value. Reported input of liquid hot primary aluminium. Includes aluminium input to account for aluminium losses in slag.
  properties: wet mass 1 kg, dry mass 1 kg
- hazardous waste, for underground deposit: -8.65907e-5 kg; name hwaste; lognormal variance with pedigree 0.0052, pedigree (2,4,3,1,1)
  Measured value. Represents many types of hazardous wastes that are send to secure landfill. Wastes includes oil, fluoridric acid contamined solids, oil contaminated solids, disposal of HF contaminated rinsing water and "liquides pauvres" (no translation was found).
  production volume 0 kg; = ref_pv* hwaste / ref
    Calculated from production volume of reference product using the relative outputs.
  property price 0 EUR2005; name hwaste_price_EUR2005
  properties: wet mass 1 kg, dry mass 1 kg, carbon content, fossil 0.554667
  note on carbon content, fossil: Tab A.6, ecoinvent v2.2 report 13_I, average hazardous waste composition was used, and referred to 0% water mass. No waste-specific emission are currently inventoried for underground deposits. Accordingly, no waste composition must be specified. For generic, average waste to underground deposit deposition in a 200 liter steel drum without cement solidification is assumed (ecoinvent v2.2 report 13_I).
- refractory, basic, packed: 0 kg; = refrac; pedigree (1,1,1,1,1)
  Calculated Value. Based on known amount of refractory waste per year for this process.
  Uncertainty: Calculated variable. Uncertainty will be determined from propagation of uncertainty factors of underlying variables.
  properties: dry mass 1 kg, wet mass 1 kg
- manganese: 0 kg; pedigree (1,1,1,1,1)
  Approximated process. Represents pur maganese alloying additive. Value is based on primary data, process is used as an approximation, since it represents a by-product.
  properties: dry mass 1 kg, wet mass 1 kg
- heat, district or industrial, natural gas: 0 MJ; = fuel_input*LHV*fuel_use; pedigree (1,1,1,1,1)
  Calculated value. Based on primary data for process and heating of facility.
  Uncertainty: Calculated variable. Uncertainty will be determined from propagation of uncertainty factors of underlying variables.
  property lower heating value 37.3 MJ/Nm3; name LHV
  property fuel input in m3 0.0777 m3; name fuel_input
  property Corresponding fuel use 1.11 MJ; name fuel_use
  note on lower heating value: Literature value. Net calorific value MJ/m3; value was taken from http://www.fpl.fs.fed.us/documnts/pdf2009/fpl_2009_bergman002.pdf
  note on Corresponding fuel use: Estimated value. Factor used to account for heat losses from furnace.
- boric oxide: 0 kg; pedigree (1,1,1,1,1)
  Approximated process. Represents boron bearing alloying additive, which was reported to be embossed boron and aluminium. Value is based on primary data and is for boron input only (aluminium in additive is included in aluminium input).
  properties: dry mass 1 kg, wet mass 1 kg
- iron pellet: 0 kg; pedigree (1,1,1,1,1)
  Measured value. Input of main aluminum source for the given reference flow.
  properties: dry mass 1 kg, wet mass 1 kg
- lubricating oil: 6.23939e-6 kg; name min_oil; lognormal variance with pedigree 0.0072, pedigree (2,4,3,5,1)
  Measured value. Represents use of different lubrificating oil and grease.
  properties: dry mass 1 kg, wet mass 1 kg, carbon content, fossil 0.75
  note on carbon content, fossil: Lubricating oil is produced from diesel. C-content/dry mass of fats and oils considered 75%, from: ecoinvent v2.2 report, n 15a, pg 40
- aluminium scrap, new: 0 kg; pedigree (1,1,1,1,1)
  Measured value. Input of main aluminum source for the given reference flow.
  properties: dry mass 1 kg, wet mass 1 kg
- inert waste: 0 kg; name waste; pedigree (1,1,1,1,1)
  Approximated process. Represents reported solids waste from the gutters and non recyclable wastes. Value based on primary data.
  production volume 0 kg; = ref_pv * (waste/ ref)
    Calculated from production volume of reference product using the relative outputs.
  property price 0 EUR2005; name waste_price_EUR2005
  properties: dry mass 1 kg, wet mass 1 kg
- waste mineral oil: 0 kg; name oil; = min_oil+ veg_oil; pedigree (1,1,1,1,1)
  Calculated value. Waste oils which include oil separated from oily wastewater and canola oil.
  Uncertainty: Calculated variable. Uncertainty will be determined from propagation of uncertainty factors of underlying variables.
  production volume 0 kg; = ref_pv *oil/ ref
    Calculated from production volume of reference product using the relative outputs.
  property price 0 EUR2005; name oil_price_EUR2005
  properties: carbon content, fossil 0.864444, water content 0.111111, wet mass 1 kg, dry mass 0.9 kg
  note on carbon content, fossil: Tab A.6, ecoinvent v2.2 report 13_I. C content has been calculated after data in the tables, and then referred to 1 kg DM
- tap water: 0, 0, 0, 0, 0, 0, 0, 0 kg (8 entries)
  Measured value. Represents tap water used for process and auxiliairies. Also includes water used for cleaning tanks which is disposed as hazadous wastes. Does not include closed-loop process water.
  properties: wet mass 1 kg, water content 2962.17, dry mass 0.000337476 kg, carbon content, fossil 0.00178991
  note on carbon content, fossil: Bicarbonate content is 2.93 mol/m3. CO2 content is 0.1 mol/m3 (ecoinvent v2.2 report 8, Tab 93.1).
- wastewater, average: 0 m3; name wastewater; pedigree (1,1,1,1,1)
  Measured value. Represents process wastewater treated onsite purged to municipal sewers. Wastewater send to sewer represents 55% of total water used.
  production volume 0 m3; = ref_pv * wastewater / ref
    Calculated from production volume of reference product using the relative outputs.
  property price 0 EUR2005; name wastewater_price_EUR2005
  properties: dry mass 0.346837 kg, wet mass 1000 kg, water content 2882.2, carbon content, non-fossil 0.194039
  note on carbon content, non-fossil: 0.0673 kg TOC/m3 (Tab A.17, ecoinvent v2.2 report 13_I). TOC was considered as Total Carbon.
- diesel, burned in diesel-electric generating set, 10MW: 0.000210803 MJ; = L_fuel_input* NHV_diesel* density_diesel; lognormal variance with pedigree 0.0026, pedigree (1,1,3,1,1)
  Calculated value. Based on primary data for onsite treatement of wastewater.
  Uncertainty: Calculated variable. Uncertainty will be determined from propagation of uncertainty factors of underlying variables.
  property fuel input in physical units, L 0.000562 l; name L_fuel_input
  property density 0.84 kg/l; name density_diesel
  property heating value, net 42.8 MJ; name NHV_diesel
  note on fuel input in physical units, L: Measured value. Diesel input used for insitu wastewater treatment. Based on total water used in process. Note that around 42% of total water used in the process is treated, cooled and reused in closed loop.
- vegetable oil, refined: 0 kg; name veg_oil; pedigree (1,1,1,1,1)
  Extrapolated process. Represents canola oil used. Value based on measured data.
  properties: dry mass 1 kg, wet mass 1 kg, carbon content, non-fossil 0.768
- blast furnace slag: 0 kg; name slag; pedigree (1,1,1,1,1)
  Approximated process. Represents slag. Value is based on primary data.
  production volume 0 kg; = ref_pv* slag / ref
    Calculated from production volume of reference product using the relative outputs.
  property price 0 EUR2005; name slag_price_EUR2005
  property aluminium content 0.675; name slag_Al_content
  properties: wet mass 1 kg, dry mass 1 kg
  note on aluminium content: aluminium content on a dry matter basis is between 65 and 70%
- sodium hydroxide, without water, in 50% solution state: 6.3013e-5 kg; lognormal variance with pedigree 0.0072, pedigree (2,4,3,5,1)
  (same comment as for sodium hypochlorite, without water, in 15% solution state)
  properties: dry mass 1 kg, wet mass 1 kg
- aluminium casting facility: 4.16116e-14 unit; lognormal variance with pedigree 0.0866, pedigree (5,4,3,5,4)
  Estimated value. Taken directly from ecoivent v.2.2 "aluminium, secondary" dataset. The land use, the machinery and buildings for an aluminium casting facility. The process used represents a facility with annual production of 130000 ton/yr for 50 yrs. The production levels were set according to the reference flow.
- sludge, pig iron production: 0, 0 kg (2 entries); pedigree (1,1,1,1,1)
  Approximated process. Represents metallic containing sludge. Value based on primary data.
- electricity, medium voltage: 0, 0, 0, 0, 0, 0, 0, 0, 0 kWh (9 entries); pedigree (1,1,1,1,1)
  (same comment as for electricity, medium voltage)
- heat, district or industrial, natural gas: 0, 0 MJ (2 entries); pedigree (1,1,1,1,1)
  (same comment as for heat, district or industrial, natural gas)
  properties: lower heating value 37.3 MJ/Nm3, fuel input in m3 0.0777 m3, Corresponding fuel use 1.11 MJ
- inert waste: 0, 0 kg (2 entries); pedigree (1,1,1,1,1)
  (same comment as for inert waste)
- waste mineral oil: -2.07444e-7, -8.96513e-6 kg (2 entries); lognormal variance with pedigree 0.0026, pedigree (1,1,3,1,1)
  (same comment as for waste mineral oil)
- wastewater, average: 0, 0 m3 (2 entries); pedigree (1,1,1,1,1)
  (same comment as for wastewater, average)
- potassium hydroxide: 3.52329e-10 kg; lognormal variance with pedigree 0.002, pedigree (1,1,3,1,1)
  Potassium hydroxide used in alkaline solution. Calculated value (see Exchange Properties).
  Uncertainty: Calculated variable. Uncertainty will be determined from propagation of uncertainty factors of underlying variables. Uncertainty of actual relation between variables not accounted at this time, although this could be included in a future update.
- tap water: 0.533482 kg; lognormal variance with pedigree 0.0026, pedigree (1,1,3,1,1)
  Measured value. Per meter value (in kg) calculated from per kg data for 3.67 mm diameter wire (assumed to be diameter or mass independent) from data providing manufacturing company.
- soap: 5.857e-8 kg; lognormal variance with pedigree 0.002, pedigree (1,1,3,1,1)
  EcoSpold01Location=RER
  Soap used in alkaline solution and used as proxy for extrusion lubricant (calcium stearate surfactants). Calculated value (see Exchange Properties).
  Uncertainty: Calculated variable. Uncertainty will be determined from propagation of uncertainty factors of underlying variables. Uncertainty of actual relation between variables not accounted at this time, although this could be included in a future update.
- steel, unalloyed: 6.225e-6 kg; lognormal variance with pedigree 0.002, pedigree (1,1,3,1,1)
  Reported as 9.5 mm diameter carbon steel cast alloy rods. Calculated value (see Parameters).
  Uncertainty: Calculated variable. Uncertainty will be determined from propagation of uncertainty factors of underlying variables. Uncertainty of actual relation between variables not accounted at this time, although this could be included in a future update.
- heat, district or industrial, natural gas: 3.12911e-5 MJ; lognormal variance with pedigree 0.002, pedigree (1,1,3,1,1)
  Reported as for building heating only. Calculated value (see Exchange Properties).
  EcoSpold01Location=RER
  Uncertainty: Calculated variable. Uncertainty will be determined from propagation of uncertainty factors of underlying variables. Uncertainty of actual relation between variables not accounted at this time, although this could be included in a future update.
- sawnwood, softwood, raw, dried (u=20%): 8.79722e-10 m3; lognormal variance with pedigree 0.002, pedigree (1,1,3,1,1)
  Reported as coils for primary packaging. Calculated value (see Exchange Properties).
  Uncertainty: Calculated variable. Uncertainty will be determined from propagation of uncertainty factors of underlying variables. Uncertainty of actual relation between variables not accounted at this time, although this could be included in a future update.
- electricity, medium voltage: 0.0787455 kWh; lognormal variance with pedigree 0.002, pedigree (1,1,3,1,1)
  Reported as grid electricity. Calculated value (see Exchange Properties).
  Uncertainty: Calculated variable. Uncertainty will be determined from propagation of uncertainty factors of underlying variables. Uncertainty of actual relation between variables not accounted at this time, although this could be included in a future update.
- propane, burned in building machine: 4.63794e-7 MJ; lognormal variance with pedigree 0.002, pedigree (1,1,3,1,1)
  Reported as for forklift truck. Calculated value (see Exchange Properties).
  Uncertainty: Calculated variable. Uncertainty will be determined from propagation of uncertainty factors of underlying variables. Uncertainty of actual relation between variables not accounted at this time, although this could be included in a future update.
- steel, low-alloyed: 1.1698e-10 kg; lognormal variance with pedigree 0.0032, pedigree (2,1,3,1,1)
  Proxy. Reported as scouring pads. Calculated per meter value (in kg) calculated from per kg data for 3.67 mm diameter wire (assumed to be diameter or mass independent) from data providing manufacturing comapny.
- rolling mill: 1.54156e-13 unit; lognormal variance with pedigree 0.52, pedigree (5,5,5,5,5)
  Proxy. Value taken directly from ecoinvent v3.0 dataset "wire drawing, steel, GLO 2002".
  Uncertainty: No data collected. The uncertainty has been maximized.
- chemical, inorganic: 8.61687e-10 kg; lognormal variance with pedigree 0.002, pedigree (1,1,3,1,1)
  Represents an input of chemical reported as inorganic chemicals and an input of tetrapotassium pyrophosphate (K4P2O7, NAS 7320-34-5) used in alkaline solution, calculated based on the solution concentration (see Exchange Properties).
  Uncertainty: Calculated variable. Uncertainty will be determined from propagation of uncertainty factors of underlying variables. Uncertainty of actual relation between variables not accounted at this time, although this could be included in a future update.
- aluminium, primary, ingot: 0.000293332 kg; lognormal variance with pedigree 0.002, pedigree (1,1,3,1,1)
  Reported as primary aluminium cast alloy 9.5 mm diameter rods. Calculated value (see Parameters).
  Uncertainty: Calculated variable. Uncertainty will be determined from propagation of uncertainty factors of underlying variables. Uncertainty of actual relation between variables not accounted at this time, although this could be included in a future update.
- sodium sulfate, anhydrite: 3.1736e-9 kg; lognormal variance with pedigree 0.0032, pedigree (2,1,3,1,1)
  Calculated value. Per meter value (in kg) calculated from per kg data for 3.67 mm diameter wire (assumed to be diameter or mass independent) from data providing manufacturing company.
- wastewater, average: -0.000478346 m3; lognormal variance with pedigree 0.002, pedigree (1,1,3,1,1)
  Calculated value. Amount calculated from water inputs. Some effluent characterization data were reported, the calculated per meter values (in kg) calculated from per kg data for 3.67 mm diameter wire (assumed to be diameter or mass independent) from data providing manufacturing comapny: BOD5 = 3.6617E-6 kg/m, COD = 7.504E-6 kg/m, suspended solids = 8.852E-6 kg/m, and hydrocarbons, unspecified = 6,038E-9 kg/m.
  Uncertainty: Calculated variable. Uncertainty will be determined from propagation of uncertainty factors of underlying variables. Uncertainty of actual relation between variables not accounted at this time, although this could be included in a future update.
  production volume 15.1846 m3
- inert waste: -1.0755e-7 kg; lognormal variance with pedigree 0.0032, pedigree (2,1,3,1,1)
  Reported as solid waste to inert material landfill. Calculated value. Per meter value (in kg) calculated from per kg data for 3.67 mm diameter wire (assumed to be diameter or mass independent) from data providing manufacturing company.
  production volume 71699.2 kg
- aluminium scrap, new: -0.0003642 kg; lognormal variance with pedigree 0.002, pedigree (1,1,3,1,1)
  Reported as new aluminium scrap, generated during co-extrusion of aluminium over steel core. Plus aluminium part of scrap (off-specifications) bi-metal wire. Calculated value (see Parameters).
  Uncertainty: Calculated variable. Uncertainty will be determined from propagation of uncertainty factors of underlying variables. Uncertainty of actual relation between variables not accounted at this time, although this could be included in a future update.
  production volume 51469.3 kg
- water, deionised: 8.80921e-5 kg; lognormal variance with pedigree 0.002, pedigree (1,1,3,1,1)
  Water used in alkaline solution. Calculated value (see Exchange Properties).
  Uncertainty: Calculated variable. Uncertainty will be determined from propagation of uncertainty factors of underlying variables. Uncertainty of actual relation between variables not accounted at this time, although this could be included in a future update.
- waste mineral oil: -0.000879722 kg; lognormal variance with pedigree 0.0032, pedigree (2,1,3,1,1)
  Reported as used mineral oil, 10% water. Calculated value. Per meter value (in kg) calculated from per kg data for 3.67 mm diameter wire (assumed to be diameter or mass independent) from data providing manufacturing company.
  EcoSpold01Location=CH
  production volume 2227.89 kg
- lubricating oil: 0.000316223 kg; lognormal variance with pedigree 0.0052, pedigree (2,4,3,1,1)
  Measured Value: Reported as mineral hydraulicl and quenching oils and used to represent mineral oil fraction of chemical penetrant used for non-destructive testing.
- tetraethyl orthosilicate: 0.000863171 kg; lognormal variance with pedigree 0.0052, pedigree (2,4,3,1,1)
  Proxy. Reported as hydrolyzed ethyl silicate. Measured value.
- inert waste, for final disposal: -0.00504335 kg; lognormal variance with pedigree 0.0052, pedigree (2,4,3,1,1)
  Measured value. Includes waste ceramic mold (4.4359 kg), water based ceramic paste (1.3406 kg), aluminium oxide from sand blasting (0.1221 kg) and crucible (0.0402 kg, estimate based on silicon carbide crucible).
  production volume 4.63229e6 kg
- propylene glycol, liquid: 9.74118e-6 kg; lognormal variance with pedigree 0.0052, pedigree (2,4,3,1,1)
  Proxy. Represents polyakylene glycol fraction of chemical quencher. Measured value.
- carbon black: 8.49216e-6 kg; lognormal variance with pedigree 0.0052, pedigree (2,4,3,1,1)
  Proxy. Reported as activated carbon used for water treatment. Measured value.
- heat, district or industrial, natural gas: 0.126952 MJ; lognormal variance with pedigree 0.002, pedigree (1,1,3,1,1)
  EcoSpold01Location=RER
  Calculated value. Reported as volume. Used for heating molds prior to casting
  Uncertainty: Calculated variable. Uncertainty will be determined from propagation of uncertainty factors of underlying variables.
- silicon carbide: 3.4167e-5 kg; lognormal variance with pedigree 0.0052, pedigree (2,4,3,1,1)
  Measured value. Reported as silicon carbide crucibles.
- methyl ethyl ketone: 8.98209e-7 kg; lognormal variance with pedigree 0.0052, pedigree (2,4,3,1,1)
  Measured value. Used as paint cleaner.
- zircon, 50% zirconium: 0.000291308 kg; lognormal variance with pedigree 0.0052, pedigree (2,4,3,1,1)
  Measured value. Reported as zircon flour or crude zirconium silicate. Used in ceramic mold.
- wax, lost-wax casting: 0.000468967 kg; lognormal variance with pedigree 0.0052, pedigree (2,4,3,1,1)
  Measured value. Includes different types of molding wax.
- nitric acid, without water, in 50% solution state: 5.35855e-5 kg; lognormal variance with pedigree 0.0052, pedigree (2,4,3,1,1)
  Measured value. Reported value from waste inventory (from occasionally discharged basin), input assumed equivalent to output. Assumption verified by data provider.
- waste x-ray film: -6.16498e-5 kg; lognormal variance with pedigree 0.0052, pedigree (2,4,3,1,1)
  Measured value. Used X-ray films (sold for silver content).
  production volume 56625 kg
- waste paint on metal: -3.34787e-6 kg; lognormal variance with pedigree 0.0052, pedigree (2,4,3,1,1)
  Measured value. Used paint containers.
  production volume 3075 kg
- nitrogen, liquid: 0.00285996 kg; lognormal variance with pedigree 0.002, pedigree (1,1,3,1,1)
  Calculated value. Reported as gas volume.
  Uncertainty: Calculated variable. Uncertainty will be determined from propagation of uncertainty factors of underlying variables.
- scrap steel: -0.00320197 kg; lognormal variance with pedigree 0.0052, pedigree (2,4,3,1,1)
  Measured value. Steel from waste propane cylinders (sent to recycling).
  production volume 1000 kg
- silica sand: 0.00135416 kg; lognormal variance with pedigree 0.0052, pedigree (2,4,3,1,1)
  Measured value. Silica sand is used in molding.
- steel, low-alloyed, hot rolled: 0.000693037 kg; lognormal variance with pedigree 0.002, pedigree (1,1,3,1,1)
  Calculated value. From waste inventory.
  Uncertainty: Calculated variable. Uncertainty will be determined from propagation of uncertainty factors of underlying variables.
- titanium dioxide: 2.82026e-5 kg; lognormal variance with pedigree 0.0052, pedigree (2,4,3,1,1)
  Measured value. Represents component of an ingredient used for mold production.
- spent solvent mixture: -0.00078859 kg; lognormal variance with pedigree 0.0052, pedigree (2,4,3,1,1)
  Proxy. Represents hazardous waste: solvent based degreasing agent, refractory paste, deoxidizer agent and spent nitric acid sent to treatment (0.0631 kg). Measured value.
  production volume 724316 kg
- waste emulsion paint, separated: -5.44369e-7 kg; lognormal variance with pedigree 0.0052, pedigree (2,4,3,1,1)
  Measured value. Used filters from air filtration treatment used for epoxy paint vapor.
  production volume 500 kg
- ammonia, liquid: 2.24932e-5 kg; lognormal variance with pedigree 0.0052, pedigree (2,4,3,1,1)
  Measured value. Reported as ammonia anhydrous refrigerated grade.
- hazardous waste, for incineration: -0.000481386 kg; lognormal variance with pedigree 0.0052, pedigree (2,4,3,1,1)
  Measured value. Includes several hazardous waste types: sorbing agent with oil, degreasing agent, spent filtration media, green soluble wax and aerosol.
  production volume 442150 kg
- sulfuric acid: 4.59233e-6 kg; lognormal variance with pedigree 0.002, pedigree (1,1,3,1,1)
  Calculated value. Based on measured solution volume used, reported concentration 66 Bé which correspond to 96% (w/w). Mass of water is included in deionised water flow.
  Uncertainty: Calculated variable. Uncertainty will be determined from propagation of uncertainty factors of underlying variables.
- kaolin: 0.00104278 kg; lognormal variance with pedigree 0.0052, pedigree (2,4,3,1,1)
  Proxy. Reported as flour calcined China clay used for mold production. Measured value.
- fly ash and scrubber sludge: -0.00010987 kg; lognormal variance with pedigree 0.0052, pedigree (2,4,3,1,1)
  Measured value. Represents sludge from oil separator.
  production volume 100915 kg
- ethoxylated alcohol (AE7): 1.3138e-5 kg; lognormal variance with pedigree 0.0052, pedigree (2,4,3,1,1)
  Proxy. Represents ethoxyl alcohols (C6-C10 and C12-C15) and secondary alcohol ethoxylate fraction of chemical penetrant used for non-destructive testing. Measured value.
- isopropanol: 0.000332043 kg; lognormal variance with pedigree 0.0052, pedigree (2,4,3,1,1)
  Measured Value. Used in mold production.
- clay: 4.44369e-5 kg; lognormal variance with pedigree 0.0052, pedigree (2,4,3,1,1)
  Proxy. Reported as clay flocculent, a mix of clay, inorganic salt, and organic polymer. Measured value.
- polyethylene terephthalate, granulate, amorphous: 6.16498e-5 kg; lognormal variance with pedigree 0.002, pedigree (1,1,3,1,1)
  Proxy. Represents x-ray film used for non-destructive testing, PET is the mainly constituant of x-ray film. Calculated value
  Uncertainty: Calculated variable. Uncertainty will be determined from propagation of uncertainty factors of underlying variables.
- aluminium oxide, non-metallurgical: 0.00117594 kg; lognormal variance with pedigree 0.0052, pedigree (2,4,3,1,1)
  Measured Value. Include aluminium oxide used for molding (0.9963 kg) and sand blasting (0.1221 kg) and fused white alumina used for molding (0.2663 kg).
- sodium nitrite: 3.89647e-7 kg; lognormal variance with pedigree 0.0052, pedigree (2,4,3,1,1)
  Proxy. Represents sodium nitrile fraction of chemical quencher. Measured value.
- printed wiring board, for through-hole mounting, Pb free surface: 8.70659e-7 m2; lognormal variance with pedigree 0.0058, pedigree (1,4,3,4,2)
  This dataset is based on direct information from the Swiss manufacturer Brusa.
- printed wiring board, for through-hole mounting, Pb containing surface: 1.88849e-8 m2; lognormal variance with pedigree 0.0058, pedigree (1,4,3,4,2)
  This dataset is based on direct information from the Swiss manufacturer Brusa.
- heat, central or small-scale, other than natural gas: 8.69199e-5 MJ; source F. Habermacher 2011; lognormal variance with pedigree 0.0058, pedigree (1,4,3,4,2)
  This dataset is based on direct information from the Swiss manufacturer Brusa.
- selective coat, aluminium sheet, nickel pigmented aluminium oxide: 5.34644e-10 m2; source F. Habermacher 2011; lognormal variance with pedigree 0.0058, pedigree (1,4,3,4,2)
  This dataset is based on direct information from the Swiss manufacturer Brusa.
- wire drawing, copper: 0.000140469 kg; source F. Habermacher 2011; lognormal variance with pedigree 0.0058, pedigree (1,4,3,4,2)
  This dataset is based on direct information from the Swiss manufacturer Brusa.
- sheet rolling, steel: 2.82235e-7 kg; source F. Habermacher 2011; lognormal variance with pedigree 0.0058, pedigree (1,4,3,4,2)
  This dataset is based on direct information from the Swiss manufacturer Brusa.
- copper: 0.000411562 kg; source F. Habermacher 2011; lognormal variance with pedigree 0.0058, pedigree (1,4,3,4,2)
  This dataset is based on direct information from the Swiss manufacturer Brusa.
- aluminium, wrought alloy: 3.9279e-5 kg; source F. Habermacher 2011; lognormal variance with pedigree 0.0058, pedigree (1,4,3,4,2)
  This dataset is based on direct information from the Swiss manufacturer Brusa.
- capacitor, film type, for through-hole mounting: 7.26738e-6 kg; source F. Habermacher 2011; lognormal variance with pedigree 0.0058, pedigree (1,4,3,4,2)
  This dataset is based on direct information from the Swiss manufacturer Brusa.
- sheet rolling, aluminium: 3.92469e-5 kg; source F. Habermacher 2011; lognormal variance with pedigree 0.0058, pedigree (1,4,3,4,2)
  This dataset is based on direct information from the Swiss manufacturer Brusa.
- polystyrene, high impact: 5.77367e-8 kg; source F. Habermacher 2011; lognormal variance with pedigree 0.0058, pedigree (1,4,3,4,2)
  This dataset is based on direct information from the Swiss manufacturer Brusa.
- steel, chromium steel 18/8, hot rolled: 0.00238574 kg; source F. Habermacher 2011; lognormal variance with pedigree 0.0058, pedigree (1,4,3,4,2)
  This dataset is based on direct information from the Swiss manufacturer Brusa.
- electricity, low voltage: 3.21991e-8 kWh; source F. Habermacher 2011; lognormal variance with pedigree 0.0058, pedigree (1,4,3,4,2)
  This dataset is based on direct information from the Swiss manufacturer Brusa.
- ferrite: 1.70309e-7 kg; source F. Habermacher 2011; lognormal variance with pedigree 0.0058, pedigree (1,4,3,4,2)
  This dataset is based on direct information from the Swiss manufacturer Brusa.
- resistor, auxilliaries and energy use: 1.55253e-6 kg; source F. Habermacher 2011; lognormal variance with pedigree 0.0058, pedigree (1,4,3,4,2)
  This dataset is based on direct information from the Swiss manufacturer Brusa.
- zinc coat, coils: 1.55927e-9 m2; source F. Habermacher 2011; lognormal variance with pedigree 0.0058, pedigree (1,4,3,4,2)
  This dataset is based on direct information from the Swiss manufacturer Brusa.
- printed wiring board, surface mounted, unspecified, Pb free: 5.77496e-7 kg; source F. Habermacher 2011; lognormal variance with pedigree 0.0058, pedigree (1,4,3,4,2)
  This dataset is based on direct information from the Swiss manufacturer Brusa.
- aluminium scrap, new: -9.56123e-6 kg; source F. Habermacher 2011; lognormal variance with pedigree 0.0064, pedigree (2,4,3,4,2)
  Total alumiunium scrap from production process.
  production volume 6415.2 kg
- silicone product: 4.38774e-5, 8.88462e-5 kg (2 entries); source F. Habermacher 2011; lognormal variance with pedigree 0.0058, pedigree (1,4,3,4,2)
  This dataset is based on direct information from the Swiss manufacturer Brusa.
- brass: 6.64053e-10, 1.32147e-7 kg (2 entries); source F. Habermacher 2011; lognormal variance with pedigree 0.0058, pedigree (1,4,3,4,2)
  This dataset is based on direct information from the Swiss manufacturer Brusa.
- waste plastic, industrial electronics: -9.77805e-11, -6.47234e-9 kg (2 entries); source F. Habermacher 2011; lognormal variance with pedigree 0.0064, pedigree (2,4,3,4,2)
  Total plastic scrap from production process.
  production volume 137.7 kg
- aluminium oxide, non-metallurgical: 4.51686e-9 kg; source F. Habermacher 2011; lognormal variance with pedigree 0.0058, pedigree (1,4,3,4,2)
  This dataset is based on direct information from the Swiss manufacturer Brusa.
- polyester resin, unsaturated: 8.07124e-9, 6.00484e-8 kg (2 entries); source F. Habermacher 2011; lognormal variance with pedigree 0.0058, pedigree (1,4,3,4,2)
  This dataset is based on direct information from the Swiss manufacturer Brusa.
- resistor, metal film type, through-hole mounting: 1.01623e-6 kg; lognormal variance with pedigree 0.0064, pedigree (2,4,3,4,2)
  Based on the direct inspection of a commercial device.
- transformer, low voltage use: 2.99818e-6 kg; lognormal variance with pedigree 0.0064, pedigree (2,4,3,4,2)
  Based on the direct inspection of a commercial device.
- integrated circuit, logic type: 4.19497e-7 kg; lognormal variance with pedigree 0.0064, pedigree (2,4,3,4,2)
  Based on the direct inspection of a commercial device.
- transistor, auxilliaries and energy use: 8.88313e-6 kg; lognormal variance with pedigree 0.0064, pedigree (2,4,3,4,2)
  Based on the direct inspection of a commercial device.
- transformer, high voltage use: 2.78571e-5 kg; lognormal variance with pedigree 0.0064, pedigree (2,4,3,4,2)
  Based on the direct inspection of a commercial device.
- fan, for power supply unit, desktop computer: 4.45714e-6 kg; lognormal variance with pedigree 0.0064, pedigree (2,4,3,4,2)
  Based on the direct inspection of a commercial device.
- transistor, surface-mounted: 8.28568e-7 kg; lognormal variance with pedigree 0.0064, pedigree (2,4,3,4,2)
  Based on the direct inspection of a commercial device.
- transistor, wired, small size, through-hole mounting: 1.54102e-7 kg; lognormal variance with pedigree 0.0064, pedigree (2,4,3,4,2)
  Based on the direct inspection of a commercial device.
- aluminium, cast alloy: 0.000479216 kg; lognormal variance with pedigree 0.0138, pedigree (2,4,3,4,3)
  Based on the direct inspection of a commercial device.
- diode, glass-, for through-hole mounting: 2.75655e-7 kg; lognormal variance with pedigree 0.0064, pedigree (2,4,3,4,2)
  Based on the direct inspection of a commercial device.
- plug, inlet and outlet, for computer cable: 0.000167143 unit; lognormal variance with pedigree 0.0064, pedigree (2,4,3,4,2)
  Based on the direct inspection of a commercial device.
- cable, printer cable, without plugs: 1.11429e-5 m; lognormal variance with pedigree 0.0064, pedigree (2,4,3,4,2)
  Based on the direct inspection of a commercial device.
- metal working, average for aluminium product manufacturing: 9.55214e-5 kg; lognormal variance with pedigree 0.0152, pedigree (3,4,3,4,3)
  Own assumption.
- switch, toggle type: 8.80286e-7 kg; lognormal variance with pedigree 0.0064, pedigree (2,4,3,4,2)
  Based on the direct inspection of a commercial device.
- inductor, auxilliaries and energy use: 1.84849e-5 kg; lognormal variance with pedigree 0.0064, pedigree (2,4,3,4,2)
  Based on the direct inspection of a commercial device.
- liquid crystal display, unmounted: 5.57143e-7 kg; lognormal variance with pedigree 0.0064, pedigree (2,4,3,4,2)
  Based on the direct inspection of a commercial device.
- mounting, through-hole technology, Pb-free solder: 2.92379e-6 m2; lognormal variance with pedigree 0.0064, pedigree (2,4,3,4,2)
  Based on the direct inspection of a commercial device.
- printed wiring board, through-hole mounted, unspecified, Pb free: 2.07201e-6 kg; lognormal variance with pedigree 0.0064, pedigree (2,4,3,4,2)
  Based on the direct inspection of a commercial device.
- inductor, miniature radio frequency chip: 9.36e-10 kg; lognormal variance with pedigree 0.0064, pedigree (2,4,3,4,2)
  Based on the direct inspection of a commercial device.
- capacitor, electrolyte type, < 2cm height: 5.74971e-7 kg; lognormal variance with pedigree 0.0064, pedigree (2,4,3,4,2)
  Based on the direct inspection of a commercial device.
- potentiometer, unspecified: 6.79714e-7 kg; lognormal variance with pedigree 0.0064, pedigree (2,4,3,4,2)
  Based on the direct inspection of a commercial device.
- diode, auxilliaries and energy use: 3.00949e-7 kg; lognormal variance with pedigree 0.0064, pedigree (2,4,3,4,2)
  Based on the direct inspection of a commercial device.
- capacitor, auxilliaries and energy use: 5.26599e-5 kg; lognormal variance with pedigree 0.0064, pedigree (2,4,3,4,2)
  Based on the direct inspection of a commercial device.
- resistor, surface-mounted: 2.90759e-6 kg; lognormal variance with pedigree 0.0064, pedigree (2,4,3,4,2)
  Based on the direct inspection of a commercial device.
- cable, connector for computer, without plugs: 0.000231214 m; lognormal variance with pedigree 0.0064, pedigree (2,4,3,4,2)
  Based on the direct inspection of a commercial device.
- polyethylene, high density, granulate: 0.000518936 kg; lognormal variance with pedigree 0.0064, pedigree (2,4,3,4,2)
  Based on the direct inspection of a commercial device.
- inductor, ring core choke type: 1.84839e-5 kg; lognormal variance with pedigree 0.0064, pedigree (2,4,3,4,2)
  Based on the direct inspection of a commercial device.
- capacitor, for surface-mounting: 2.52158e-7 kg; lognormal variance with pedigree 0.0064, pedigree (2,4,3,4,2)
  Based on the direct inspection of a commercial device.
- light emitting diode: 5.85003e-8 kg; lognormal variance with pedigree 0.0064, pedigree (2,4,3,4,2)
  Based on the direct inspection of a commercial device.
- transistor, wired, big size, through-hole mounting: 7.06457e-7 kg; lognormal variance with pedigree 0.0064, pedigree (2,4,3,4,2)
  Based on the direct inspection of a commercial device.
- plug, inlet and outlet, for network cable: 0.000250714 unit; lognormal variance with pedigree 0.0064, pedigree (2,4,3,4,2)
  Based on the direct inspection of a commercial device.
- capacitor, electrolyte type, > 2cm height: 4.47663e-5 kg; lognormal variance with pedigree 0.0064, pedigree (2,4,3,4,2)
  Based on the direct inspection of a commercial device.
- synthetic rubber: 9.60943e-6 kg; lognormal variance with pedigree 0.0064, pedigree (2,4,3,4,2)
  Based on the direct inspection of a commercial device.
- resistor, wirewound, through-hole mounting: 3.98025e-7 kg; lognormal variance with pedigree 0.0064, pedigree (2,4,3,4,2)
  Based on the direct inspection of a commercial device.
- cable, ribbon cable, 20-pin, with plugs: 7.96051e-6 kg; lognormal variance with pedigree 0.0064, pedigree (2,4,3,4,2)
  Based on the direct inspection of a commercial device.
- insulated gate bipolar transistor, electric vehicle application: 9.79142e-5 kg; lognormal variance with pedigree 0.0064, pedigree (2,4,3,4,2)
  Based on the direct inspection of a commercial device.
- heat, district or industrial, natural gas: 2.13579e-6 MJ; lognormal variance with pedigree 0.0138, pedigree (2,4,3,4,3)
  Own estimate, based on values from automotive industry.
- polyphenylene sulfide: 6.39288e-8 kg; lognormal variance with pedigree 0.0064, pedigree (2,4,3,4,2)
  Based on the direct inspection of a commercial device.
- permanent magnet, for electric motor: 7.84108e-9 kg
- electricity, medium voltage: 0.0030269 kWh; lognormal variance with pedigree 0.0138, pedigree (2,4,3,4,3)
  Own estimate, based on values from automotive industry.
- copper scrap, sorted, pressed: -9.03881e-9 kg; lognormal variance with pedigree 0.0138, pedigree (2,4,3,4,3)
  Production scrap. Own estimate, based on values from automotive industry.
  production volume 157500 kg
- nylon 6: 5.45929e-11, 1.10544e-10 kg (2 entries); source F. Habermacher 2011; lognormal variance with pedigree 0.0972, pedigree (4,5,5,4,4)
  This dataset is based on direct information from the Swiss manufacturer Brusa.
- used glider, from electric scooter: -6.36512e-8 kg
  production volume 6.213e7 kg
- polyvinylchloride, suspension polymerised: 2.3822e-10 kg; source M. Leuenberger 2010; lognormal variance with pedigree 0.0466, pedigree (4,3,4,5,3)
  15% of passenger car
  EcoSpold01Location=RER
  Uncertainty: 15% of passenger car
- nickel, 99.5%: 7.45355e-11 kg; source M. Leuenberger 2010; lognormal variance with pedigree 0.1306, pedigree (4,3,5,5,4)
  EcoSpold01Location=GLO
  Weight ratio scooter:passenger car
  Uncertainty: weight ratio scooter:passenger car
- reinforcing steel: 1.28701e-7 kg; source M. Leuenberger 2010; lognormal variance with pedigree 0.0466, pedigree (4,3,4,5,3)
  5% of passenger car
  EcoSpold01Location=RER
  Uncertainty: 5% of passenger car
- polypropylene, granulate: 1.31659e-6 kg; source M. Leuenberger 2010; lognormal variance with pedigree 0.0466, pedigree (4,3,4,5,3)
  15% of passenger car
  EcoSpold01Location=RER
  Uncertainty: 15% of passenger car
- chromium: 1.27772e-10 kg; source M. Leuenberger 2010; lognormal variance with pedigree 0.1306, pedigree (4,3,5,5,4)
  Weight ratio scooter:passenger car
  EcoSpold01Location=RER
  Uncertainty: weight ratio scooter:passenger car
- road vehicle factory: 0 unit; source M. Leuenberger 2010; pedigree (1,1,1,1,1)
  EcoSpold01Location=RER
  Weight ratio scooter:passenger car
  Uncertainty: weight ratio scooter:passenger car
- injection moulding: 4.09605e-8 kg; source M. Leuenberger 2010; lognormal variance with pedigree 0.1306, pedigree (4,3,5,5,4)
  All HDPE
  EcoSpold01Location=RER
  Uncertainty: All HDPE
- heat, district or industrial, other than natural gas: 3.8969e-8 MJ; source M. Leuenberger 2010; lognormal variance with pedigree 0.0366, pedigree (4,3,4,5,3)
  50% of Environmental report Honda, 2008
  EcoSpold01Location=RER
  Uncertainty: 50% of Environmental report Honda, 2008
- tap water: 2.00787e-6 kg; source M. Leuenberger 2010; lognormal variance with pedigree 0.1306, pedigree (4,3,5,5,4)
  (same comment as for chromium)
- section bar rolling, steel: 0.00184717 kg; source M. Leuenberger 2010; lognormal variance with pedigree 0.1306, pedigree (4,3,5,5,4)
  (same comment as for chromium)
- zinc: 3.17091e-10 kg; source M. Leuenberger 2010; lognormal variance with pedigree 0.1306, pedigree (4,3,5,5,4)
  (same comment as for chromium)
- alkyd paint, white, without solvent, in 60% solution state: 5.75916e-11, 2.73395e-10 kg (2 entries); source M. Leuenberger 2010; lognormal variance with pedigree 0.1306, pedigree (4,3,5,5,4)
  (same comment as for road vehicle factory)
- ethylene, average: 3.3746e-10, 1.02243e-11, 6.37239e-10 kg (3 entries); source M. Leuenberger 2010; lognormal variance with pedigree 0.1306, pedigree (4,3,5,5,4)
  (same comment as for chromium)
- printed wiring board, mounted mainboard, desktop computer, Pb free: 5.22177e-12 kg; source F. Habermacher 2011; lognormal variance with pedigree 0.0424, pedigree (1,3,5,4,2)
  Materialization based on average from literature values.
- acrylonitrile-butadiene-styrene copolymer: 1.1506e-11 kg; source F. Habermacher 2011; lognormal variance with pedigree 0.0424, pedigree (1,3,5,4,2)
  Materialization based on average from literature values.
- fibre, viscose: 4.53377e-11 kg; source F. Habermacher 2011; lognormal variance with pedigree 0.0424, pedigree (1,3,5,4,2)
  Materialization based on average from literature values.
- tempering, flat glass: 8.24359e-11 kg; source F. Habermacher 2011; lognormal variance with pedigree 0.0424, pedigree (1,3,5,4,2)
  Materialization based on average from literature values.
- lead: 1.32723e-7 kg; source F. Habermacher 2011; lognormal variance with pedigree 0.0424, pedigree (1,3,5,4,2)
  Materialization based on average from literature values.
- glass fibre reinforced plastic, polyester resin, hand lay-up: 1.09838e-12 kg; source F. Habermacher 2011; lognormal variance with pedigree 0.0424, pedigree (1,3,5,4,2)
  Materialization based on average from literature values.
- polyethylene, low density, granulate: 4.2863e-9 kg; source F. Habermacher 2011; lognormal variance with pedigree 0.0424, pedigree (1,3,5,4,2)
  Materialization based on average from literature values.
- used glider, passenger car: -2.05987e-9 kg; source F. Habermacher 2011
  Materialization based on average from literature values.
  production volume 4.8e10 kg
- magnesium: 1.75274e-12 kg; source F. Habermacher 2011; lognormal variance with pedigree 0.0424, pedigree (1,3,5,4,2)
  Materialization based on average from literature values.
- flat glass, uncoated: 1.40769e-11, 6.8359e-11 kg (2 entries); source F. Habermacher 2011; lognormal variance with pedigree 0.0424, pedigree (1,3,5,4,2)
  Materialization based on average from literature values.
- coating powder: 9.98993e-12, 2.02283e-11 kg (2 entries); source F. Habermacher 2011; lognormal variance with pedigree 0.0424, pedigree (1,3,5,4,2)
  Materialization based on average from literature values.
- epoxy resin, liquid: 5.25798e-12, 2.49603e-11 kg (2 entries); source F. Habermacher 2011; lognormal variance with pedigree 0.0424, pedigree (1,3,5,4,2)
  Materialization based on average from literature values.
- polyurethane, flexible foam: 1.25261e-11, 5.94632e-11 kg (2 entries); source F. Habermacher 2011; lognormal variance with pedigree 0.0424, pedigree (1,3,5,4,2)
  Materialization based on average from literature values.
- tin: 1.52748e-5 kg; lognormal variance with pedigree 0.0444, pedigree (2,4,5,4,2)
  Based on the direct inspection of a commercial device.
- epoxy resin insulator, Al2O3: 0.00051133 kg; lognormal variance with pedigree 0.0444, pedigree (2,4,5,4,2)
  Based on the direct inspection of a commercial device.
- silicon, electronics grade: 0.000136285 kg; lognormal variance with pedigree 0.0444, pedigree (2,4,5,4,2)
  Based on the direct inspection of a commercial device.
- ethylene glycol: 1.52659e-8 kg; source H.-J. Althaus 2010; lognormal variance with pedigree 0.0444, pedigree (2,4,5,4,2)
  Based on a Volkswagen Golf A4 materialization.
- used internal combustion engine, from passenger car: -5.99733e-7 kg; source H.-J. Althaus 2010
  production volume 1.65e10 kg
- platinum: 3.48936e-12 kg; source H.-J. Althaus 2010; lognormal variance with pedigree 0.0444, pedigree (2,4,5,4,2)
  Based on a Volkswagen Golf A4 materialization.
- palladium: 6.54255e-13 kg; source H.-J. Althaus 2010; lognormal variance with pedigree 0.0444, pedigree (2,4,5,4,2)
  Based on a Volkswagen Golf A4 materialization.
- sulfuric acid: 3.23417e-10 kg; source H.-J. Althaus 2010; lognormal variance with pedigree 0.0444, pedigree (2,4,5,4,2)
  Based on a Volkswagen Golf A4 materialization.
- waste plastic, mixture: -6.06519e-5, -4.67591e-6, -1.93132e-6, -1.83397e-6, -6.99817e-5, -7.8023e-7, -3.53631e-7, -0.000489911 kg (8 entries); source H.-J. Althaus 2010; lognormal variance with pedigree 0.0444, pedigree (2,4,5,4,2)
  Scrap fraction from production process.
  production volume 2.34e8 kg
- sheet rolling, chromium steel: 0.0023857 kg; source Stiesdal H. 2001; lognormal variance with pedigree 0.0406, pedigree (1,1,5,1,1)
  EcoSpold01Location=RER
  Estimation. Construction efforts for the whole amount of chromium steel used.
- polyvinylchloride, bulk polymerised: 2.86073e-5 kg; source Scholzen F. 1991; lognormal variance with pedigree 0.36, pedigree (1,1,5,1,1)
  EcoSpold01Location=RER
  Estimation. PVC is used in the electronical system.
- cast iron: 0.00115909 kg; source Stiesdal H. 2001; lognormal variance with pedigree 0.06, pedigree (1,1,5,1,1)
  Estimation. For the hub of the rotor 11'320 kg of cast iron is estimated. For the gear 9139 kg, the main bearing 1025 kg, for the generator 3382 kg and for the transformator 1500 kg of cast iron is used.
  Further references:
  Scholzen (1991): Oekobilanz von Windenergie am Beispiel einer 30 kW-Anlage auf dem Simplon. Semesterarbeit am Laboratorium für Energiesysteme, ETH Zürich.
  EcoSpold01Location=RER
- glass fibre reinforced plastic, polyamide, injection moulded: 0.00177364 kg; source Stiesdal H. 2001; lognormal variance with pedigree 0.05, pedigree (1,1,5,1,1)
  EcoSpold01Location=RER
  Estimation. The rotor blades have a total weight of 29'714 kg and are made of glass fibre reinforced plastic. For the cover of the nacelle 11'294 kg of glass fibre reinforced plastic are estimated.
- waste polyvinylchloride: -2.75358e-6, -2.12285e-7, -8.76814e-8, -8.32616e-8, -3.17715e-6, -3.54223e-8, -1.60548e-8, -2.22418e-5 kg (8 entries); lognormal variance with pedigree 0.0406, pedigree (1,1,5,1,1)
  EcoSpold01Location=CH
  Estimation. PVC used for the electrical cabinet is disposed in the municipial waste incineration. After 20 years of service reuse is hardly possible. The assumption of a complete disposal in the municipial waste incineration reflects a conservative position.
  production volume 1050 kg
- scrap copper: -4.43801e-5, -2.08222e-6, -9.34463e-5 kg (3 entries)
  Estimation. It is assumed that 100% of that material is recycled.
  production volume 278250 kg
- scrap steel: -0.00103068, -1.30304e-6 kg (2 entries); lognormal variance with pedigree 0.0406, pedigree (1,1,5,1,1)
  Estimation. It is assumed that 100% of that material is recycled.
  production volume 1.64325e7 kg
- waste polyethylene: -3.98935e-6, -3.07555e-7, -1.27031e-7, -1.20628e-7, -4.60301e-6, -5.13192e-8, -2.32599e-8, -3.22236e-5 kg (8 entries); lognormal variance with pedigree 0.0406, pedigree (1,1,5,1,1)
  EcoSpold01Location=CH
  Estimation. PE out of the cable tube is disposed in the municipial waste incineration. After 20 years of service reuse is hardly possible. The assumption of a complete disposal in the municipial waste incineration reflects a conservative position.
  production volume 4725 kg
- waste glass: -0.0001755, -8.51554e-6, -7.94487e-7, -3.55504e-6, -9.23916e-5, -1.20647e-6, -1.93189e-7, -0.000870712 kg (8 entries); lognormal variance with pedigree 0.06, pedigree (1,1,5,1,1)
  EcoSpold01Location=CH
  Calculated value. Rotor blades and nacelle cover are disposed in the municipial waste incinerator as it is not possible to seperate the components of glass fibre reinforced plastic. Per kg of glass fiber reinforced plastic 0.65 kg waste is estimated (41'000 kg * 0.65 kg = 26'650 kg) (recommended by Gabor Doka, 28.7.2003).
  production volume 4.66375e6 kg
- waste polypropylene: -1.26153e-7, -9.72564e-9, -4.01704e-9, -3.81455e-9, -1.45558e-7, -1.62284e-9, -7.35535e-10, -1.01899e-6 kg (8 entries); lognormal variance with pedigree 0.0406, pedigree (1,1,5,1,1)
  EcoSpold01Location=CH
  Estimation. PP used for the electrical cabinet is disposed in the municipial waste incineration. After 20 years of service reuse is hardly possible. The assumption of a complete disposal in the municipial waste incineration reflects a conservative position.
  production volume 2.05763e6 kg
- copper sulfate: 4.30398e-9 kg; lognormal variance with pedigree 0.0026, pedigree (1,1,3,1,1)
  Measured value.
- foaming agent: 6.2075e-10 kg; lognormal variance with pedigree 0.002, pedigree (1,1,3,1,1)
  Measured value. Reported in litres as foaming agent (saponin).
  Uncertainty: Calculated variable. Uncertainty will be determined from propagation of uncertainty factors of underlying variables. Uncertainty of actual relation between variables not accounted for at this time, although this could be included in a future update.
- quicklime, milled, loose: 9.99024e-7 kg; lognormal variance with pedigree 0.0026, pedigree (1,1,3,1,1)
  Measured value. Quicklime is hydrated on site.
- strontium carbonate: 2.4397e-8 kg; lognormal variance with pedigree 0.0026, pedigree (1,1,3,1,1)
  Measured value.
- copper cake: -1.93647e-7 kg; lognormal variance with pedigree 0.0026, pedigree (1,1,3,1,1)
  Measured Value. Proxy created to estimate the treatment of the copper cake.
  production volume 2.40305e6 kg
- ammonium chloride: 1.33515e-8 kg; lognormal variance with pedigree 0.0026, pedigree (1,1,3,1,1)
  Measured value.
- sodium silicate, without water, in 37% solution state: 5.35112e-10 kg; lognormal variance with pedigree 0.002, pedigree (1,1,3,1,1)
  Measured value. Reported as 38% solution. Amount as been multiplied by concentration in order to have the active ingredient only.
  Uncertainty: Calculated variable. Uncertainty will be determined from propagation of uncertainty factors of underlying variables. Uncertainty of actual relation between variables not accounted for at this time, although this could be included in a future update.
- urea, as N: 4.1399e-10 kg; lognormal variance with pedigree 0.002, pedigree (1,1,3,1,1)
  Measured value.
  Uncertainty: Calculated variable. Uncertainty will be determined from propagation of uncertainty factors of underlying variables. Uncertainty of actual relation between variables not accounted for at this time, although this could be included in a future update.
- soda ash, dense: 8.32131e-7 kg; lognormal variance with pedigree 0.0026, pedigree (1,1,3,1,1)
  Measured value. Reported as sodium carbonate. Assumed to be dense soda ash.
- perlite: 1.91163e-9 kg; lognormal variance with pedigree 0.0026, pedigree (1,1,3,1,1)
  Measured value.
- diesel, burned in building machine: 9.61856e-7 MJ; lognormal variance with pedigree 0.002, pedigree (1,1,3,1,1)
  EcoSpold01Location=GLO
  Measured value. Reported in m³.
  Uncertainty: Calculated variable. Uncertainty will be determined from propagation of uncertainty factors of underlying variables. Uncertainty of actual relation between variables not accounted for at this time, although this could be included in a future update.
- zinc concentrate: 4.23391e-5 kg; lognormal variance with pedigree 0.008, pedigree (1,1,3,1,1)
  EcoSpold01Location=GLO
  Measured value.
- electricity, high voltage: 9.91805e-5 kWh; lognormal variance with pedigree 0.0026, pedigree (1,1,3,1,1)
  Measured value. Reported in kWh at 120 kV. According to following document, high voltage is between 44 kV and 315 kV in Quebec region: http://www.hydroquebec.com/transenergie/fr/commerce/pdf/characteristics-and-target-values-of-voltage.pdf
- retention aid, for paper production: 1.45214e-8 kg; lognormal variance with pedigree 0.0026, pedigree (1,1,3,1,1)
  Proxy, reported as "flocculants (polyacrilamide)". Measured value.
- oxygen, liquid: 2.52467e-7 kg; lognormal variance with pedigree 0.002, pedigree (1,1,3,1,1)
  EcoSpold01Location=RER
  Measured value. Reported in litres.
  Uncertainty: Calculated variable. Uncertainty will be determined from propagation of uncertainty factors of underlying variables. Uncertainty of actual relation between variables not accounted for at this time, although this could be included in a future update.
- heat, central or small-scale, other than natural gas: 1.11162e-7 MJ; lognormal variance with pedigree 0.002, pedigree (1,1,3,1,1)
  Calculated value based on reported fuel input (in m³), the Net Heating Value of the fuel and assumed efficiency (1/Fuel_use).
  Uncertainty: Calculated variable. Uncertainty will be determined from propagation of uncertainty factors of underlying variables. Uncertainty of actual relation between variables not accounted for at this time, although this could be included in a future update.
- transport, passenger car, large size, petrol, EURO 3: 2.01928e-8 km; lognormal variance with pedigree 0.2906, pedigree (2,5,5,5,5)
  Calculated value. Reported as liters of petrol used in pickup trucks (1.031E-4 liter/kg). Conversion using : 0,081237 kg/km (taken directly from ecoinvent v3.0 dataset "transport, passenger car, large size, petrol, EURO 3, GLO") and 0.75 kg/l (taken from Table 5.1 of the data quality guideline).
- heat, district or industrial, other than natural gas: 1.6936e-7 MJ; lognormal variance with pedigree 0.002, pedigree (1,1,3,1,1)
  (same comment as for heat, central or small-scale, other than natural gas)
- precious metal refinery: 1.61168e-15 unit; lognormal variance with pedigree 0.002, pedigree (1,1,3,1,1)
  Proxy. Estimated value. The service life, surface area covered and annual production volume of the actual plant, 50 years, 30 ha and more than 250 000 t respectively, are very different than the values assumed for the precious metal refinery modeled by the dataset, 25 years, 0,5 ha and 243 t respectively.
  Uncertainty: Calculated variable. Uncertainty will be determined from propagation of uncertainty factors of underlying variables. Uncertainty of actual relation between variables not accounted for at this time, although this could be included in a future update.
- heat, district or industrial, other than natural gas: 4.84743e-6 MJ; lognormal variance with pedigree 0.002, pedigree (1,1,3,1,1)
  EcoSpold01Location=RER
  Calculated value based on reported fuel input (in m³), the Net Heating Value of the fuel and assumed efficiency (1/Fuel_use).
  Uncertainty: Calculated variable. Uncertainty will be determined from propagation of uncertainty factors of underlying variables. Uncertainty of actual relation between variables not accounted for at this time, although this could be included in a future update.
- municipal solid waste: -7.47835e-8 kg; lognormal variance with pedigree 0.0026, pedigree (1,1,3,1,1)
  Measured value. Reported as household waste.
  production volume 928019 kg
- silver: 2.44819e-10 kg; lognormal variance with pedigree 0.0032, pedigree (2,1,3,1,1)
  Calculated value. Silver for anode production, excluding the amount recovered from restored anodes.
- waste mineral oil: -1.36997e-9 kg; lognormal variance with pedigree 0.0026, pedigree (1,1,3,1,1)
  Measured value. Reported as used oil and grease and sent to an external company. Assumed to be incinerated (expert jugement).
  production volume 17000.5 kg
- sodium hydroxide, without water, in 50% solution state: 1.20499e-8 kg; lognormal variance with pedigree 0.002, pedigree (1,1,3,1,1)
  Measured value. Reported as 50% solution. Amount as been divided in half in order to have the active ingredient only.
  Uncertainty: Calculated variable. Uncertainty will be determined from propagation of uncertainty factors of underlying variables. Uncertainty of actual relation between variables not accounted for at this time, although this could be included in a future update.
- waste paper, unsorted: -1.93392e-9 kg; lognormal variance with pedigree 0.0026, pedigree (1,1,3,1,1)
  Measured value. Reported as cardboard/paper to recycling.
  production volume 23998.9 kg
- section bar extrusion, aluminium: 2.57772e-9 kg; lognormal variance with pedigree 0.002, pedigree (1,1,3,1,1)
  Measured value. Proxy for the production of the copper bars (anodes and equipotentials).
  Uncertainty: Calculated variable. Uncertainty will be determined from propagation of uncertainty factors of underlying variables. Uncertainty of actual relation between variables not accounted for at this time, although this could be included in a future update.
- hydrogen peroxide, without water, in 50% solution state: 1.1657e-10 kg; lognormal variance with pedigree 0.002, pedigree (1,1,3,1,1)
  Measured value. Reported as 50% solution. Amount as been multiplied by concentration in order to have the active ingredient only.
  Uncertainty: Calculated variable. Uncertainty will be determined from propagation of uncertainty factors of underlying variables. Uncertainty of actual relation between variables not accounted for at this time, although this could be included in a future update.
- potassium permanganate: 9.58893e-10 kg; lognormal variance with pedigree 0.0026, pedigree (1,1,3,1,1)
  Measured value.
- waste wood, untreated: -9.26619e-10 kg; lognormal variance with pedigree 0.0026, pedigree (1,1,3,1,1)
  Measured value. Reported as wood to recycling.
  production volume 11498.8 kg
- pyridine: 5.52064e-9 kg; lognormal variance with pedigree 0.0026, pedigree (1,1,3,1,1)
  Measured value. Reported as cyclic amine (confidential).
- sodium dithionite, anhydrous: 2.18278e-8 kg; lognormal variance with pedigree 0.0026, pedigree (1,1,3,1,1)
  Measured value.
- hydrogen, liquid: 9.74393e-8 kg; lognormal variance with pedigree 0.0026, pedigree (1,1,3,1,1)
  Reported as gaseous hydrogen in m³.
  The amount of hydrogen liquid in kg obtained by calculating the number of moles with the ideal gas law at SPT and converting this amount with the molar mass of hydrogen (2 g/mol).
- hot rolling, steel: 1.36902e-7 kg; lognormal variance with pedigree 0.002, pedigree (1,1,3,1,1)
  Measured value. Proxy for anodes production. Includes the amount of new metal and metal in the recycled anodes.
  Uncertainty: Calculated variable. Uncertainty will be determined from propagation of uncertainty factors of underlying variables. Uncertainty of actual relation between variables not accounted for at this time, although this could be included in a future update.
- cement, Portland: 1.5564e-6 kg; lognormal variance with pedigree 0.0026, pedigree (1,1,3,1,1)
  Measured value. Reported as Portland cement type10.
- manganese dioxide: 5.49516e-8 kg; lognormal variance with pedigree 0.0026, pedigree (1,1,3,1,1)
  Measured value.
- sodium sulfide: 7.61424e-9 kg; lognormal variance with pedigree 0.0026, pedigree (1,1,3,1,1)
  Measured value.

## Inputs from nature
- Water, river [natural resource, in water]: 4.52905e-6 m3; lognormal variance with pedigree 0.0026, pedigree (1,1,3,1,1)
  Measured value. Used as cooling water.
- Occupation, inland waterbody, unspecified [natural resource, land]: 8.46132e-8 m2*year; lognormal variance with pedigree 0.002, pedigree (1,1,3,1,1)
  Calculated Value. Land use of the different ponds : tailings pond, wastewater treatment sludge pond and Jarofix disposal site.
  Uncertainty: Calculated variable. Uncertainty will be determined from propagation of uncertainty factors of underlying variables. Uncertainty of actual relation between variables not accounted for at this time, although this could be included in a future update.
- Transformation, to inland waterbody, unspecified [natural resource, land]: 8.46132e-10 m2; lognormal variance with pedigree 0.002, pedigree (1,1,3,1,1)
  (same comment as for Occupation, inland waterbody, unspecified)
- Transformation, from unspecified [natural resource, land]: 8.46132e-10 m2; lognormal variance with pedigree 0.002, pedigree (1,1,3,1,1)
  (same comment as for Occupation, inland waterbody, unspecified)

## Emissions to nature
- Water [air, non-urban air or from high stacks]: 0 m3; pedigree (1,1,1,1,1)
  Calculated value. Estimation of evaporated water during direct chilled casting. Calculation based on difference of water inputs and outputs.
- Nitrogen [air, unspecified]: 0.00285996 kg; lognormal variance with pedigree 0.002, pedigree (1,1,3,1,1)
  Calculated value. Emission of nitrogen to air calculated from mass balance assuming all of nitrogen input is emitted.
  Uncertainty: Calculated variable. Uncertainty will be determined from propagation of uncertainty factors of underlying variables.
- Propanol [air, urban air close to ground]: 0.000209582 kg; lognormal variance with pedigree 0.0052, pedigree (2,4,3,1,1)
  Measured value. Fugitive emission of isopronal.
- Water [air, urban air close to ground]: 5.51355e-5 m3; lognormal variance with pedigree 0.002, pedigree (1,1,3,1,1)
  Calculated value. Amount from water balance. Data provider confirmed that balance of water is evaporated.
  Uncertainty: Calculated variable. Uncertainty will be determined from propagation of uncertainty factors of underlying variables.
- Phosphate [water, surface water]: 5.32394e-14 kg; source M. Leuenberger 2010; lognormal variance with pedigree 0.1306, pedigree (4,3,5,5,4)
  Weight ratio scooter:passenger car
  Uncertainty: weight ratio scooter:passenger car
- Water [air, unspecified]: 6.37079e-8 m3; lognormal variance with pedigree 0.130025, pedigree (4,4,5,2,4)
  Calculated value based on literature values and expert opinion. See comments in the parametres' comment field.
- BOD5, Biological Oxygen Demand [water, surface water]: 6.60344e-9 kg; source M. Leuenberger 2010; lognormal variance with pedigree 0.1306, pedigree (4,3,5,5,4)
  Weight ratio scooter:passenger car
  Uncertainty: weight ratio scooter:passenger car
- NMVOC, non-methane volatile organic compounds, unspecified origin [air, unspecified]: 2.99311e-9 kg; source M. Leuenberger 2010; lognormal variance with pedigree 0.1306, pedigree (4,3,5,5,4)
  Weight ratio scooter:passenger car
  Uncertainty: weight ratio scooter:passenger car
- Water [water, unspecified]: 1.70669e-9 m3; lognormal variance with pedigree 0.130025, pedigree (4,4,5,2,4)
  (same comment as for Water)
- TOC, Total Organic Carbon [water, surface water]: 3.87611e-9 kg; source M. Leuenberger 2010; lognormal variance with pedigree 0.1306, pedigree (4,3,5,5,4)
  Calculated by default as TOC (gC) = COD/2.7 (COD measured in g O2). Should more correctly be calculated from the carbon content of the specified emissions to water.
  Uncertainty: weight ratio scooter:passenger car
- DOC, Dissolved Organic Carbon [water, surface water]: 3.87611e-9 kg; source M. Leuenberger 2010; lognormal variance with pedigree 0.1306, pedigree (4,3,5,5,4)
  Calculated as equal to TOC.
  Uncertainty: weight ratio scooter:passenger car
- COD, Chemical Oxygen Demand [water, surface water]: 9.91346e-9 kg; source M. Leuenberger 2010; lognormal variance with pedigree 0.1306, pedigree (4,3,5,5,4)
  Weight ratio scooter:passenger car
  Uncertainty: weight ratio scooter:passenger car
- COD, Chemical Oxygen Demand [water, unspecified]: 1.10073e-10 kg; source F. Habermacher 2011; lognormal variance with pedigree 0.0452, pedigree (1,4,3,4,2)
  Extrapolated from ecoinvent v2.2 passenger car.
- BOD5, Biological Oxygen Demand [water, unspecified]: 1.48284e-11 kg; source F. Habermacher 2011; lognormal variance with pedigree 0.0832, pedigree (1,4,5,4,2)
  Extrapolated from ecoinvent v2.2 passenger car.
- TOC, Total Organic Carbon [water, unspecified]: 4.07674e-11 kg; lognormal variance with pedigree 0.0452, pedigree (1,4,3,4,2)
  Derived from COD as described in ecoinvent 3 Data Quality Guidelines (p. 49, paragraph 5.9.7). The same Pedigree matrix value as COD has been used.
- DOC, Dissolved Organic Carbon [water, unspecified]: 4.07674e-11 kg; lognormal variance with pedigree 0.0452, pedigree (1,4,3,4,2)
  (same comment as for TOC, Total Organic Carbon)
- Phosphate [water, unspecified]: 5.70324e-13 kg; source F. Habermacher 2011; lognormal variance with pedigree 0.0441, pedigree (1,4,3,3,1)
  Extrapolated from ecoinvent v2.2 passenger car.
- Copper, ion [water, surface water]: 1.48038e-11 kg; lognormal variance with pedigree 0.652, pedigree (1,1,3,1,1)
  Measured value.
- Cadmium [air, non-urban air or from high stacks]: 9.8225e-12 kg; lognormal variance with pedigree 0.652, pedigree (1,1,3,1,1)
  Measured value.
- Dioxins, measured as 2,3,7,8-tetrachlorodibenzo-p-dioxin [air, non-urban air or from high stacks]: 0 kg; pedigree (1,1,1,1,1)
  Measured value. Reported as Dioxins.
- Arsenic, ion [water, surface water]: 6.66511e-13 kg; lognormal variance with pedigree 0.652, pedigree (1,1,3,1,1)
  Measured value.
- Nitrogen oxides [air, non-urban air or from high stacks]: 3.3867e-9 kg; lognormal variance with pedigree 0.042, pedigree (1,1,3,1,1)
  Measured value. Reported as NO2.
- Copper [air, non-urban air or from high stacks]: 1.63581e-11 kg; lognormal variance with pedigree 0.652, pedigree (1,1,3,1,1)
  Measured value.
- Sulfur dioxide [air, non-urban air or from high stacks]: 4.30185e-7 kg; lognormal variance with pedigree 0.0026, pedigree (1,1,3,1,1)
  Measured value.
- Carbon dioxide, fossil [air, non-urban air or from high stacks]: 3.22321e-7 kg; lognormal variance with pedigree 0.0026, pedigree (1,1,3,1,1)
  Measured value. Emissions from carbonates and concentrate.
- Zinc, ion [water, surface water]: 2.07194e-10 kg; lognormal variance with pedigree 0.652, pedigree (1,1,3,1,1)
  Measured value.
- Carbon monoxide, fossil [air, non-urban air or from high stacks]: 1.24809e-9 kg; lognormal variance with pedigree 0.652, pedigree (1,1,3,1,1)
  Measured value.
- Sulfuric acid [air, non-urban air or from high stacks]: 4.39953e-9 kg; lognormal variance with pedigree 0.042, pedigree (1,1,3,1,1)
  Measured value.
- Fluoride [water, surface water]: 6.32751e-10 kg; source Xiao X. 2003; lognormal variance with pedigree 0.108, pedigree (1,5,5,5,3)
  Proxy. Taken directly from the ecoinvent v3.0 datatset "primary zinc production from concentrate, GLO 2003". The uncertainty has been adjusted accordingly
- Selenium [water, surface water]: 3.09581e-11 kg; lognormal variance with pedigree 0.652, pedigree (1,1,3,1,1)
  Measured value.
- Particulates, < 2.5 um [air, non-urban air or from high stacks]: 4.51631e-9 kg; lognormal variance with pedigree 0.302, pedigree (1,1,3,1,1)
  Measured value.
- Water [water, surface water]: 4.46564e-6 m3; lognormal variance with pedigree 0.002, pedigree (1,1,3,1,1)
  Estimation by data provider.
  Uncertainty: Calculated variable. Uncertainty will be determined from propagation of uncertainty factors of underlying variables. Uncertainty of actual relation between variables not accounted for at this time, although this could be included in a future update.
- Particulates, > 2.5 um, and < 10um [air, non-urban air or from high stacks]: 6.90717e-10 kg; lognormal variance with pedigree 0.122, pedigree (1,1,3,1,1)
  Measured value.
- Mercury [water, surface water]: 1.36466e-13 kg; lognormal variance with pedigree 0.652, pedigree (1,1,3,1,1)
  Measured value.
- Zinc [air, non-urban air or from high stacks]: 1.76979e-9 kg; lognormal variance with pedigree 0.652, pedigree (1,1,3,1,1)
  Measured value.
- Mercury [air, non-urban air or from high stacks]: 1.87129e-12 kg; lognormal variance with pedigree 0.652, pedigree (1,1,3,1,1)
  Measured value.
- Cadmium, ion [water, surface water]: 2.93656e-12 kg; lognormal variance with pedigree 0.652, pedigree (1,1,3,1,1)
  Measured value.
- Particulates, > 10 um [air, non-urban air or from high stacks]: 6.60354e-10 kg; lognormal variance with pedigree 0.042, pedigree (1,1,3,1,1)
  Measured value.
- Lead [air, non-urban air or from high stacks]: 1.48314e-11 kg; lognormal variance with pedigree 0.652, pedigree (1,1,3,1,1)
  Measured value.
- Arsenic [air, non-urban air or from high stacks]: 1.92607e-12 kg; lognormal variance with pedigree 0.652, pedigree (1,1,3,1,1)
  Measured value.
- Lead [water, surface water]: 1.21029e-11 kg; lognormal variance with pedigree 0.652, pedigree (1,1,3,1,1)
  Measured value.

## Sampling procedure
Primary data collected from one manufacturing facility in Québec which represents majority of the regional production.

## Extrapolations
This dataset is based on primary data from one facility producing cast-alloy aluminium bars by continuous horizontal casting in Quebec and extrapolated to the entire global production. Uncertainties have been adjusted accordingly.
