# heat and power co-generation, natural gas, combined cycle power plant, 400MW electrical

Dataset: EcoSpold 2, unit process
Geography: LT
Time period: 2000-01-01 to 2019-12-31
Technology level: modern
Classification: EcoSpold01Categories: natural gas/power plants
Classification: ISIC rev.4 ecoinvent: 3510:Electric power generation, transmission and distribution
Synonyms: CCGT; GuD; GCC; cogeneration; CHP; CCPP
Tags: fossil fuels; natural gas power
Scenario: Business-as-Usual
System model: Allocation at the point of substitution
Generated by: Karin Treyer
Published in: Faist Emmenegger, M. 2007
Database: ecoinvent
isCopyrightProtected: true
accessRestrictedTo: 1

## General comment
This dataset represents the production of high voltage electricity and heat in a combined cycle natural gas power plant with CHP (combined heat and power) in Lithuania in 2012.
In a combined cycle power plant, a gas turbine is followed by a steam turbine. The dataset refers to a combined cycle power plant of 400MWe class with a gas turbine 260MWe and a steam turbine 140MWe.
For electricity production with natural gas, four different datasets relying to different power plant types exist:
- conventional power plant with / without CHP
- combined cycle power plant with / without CHP
At the moment, these datasets differ in nothing but the efficiency. High voltage electricity (at the busbar) is the reference product, whereupon heat is a by-product in CHP plants. Out of all fossile fuels, natural gas holds worldwide the highest share of CHP plants besides peat. Furthermore, natural gas power plants are today often designed with combined cycles. The advantages of a combined cycle power plant are for example:
- a higher efficiency (approximately between 50-60% compared to ca. 33% for a conventional power plant)
- high operating flexibility
- lower emissions due to higher efficiency
- lower cooling water need.
The approximate share of combined cycle natural gas power plants in Lithuania amounts to ca. 36%. About 27% are combined heat power plants (calculations made with IEA/OECD statistics and own assumptions).
The efficiency calculations are based on IEA/OECD statistics (fuel inputs, electricity produced) and some own calculation assumptions. Reducing factors such as contaminations of important plant parts, cooling conditions or part load have been taken into account. Even if efficiencies vary with different surrounding temperatures, a medium efficiency is assumed for all countries. Temperature adjustments would be related to high uncertainties.
Water is used for wet cooling and as feed water in the steam circuit. In this dataset, 100% wet cooling and no once-through cooling is assumed.
EMISSIONS:
Different sources served as basis for assumption of average emissions. Where possible, the most recent sources were taken into account, whereas older sources were taken in order to determine the remaining data gaps. The emissions have been fixed for the former UCTE region* and have been overtaken as such for all countries without value adaptation (adaptation of the uncertainty). See ecoinvent report 'Erdgas' given as main source for details (Tab. 11.15). In the following a short overview:
- Emissions of NOx, CO, CO2, SO2, particles, N2O and CH4 are mainly taken from CORINAIR 2001, EPA, and a variety of other data sources
- NOx emissions are a major challenge in natural gas power plants. With rising temperature, emissions also rise; band widths of NOx emissions in literature are correspondingly large. There are several methods to diminish these emissions.
- CO is a result of incomplete burning. For economic and technical reasons, plant combustion is optimized and CO emissions are low.
- CO2 and SO2 emissions are dependent on the composition of the used fuel. Due to the low sulfur content of the used natural gas, no desulfurization has to take place.
- Organic compound emissions are estimated on the basis of EPA 1998.
- Particles are assumed to be smaller than 2.5 micro-m
former UCTE: Union for the Coordination of the Transmission of Electricity, since 2009 replaced by ENTSO-E European Network of Transmission System Operators for Electricity.
Sources:
- CORINAIR 2001. EMEP/CORINAIR 2001: Joint EMEP/CORINAIR Atmospheric Emission Inventory Guidebook, Third Edition. Copenhagen: European Environment Agency, 2001. http://reports.eea.eu.int/technical_report_2001_3/en.
- EPA 1998. US Environmental Protection Agency (1998). Compilation of Air Pollutant Emission Factors, AP-42, Fifth Edition, Volume I: Chapter 1: External Combustion Sources, Natural Gas Combustion - Final Section - Supplement D , July 1998. CHIEF (Clearinghouse for Inventories and Emission Factors). Research Triangle Park, North Carolina. http://www.epa.gov/ttn/chief/ap42/.
- Rentz O., Karl U., Peter H. (2002). Ermittlung und Evaluierung von Emissionsfaktoren für Feuerungsanlagen in Deutschland für die Jahre 1995, 2000 und 2010. Deutsch- Französisches Institut für Umweltforschung, Uni Karsruhe. Endbericht. Im Auftrag des Umweltbundesamtes. Forschungsbericht 299 43 142. Umweltbundesamt. Berlin.

## Included activities start
From the constructed combined cycle natural gas power plant ready to produce electricity.

From reception of natural gas and operating materials at power plant/factory gate

## Included activities end
This activity ends with 1kWh of high voltage electricity and a corresponding amount of heat produced at the power plant and arrived at the busbar.

This dataset includes:
- all operation and maintenance activities and materials of the power plants.
- Cooling: It is a assumed that all plants use wet cooling with a cooling tower. No cooling tower is included in this dataset (will be implemented in future versions)
- decarbonised water use for reduction of NOx emissions

This dataset doesn't include
- raw materials extraction, decommissioning and waste treatment as these activities are already included in the infrastructure datasets.
- transformation of the electricity produced.

## Technology
Combined cycle power plant of 400MWe class with a gas turbine 265MWe and a steam turbine 140MWe. The plant is used for middle load with 5000 hours of operation at full capacity per year. The plant is assumed to operate 180000 hours during its lifetime.

## Time period
The Annual Production Volume is valid for the year 2012.

## Parameters
- losses from gross electricity production: 0.07 dimensionless; name losses_gross_net; lognormal variance with pedigree 0.017225, pedigree (4,3,1,2,3)
  Calculated value. Own use of electricity plants in this country in 2012. For the non-OECD countries, the losses were first calculated for the total electricity sector based on the IEA electricity information 2014, table 1.1 (net electricity = gross electricity minus own use). However, this value can be very low if the share of electricity from fossiles is low in a specific country. Therefore, the default loss as described by the IEA in the electricity statistic is applied, which is 0.07 (IEA electricity information 2014: The difference between gross and net electricity production is generally observed to be about 7% for conventional thermal stations, 1% for hydro stations and 6% for nuclear.)
  IEA. 2014. Electricity Information 2014. ISBN 978-92-64-21692-1. International Energy Agency (IEA), Paris Cedex (FR).
  nan
  Uncertainty: G
- water consumption, electricity production from NG, once-T and coolingP CS: 0.0005 m3/kWh; name WConsumption_EP_NG_onceT_andCP_CS; lognormal variance with pedigree 0.092025, pedigree (4,4,3,2,4)
  Estimated based on literature (Scown, 2011, Water Footprint of U.S. Transportation Fuels, SI).
  nan
- fraction, water, decarbonised, to air: 0.0118019; name fraction_WDC_to_air; = fraction_CW_to_air; lognormal variance with pedigree 0.092025, pedigree (4,4,3,2,4)
  Calculated value. See comments in the other parametres present in this dataset. Decarbonised water is considered to be always used as cooling water, thus cooling water fractions to air are applied to all carbonised water input flows to calculate the amount of water consumed in the processes.
  nan
- water withdrawal, electricity production from NG, once-T and coolingP CS: 0.098 m3/kWh; name WWithdrawal_EP_NG_onceT_andCP_CS; lognormal variance with pedigree 0.092025, pedigree (4,4,3,2,4)
  (same comment as for water consumption, electricity production from NG, once-T and coolingP)
- fraction, cooling water, to air: 0.0118019; name fraction_CW_to_air; = (WConsumption_EP_NG_recirculatingCS*recirculating_CS_fraction_from_allCS+WConsumption_EP_NG_onceT_andCP_CS*once_through_andCP_CS_fractio_from_allCS)/(WWithdrawal_EP_NG_recirculating_CS*recirculating_CS_fraction_from_allCS+WWithdrawal_EP_NG_onceT_andCP_CS*once_through_andCP_CS_fractio_from_allCS); lognormal variance with pedigree 0.092025, pedigree (4,4,3,2,4)
  Calculated
  nan
- fraction, process water, to air: 0.15 dimensionless; name fraction_PW_to_air; lognormal variance with pedigree 0.092025, pedigree (4,4,3,2,4)
  Literature value. In case when no industry/process specific data are available, default evaporation fraction value is used. This value is 15% and is based on literature (Statistics Canada, 2007 & Shaffer, K.H., 2008, Consumptive water use in the Great Lakes Basin, USGS & Shiklomanov, 2003, World Water Resources at the Beginning of the 21st Century) and has been approved by an expert.
  nan
- factor: input of MJ for the production of 1 kWh: 9.72973 MJ/kWh; name factor_MJ_kWh; = 1*3.6/efficiency; lognormal variance with pedigree 0.0532, pedigree (4,4,3,4,4)
  Calculated value. 3.6 MJ = 1kWh.
  nan
- water consumption, electricity production from NG, recirculating CS: 0.0018 m3/kWh; name WConsumption_EP_NG_recirculatingCS; lognormal variance with pedigree 0.092025, pedigree (4,4,3,2,4)
  (same comment as for water consumption, electricity production from NG, once-T and coolingP)
- efficiency: 0.37 dimensionless; lognormal variance with pedigree 0.017225, pedigree (4,3,1,2,3)
  Literature value/calculated value/estimation. Net electrical efficiency based on the lower heating value (LHV). For all OECD countries, the IEA Electricity information 2014 provides data for the year 2012 on natural gas fuel input (TJ, Net calorific value NCV) and gross electricity production (GWh) as well as heat production (TJ) in tables 8 and 9 for each country for electricity only and Combined Heat and Power (CHP) plants each.
  For all non-OECD countries, data from the IEA electricity information 2014, tables 1.3 (electricity production) and table 1.5 (fuel input) have been used. In cases where only total values for electricity production in electricity only/CHP plants were given, the total value was applied to both types.
  Together with the information on own use (see parameter 'losses'), the net electrical efficiency based on the NCV in natural gas electricity only and CHP plants is calculated. Based on the estimated shares of the four natural gas types (see general comment) and assumed average and maximum values for efficiency in each of these types, the resulting estimated electrical efficiency per country and type was calculated.
  Estimated average and maximum efficiencies for the four power plant types (based on expert judgment and literature values):
  - conventional power plant, w/o CHP: 0.33 / 0.45
  - conventional power plant, with CHP: 0.28 / 0.38
  - combined cycle power plant, w/o CHP: 0.53 / 0.6
  - combined cycle power plant, with CHP: 0.37 / 0.5
  IEA. 2014. Electricity Information 2014. ISBN 978-92-64-21692-1. International Energy Agency (IEA), Paris Cedex (FR).
  IEA/OECD. 2014. Energy balances of non-OECD countries 2014. International Energy Agency (IEA), Paris Cedex (FR).
  output relative to input (requires additional specification)
- once-through and cooling pond cooling systems as a fraction of all cooling syste: 0.73 dimensionless; name once_through_andCP_CS_fractio_from_allCS; lognormal variance with pedigree 0.092025, pedigree (4,4,3,2,4)
  Calculated as an average of data available for Europe (Floerke, 2008, Future changes of freshwater needs in the electricity production sector) and USA (NERL, 2011, Estimating freshwater needs to meet future thermoelectric generation requirements).
  nan
- recirculating cooling system as a fraction of all cooling systems: 0.27 dimensionless; name recirculating_CS_fraction_from_allCS; lognormal variance with pedigree 0.092025, pedigree (4,4,3,2,4)
  (same comment as for once-through and cooling pond cooling systems as a fraction of all coo)
- gross electricity production: 1.11205e8 kWh; name gross_electricity; lognormal variance with pedigree 0.003225, pedigree (3,1,1,2,2)
  Assumption. This production volume had to be altered in order to obtain realistic shares of technologies on the Rest-of-World electricity market. By definition, no global electricity market exists in ecoinvent, but only the local electricity markets and the RoW electricity market.
  ORIGINAL STATISTICAL VALUE as described below:
  3.1613E+12 kWh
  Literature value. Gross grid-connected natural gas electricity production in electricity plants (no CHP, but conventional and combined cycle). Gross value from the official OECD/IEA gross electricity production 2008 statistics, including data from 196 countries.
  In the IEA statistics, 'gas' includes natural gas (excluding
  natural gas liquids) and gas works gas (town gas).
  IEA/OECD. 2010. Energy balances of non OECD countries 2010. Statistics of the Internationsl Energy Agency, Paris. Part II - Statistical Data. Graphs and Energy Balance Sheets 2007-2008, Regional Totals.
  nan
- fraction, water, completely softened, to air: 0.15; name fraction_WCS_to_air; = fraction_PW_to_air; lognormal variance with pedigree 0.092025, pedigree (4,4,3,2,4)
  Calculated value. See comment in the other parametres present in this dataset. Water, completely softened is considered to be always used as process water, thus process water fractions to air are applied to all water, completely softened input flows to calculate the amount of water consumed in the processes.
  nan
- water withdrawal, electricity production from NG, recirculating CS: 0.0021 m3/kWh; name WWithdrawal_EP_NG_recirculating_CS; lognormal variance with pedigree 0.092025, pedigree (4,4,3,2,4)
  (same comment as for water consumption, electricity production from NG, once-T and coolingP)

## Reference product
- heat, district or industrial, natural gas: 1 MJ; name heat; CPC 17300: Steam and hot water; By-product classification allocatable product
  Literature value/calculated value. For OECD countries, gross electricity and heat production 2012 with natural gas in CHP plants are given in the IEA electricity informaiton 2014, country tables 8 and 9, for most countries.
  For non-OECD countries, these values were partly found in the Energy balances of non-OECD countries.
  As an exception, all exchanges refer to the by-product 'electricity, high voltage, 1kWh'.
  IEA. 2014. Electricity Information 2014. ISBN 978-92-64-21692-1. International Energy Agency (IEA), Paris Cedex (FR).
  IEA/OECD. 2014. Energy balances of non-OECD countries 2014. International Energy Agency (IEA), Paris Cedex (FR).
  production volume 5.37788e8 MJ; name heat_apv; = heat/electricity*electricity_apv
    Calculated value.
  property price 0.0106 EUR2005
    Average European district heat price from Ecoheatcool and Euroheat 2005-2006, Ecoheat Work package 1: The European heat market. Final report. 10.6 EUR/GJ i s the price of district heat. http://www.solarthermalworld.org/files/Ecoheatcool%20WP1%20Web.pdf?download
  property exergy 0.184214 MJ; name exergy
    allocation factor for electricity (=1) vs. heat, where heat is calculated as the termodynamic mean temperature Tm = (Tfeed-Treturn)/ln(Tfeed/Treturn), relative to the application temperature (Tu, typically = 293 K), i.e. (Tm-Tu)/Tm
  property true value relation 0.184214; name true_value_relation
    property to calculate 'true value' from
  property true value 0.0321173; name heat_true_value
    allocation property applied in "true value" allocation // value calculated from true value relation

## By-products
- electricity, high voltage: 0 kWh; name electricity; CPC 17100: Electrical energy; By-product classification allocatable product; undefined min 1, max 1, standardDeviation95 0, pedigree (1,1,3,1,1)
  production volume 1.03421e8 kWh; name electricity_apv
    Calculated value
  property exergy 3.6 MJ
    (same comment as for heat, district or industrial, natural gas)
  property price 0.0977 EUR2005
    Temporary price data. Calculated as 90% of purchasers price based on: 94% of the average price (to account for a 6% loss in transformation and transmission) for electricity for industrial consumersin 2005 (excluded taxes). From IEA.
  property true value 0.120703; name electricity_true_value
    (same comment as for heat, district or industrial, natural gas)
  properties: true value relation 3.6
- heat, for reuse in municipal waste incineration only: 0 MJ; CPC 17300: Steam and hot water; By-product classification allocatable product; pedigree (1,1,1,1,1)
  Net electricity generated from this waste and used in internal MSWI plant energy redistribution.
  Uncertainty: uncertainty is calculated from uncertainties in waste composition and uncertainties in energy efficiency and the uncertainty in internal energy demand
  production volume 0.203626 MJ
  property exergy 0.1842 MJ; name E_th_prod_MSWI_exergy
    This exergy property is based on the exergy content of the product.
  property price 0.0106 EUR2005; name E_th_prod_MSWI_price_EUR2005
    (same comment as for heat, district or industrial, natural gas)
  property true value relation 0.1842; name E_th_prod_MSWI_true_value_relation
    property to calculate "true value" from
  property true value 2.33844e-12
    (same comment as for heat, district or industrial, natural gas)
- electricity, for reuse in municipal waste incineration only: 0 kWh; CPC 17100: Electrical energy; By-product classification allocatable product; pedigree (1,1,1,1,1)
  (same comment as for heat, for reuse in municipal waste incineration only)
  production volume 0.0286783 kWh
  property true value relation 3.6; name E_el_prod_MSWI_true_value_relation
    property to calculate "true value" from
  property price 0.1 EUR2005; name E_el_prod_MSWI_price_EUR2005
    Estimated to be the same price as in case of electricity, medium voltage.
  property exergy 3.6 MJ; name E_el_prod_MSWI_exergy
    This exergy property is based on the exergy content of the product.
  property true value 6.43663e-12
    (same comment as for heat, district or industrial, natural gas)

## Inputs from technosphere
- natural gas, high pressure: 0.0100831 m3; name natural_gas; = factor_MJ_kWh/ natural_gas_Net_Heat_Value; lognormal variance with pedigree 0.004, pedigree (1,1,3,5,1)
  Calculated value.
  property heating value, net 39 MJ; name natural_gas_Net_Heat_Value
  properties: dry mass 0.84 kg, wet mass 0.84 kg, carbon content, fossil 0.602381
  note on heating value, net: Net (lower) heating (calorific) value at norm conditions (0°C, 101.325 kPa). Literature value.
  note on carbon content, fossil: An average C content of 0.506 kg C/ m3 has been assumed (this average has been calculated using data in Tab 3.5, ecoinvent v2.2 report 6_V
- gas power plant, combined cycle, 400MW electrical: 5.61337e-13 unit; name gas_power_plant; = 1/(400*1000*180000); lognormal variance with pedigree 0.1392, pedigree (3,3,4,4,3)
  Amount of power plant infrastructure input calculated based on expected full load hours during power plant lifetime (180000h) and power plant capacity (400MW). See "gas power plant construction, combined cycle, 400MW electrical" dataset and corresponding documentation.
- gas power plant, combined cycle, 400MW electrical: 0 unit; name dummy123; uniform min 0, max 0, pedigree (1,1,3,1,1)
  Literature value/calculated value. Amount of power plant needed forproduction of 1kWh of electricity, based on the value for burning of 1MJ of natural gas. Tab. 11.25, p. 143. As there existed only one RER natural gas combined cycle power plant dataset in ecoinvent v2, no weighted average of emissions in different countries could be made as for the other emissions. The value is just taken over from the mentioned tab, uncertainty is adjusted.
- water, decarbonised: 0.0786478 kg; name water_decarbonised_user; = factor_MJ_kWh*0.2; lognormal variance with pedigree 0.2352, pedigree (4,3,4,4,3)
  Literature value/calculated value. Cooling water, decarbonised, for the cooling water circuit lost and NOx reduction whenproduction of 1kWh of electricity, based on the value for burning of 1MJ of natural gas. Tab. 11.25, p. 143. For natural gas burned in a combined cycle plant (Tab. 11.25), an amount of 0.5 kg water per MJ burned was taken into account in Röder et al. 2007. As the reasons for this are not documented any more, the cooling water use has been taken over to the combined cycle plant dataset for consistency reasons.
  Röder et al. 2007 state that CC plants have a lower cooling water need than conventional plants. However, as written above, water use for NOx reduction is also taken into account.
  properties: wet mass 1 kg
- residue from cooling tower: -3.93239e-7 kg; name cooling_tower_residue; = (factor_MJ_kWh*0.000001)*-1; lognormal variance with pedigree 1.1067, pedigree (4,3,5,3,3)
  Literature value/calculated value. Value taken over from the dataset of natural gas burned in a normal power plant (electricity production, natural gas, GLO 2008).
  Mass share of cooling tower needed forproduction of 1kWh of electricity, based on the value for burning of 1MJ of natural gas. Weighted average with electricity production data (Itten&Frischknecht 2012) and values of 11 countries
  (AT, BE, DE, ES, FR, GB, IT, JP, LU, NL, US) (Faist Emmenegger et al. 2007, JP and US in the appendix)
  Source:
  Itten R. and Frischknecht R. (2012) Life Cycle Inventories of Electricity Mixes and Grid. ESU-services Ltd., Uster, Switzerland.
  production volume 5232.54 kg
    Calculated from the production volume of electricity, high voltage, in proportion to the respective output amounts.
  property price 0 EUR2005; name cooling_tower_residue_price_EUR2005
  properties: dry mass 0.7 kg, carbon content, fossil 0.0544233, water content 0.428571, wet mass 1 kg
- water, completely softened: 0.00235943 kg; name water_completely_softened; = factor_MJ_kWh*0.006; lognormal variance with pedigree 0.234625, pedigree (4,3,4,2,3)
  Literature value/calculated value. Feed water for the steam circuit lost whenproduction of 1kWh of electricity, based on the value for burning of 1MJ of natural gas. Röder et al. 2007, Tab. 9.65 and Tab. 9.66, p. 160f. For natural gas burned in a combined cycle plant (Tab. 11.25), the feed water was taken into account in Röder et al. 2007 by modelling it with decorbonised water being treated with sodium hydroxide and hydrochloric acid directly in the dataset. For consistency reasons, now also the completely softened water is taken into account.
  properties: wet mass 1 kg

## Inputs from nature
- Water, cooling, unspecified natural origin [natural resource, in water]: 0.0029143 m3; name water_cooling_UNO_input; = ((recirculating_CS_fraction_from_allCS*WWithdrawal_EP_NG_recirculating_CS)+(once_through_andCP_CS_fractio_from_allCS*WWithdrawal_EP_NG_onceT_andCP_CS))/9.7297*factor_MJ_kWh; lognormal variance with pedigree 0.098025, pedigree (4,4,4,2,4)
  Calculated based on literature data.

## Emissions to nature
- Manganese [air, non-urban air or from high stacks]: 3.0712e-11 kg; name manganese; = factor_MJ_kWh*0.0000000000781; lognormal variance with pedigree 0.066, pedigree (3,5,4,5,4)
  Literature value/calculated value. Value taken over from the dataset of natural gas burned in a normal power plant (electricity production, natural gas, GLO 2008).
  Emissions whenproduction of 1kWh of electricity, based on the value for burning of 1MJ of natural gas. Weighted average with electricity production data (Itten&Frischknecht 2012) and emission values of 11 countries
  (AT, BE, DE, ES, FR, GB, IT, JP, LU, NL, US) (Faist Emmenegger et al. 2007, JP and US in the appendix. Only the US dataset contains heavy metals emissions - see Tab. 16.10)
  Source:
  Itten R. and Frischknecht R. (2012) Life Cycle Inventories of Electricity Mixes and Grid. ESU-services Ltd., Uster, Switzerland.
- Water [water, unspecified]: 0.00295963 m3; name water_to_water_unspecified; = (water_completely_softened/1000)*(1-fraction_WCS_to_air)+(water_decarbonised_user/1000)*(1-fraction_WDC_to_air)+water_cooling_UNO_input*(1-fraction_CW_to_air); lognormal variance with pedigree 0.098025, pedigree (4,4,4,2,4)
  Calculated value based on literature values and expert opinion. See comments in the parametres' comment field.
  property fraction, origin: unspecified 0.968824; name fraction_origin_unspecified_Ww
  property fraction, origin: fresh water 0.0311764; name fraction_origin_fresh_water_Ww
  property fraction, origin: salt water 0; name fraction_origin_salt_water_Ww
- Propionic acid [air, non-urban air or from high stacks]: 6.29182e-9 kg; name propionic_acid; = factor_MJ_kWh*0.000000016; lognormal variance with pedigree 1.1067, pedigree (4,3,5,3,3)
  Literature value/calculated value. Value taken over from the dataset of natural gas burned in a normal power plant (electricity production, natural gas, GLO 2008).
  Emissions whenproduction of 1kWh of electricity, based on the value for burning of 1MJ of natural gas. Weighted average with electricity production data (Itten&Frischknecht 2012) and emission values of 11 countries
  (AT, BE, DE, ES, FR, GB, IT, JP, LU, NL, US) (Faist Emmenegger et al. 2007, JP and US in the appendix)
  Country emissions values estimate from range of values from different references. See Tab. 11.19, p. 138 in Faist Emmenegger et al. 2007.
  Source:
  Itten R. and Frischknecht R. (2012) Life Cycle Inventories of Electricity Mixes and Grid. ESU-services Ltd., Uster, Switzerland.
- Butane [air, non-urban air or from high stacks]: 3.64139e-7 kg; name butane; = factor_MJ_kWh*0.000000926; lognormal variance with pedigree 0.6807, pedigree (3,3,5,3,3)
  (same comment as for Propionic acid)
- Nitrogen oxides [air, non-urban air or from high stacks]: 1.00276e-5 kg; name nitrogen_oxides; = factor_MJ_kWh*0.0000255; lognormal variance with pedigree 0.3412, pedigree (3,3,4,4,4)
  Literature value/calculated value. Value taken over from the dataset of natural gas burned in a normal power plant (electricity production, natural gas, GLO 2008).
  Emissions whenproduction of 1kWh of electricity, based on the value for burning of 1MJ of natural gas in a combined cycle power plant. Measurement of a single combined cycle plant in Europe. Tab. 11.25 p. 143
- Formaldehyde [air, non-urban air or from high stacks]: 1.27016e-8 kg; name formaldehyde; = factor_MJ_kWh*0.0000000323; lognormal variance with pedigree 0.6807, pedigree (3,3,5,3,3)
  (same comment as for Propionic acid)
- Dioxins, measured as 2,3,7,8-tetrachlorodibenzo-p-dioxin [air, non-urban air or from high stacks]: 0 kg; name dioxins; = factor_MJ_kWh*2.9E-17; pedigree (1,1,1,1,1)
  Literature value/calculated value. Value taken over from the dataset of natural gas burned in a normal power plant (electricity production, natural gas, GLO 2008).
  Emissions whenproduction of 1kWh of electricity, based on the value for burning of 1MJ of natural gas. Weighted average with electricity production data (Itten&Frischknecht 2012) and emission values of 11 countries
  (AT, BE, DE, ES, FR, GB, IT, JP, LU, NL, US) (Faist Emmenegger et al. 2007)
  Country emissions values estimate from range of values from different references. See Tab. 11.19, p. 138 in Faist Emmenegger et al. 2007.
  Source:
  Itten R. and Frischknecht R. (2012) Life Cycle Inventories of Electricity Mixes and Grid. ESU-services Ltd., Uster, Switzerland.
- Cadmium [air, non-urban air or from high stacks]: 8.8872e-11 kg; name cadmium; = factor_MJ_kWh*0.000000000226; lognormal variance with pedigree 0.066, pedigree (3,5,4,5,4)
  (same comment as for Manganese)
- Chromium [air, non-urban air or from high stacks]: 1.1286e-10 kg; name chromium; = factor_MJ_kWh*0.000000000287; lognormal variance with pedigree 0.034, pedigree (3,5,4,5,3)
  (same comment as for Manganese)
- Acetic acid [air, non-urban air or from high stacks]: 4.75819e-8 kg; name acetic_acid; = factor_MJ_kWh*0.000000121; lognormal variance with pedigree 1.1007, pedigree (3,3,5,3,3)
  (same comment as for Propionic acid)
- PAH, polycyclic aromatic hydrocarbons [air, non-urban air or from high stacks]: 3.14591e-9 kg; name pah; = factor_MJ_kWh*0.000000008; lognormal variance with pedigree 1.1067, pedigree (4,3,5,3,3)
  (same comment as for Dioxins, measured as 2,3,7,8-tetrachlorodibenzo-p-dioxin)
- Methane, fossil [air, non-urban air or from high stacks]: 3.81835e-7 kg; name methane_fossil; = factor_MJ_kWh*0.000000971; lognormal variance with pedigree 0.6807, pedigree (3,3,5,3,3)
  Literature value/calculated value. Value taken over from the dataset of natural gas burned in a normal power plant (electricity production, natural gas, GLO 2008).
  Emissions whenproduction of 1kWh of electricity, based on the value for burning of 1MJ of natural gas. Weighted average with electricity production data (Itten&Frischknecht 2012) and emission values of 11 countries
  (AT, BE, DE, ES, FR, GB, IT, JP, LU, NL, US) (Faist Emmenegger et al. 2007)
  Country emissions values estimate from range of values from different references. See Tab. 11.15, p. 133f in Faist Emmenegger et al. 2007.
  Source:
  Itten R. and Frischknecht R. (2012) Life Cycle Inventories of Electricity Mixes and Grid. ESU-services Ltd., Uster, Switzerland.
- Selenium [air, non-urban air or from high stacks]: 1.9308e-12 kg; name selenium; = factor_MJ_kWh*0.00000000000491; lognormal variance with pedigree 0.6807, pedigree (3,3,5,3,3)
  (same comment as for Manganese)
- Benzo(a)pyrene [air, non-urban air or from high stacks]: 2.08023e-13 kg; name benzo_a_pyrene; = factor_MJ_kWh*0.000000000000529; lognormal variance with pedigree 0.6807, pedigree (3,3,5,3,3)
  (same comment as for Propionic acid)
- Carbon dioxide, fossil [air, non-urban air or from high stacks]: 0.020999 kg; name carbon_dioxide_fossil; = factor_MJ_kWh*0.0534; lognormal variance with pedigree 0.0513, pedigree (3,3,5,3,3)
  (same comment as for Methane, fossil)
- Sulfur dioxide [air, non-urban air or from high stacks]: 2.24933e-7 kg; name sulfur_dioxide; = factor_MJ_kWh*0.000000572; lognormal variance with pedigree 0.0517, pedigree (3,3,5,3,3)
  (same comment as for Methane, fossil)
- Nickel [air, non-urban air or from high stacks]: 1.69486e-10 kg; name nickel; = factor_MJ_kWh*0.000000000431; lognormal variance with pedigree 0.066, pedigree (3,5,4,5,4)
  (same comment as for Manganese)
- Acetaldehyde [air, non-urban air or from high stacks]: 3.14591e-10 kg; name acetaldehyde; = factor_MJ_kWh*0.0000000008; lognormal variance with pedigree 1.1067, pedigree (4,3,5,3,3)
  (same comment as for Propionic acid)
- Particulates, < 2.5 um [air, non-urban air or from high stacks]: 1.9308e-7 kg; name particulates_lt_2_5um; = factor_MJ_kWh*0.000000491; lognormal variance with pedigree 0.3407, pedigree (3,3,4,3,4)
  (same comment as for Methane, fossil)
- Hexane [air, non-urban air or from high stacks]: 3.11839e-7 kg; name hexane; = factor_MJ_kWh*0.000000793; lognormal variance with pedigree 0.6807, pedigree (3,3,5,3,3)
  (same comment as for Propionic acid)
- Water [air, unspecified]: 3.56764e-5 m3; name water_to_air_unspecified; = (water_completely_softened/1000)*fraction_WCS_to_air+(water_decarbonised_user/1000)*fraction_WDC_to_air+water_cooling_UNO_input*fraction_CW_to_air; lognormal variance with pedigree 0.098025, pedigree (4,4,4,2,4)
  (same comment as for Water)
  property fraction, origin: salt water 0; name fraction_origin_salt_water
  property fraction, origin: unspecified 0.961322; name fraction_origin_unspecified
  property fraction, origin: fresh water 0.0386781; name fraction_origin_fresh_water
- Toluene [air, non-urban air or from high stacks]: 5.89858e-10 kg; name toluene; = factor_MJ_kWh*0.0000000015; lognormal variance with pedigree 0.6807, pedigree (3,3,5,3,3)
  (same comment as for Propionic acid)
- Mercury [air, non-urban air or from high stacks]: 2.70548e-11 kg; name mercury; = factor_MJ_kWh*0.0000000000688; lognormal variance with pedigree 0.6807, pedigree (3,3,5,3,3)
  (same comment as for Manganese)
- Arsenic [air, non-urban air or from high stacks]: 1.61621e-11 kg; name arsenic; = factor_MJ_kWh*0.0000000000411; lognormal variance with pedigree 0.066, pedigree (3,5,4,5,4)
  (same comment as for Manganese)
- Propane [air, non-urban air or from high stacks]: 2.77233e-7 kg; name propane; = factor_MJ_kWh*0.000000705; lognormal variance with pedigree 0.6807, pedigree (3,3,5,3,3)
  (same comment as for Propionic acid)
- Acenaphthene [air, non-urban air or from high stacks]: 3.11839e-13 kg; name acenaphthene; = factor_MJ_kWh*0.000000000000793; lognormal variance with pedigree 0.6807, pedigree (3,3,5,3,3)
  (same comment as for Propionic acid)
- Carbon monoxide, fossil [air, non-urban air or from high stacks]: 8.65126e-7 kg; name carbon_monoxide_fossil; = factor_MJ_kWh*0.0000022; lognormal variance with pedigree 0.3092, pedigree (3,3,4,4,3)
  (same comment as for Nitrogen oxides)
- Cobalt [air, non-urban air or from high stacks]: 6.76371e-12 kg; name cobalt; = factor_MJ_kWh*0.0000000000172; lognormal variance with pedigree 0.066, pedigree (3,5,4,5,4)
  (same comment as for Manganese)
- Beryllium [air, non-urban air or from high stacks]: 9.713e-13 kg; name beryllium; = factor_MJ_kWh*0.00000000000247; lognormal variance with pedigree 0.066, pedigree (3,5,4,5,4)
  (same comment as for Manganese)
- Benzene [air, non-urban air or from high stacks]: 3.54702e-10 kg; name benzene; = factor_MJ_kWh*0.000000000902; lognormal variance with pedigree 0.6807, pedigree (3,3,5,3,3)
  (same comment as for Propionic acid)
- Dinitrogen monoxide [air, non-urban air or from high stacks]: 3.84194e-7 kg; name dinitrogen_monoxide; = factor_MJ_kWh*0.000000977; lognormal variance with pedigree 0.3407, pedigree (3,3,5,3,3)
  (same comment as for Methane, fossil)
- Pentane [air, non-urban air or from high stacks]: 4.52225e-7 kg; name pentane; = factor_MJ_kWh*0.00000115; lognormal variance with pedigree 0.6807, pedigree (3,3,5,3,3)
  (same comment as for Propionic acid)
- Lead [air, non-urban air or from high stacks]: 4.05036e-11 kg; name lead; = factor_MJ_kWh*0.000000000103; lognormal variance with pedigree 0.066, pedigree (3,5,4,5,4)
  (same comment as for Manganese)
- Ethane [air, non-urban air or from high stacks]: 5.38737e-7 kg; name ethane; = factor_MJ_kWh*0.00000137; lognormal variance with pedigree 0.6807, pedigree (3,3,5,3,3)
  (same comment as for Propionic acid)

## Sampling procedure
Literature

## Extrapolations
Data have been taken over from a dataset valid for the time period 2000-2005, relying on sources of the 90th. No changes were made for the 2008 dataset, but uncertainty was adjusted.
All exchange data were extrapolated from datasets of the following 11 countries: AT, BE, DE, ES, FR, GB, IT, JP, LU, NL, US. The data of those countries basically rely on data of the former UCTE (see general comment).

The efficiency is based on IEA/OECD statistics and calculated with own assumptions.

The cooling and feed water use has been overtaken from datasets for electricity production with hard coal or lignite.
