# bark chips, wet, measured as dry mass to generic market for residual hardwood, wet

Dataset: EcoSpold 2, unit process
Geography: GLO
Time period: 2014-01-01 to 2019-12-31
Technology level: current
Classification: ISIC rev.4 ecoinvent: 1610:Sawmilling and planing of wood
Scenario: Business-as-Usual
System model: Allocation at the point of substitution
Generated by: Emilia Moreno Ruiz
Database: ecoinvent
isCopyrightProtected: true
accessRestrictedTo: 1

## General comment
This activity is linking the more specific market for bark chips, to the more generic market for residual hardwood, wet; and residual softwood, wet.It makes accesible the specific product bark chips through the more generic products of wet residual wood.

## Included activities start
Entry of the specific product "bark chips, wet, measured as dry mass"

## Included activities end
Delivery of the generic products "residual hardwood, wet" and "residual softwood, wet"

## Reference product
- residual hardwood, wet: 1 m3; name residual_hardwood_wet; CPC 39283: Non-agglomerated wood waste and scrap; By-product classification allocatable product
  production volume 9.53846e6 m3; = 6.2E10*0.1/ residual_hardwood_wet_DM
    6.20E+10 kg is the rough Production Volumes of bark chips produced out of debarking. It is considered that 10% of this volume is consumed as the more generic product "residual hardwood, wet", and 10% as "residual softwood, wet". The Dry Mass of those products is used to calculate the Production Volumes in m3.
  property price 41.8 EUR2005; name residual_hardwood_wet_price_EUR2005
    Calculated based on literature value (PE-80 Pipe Systems: 17 Years of Successful Application in teh Public Sewer Network System of Göttingen, Pipeline Technology 2006 Conferece, http://www.pipeline-conference.com/sites/default/files/papers/124%20Fiedler.pdf). In general the costs for construction and maintenance of sewer grid varies significantly from region to region. In Göttingen app. 700 km of sewers are being managed. The annual investments in maintenance, renewal and construction of new sewer grid are 16 mio. Euro. With a lifetime of 100 years the cost of 1km of sewer grid is estimated to be (16000000*100/700=) 2.29E+06 Euro/km.
  property dry mass 650 kg; name residual_hardwood_wet_DM
  property carbon content 0.494
    carbon content on a dry matter basis (reserved; not for manual entry)
  property true value 20.9; name residual_hardwood_wet_true_value
    allocation property applied in "true value" allocation // value calculated from revenue
  properties: water in wet mass 455 kg, carbon content, non-fossil 0.494, water content 0.7, wet mass 1105 kg, carbon content, fossil 0, carbon allocation 321.1 kg

## By-products
- residual softwood, wet: 0 m3; name residual_softwood_wet; CPC 39283: Non-agglomerated wood waste and scrap; By-product classification allocatable product
  production volume 1.37778e7 m3; = 0.1*6.2E10/ residual_softwood_wet_DM
    (same comment as for residual hardwood, wet)
  property dry mass 450 kg; name residual_softwood_wet_DM
  property price 19.5 EUR2005; name residual_softwood_wet_price_EUR2005
    Calculated based on inputs: The price of the product has been calculated as a sum of the values of the material and energy inputs for this product. This value is therefore a rough estimation. It may underestimate the real price since there are additional expenses when producing any product. These expences can include for example labour costs, treatment of waste materials and profit for the producer. Please consider carefully whether this level of data quality is acceptable for your application.
  property carbon content 0.494
    carbon content on a dry matter basis (reserved; not for manual entry)
  property true value 9.75; name residual_softwood_wet_true_value
    allocation property applied in "true value" allocation // value calculated from revenue
  properties: carbon content, non-fossil 0.494, water in wet mass 315 kg, carbon content, fossil 0, water content 0.7, wet mass 765 kg, carbon allocation 222.3 kg

## Inputs from technosphere
- bark chips, wet, measured as dry mass: 750.082 kg; = (residual_softwood_wet_DM* residual_softwood_wet)+ (residual_hardwood_wet_DM* residual_hardwood_wet)
  Calculated using the Dry Mass of the reference product and the by-product. It has been considered that this product feeds the generic markets for "residual hardwood, wet" and "residual softwood, wet" in a 50%:50% share.
  properties: carbon content, non-fossil 0.494, water content 1.4, dry mass 1 kg, wet mass 2.4 kg
