# treatment of waste plastic, consumer electronics, municipal incineration

Dataset: EcoSpold 2, unit process
Geography: CH
Time period: 1994-01-01 to 2019-12-31
Technology level: outdated
Classification: ISIC rev.4 ecoinvent: 3821:Treatment and disposal of non-hazardous waste
Classification: EcoSpold01Categories: waste management/municipal incineration
Synonyms: larger plastic parts in brown goods
Tags: Treatment; ConvertedDataset
Scenario: Business-as-Usual
System model: Allocation at the point of substitution
Generated by: Gabor Doka (obsolete)
Published in: Doka G. 2007
Database: ecoinvent
isCopyrightProtected: true
accessRestrictedTo: 1

## General comment
Inventoried waste contains 100% Plastics from electronic consumer goods; .
waste composition (wet, in ppm): upper heating value 36.29 MJ/kg; lower heating value 34.78 MJ/kg; H2O 11129; O 41000; H 75000; C 821000; S 300; N 13100; P 600; B n.a.; Cl 6300; Br 6800; F 130; I n.a.; Ag n.a.; As 10; Ba 137; Cd 115; Co 29.478; Cr 34; Cu 3194.1; Hg 1.4; Mn 4; Mo 2; Ni 703; Pb 127; Sb 4795.2; Se 1.9596; Sn 267; V 0.5; Zn 361; Be 0.46656; Sc n.a.; Sr 82.582; Ti 4187; Tl 0.37325; W n.a.; Si 3547; Fe 1483; Ca 3177; Al 2020; K 233; Mg n.a.; Na 128;
Share of carbon in waste that is biogenic 0%.
Share of iron in waste that is metallic/recyclable 0%.
Net energy produced in MSWI: 4MJ/kg waste electric energy and 8.05MJ/kg waste thermal energy
Allocation of energy production: no substitution or expansion. Total burden allocated to waste disposal function of MSWI.
One kg of this waste produces 0.03698 kg of slag and 0.01909 kg of residues, which are landfilled. Additional solidification with 0.007635 kg of cement.
[This dataset was already contained in the ecoinvent database version 2. It was not individually updated during the transfer to ecoinvent version 3. Life Cycle Impact Assessment results may still have changed, as they are affected by changes in the supply chain, i.e. in other datasets. This dataset was generated following the ecoinvent quality guidelines for version 2. It may have been subject to central changes described in the ecoinvent version 3 change report (http://www.ecoinvent.org/database/ecoinvent-version-3/reports-of-changes/), and the results of the central updates were reviewed extensively. The changes added e.g. consistent water flows and other information throughout the database. The documentation of this dataset can be found in the ecoinvent reports of version 2, which are still available via the ecoinvent website. The change report linked above covers all central changes that were made during the conversion process.]

## Included activities end
waste-specific air and water emisions from incineration, auxiliary material consumption for flue gas cleaning. Short-term emissions to river water and long-term emisisons to ground water from slag compartment (from bottom slag) and residual material landfill (from solidified fly ashes and scrubber slugde). Process energy demands for MSWI.

## Geography
Specific to the technology mix encountered in Switzerland in 2000. Well applicable to modern incineration practices in Europe, North America or Japan.

## Technology
replaced by newer incineration technology with fly ash extraction. Average Swiss MSWI plants in 2000 with electrostatic precipitator for fly ash (ESP), wet flue gas scrubber and 29.4% SNCR , 32.2% SCR-high dust , 24.6% SCR-low dust -DeNOx facilities and 13.8% without Denox (by burnt waste, according to Swiss average). Share of waste incinerated in plants with magnetic scrap separation from slag : 50%. Gross electric efficiency technology mix 12.997% and Gross thermal efficiency technology mix 25.57%

## Time period
Waste composition as given in literature reference, theoretical data or other source. Transfer coefficients for modern Swiss MSWI. Emission speciation based on early 90ies data.

## Reference product
- waste plastic, consumer electronics: -1 kg; By-product classification Waste; CPC 39270: Waste, parings and scrap of plastics
  EcoSpold01Location=CH
  production volume 0 kg
    outdated. Replaced by newer incineration technology with fly ash extraction.
  property price 0 EUR2005
    Waste products are assigned a price of zero as they are assumed to require further treatment.
  property carbon content, fossil 0.830215
    C content in 1 kg DM was calculated using data in Tab A.2, ecoinvent v2.2 report 13_I
  property carbon content 0.830215
    carbon content on a dry matter basis (reserved; not for manual entry)
  properties: wet mass 1 kg, dry mass 0.847 kg, water content 0.180638, carbon content, non-fossil 0, water in wet mass 0.153 kg, carbon allocation 0.703192 kg

## Inputs from technosphere
- heat, district or industrial, natural gas: 0.05805 MJ; lognormal variance with pedigree 1.29, pedigree (1,1,5,1,1)
  uncertainty calculated from uncertainty in average DeNOx input, uncertainty in the share of thermal NOx, uncertainty of nitrogen content in average municipal waste and the unertainty in nitrogen content in *this* waste.
  EcoSpold01Location=RER
- sodium hydroxide, without water, in 50% solution state: 0.0063 kg; lognormal variance with pedigree 0.45, pedigree (1,1,5,1,1)
  EcoSpold01Location=RER
  uncertainty calculated from uncertainty in average auxiliary material input, and the unertainty of the waste composition of this waste
  properties: wet mass 1 kg, dry mass 1 kg
- waste cement, hydrated: -0.0191 kg; lognormal variance with pedigree 0.13, pedigree (1,1,5,1,1)
  EcoSpold01Location=CH
  Hydrated cement for solidification of landfilled residual material. Uncertainty calculated from unertainty of the waste composition of this waste and transfer coefficients in the incinerator and of the solidification recipe.
  production volume 0 kg; = Ref('fdc86266-0fe5-4ac3-aa43-68087babd528', 'ProductionVolume')* (Ref('fd07494a-04c1-4ece-b8dd-736b8105b46f')*-1)
    Calculated from the production volume of waste plastic, consumer electronics, 15.3% water in proportion to the respective output amounts.
  properties: dry mass 1 kg, wet mass 1 kg
- hydrochloric acid, without water, in 30% solution state: 1.3e-5 kg; lognormal variance with pedigree 0.37, pedigree (1,1,5,1,1)
  (same comment as for sodium hydroxide, without water, in 50% solution state)
  properties: wet mass 1 kg, dry mass 1 kg
- quicklime, milled, packed: 0.0011 kg; lognormal variance with pedigree 0.46, pedigree (1,1,5,1,1)
  uncertainty calculated from uncertainty in average auxiliary material input, and the unertainty of the waste composition of this waste
  EcoSpold01Location=CH
  properties: wet mass 1 kg, dry mass 0.99 kg, water content 0.010101
- residual material landfill: 3.98e-11 unit; lognormal variance with pedigree 0.12, pedigree (1,1,5,1,1)
  uncertainty is calculated from uncertainties in waste composition and transfer coefficients in incinerator
  EcoSpold01Location=CH
- process-specific burdens, residual material landfill: 0.0191 kg; lognormal variance with pedigree 0.12, pedigree (1,1,5,1,1)
  uncertainty is calculated from uncertainties in waste composition and transfer coefficients in incinerator;activityLink introduced to establish a direct link to the corresponding regional supply of this product
  EcoSpold01Location=CH
- chemical, inorganic: 2.16e-5 kg; lognormal variance with pedigree 0.37, pedigree (1,1,5,1,1)
  EcoSpold01Location=GLO
  Proxy for Polyelectrolyte. uncertainty calculated from uncertainty in average auxiliary material input, and the unertainty of the waste composition of this waste
  properties: wet mass 1 kg, carbon content, fossil 0.003, dry mass 1 kg
  note on carbon content, fossil: This dataset is an unweighted average of 20 inorganic substances (listed in Tab 88.1, ecoinvent v2.2 report 8, part II), being part of the top100 chemicals included in this database. The C-content has also been calculated as an unweighted average of the C content of the substances composing this dataset.
- iron (III) chloride, without water, in 40% solution state: 0.000521 kg; lognormal variance with pedigree 0.34, pedigree (1,1,5,1,1)
  (same comment as for quicklime, milled, packed)
  properties: wet mass 1 kg, dry mass 1 kg
- process-specific burdens, slag landfill: 0.037 kg; lognormal variance with pedigree 0.09, pedigree (1,1,5,1,1)
  EcoSpold01Location=CH
  uncertainty is calculated from uncertainties in waste composition and transfer coefficients in incinerator;activityLink introduced to establish a direct link to the corresponding regional supply of this product
- chromium oxide, flakes: 3.86e-7 kg; lognormal variance with pedigree 2, pedigree (1,1,5,1,1)
  EcoSpold01Location=RER
  Proxy for vanadium pentoxide V2O5 in SCR catalyst, uncertainty calculated from uncertainty in average DeNOx input, uncertainty in the share of thermal NOx, uncertainty of nitrogen content in average municipal waste and the unertainty in nitrogen content in *this* waste.
  properties: wet mass 1 kg, dry mass 1 kg
- process-specific burdens, municipal waste incineration: 1 kg; lognormal variance with pedigree 0.04, pedigree (1,1,5,1,1)
  demands per kilogram waste. uncertainty is heeded in the module;activityLink introduced to establish a direct link to the corresponding regional supply of this product
  EcoSpold01Location=CH
- titanium dioxide: 1.89e-5 kg; lognormal variance with pedigree 2, pedigree (1,1,5,1,1)
  EcoSpold01Location=RER
  uncertainty calculated from uncertainty in average DeNOx input, uncertainty in the share of thermal NOx, uncertainty of nitrogen content in average municipal waste and the unertainty in nitrogen content in *this* waste.
  properties: dry mass 1 kg, wet mass 1 kg
- ammonia, liquid: 0.000661 kg; lognormal variance with pedigree 1.29, pedigree (1,1,5,1,1)
  uncertainty calculated from uncertainty in average DeNOx input, uncertainty in the share of thermal NOx, uncertainty of nitrogen content in average municipal waste and the unertainty in nitrogen content in *this* waste.
  EcoSpold01Location=CH
  properties: dry mass 1 kg, wet mass 1 kg
- cement, unspecified: 0.00764 kg; lognormal variance with pedigree 0.13, pedigree (1,1,5,1,1)
  EcoSpold01Location=CH
  Cement for solidification of landfilled residual material. Uncertainty calculated from unertainty of the waste composition of this waste, of transfer coefficients in the incinerator and of the solidification recipe.
  properties: wet mass 1 kg, dry mass 1 kg
- slag landfill: 6.57e-11 unit; lognormal variance with pedigree 0.09, pedigree (1,1,5,1,1)
  (same comment as for residual material landfill)
- chemical, organic: 0.000461 kg; lognormal variance with pedigree 0.98, pedigree (1,1,5,1,1)
  Proxy for TMT15. uncertainty calculated from uncertainty in average auxiliary material input, and the unertainty of the waste composition of this waste
  EcoSpold01Location=GLO
  properties: dry mass 1 kg, carbon content, fossil 0.628, wet mass 1 kg
  note on carbon content, fossil: This dataset is an unweighted average of 20 organic substances (listed in Tab 88.1, ecoinvent v2.2 report 8, part II), being part of the top100 chemicals included in this database. The C-content has also been calculated as an unweighted average of the C content of the substances composing this dataset.
- municipal waste incineration facility: 2.5e-10 unit; lognormal variance with pedigree 0.04, pedigree (1,1,5,1,1)
  demands per kilogram waste. uncertainty is heeded in the module
  EcoSpold01Location=CH

## Emissions to nature
- Cadmium [air, urban air close to ground]: 6.33e-9 kg; lognormal variance with pedigree 1.02, pedigree (1,1,5,1,1)
  uncertainty is calculated from uncertainties in waste composition and transfer coefficients in incinerator
- Silicon [water, ground-, long-term]: 0.000308 kg; lognormal variance with pedigree 5.34, pedigree (1,1,5,1,1)
  Long-term emissions from landfilling of incineration residues. uncertainty is calculated from uncertainties in waste composition and transfer coefficients in incinerator and landfills.
- Manganese [water, ground-, long-term]: 3.44e-6 kg; lognormal variance with pedigree 1.51, pedigree (1,1,5,1,1)
  (same comment as for Silicon)
- Sodium [air, urban air close to ground]: 1.2e-6 kg; lognormal variance with pedigree 0.98, pedigree (1,1,5,1,1)
  (same comment as for Cadmium)
- Titanium, ion [water, surface water]: 2.02e-8 kg; lognormal variance with pedigree 1.87, pedigree (1,1,5,1,1)
  uncertainty is calculated from uncertainties in waste composition and transfer coefficients in incinerator and landfills
- Sodium, ion [water, surface water]: 2.77e-5 kg; lognormal variance with pedigree 0.54, pedigree (1,1,5,1,1)
  (same comment as for Titanium, ion)
- Chloride [water, ground-, long-term]: 0.000149 kg; lognormal variance with pedigree 0.23, pedigree (1,1,5,1,1)
  (same comment as for Silicon)
- Barium [water, surface water]: 1.88e-8 kg; lognormal variance with pedigree 1.84, pedigree (1,1,5,1,1)
  (same comment as for Titanium, ion)
- Beryllium [water, surface water]: 2.9e-10 kg; lognormal variance with pedigree 1.94, pedigree (1,1,5,1,1)
  (same comment as for Titanium, ion)
- Selenium [air, urban air close to ground]: 9.85e-15 kg; lognormal variance with pedigree 1.64, pedigree (1,1,5,1,1)
  (same comment as for Cadmium)
- TOC, Total Organic Carbon [water, ground-, long-term]: 0.00802 kg; lognormal variance with pedigree 0.05, pedigree (1,1,5,1,1)
  (same comment as for Silicon)
- Cyanide [air, urban air close to ground]: 1.18e-5 kg; lognormal variance with pedigree 1.4, pedigree (1,1,5,1,1)
  uncertainty calculated from uncertainty in average N-emissions, uncertainty in the share of thermal NOx, uncertainty of nitrogen content in average municipal waste and the unertainty in nitrogen content in *this* waste.
- Bromine [water, surface water]: 0.0056 kg; lognormal variance with pedigree 0.37, pedigree (1,1,5,1,1)
  (same comment as for Titanium, ion)
- Zinc, ion [water, ground-, long-term]: 5.6e-6 kg; lognormal variance with pedigree 5.45, pedigree (1,1,5,1,1)
  (same comment as for Silicon)
- Nitrate [water, ground-, long-term]: 0.000471 kg; lognormal variance with pedigree 0.39, pedigree (1,1,5,1,1)
  (same comment as for Silicon)
- Manganese [water, surface water]: 2.24e-10 kg; lognormal variance with pedigree 2.18, pedigree (1,1,5,1,1)
  (same comment as for Titanium, ion)
- Bromine [water, ground-, long-term]: 0.00119 kg; lognormal variance with pedigree 0.46, pedigree (1,1,5,1,1)
  (same comment as for Silicon)
- Potassium, ion [water, surface water]: 4.04e-5 kg; lognormal variance with pedigree 0.55, pedigree (1,1,5,1,1)
  (same comment as for Titanium, ion)
- Zinc [air, urban air close to ground]: 5.9e-9 kg; lognormal variance with pedigree 0.88, pedigree (1,1,5,1,1)
  (same comment as for Cadmium)
- Molybdenum [water, surface water]: 3.42e-7 kg; lognormal variance with pedigree 1.01, pedigree (1,1,5,1,1)
  (same comment as for Titanium, ion)
- Cobalt [air, urban air close to ground]: 9.36e-13 kg; lognormal variance with pedigree 1.27, pedigree (1,1,5,1,1)
  (same comment as for Cadmium)
- Barium [water, ground-, long-term]: 0.000122 kg; lognormal variance with pedigree 1.01, pedigree (1,1,5,1,1)
  (same comment as for Silicon)
- Dinitrogen monoxide [air, urban air close to ground]: 5.53e-5 kg; lognormal variance with pedigree 1.4, pedigree (1,1,5,1,1)
  (same comment as for Cyanide)
- Cadmium, ion [water, surface water]: 5.22e-8 kg; lognormal variance with pedigree 0.96, pedigree (1,1,5,1,1)
  (same comment as for Titanium, ion)
- Sulfur dioxide [air, urban air close to ground]: 1.28e-6 kg; lognormal variance with pedigree 0.87, pedigree (1,1,5,1,1)
  (same comment as for Cadmium)
- Aluminium [water, surface water]: 1.68e-7 kg; lognormal variance with pedigree 0.99, pedigree (1,1,5,1,1)
  (same comment as for Titanium, ion)
- Carbon dioxide, fossil [air, urban air close to ground]: 2.98 kg; lognormal variance with pedigree 0.04, pedigree (1,1,5,1,1)
  (same comment as for Cadmium)
- Cobalt [water, surface water]: 5.04e-9 kg; lognormal variance with pedigree 1.61, pedigree (1,1,5,1,1)
  (same comment as for Titanium, ion)
- Fluoride [water, ground-, long-term]: 0.000116 kg; lognormal variance with pedigree 0.64, pedigree (1,1,5,1,1)
  (same comment as for Silicon)
- Antimony [air, urban air close to ground]: 1.87e-11 kg; lognormal variance with pedigree 0.63, pedigree (1,1,5,1,1)
  (same comment as for Cadmium)
- Sulfate [water, surface water]: 0.000146 kg; lognormal variance with pedigree 0.43, pedigree (1,1,5,1,1)
  (same comment as for Titanium, ion)
- Nitrate [water, surface water]: 0.000168 kg; lognormal variance with pedigree 0.28, pedigree (1,1,5,1,1)
  (same comment as for Titanium, ion)
- Zinc, ion [water, surface water]: 6.64e-8 kg; lognormal variance with pedigree 0.74, pedigree (1,1,5,1,1)
  (same comment as for Titanium, ion)
- Chromium VI [water, surface water]: 1.11e-6 kg; lognormal variance with pedigree 1.08, pedigree (1,1,5,1,1)
  (same comment as for Titanium, ion)
- Bromine [air, urban air close to ground]: 2.04e-5 kg; lognormal variance with pedigree 0.47, pedigree (1,1,5,1,1)
  (same comment as for Cadmium)
- Copper [air, urban air close to ground]: 2.36e-8 kg; lognormal variance with pedigree 0.6, pedigree (1,1,5,1,1)
  (same comment as for Cadmium)
- Mercury [water, ground-, long-term]: 7.28e-8 kg; lognormal variance with pedigree 3.35, pedigree (1,1,5,1,1)
  (same comment as for Silicon)
- Chromium [air, urban air close to ground]: 2.51e-12 kg; lognormal variance with pedigree 1.24, pedigree (1,1,5,1,1)
  (same comment as for Cadmium)
- Vanadium [air, urban air close to ground]: 5e-11 kg; lognormal variance with pedigree 1.73, pedigree (1,1,5,1,1)
  (same comment as for Cadmium)
- Lead [air, urban air close to ground]: 4.71e-9 kg; lognormal variance with pedigree 1.01, pedigree (1,1,5,1,1)
  (same comment as for Cadmium)
- Nickel, ion [water, surface water]: 4.41e-7 kg; lognormal variance with pedigree 1.33, pedigree (1,1,5,1,1)
  (same comment as for Titanium, ion)
- Chloride [water, surface water]: 0.00615 kg; lognormal variance with pedigree 0.42, pedigree (1,1,5,1,1)
  (same comment as for Titanium, ion)
- BOD5, Biological Oxygen Demand [water, surface water]: 3.07e-5 kg; lognormal variance with pedigree 0.16, pedigree (1,1,5,1,1)
  (same comment as for Titanium, ion)
- Thallium [water, surface water]: 2.29e-10 kg; lognormal variance with pedigree 1.91, pedigree (1,1,5,1,1)
  (same comment as for Titanium, ion)
- Phosphate [water, ground-, long-term]: 7.03e-5 kg; lognormal variance with pedigree 4.98, pedigree (1,1,5,1,1)
  (same comment as for Silicon)
- Iron, ion [water, ground-, long-term]: 0.000695 kg; lognormal variance with pedigree 1.41, pedigree (1,1,5,1,1)
  (same comment as for Silicon)
- Strontium [water, surface water]: 5.2e-8 kg; lognormal variance with pedigree 1.74, pedigree (1,1,5,1,1)
  (same comment as for Titanium, ion)
- Beryllium [water, ground-, long-term]: 3.76e-7 kg; lognormal variance with pedigree 1.49, pedigree (1,1,5,1,1)
  (same comment as for Silicon)
- Antimony [water, ground-, long-term]: 0.00306 kg; lognormal variance with pedigree 0.39, pedigree (1,1,5,1,1)
  (same comment as for Silicon)
- Calcium, ion [water, ground-, long-term]: 0.00276 kg; lognormal variance with pedigree 0.53, pedigree (1,1,5,1,1)
  (same comment as for Silicon)
- Ammonia [air, urban air close to ground]: 1.04e-5 kg; lognormal variance with pedigree 1.4, pedigree (1,1,5,1,1)
  (same comment as for Cyanide)
- Thallium [air, urban air close to ground]: 3.73e-10 kg; lognormal variance with pedigree 1.76, pedigree (1,1,5,1,1)
  (same comment as for Cadmium)
- Lead [water, ground-, long-term]: 9.05e-6 kg; lognormal variance with pedigree 7.03, pedigree (1,1,5,1,1)
  (same comment as for Silicon)
- Copper, ion [water, surface water]: 1.3e-7 kg; lognormal variance with pedigree 1.22, pedigree (1,1,5,1,1)
  (same comment as for Titanium, ion)
- Tin, ion [water, ground-, long-term]: 0.000134 kg; lognormal variance with pedigree 1.26, pedigree (1,1,5,1,1)
  (same comment as for Silicon)
- Lead [water, surface water]: 3.54e-9 kg; lognormal variance with pedigree 1.03, pedigree (1,1,5,1,1)
  (same comment as for Titanium, ion)
- Cadmium, ion [water, ground-, long-term]: 1.15e-6 kg; lognormal variance with pedigree 6.82, pedigree (1,1,5,1,1)
  (same comment as for Silicon)
- Strontium [air, urban air close to ground]: 8.26e-9 kg; lognormal variance with pedigree 1.06, pedigree (1,1,5,1,1)
  (same comment as for Cadmium)
- Tin, ion [water, surface water]: 9.91e-9 kg; lognormal variance with pedigree 1.06, pedigree (1,1,5,1,1)
  (same comment as for Titanium, ion)
- Vanadium, ion [water, surface water]: 3.37e-10 kg; lognormal variance with pedigree 1.82, pedigree (1,1,5,1,1)
  (same comment as for Titanium, ion)
- Molybdenum [air, urban air close to ground]: 4e-9 kg; lognormal variance with pedigree 1.54, pedigree (1,1,5,1,1)
  (same comment as for Cadmium)
- Sodium, ion [water, ground-, long-term]: 9.91e-5 kg; lognormal variance with pedigree 0.67, pedigree (1,1,5,1,1)
  (same comment as for Silicon)
- Aluminium [water, ground-, long-term]: 0.00149 kg; lognormal variance with pedigree 0.56, pedigree (1,1,5,1,1)
  (same comment as for Silicon)
- Mercury [air, urban air close to ground]: 4.84e-14 kg; lognormal variance with pedigree 1.66, pedigree (1,1,5,1,1)
  (same comment as for Cadmium)
- Potassium, ion [water, ground-, long-term]: 0.000192 kg; lognormal variance with pedigree 0.62, pedigree (1,1,5,1,1)
  (same comment as for Silicon)
- Titanium, ion [water, ground-, long-term]: 0.00125 kg; lognormal variance with pedigree 0.88, pedigree (1,1,5,1,1)
  (same comment as for Silicon)
- BOD5, Biological Oxygen Demand [water, ground-, long-term]: 0.00663 kg; lognormal variance with pedigree 0.05, pedigree (1,1,5,1,1)
  (same comment as for Silicon)
- COD, Chemical Oxygen Demand [water, surface water]: 5.49e-5 kg; lognormal variance with pedigree 0.28, pedigree (1,1,5,1,1)
  (same comment as for Titanium, ion)
- Mercury [water, surface water]: 1.5e-8 kg; lognormal variance with pedigree 1.53, pedigree (1,1,5,1,1)
  (same comment as for Titanium, ion)
- Selenium [water, surface water]: 6.38e-7 kg; lognormal variance with pedigree 1.21, pedigree (1,1,5,1,1)
  (same comment as for Titanium, ion)
- Nickel [air, urban air close to ground]: 3.03e-11 kg; lognormal variance with pedigree 0.84, pedigree (1,1,5,1,1)
  (same comment as for Cadmium)
- Nickel, ion [water, ground-, long-term]: 0.000658 kg; lognormal variance with pedigree 0.71, pedigree (1,1,5,1,1)
  (same comment as for Silicon)
- COD, Chemical Oxygen Demand [water, ground-, long-term]: 0.0203 kg; lognormal variance with pedigree 0.05, pedigree (1,1,5,1,1)
  (same comment as for Silicon)
- Calcium [air, urban air close to ground]: 5.3e-6 kg; lognormal variance with pedigree 0.57, pedigree (1,1,5,1,1)
  (same comment as for Cadmium)
- Phosphate [water, surface water]: 1.17e-7 kg; lognormal variance with pedigree 1.08, pedigree (1,1,5,1,1)
  (same comment as for Titanium, ion)
- Barium [air, urban air close to ground]: 1.37e-7 kg; lognormal variance with pedigree 0.98, pedigree (1,1,5,1,1)
  (same comment as for Cadmium)
- Hydrogen fluoride [air, urban air close to ground]: 6.84e-8 kg; lognormal variance with pedigree 0.99, pedigree (1,1,5,1,1)
  (same comment as for Cadmium)
- Strontium [water, ground-, long-term]: 8.25e-5 kg; lognormal variance with pedigree 1.03, pedigree (1,1,5,1,1)
  (same comment as for Silicon)
- Calcium, ion [water, surface water]: 1.2e-5 kg; lognormal variance with pedigree 1.01, pedigree (1,1,5,1,1)
  (same comment as for Titanium, ion)
- Molybdenum [water, ground-, long-term]: 1.65e-6 kg; lognormal variance with pedigree 1.52, pedigree (1,1,5,1,1)
  (same comment as for Silicon)
- Potassium [air, urban air close to ground]: 7.02e-7 kg; lognormal variance with pedigree 0.9, pedigree (1,1,5,1,1)
  (same comment as for Cadmium)
- Copper, ion [water, ground-, long-term]: 0.00258 kg; lognormal variance with pedigree 0.54, pedigree (1,1,5,1,1)
  (same comment as for Silicon)
- Thallium [water, ground-, long-term]: 2.18e-7 kg; lognormal variance with pedigree 1.31, pedigree (1,1,5,1,1)
  (same comment as for Silicon)
- Selenium [water, ground-, long-term]: 1.32e-6 kg; lognormal variance with pedigree 1.03, pedigree (1,1,5,1,1)
  (same comment as for Silicon)
- Vanadium, ion [water, ground-, long-term]: 8.58e-8 kg; lognormal variance with pedigree 2.41, pedigree (1,1,5,1,1)
  (same comment as for Silicon)
- Chromium, ion [water, surface water]: 1.08e-7 kg; lognormal variance with pedigree 1.16, pedigree (1,1,5,1,1)
  (same comment as for Titanium, ion)
- Tin [air, urban air close to ground]: 3.54e-7 kg; lognormal variance with pedigree 0.89, pedigree (1,1,5,1,1)
  (same comment as for Cadmium)
- Sulfate [water, ground-, long-term]: 0.000752 kg; lognormal variance with pedigree 0.52, pedigree (1,1,5,1,1)
  (same comment as for Silicon)
- Arsenic, ion [water, ground-, long-term]: 5.49e-6 kg; lognormal variance with pedigree 1.31, pedigree (1,1,5,1,1)
  (same comment as for Silicon)
- Fluoride [water, surface water]: 9.99e-6 kg; lognormal variance with pedigree 0.68, pedigree (1,1,5,1,1)
  (same comment as for Titanium, ion)
- Titanium [air, urban air close to ground]: 4.19e-6 kg; lognormal variance with pedigree 0.53, pedigree (1,1,5,1,1)
  (same comment as for Cadmium)
- Cobalt [water, ground-, long-term]: 2.58e-5 kg; lognormal variance with pedigree 1.12, pedigree (1,1,5,1,1)
  (same comment as for Silicon)
- DOC, Dissolved Organic Carbon [water, ground-, long-term]: 0.00802 kg; lognormal variance with pedigree 0.05, pedigree (1,1,5,1,1)
  (same comment as for Silicon)
- Nitrogen oxides [air, urban air close to ground]: 0.000417 kg; lognormal variance with pedigree 1.4, pedigree (1,1,5,1,1)
  (same comment as for Cyanide)
- TOC, Total Organic Carbon [water, surface water]: 2.25e-5 kg; lognormal variance with pedigree 0.27, pedigree (1,1,5,1,1)
  (same comment as for Titanium, ion)
- Phosphorus [air, urban air close to ground]: 6e-7 kg; lognormal variance with pedigree 0.79, pedigree (1,1,5,1,1)
  (same comment as for Cadmium)
- Arsenic [air, urban air close to ground]: 1.02e-13 kg; lognormal variance with pedigree 1.42, pedigree (1,1,5,1,1)
  (same comment as for Cadmium)
- Chromium VI [water, ground-, long-term]: 3.6e-6 kg; lognormal variance with pedigree 1.37, pedigree (1,1,5,1,1)
  (same comment as for Silicon)
- Silicon [water, surface water]: 7.52e-7 kg; lognormal variance with pedigree 0.74, pedigree (1,1,5,1,1)
  (same comment as for Titanium, ion)
- Methane, fossil [air, urban air close to ground]: 6.38e-6 kg; lognormal variance with pedigree 0.091225, pedigree (2,3,5,2,1)
  Confidential data from 5 plants in Switzerland and Germany
  Uncertainty: & basic uncertainty of 1.5; confidential data from 5 plants in Switzerland and Germany
- Silicon [air, urban air close to ground]: 8.26e-6 kg; lognormal variance with pedigree 0.55, pedigree (1,1,5,1,1)
  (same comment as for Cadmium)
- Iron, ion [water, surface water]: 5.07e-7 kg; lognormal variance with pedigree 0.64, pedigree (1,1,5,1,1)
  (same comment as for Titanium, ion)
- Hydrogen chloride [air, urban air close to ground]: 6.99e-8 kg; lognormal variance with pedigree 0.51, pedigree (1,1,5,1,1)
  (same comment as for Cadmium)
- Arsenic, ion [water, surface water]: 4.51e-6 kg; lognormal variance with pedigree 1.09, pedigree (1,1,5,1,1)
  (same comment as for Titanium, ion)
- Manganese [air, urban air close to ground]: 2.18e-14 kg; lognormal variance with pedigree 1.55, pedigree (1,1,5,1,1)
  (same comment as for Cadmium)
- Carbon monoxide, fossil [air, urban air close to ground]: 0.000223 kg; lognormal variance with pedigree 0.690625, pedigree (1,3,5,2,1)
  Literature data from switzerland and germany adapted to plant age distribution in switzerland
  Uncertainty: & basic uncertainty of 5; literature data from switzerland and germany adapted to plant age distribution in switzerland
- Aluminium [air, urban air close to ground]: 3.16e-6 kg; lognormal variance with pedigree 0.63, pedigree (1,1,5,1,1)
  (same comment as for Cadmium)
- Beryllium [air, urban air close to ground]: 4.67e-10 kg; lognormal variance with pedigree 1.73, pedigree (1,1,5,1,1)
  (same comment as for Cadmium)
- Antimony [water, surface water]: 0.00166 kg; lognormal variance with pedigree 0.42, pedigree (1,1,5,1,1)
  (same comment as for Titanium, ion)
- Iron [air, urban air close to ground]: 4.95e-8 kg; lognormal variance with pedigree 0.69, pedigree (1,1,5,1,1)
  (same comment as for Cadmium)
- DOC, Dissolved Organic Carbon [water, surface water]: 2.25e-5 kg; lognormal variance with pedigree 0.27, pedigree (1,1,5,1,1)
  (same comment as for Titanium, ion)

## Sampling procedure
waste-specific calculation based on literature data

## Extrapolations
This dataset has been extrapolated from year 2000 to the year of the calculation (2019). The uncertainty has been adjusted accordingly.

## Review by Niels Jungbluth 2003-07-15
Passed. Calculation for standard deviation 95 of, i.e., infrastructure,
land occupation, transport services or other services can differ from
standard Pedigree approach used in this project and figures obtained by
this procedure.
