# treatment of used window frame, wood, collection for final disposal

Dataset: EcoSpold 2, unit process
Geography: CH
Time period: 1996-01-01 to 2019-12-31
Technology level: current
Classification: ISIC rev.4 ecoinvent: 3821:Treatment and disposal of non-hazardous waste
Classification: EcoSpold01Categories: waste management/building demolition
Tags: ConvertedDataset; Treatment
Scenario: Business-as-Usual
System model: Allocation at the point of substitution
Generated by: Martin Lehmann
Published in: Kellenberger D. 2007
Database: ecoinvent
isCopyrightProtected: true
accessRestrictedTo: 1

## General comment
This dataset describes the disposal of a wooden window frame with 1 m2 visible area via a municipal incineration plant. Distance to incineration site is assumed to be 50 km.
[This dataset was already contained in the ecoinvent database version 2. It was not individually updated during the transfer to ecoinvent version 3. Life Cycle Impact Assessment results may still have changed, as they are affected by changes in the supply chain, i.e. in other datasets. This dataset was generated following the ecoinvent quality guidelines for version 2. It may have been subject to central changes described in the ecoinvent version 3 change report (http://www.ecoinvent.org/database/ecoinvent-version-3/reports-of-changes/), and the results of the central updates were reviewed extensively. The changes added e.g. consistent water flows and other information throughout the database. The documentation of this dataset can be found in the ecoinvent reports of version 2, which are still available via the ecoinvent website. The change report linked above covers all central changes that were made during the conversion process.]

## Included activities end
Included processes are the disposal of wood, paint, rubber, plastic, steel, aluminium, copper and zinc parts, and the transport to the incineration site. Metal parts are too small to be efficiently collected and recycled.

## Geography
Swiss practice of waste management of window frames.

## Technology
Waste management includes incineration of wood, paint, rubber, plastic, steel, aluminium, copper and zinc parts, and the transport to the incineration site by average 28t lorry.

## Reference product
- used window frame, wood: -1 m2; CPC 39: Wastes or scraps; By-product classification Waste
  EcoSpold01Location=CH
  production volume 0.0336675 m2
    This is a placeholder value that does not reflect real-world production volumes. This dataset does not currently require a real-world production volume to work in the database framework, and no actual data were collected yet. This has no negative effect on the results of the ecoinvent database. The placeholder value of this activity was scaled according to the nominal GDP of 2005 (source: United Nations, http://data.un.org/Glossary.aspx?q=GDP+%28current+US%24%29, accessed 20130726) to reflect an appropriate share of the global production volume, which is also a placeholder value.
  property price 0 EUR2005
    Waste products are assigned a price of zero as they are assumed to require further treatment.
  property carbon content 0.647464
    carbon content on a dry matter basis (reserved; not for manual entry)
  properties: dry mass 76.19 kg, water in wet mass 4.01 kg, carbon content, fossil 0.0315533, carbon content, non-fossil 0.615911, wet mass 80.2 kg, water content 0.0526316, carbon allocation 49.3303 kg

## By-products
- electricity, for reuse in municipal waste incineration only: 0 kWh; CPC 17100: Electrical energy; By-product classification allocatable product; pedigree (1,1,1,1,1)
  Net electricity generated from this waste and used in internal MSWI plant energy redistribution.
  Uncertainty: uncertainty is calculated from uncertainties in waste composition and uncertainties in energy efficiency and the uncertainty in internal energy demand
  property exergy 3.6 MJ; name E_el_prod_MSWI_exergy
    This exergy property is based on the exergy content of the product.
  property true value relation 3.6; name E_el_prod_MSWI_true_value_relation
    property to calculate "true value" from
  property price 0.1 EUR2005; name E_el_prod_MSWI_price_EUR2005
    Estimated to be the same price as in case of electricity, medium voltage.
- heat, for reuse in municipal waste incineration only: 0 MJ; CPC 17300: Steam and hot water; By-product classification allocatable product; pedigree (1,1,1,1,1)
  Net useful heat generated from this waste and used in internal MSWI plant energy redistribution.
  Uncertainty: uncertainty is calculated from uncertainties in waste composition and uncertainties in energy efficiency and the uncertainty in internal energy demand
  property true value relation 0.1842; name E_th_prod_MSWI_true_value_relation
    property to calculate "true value" from
  property exergy 0.1842 MJ; name E_th_prod_MSWI_exergy
    This exergy property is based on the exergy content of the product.
  property price 0.0106 EUR2005; name E_th_prod_MSWI_price_EUR2005
    Average European district heat price from Ecoheatcool and Euroheat 2005-2006, Ecoheat Work package 1: The European heat market. Final report. 10.6 EUR/GJ i s the price of district heat. http://www.solarthermalworld.org/files/Ecoheatcool%20WP1%20Web.pdf?download
- zinc concentrate: 0 kg; CPC 14290: Other non-ferrous metal ores and concentrates (other than uranium or thorium ores and concentrates); By-product classification allocatable product
  Calculated value from the knowledge of the properties of both products.
  property price 0.38 EUR2005; name ByP_price_EUR2005
    Temporary price data. Calculated as 90% of purchasers price based on: Zinc content in concentrate 53%. Concentrate price per kg Zn 86.5% of refined Zn price (13.5% treatment charges according to CHR Metals Limited 2005: Dynamic cost curves. http://www.minecost.com/dynamic.pdf). 2004 zinc price from USGS (2007) Mineral commodity summaries 2007. <http://minerals.usgs.gov/minerals/pubs/mcs/2007/mcs2007.pdf> [Accessed 25 May 2010]
  property zinc content 0.53; name zinc_C_zinc_concentrate
    Zinc content on a dry matter basis. Value taken from teh "zinc mine operation" /GLO dataset.
  property dry mass 1 kg; name DM_zinc_concentrate
  property carbon content 0
    carbon content on a dry matter basis (reserved; not for manual entry)
  properties: wet mass 1 kg, water content 0, carbon content, non-fossil 0, carbon content, fossil 0, water in wet mass 0 kg, carbon allocation 0 kg
- copper: 0 kg; source Rentz O. 1999; By-product classification allocatable product; CPC 41413: Refined copper and copper alloys, unwrought; master alloys of copper
  Literature value. Copper uses: Before end-use copper is manufactured into semi fabricated products, such as shapes and ingots (known as 'semis'). These manufacturing processes are subdivided into hot working, cold working and, if necessary, process annealing. Few of the semis are ready for use as such. They more typically travel to first-stage manufacturers, who make metal rods, wire, and casting, and then to component manufacturers who produce such things as motors, valves, and insulated cables The components in turn are incorporated by final-stage manufacturers into a variety of finished products - automobiles, commercial buildings, residential housing, and so forth. These uses account for about 79% of the world-wide consumption of copper.
  property price 5.52 EUR2005
    Literature value (http://www.economist.com/news/business/21576714-mining-industry-has-enriched-chile-its-future-precarious-copper-solution). Average price between 20015 and 2013.
  property carbon content 0
    carbon content on a dry matter basis (reserved; not for manual entry)
  properties: dry mass 1 kg, water in wet mass 0 kg, wet mass 1 kg, carbon content, non-fossil 0, water content 0, carbon content, fossil 0, carbon allocation 0 kg
- iron scrap, unsorted: 0 kg; source European Aluminium Association 2008; CPC 39310: Slag, dross, scalings and other waste from the manufacture of iron or steel; By-product classification Recyclable; pedigree (1,1,1,1,1)
  property price 0.149 EUR2005; name ironScrapAmount_price_EUR2005
    Temporary price data. Calculated as 90% of purchasers price based on: estimated at 85% of sorted scrap
  property carbon content 0
    carbon content on a dry matter basis (reserved; not for manual entry)
  properties: water in wet mass 0 kg, water content 0, carbon content, fossil 0, carbon content, non-fossil 0, dry mass 1 kg, wet mass 1 kg, carbon allocation 0 kg
- aluminium oxide, non-metallurgical: 0 kg; source European Aluminium Association 2008; CPC 41432: Alumina (aluminium oxide), except artificial corundum; By-product classification allocatable product; CAS 1344-28-1; pedigree (1,1,1,1,1)
  property carbon content, non-fossil 0; name C_content_non_fossil
  property price 0.28 EUR2005; name Al2O3Amount_price_EUR2005
    From UN trade database. http://data.un.org/ Import data from the largest economies of the world are used (Brazil, India, USA, China, Japan and EU-27).
  property dry mass 1 kg; name DM
  property water content 0; name water_content
  property wet mass 1 kg; name WM
  property water in wet mass 0 kg; name WWM
  property carbon content, fossil 0; name C_content_fossil
  property carbon content 0
    carbon content on a dry matter basis (reserved; not for manual entry)
  properties: carbon allocation 0 kg
- aluminium, cast alloy: 0 kg; source European Aluminium Association 2008; By-product classification allocatable product; CPC 41431: Unwrought aluminium; pedigree (1,1,1,1,1)
  EcoSpold01Location=RER
  property price 1.3 EUR2005; name castAlloyAmount_price_EUR2005
    Temporary price data. Calculated as 90% of purchasers price based on: Source: London Metal Exchange, Aluminium alloy price for 2005
  property carbon content 0
    carbon content on a dry matter basis (reserved; not for manual entry)
  properties: water in wet mass 0 kg, carbon content, non-fossil 0, water content 0, dry mass 1 kg, carbon content, fossil 0, wet mass 1 kg, carbon allocation 0 kg
- aluminium, wrought alloy: 0 kg; source European Aluminium Association 2008; By-product classification allocatable product; CPC 4153: Semi-finished products of aluminium or aluminium alloys; pedigree (1,1,1,1,1)
  property price 1.44 EUR2005; name secondaryAluminiumOutput_price_EUR2005
    Estimated based on literature values and expert judgement. Aluminium ccast alloys are about 90% of the price of aluminium wrought alloys.
  property carbon content 0
    carbon content on a dry matter basis (reserved; not for manual entry)
  properties: wet mass 1 kg, water content 0, carbon content, fossil 0, water in wet mass 0 kg, carbon content, non-fossil 0, dry mass 1 kg, carbon allocation 0 kg
- iron scrap, sorted, pressed: 0 kg; By-product classification Recyclable; CPC 39310: Slag, dross, scalings and other waste from the manufacture of iron or steel; pedigree (1,1,1,1,1)
  Iron scrap recovered from this waste.
  Uncertainty: uncertainty calculated from uncertainty in waste composition, uncertainty of share of recyclable metal, uncertainty of transfer coefficient to bottom ash, uncertainty of the efficiency of scrap removal in MSWI plant.
  property price 0.175 EUR2005
    Temporary price data. Calculated as 90% of purchasers price based on: 2005 import and export prices (total trades (USD) divided by total weight (kg) in biggest economies of the world: EU27, USA, Brasil, China, India, Japan and Russia) from UN Commodity Trade Statistics Database (http://data.un.org/Explorer.aspxDatabase [Accessed 2011.06.20]). Commodity: Waste or scrap, of cast iron
  property carbon content 0
    carbon content on a dry matter basis (reserved; not for manual entry)
  properties: wet mass 1 kg, water in wet mass 0 kg, carbon content, non-fossil 0, carbon content, fossil 0, dry mass 1 kg, water content 0, carbon allocation 0 kg

## Inputs from technosphere
All rows: lognormal variance with pedigree 0.0507, pedigree (1,3,5,3,1)
- waste rubber, unspecified: -1.12 kg
  EcoSpold01Location=CH
  production volume 0.0377076 kg; = (Ref('ca5df82e-e213-4342-a849-e158921a6ce8')*-1)* Ref('24e9cd13-2a40-4b60-b374-cc5cbe56a834', 'ProductionVolume')/ABS( Ref('24e9cd13-2a40-4b60-b374-cc5cbe56a834'))
    Calculated from the production volume of used window frame, wood in proportion to the respective output amounts.
  properties: wet mass 1 kg, dry mass 1 kg, carbon content, fossil 0.853
- waste plastic, mixture: -0.349 kg
  EcoSpold01Location=CH
  production volume 0.01175 kg; = (Ref('8046b19f-3052-4c93-8c37-73506a67d42e')*-1)* Ref('24e9cd13-2a40-4b60-b374-cc5cbe56a834', 'ProductionVolume')/ABS( Ref('24e9cd13-2a40-4b60-b374-cc5cbe56a834'))
    (same comment as for waste rubber, unspecified)
  properties: dry mass 0.847 kg, carbon content, fossil 0.747344, wet mass 1 kg, water content 0.180638
  note on carbon content, fossil: C content in 1 kg DM was calculated using data in Tab A.2, ecoinvent v2.2 report 13_I
- scrap copper: -0.00623 kg
  EcoSpold01Location=CH
  production volume 0.000209749 kg; = (Ref('41d804a0-d4aa-4871-8bba-a8c251d21166')*-1)* Ref('24e9cd13-2a40-4b60-b374-cc5cbe56a834', 'ProductionVolume')/ABS( Ref('24e9cd13-2a40-4b60-b374-cc5cbe56a834') )
    (same comment as for waste rubber, unspecified)
  properties: wet mass 1 kg, dry mass 1 kg
- scrap steel: -4.93 kg
  activityLink introduced to establish a direct link to the corresponding regional supply of this product
  EcoSpold01Location=CH
  production volume 0.165981 kg; = (Ref('59d3db3e-5eea-4804-b14f-a8cd0c7a17db')*-1)* Ref('24e9cd13-2a40-4b60-b374-cc5cbe56a834', 'ProductionVolume')/ABS( Ref('24e9cd13-2a40-4b60-b374-cc5cbe56a834'))
    (same comment as for waste rubber, unspecified)
  properties: dry mass 1 kg, wet mass 1 kg
- zinc in car shredder residue: -0.29 kg
  EcoSpold01Location=CH
  production volume 0.00976359 kg; = (Ref('c2a69612-8c3f-47fb-ae86-9ee80bbf5b89')*-1)* Ref('24e9cd13-2a40-4b60-b374-cc5cbe56a834', 'ProductionVolume')/ABS( Ref('24e9cd13-2a40-4b60-b374-cc5cbe56a834'))
    (same comment as for waste rubber, unspecified)
  properties: wet mass 1 kg, dry mass 1 kg
- waste paint: -5.23 kg
  EcoSpold01Location=CH
  activityLink introduced to establish a direct link to the corresponding regional supply of this product
  production volume 0.176081 kg; = (Ref('cdae7e35-7f17-439a-a18e-8a5ae7c6416f')*-1)* Ref('24e9cd13-2a40-4b60-b374-cc5cbe56a834', 'ProductionVolume')/ABS(Ref('24e9cd13-2a40-4b60-b374-cc5cbe56a834'))
    (same comment as for waste rubber, unspecified)
  properties: wet mass 1 kg, carbon content, fossil 0.65, dry mass 1 kg
  note on carbon content, fossil: Tab A.5, ecoinvent v2.2 report 13_I. C content has been calculated after data in the tables, and then referred to 1 kg DM
- scrap aluminium: -0.0156 kg
  EcoSpold01Location=CH
  production volume 0.000525214 kg; = (Ref('e9e56cc2-35a6-4ad3-8dd4-e0fa84862115')*-1)* Ref('24e9cd13-2a40-4b60-b374-cc5cbe56a834', 'ProductionVolume')/ABS( Ref('24e9cd13-2a40-4b60-b374-cc5cbe56a834'))
    (same comment as for waste rubber, unspecified)
  properties: dry mass 1 kg, wet mass 1 kg
- waste polyethylene: -0.256 kg
  EcoSpold01Location=CH
  production volume 0.00861889 kg; = (Ref('1a2b324a-07e2-45b0-af64-8799103dc95c')*-1)* Ref('24e9cd13-2a40-4b60-b374-cc5cbe56a834', 'ProductionVolume')/ABS( Ref('24e9cd13-2a40-4b60-b374-cc5cbe56a834'))
    (same comment as for waste rubber, unspecified)
  properties: dry mass 0.996 kg, water content 0.00401606, carbon content, fossil 0.825301, wet mass 1 kg
  note on carbon content, fossil: C content in 1 kg DM was calculated using data in Tab A.1, ecoinvent v2.2 report 13_I
- waste wood, untreated: -65.2 kg
  EcoSpold01Location=CH
  production volume 2.19512 kg; = (Ref('c089a7ca-bf8b-4766-97d5-c0d0b891514d')*-1)* Ref('24e9cd13-2a40-4b60-b374-cc5cbe56a834', 'ProductionVolume')/ABS( Ref('24e9cd13-2a40-4b60-b374-cc5cbe56a834'))
    (same comment as for waste rubber, unspecified)
  properties: water content 0.25, dry mass 0.8 kg, carbon content, non-fossil 0.48632, wet mass 1 kg
  note on carbon content, non-fossil: Tab A.4, ecoinvent v2.2 report 13_I. C content has been referred to 1 kg DM,

## Sampling procedure
Calculation from window frame material composition

## Extrapolations
This dataset has been extrapolated from year 2004 to the year of the calculation (2019). The uncertainty has been adjusted accordingly.

## Review by Rolf Frischknecht 2007-11-07
passed
