# electricity production, hard coal

Dataset: EcoSpold 2, unit process
Geography: AR
Time period: 2000-01-01 to 2019-12-31
Technology level: modern
Classification: ISIC rev.4 ecoinvent: 3510:Electric power generation, transmission and distribution
Classification: EcoSpold01Categories: hard coal/power plants
Synonyms: other bituminous coal; anthracite; coking coal
Tags: coal power; hard coal power; fossil fuels
Scenario: Business-as-Usual
System model: Allocation at the point of substitution
Generated by: Alejandro P Arena
Published in: Suppen, N. 2017
Database: ecoinvent
isCopyrightProtected: true
accessRestrictedTo: 1

## General comment
This dataset represents the production of high voltage electricity in Argentina in 2014, adapted from the dataset "electricity production, hard coal"/ GLO, 2008 dataset (accessed, January 24th, 2018). Only three generation units (Turbo groups 11, 12 and 15), belonging to one power plant (San Nicolas), used coal as fuel during 2014. These units can also burn Natural Gasl and Fuel Oil. All the generation units have electrostatic filters for controlling particulate matter emissions.
Supporting documentation available at: <http://portalweb.cammesa.com/Memnet1/default.aspx>. Additional information can be obtained from CAMMESA under request 'Hard coal' includes anthracite, coking coal and other bituminous coal according to the definition of the IEA electricity information 2014.
All exchanges in this dataset except for emissions of SO2, NOx and particles are production-weighted averages of the figures in the datasets in ecoinvent version two, which are adapted for Argentina.
Comments on the inventory data of emissions: All the emissions exchanges have been scaled up from the GLO 2008 dataset with the factor_MJ_kWh. The following information describe the modelling of the original (GLO 2008) dataset. Comments on the inventory data of emissions:
- For the assessment of main characteristics (sulphur and ash content of coal, efficiency of the plant) and CO2 a bottom-up approach has been used. It consists in the collection of information about single plants.
- The size distribution of particle emissions has been derived from German data.
- Halogene emissions have been estimated on the basis of the content of the species in the country-specific coal input mix, assuming average retention rates.
- For CO and particle emissions average values for the former UCTE are included (Union for the Coordination of the Transmission of Electricity, since 2009 replaced by ENTSO-E European Network of Transmission System Operators for Electricity).
- The country specific emission depend on the share of DeNOx.
- Emissions of trace elements were calculated by means of a formula (CORINAIR) using the ash content in the country-specific coal input mix and average transfer coefficients for coal power plants, taking into account the share of DeSOx installed.
- Emission of uranium and thorium radioactive isotopes were assumed proportional to the corresponding element emitted with particles; the other non-gaseous radioactive isotopes of the uranium and thorium decay chain were assumed proportional to the emitted U-238 or Th-232.
- The emission of gaseous radon and K-40 are taken from the literature.
Source for specific data for Argentina: CAMMESA "COMPAÑÍA ADMINISTRADORA DEL MERCADO MAYORISTA ELÉCTRICO SOCIEDAD ANÓNIMA" Informe anual 2014. Supporting documentation available at: http://portalweb.cammesa.com/Memnet1/default.aspx
Additional informatin available from CAMMESA under request
European Environment Agency (1991) CORINAIR Inventory; VOC's Default Emission Factors

## Included activities start
From the constructed hard coal power plant ready to produce electricity.
From reception of hard coal and operating materials at power plant gate.

## Included activities end
This activity ends with 1kWh of high voltage electricity produced at the power plant and arrived at the busbar.

This dataset includes:
- all operation and maintenance activities and materials of the power plants.
- Use of fuel oil for startup
- Particle removal (dedusting of the flue gas)

- Desulfurisation and denitrification. These processes are described in separate modules; it can be decided by changing the values of NOx and SOx retained whether and how much DeNOx and DeSOx are installed.
- Cooling: It is assumed that all plants use once-through cooling.
- Loss of feed water

This dataset doesn't include
- raw materials extraction, decommissioning and waste treatment as these activities are already included in the infrastructure datasets
- transformation of the electricity produced
- The disposal of non-recycled ashes is modelled separately.

## Technology
POWER PLANT:
Hard coal power plant input is a market mix of 100MWe power plants (representing all power plants with a capacity <250MWe and 7% of the installed capacity) and 500MWe power plants (representing all power plants with a capacity >250MWe and 93% of the installed capacity). The plants are used for middle load with 4000 hours of operation at full capacity per year. The plants are assumed to operate 150000 hours during its lifetime.
OTHER DATA:
- Share of installed capacity with desulfurisation 2% (rough estimation based on sulfur mass balance
- Average efficiency of desulfurisation installations: 92% (rough estimation based on Dones et al. 27
- Share of installed capacity with denitrification (primary and/or secondary installations): 73% (figure based on IEA 212 )
- Average efficiency of denitrification installations: 8% (estimation based on Dones et al. 27, p.128. Valid for selective catalytic reaction systems)
- Share of installed capacity with particle filters: 98% (figure based on IEA 212 )
- Average efficiency of particle filters: 98% (figure based on IEA 212 )
- IEA 2012. Coal Power Database. International Energy Agency Clean Coal Centre, London
- IEA/OECD. 2010. Electricity Information 2010. International Energy Agency (IEA), Paris Cedex (FR). Part IV. Detailed OECD Electricity And Heat Data.
- Dones, R., Bauer, C., Röder, A. (2007) Kohle. In: Dones, R. (Ed.) et al., Sachbilanzen von Energiesystemen: Grundlagen für den ökologischen Vergleich von Energiesystemen und den Einbezug von Energiesystemen in Ökobilanzen für die Schweiz. Final report ecoinvent No.

## Time period
The Annual Production Volume is valid for the year 2014.

## Parameters
- gross electricity production: 2.49484e9 kWh; name gross_electricity; lognormal variance with pedigree 0.0012, pedigree (2,1,1,1,1)
  Literature value/statistics, extrapolation. Only three generation units (Turbo gropus 11, 12 and 15), belonging to San Nicolas power plant, used coal as fuel during 2014.
  The net electricity production was obtained from CAMMESA "COMPAÑÍA ADMINISTRADORA DEL MERCADO MAYORISTA ELÉCTRICO SOCIEDAD ANÓNIMA" The gross electricity production was calculated from the net electricity production considering the losses due to auxiliary consumption within the power plant (see the comment for the parameter losses from gross electricity production).. Supporting documentation available at: <http://portalweb.cammesa.com/Memnet1/default.aspx>. Additional information can be obtained from CAMMESA under request.
- fraction, water, completely softened, to air: 0.15; name fraction_WCS_to_air; = fraction_PW_to_air; lognormal variance with pedigree 0.092025, pedigree (4,4,3,2,4)
  Calculated value. See comment in the other parametres present in this dataset. Water, completely softened is considered to be always used as process water, thus process water fractions to air are applied to all water, completely softened input flows to calculate the amount of water consumed in the processes.
  nan
- fraction, process water, to air: 0.15 dimensionless; name fraction_PW_to_air; lognormal variance with pedigree 0.092025, pedigree (4,4,3,2,4)
  Literature value. In case when no industry/process specific data are available, default evaporation fraction value is used. This value is 15% and is based on literature (Statistics Canada, 2007 & Shaffer, K.H., 2008, Consumptive water use in the Great Lakes Basin, USGS & Shiklomanov, 2003, World Water Resources at the Beginning of the 21st Century) and has been approved by an expert.
  nan
- factor: input of MJ for the production of 1 kWh: 11.6399 MJ/kWh; name factor_MJ_kWh; = 1*3.6/efficiency; undefined min 11.1801, max 11.1801, standardDeviation95 0, pedigree (1,1,1,1,1)
  Calculated value. 3.6 MJ = 1kWh.
- water withdrawal, electricity production from hard coal, once-through and coolin: 0.0815 m3/kWh; name WWithdrawal_EP_HC_once_through_andCP_CS; lognormal variance with pedigree 0.092025, pedigree (4,4,3,2,4)
  Data taken from the GLO 2008 dataset. The original value was estimated based on literature (Scown, 2011, Water Footprint of U.S. Transportation Fuels, SI). The amount of water withdrawn while burning lignite and peat is assumed to be the same as in case of coal.
  nan
- efficiency: 0.30928 dimensionless; lognormal variance with pedigree 0.003325, pedigree (3,2,1,2,2)
  Literature value/calculated value for Argentina, from the national electricity statistics from CAMMESA. The efficiency is the weighted average calculated for the three generation units (Turbo gropus 11, 12 and 15), belonging to San Nicolas power plant, which used coal during 2014.
  Supporting documentation available at: <http://portalweb.cammesa.com/Memnet1/default.aspx>. Additional information can be obtained from CAMMESA under request.
- losses from gross electricity production: 0.07 dimensionless; name losses_gross_net; lognormal variance with pedigree 0.017225, pedigree (4,3,1,2,3)
  Literature value. Own use of electricity plants in this country in 2012. The default loss as described by the IEA in the electricity statistic is applied, which is 0.07 (IEA electricity information 2014: The difference between gross and net electricity production is generally observed to be about 7% for conventional thermal stations, 1% for hydro stations and 6% for nuclear.)
  IEA. 2014. Electricity Information 2014. ISBN 978-92-64-21692-1. International Energy Agency (IEA), Paris Cedex (FR).
  nan
  Uncertainty: Generic IEA value used.
- water consumption, electricity production from hard coal, once-through and cooli: 0.0014 m3/kWh; name WConsumption_EP_HC_once_through_andCP_CS; lognormal variance with pedigree 0.092025, pedigree (4,4,3,2,4)
  Data taken from the GLO 2008 dataset. The original value was estimated based on literature (Scown, 2011, Water Footprint of U.S. Transportation Fuels, SI). The amount of water consumed while burning lignite and peat is assumed to be the same as in case of coal.
  nan
- water consumption, electricity production from hard coal, recirculating CS: 0.0018 m3/kWh; name WConsumption_EP_HC_recirculatingCS; lognormal variance with pedigree 0.092025, pedigree (4,4,3,2,4)
  Data taken from the GLO 2008 dataset. The original value was estimated based on literature (Scown, 2011, Water Footprint of U.S. Transportation Fuels, SI). The amount of water consumed while burning lignite and peat is assumed to be the same as in case of coal. nan
- once-through and cooling pond cooling systems as a fraction of all cooling syste: 1 dimensionless; name once_through_andCP_CS_fractio_from_allCS; lognormal variance with pedigree 0.092025, pedigree (4,4,3,2,4)
  100 % of the generation units consdiered in this dataset use once_through cooling system
- water withdrawal, electricity production from hard coal, recirculating CS: 0.0021 m3/kWh; name WWithdrawal_EP_HC_recirculating_CS; lognormal variance with pedigree 0.092025, pedigree (4,4,3,2,4)
  (same comment as for water withdrawal, electricity production from hard coal, once-through )
- fraction, water, decarbonised, to air: 0.0171779; name fraction_WDC_to_air; = fraction_CW_to_air; lognormal variance with pedigree 0.092025, pedigree (4,4,3,2,4)
  Calculated value, adapted for Argentina from the GLO 2008 dataset. Decarbonised water is considered to be always used as cooling water, thus cooling water fractions to air are applied to all carbonised water input flows to calculate the amount of water consumed in the processes.
- fraction, cooling water, to air: 0.0171779; name fraction_CW_to_air; = (WConsumption_EP_HC_once_through_andCP_CS*once_through_andCP_CS_fractio_from_allCS)/(WWithdrawal_EP_HC_once_through_andCP_CS*once_through_andCP_CS_fractio_from_allCS); lognormal variance with pedigree 0.092025, pedigree (4,4,3,2,4)
  Calculated for Argentina using the mathematical relation taken from the GLO 2008 dataset.

## Reference product
- electricity, high voltage: 1 kWh; name electricity; CPC 17100: Electrical energy; By-product classification allocatable product
  production volume 2.3202e9 kWh; name electricity_apv; = gross_electricity*(1- losses_gross_net)
    Net electriciyt production from hard coal for Argentina during 2014. See comments in the gross electricity production parameter for more information
  property price 0.0977 EUR2005
    Temporary price data. Calculated as 90% of purchasers price based on: 94% of the average price (to account for a 6% loss in transformation and transmission) for electricity for industrial consumersin 2005 (excluded taxes). From IEA.
  property true value 0.0977; name electricity_true_value
    allocation property applied in "true value" allocation // value calculated from revenue

## By-products
- heat, for reuse in municipal waste incineration only: 0 MJ; CPC 17300: Steam and hot water; By-product classification allocatable product; pedigree (1,1,1,1,1)
  Net electricity generated from this waste and used in internal MSWI plant energy redistribution.
  Uncertainty: uncertainty is calculated from uncertainties in waste composition and uncertainties in energy efficiency and the uncertainty in internal energy demand
  production volume 61.3579 MJ
  property exergy 0.1842 MJ; name E_th_prod_MSWI_exergy
    This exergy property is based on the exergy content of the product.
  property price 0.0106 EUR2005; name E_th_prod_MSWI_price_EUR2005
    Average European district heat price from Ecoheatcool and Euroheat 2005-2006, Ecoheat Work package 1: The European heat market. Final report. 10.6 EUR/GJ i s the price of district heat. http://www.solarthermalworld.org/files/Ecoheatcool%20WP1%20Web.pdf?download
  property true value relation 0.1842; name E_th_prod_MSWI_true_value_relation
    property to calculate "true value" from
  property true value 1.73953e-10
    allocation property applied in "true value" allocation // value calculated from true value relation
- electricity, for reuse in municipal waste incineration only: 0 kWh; CPC 17100: Electrical energy; By-product classification allocatable product; pedigree (1,1,1,1,1)
  (same comment as for heat, for reuse in municipal waste incineration only)
  production volume 8.64153 kWh
  property true value relation 3.6; name E_el_prod_MSWI_true_value_relation
    property to calculate "true value" from
  property price 0.1 EUR2005; name E_el_prod_MSWI_price_EUR2005
    Estimated to be the same price as in case of electricity, medium voltage.
  property exergy 3.6 MJ; name E_el_prod_MSWI_exergy
    This exergy property is based on the exergy content of the product.
  property true value 4.78812e-10
    (same comment as for heat, for reuse in municipal waste incineration only)

## Inputs from technosphere
- water, completely softened: 0.0698396 kg; name water_completely_softened; = factor_MJ_kWh*0.006; lognormal variance with pedigree 0.054, pedigree (4,5,4,5,3)
  Literature value/calculated value, based on the value for burning 1MJ of hard coal. Adapted from the GLO 2008 dataset using the factor_MJ_kWh
  The factor_MJ_kWh has been calculated with information retrieved from CAMMESA for the 2014 year.:
  CAMMESA "COMPAÑÍA ADMINISTRADORA DEL MERCADO MAYORISTA ELÉCTRICO SOCIEDAD ANÓNIMA" . Supporting documentation available at: <http://portalweb.cammesa.com/Memnet1/default.aspx> Additional information can be obtained from CAMMESA under request.
  properties: wet mass 1 kg
- hard coal ash: -0.0870667 kg; name amount_ash; = (factor_MJ_kWh*0.00748)*-1; lognormal variance with pedigree 0.0986, pedigree (5,3,4,5,3)
  Literature value/calculated value. Emissions when producing 1kWh of electricity from hard coal, based on the value for burning 1MJ of hard coal. Adapted from the GLO 2008 dataset using the factor_MJ_kWh
  The factor_MJ_kWh has been calculated with information retrieved from CAMMESA for the 2014 year.:
  CAMMESA "COMPAÑÍA ADMINISTRADORA DEL MERCADO MAYORISTA ELÉCTRICO SOCIEDAD ANÓNIMA" . Supporting documentation available at: <http://portalweb.cammesa.com/Memnet1/default.aspx> Additional information can be obtained from CAMMESA under request.
  production volume 2.02012e8 kg; = amount_ash/electricity*electricity_apv
    Calculated from the production volume of hard coal, burned in power plant in proportion to the respective output amounts
  property price 0 EUR2005; name amount_ash_price_EUR2005
  properties: wet mass 1 kg, dry mass 1 kg
- light fuel oil: 0.000197879 kg; name light_fuel_oil; = factor_MJ_kWh*0.000017; lognormal variance with pedigree 0.024, pedigree (3,4,4,5,1)
  Literature value/calculated value. Light fuel oil use per 1MJ of hard coal burned, use for start-up of the power plant after shut down. Adapted from the GLO 2008 dataset using the factor_MJ_kWh
  The factor_MJ_kWh has been calculated with information retrieved from CAMMESA for the 2014 year.:
  CAMMESA "COMPAÑÍA ADMINISTRADORA DEL MERCADO MAYORISTA ELÉCTRICO SOCIEDAD ANÓNIMA" . Supporting documentation available at: <http://portalweb.cammesa.com/Memnet1/default.aspx> Additional information can be obtained from CAMMESA under request.
  properties: carbon content, fossil 0.862, wet mass 1 kg, dry mass 1 kg
- residue from cooling tower: -6.40197e-5 kg; name amount_residue; = (factor_MJ_kWh*0.000005*1.1)*-1; lognormal variance with pedigree 0.0812, pedigree (5,3,4,5,2)
  (same comment as for hard coal ash)
  production volume 148539 kg; = amount_residue/electricity*electricity_apv
    Calculated from the production volume of hard coal, burned in power plant in proportion to the respective output amounts.
  property price 0 EUR2005; name amount_residue_price_EUR2005
  properties: water content 0.428571, wet mass 1 kg, dry mass 0.7 kg, carbon content, fossil 0.0544233
- hard coal power plant: 1.90476e-11 unit; name hard_coal_power_plant; = 1/ (150000*350*1000); source Röder, A. 2007; lognormal variance with pedigree 0.3686, pedigree (5,3,4,5,3)
  Calculated value. At the moment, the hard coal generationin Argentina is produced in the San Nicolas power plant. Three of the five generation units of this power plant can use coal as a fuel: two 75 MWe generation units and one 350 MWe generation unit. They usually burn FuelOil and Natural Gas other than coal.
  For this calculation, 4000 load hours per year are assumed. It is assumed that a total of 150'000h is reached during the lifetime. Since more than 83 % of the electricity generated from coal in San NIcolas was produced by the 350 MWe generation unit, a capacity of 350 MW is taken for the calculation.
- hard coal: 0.43288 kg; name hard_coal; lognormal variance with pedigree 0.0212, pedigree (3,3,4,5,3)
  Statisticis/calculated value. Amount of hard coal use when producing 1kWh of electricity in Argentina.
  Information retrieved from CAMMESA "COMPAÑÍA ADMINISTRADORA DEL MERCADO MAYORISTA ELÉCTRICO SOCIEDAD ANÓNIMA" . Supporting documentation available at: <http://portalweb.cammesa.com/Memnet1/default.aspx> Additional information can be obtained from CAMMESA under request.
  properties: water content 0.0638298, wet mass 1 kg, dry mass 0.94 kg

## Inputs from nature
- Water, cooling, unspecified natural origin [natural resource, in water]: 0.0838775 m3; name water_cooling_UNO_input; = ((once_through_andCP_CS_fractio_from_allCS*WWithdrawal_EP_HC_once_through_andCP_CS))/11.31*factor_MJ_kWh; lognormal variance with pedigree 0.098025, pedigree (4,4,4,2,4)
  Calculated based on literature data and adpated for Argentina Information retrieved from CAMMESA "COMPAÑÍA ADMINISTRADORA DEL MERCADO MAYORISTA ELÉCTRICO SOCIEDAD ANÓNIMA" . Supporting documentation available at: <http://portalweb.cammesa.com/Memnet1/default.aspx> Additional information can be obtained from CAMMESA under request.

## Emissions to nature
- Ethane, 1,2-dichloro- [air, non-urban air or from high stacks]: 3.82954e-9 kg; name ethane_dichloro; = factor_MJ_kWh*0.000000000329; lognormal variance with pedigree 0.1786, pedigree (5,3,4,5,3)
  (same comment as for hard coal ash)
- Iodine [air, non-urban air or from high stacks]: 1.85075e-6 kg; name iodine; = factor_MJ_kWh*0.000000159; lognormal variance with pedigree 0.2186, pedigree (5,3,4,5,3)
  (same comment as for hard coal ash)
- Phenol [air, non-urban air or from high stacks]: 1.53647e-9 kg; name phenol; = factor_MJ_kWh*0.000000000132; lognormal variance with pedigree 0.1406, pedigree (3,3,4,5,3)
  (same comment as for hard coal ash)
- Particulates, > 2.5 um, and < 10um [air, non-urban air or from high stacks]: 3.51e-5 kg; name particulates_2_5_to_10; lognormal variance with pedigree 0.093, pedigree (4,4,5,5,4)
  Literature/calculated value.
  The total particulate emissions have been calculated as the weighted average of emission obtained from the National Electricity Regulatory Board (Spanish acronym ENRE), which monitors the compliance of the electric generators with current environmental legislation (information available under request). This figure is reported as total amount of particulate matter emissions in mg/m3 flue gas, and have been converted to kg/kWh. The shares of the three particulates classes are taken following the same distribution as in Dones et al 2007, Tab. 9.39 p. 130 and amount to
  - particulates >10um: 5%
  - particulates 2.5-10 um: 10%
  - particulates < 2.5 um: 85%
  - particulates < 2.5 um: 85%
- Potassium-40 [air, non-urban air or from high stacks]: 0.000267719 kBq; name potassium_40; = factor_MJ_kWh*0.000023; lognormal variance with pedigree 0.3986, pedigree (5,3,4,5,3)
  (same comment as for hard coal ash)
- Cyanide [air, non-urban air or from high stacks]: 2.39783e-7 kg; name cyanide; = factor_MJ_kWh*0.0000000206; lognormal variance with pedigree 0.1786, pedigree (5,3,4,5,3)
  (same comment as for hard coal ash)
- Carbon dioxide, fossil [air, non-urban air or from high stacks]: 1.11161 kg; name carbon_dioxide_fossil; = factor_MJ_kWh*0.0955; lognormal variance with pedigree 0.0206, pedigree (3,3,4,5,3)
  (same comment as for hard coal ash)
- Magnesium [air, non-urban air or from high stacks]: 1.05458e-6 kg; name magnesium; = factor_MJ_kWh*0.0000000906; lognormal variance with pedigree 0.7086, pedigree (5,3,4,5,3)
  Literature value/calculated value. Emissions when producing 1kWh of electricity from hard coal, based on the value for burning 1MJ of hard coal.
  Adapted from the GLO 2008 dataset using the factor_MJ_kWh
  The factor_MJ_kWh has been calculated with information retrieved from CAMMESA for the 2014 year.:
  Source:
  CAMMESA "COMPAÑÍA ADMINISTRADORA DEL MERCADO MAYORISTA ELÉCTRICO SOCIEDAD ANÓNIMA" Informe anual 2014. Supporting documentation available at: <http://portalweb.cammesa.com/Memnet1/default.aspx> .
- Water [air, unspecified]: 0.00145132 m3; name water_to_air_unspecified; = (water_completely_softened/1000)*fraction_WCS_to_air+water_cooling_UNO_input*fraction_CW_to_air; lognormal variance with pedigree 0.098025, pedigree (4,4,4,2,4)
  "Water to water emission, calculated value based on literature values used in the GLO 2008 dataset and adapted for Argentina
  property fraction, origin: fresh water 0.047882; name fraction_origin_fresh_water
  property fraction, origin: salt water 0; name fraction_origin_salt_water
  property fraction, origin: unspecified 0.952118; name fraction_origin_unspecified
- Thorium-234 [air, non-urban air or from high stacks]: 1.19891e-5 kBq; name thorium_234; = factor_MJ_kWh*0.00000103; lognormal variance with pedigree 0.3206, pedigree (3,3,4,5,3)
  (same comment as for Magnesium)
- Protactinium-234 [air, non-urban air or from high stacks]: 1.19891e-5 kBq; name protactinium_234; = factor_MJ_kWh*0.00000103; lognormal variance with pedigree 0.3206, pedigree (3,3,4,5,3)
  Literature value/calculated value. Emissions when producing 1kWh of electricity from hard coal, based on the value for burning 1MJ of hard coal. Adapted from the GLO dataset using the factor_MJ_kWh
  The factor_MJ_kWh has been calculated with information retrieved from CAMMESA for the 2014 year.:
  CAMMESA "COMPAÑÍA ADMINISTRADORA DEL MERCADO MAYORISTA ELÉCTRICO SOCIEDAD ANÓNIMA" . Supporting documentation available at: <http://portalweb.cammesa.com/Memnet1/default.aspx> Additional information can be obtained from CAMMESA under request.
- Ethane [air, non-urban air or from high stacks]: 2.8285e-7 kg; name ethane; = factor_MJ_kWh*0.0000000243; lognormal variance with pedigree 0.08, pedigree (3,5,4,5,1)
  Literature value/calculated value. Emissions when producing 1kWh of electricity from hard coal, based on the value for burning 1MJ of hard coal.
  Adapted from the GLO 2008 dataset using the factor_MJ_kWh
  The factor_MJ_kWh has been calculated with information retrieved from CAMMESA for the 2014 year.:
  Source:
  CAMMESA "COMPAÑÍA ADMINISTRADORA DEL MERCADO MAYORISTA ELÉCTRICO SOCIEDAD ANÓNIMA" Informe anual 2014. Supporting documentation available at: <http://portalweb.cammesa.com/Memnet1/default.aspx>
- Water [water, unspecified]: 0.0824961 m3; name water_to_water_unspecified; = (water_completely_softened/1000)*(1-fraction_WCS_to_air)+water_cooling_UNO_input*(1-fraction_CW_to_air); lognormal variance with pedigree 0.098025, pedigree (4,4,4,2,4)
  "Water to air emission, calculated value based on literature values used in the GLO 2008 dataset and adapted for Argentina
  property fraction, origin: salt water 0; name fraction_origin_salt_water_Ww
  property fraction, origin: fresh water 0.0429463; name fraction_origin_fresh_water_Ww
  property fraction, origin: unspecified 0.957054; name fraction_origin_unspecified_Ww
- Xylene [air, non-urban air or from high stacks]: 6.35541e-6 kg; name xylene; = factor_MJ_kWh*0.000000546; lognormal variance with pedigree 0.08, pedigree (3,5,4,5,1)
  (same comment as for Ethane)
- Cumene [air, non-urban air or from high stacks]: 5.22633e-10 kg; name cumene; = factor_MJ_kWh*0.0000000000449; lognormal variance with pedigree 0.1222, pedigree (1,1,2,5,1)
  (same comment as for hard coal ash)
- Manganese [air, non-urban air or from high stacks]: 4.1671e-7 kg; name manganese; = factor_MJ_kWh*0.0000000358; lognormal variance with pedigree 0.7486, pedigree (5,3,4,5,3)
  (same comment as for Magnesium)
- Selenium [air, non-urban air or from high stacks]: 1.92059e-7 kg; name selenium; = factor_MJ_kWh*0.0000000165; lognormal variance with pedigree 0.7486, pedigree (5,3,4,5,3)
  (same comment as for hard coal ash)
- Thorium-230 [air, non-urban air or from high stacks]: 1.19891e-5 kBq; name thorium_230; = factor_MJ_kWh*0.00000103; lognormal variance with pedigree 0.3586, pedigree (5,3,4,5,3)
  (same comment as for Magnesium)
- Furan [air, non-urban air or from high stacks]: 4.79565e-13 kg; name furan; = factor_MJ_kWh*4.12E-14; lognormal variance with pedigree 0.1406, pedigree (3,3,4,5,3)
  (same comment as for hard coal ash)
- Benzo(a)pyrene [air, non-urban air or from high stacks]: 5.01681e-12 kg; name benzo_a_pyrene; = factor_MJ_kWh*0.000000000000431; lognormal variance with pedigree 0.08, pedigree (3,5,4,5,1)
  (same comment as for Ethane)
- Nickel [air, non-urban air or from high stacks]: 2.32799e-7 kg; name nickel; = factor_MJ_kWh*0.00000002; lognormal variance with pedigree 0.7486, pedigree (5,3,4,5,3)
  (same comment as for hard coal ash)
- Butane [air, non-urban air or from high stacks]: 1.30367e-7 kg; name butane; = factor_MJ_kWh*0.0000000112; lognormal variance with pedigree 0.08, pedigree (3,5,4,5,1)
  (same comment as for Ethane)
- Radium-228 [air, non-urban air or from high stacks]: 6.8792e-5 kBq; name radium_228; = factor_MJ_kWh*0.00000591; lognormal variance with pedigree 0.3986, pedigree (5,3,4,5,3)
  (same comment as for hard coal ash)
- Sulfur dioxide [air, non-urban air or from high stacks]: 0.00689 kg; name sulfur_dioxide; lognormal variance with pedigree 0.093, pedigree (4,4,5,5,4)
  Literature/calculated value.
  This figure have been calculated as the weighted average of the emissions from three generation units covering the total coal generation in AR during the reference year. These emissions have been obtained from the National Electricity Regulatory Board (Spanish acronym ENRE), which monitors the compliance of the electric generators with current environmental legislation (information available under request). The original values are expressed in mg/Nm3 flue gas, and they have been converted to kg/kWh.
- Radium-226 [air, non-urban air or from high stacks]: 0.000213011 kBq; name radium_226; = factor_MJ_kWh*0.0000183; lognormal variance with pedigree 0.3907, pedigree (3,3,5,3,3)
  (same comment as for hard coal ash)
- Hydrocarbons, aliphatic, alkanes, cyclic [air, non-urban air or from high stacks]: 5.55225e-8 kg; name hydrocarbons_al_al_cyclic; = factor_MJ_kWh*0.00000000477; lognormal variance with pedigree 0.1406, pedigree (3,3,4,5,3)
  (same comment as for Magnesium)
- Lead [air, non-urban air or from high stacks]: 4.31842e-7 kg; name lead; = factor_MJ_kWh*0.0000000371; lognormal variance with pedigree 0.7486, pedigree (5,3,4,5,3)
  (same comment as for hard coal ash)
- Vanadium [air, non-urban air or from high stacks]: 1.72271e-7 kg; name vanadium; = factor_MJ_kWh*0.0000000148; lognormal variance with pedigree 0.7486, pedigree (5,3,4,5,3)
  (same comment as for hard coal ash)
- PAH, polycyclic aromatic hydrocarbons [air, non-urban air or from high stacks]: 8.71831e-8 kg; name pah; = factor_MJ_kWh*0.00000000749; lognormal variance with pedigree 0.34, pedigree (3,5,4,5,1)
  Literature value/calculated value. Emissions when producing 1kWh of electricity from hard coal, based on the value for burning 1MJ of hard coal.
  Source:
  CAMMESA "COMPAÑÍA ADMINISTRADORA DEL MERCADO MAYORISTA ELÉCTRICO SOCIEDAD ANÓNIMA" Informe anual 2014. Supporting documentation available at: <http://portalweb.cammesa.com/Memnet1/default.aspx> .
- Thorium-232 [air, non-urban air or from high stacks]: 5.62209e-5 kBq; name thorium_232; = factor_MJ_kWh*0.00000483; lognormal variance with pedigree 0.3986, pedigree (5,3,4,5,3)
  (same comment as for hard coal ash)
- Antimony [air, non-urban air or from high stacks]: 1.39679e-8 kg; name antimony; = factor_MJ_kWh*0.0000000012; lognormal variance with pedigree 0.7486, pedigree (5,3,4,5,3)
  (same comment as for hard coal ash)
- Molybdenum [air, non-urban air or from high stacks]: 1.33859e-8 kg; name molybdenum; = factor_MJ_kWh*0.00000000115; lognormal variance with pedigree 0.7486, pedigree (5,3,4,5,3)
  (same comment as for hard coal ash)
- Hydrogen chloride [air, non-urban air or from high stacks]: 0.000308458 kg; name hydrogen_chloride; = factor_MJ_kWh*0.0000265; lognormal variance with pedigree 0.2186, pedigree (5,3,4,5,3)
  (same comment as for hard coal ash)
- Polonium-210 [air, non-urban air or from high stacks]: 0.00143171 kBq; name polonium_210; = factor_MJ_kWh*0.000123; lognormal variance with pedigree 0.3986, pedigree (5,3,4,5,3)
  (same comment as for hard coal ash)
- Mercury [air, non-urban air or from high stacks]: 3.14278e-8 kg; name mercury; = factor_MJ_kWh*0.0000000027; lognormal variance with pedigree 0.7486, pedigree (5,3,4,5,3)
  (same comment as for hard coal ash)
- Lead-210 [air, non-urban air or from high stacks]: 0.000806648 kBq; name lead_210; = factor_MJ_kWh*0.0000693; lognormal variance with pedigree 0.3986, pedigree (5,3,4,5,3)
  (same comment as for hard coal ash)
- Uranium-238 [air, non-urban air or from high stacks]: 0.000185075 kBq; name uranium_238; = factor_MJ_kWh*0.0000159; lognormal variance with pedigree 0.3986, pedigree (5,3,4,5,3)
  (same comment as for hard coal ash)
- Nitrogen oxides [air, non-urban air or from high stacks]: 0.00326 kg; name nitrogen_oxides; lognormal variance with pedigree 0.093, pedigree (4,4,5,5,4)
  (same comment as for Sulfur dioxide)
- Propene [air, non-urban air or from high stacks]: 1.1023e-7 kg; name propene; = factor_MJ_kWh*0.00000000947; lognormal variance with pedigree 0.08, pedigree (3,5,4,5,1)
  (same comment as for hard coal ash)
- Chromium [air, non-urban air or from high stacks]: 9.54475e-8 kg; name chromium; = factor_MJ_kWh*0.0000000082; lognormal variance with pedigree 0.7486, pedigree (5,3,4,5,3)
  Literature value/calculated value. Emissions when producing 1kWh of electricity from hard coal, based on the value for burning 1MJ of hard coal. Adapted from the GLO 2008 dataset using the factor_MJ_kWh
  The factor_MJ_kWh has been calculated with information retrieved from CAMMESA for the 2014 year.:
  CAMMESA "COMPAÑÍA ADMINISTRADORA DEL MERCADO MAYORISTA ELÉCTRICO SOCIEDAD ANÓNIMA" . Supporting documentation available at: <http://portalweb.cammesa.com/Memnet1/default.aspx> Additional information can be obtained from CAMMESA under request..
- Toluene [air, non-urban air or from high stacks]: 7.74056e-7 kg; name toluene; = factor_MJ_kWh*0.0000000665; lognormal variance with pedigree 0.08, pedigree (3,5,4,5,1)
  (same comment as for hard coal ash)
- Acenaphthene [air, non-urban air or from high stacks]: 4.88877e-11 kg; name acenaphthene; = factor_MJ_kWh*0.0000000000042; lognormal variance with pedigree 0.1406, pedigree (3,3,4,5,3)
  (same comment as for hard coal ash)
- Hexane [air, non-urban air or from high stacks]: 6.46017e-9 kg; name hexane; = factor_MJ_kWh*0.000000000555; lognormal variance with pedigree 0.1786, pedigree (5,3,4,5,3)
  (same comment as for hard coal ash)
- Arsenic [air, non-urban air or from high stacks]: 1.1605e-7 kg; name arsenic; = factor_MJ_kWh*0.00000000997; lognormal variance with pedigree 0.7486, pedigree (5,3,4,5,3)
  (same comment as for hard coal ash)
- Formaldehyde [air, non-urban air or from high stacks]: 4.2253e-7 kg; name formaldehyde; = factor_MJ_kWh*0.0000000363; lognormal variance with pedigree 0.08, pedigree (3,5,4,5,1)
  (same comment as for hard coal ash)
- Hydrocarbons, aliphatic, unsaturated [air, non-urban air or from high stacks]: 1.48991e-6 kg; name hydrocarbons_aliphatic_unsaturated; = factor_MJ_kWh*0.000000128; lognormal variance with pedigree 0.08, pedigree (3,5,4,5,1)
  (same comment as for hard coal ash)
- Zinc [air, non-urban air or from high stacks]: 4.84221e-7 kg; name zinc; = factor_MJ_kWh*0.0000000416; lognormal variance with pedigree 0.7486, pedigree (5,3,4,5,3)
  (same comment as for hard coal ash)
- Cadmium [air, non-urban air or from high stacks]: 1.21055e-8 kg; name cadmium; = factor_MJ_kWh*0.00000000104; lognormal variance with pedigree 0.7486, pedigree (5,3,4,5,3)
  (same comment as for hard coal ash)
- Hydrocarbons, chlorinated [air, non-urban air or from high stacks]: 1.94387e-8 kg; name hydrocarbons_chlorinated; = factor_MJ_kWh*0.00000000167; lognormal variance with pedigree 0.1786, pedigree (5,3,4,5,3)
  (same comment as for hard coal ash)
- Particulates, > 10 um [air, non-urban air or from high stacks]: 1.76e-5 kg; name particulates_gt10; lognormal variance with pedigree 0.093, pedigree (4,4,5,5,4)
  Literature/calculated value.
  The total particulate emissions have been calculated as the weighted average of emission obtained from the National Electricity Regulatory Board (Spanish acronym ENRE), which monitors the compliance of the electric generators with current environmental legislation (information available under request). This figure is reported as total amount of particulate matter emissions in mg/m3 flue gas, and have been converted to kg/kWh. The shares of the three particulates classes are taken following the same distribution as in Dones et al 2007, Tab. 9.39 p. 130 and amount to
  - particulates >10um: 5%
  - particulates 2.5-10 um: 10%
  - particulates < 2.5 um: 85%
- Carbon disulfide [air, non-urban air or from high stacks]: 1.24547e-8 kg; name carbon_disulfide; = factor_MJ_kWh*0.00000000107; lognormal variance with pedigree 0.3206, pedigree (3,3,4,5,3)
  (same comment as for hard coal ash)
- Methane, monochloro-, R-40 [air, non-urban air or from high stacks]: 5.08665e-8 kg; name methane_monochloro; = factor_MJ_kWh*0.00000000437; lognormal variance with pedigree 0.1406, pedigree (3,3,4,5,3)
  (same comment as for hard coal ash)
- Propane [air, non-urban air or from high stacks]: 2.40947e-7 kg; name propane; = factor_MJ_kWh*0.0000000207; lognormal variance with pedigree 0.08, pedigree (3,5,4,5,1)
  (same comment as for hard coal ash)
- Bromine [air, non-urban air or from high stacks]: 3.6433e-6 kg; name bromine; = factor_MJ_kWh*0.000000313; lognormal variance with pedigree 0.1806, pedigree (3,3,4,5,3)
  (same comment as for hard coal ash)
- Pentane [air, non-urban air or from high stacks]: 1.01267e-6 kg; name pentane; = factor_MJ_kWh*0.000000087; lognormal variance with pedigree 0.08, pedigree (3,5,4,5,1)
  (same comment as for hard coal ash)
- Cobalt [air, non-urban air or from high stacks]: 3.88774e-8 kg; name cobalt; = factor_MJ_kWh*0.00000000334; lognormal variance with pedigree 0.7486, pedigree (5,3,4,5,3)
  (same comment as for hard coal ash)
- Particulates, < 2.5 um [air, non-urban air or from high stacks]: 0.0002987 kg; name particulates_lt2_5; lognormal variance with pedigree 0.093, pedigree (4,4,5,5,4)
  (same comment as for Particulates, > 10 um)
- Boron [air, non-urban air or from high stacks]: 4.4581e-6 kg; name boron; = factor_MJ_kWh*0.000000383; lognormal variance with pedigree 0.7486, pedigree (5,3,4,5,3)
  (same comment as for hard coal ash)
- Dioxins, measured as 2,3,7,8-tetrachlorodibenzo-p-dioxin [air, non-urban air or from high stacks]: 1.23383e-13 kg; name dioxins; = factor_MJ_kWh*1.06E-14; lognormal variance with pedigree 0.34, pedigree (3,5,4,5,1)
  (same comment as for hard coal ash)
- Strontium [air, non-urban air or from high stacks]: 6.89084e-7 kg; name strontium; = factor_MJ_kWh*0.0000000592; lognormal variance with pedigree 0.7486, pedigree (5,3,4,5,3)
  Literature value/calculated value. Emissions when producing 1kWh of electricity from hard coal, based on the value for burning 1MJ of hard coal. Adapted from the GLO 2008 dataset using the factor_MJ_kWh
  The factor_MJ_kWh has been calculated with information retrieved from CAMMESA for the 2014 year.:
  CAMMESA "COMPAÑÍA ADMINISTRADORA DEL MERCADO MAYORISTA ELÉCTRICO SOCIEDAD ANÓNIMA" . Supporting documentation available at: <http://portalweb.cammesa.com/Memnet1/default.aspx> .
- Thorium-228 [air, non-urban air or from high stacks]: 3.84118e-5 kBq; name throium_228; = factor_MJ_kWh*0.0000033; lognormal variance with pedigree 0.3986, pedigree (5,3,4,5,3)
  (same comment as for hard coal ash)
- Hydrocarbons, aliphatic, alkanes, unspecified [air, non-urban air or from high stacks]: 1.57139e-6 kg; name hydrocarbons_al_al_unspec; = factor_MJ_kWh*0.000000135; lognormal variance with pedigree 0.08, pedigree (3,5,4,5,1)
  (same comment as for hard coal ash)
- Acrolein [air, non-urban air or from high stacks]: 2.78195e-8 kg; name acrolein; = factor_MJ_kWh*0.00000000239; lognormal variance with pedigree 0.3586, pedigree (5,3,4,5,3)
  (same comment as for hard coal ash)
- Methane, dichloro-, HCC-30 [air, non-urban air or from high stacks]: 2.78195e-8 kg; name methane_dichloro; = factor_MJ_kWh*0.00000000239; lognormal variance with pedigree 0.1786, pedigree (5,3,4,5,3)
  (same comment as for hard coal ash)
- Ethene, tetrachloro- [air, non-urban air or from high stacks]: 4.12054e-9 kg; name ethene_tetrachloro; = factor_MJ_kWh*0.000000000354; lognormal variance with pedigree 0.1786, pedigree (5,3,4,5,3)
  (same comment as for hard coal ash)
- Chloroform [air, non-urban air or from high stacks]: 9.40507e-9 kg; name chloroform; = factor_MJ_kWh*0.000000000808; lognormal variance with pedigree 0.1406, pedigree (3,3,4,5,3)
  (same comment as for hard coal ash)
- Uranium-234 [air, non-urban air or from high stacks]: 2.35127e-5 kBq; name uranium_234; = factor_MJ_kWh*0.00000202; lognormal variance with pedigree 0.3586, pedigree (5,3,4,5,3)
  (same comment as for hard coal ash)
- Barium [air, non-urban air or from high stacks]: 7.55432e-7 kg; name barium; = factor_MJ_kWh*0.0000000649; lognormal variance with pedigree 0.7486, pedigree (5,3,4,5,3)
  (same comment as for hard coal ash)
- Methane, fossil [air, non-urban air or from high stacks]: 1.04992e-5 kg; name methane_fossil; = factor_MJ_kWh*0.000000902; lognormal variance with pedigree 0.074, pedigree (3,4,4,5,1)
  Literature value/calculated value. Emissions when producing 1kWh of electricity from hard coal, based on the value for burning 1MJ of hard coal. Adapted from the GLO2008 dataset using the factor_MJ_kWh
  The factor_MJ_kWh has been calculated with information retrieved from CAMMESA for the 2014 year.:
  CAMMESA "COMPAÑÍA ADMINISTRADORA DEL MERCADO MAYORISTA ELÉCTRICO SOCIEDAD ANÓNIMA" . Supporting documentation available at: <http://portalweb.cammesa.com/Memnet1/default.aspx> Additional information can be obtained from CAMMESA under request.
- Hydrogen fluoride [air, non-urban air or from high stacks]: 3.2941e-5 kg; name hydrogen_fluoride; = factor_MJ_kWh*0.00000283; lognormal variance with pedigree 0.2186, pedigree (5,3,4,5,3)
  (same comment as for hard coal ash)
- Aldehydes, unspecified [air, non-urban air or from high stacks]: 9.11407e-8 kg; name aldehydes_unspecified; = factor_MJ_kWh*0.00000000783; lognormal variance with pedigree 0.1406, pedigree (3,3,4,5,3)
  (same comment as for hard coal ash)
- Radon-222 [air, non-urban air or from high stacks]: 0.00579669 kBq; name radon_222; = factor_MJ_kWh*0.000498; lognormal variance with pedigree 0.3986, pedigree (5,3,4,5,3)
  (same comment as for hard coal ash)
- Ethane, 1,1,1-trichloro-, HCFC-140 [air, non-urban air or from high stacks]: 1.92059e-9 kg; name ethane_trichloro; = factor_MJ_kWh*0.000000000165; lognormal variance with pedigree 0.1406, pedigree (3,3,4,5,3)
  (same comment as for hard coal ash)
- Chromium VI [air, non-urban air or from high stacks]: 1.62959e-8 kg; name chromium_vi; = factor_MJ_kWh*0.0000000014; lognormal variance with pedigree 0.5006, pedigree (3,3,4,5,3)
  (same comment as for hard coal ash)
- Copper [air, non-urban air or from high stacks]: 9.55639e-8 kg; name copper; = factor_MJ_kWh*0.00000000821; lognormal variance with pedigree 0.7486, pedigree (5,3,4,5,3)
  (same comment as for hard coal ash)
- Radon-220 [air, non-urban air or from high stacks]: 0.00590145 kBq; name radon_220; = factor_MJ_kWh*0.000507; lognormal variance with pedigree 0.3986, pedigree (5,3,4,5,3)
  (same comment as for hard coal ash)
- Benzene [air, non-urban air or from high stacks]: 1.61795e-6 kg; name benzene; = factor_MJ_kWh*0.000000139; lognormal variance with pedigree 0.088, pedigree (3,5,4,5,3)
  (same comment as for hard coal ash)
- Carbon monoxide, fossil [air, non-urban air or from high stacks]: 0.00256 kg; name carbon_monoxide_fossil; lognormal variance with pedigree 0.674, pedigree (3,4,4,5,1)
  (same comment as for Sulfur dioxide)
- Sulfate [air, non-urban air or from high stacks]: 4.58614e-9 kg; name sulfate; = factor_MJ_kWh*0.000000000394; lognormal variance with pedigree 0.1786, pedigree (5,3,4,5,3)
  (same comment as for hard coal ash)
- Styrene [air, non-urban air or from high stacks]: 2.37455e-9 kg; name styrene; = factor_MJ_kWh*0.000000000204; lognormal variance with pedigree 0.1406, pedigree (3,3,4,5,3)
  (same comment as for hard coal ash)
- Actinides, radioactive, unspecified [air, non-urban air or from high stacks]: 0.000199043 kBq; name actinides_radioactive_unspecified; = factor_MJ_kWh*0.0000171; lognormal variance with pedigree 0.3206, pedigree (3,3,4,5,3)
  (same comment as for hard coal ash)
- Beryllium [air, non-urban air or from high stacks]: 2.01371e-9 kg; name beryllium; = factor_MJ_kWh*0.000000000173; lognormal variance with pedigree 0.6706, pedigree (3,3,4,5,3)
  (same comment as for hard coal ash)
- NMVOC, non-methane volatile organic compounds, unspecified origin [air, non-urban air or from high stacks]: 1.08251e-5 kg; name nmvoc; = factor_MJ_kWh*0.00000093; lognormal variance with pedigree 0.1406, pedigree (3,3,4,5,3)
  (same comment as for hard coal ash)
- Benzene, ethyl- [air, non-urban air or from high stacks]: 9.02095e-9 kg; name benzene_ethyl; = factor_MJ_kWh*0.000000000775; lognormal variance with pedigree 0.1406, pedigree (3,3,4,5,3)
  (same comment as for hard coal ash)
- Dinitrogen monoxide [air, non-urban air or from high stacks]: 1.53647e-5 kg; name dinitrogen_monoxide; = factor_MJ_kWh*0.00000132; lognormal variance with pedigree 0.074, pedigree (3,4,4,5,1)
  (same comment as for hard coal ash)

## Sampling procedure
literature and statistics. Only three generation units (Turbo groups 11, 12 and 15), belonging to one power plant (San Nicolas), used coal as fuel during 2014. These units can also burn Natural Gasl and Fuel Oil. The electricity generated by these units have been considered in this dataset. Supporting documentation available at: <http://portalweb.cammesa.com/Memnet1/default.aspx>. Additional information can be obtained from CAMMESA under request
'Hard coal' includes anthracite, coking coal and other bituminous coal according to the definition of the IEA electricity information 2014.

## Extrapolations
Exchanges have been extrapolated from the"electricity production, hard coal"/ GLO, 2008 dataset using the factor_MJ_kWh parameter.

The efficiency is based on CAMMESA statistics and calculated with own assumptions.

Source: the information was retrieved from CAMMESA "COMPAÑÍA ADMINISTRADORA DEL MERCADO MAYORISTA ELÉCTRICO SOCIEDAD ANÓNIMA". Supporting documentation available at: <http://portalweb.cammesa.com/Memnet1/default.aspx>
