# treatment of high level radioactive waste for final repository

Dataset: EcoSpold 2, unit process
Geography: CH
Time period: 2000-01-01 to 2019-12-31
Technology level: current
Classification: EcoSpold01Categories: nuclear power/waste treatment
Classification: ISIC rev.4 ecoinvent: 3822:Treatment and disposal of hazardous waste
Synonyms: Conditioned Spent Fuel; Intermediate level radioactive waste; High level radioactive waste
Tags: ConvertedDataset; Treatment
Scenario: Business-as-Usual
System model: Allocation at the point of substitution
Generated by: Roberto Dones
Published in: Dones, R. 2007
Database: ecoinvent
isCopyrightProtected: true
accessRestrictedTo: 1

## General comment
For operation is meant the input of the waste and the refilling of the tunnels. The waste volume includes always the steel or concrete container. The density of SF is approximately 7.6 tonne per m3, of HLW is about 7.1 tonne per m3, and of ILW is 2.5 tonne per m3. Considering the amounts of the three different waste class streams for the Swiss 192 GWa scenario, the average density for the radwaste to be disposed of in this geological repository is calculated as about 5.4 tonne per m3. The total electricity supplied from the grid has been estimated on the basis of the necessary power and the duration of the operation. For the transport of HLW and ILW, an average distance of 70 km between the intermediate repository and the preliminarly identified site has been considered. Seepage water and methane to air are assumed to be negligible.
[This dataset was already contained in the ecoinvent database version 2. It was not individually updated during the transfer to ecoinvent version 3. Life Cycle Impact Assessment results may still have changed, as they are affected by changes in the supply chain, i.e. in other datasets. This dataset was generated following the ecoinvent quality guidelines for version 2. It may have been subject to central changes described in the ecoinvent version 3 change report (http://www.ecoinvent.org/database/ecoinvent-version-3/reports-of-changes/), and the results of the central updates were reviewed extensively. The changes added e.g. consistent water flows and other information throughout the database. The documentation of this dataset can be found in the ecoinvent reports of version 2, which are still available via the ecoinvent website. The change report linked above covers all central changes that were made during the conversion process.]

## Included activities end
This module includes: material and energy requirements; transports of vitrified and intermediate radioactive waste (non reprocessed spent fuel is included in the conditioning module) as well as materials; and, infrastructure requirement. This describes the operation of a repository for intermediate and long-lived low radioactive waste in the Swiss context. Seepage water and methane to air are not included.

## Geography
Swiss conditions.

## Technology
Currently available knowledge.

## Reference product
- high level radioactive waste for final repository: -1 m3; CPC 33690: Other radioactive elements and isotopes and compounds; alloys, dispersions, ceramic products and mixtures cont[…]; By-product classification Waste
  EcoSpold01Location=CH
  production volume 0.0336675 m3
    This is a placeholder value that does not reflect real-world production volumes. This dataset does not currently require a real-world production volume to work in the database framework, and no actual data were collected yet. This has no negative effect on the results of the ecoinvent database. The placeholder value of this activity was scaled according to the nominal GDP of 2005 (source: United Nations, http://data.un.org/Glossary.aspx?q=GDP+%28current+US%24%29, accessed 20130726) to reflect an appropriate share of the global production volume, which is also a placeholder value.
  property price 0 EUR2005
    Waste products are assigned a price of zero as they are assumed to require further treatment.
  property carbon content 0
    carbon content on a dry matter basis (reserved; not for manual entry)
  properties: carbon content, non-fossil 0, water content 0, carbon content, fossil 0, water in wet mass 0 kg, dry mass 5400 kg, wet mass 5400 kg, carbon allocation 0 kg

## Inputs from technosphere
- reinforcing steel: 84.8 kg; lognormal variance with pedigree 0.06, pedigree (1,1,5,1,1)
  EcoSpold01Location=RER
  own assumption on preliminary project data
  properties: dry mass 1 kg, wet mass 1 kg, carbon content, fossil 0.004
- electricity, medium voltage: 6650 kWh; lognormal variance with pedigree 0.06, pedigree (1,1,5,1,1)
  own assumption on preliminary project data
  EcoSpold01Location=CH
- concrete, normal: 0.18 m3; lognormal variance with pedigree 0.06, pedigree (1,1,5,1,1)
  EcoSpold01Location=CH
  own assumption on preliminary project data
  properties: water content 0.086758, wet mass 2380 kg, dry mass 2190 kg
- activated bentonite: 8300 kg; lognormal variance with pedigree 0.06, pedigree (1,1,5,1,1)
  own assumption on preliminary project data
  EcoSpold01Location=DE
  properties: wet mass 1 kg, dry mass 1 kg
- cement mortar: 4730 kg; lognormal variance with pedigree 0.06, pedigree (1,1,5,1,1)
  EcoSpold01Location=CH
  own assumption on preliminary project data
  properties: dry mass 1 kg, wet mass 1 kg
- nuclear waste storage, final repository for high level radioactive waste: 6.25e-5 unit; lognormal variance with pedigree 0.04, pedigree (1,1,5,1,1)
  EcoSpold01Location=CH
  certainty

## Inputs from nature
- Volume occupied, final repository for radioactive waste [natural resource, in ground]: 1 m3; lognormal variance with pedigree 0.04, pedigree (1,1,5,1,1)
  certainty, definition

## Sampling procedure
Literature

## Extrapolations
This dataset has been extrapolated from year 2002 to the year of the calculation (2019). The uncertainty has been adjusted accordingly.

## Review by Roberto Dones 2004-04-02
Corrected for v1.1
