# textile production, non woven polyester, needle punched

Dataset: EcoSpold 2, unit process
Geography: IN
Time period: 2014-04-01 to 2019-03-31
Technology level: current
Classification: ISIC rev.4 ecoinvent: 1311:Preparation and spinning of textile fibres
Classification: EcoSpold01Categories: textiles/processing
Scenario: Business-as-Usual
System model: Allocation at the point of substitution
Generated by: Madhuri Nigam
Published in: Faist Emmenegger, M. 2018
Database: ecoinvent
isCopyrightProtected: true
accessRestrictedTo: 1

## General comment
Inventory refers to production of1 kg Nonwoven Needlepunched textile
Needlepunching is a nonwoven process by which the fibres are mechanically entangled to produce a nonwoven fabric by repeated penetration of barbed needles through a preformed dry fibrous web. The machine which accomplishes this process is known as needle loom.
The Needle punch webs offer a wide range of product characteristics such as:

Unique physical properties i.e., elongation in the X, Y & Z direction for mould-able applications,
Ability to attach layers of different type fibre webs to produce composites,
High opacity per unit area,
High strength makes them overwhelming choice for geotextile fabric
The major Application and End-usages of needle punch fabrics are:

Geotextiles :
Needle punch geotextiles are used in functions like
Separation,
Filtration,
Reinforcement,
Drainage & erosion control and
Find applications in roads, railways, air runways, coastal shore protection, etc.
Needle punch carpets: They are used in passenger cars as flooring material.
Other Miscellaneous Applications :
Headliners,
Filtration,
Insulation Felts, etc.

## Included activities start
The activity starts with opening, mixing, layering, humidification,carding, Needle punching

## Included activities end
This process ends with cutting and packaging of Needle punched Nonwovewoven fabric

## Geography
Indian average based on inputs from manufacturer in Uttarakhand North India.

## Reference product
- textile, non-woven polyester: 1 kg; By-product classification allocatable product; CPC 26710: Woven fabrics of man-made filament yarn, obtained from high tenacity yarn of nylon or other polyamides, of pol[…]
  production volume 5.12e8 kg
    According to Indian Minestry of Textiles, the production of Polyester fibre is circa 512 million kg.
    Reference:
    Indian Ministry of Textiles, accessed at: http://texmin.nic.in/sites/default/files/mmf1_0.pdf on 09/04/2018
  property price 1.51 EUR2005
    Estimated value. Various souces report a value around, what correspond to, 2.6 EUR per kg of non woven polyester fabric (madeinchina.com. Retrieved from: https://www.made-in-china.com/productdirectory.do?word=polyester+non+woven+fabric&subaction=hunt&style=b&mode=and&code=0&comProvince=nolimit&order=0&isOpenCorrection=1, accessed 1Feb2018; Alibaba.com, 2018. Retrieved from: https://www.alibaba.com/showroom/100-polyester-non-woven-fabric.html, accessed 1Feb2018).
  property carbon content 0.625
    carbon content on a dry matter basis (reserved; not for manual entry)
  property true value 1.51
    allocation property applied in "true value" allocation // value calculated from revenue
  properties: carbon content, non-fossil 0, carbon content, fossil 0.625, wet mass 1 kg, water in wet mass 0 kg, water content 0, dry mass 1 kg, carbon allocation 0.625 kg

## By-products
- heat, for reuse in municipal waste incineration only: 0 MJ; CPC 17300: Steam and hot water; By-product classification allocatable product; pedigree (1,1,1,1,1)
  Net electricity generated from this waste and used in internal MSWI plant energy redistribution.
  Uncertainty: uncertainty is calculated from uncertainties in waste composition and uncertainties in energy efficiency and the uncertainty in internal energy demand
  production volume 8.77525e6 MJ
  property exergy 0.1842 MJ; name E_th_prod_MSWI_exergy
    This exergy property is based on the exergy content of the product.
  property price 0.0106 EUR2005; name E_th_prod_MSWI_price_EUR2005
    Average European district heat price from Ecoheatcool and Euroheat 2005-2006, Ecoheat Work package 1: The European heat market. Final report. 10.6 EUR/GJ i s the price of district heat. http://www.solarthermalworld.org/files/Ecoheatcool%20WP1%20Web.pdf?download
  property true value relation 0.1842; name E_th_prod_MSWI_true_value_relation
    property to calculate "true value" from
  property true value 0.00011261
    allocation property applied in "true value" allocation // value calculated from true value relation
- electricity, for reuse in municipal waste incineration only: 0 kWh; CPC 17100: Electrical energy; By-product classification allocatable product; pedigree (1,1,1,1,1)
  (same comment as for heat, for reuse in municipal waste incineration only)
  production volume 1.24465e6 kWh
  property price 0.1 EUR2005; name E_el_prod_MSWI_price_EUR2005
    Estimated to be the same price as in case of electricity, medium voltage.
  property exergy 3.6 MJ; name E_el_prod_MSWI_exergy
    This exergy property is based on the exergy content of the product.
  property true value relation 3.6; name E_el_prod_MSWI_true_value_relation
    property to calculate "true value" from
  property true value 0.000312161
    (same comment as for heat, for reuse in municipal waste incineration only)

## Inputs from technosphere
- building, hall: 0.00208275 m2; = 5000/(10000*12*20); lognormal variance with pedigree 0.3026, pedigree (2,1,3,1,1)
  square meters of building divided by production per year and life time of the plant
- wastewater, average: -4.99859e-5 m3; = (0.05/1000)*-1; lognormal variance with pedigree 0.0046, pedigree (1,4,3,1,1)
  0.05 kgs converted to cubic meters
  production volume 25600 m3; = Ref('f96228cd-c742-4a13-91b1-2668245b7355', 'ProductionVolume') * ((Ref('8ba18496-da3b-461b-8f15-18ad46914f20')*-1) / Ref('f96228cd-c742-4a13-91b1-2668245b7355'))
    Calculated from production volume of reference product using the relative outputs.
  properties: water content 2882.2, dry mass 0.346837 kg, wet mass 1000 kg, carbon content, non-fossil 0.194039
  note on carbon content, non-fossil: 0.0673 kg TOC/m3 (Tab A.17, ecoinvent v2.2 report 13_I). TOC was considered as Total Carbon.
- fibre, polyester: 1.03471 kg; lognormal variance with pedigree 0.0046, pedigree (1,4,3,1,1)
  properties: wet mass 1 kg, dry mass 1 kg, carbon content, fossil 0.625, price 2.188 EUR2005
- electricity, low voltage: 0.409885 kWh; = 0.07+0.14+0.12+0.04+0.04; lognormal variance with pedigree 0.0046, pedigree (1,4,3,1,1)
  sum of electricity used for blowroom, carding , needling, compressor and cutting
- fibre and fabric waste, polyester: -0.0349902 kg; lognormal variance with pedigree 0.0046, pedigree (1,4,3,1,1)
  includes both fibre and fabric cuttings. Used for manufacture of low grade floor covering/carpet
  production volume 1.792e7 kg; = Ref('f96228cd-c742-4a13-91b1-2668245b7355', 'ProductionVolume') * ((Ref('d3c9ae1f-4c14-40a0-9bce-f898c6186e36')*-1) / Ref('f96228cd-c742-4a13-91b1-2668245b7355'))
    Calculated from production volume of reference product using the relative outputs.
  properties: dry mass 1 kg, carbon content, fossil 0.58584, wet mass 1 kg
  note on carbon content, fossil: 0.585840437101837 for polyester resin production, unsaturated. (C8H6O2, C8H16O4, C5H12O2,C4H2O3)n was used as a representative formula for unsaturated polyester resin. This formula corresponds to the M390B Unsaturated Polyester Resin (National Industrial Chemicals Notification and Assessment Scheme, full public report, 1994).

## Inputs from nature
- Water, well, in ground [natural resource, in water]: 0.00149958 m3; = 1.5/1000; lognormal variance with pedigree 0.0046, pedigree (1,4,3,1,1)
  1.5 kg transformed in cubic meters

## Emissions to nature
- Water [air, unspecified]: 0.00144959 m3; = 1.45/1000; lognormal variance with pedigree 0.0046, pedigree (1,4,3,1,1)
  1.45 kg transformed in cubic meters.

## Sampling procedure
Industry data. Representative mills in Uttarakhand (North India) was chosen to provide data based on its technical representativeness of the current state of business and their willingness to participate.
