# planing, lath, hardwood, u=10%

Dataset: EcoSpold 2, unit process
Geography: CA-QC
Time period: 2011-01-01 to 2019-12-31
Technology level: current
Classification: ISIC rev.4 ecoinvent: 1610:Sawmilling and planing of wood
Tags: recontextualization
Scenario: Business-as-Usual
System model: Allocation at the point of substitution
Generated by: Hugues Imbeault-Tétreault
Published in: BFS 2013
Database: ecoinvent
isCopyrightProtected: true
accessRestrictedTo: 1

## General comment
This dataset represents the planing of one m3 air dried hardwood lath that has been kiln dried to 10% moisture content. The planing mill is assumed to be located on the sawmill site. The suction of the shavings is modeled in a separate activity.
The data was provided by and approved by the Swiss forest industry (Holzindustrie Schweiz HIS).
Within ecoinvent, three products - boards, beams and laths - are distinguished:
After being sawn, the resulting products can either be air dried down to a moisture content of u=20% (mass of water per dry mass), kiln dried down to u=20% or kiln dried down to u=10%. The resulting products can then be planed (the ratio of planed products at a moisture content of u=20% reflects the market share of air dried and kiln dried unplaned products). The activity name indicates the respective product and moisture content of the product being planed.
The exchanges of this child dataset are identical to the GLO dataset. This dataset was created to enable linking to regional markets (e.g. for electricity). Data quality indicators were adjusted accordingly.

## Included activities start
Planing process starting from kiln dried hardwood lath with a moisture content of 10%, at sawmill site.

## Included activities end
This activity ends with planed hardwood lath, at plant. The dataset includes the planing process at the sawmill site and input of wood. The dataset does not include dust emissions.

## Geography
Represents average Swiss conditions. The exchanges of this child dataset are identical to the GLO dataset. This dataset was created to enable linking to regional markets (e.g. for electricity). Data quality indicators were adjusted accordingly.

## Parameters
- wood density, dry: 640 kg/m3; name dry_wood_d
  kg oven-dry matter/oven-dry volume
- share of lath: 87 dimensionless; name share_lath
  share of lath production per volume of sawlog input
- wood density, apparent: 675.84 kg/m3; name wood_d_apparent; = (1+moisture_lath/100)* basic_wood_d
  kg wet matter/wet volume
- share of shaving: 13 dimensionless; name share_shaving
  share of shaving production per volume of sawlog input
- wood density, basic: 614.4 kg/m3; name basic_wood_d; = dry_wood_d*(1-moisture_lath*shrinkage_ratio)
  kg oven-dry matter/wet volume
- shrinkage ratio (u=30% - 0%): 0.004 dimensionless; name shrinkage_ratio
  shrinkage of volume (%) per change in moisture content in %, relevant for u=30% to 0%
- moisture content lath: 10 dimensionless; name moisture_lath
  moisture content of lath

## Reference product
- sawnwood, lath, hardwood, dried (u=10%), planed: 1 m3; name lath_planed; source BFS 2013; By-product classification allocatable product; CPC 31102: Wood, sawn or chipped lengthwise, sliced or peeled, of a thickness exceeding 6 mm, of non-coniferous wood
  production volume 188496 m3; name p_sawnwood_planed; = 376992.122021364*0.5
    estimated to be 50% of respective (kiln dried) sawn timber product; extraplated to Quebec production volume from Swiss production volumes via the production volumes of sawntimber (NC) or (C) as applicable according to FAOStat and Statistics Canada
  property water content 0.1; = moisture_lath/100
  property dry mass 614.4 kg; = basic_wood_d
  property carbon content, fossil 0; name lath_planed_C_content_fossil
    fossil carbon content on a dry matter basis
  property water in wet mass 61.44 kg; = basic_wood_d*moisture_lath/100
  property price 265 EUR2005; name lath_planed_price_EUR2005
    Expert judgement (Urs Luginbühl, Swiss Sawmilling industry, personal communication in June 2014). Cross-reference; FAOSTAT (accessed 20140428). The price is calculated by using data on total world import quantity (m3) and import value (1000 USD), year 2005. 25656806 m3 of Sawnwood (NC) - coniferous was imported in the world in 2005. The import value was 9652714000 USD. The calculated price is thus (9652714000/25656806=376*0.8=) 303 Euro.
  property wet mass 675.84 kg; = basic_wood_d*(1+moisture_lath/100)
  property carbon content 0.494
    carbon content on a dry matter basis (reserved; not for manual entry)
  property true value 265; name lath_planed_true_value
    allocation property applied in "true value" allocation // value calculated from revenue
  properties: carbon content, non-fossil 0.494, carbon allocation 303.514 kg

## By-products
- shavings, hardwood, measured as dry mass: 0 kg; source BFS 2013; CPC 39283: Non-agglomerated wood waste and scrap; By-product classification allocatable product; pedigree (1,1,1,1,1)
  shavings recollected from the planing process where they are generated as loose shavings.
  production volume 1.73052e7 kg
    Calculated from production volume of reference product using the relative outputs.
  property price 0.113 EUR2005
    Temporary price data. Calculated as 90% of purchasers price based on: 2004 prices for World Import/Export (USD/cubicmeter) from FaoStat (http://faostat.fao.org/site/626/default.aspx#ancor, [accessed 10th June 2010]) Commodity: 'Chips and Particles' assuming this is for air-dry chips (10% water on a dry matter basis at 650 kg/m3) and no price difference for water content (i.e. assuming air-drying).
  property carbon content 0.494
    carbon content on a dry matter basis (reserved; not for manual entry)
  property true value 10.3742
    allocation property applied in "true value" allocation // value calculated from revenue
  properties: water content 0.1, dry mass 1 kg, water in wet mass 0.1 kg, carbon content, fossil 0, carbon content, non-fossil 0.494, wet mass 1.1 kg, carbon allocation 0.494 kg

## Inputs from technosphere
- shavings, hardwood, loose, measured as dry mass: -88.3483 kg; name m_shavings; = (lath_raw_u10* share_shaving/100* basic_wood_d)*-1; source BFS 2013
  calculated as dry mass
  production volume 1.73052e7 kg; = m_shavings*p_sawnwood_planed
    Calculated from production volume of reference product using the relative outputs.
  property price 0.113 EUR2005; name m_shavings_price_EUR2005
  properties: wet mass 1.1 kg, dry mass 1 kg, water content 0.1, carbon content, non-fossil 0.494
- sawnwood, lath, hardwood, raw, dried (u=10%): 1.10612 m3; name lath_raw_u10; = 1/(1-share_shaving/100); source BFS 2013; lognormal variance with pedigree 0.01, pedigree (1,1,3,5,1)
  input of raw sawn wood to be planed
  property wet mass 675.84 kg; name lath_raw_WM; = lath_raw_DM*(1+ lath_raw_water_content)
  property water in wet mass 61.44 kg; name lath_raw_WWM; = lath_raw_DM* lath_raw_water_content
  property carbon content, non-fossil 0.494; name lath_raw_C_content_non_fossil
  property dry mass 614.4 kg; name lath_raw_DM; = basic_wood_d
  property carbon content, fossil 0; name lath_raw_C_content_fossil
  property water content 0.1; name lath_raw_water_content
- electricity, medium voltage: 21.4599 kWh; name elec_medvol; source BFS 2013; lognormal variance with pedigree 0.2046, pedigree (2,1,3,5,1)
  electricity consumed for the planing; the suction of the shavings in covered in a separate dataset; data from Swiss industry
- planing mill: 7.12122e-7 unit; name planemill; source BFS 2013; lognormal variance with pedigree 0.4346, pedigree (2,1,3,5,1)
  data taken from ecoinvent 2.2 dataset

## Sampling procedure
complementary literature and sampling from sawmills

## Extrapolations
Extrapolated from Swiss data. The exchanges of this child dataset are identical to the GLO dataset. This dataset was created to enable linking to regional markets (e.g. for electricity). Data quality indicators were adjusted accordingly.
