# anionic resin production

Dataset: EcoSpold 2, unit process
Geography: RoW
Time period: 1997-01-01 to 2020-12-31
Technology level: current
Classification: ISIC rev.4 ecoinvent: 2013:Manufacture of plastics and synthetic rubber in primary forms
Synonyms: anion exchange resin; strong basic anion exchange resin SBA; anion resin
Scenario: Business-as-Usual
System model: Allocation at the point of substitution
Generated by: Alex Primas
Published in: Althaus H.-J. 2007
Database: ecoinvent
isCopyrightProtected: true
accessRestrictedTo: 1

## General comment
This dataset represents the production of 1 kg of moist anion-exchange resin (chloride form) which is used for water tratment. The moisture content of the assessed resins is 50 wt% corresponding to a resin with 6-8 wt% divinylbenzene (DVB) crosslinking (in this inventory 8% cross-linking is assumed). The bulk density of the moist (hydrated) resin is 1.10 kg/L.
Due to a lack of production data, this dataset is based on stoichiometric calculations, as well as approximations based on data from a large chemical plant (Gendorf 2016).
References:
Althaus H.-J., Chudacoff M., Hischier R., Jungbluth N., Osses M. and Primas A. (2007) Life Cycle Inventories of Chemicals. Final report ecoinvent data v2.0 No. 8. EMPA, Swiss Centre for Life Cycle Inventories, Dübendorf, CH.
Hofstetter T. B. (2002) Abfalllösungsmittelbewirtschaftung in der chemischen Industrie: Ein ökologischer Vergleich von Rektifikation und Verbrennung. Bundesamt für Energie (BfE), ETH Zurich, Bern.
de Dardel, F. and Arden, T. V. 2008. Ion Exchangers. Ullmann's Encyclopedia of Industrial Chemistry.
Gendorf (2016) Umwelterklärung 2015, Werk Gendorf Industriepark, www.gendorf.de.

## Included activities start
The activity starts when the raw materials enter the process.

## Included activities end
This activity ends with the production of 1 kg of anion-exchange resin. The raw materials and chemicals used for production are included, as well as estimated emissions and wastes from production (incomplete), and estimated energy demand and infrastructure of the plant.

## Geography
The data used has no specific geographical origin as it is based on stoechiometric calculations and estimations. It is assumed to be representative of the production processes in this geography. Some values are based on data from a large chemical factory located in Germany. These are assumed to be valid for this geography.

## Technology
There are two types of strong base anion resins. The type I uses trimethylamine (TMA) to functionalise the resin, while type II is functionalised with dimethylethanolamine (DMEA). Type I anion resins have a higher stability of the exchange site and greater affinity to weak bases like silica and alkalinity. On the other hand type II anion resins have a greater operating capacity than type I.
This inventory models the production of a type I strong base anion-exchange resin (chloride form) for water treatment with a process yield of 95%. The manufacture of this type of resin starts with the polymerisation of styrene and divinylbenzene (DVB) which results in crosslinked copolymer beads, that are dried and screened to meet the resin specifications. This is followed by the functionalisation (chloromethylation) of the copolymer beads with chloromethyl methyl ether, and amination with trimethylamine (TMA). The production ends with a rinsing process.
In the polymerisation process styrene and divinylbenzene (DVB) as cross-linking agent are mixed in a suspension system. This process leads to hardened spherical plastic beads. For this inventory, a resin cross-linked with 8 wt-% DVB was assumed. The production of this cross-linked copolymer beads was approximated with linear polystyrene. Due to the comparable chemical production process of styrene and divinylbenzene, this simplification is assumed to have no major influence on the result. The copolymer is then dried and screened to meet the resin specifications.
The next production step is the chloromethylation and amination of the copolymer to produce the functional groups needed for ion exchange. In a first step the cross-linked polymer is functionalised via the Friedel–Crafts chloromethylation reaction using chloromethyl methyl ether (CMME) at 50°C in presence of anhydrous ZnCl2 or aluminium chloride as catalyst. In this inventory, the catalysts were neglected. From this reaction, some methanol is produced as waste. In addition, a solvent is used within this production step, which leads to further liquid wastes (not regenerated part of the solvent input). In a second step the chloromethylated group is replaced by an amine. The strong base anion resin investigated (type I) is treated with trimethylamine to obtain a quarternary ammonium group.
The last step consists of rinsing the functionalised copolymer. This is performed by hot water washing and steaming the resin to reduce the amount of organic compounds left in the resin from the manufacturing process. At this point, the cation resin is in the chlorine form. If the resin is needed in a free base form (OH-) it has to be regenerated with NaOH. This regeneration step is not included in this inventory.
Reference:
de Dardel, F. and Arden, T. V. 2008. Ion Exchangers. Ullmann's Encyclopedia of Industrial Chemistry.

## Time period
Time of literature publication. Measurements took place partly before this period. Some values are based on data published by the Gendorf factory that were collected between 2011 and 2015. The time period has been adjusted accordingly. For more details, see the comments of the exchanges.

## Parameters
- fraction, water, deionised, to air: 0.205; name fraction_WDI_to_air; = fraction_PW_to_air; lognormal variance with pedigree 0.092025, pedigree (4,4,3,2,4)
  Calculated value. See comment in the other parametres present in this dataset. Deionised water is considered to be always used as process water, thus process water fractions to air are applied to all deionised water input flows to calculate the amount of water consumed in the processes.
- fraction, process water, to air: 0.205 dimensionless; name fraction_PW_to_air; lognormal variance with pedigree 0.092025, pedigree (4,4,3,2,4)
  Literature value (Statistics Canada, 2007 & Shaffer, K.H., 2008, Consumptive water use in the Great Lakes Basin, USGS) (Vionnet, S., Quantis Water Database - Technical Report, 2012).

## Reference product
- anionic resin: 1 kg; name RP; By-product classification allocatable product; CPC 34790: Other plastics in primary forms; ion exchangers
  Moist anion-exchange resin (chloride form) is mostly used for water tratment. The moisture content of the assessed resins is 50 wt% corresponding to a resin with 6-8 wt% divinylbenzene (DVB) crosslinking (in this inventory 8% cross-linking is assumed). The bulk density of the moist (hydrated) resin is 1.10 kg/L.
  References:
  Althaus H.-J., Chudacoff M., Hischier R., Jungbluth N., Osses M. and Primas A. (2007) Life Cycle Inventories of Chemicals. Final report ecoinvent data v2.0 No. 8. EMPA, Swiss Centre for Life Cycle Inventories, Dübendorf, CH.
  Hofstetter T. B. (2002) Abfalllösungsmittelbewirtschaftung in der chemischen Industrie: Ein ökologischer Vergleich von Rektifikation und Verbrennung. Bundesamt für Energie (BfE), ETH Zurich, Bern.
  de Dardel, F. and Arden, T. V. 2008. Ion Exchangers. Ullmann's Encyclopedia of Industrial Chemistry.
  production volume 3.96 kg; name RP_PV
    This is a placeholder value that does not reflect real-world production volumes. This dataset does not currently require a real-world production volume to work in the database framework, and no actual data were collected yet. This has no negative effect on the results of the ecoinvent database.
  property carbon content, fossil 0.680721
    Cross-linked polystyrene beads are treated with chloromethyl methyl ether under anhydrous conditions, with either aluminum chloride or tin(IV) chloride as catalyst. Chloromethylated polystyrene is obtained. In a second stage, the chlorine in the chloromethylated group can be replaced by an amine (Anion exchange resins, in Ullmann). In this case, Trimethylamine, C3H9N, is used (ecoinvent v2.2 report 8-part 93). That is, the resine can be formulated as C12H18NCl (after Ullmann, Anion exchange resins). The resine is hydrated (ecoinvent v2.2 report 8, part II, Tab 93.7)
  property carbon content 0.680721
    carbon content on a dry matter basis (reserved; not for manual entry)
  property true value 1.56; name RP_true_value
    allocation property applied in "true value" allocation // value calculated from revenue
  properties: carbon content, non-fossil 0, price 1.56 EUR2005, wet mass 1 kg, dry mass 0.5 kg, water content 1, water in wet mass 0.5 kg, carbon allocation 0.34036 kg

## By-products
- electricity, for reuse in municipal waste incineration only: 0 kWh; CPC 17100: Electrical energy; By-product classification allocatable product; pedigree (1,1,1,1,1)
  Net electricity generated from this waste and used in internal MSWI plant energy redistribution.
  Uncertainty: uncertainty is calculated from uncertainties in waste composition and uncertainties in energy efficiency and the uncertainty in internal energy demand
  production volume 0.0081579 kWh
  property true value relation 3.6; name E_el_prod_MSWI_true_value_relation
    property to calculate "true value" from
  property exergy 3.6 MJ; name E_el_prod_MSWI_exergy
    This exergy property is based on the exergy content of the product.
  property price 0.1 EUR2005; name E_el_prod_MSWI_price_EUR2005
    Estimated to be the same price as in case of electricity, medium voltage.
  property true value 0.000196777
    allocation property applied in "true value" allocation // value calculated from true value relation
- heat, for reuse in municipal waste incineration only: 0 MJ; CPC 17300: Steam and hot water; By-product classification allocatable product; pedigree (1,1,1,1,1)
  (same comment as for electricity, for reuse in municipal waste incineration only)
  production volume 0.0566348 MJ
  property exergy 0.1842 MJ; name E_th_prod_MSWI_exergy
    This exergy property is based on the exergy content of the product.
  property price 0.0106 EUR2005; name E_th_prod_MSWI_price_EUR2005
    Average European district heat price from Ecoheatcool and Euroheat 2005-2006, Ecoheat Work package 1: The European heat market. Final report. 10.6 EUR/GJ i s the price of district heat. http://www.solarthermalworld.org/files/Ecoheatcool%20WP1%20Web.pdf?download
  property true value relation 0.1842; name E_th_prod_MSWI_true_value_relation
    property to calculate "true value" from
  property true value 6.98982e-5
    (same comment as for electricity, for reuse in municipal waste incineration only)

## Inputs from technosphere
- trichloromethane: 0.23496 kg; lognormal variance with pedigree 0.17, pedigree (5,5,1,5,4)
  Calculated value based on stoichiometry. Trichloromethane is used as a solvent to carry out the chloromethylation. 5.5 mol of trichloromethane is needed per mol of chloromethyl methyl ether, of which 85% is assumed to be regenerated (distillation) (Hofstetter 2002). This results in a net consumption of 0.235 kg trichloromethane per kg of produced resin.
  Uncertainty: E
  properties: wet mass 1 kg, dry mass 1 kg, carbon content, fossil 0.101695
- waste polystyrene: 0 kg; name BP_waste_polystyrene; pedigree (1,1,1,1,1)
  Calculated from estimated yield. It is assumed that 5% of the polymer input, or 0.013 kg per kg moist product resin, is lost during the production because it does not meet the specifications (rejected during the screening before the activation step). This solid (dry) polystyrene waste is assumed to be incinerated.
  Uncertainty: C
  production volume 0 kg
    Calculated from the production volume of anionic resin in proportion to the respective output amounts.
  property price 0 EUR2005; name BP_waste_polystyrene_price_EUR2005
  properties: water content 0.00200401, dry mass 0.998 kg, wet mass 1 kg, carbon content, fossil 0.922579
- polystyrene, general purpose: 0.269954 kg; lognormal variance with pedigree 0.278, pedigree (4,5,5,5,5)
  Calculated value based on stoichiometry, with a 95% yield. Standard resins used for water treatment processes are 8 wt-% DVB (divinylbenzene) cross-linked. In this inventory, the production of the cross-linked copolymer beads was approximated with linear polystyrene. Due to the comparable chemical production process of styrene and divinylbenzene, this simplification is assumed to have no major influence on the result.
  Uncertainty: F
  properties: carbon content, fossil 0.923077, dry mass 1 kg, wet mass 1 kg
  note on carbon content, fossil: Chemical formula of polystyrene is (C8H8)n (ecoinvent v2.2 report 11_II)
- spent solvent mixture: 0 kg; name BP_spent_solvent_mixture; pedigree (1,1,1,1,1)
  From the total amount of solvent used, 85% or 1.33 kg is regenerated with distillation. The rest (0.235 kg dichloromethane) is released as waste solvent. Besides the spent solvent, the excess treatment chemicals (0.010 kg chloromethyl methyl ether, 0.007 kg trimethylamine)
  and the waste occurring during the chloromethylation (0.073 kg methanol) are treated as solvent waste. It wis assumed that the waste solvent is incinerated. The process generates in total 0.324 kg of pure waste solvent. Taking into account a water content of 16.5% water, a total amount of 0.388 kg waste solvent mixture is considered.
  Uncertainty: E
  production volume 0 kg
    (same comment as for waste polystyrene)
  property price 0 EUR2005; name BP_spent_solvent_mixture_price_EUR2005
  properties: wet mass 1 kg, water content 0.197605, carbon content, fossil 0.571257, dry mass 0.835 kg
  note on carbon content, fossil: Tab A.7, ecoinvent v2.2 report 13_I. C content has been calculated after data in the tables, and then referred to 1 kg DM
- nitrogen, liquid: 0.0189968 kg; lognormal variance with pedigree 0.0104, pedigree (2,3,1,4,3)
  Calculated based on literature data published by the industry. This value is a 5-year average of data (2011 - 2015) published by the Gendorf factory (Gendorf, 2016, Umwelterklärung, www.gendorf.de), (Gendorf, 2015, Umwelterklärung, www.gendorf.de), (Gendorf, 2014, Umwelterklärung, www.gendorf.de). The amount of nitrogen used per kg of chemical substance produced is calculated using literature data published by the Gendorf factory based in Germany, which produces a wide range of chemical substances. The factory produced 1657400 tonnes of chemical substances in the year 2015 (Gendorf, 2016, Umwelterklärung, www.gendorf.de) and 740000 tonnes of intermediate products. The reported amount of nitrogen used in 2015 was 33512400 Nm3 (Gendorf, 2016, Umwelterklärung, www.gendorf.de). One Nm3 of nitrogen is equal to 1.2506 kg. The resulting amount of nitrogen - the 5-year average (2011 - 2015, weighted by production volume) is 0.019 kg/kg. Nitrogen is mainly used during the production of chemicals for 'blanketing', which is the process of applying gas to the vapour space of a container or vessel in order to control its composition.
  properties: wet mass 1 kg, dry mass 1 kg
- heat, from steam, in chemical industry: 0.199966 MJ; lognormal variance with pedigree 0.0104, pedigree (2,3,1,4,3)
  Calculated based on literature data published by the industry. This value is a 5-year average of data (2011 - 2015) published by the Gendorf factory (Gendorf, 2016, Umwelterklärung, www.gendorf.de), (Gendorf, 2015, Umwelterklärung, www.gendorf.de), (Gendorf, 2014, Umwelterklärung, www.gendorf.de). The amount of heat used per kg of chemical substance produced is calculated using literature data published by the Gendorf factory based in Germany, which produces a wide range of chemical substances. The factory produced 1657400 tonnes of chemical substances in the year 2015 (Gendorf, 2016, Umwelterklärung, www.gendorf.de) and 740000 tonnes of intermediate products. The amount of heat in the year 2015 was 523500 GJ (Gendorf, 2016, Umwelterklärung, www.gendorf.de) of which 90% was obtained from natural gas and 10% from steam. The resulting amount of heat from steam is 0.22 MJ/kg of chemical product produced. The 5-year average (2011 - 2015, weighted by production volume) is 0.20 MJ/kg. Cross-reference: the amount of chemicals produced (excluding intermediate products) in the EU-28 in the year 2011 was 327 million tonnes (Eurostat, http://ec.europa.eu/eurostat/statistics-explained/index.php/Chemicals_production_statistics, accessed 20170126). The chemical and petrochemical industry sector consumed 2.33 EJ of energy in 2011 (European Commission - Joint Research Centre, 2014, BAT on Common Waste water and Waste Gas Treatment/Management Systems in the Chemical Sector). The resulting energy (both heat and electricity) consumed per kg of chemicals produced in 2011 is thus 7.13 MJ/kg. This is higher than the value calculated using data published by Gendorf – 3.85 MJ/kg, but that is to be expected as the intermediate products are not accounted for.
- heat, district or industrial, natural gas: 0 MJ; pedigree (1,1,1,1,1)
  Calculated based on literature data published by the industry. This value is a 5-year average of data (2011 - 2015) published by the Gendorf factory (Gendorf, 2016, Umwelterklärung, www.gendorf.de), (Gendorf, 2015, Umwelterklärung, www.gendorf.de), (Gendorf, 2014, Umwelterklärung, www.gendorf.de). The amount of heat used per kg of chemical substance produced is calculated using literature data published by the Gendorf factory based in Germany, which produces a wide range of chemical substances. The factory produced 1657400 tonnes of chemical substances in the year 2015 (Gendorf, 2016, Umwelterklärung, www.gendorf.de) and 740000 tonnes of intermediate products. The amount of heat in the year 2015 was 523500 GJ (Gendorf, 2016, Umwelterklärung, www.gendorf.de) of which 90% was obtained from natural gas and 10% from steam. The resulting amount of heat from natural gas is 2.02 MJ/kg of chemical product produced. The 5-year average (2011 - 2015, weighted by production volume) is 2.15 MJ/kg. Cross-reference: the amount of chemicals produced (excluding intermediate products) in the EU-28 in the year 2011 was 327 million tonnes (Eurostat, http://ec.europa.eu/eurostat/statistics-explained/index.php/Chemicals_production_statistics, accessed 20170126). The chemical and petrochemical industry sector consumed 2.33 EJ of energy in 2011 (European Commission - Joint Research Centre, 2014, BAT on Common Waste water and Waste Gas Treatment/Management Systems in the Chemical Sector). The resulting energy (both heat and electricity) consumed per kg of chemicals produced in 2011 is thus 7.13 MJ/kg. This is higher than the value calculated using data published by Gendorf – 3.85 MJ/kg, but that is to be expected as the intermediate products are not accounted for.
- electricity, medium voltage: 0 kWh; pedigree (1,1,1,1,1)
  Calculated based on literature data published by the industry. This value is a 5-year average of data (2011 - 2015) published by the Gendorf factory (Gendorf, 2016, Umwelterklärung, www.gendorf.de), (Gendorf, 2015, Umwelterklärung, www.gendorf.de), (Gendorf, 2014, Umwelterklärung, www.gendorf.de). The amount of electricity per kg of chemical substance produced is calculated using literature data published by the Gendorf factory based in Germany, which produces a wide range of chemical substances. The factory produced 1657400 tonnes of chemical substances in the year 2015 (Gendorf, 2016, Umwelterklärung, www.gendorf.de) and 740000 tonnes of intermediate products. The amount of electricity consumed in the year 2015 was 3498800 GJ (Gendorf, 2016, Umwelterklärung, www.gendorf.de). The resulting amount of electricity is 0.406 kWh/kg (year 2015) of chemical substance produced. The 5-year average (2011 - 2015, weighted by production volume) is 0.416 kWh/kg (1.5 MJ/kg). Cross-reference: the amount of chemicals produced (excluding intermediate products) in the EU-28 in the year 2011 was 327 million tonnes (Eurostat, http://ec.europa.eu/eurostat/statistics-explained/index.php/Chemicals_production_statistics, accessed 20170126). The chemical and petrochemical industry sector consumed 2.33 EJ of energy in 2011 (European Commission - Joint Research Centre, 2014, BAT on Common Waste water and Waste Gas Treatment/Management Systems in the Chemical Sector). The resulting energy (both heat and electricity) consumed per kg of chemicals produced in 2011 is thus 7.13 MJ/kg. This is higher than the value calculated using data published by Gendorf – 3.85 MJ/kg, but that is to be expected as the intermediate products are not accounted for.
- water, deionised: 0 kg; name water_deionised_input; pedigree (1,1,1,1,1)
  To hydrate the activated anion exchanger resin, 50 wt-% or 0.5 kg deionised water is needed. Furthermore, an amount of 5 bed volumes was estimated to be needed to rinse the produced resin. Using a density of 1.10 kg/litre for the moist resin (Dardel and Arden 2008), this leads to a rinsing water demand of 4.5 kg. Therefore, 5.0 kg of deionised water is needed in total.
  properties: wet mass 1 kg
- chloromethyl methyl ether: 0.191967 kg; lognormal variance with pedigree 0.086, pedigree (4,5,5,5,3)
  Calculated based on stoichiometry, with a 95% yield. Chloromethyl methyl ether is used for the chloromethylation step.
  Uncertainty: F
  properties: dry mass 1 kg, wet mass 1 kg, carbon content, fossil 0.3
- trimethylamine: 0.140976 kg; lognormal variance with pedigree 0.086, pedigree (4,5,5,5,3)
  Calculated based on stoichiometry, with a 95% yield. Trimethylamine is required for amination.
  Uncertainty: F
  properties: dry mass 1 kg, wet mass 1 kg, carbon content, fossil 0.610169
- chemical factory, organics: 3.99932e-10 unit; lognormal variance with pedigree 0.3098, pedigree (2,3,1,4,3)
  Calculated based on literature data published by the industry. For this activity, no information was readily available concerning infrastructure and land-use. Therefore, the infrastructure is estimated based on data from two chemical factories, the BASF site of Ludwigshafen and the chemical factory in Gendorf (which are both located in Germany), which produce a wide range of chemical substances. Based on this data, the following assumptions are made: the built area amounts to about 4.2 ha, the plant has an average output of 50'000 t/a and a lifespan of fifty years. The estimated infrastructure amount is therefore 4.00 E-10 units per kg of produced chemical.
  References:
  Althaus H.-J., Chudacoff M., Hischier R., Jungbluth N., Osses M. and Primas A. (2007) Life Cycle Inventories of Chemicals. ecoinvent report No. 8, v2.0. EMPA Dübendorf, Swiss Centre for Life Cycle Inventories, Dübendorf, CH.
  Gendorf (2000) Umwelterklärung 2000, Werk Gendorf. Werk Gendorf, Burgkirchen.
- waste polystyrene: -0.0014459, -9.66093e-5, -7.3064e-6, -3.99031e-5, -1.61204e-5, -3.78917e-5, -0.00123197, -0.0101221 kg (8 entries); lognormal variance with pedigree 0.138, pedigree (5,5,5,5,3)
  (same comment as for waste polystyrene)
  production volume 0.05148 kg
- spent solvent mixture: -0.0999302, -0.288003 kg (2 entries); lognormal variance with pedigree 0.34, pedigree (5,5,5,5,5)
  (same comment as for spent solvent mixture)
  production volume 1.53648 kg
- heat, district or industrial, natural gas: 0.0267631, 0.609815, 1.51305 MJ (3 entries); lognormal variance with pedigree 0.0104, pedigree (2,3,1,4,3)
  (same comment as for heat, district or industrial, natural gas)
- electricity, medium voltage: 0.00438351, 0.000797614, 0.0184113, 0.0626618, 0.0135263, 0.196118, 0.0280681, 0.0919626 kWh (8 entries); lognormal variance with pedigree 0.0104, pedigree (2,3,1,4,3)
  (same comment as for electricity, medium voltage)
- water, deionised: 1.17729, 3.82186 kg (2 entries); lognormal variance with pedigree 0.032, pedigree (1,1,1,5,1)
  (same comment as for water, deionised)

## Emissions to nature
- Nitrogen [air, unspecified]: 0.0189968 kg; lognormal variance with pedigree 0.0104, pedigree (2,3,1,4,3)
  Calculated value. The amount of nitrogen released to air is equal to the amount of nitrogen entering the activity.
- Water [air, unspecified]: 0.000922342 m3; = 4.5*fraction_WDI_to_air/1000; lognormal variance with pedigree 0.0427, pedigree (2,2,1,5,1)
  Calculated as a fraction of the input of rinsing water. For more details, refer to the mathematical relation and the parameters.
  property fraction, origin: fresh water 1; name fraction_origin_fresh_water
  property fraction, origin: salt water 0; name fraction_origin_salt_water
  property fraction, origin: unspecified 0; name fraction_origin_unspecified
- Water [water, unspecified]: 0.00357689 m3; = 4.5*(1-fraction_WDI_to_air)/1000; lognormal variance with pedigree 0.0427, pedigree (2,2,1,5,1)
  (same comment as for Water)
  property water in wet mass 1000 kg; name WWM
  property wet mass 1000 kg; name WM
  property carbon content, non-fossil 0; name C_content_non_fossil
  property dry mass 0 kg; name DM
  property fraction, origin: unspecified 0; name fraction_origin_unspecified_Ww
  property fraction, origin: fresh water 1; name fraction_origin_fresh_water_Ww
  property fraction, origin: salt water 0; name fraction_origin_salt_water_Ww
  property carbon content, fossil 0; name C_content_fossil

## Sampling procedure
The data is based on literature and stoechiometric calculations. Some values are calculated based on data from a large chemical factory located in Germany. For more details, see the comments of the exchanges.

## Extrapolations
This dataset has been copied from an original dataset covering the geography CH. The uncertainty has been adjusted accordingly.

## Review by Emilia Moreno Ruiz 2017-08-09
This dataset was additionally reviewed in a separate review process by Eric Johnson of Atlantic Consulting as well as Emilia Moreno Ruiz and Gregor Wernet of ecoinvent.
