# heavy mineral sand quarry operation and titania slag production

Dataset: EcoSpold 2, unit process
Geography: RoW
Time period: 2015-01-01 to 2019-12-31
Technology level: current
Classification: ISIC rev.4 ecoinvent: 0729:Mining of other non-ferrous metal ores
Synonyms: Titanium slag
Scenario: Business-as-Usual
System model: Allocation at the point of substitution
Generated by: [System]
Published in: Charikinya E. 2017
Database: ecoinvent
isCopyrightProtected: true
accessRestrictedTo: 1

## General comment
This dataset is a copy of the South African dataset on heavy mineral sand quarry operation and titania slag production. It is the best available representatio of the GLO sector.
"Heavy mineral sands are a class of ore deposit which is an important source heavy minerals - hence the name. The density of these mineral is generally above 2.9 gr/cm3. Important heavy mineral are: zirconium, titanium, thorium, tungsten, rare-earth elements, the industrial minerals diamond, sapphire, garnet, and occasionally precious metals or gemstones (kyanite, tourmaline, titanite, apatite).

The source materials of heavy mineral sand are metamorphic and igneous rocks. Metamorphic rocks give rise to sand containing kyanite and garnet, for example, although the latter may crystallise from magma as well. Magnetite is mostly of igneous origin.

Heavy mineral sands are placer deposits formed most usually in beach environments by concentration due to the specific gravity of the mineral grains. It is equally likely that some concentrations of heavy minerals (aside from the usual gold placers) exist within streambeds, but most are of a low grade and are relatively small.

Heavy mineral sand is a natural mineral concentrate which is often mined commercially. Zircon, gold, ilmenite, rutile, monazite, and cassiterite are some noteworthy heavy minerals that are often extracted from sand. Heavy mineral sand is not rare, but its area of occurrence is usually limited.
"

## Included activities start
Activities include the harvesting of the sands via a system of ponds and floating dredges and the concentration, done on a floating gravity separation plant. The concentrator produces two streams, which are transported to the second location where the Mineral Separation Plant (MSP) and the smelter are situated.

## Included activities end
At the MSP the various minerals are separated to produce zircon, rutile and ilmenite.
The ilmenite is smelted to produce titania slag (85% TiO2) as Reference product: more high quality (low manganese content) pig iron is produced as a by-product in this stage.

## Geography
This dataset is a copy of the South African dataset on heavy mineral sand quarry operation and titania slag production. It is the best available representatio of the GLO sector
Titania slag, which comes from ilmenite, contains up to 85 per cent titanium dioxide, while rutile contains up to 94 per cent titanium dioxide. The largest application of titanium dioxide is as a white pigment representing between 95 and 98 per cent of worldwide TiO2 consumption. The remaining uses are as a flux for electric welding rods and in certain metallurgical and electronic applications.
South Africa contributes to world market share of about 25 per cent of titanium dioxide feedstock (titania slag and rutile), 33 per cent of the world’s zircon output and 25 per cent of the world’s high purity pig iron.

## Technology
Titanium dioxide is beneficiated by end-users to provide brilliance and opacity to products such as paints, plastics or paper.
Being non-toxic and biologically passive, it is even used in sweets, cosmetics, toothpaste and in sunscreens to absorb ultraviolet rays from the sun
Manufacturers mainly use rutile in welding rod fluxes as it stabilises the arc and protects the molten metal from oxidation - forming a superior welding joint. In its titanium metal form, it is used extensively in the aerospace and aviation industries because of its lightness, strength and corrosion – and heat-resistance. These properties also make it ideal for use in artificial hip joints, pacemakers and spectacle frames.

## Time period
Data spans over a period of 4 years (2012-2015), although the most recent and complete year (2015) was used ad year of reference.

## Parameters
- fraction_PW_to_air: 0.15
  Literature value. In case when no industry/process specific data are available, default evaporation fraction value is used. This value is 15% and is based on literature (Statistics Canada, 2007 & Shaffer, K.H., 2008, Consumptive water use in the Great Lakes Basin, USGS & Shiklomanov, 2003, World Water Resources at the Beginning of the 21st Century) and has been approved by an expert.
- life of a mine site: 64 year; name mine_lifespan
- water used in primary activity: 0.0303 m3; name totWaterPA
  sum of all water inputs to the operations

## Reference product
- titania slag, 85% titanium dioxide: 0 kg; name RP; By-product classification allocatable product; CPC 41601: Tungsten, molybdenum, tantalum, magnesium, cobalt, cadmium, titanium, zirconium, beryllium, gallium, hafnium, […]; pedigree (1,1,1,1,1)
  Data from SDR for the year 2015. The SDR’s did not report this value as a numerical value, but rather graphically. Thus the programme Inkscape was used to determine the value.
  The total concentrate produced was given in a diagram. This was multiplied by the percentage of the concentrate that was titania slag in order to give the value for Titania Slag (85% TiO2). The percentage was: 53,41%. The percentage was calculated by finding the average ratio of the products produced by RBM from 2010 to 2012.
  % Titania slag = (Sum of Titania slag produced from 2010 to 2012)/(Sum of all products produced from 2010 to 2012). The largest application of titania slag is as a white pigment representing between the 95 and 98 % of worldwide TiO2 consumption. The remaining uses are as a flux for electric welding rods and in certain metallurgical and electronic applications. Being non toxic and biologically passive, it is even used in sweets, cosmetics, toothpaste and in sunscreens to absorb ultraviolet rays.
  production volume 3.23297e9 kg; name APV_glo; = (1077658285*100)/25
    From the share of the ZA production for the year 2015, and the total contribution to the global market, 25% of TiO2, 33% of zircon and 25% of pig iron (RBM 2015 sustaible report), the corresponding APV estimate of the global production volume has been calculated.
  property price 0.59 EUR2005; name RP_price_EUR2005
    Calculated as five year geometric mean of prices from USGS Minerals Yearbooks' 2011-2015 (US price used as a proxy for GLO price)
  property carbon content 0
    carbon content on a dry matter basis (reserved; not for manual entry)
  property true value 0.59; name RP_true_value
    allocation property applied in "true value" allocation // value calculated from revenue
  properties: water in wet mass 0 kg, titanium content 0.51, carbon content, fossil 0, carbon content, non-fossil 0, dry mass 1 kg, wet mass 1 kg, water content 0, carbon allocation 0 kg
- pig iron: 1 kg; name ByP_01; By-product classification allocatable product; CPC 41111: Pig iron and spiegeleisen in pigs, blocks or other primary forms; pedigree (1,1,1,1,1)
  Pig Iron is a by product form the ilmenite smelting process. Ilmenite has the formula FrTiO3, thus the pig iron comes from the Fe that has removed in order to make the Titania slag TiO2. Pig iron is a by-produc of the smelting operation and it is used as a raw material in foundries for the production of ductile iron casting. Ductile iron castin is used extensively throughout the world for the production of safey critical automotive parts, such as brake callipers and steering knuckles in car and trucks.
  production volume 1.65658e9 kg; name APV_glo_byp01; = APV_glo*ByP_01
    (same comment as for titania slag, 85% titanium dioxide)
  property price 0.243 EUR2005; name ByP_01_price_EUR2005
    From Undata http://data.un.org/Data.aspx?q=pig+iron&d=ComTrade&f=_l1Code%3a73%3bcmdCode%3a720120; assumed to be pig iron non-alloy with >0.5% phosphorus because there is no refining process involved in this product. 2003 data includes only EU, China and India - no data from USA and Japan in the UN database for this year.
  property carbon content 0.045
    carbon content on a dry matter basis (reserved; not for manual entry)
  property true value 0.124513; name ByP_01_true_value
    allocation property applied in "true value" allocation // value calculated from revenue
  properties: carbon content, fossil 0.045, water in wet mass 0 kg, carbon content, non-fossil 0, water content 0, dry mass 1 kg, wet mass 1 kg, carbon allocation 0.045 kg

## By-products
- zircon, 50% zirconium: 0 kg; name ByP_03; By-product classification allocatable product; CPC 4160: Other non-ferrous metals and articles thereof (including waste and scrap of some metals); cermets and articles […]; CAS 1490-68-2; pedigree (1,1,1,1,1)
  Data from SDR for the year 2015. For the year 2015 the SDR’s did not report this value as a numerical value, but rather graphically. Thus the programme Inkscape was used to determine the value.
  The total concentrate produced by RBM was given in a diagram. This was multiplied by the percentage of the concentrate that was zircon in order to give the value for Zircon.
  The percentage was: 14,08%
  Percentage was calculated as described for Titania slag. Zircon is used in the production of ceramic tiles and sanitary ware. Refined to zirconia, it is used in a wide range of advanced ceramics, refractories, jewellery, electronic applications and many other industrial and domestic products. Zircon sand is also used in the foundry industry.
  production volume 8.52212e8 kg; name APV_glo_byp03; = APV_glo*ByP_03
    (same comment as for titania slag, 85% titanium dioxide)
  property price 0.343 EUR2005; name ByP_03_price_EUR2005
    Temporary price data. Calculated as 90% of purchasers price based on: There are only prices in USA. It is assumed that they are the same in Europe and in the world. From Zircon in http://minerals.usgs.gov/minerals/pubs/commodity/zirconium/zircomcs07.pdf and http://minerals.usgs.gov/minerals/pubs/commodity/zirconium/mcs-2009-zirco.pdf [Accessed 20 May 2010]
  property zirconium content 0.497657; name ByP_03_Zr_content
    zirconium content on a dry matter basis
  property silicon content 0.153216; name ByP_03_Si_content
    silicon content on a dry matter basis
  property carbon content 0
    carbon content on a dry matter basis (reserved; not for manual entry)
  property true value 0.0904148; name ByP_03_true_value
    allocation property applied in "true value" allocation // value calculated from revenue
  properties: carbon content, fossil 0, water content 0, water in wet mass 0 kg, wet mass 1 kg, dry mass 1 kg, carbon content, non-fossil 0, carbon allocation 0 kg
- rutile, 95% titanium dioxide: 0 kg; name ByP_02; CPC 4160: Other non-ferrous metals and articles thereof (including waste and scrap of some metals); cermets and articles […]; By-product classification allocatable product; CAS 1317-80-2; pedigree (1,1,1,1,1)
  Data from SDR for the year 2015. For the year 2015 the SDR’s did not report this value as a numerical value, but rather graphically. Thus the programme Inkscape was used to determine the value.
  The total concentrate produced was given in a diagram. This was multiplied by the percentage of the concentrate that was rutile in order to give the value for Rutile (94% TiO2). The percentage was: 5,14%
  Percentage was calculated as described for Titania slag. Manufactures use rutile in welding rod as it stabilises the arc and protect the molten metal from oxidation - forming a superior welding joint. In its titanuim metal form it is used extensively in the aerospace and aviation industries because of its litghtness, strenght and corrosion - and heat resistance. These properties also make it ideal for use in artificial hip joints, pacemakers and spectacle frames.
  production volume 3.11012e8 kg; name APV_glo_byp02; = APV_glo*ByP_02
    (same comment as for titania slag, 85% titanium dioxide)
  property price 1.28 EUR2005; name ByP_02_price_EUR2005
    (same comment as for titania slag, 85% titanium dioxide)
  property titanium content 0.57; name ByP_02_Ti_content
    titanium content on a dry matter basis
  property carbon content 0
    carbon content on a dry matter basis (reserved; not for manual entry)
  property true value 0.123136; name ByP_02_true_value
    allocation property applied in "true value" allocation // value calculated from revenue
  properties: wet mass 1 kg, dry mass 1 kg, water in wet mass 0 kg, carbon content, non-fossil 0, carbon content, fossil 0, water content 0, carbon allocation 0 kg

## Inputs from technosphere
- hard coal: 0 kg; pedigree (1,1,1,1,1)
  This represent the fuel used to produce the heat for the smelter. This has been obtained by multiplying the anthracite (coal) calorifc value by the enegry consumption (redported in the SD report) due to the burning of the anthracite. The reported value for the total energy consumption it was assumed to be for heating: sources are anthracite (mainly), electrodes, diesel, pertrol, paraffing and carbide.
  properties: wet mass 1 kg, dry mass 0.94 kg, carbon content, fossil 0.845, water content 0.0638298
  note on carbon content, fossil: C content 75-94% (specified in Tab 1.1, report 6, part VI). A mean content of 0.845 kg C/ kg dry hard coal was considered
- mine infrastructure, bauxite: 1.30918e-11 unit; = 1/(20*1000000000); lognormal variance with pedigree 0.178, pedigree (4,5,5,5,5)
  Calculated value from the infrastructure capacity of 1000000 ton/year, life time of 20 years and scaed down to 1kg of Titania slag, *5% Titanium dioxide produce.
  properties: lifetime capacity [kg] 2e10 kg
  note on lifetime capacity [kg]: 1E9 kg&year: 20 years lifetime. Source: ecoinvent v2 report 10-part I, Tab 5.1
- inert waste: 0 kg; name ByP_05; pedigree (1,1,1,1,1)
  Non-mineral waste from titania slag production (non-hazardous waste).
  production volume 0 kg
    Calculated from production volume of reference product using the relative outputs.
  property price 0 EUR2005; name ByP_05_price_EUR2005
  properties: wet mass 1 kg, dry mass 1 kg
- non-sulfidic tailing, off-site: -0.164956 kg; name ByP_04; lognormal variance with pedigree 0.0047, pedigree (2,2,3,5,1)
  This waste comes from the minerals separation plant, roaster plant and smelter clarifier.
  production volume 2.03677e9 kg; = APV_glo * ((Ref('25e428e3-2c0a-4d60-b947-a2c06866bb6a')*-1) / RP)
    Calculated from production volume of reference product using the relative outputs.
  property price 0 EUR2005; name ByP_04_price_EUR2005
  property silicon content 0.027261; name ByP_04_Si_content
  property phosphorus content 0.00197; name ByP_04_P_content
  property zirconium content 0.0109; name ByP_04_Zr_content
  property iron content 0.20138; name ByP_04_Fe_content
  property calcium content 0.015356; name ByP_04_Ca_content
  property chromium content 0.00836; name ByP_04_Cr_content
  property titanium content 0.140221; name ByP_04_Ti_content
  properties: wet mass 1 kg, water content 0.428571, dry mass 0.7 kg
  note on silicon content: silicon content on a dry matter basis; this is to represent Silicon content of the sulfidic tailing in the form of Quartz
  note on phosphorus content: phosphorus content on a dry matter basis; this is to represent Phosphorous content of the sulfidic tailing in the form of P2O5
  note on zirconium content: zirconium content on a dry matter basis; this is to represent Zirconium content of the sulfidic tailing in the form of Zircon
  note on iron content: iron content on a dry matter basis; this is to represent Iron content of the sulfidic tailing in the form of Fe2O3
  note on calcium content: calcium content on a dry matter basis; this is to represent Calcium content of the sulfidic tailing in the form of CaO
  note on chromium content: chromium content on a dry matter basis this is to represent Chromium content of the sulfidic tailing in the form of Cr2O3
  note on titanium content: titanium content on a dry matter basis; this is to represent Titanium content of the sulfidic tailing in the form of Rutile, Ilmenite, Titanite, Leucoxene
- non-ferrous metal smelter: 1.97612e-12 unit; = 1/(50*2650000000); lognormal variance with pedigree 0.172, pedigree (4,4,5,5,5)
  Value estimated from the annual production volume produced by the infrastructure (2.650.000 ton metal /year) and lifetime of 50 years and scaled down to refer to 1 kg of Titania slag, 85% Titanium dioxide produce.
- electricity, medium voltage: 0 kWh; pedigree (1,1,1,1,1)
  Data from SDR for the year 2015. For the year 2015 the SDR’s did not report this value as a numerical value, but rather graphically. Thus the programme Inkscape was used to determine the value.
- hard coal: 0.00186052, 0.00500659, 0.00307392, 0.0213183, 0.00301224, 0.000714782, 0.0044909, 0.00234529, 0.00664316 kg (9 entries); lognormal variance with pedigree 0.0047, pedigree (2,2,3,5,1)
  (same comment as for hard coal)
- inert waste: -3.80095e-5, -0.00441319 kg (2 entries); lognormal variance with pedigree 0.0047, pedigree (2,2,3,5,1)
  Non-mineral waste from titania slag production (non-hazardous waste).
  production volume 5.45295e7 kg
- electricity, medium voltage: 0.00023014, 0.00551685, 3.15051e-5, 0.00010108, 0.000207373, 1.89866e-5, 0.000177328, 0.000114046, 0.0014648, 0.00439712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 kWh (36 entries); lognormal variance with pedigree 0.0047, pedigree (2,2,3,5,1)
  (same comment as for electricity, medium voltage)

## Inputs from nature
All rows: lognormal variance with pedigree 0.0047, pedigree (2,2,3,5,1)
- Transformation, to mineral extraction site [natural resource, land]: 0.000196377 m2; name land_disturbed
  Land disturbed
- Water, unspecified natural origin [natural resource, in water]: 0.00452975 m3; name water_unspecified
  This value was calculated from subtracting the surface water (‘total water withdrawn from source’) from ‘total water consumed per operation’.
- Titanium, in ground [natural resource, in ground]: 0.196919 kg
  Calculated from TiO2 and Fe-Ti oxides, mainly ilmenite and rutile and its alteration products, in ground in the sand mined.
- Transformation, from unspecified [natural resource, land]: 0.000196377 m2
  Land disturbed
- Zirconium, in ground [natural resource, in ground]: 0.050733 kg
  Calculated from the % of Zirconium in the mined sand.Source; Philander, C. and Rozendaal, A., 2013.
- Occupation, mineral extraction site [natural resource, land]: 0.0125681 m2*year; = land_disturbed*mine_lifespan
  Calculated from the land disturbed and the lifespas of a mining site (64 year).
- Iron, in ground [natural resource, in ground]: 0.163548 kg
  Calculated from TiO2 and Fe-Ti oxides, mainly ilmenite in ground in the sand mined.
- Gangue, in ground [natural resource, in ground]: 0.681835 kg
  Calculated from TiO2 and Fe-Ti oxides, mainly ilmenite and rutile and its alteration products, zirconium in ground in the sand mined.
- Water, river [natural resource, in water]: 0.00340386 m3; name surface_water
  Referred to as: “Total Water Withdrawal By Source (m3).

## Emissions to nature
- Iron, ion [water, surface water]: 4.63449e-6 kg; lognormal variance with pedigree 0.932, pedigree (4,4,5,5,5)
  Data from the existing GLO dataset "heavy mineral sand quarry operation".
- Radium-226 [air, non-urban air or from high stacks]: 0.000115469 kBq; lognormal variance with pedigree 0.582, pedigree (4,4,5,5,5)
  Data from the existing GLO dataset "heavy mineral sand quarry operation".
- Particulates, > 2.5 um, and < 10um [air, non-urban air or from high stacks]: 0.000146628 kg; lognormal variance with pedigree 0.0047, pedigree (2,2,3,5,1)
  For the year 2015 the SDR’s did not report this value as a numerical value, but rather graphically. Thus the programme Inkscape was used to determine the value.
- Sulfur dioxide [air, non-urban air or from high stacks]: 3.01425e-5 kg; lognormal variance with pedigree 0.0047, pedigree (2,2,3,5,1)
  (same comment as for Particulates, > 2.5 um, and < 10um)
- Water [air, non-urban air or from high stacks]: 0.00119004 m3; name water_to_air; lognormal variance with pedigree 0.0047, pedigree (2,2,3,5,1)
  Water emission to air.
- Carbon dioxide, fossil [air, non-urban air or from high stacks]: 0.124322 kg; lognormal variance with pedigree 0.0047, pedigree (2,2,3,5,1)
  Reported CO2 emission, scope1: 0.47481 kg/ kg of Titania slag produced, inclusive of the buring of coal and other activities/materials (carbide, diesel, electrodes, land cleared, paraffin and petrol). Additionally, there is also CO2 emission, scope 2: 1,7601kg/kg of Titania slag produced. For the year 2015 the SDR’s did not report this value as a numerical value, but rather graphically. Thus the programme Inkscape was used to determine the value. Total annual emission CO2-scope1: kg 511685.728 Total annual emission CO2-scope2: kg 189681.504 Total annual emission Co2-scope2: kg 69368.4734
- Particulates, < 2.5 um [air, non-urban air or from high stacks]: 6.0484e-5 kg; lognormal variance with pedigree 0.582, pedigree (4,4,5,5,5)
  Data from the existing GLO dataset "heavy mineral sand quarry operation".
- Uranium-238 [air, non-urban air or from high stacks]: 3.35149e-5 kBq; lognormal variance with pedigree 0.582, pedigree (4,4,5,5,5)
  Data from the existing GLO dataset "heavy mineral sand quarry operation".
- Suspended solids, unspecified [water, surface water]: 9.26897e-5 kg; lognormal variance with pedigree 0.322, pedigree (4,4,5,5,5)
  Data from the existing GLO dataset "heavy mineral sand quarry operation".
- Water [water, surface water]: 0.00674357 m3; name water_to_surface_water; lognormal variance with pedigree 0.0047, pedigree (2,2,3,5,1)
  water emission to water.
- Thorium-232 [air, non-urban air or from high stacks]: 7.25284e-5 kBq; lognormal variance with pedigree 0.582, pedigree (4,4,5,5,5)
  Data from the existing GLO dataset "heavy mineral sand quarry operation".
- Nitrogen oxides [air, non-urban air or from high stacks]: 0.000125681 kg; lognormal variance with pedigree 0.0047, pedigree (2,2,3,5,1)
  (same comment as for Particulates, > 2.5 um, and < 10um)
- Particulates, > 10 um [air, non-urban air or from high stacks]: 0.000293256 kg; lognormal variance with pedigree 0.312, pedigree (4,4,5,5,5)
  Data from the existing GLO dataset "heavy mineral sand quarry operation".

## Sampling procedure
This dataset is a copy of the South African dataset on heavy mineral sand quarry operation and titania slag production. It is the best available representation of the GLO sector. The datafor South Africa was collected from the published 2012 and 2015 Sustainable Development Reports from Richards Bay Minerals, Additional information was found in academic reports and journals; Richards Bay Minerals, 2015 Sustainable Development Report (RBM, 2015)
Richards Bay Minerals, 2012 Sustainable Development Repor t(RBM, 2012)
Philander, C. and Rozendaal, A., 2013. The application of a novel geometallurgical template model to characterise the Namakwa Sands heavy mineral deposit, West Coast of South Africa. Minerals Engineering, 52, pp.82-94.

## Extrapolations
From the share of the ZA production for the year 2015, and the total production volume of the major feedstock of titanium dioxide (titania slag and rutile), the estimate of the global production volume has been calculated. Geography has been corrected accordingly.

## Review by Nawshad Haque 2017-12-19
Comments are addressed
