# textile production, non woven polypropylene, spun bond

Dataset: EcoSpold 2, unit process
Geography: RoW
Time period: 2013-04-01 to 2019-03-31
Technology level: current
Classification: EcoSpold01Categories: textiles/processing
Classification: ISIC rev.4 ecoinvent: 1311:Preparation and spinning of textile fibres
Scenario: Business-as-Usual
System model: Allocation at the point of substitution
Generated by: [System]
Published in: Faist Emmenegger, M. 2018
Database: ecoinvent
isCopyrightProtected: true
accessRestrictedTo: 1

## General comment
This dataset represents the production of nonwoven textile from Polypropylene (PP) granules. This dataset is a copy of Indian dataset.
Nonwoven fabrics are broadly defined as sheet or web structures bonded together by entangling fiber or filaments (and by perforating films) mechanically, thermally or chemically. They are flat or tufted porous sheets that are made directly from separate fibers, molten plastic or plastic film. They are not made by weaving or knitting and do not require converting the fibers to yarn.
Spunbond Non Woven Fabric application:
1) Shopping bags,tablecloth,compund packing material,filter material
2) Medical field: Face mask; Surgical gown, protective colthes, operation cover,shoe cover, bed sheet etc.
3) Sanitary and Health: Baby & adult diaper, feminie hygiene, hygiene pad, spron, incontinece pad etc
4)Agriculture and horticulture covers
5)Usage:widely used alone or as components of apparel, home furnishings, health care, engineering, industrial and consumer goods etc.

## Included activities start
The process starts with arrival of PP granules

## Included activities end
This process ends with cutting and packaging of non woven spun bond polypropylene

## Geography
This dataset is a copy of Indian dataset

## Technology
The process includes opening /mixing, spinning, bonding by heated rollers, cooling, winding cutting and packaging. This process involves feeding of PP granules through hopper, and mixing them with master batch. Granules are melted by heating oil, fibres thus formed are extruded and sprayed. The fibre mesh passes under heated rollers and gets pressed into nonwoven sheets which is then cooled and cut and wound on paper tubes for sale to further processes.

## Reference product
- textile, non-woven polypropylene: 1 kg; By-product classification allocatable product; CPC 26710: Woven fabrics of man-made filament yarn, obtained from high tenacity yarn of nylon or other polyamides, of pol[…]
  production volume 4.28544e9 kg
    According to NONWOVENS INDUSTRY magazine, the production volume of synthetic fibers in 2016 was 71 million tons. From those, 4% is calculated to be polyester fibers as reported in "Textile exchange".
    References: NONWOVENS INDUSTRY magazine, accessed at: https://www.nonwovens-industry.com/about-us/ on 09/04/2018
    Textile exchange, TE Preferred Fiber Market Report accessed, 2016 at: http://textileexchange.org/wp-content/uploads/2017/02/TE-Preferred-Fiber-Market-Report-Oct2016-1.pdf on 09/04/2018
  property price 1.1325 EUR2005
    Estimated value. Various souces report a value around, what correspond to, 2.6 EUR per kg of non woven polyester fabric (madeinchina.com. Retrieved from: https://www.made-in-china.com/productdirectory.do?word=polypropylene+non+woven+fabric&subaction=hunt&style=b&mode=and&code=0&comProvince=nolimit&order=0&isOpenCorrection=1, accessed 1Feb2018; Alibaba.com, 2018. Retrieved from: https://www.alibaba.com/trade/search?fsb=y&IndexArea=product_en&CatId=&SearchText=polypropylene+non+woven+fabric&isGalleryList=G, accessed 1Feb2018).
  property carbon content 0.857143
    carbon content on a dry matter basis (reserved; not for manual entry)
  property true value 1.1325
    allocation property applied in "true value" allocation // value calculated from revenue
  properties: water in wet mass 0 kg, wet mass 1 kg, carbon content, fossil 0.857143, dry mass 1 kg, water content 0, carbon content, non-fossil 0, carbon allocation 0.857143 kg

## By-products
- electricity, for reuse in municipal waste incineration only: 0 kWh; CPC 17100: Electrical energy; By-product classification allocatable product; pedigree (1,1,1,1,1)
  Net electricity generated from this waste and used in internal MSWI plant energy redistribution.
  Uncertainty: uncertainty is calculated from uncertainties in waste composition and uncertainties in energy efficiency and the uncertainty in internal energy demand
  production volume 227275 kWh
  property exergy 3.6 MJ; name E_el_prod_MSWI_exergy
    This exergy property is based on the exergy content of the product.
  property true value relation 3.6; name E_el_prod_MSWI_true_value_relation
    property to calculate "true value" from
  property price 0.1 EUR2005; name E_el_prod_MSWI_price_EUR2005
    Estimated to be the same price as in case of electricity, medium voltage.
  property true value 1.96271e-6
    allocation property applied in "true value" allocation // value calculated from true value relation
- heat, for reuse in municipal waste incineration only: 0 MJ; CPC 17300: Steam and hot water; By-product classification allocatable product; pedigree (1,1,1,1,1)
  Net useful heat generated from this waste and used in internal MSWI plant energy redistribution.
  Uncertainty: uncertainty is calculated from uncertainties in waste composition and uncertainties in energy efficiency and the uncertainty in internal energy demand
  production volume 1.61638e6 MJ
  property true value relation 0.1842; name E_th_prod_MSWI_true_value_relation
    property to calculate "true value" from
  property exergy 0.1842 MJ; name E_th_prod_MSWI_exergy
    This exergy property is based on the exergy content of the product.
  property price 0.0106 EUR2005; name E_th_prod_MSWI_price_EUR2005
    Average European district heat price from Ecoheatcool and Euroheat 2005-2006, Ecoheat Work package 1: The European heat market. Final report. 10.6 EUR/GJ i s the price of district heat. http://www.solarthermalworld.org/files/Ecoheatcool%20WP1%20Web.pdf?download
  property true value 7.22213e-7
    (same comment as for electricity, for reuse in municipal waste incineration only)
- zinc concentrate: 0 kg; CPC 14290: Other non-ferrous metal ores and concentrates (other than uranium or thorium ores and concentrates); By-product classification allocatable product
  Calculated value from the knowledge of the properties of both products.
  production volume 30.7476 kg
  property price 0.38 EUR2005; name ByP_price_EUR2005
    Temporary price data. Calculated as 90% of purchasers price based on: Zinc content in concentrate 53%. Concentrate price per kg Zn 86.5% of refined Zn price (13.5% treatment charges according to CHR Metals Limited 2005: Dynamic cost curves. http://www.minecost.com/dynamic.pdf). 2004 zinc price from USGS (2007) Mineral commodity summaries 2007. <http://minerals.usgs.gov/minerals/pubs/mcs/2007/mcs2007.pdf> [Accessed 25 May 2010]
  property zinc content 0.53; name zinc_C_zinc_concentrate
    Zinc content on a dry matter basis. Value taken from teh "zinc mine operation" /GLO dataset.
  property dry mass 1 kg; name DM_zinc_concentrate
  property carbon content 0
    carbon content on a dry matter basis (reserved; not for manual entry)
  property true value 2.66159e-10
    allocation property applied in "true value" allocation // value calculated from revenue
  properties: wet mass 1 kg, water content 0, carbon content, non-fossil 0, carbon content, fossil 0, water in wet mass 0 kg, carbon allocation 0 kg

## Inputs from technosphere
- wastewater, average: 0 m3; name wastewater; pedigree (1,1,1,1,1)
  considering 80% default waste water generation rate
  production volume 0 m3
    Calculated from production volume of reference product using the relative outputs.
  property price 0 EUR2005; name wastewater_price_EUR2005
  properties: water content 2882.2, wet mass 1000 kg, carbon content, non-fossil 0.194039, dry mass 0.346837 kg
  note on carbon content, non-fossil: 0.0673 kg TOC/m3 (Tab A.17, ecoinvent v2.2 report 13_I). TOC was considered as Total Carbon.
- diesel, burned in diesel-electric generating set, 18.5kW: 0.1593 MJ; lognormal variance with pedigree 0.0066, pedigree (1,4,3,5,1)
  Diesel used for power backup
- building, hall: 3.70369e-5 m2; lognormal variance with pedigree 0.3046, pedigree (2,1,3,5,1)
  square meters of building divided by production per year and life time of the plant
- tap water: 0 kg; name water; pedigree (1,1,1,1,1)
  sum of water used for humidification and cleaning granules
  properties: water content 2962.17, carbon content, fossil 0.00178991, wet mass 1 kg, dry mass 0.000337476 kg
  note on carbon content, fossil: Bicarbonate content is 2.93 mol/m3. CO2 content is 0.1 mol/m3 (ecoinvent v2.2 report 8, Tab 93.1).
- sodium hydroxide, without water, in 50% solution state: 0.0249999 kg; lognormal variance with pedigree 0.0146, pedigree (4,4,3,5,1)
  properties: wet mass 1 kg, dry mass 1 kg
- polypropylene, granulate: 0.999998 kg; lognormal variance with pedigree 0.0066, pedigree (1,4,3,5,1)
  granules are recirculated in the system hence no waste output is considered here.
- electricity, low voltage: 0 kWh; pedigree (1,1,1,1,1)
  sum of electricity used for
  Mixing
  Heating
  Spinning
  Conveyor
  Chilling
  Thermo bonding heaters,
  Winder
  Cutting
  Packaging
  Lighting
- wastewater, average: -0.000162961, -0.00150637 m3 (2 entries); lognormal variance with pedigree 0.0066, pedigree (1,4,3,5,1)
  considering 80% default waste water generation rate
  production volume 7.15384e6 m3
- tap water: 0.00246032, 0.876137, 0.0204391, 0.00406608, 0.0026673, 0.0075871, 1.17331 kg (7 entries); lognormal variance with pedigree 0.0146, pedigree (4,4,3,5,1)
  sum of water used for humidification and cleaning granules
- electricity, low voltage: 0.0160656, 0.00281771, 0.0639058, 0.0463345, 0.232877, 0.1155, 0.328997 kWh (7 entries); lognormal variance with pedigree 0.0066, pedigree (1,4,3,5,1)
  (same comment as for electricity, low voltage)

## Emissions to nature
- Water [air, unspecified]: 0.000417333 m3; lognormal variance with pedigree 0.0066, pedigree (1,4,3,5,1)
  considering default value of 20% water evaporation rate

## Sampling procedure
Extrapolated from IN data, uncertainty adjusted accordingly
