# chlorine production, liquid

Dataset: EcoSpold 2, unit process
Geography: RER
Time period: 2000-01-01 to 2019-12-31
Technology level: current
Classification: ISIC rev.4 ecoinvent: 2011:Manufacture of basic chemicals
Scenario: Business-as-Usual
System model: Allocation at the point of substitution
Generated by: David FitzGerald
Published in: Althaus H.-J. 2007
Database: ecoinvent
isCopyrightProtected: true
accessRestrictedTo: 1

## General comment
A simple dataset modelling the liquefaction of gaseous chlorine. This is based on the old dataset of the liquid chlorine production mix in ecoinvent v2.x. Further background information is available in the main source.

## Included activities end
Only the liquefaction step is included.

## Reference product
- chlorine, liquid: 1 kg; CPC 34231: Chemical elements n.e.c.; inorganic acids except phosphoric, nitric and sulphonitric; inorganic oxygen compoun[…]; By-product classification allocatable product; ISIC rev.4 ecoinvent 2011:Manufacture of basic chemicals; CAS 7782-50-5
  production volume 6.7248e9 kg; = 0.16812*4E+10
    Calculated based on the GLO production volume, which is estimated based on IEA statistics on the production of gaseous chlorine for 2004. The production volume for RER is estimated using the ratio between the production volume of gaseous chlorine in RER and that of GLO.
  property price 0.148 EUR2005
    The price for liquid chlorine (0.148 EUR/kg) was calculated as weighted average of the European (238Eur/tonne), US (223EUR/tonne) and the Chinese (84EUR/tonne) (Tecnon OrbiCHem, 2016) price according to the region's market shares (Europe 15%, US 20%, China 45%) scaled to 100% (ruschlor.ru, 2014).
    Reference(s):
    Tecnon OrbiCHem. 2016. Chem-Netfacts, Chemical insight an foresight - on a single page, Chlorine, 1 April 2016, document requested at http://www.orbichem.com/Chem-Netfacts.aspx?P_ID=208, 6 October 2017;
    ruschlor.ru. 2014. International Outlook for the Future of the Chinese Chlor-Alkali Industry retrieved from http://ruschlor.ru/english/images/stories/Pekin%20/Otchet_Engl/_.doc, 6 October 2017
  property carbon content 0
    carbon content on a dry matter basis (reserved; not for manual entry)
  properties: wet mass 1 kg, water content 0, dry mass 1 kg, water in wet mass 0 kg, carbon content, fossil 0, carbon content, non-fossil 0, carbon allocation 0 kg

## Inputs from technosphere
- electricity, medium voltage: 0.07 kWh; lognormal variance with pedigree 0.0427, pedigree (1,4,5,3,1)
  Data from 1 European chlorine producer
  Uncertainty: data from 1 European chlorine producer
- chlorine, gaseous: 1 kg; lognormal variance with pedigree 0.04, pedigree (1,1,5,1,1)
  Assumption: No chlorine losses during this process step
  properties: dry mass 1 kg, wet mass 1 kg

## Sampling procedure
Official statistics from the Association of European Chlorine Producers (EuroChlor)

## Extrapolations
This dataset has been extrapolated from year 2000 to the year of the calculation (2019). The uncertainty has been adjusted accordingly.
