# bitumen seal production

Dataset: EcoSpold 2, unit process
Geography: RoW
Time period: 1992-01-01 to 2019-12-31
Technology level: current
Classification: ISIC rev.4 ecoinvent: 2399:Manufacture of other non-metallic mineral products n.e.c.
Classification: EcoSpold01Categories: plastics/others
Tags: ConvertedDataset
Scenario: Business-as-Usual
System model: Allocation at the point of substitution
Generated by: Roland Hischier
Published in: Althaus H.-J. 2007
Database: ecoinvent
isCopyrightProtected: true
accessRestrictedTo: 1

## General comment
The functional unit represents 1 kg of bitumen sealing.
[This dataset was already contained in the ecoinvent database version 2. It was not individually updated during the transfer to ecoinvent version 3. Life Cycle Impact Assessment results may still have changed, as they are affected by changes in the supply chain, i.e. in other datasets. This dataset was generated following the ecoinvent quality guidelines for version 2. It may have been subject to central changes described in the ecoinvent version 3 change report (http://www.ecoinvent.org/database/ecoinvent-version-3/reports-of-changes/), and the results of the central updates were reviewed extensively. The changes added e.g. consistent water flows and other information throughout the database. The documentation of this dataset can be found in the ecoinvent reports of version 2, which are still available via the ecoinvent website. The change report linked above covers all central changes that were made during the conversion process.]

## Included activities end
Raw materials and chemicals used for production, transport of materials to manufacturing plant, energy consumption and waste amounts from a company. Infrastructure of the plant as an approximation.

## Geography
data from 1 Swiss company are used for the European average

## Technology
technology, used at the beginning of the 90s

## Time period
time to which data refer

## Parameters
- fraction, cooling water, cooling pond system, to air: 0.032; name fraction_CW_CP_to_air; lognormal variance with pedigree 0.0413, pedigree (2,3,1,3,1)
  Calculated based on literature value (Scown, C.D., 2011, Water Footprint of U.S. Transportation Fuels and supplying information of the article) (Vionnet, S., Quantis Water Database - Technical Report, 2012).
- fraction, cooling water, to air: 0.3875; name fraction_CW_to_air; = (0.5*fraction_CW_OT_to_air)+(0.5*fraction_CW_R_to_air); lognormal variance with pedigree 0.092025, pedigree (4,4,3,2,4)
  Calculated value based on literature value (see comments of the other parametres present in this dataset) and expert opinion. In the case when no industry/literature data are available about the type of cooling or directly fraction, cooling water, to air specific for the process a default assumption is applied. It is assumed that the once-through cooling system is used in 50% of all cases and recirculating system is used in another 50% of all cases.
- fraction, cooling water, recirculating system, to air: 0.771; name fraction_CW_R_to_air; lognormal variance with pedigree 0.0413, pedigree (2,3,1,3,1)
  (same comment as for fraction, cooling water, cooling pond system, to air)
- fraction, cooling water, once-through system, to air: 0.004; name fraction_CW_OT_to_air; lognormal variance with pedigree 0.0413, pedigree (2,3,1,3,1)
  (same comment as for fraction, cooling water, cooling pond system, to air)

## Reference product
- bitumen seal: 1 kg; By-product classification allocatable product; CPC 37940: Bituminous mixtures based on natural and artificial stone materials and bitumen, natural asphalt or related su[…]
  EcoSpold01Location=RER
  production volume 2.67763 kg
    This is a placeholder value that does not reflect real-world production volumes. This dataset does not currently require a real-world production volume to work in the database framework, and no actual data were collected yet. This has no negative effect on the results of the ecoinvent database.
  property carbon content, fossil 0.643968
    It was considered that the production of bitumen sealing does not include any chemical processes (ecoinvent v2.2 report 7_part XXIII). Therefore, C content of bitumen sealing was calculated as a weighted average of C content of the different components listed in Tab 15.2, ecoinvent v2.2 report 8-part 15
  property carbon content 0.643968
    carbon content on a dry matter basis (reserved; not for manual entry)
  property true value 1.28
    allocation property applied in "true value" allocation // value calculated from revenue
  properties: price 1.28 EUR2005, water content 0, wet mass 1 kg, carbon content, non-fossil 0, water in wet mass 0 kg, dry mass 1 kg, carbon allocation 0.643968 kg

## By-products
- heat, for reuse in municipal waste incineration only: 0 MJ; CPC 17300: Steam and hot water; By-product classification allocatable product; pedigree (1,1,1,1,1)
  Net electricity generated from this waste and used in internal MSWI plant energy redistribution.
  Uncertainty: uncertainty is calculated from uncertainties in waste composition and uncertainties in energy efficiency and the uncertainty in internal energy demand
  production volume 5.65845e-6 MJ
  property exergy 0.1842 MJ; name E_th_prod_MSWI_exergy
    This exergy property is based on the exergy content of the product.
  property price 0.0106 EUR2005; name E_th_prod_MSWI_price_EUR2005
    Average European district heat price from Ecoheatcool and Euroheat 2005-2006, Ecoheat Work package 1: The European heat market. Final report. 10.6 EUR/GJ i s the price of district heat. http://www.solarthermalworld.org/files/Ecoheatcool%20WP1%20Web.pdf?download
  property true value relation 0.1842; name E_th_prod_MSWI_true_value_relation
    property to calculate "true value" from
  property true value 1.24515e-8
    allocation property applied in "true value" allocation // value calculated from true value relation
- electricity, for reuse in municipal waste incineration only: 0 kWh; CPC 17100: Electrical energy; By-product classification allocatable product; pedigree (1,1,1,1,1)
  (same comment as for heat, for reuse in municipal waste incineration only)
  production volume 7.68681e-7 kWh
  property price 0.1 EUR2005; name E_el_prod_MSWI_price_EUR2005
    Estimated to be the same price as in case of electricity, medium voltage.
  property exergy 3.6 MJ; name E_el_prod_MSWI_exergy
    This exergy property is based on the exergy content of the product.
  property true value relation 3.6; name E_el_prod_MSWI_true_value_relation
    property to calculate "true value" from
  property true value 3.30584e-8
    (same comment as for heat, for reuse in municipal waste incineration only)
- iron scrap, sorted, pressed: 0 kg; By-product classification Recyclable; CPC 39310: Slag, dross, scalings and other waste from the manufacture of iron or steel; pedigree (1,1,1,1,1)
  metallic iron scrap removed from ash reamains and recycled.
  Uncertainty: uncertainty is calculated from uncertainties in waste composition and transfer coefficients to soild residues
  production volume 9.4744e-8 kg
  property price 0.175 EUR2005
    Temporary price data. Calculated as 90% of purchasers price based on: 2005 import and export prices (total trades (USD) divided by total weight (kg) in biggest economies of the world: EU27, USA, Brasil, China, India, Japan and Russia) from UN Commodity Trade Statistics Database (http://data.un.org/Explorer.aspxDatabase [Accessed 2011.06.20]). Commodity: Waste or scrap, of cast iron
  property carbon content 0
    carbon content on a dry matter basis (reserved; not for manual entry)
  property true value 5.12762e-9
    allocation property applied in "true value" allocation // value calculated from revenue
  properties: carbon content, non-fossil 0, wet mass 1 kg, dry mass 1 kg, water content 0, carbon content, fossil 0, water in wet mass 0 kg, carbon allocation 0 kg
- copper: 0 kg; source Rentz O. 1999; By-product classification allocatable product; CPC 41413: Refined copper and copper alloys, unwrought; master alloys of copper
  Literature value. Copper uses: Before end-use copper is manufactured into semi fabricated products, such as shapes and ingots (known as 'semis'). These manufacturing processes are subdivided into hot working, cold working and, if necessary, process annealing. Few of the semis are ready for use as such. They more typically travel to first-stage manufacturers, who make metal rods, wire, and casting, and then to component manufacturers who produce such things as motors, valves, and insulated cables The components in turn are incorporated by final-stage manufacturers into a variety of finished products - automobiles, commercial buildings, residential housing, and so forth. These uses account for about 79% of the world-wide consumption of copper.
  production volume 3.05297e-9 kg
  property price 5.52 EUR2005
    Literature value (http://www.economist.com/news/business/21576714-mining-industry-has-enriched-chile-its-future-precarious-copper-solution). Average price between 20015 and 2013.
  property carbon content 0
    carbon content on a dry matter basis (reserved; not for manual entry)
  property true value 5.14821e-9
    allocation property applied in "true value" allocation // value calculated from revenue
  properties: dry mass 1 kg, water in wet mass 0 kg, wet mass 1 kg, carbon content, non-fossil 0, water content 0, carbon content, fossil 0, carbon allocation 0 kg
- zinc concentrate: 0 kg; CPC 14290: Other non-ferrous metal ores and concentrates (other than uranium or thorium ores and concentrates); By-product classification allocatable product
  Calculated value from the knowledge of the properties of both products.
  production volume 2.42322e-18 kg
  property price 0.38 EUR2005; name ByP_price_EUR2005
    Temporary price data. Calculated as 90% of purchasers price based on: Zinc content in concentrate 53%. Concentrate price per kg Zn 86.5% of refined Zn price (13.5% treatment charges according to CHR Metals Limited 2005: Dynamic cost curves. http://www.minecost.com/dynamic.pdf). 2004 zinc price from USGS (2007) Mineral commodity summaries 2007. <http://minerals.usgs.gov/minerals/pubs/mcs/2007/mcs2007.pdf> [Accessed 25 May 2010]
  property zinc content 0.53; name zinc_C_zinc_concentrate
    Zinc content on a dry matter basis. Value taken from teh "zinc mine operation" /GLO dataset.
  property dry mass 1 kg; name DM_zinc_concentrate
  property carbon content 0
    carbon content on a dry matter basis (reserved; not for manual entry)
  property true value 2.81301e-19
    allocation property applied in "true value" allocation // value calculated from revenue
  properties: wet mass 1 kg, water content 0, carbon content, non-fossil 0, carbon content, fossil 0, water in wet mass 0 kg, carbon allocation 0 kg
- iron scrap, unsorted: 0 kg; source European Aluminium Association 2008; CPC 39310: Slag, dross, scalings and other waste from the manufacture of iron or steel; By-product classification Recyclable; pedigree (1,1,1,1,1)
  production volume 2.50654e-12 kg
  property price 0.149 EUR2005; name ironScrapAmount_price_EUR2005
    Temporary price data. Calculated as 90% of purchasers price based on: estimated at 85% of sorted scrap
  property carbon content 0
    carbon content on a dry matter basis (reserved; not for manual entry)
  property true value 1.24208e-13
    allocation property applied in "true value" allocation // value calculated from revenue
  properties: water in wet mass 0 kg, water content 0, carbon content, fossil 0, carbon content, non-fossil 0, dry mass 1 kg, wet mass 1 kg, carbon allocation 0 kg
- aluminium oxide, non-metallurgical: 0 kg; source European Aluminium Association 2008; CPC 41432: Alumina (aluminium oxide), except artificial corundum; By-product classification allocatable product; CAS 1344-28-1; pedigree (1,1,1,1,1)
  production volume 1.57727e-10 kg
  property carbon content, non-fossil 0; name C_content_non_fossil
  property price 0.28 EUR2005; name Al2O3Amount_price_EUR2005
    From UN trade database. http://data.un.org/ Import data from the largest economies of the world are used (Brazil, India, USA, China, Japan and EU-27).
  property dry mass 1 kg; name DM
  property water content 0; name water_content
  property wet mass 1 kg; name WM
  property water in wet mass 0 kg; name WWM
  property carbon content, fossil 0; name C_content_fossil
  property carbon content 0
    carbon content on a dry matter basis (reserved; not for manual entry)
  property true value 1.46877e-11
    allocation property applied in "true value" allocation // value calculated from revenue
  properties: carbon allocation 0 kg
- aluminium, cast alloy: 0 kg; source European Aluminium Association 2008; By-product classification allocatable product; CPC 41431: Unwrought aluminium; pedigree (1,1,1,1,1)
  EcoSpold01Location=RER
  production volume 1.4744e-9 kg
  property price 1.3 EUR2005; name castAlloyAmount_price_EUR2005
    Temporary price data. Calculated as 90% of purchasers price based on: Source: London Metal Exchange, Aluminium alloy price for 2005
  property carbon content 0
    carbon content on a dry matter basis (reserved; not for manual entry)
  property true value 6.37454e-10
    allocation property applied in "true value" allocation // value calculated from revenue
  properties: water in wet mass 0 kg, carbon content, non-fossil 0, water content 0, dry mass 1 kg, carbon content, fossil 0, wet mass 1 kg, carbon allocation 0 kg
- aluminium, wrought alloy: 0 kg; source European Aluminium Association 2008; By-product classification allocatable product; CPC 4153: Semi-finished products of aluminium or aluminium alloys; pedigree (1,1,1,1,1)
  production volume 6.45464e-10 kg
  property price 1.44 EUR2005; name secondaryAluminiumOutput_price_EUR2005
    Estimated based on literature values and expert judgement. Aluminium ccast alloys are about 90% of the price of aluminium wrought alloys.
  property carbon content 0
    carbon content on a dry matter basis (reserved; not for manual entry)
  property true value 3.09118e-10
    allocation property applied in "true value" allocation // value calculated from revenue
  properties: wet mass 1 kg, water content 0, carbon content, fossil 0, water in wet mass 0 kg, carbon content, non-fossil 0, dry mass 1 kg, carbon allocation 0 kg

## Inputs from technosphere
- malusil: 0.048 kg; lognormal variance with pedigree 0.0726, pedigree (2,4,5,5,3)
  EcoSpold01Location=RER
  Data from 1 Swiss company
  Uncertainty: data from 1 Swiss company
  properties: dry mass 1 kg, wet mass 1 kg
- waste bitumen: -0.00377 kg; lognormal variance with pedigree 0.0726, pedigree (2,4,5,5,3)
  Data from 1 Swiss company
  EcoSpold01Location=CH
  Uncertainty: data from 1 Swiss company
  production volume 0.01131 kg
    Calculated from the production volume of bitumen seal in proportion to the respective output amounts.
  properties: dry mass 0.986 kg, carbon content, fossil 0.842657, wet mass 1 kg, water content 0.0141988
- heat, district or industrial, other than natural gas: 0 MJ; pedigree (1,1,1,1,1)
  EcoSpold01Location=RER
  Data from 1 Swiss company
  Uncertainty: data from 1 Swiss company
- chemical factory, organics: 4e-10 unit; lognormal variance with pedigree 0.588, pedigree (4,5,5,5,5)
  EcoSpold01Location=RER
  Estimation
  Uncertainty: estimation
- quicklime, milled, loose: 0.18 kg; lognormal variance with pedigree 0.0726, pedigree (2,4,5,5,3)
  EcoSpold01Location=CH
  Data from 1 Swiss company
  Uncertainty: data from 1 Swiss company
  properties: water content 0.010101, wet mass 1 kg, dry mass 0.99 kg
- polystyrene, general purpose: 0.07 kg; lognormal variance with pedigree 0.0726, pedigree (2,4,5,5,3)
  Data from 1 Swiss company
  EcoSpold01Location=RER
  Uncertainty: data from 1 Swiss company
  properties: carbon content, fossil 0.923077, wet mass 1 kg, dry mass 1 kg
  note on carbon content, fossil: Chemical formula of polystyrene is (C8H8)n (ecoinvent v2.2 report 11_II)
- fleece, polyethylene: 0.06 kg; lognormal variance with pedigree 0.0726, pedigree (2,4,5,5,3)
  EcoSpold01Location=RER
  Data from 1 Swiss company
  Uncertainty: data from 1 Swiss company
  properties: carbon content, fossil 0.857143, wet mass 1 kg, dry mass 1 kg
  note on carbon content, fossil: Polyethylene is formed out of a huge amount of ethylene monomers (C2H4) (ecoinvent v2.2 report 11_II). MW=28 g/mol
- silica sand: 0.012 kg; lognormal variance with pedigree 0.0726, pedigree (2,4,5,5,3)
  Data from 1 Swiss company
  EcoSpold01Location=DE
  Uncertainty: data from 1 Swiss company
  properties: water content 0.010101, wet mass 1 kg, dry mass 0.99 kg
- municipal solid waste: 0 kg; pedigree (1,1,1,1,1)
  Data from 1 Swiss company
  EcoSpold01Location=CH
  Uncertainty: data from 1 Swiss company
  production volume 0 kg
    (same comment as for waste bitumen)
  properties: water content 0.297017, wet mass 1 kg, carbon content, non-fossil 0.261655, dry mass 0.771 kg, carbon content, fossil 0.171549
  note on carbon content, non-fossil: MSW composition in tab 4.1, ecoinvent v2.2 report 13_I. C content referred to 1 kg DM
- chemical, organic: 0.008 kg; lognormal variance with pedigree 0.0726, pedigree (2,4,5,5,3)
  EcoSpold01Location=GLO
  Data from 1 Swiss company
  Uncertainty: data from 1 Swiss company
  properties: dry mass 1 kg, wet mass 1 kg, carbon content, fossil 0.628
  note on carbon content, fossil: This dataset is an unweighted average of 20 organic substances (listed in Tab 88.1, ecoinvent v2.2 report 8, part II), being part of the top100 chemicals included in this database. The C-content has also been calculated as an unweighted average of the C content of the substances composing this dataset.
- pitch: 0 kg; pedigree (1,1,1,1,1)
  Data from 1 Swiss company
  EcoSpold01Location=RER
  Uncertainty: data from 1 Swiss company
  properties: dry mass 1 kg, carbon content, fossil 0.83, wet mass 1 kg
- electricity, medium voltage: 0 kWh; pedigree (1,1,1,1,1)
  EcoSpold01Location=UCTE
  Data from 1 Swiss company
  Uncertainty: data from 1 Swiss company
- solid bleached board: 0.0104 kg; lognormal variance with pedigree 0.0726, pedigree (2,4,5,5,3)
  Data from 1 Swiss company
  EcoSpold01Location=RER
  Uncertainty: data from 1 Swiss company
  properties: wet mass 1 kg, dry mass 0.945 kg, water content 0.0582011, carbon content, non-fossil 0.327779, carbon content, fossil 0.0190874
  note on carbon content, non-fossil: Biogenic C content was calculated after biogenic C contents of chemicals used in the production of board (Tab 11.20 ecoinvent v2.2 report 11_III, part 11). The cellulose content in 1 kg of paper (on a wet mas basis) was estimated as (1-chemical content), C content of cellulose was considered 0.44 kgC/kg dry mass (ecoinvent v2.2 report, n 15a, pg 40)
  note on carbon content, fossil: Fossil C content was calculated after fossil C contents of chemicals used in the production of board (Tab 11.20 ecoinvent v2.2 report 11_III, part 11)
- paper, woodfree, uncoated: 0.00231 kg; lognormal variance with pedigree 0.0726, pedigree (2,4,5,5,3)
  EcoSpold01Location=RER
  Data from 1 Swiss company
  Uncertainty: data from 1 Swiss company
  properties: water content 0.0582011, carbon content, fossil 0.0251406, dry mass 0.945 kg, carbon content, non-fossil 0.281215, wet mass 1 kg
  note on carbon content, fossil: Fossil C content was calculated after fossil C contents of chemicals used in the production of the paper (in Tab 8.54 & 8.55 ecoinvent v2.2 report 11_III, part 8).
  note on carbon content, non-fossil: Biogenic C content was calculated after biogenic C contents of chemicals used in the production of the paper (in Tab 8.54 & 8.55 ecoinvent v2.2 report 11_III, part 8). The cellulose content in 1 kg of paper (on a wet mas basis) was estimated as (1-chemical content), C content of cellulose was considered 0.44 kgC/kg dry mass (ecoinvent v2.2 report, n 15a, pg 40)
- packaging film, low density polyethylene: 0.00249 kg; lognormal variance with pedigree 0.0726, pedigree (2,4,5,5,3)
  Data from 1 Swiss company
  EcoSpold01Location=RER
  Uncertainty: data from 1 Swiss company
  properties: dry mass 1 kg, carbon content, fossil 0.857143, wet mass 1 kg
- heat, district or industrial, natural gas: 0 MJ; pedigree (1,1,1,1,1)
  EcoSpold01Location=RER
  Data from 1 Swiss company
  Uncertainty: data from 1 Swiss company
- heat, district or industrial, other than natural gas: 0.000413599, 0.922586 MJ (2 entries); lognormal variance with pedigree 0.0726, pedigree (2,4,5,5,3)
  EcoSpold01Location=RER
  Data from 1 Swiss company
  Uncertainty: data from 1 Swiss company
- municipal solid waste: -1.34584e-8, -3.39118e-9, -4.84619e-9, -9.5183e-6 kg (4 entries); lognormal variance with pedigree 0.0726, pedigree (2,4,5,5,3)
  Data from 1 Swiss company
  EcoSpold01Location=CH
  Uncertainty: data from 1 Swiss company
  production volume 2.862e-5 kg
- pitch: 0.034056, 0.00194091, 0.0878454, 0.00393759, 0.00562128, 0.496599 kg (6 entries); lognormal variance with pedigree 0.0726, pedigree (2,4,5,5,3)
  Data from 1 Swiss company
  EcoSpold01Location=RER
  Uncertainty: data from 1 Swiss company
- electricity, medium voltage: 0.000196361, 3.57294e-5, 0.000605917, 0.00878517, 0.00125732, 0.0041195 kWh (6 entries); lognormal variance with pedigree 0.0726, pedigree (2,4,5,5,3)
  EcoSpold01Location=UCTE
  Data from 1 Swiss company
  Uncertainty: data from 1 Swiss company
- heat, district or industrial, natural gas: 0.000161641, 0.00913836 MJ (2 entries); lognormal variance with pedigree 0.0726, pedigree (2,4,5,5,3)
  EcoSpold01Location=RER
  Data from 1 Swiss company
  Uncertainty: data from 1 Swiss company

## Inputs from nature
- Water, cooling, unspecified natural origin [natural resource, in water]: 0.024 m3; name water_cooling_UNO_input; lognormal variance with pedigree 0.21, pedigree (5,5,5,5,4)
  Estimated with data from a large chem. Plant
  Uncertainty: estimated with data from a large chem. Plant

## Emissions to nature
- Water [air, unspecified]: 0.0093 m3; name water_to_air_unspecified; lognormal variance with pedigree 0.0827, pedigree (2,2,5,5,1)
  Calculated value based on literature values and expert opinion. See comments in the parametres' comment field.
  property fraction, origin: fresh water 0; name fraction_origin_fresh_water
  property fraction, origin: unspecified 1; name fraction_origin_unspecified
  property fraction, origin: salt water 0; name fraction_origin_salt_water
- Water [water, unspecified]: 0.0147 m3; name water_to_water_unspecified; lognormal variance with pedigree 0.0827, pedigree (2,2,5,5,1)
  (same comment as for Water)
  property wet mass 1000 kg; name WM
  property dry mass 0 kg; name DM
  property carbon content, fossil 0; name C_content_fossil
  property carbon content, non-fossil 0; name C_content_non_fossil
  property fraction, origin: salt water 0; name fraction_origin_salt_water_Ww
  property fraction, origin: fresh water 0; name fraction_origin_fresh_water_Ww
  property fraction, origin: unspecified 1; name fraction_origin_unspecified_Ww
  property water in wet mass 1000 kg; name WWM

## Sampling procedure
Process data based on data from 1 Swiss company, used here as average data for European situation.

## Extrapolations
see geography This dataset has been copied from an original dataset covering the geography RER. The uncertainty has been adjusted accordingly.

## Review by Hans-Jörg Althaus 2003-06-28
passed
