# furnace production, wood chips, with silo, 5000kW

Dataset: EcoSpold 2, unit process
Geography: RoW
Time period: 2010-01-01 to 2019-12-31
Technology level: modern
Classification: ISIC rev.4 ecoinvent: 2815:Manufacture of ovens, furnaces and furnace burners
Classification: EcoSpold01Categories: oil/cogeneration
Synonyms: wood fired boiler production; wood fired central heating; wood chips boiler production
Tags: biomass power
Scenario: Business-as-Usual
System model: Allocation at the point of substitution
Generated by: Christian Bauer
Database: ecoinvent
isCopyrightProtected: true
accessRestrictedTo: 1

## General comment
This dataset represents the production and the disposal of a wood chips burning furnace for district heating networks, with the woodchips storage silo.

## Included activities start
From reception of furnace components at the factory gate

## Included activities end
This activity ends with the disposal of the device in the end of its lifetime. The dataset includes the most important materials used for the fabrication of the furnace, the accumulator hot water tanks, the pipes for water connection, the screw conveyor system and the chimney flue pipes: steel, concrete, metal alloys, rock wool, plastics, electronic components, polystyrene, lubricating oil, paint. The dataset includes the basement for the furnace (around 210m2) and the wood chips storage silo in concrete (dimensions: 13x7x5m), which is assumed to be built in an external space out from an existing building. The dataset includes the land transformation and occupation and the energy and heat for the construction and the disposal of the device.

## Technology
Boiler of modern technology available on the European and Swiss market, with conveyor grate technology and combustion chambers in refractory bricks, designed for an optimal combustion process. The model of reference is a woodchips boiler, brand Uniconfort mod.Global with capacity of 5000 kW. It was compared with another model with similar technology (Schmid mod.Pyrotronic UTSR 5000kW). Represent the typical boiler for a wide district heating network or for heating many industrial/residential buildings.
Source of image: http://www.uniconfort.com/en/global-model-boilers

## Time period
This model of furnace is commercialized in Europe and Switzerland and is still available on the market (end 2011)

## Reference product
- furnace, wood chips, with silo, 5000kW: 0 unit; CPC 43420: Industrial or laboratory furnaces and ovens, except non-electric bakery ovens; other industrial or laboratory […]; By-product classification allocatable product
  EcoSpold01Location=GLO
  production volume 1975 unit
    extrapolated with proportions (population) from the local dataset of Switzerland (from which value comes from an estimation of the auto furnaces cogen plants/renewable incinerators produced within the country) - high uncertainty
  property capacity [MW] 5 MW; name capacity_MW
  property price 317640 EUR2005
    Average 2005 prices for EU27, USA, China, Japan and India from Import/Export data (US$ and tonnes) in UN Commodity Trade Statistics Database; Commodity: "Industrial furnace, oven, incinerator non-electric ne". The prices are per kg and converted to per unit by summed weight of material concumption of the process in existing ecoinvent dâtaset for production of this furnace. (Based on 2.0) - For weight of concrete, used in the construction of the silo, it is separately added for from price per m3 used of each unit and apply EU&DK input output database 2003 (0.08 Euro2003/kg DS of concrete => 176 Euro2003/m3 concrete).
  property lifetime capacity [kWh] 8.76e8 kWh; name lifetime_capacity_kWh; = (lifetime*8760)*capacity_MW*1000
    calculated value
  property lifetime 20 year; name lifetime
  property true value 317640
    allocation property applied in "true value" allocation // value calculated from revenue
- iron scrap, unsorted: 1 kg; CPC 39310: Slag, dross, scalings and other waste from the manufacture of iron or steel; By-product classification Recyclable; pedigree (1,1,1,1,1)
  disposal of the cast iron
  production volume 2.20227e6 kg; = Ref('44f34cd2-cbc7-4eff-a4fc-4ad91f832b88', 'ProductionVolume') * (Ref('4fd5b2b7-e4d3-4a43-8768-1a9d3c2ca2c8') / Ref('44f34cd2-cbc7-4eff-a4fc-4ad91f832b88'))
    Calculated from production volume of reference product using the relative outputs.
  property price 0.149 EUR2005
    Temporary price data. Calculated as 90% of purchasers price based on: estimated at 85% of sorted scrap
  property carbon content 0
    carbon content on a dry matter basis (reserved; not for manual entry)
  property true value 166.14
    allocation property applied in "true value" allocation // value calculated from revenue
  properties: wet mass 1 kg, carbon content, fossil 0, water in wet mass 0 kg, carbon content, non-fossil 0, dry mass 1 kg, water content 0, carbon allocation 0 kg

## By-products
- electricity, for reuse in municipal waste incineration only: 0 kWh; CPC 17100: Electrical energy; By-product classification allocatable product; pedigree (1,1,1,1,1)
  Net electricity generated from this waste and used in internal MSWI plant energy redistribution.
  Uncertainty: uncertainty is calculated from uncertainties in waste composition and uncertainties in energy efficiency and the uncertainty in internal energy demand
  production volume 1.62965e6 kWh
  property true value relation 3.6; name E_el_prod_MSWI_true_value_relation
    property to calculate "true value" from
  property exergy 3.6 MJ; name E_el_prod_MSWI_exergy
    This exergy property is based on the exergy content of the product.
  property price 0.1 EUR2005; name E_el_prod_MSWI_price_EUR2005
    Estimated to be the same price as in case of electricity, medium voltage.
  property true value 53.3095
    allocation property applied in "true value" allocation // value calculated from true value relation
- heat, for reuse in municipal waste incineration only: 0 MJ; CPC 17300: Steam and hot water; By-product classification allocatable product; pedigree (1,1,1,1,1)
  Net useful heat generated from this waste and used in internal MSWI plant energy redistribution.
  Uncertainty: uncertainty is calculated from uncertainties in waste composition and uncertainties in energy efficiency and the uncertainty in internal energy demand
  production volume 1.1367e7 MJ
  property true value relation 0.1842; name E_th_prod_MSWI_true_value_relation
    property to calculate "true value" from
  property exergy 0.1842 MJ; name E_th_prod_MSWI_exergy
    This exergy property is based on the exergy content of the product.
  property price 0.0106 EUR2005; name E_th_prod_MSWI_price_EUR2005
    Average European district heat price from Ecoheatcool and Euroheat 2005-2006, Ecoheat Work package 1: The European heat market. Final report. 10.6 EUR/GJ i s the price of district heat. http://www.solarthermalworld.org/files/Ecoheatcool%20WP1%20Web.pdf?download
  property true value 19.0262
    (same comment as for electricity, for reuse in municipal waste incineration only)
- zinc concentrate: 0 kg; CPC 14290: Other non-ferrous metal ores and concentrates (other than uranium or thorium ores and concentrates); By-product classification allocatable product
  Calculated value from the knowledge of the properties of both products.
  production volume 0.551669 kg
  property price 0.38 EUR2005; name ByP_price_EUR2005
    Temporary price data. Calculated as 90% of purchasers price based on: Zinc content in concentrate 53%. Concentrate price per kg Zn 86.5% of refined Zn price (13.5% treatment charges according to CHR Metals Limited 2005: Dynamic cost curves. http://www.minecost.com/dynamic.pdf). 2004 zinc price from USGS (2007) Mineral commodity summaries 2007. <http://minerals.usgs.gov/minerals/pubs/mcs/2007/mcs2007.pdf> [Accessed 25 May 2010]
  property zinc content 0.53; name zinc_C_zinc_concentrate
    Zinc content on a dry matter basis. Value taken from teh "zinc mine operation" /GLO dataset.
  property dry mass 1 kg; name DM_zinc_concentrate
  property carbon content 0
    carbon content on a dry matter basis (reserved; not for manual entry)
  property true value 0.000106141
    allocation property applied in "true value" allocation // value calculated from revenue
  properties: wet mass 1 kg, water content 0, carbon content, non-fossil 0, carbon content, fossil 0, water in wet mass 0 kg, carbon allocation 0 kg
- copper: 0 kg; By-product classification allocatable product; CPC 41413: Refined copper and copper alloys, unwrought; master alloys of copper
  production volume 45035.6 kg
  properties: water in wet mass 0 kg, water content 0, carbon content, non-fossil 0, dry mass 1 kg, carbon content, fossil 0, price 5.52 EUR2005, wet mass 1 kg, carbon content 0, carbon allocation 0 kg, true value 65.7838
- lead: 0 kg; CPC 41441: Lead, unwrought; By-product classification allocatable product
  EcoSpold01Location=SE
  production volume 53.096 kg
  property price 0.744 EUR2005
    Temporary price data. Calculated as 90% of purchasers price based on: Source: ecoinvent v2 report 10-part IX, Tab 5.10 & 2.5
  property carbon content 0
    carbon content on a dry matter basis (reserved; not for manual entry)
  property true value 0.0200017
    allocation property applied in "true value" allocation // value calculated from revenue
  properties: wet mass 1 kg, water content 0, carbon content, non-fossil 0, carbon content, fossil 0, dry mass 1 kg, water in wet mass 0 kg, carbon allocation 0 kg
- nickel, 99.5%: 0 kg; CPC 41422: Unwrought nickel; By-product classification allocatable product
  EcoSpold01Location=SE
  production volume 110.837 kg
  property price 10.4 EUR2005
    Temporary price data. Calculated as 90% of purchasers price based on: 2004 nickel price from USGS (2007) Mineral commodity summaries 2007. <http://minerals.usgs.gov/minerals/pubs/mcs/2007/mcs2007.pdf> [Accessed 25 May 2010]
  property carbon content 0
    carbon content on a dry matter basis (reserved; not for manual entry)
  property true value 0.583646
    allocation property applied in "true value" allocation // value calculated from revenue
  properties: water in wet mass 0 kg, wet mass 1 kg, carbon content, non-fossil 0, dry mass 1 kg, water content 0, carbon content, fossil 0, carbon allocation 0 kg
- silver: 0 kg; CPC 41310: Silver (including silver plated with gold or platinum), unwrought or in semi-manufactured forms, or in powder […]; By-product classification allocatable product; CAS 7440-22-4
  EcoSpold01Location=SE
  production volume 18.3035 kg
  property price 178 EUR2005
    (same comment as for lead)
  property carbon content 0
    carbon content on a dry matter basis (reserved; not for manual entry)
  property true value 1.64964
    allocation property applied in "true value" allocation // value calculated from revenue
  properties: wet mass 1 kg, carbon content, non-fossil 0, dry mass 1 kg, water content 0, carbon content, fossil 0, water in wet mass 0 kg, carbon allocation 0 kg
- palladium: 0 kg; CPC 4160: Other non-ferrous metals and articles thereof (including waste and scrap of some metals); cermets and articles […]; By-product classification allocatable product
  EcoSpold01Location=SE
  production volume 1.01322 kg
  property price 5640 EUR2005
    Temporary price data. Calculated as 90% of purchasers price based on: 2004 price from USGS (2007) Mineral commodity summaries 2007. <http://minerals.usgs.gov/minerals/pubs/mcs/2007/mcs2007.pdf> [Accessed 25 May 2010]
  property carbon content 0
    carbon content on a dry matter basis (reserved; not for manual entry)
  property true value 2.89345
    allocation property applied in "true value" allocation // value calculated from revenue
  properties: wet mass 1 kg, carbon content, fossil 0, water in wet mass 0 kg, water content 0, carbon content, non-fossil 0, dry mass 1 kg, carbon allocation 0 kg
- gold: 0 kg; CPC 41320: Gold (including gold plated with platinum), unwrought or in semi-manufactured forms, or in powder form; By-product classification allocatable product; CAS 7440-57-5
  EcoSpold01Location=SE
  production volume 0.555646 kg
  property price 10600 EUR2005
    Temporary price data. Calculated as 90% of purchasers price based on: Source: ecoinvent v2 report 10-part IX, Tab 2.5
  property carbon content 0
    carbon content on a dry matter basis (reserved; not for manual entry)
  property true value 2.9822
    allocation property applied in "true value" allocation // value calculated from revenue
  properties: wet mass 1 kg, carbon content, fossil 0, dry mass 1 kg, carbon content, non-fossil 0, water content 0, water in wet mass 0 kg, carbon allocation 0 kg
- iron scrap, sorted, pressed: 0 kg; By-product classification Recyclable; CPC 39310: Slag, dross, scalings and other waste from the manufacture of iron or steel; pedigree (1,1,1,1,1)
  Iron scrap recovered from this waste.
  production volume 434825 kg
  property price 0.175 EUR2005
    Temporary price data. Calculated as 90% of purchasers price based on: 2005 import and export prices (total trades (USD) divided by total weight (kg) in biggest economies of the world: EU27, USA, Brasil, China, India, Japan and Russia) from UN Commodity Trade Statistics Database (http://data.un.org/Explorer.aspxDatabase [Accessed 2011.06.20]). Commodity: Waste or scrap, of cast iron
  property carbon content 0
    carbon content on a dry matter basis (reserved; not for manual entry)
  property true value 9.38521
    allocation property applied in "true value" allocation // value calculated from revenue
  properties: water content 0, water in wet mass 0 kg, carbon content, fossil 0, dry mass 1 kg, carbon content, non-fossil 0, wet mass 1 kg, carbon allocation 0 kg
- aluminium oxide, non-metallurgical: 0 kg; source European Aluminium Association 2008; CPC 41432: Alumina (aluminium oxide), except artificial corundum; By-product classification allocatable product; CAS 1344-28-1; pedigree (1,1,1,1,1)
  production volume 9063.83 kg
  property carbon content, non-fossil 0; name C_content_non_fossil
  property price 0.28 EUR2005; name Al2O3Amount_price_EUR2005
    From UN trade database. http://data.un.org/ Import data from the largest economies of the world are used (Brazil, India, USA, China, Japan and EU-27).
  property dry mass 1 kg; name DM
  property water content 0; name water_content
  property wet mass 1 kg; name WM
  property water in wet mass 0 kg; name WWM
  property carbon content, fossil 0; name C_content_fossil
  property carbon content 0
    carbon content on a dry matter basis (reserved; not for manual entry)
  property true value 0.642499
    allocation property applied in "true value" allocation // value calculated from revenue
  properties: carbon allocation 0 kg
- aluminium, cast alloy: 0 kg; source European Aluminium Association 2008; By-product classification allocatable product; CPC 41431: Unwrought aluminium; pedigree (1,1,1,1,1)
  EcoSpold01Location=RER
  production volume 84726.7 kg
  property price 1.3 EUR2005; name castAlloyAmount_price_EUR2005
    Temporary price data. Calculated as 90% of purchasers price based on: Source: London Metal Exchange, Aluminium alloy price for 2005
  property carbon content 0
    carbon content on a dry matter basis (reserved; not for manual entry)
  property true value 27.8847
    allocation property applied in "true value" allocation // value calculated from revenue
  properties: water in wet mass 0 kg, carbon content, non-fossil 0, water content 0, dry mass 1 kg, carbon content, fossil 0, wet mass 1 kg, carbon allocation 0 kg
- aluminium, wrought alloy: 0 kg; source European Aluminium Association 2008; By-product classification allocatable product; CPC 4153: Semi-finished products of aluminium or aluminium alloys; pedigree (1,1,1,1,1)
  production volume 37091.7 kg
  property price 1.44 EUR2005; name secondaryAluminiumOutput_price_EUR2005
  properties: wet mass 1 kg, water content 0, carbon content, fossil 0, water in wet mass 0 kg, carbon content, non-fossil 0, dry mass 1 kg, carbon content 0, carbon allocation 0 kg, true value 13.522

## Inputs from technosphere
- sheet rolling, steel: 0.000939408 kg; source Uniconfort srl 2011; lognormal variance with pedigree 0.0298, pedigree (3,3,4,5,1)
  estimation
  EcoSpold01Location=RER
- aluminium, wrought alloy: 4.87274e-5 kg; source Uniconfort srl 2011; lognormal variance with pedigree 0.0298, pedigree (3,3,4,5,1)
  EcoSpold01Location=RER
  estimation
  properties: dry mass 1 kg, wet mass 1 kg
- scrap steel: 0 kg; pedigree (1,1,1,1,1)
  disposal of steel low-alloyed and chromium steel (body of the furnace, accumulation water tanks, screw conveyour, chimney flue pipes)
  EcoSpold01Location=CH
  production volume 0 kg
    Calculated from production volume of reference product using the relative outputs.
  properties: dry mass 1 kg, wet mass 1 kg, lifetime 20 year
- lubricating oil: 1.4993e-5 kg; source Uniconfort srl 2011; lognormal variance with pedigree 0.101, pedigree (4,3,4,5,1)
  estimation - used for the manufacturing of the furnace and for the maintenance. It is just added to the internal part of the furnace
  EcoSpold01Location=RER
  properties: carbon content, fossil 0.75, wet mass 1 kg, dry mass 1 kg
  note on carbon content, fossil: Lubricating oil is produced from diesel. C-content/dry mass of fats and oils considered 75%, from: ecoinvent v2.2 report, n 15a, pg 40
- drawing of pipe, steel: 3.27973e-5 kg; source Uniconfort srl 2011; lognormal variance with pedigree 0.0298, pedigree (3,3,4,5,1)
  estimation - for water pipes connections
  EcoSpold01Location=RER
- alkyd paint, white, without solvent, in 60% solution state: 5.62239e-6 kg; source Uniconfort srl 2011; lognormal variance with pedigree 0.0298, pedigree (3,3,4,5,1)
  EcoSpold01Location=RER
  estimation
  properties: wet mass 1 kg, carbon content, non-fossil 0.199629, carbon content, fossil 0.140367, dry mass 1 kg
  note on carbon content, non-fossil: C content was calculated as an addition of C content in the raw materials.
- waste polyethylene: 0 kg; pedigree (1,1,1,1,1)
  EcoSpold01Location=CH
  disposal of plastic materials
  production volume 0 kg
    Calculated from production volume of reference product using the relative outputs.
  properties: wet mass 1 kg, carbon content, fossil 0.825301, dry mass 0.996 kg, water content 0.00401606, lifetime 20 year
  note on carbon content, fossil: C content in 1 kg DM was calculated using data in Tab A.1, ecoinvent v2.2 report 13_I
- steel, low-alloyed, hot rolled: 0.0350556 kg; name steel_low_alloyed; source Uniconfort srl 2011; lognormal variance with pedigree 0.0298, pedigree (3,3,4,5,1)
  EcoSpold01Location=RER
  Calculated value - calculated with the difference of the total weight of the device with the summa of the weight of all the other materials (also based on qualified technician suggestions)
  properties: carbon content, fossil 0.005, wet mass 1 kg, dry mass 1 kg
  note on carbon content, fossil: Low alloyed steel composition given in Tab. 3.2 ecoinvent v2.2 report 10_partII. Steel assumed to have a C content of 0.5%
- stone wool: 0.000864911 kg; source Uniconfort srl 2011; lognormal variance with pedigree 0.0298, pedigree (3,3,4,5,1)
  calculated value - summa of rock wool for the insulation of the chimney flue pipes (122 kg: 12m height, 80cm diameter, thickness rockwool 3cm) and rockwool inside the furnace (1724 kg = 13258 dm3 * 0.13 kg/m3)
  EcoSpold01Location=CH
  properties: wet mass 1 kg, dry mass 1 kg, carbon content, fossil 0.015401
  note on carbon content, fossil: The chemical composition of the glass fibres used in the rock wool production is similar to the composition of naturally cooled volcano basalt and has a composition listed in Tab. 3.1 and 3.2 in ecoinvent v2.2 report 16, part XIV. Rock wool contains: a minimum of 96% mineral fibres,between 0.5 and 3.0 weight percent of phenolic resin depending on the specific product characteristics, and about 0.2 percent mineral oil (ecoinvent v2.2 report 16, part XIV). An average composition of 1.8% phenolic resin, 0.2% mineral oil, and 98% mineral fibres has been assumed and used to calculate C content of the rock wool
- cast iron: 0.000522414 kg; source Uniconfort srl 2011; lognormal variance with pedigree 0.0298, pedigree (3,3,4,5,1)
  estimation
  EcoSpold01Location=RER
  properties: wet mass 1 kg, carbon content, fossil 0.04, dry mass 1 kg
  note on carbon content, fossil: Cast iron is made by remelting pig iron in small furnaces (e.g. cupola furnaces or electric arc furnaces) and poured into moulds to make castings. It usually contains 2% to 6% carbon (ecoinvent v2.2 report 10_partII). An average content of 4% was considered
- waste polystyrene isolation, flame-retardant: 0 kg; pedigree (1,1,1,1,1)
  disposal of accumulator water tanks insulation
  production volume 0 kg
    Calculated from production volume of reference product using the relative outputs.
  properties: water content 0.00199232, wet mass 1 kg, dry mass 0.998012 kg, carbon content, fossil 0.918145
  note on carbon content, fossil: Polystyrene isolation (EPS) is flame-retarded with hexa-bromo-cyclo-dodecan (C12H18Br6) and contains 0.67 w% bromine (ecoinvent v2.2 report 13_I, pg 39). The rest is polystyrene: (C8H8)n.
- waste mineral oil: 0 kg; pedigree (1,1,1,1,1)
  disposal of the lubricating oil
  production volume 0 kg
    Calculated from production volume of reference product using the relative outputs.
  properties: water content 0.111111, carbon content, fossil 0.864444, dry mass 0.9 kg, wet mass 1 kg
  note on carbon content, fossil: Tab A.6, ecoinvent v2.2 report 13_I. C content has been calculated after data in the tables, and then referred to 1 kg DM
- heat, central or small-scale, other than natural gas: 0 MJ; source Uniconfort srl 2011; pedigree (1,1,1,1,1)
  EcoSpold01Location=CH
  estimation - data comes from a comparison between old dataset value and communication with Uniconfort producer (total annual heating value in factory/production)
- electricity, low voltage: 0 kWh; source Uniconfort srl 2011; pedigree (1,1,1,1,1)
  Estimation - data derives from comparison between old dataset value, energy required for steel manufacturing (similar weight device) and suggestions from Uniconfort technician
  EcoSpold01Location=CH
- copper: 2.15525e-5 kg; source Uniconfort srl 2011; lognormal variance with pedigree 0.0298, pedigree (3,3,4,5,1)
  estimation
  EcoSpold01Location=RER
  properties: dry mass 1 kg, wet mass 1 kg
- waste concrete: 0 kg; pedigree (1,1,1,1,1)
  disposal of the concrete for the furnace basement and for the woodchips silo - around 56 m3 of concrete * 2350 kg/m3 (concrete density) = 131000 kg
  EcoSpold01Location=CH
  production volume 0 kg
    Calculated from production volume of reference product using the relative outputs.
  properties: water content 1, dry mass 0.5 kg, wet mass 1 kg, lifetime 20 year
- polystyrene foam slab: 0.00016914 kg; source Uniconfort srl 2011; lognormal variance with pedigree 0.0298, pedigree (3,3,4,5,1)
  calculated value - 7 accumulator hot water tanks 6000 liters [1719 dm3 (calculated value for insulation a tank 180*288 cm) * 0.03 kg/dm3 (specific weight polystyrene foam slab)]*7
  EcoSpold01Location=RER
  properties: wet mass 1 kg, carbon content, fossil 0.859091, dry mass 1 kg
  note on carbon content, fossil: XPS consists in 91% of polystyrene, 7% of blowing agent and the re-maining 2% are flame retardants (bromine compounds) and other additives (ecoinvent v2.2 report 7, part XIV, pg69). The chemical formula of polystyrene is (C8H8)n. Here, the blowing agent is CO2.
- electronics, for control units: 5.62239e-6 kg; source Uniconfort srl 2011; lognormal variance with pedigree 0.0298, pedigree (3,3,4,5,1)
  EcoSpold01Location=RER
  estimation
  properties: carbon content, fossil 0.337146, wet mass 1 kg, dry mass 1 kg, carbon content, non-fossil 0.00013442
  note on carbon content, fossil: The control unit has a composition of 46% steel (housing), 32% plastics, 14% printed wiring boards and 8% cables (various types).;
- electronics scrap from control units: -5.62239e-6 kg; lognormal variance with pedigree 0.0107, pedigree (1,2,4,5,1)
  disposal of electronical parts
  EcoSpold01Location=RER
  production volume 23700 kg; = Ref('44f34cd2-cbc7-4eff-a4fc-4ad91f832b88', 'ProductionVolume') * (Ref('040fc614-8c85-4d62-822b-29493238af4b')*-1)
    Calculated from production volume of reference product using the relative outputs.
  properties: lifetime 20 year, carbon content, fossil 0.337146, carbon content, non-fossil 0.00013442, dry mass 1 kg, wet mass 1 kg
- scrap aluminium: 0 kg; pedigree (1,1,1,1,1)
  EcoSpold01Location=CH
  disposal of aluminium components in the furnace
  production volume 0 kg
    Calculated from production volume of reference product using the relative outputs.
  properties: dry mass 1 kg, wet mass 1 kg, lifetime 20 year
- concrete, normal: 0 m3; source Uniconfort srl 2011; pedigree (1,1,1,1,1)
  EcoSpold01Location=CH
  calculated value - basing on the silo dimensions (from furnace manual) the amount of concrete was calculated (10.5 m3 for the basement + 45m3 for the silo). [thickness of the walls of the silo: 20 cm]
  properties: wet mass 2380 kg, water content 0.086758, dry mass 2190 kg
- scrap copper: 0 kg; pedigree (1,1,1,1,1)
  disposal of copper
  EcoSpold01Location=CH
  production volume 0 kg
    Calculated from production volume of reference product using the relative outputs.
  properties: wet mass 1 kg, lifetime 20 year, dry mass 1 kg
- steel, chromium steel 18/8, hot rolled: 3.27973e-5 kg; name chromium_steel; source Uniconfort srl 2011; lognormal variance with pedigree 0.0298, pedigree (3,3,4,5,1)
  estimation . several components in the body of the furnace
  EcoSpold01Location=RER
  properties: wet mass 1 kg, dry mass 1 kg, carbon content, fossil 0.0008
  note on carbon content, fossil: Stainless steel model is the grade 304 steel (18/8 stainless, 18% chromium 8% nickel; max. 0.08% C)
- polyethylene, high density, granulate: 8.43359e-6 kg; source Uniconfort srl 2011; lognormal variance with pedigree 0.0298, pedigree (3,3,4,5,1)
  EcoSpold01Location=RER
  estimation
  properties: carbon content, fossil 0.857143, wet mass 1 kg, dry mass 1 kg
  note on carbon content, fossil: Polyethylene is formed out of a huge amount of ethylene monomers (C2H4) (ecoinvent v2.2 report 11_II). MW=28 g/mol
- inert waste, for final disposal: -0.0193129 kg; lognormal variance with pedigree 0.0107, pedigree (1,2,4,5,1)
  EcoSpold01Location=CH
  disposal of the refractory bricks
  production volume 8.14095e7 kg; = Ref('44f34cd2-cbc7-4eff-a4fc-4ad91f832b88', 'ProductionVolume') * (Ref('277c3617-190a-4c76-b616-40cd1b666b1b')*-1)
    Calculated from production volume of reference product using the relative outputs.
  properties: water content 0.00502513, dry mass 0.995 kg, wet mass 1 kg, lifetime 20 year
- iron-nickel-chromium alloy: 0.000247385 kg; source Uniconfort srl 2011; lognormal variance with pedigree 0.0298, pedigree (3,3,4,5,1)
  estimation - components for the conveyor grate in the combustion chamber
  EcoSpold01Location=RER
  properties: dry mass 1 kg, wet mass 1 kg
- refractory, fireclay, packed: 0.0193129 kg; source Uniconfort srl 2011; lognormal variance with pedigree 0.0298, pedigree (3,3,4,5,1)
  EcoSpold01Location=DE
  estimation - refractory bricks in fireclay are used in the combustion chamber inside the furnace, for a efficient combustion (big quantity of refractory is necessary when woodchips have high content of water)
  properties: wet mass 1 kg, dry mass 1 kg
- waste mineral wool, for final disposal: 0 kg; pedigree (1,1,1,1,1)
  disposal of insulation material (boiler + chimney)
  EcoSpold01Location=CH
  production volume 0 kg
    Calculated from production volume of reference product using the relative outputs.
  properties: wet mass 1 kg, dry mass 1 kg, lifetime 20 year
- scrap steel: -0.00854649, -0.0265419 kg (2 entries); lognormal variance with pedigree 0.0107, pedigree (1,2,4,5,1)
  (same comment as for scrap steel)
  production volume 1.47908e8 kg
- waste polyethylene: -9.38168e-7, -6.26847e-8, -4.74075e-9, -2.5891e-8, -1.04597e-8, -2.4586e-8, -7.99362e-7, -6.56769e-6 kg (8 entries); lognormal variance with pedigree 0.0107, pedigree (1,2,4,5,1)
  EcoSpold01Location=CH
  disposal of plastic materials
  production volume 35550 kg
- waste polystyrene isolation, flame-retardant: -4.78454e-5, -0.000121295 kg (2 entries); lognormal variance with pedigree 0.0107, pedigree (1,2,4,5,1)
  disposal of accumulator water tanks insulation
  production volume 712975 kg
- waste mineral oil: -3.77159e-6, -1.12214e-5 kg (2 entries); lognormal variance with pedigree 0.0107, pedigree (1,2,4,5,1)
  disposal of the lubricating oil
  production volume 63200 kg
- heat, central or small-scale, other than natural gas: 6.31894e-5, 0.00442067 MJ (2 entries); source Uniconfort srl 2011; lognormal variance with pedigree 0.101, pedigree (4,3,4,5,1)
  (same comment as for heat, central or small-scale, other than natural gas)
- electricity, low voltage: 2.94091e-5, 5.15799e-6, 0.000116984, 0.000419416, 8.48181e-5, 0.0012827, 0.00021143, 0.00060225 kWh (8 entries); source Uniconfort srl 2011; lognormal variance with pedigree 0.101, pedigree (4,3,4,5,1)
  (same comment as for electricity, low voltage)
- waste concrete: -0.00418776, -0.0570869 kg (2 entries); lognormal variance with pedigree 0.0107, pedigree (1,2,4,5,1)
  (same comment as for waste concrete)
  production volume 2.5827e8 kg
- scrap aluminium: -1.56902e-5, -3.30372e-5 kg (2 entries); lognormal variance with pedigree 0.0107, pedigree (1,2,4,5,1)
  EcoSpold01Location=CH
  disposal of aluminium components in the furnace
  production volume 205400 kg
- concrete, normal: 6.02421e-7, 6.27714e-8, 5.08179e-7, 2.85851e-7, 1.2105e-6, 4.08293e-8, 2.35273e-5 m3 (7 entries); source Uniconfort srl 2011; lognormal variance with pedigree 0.0298, pedigree (3,3,4,5,1)
  (same comment as for concrete, normal)
- scrap copper: -6.9399e-6, -1.46126e-5 kg (2 entries); lognormal variance with pedigree 0.0113, pedigree (2,2,4,5,1)
  disposal of copper
  EcoSpold01Location=CH
  production volume 90850 kg
- waste mineral wool, for final disposal: -0.000372555, -0.000492356 kg (2 entries); lognormal variance with pedigree 0.0107, pedigree (1,2,4,5,1)
  disposal of insulation material (boiler + chimney)
  EcoSpold01Location=CH
  production volume 3.64585e6 kg

## Inputs from nature
- Occupation, industrial area [natural resource, land]: 0.00393567 m2*year; = land_use*20; source Uniconfort srl 2011; lognormal variance with pedigree 0.1706, pedigree (4,5,5,5,1)
  calculated value - (transformation * lifetime of the furnace) [lifetime of the furnace: 20 years]
  Uncertainty: basic uncertainty:2;
- Transformation, to industrial area [natural resource, land]: 0.000196784 m2; source Uniconfort srl 2011; lognormal variance with pedigree 0.0752, pedigree (4,5,5,5,1)
  calculated value - calculated area necessary for the furnace installation based on specific picture in the furnace manual
- Transformation, from unspecified [natural resource, land]: 0.000196784 m2; name land_use; source Uniconfort srl 2011; lognormal variance with pedigree 0.0752, pedigree (4,5,5,5,1)
  (same comment as for Transformation, to industrial area)

## Sampling procedure
literature, furnace manual available for customers, personal communication from producer and technician, measurement during furnaces exposition

## Extrapolations
extrapolated from Italian and Swiss data

## Review by Bo Weidema 2012-02-22
This dataset has only been reviewed by one reviewer. Since this is an infrastructure dataset, this deviation from normal procedures is acceptable.

## Review by Bo Weidema 2012-02-22
Passed. Documentation adequate, inputs relevant, mass balance correct, and correct handling of capacity utilisation.
