# sawing and planing, azobe, air dried

Dataset: EcoSpold 2, unit process
Geography: RER
Time period: 2000-01-01 to 2019-12-31
Technology level: current
Classification: ISIC rev.4 ecoinvent: 1610:Sawmilling and planing of wood
Classification: EcoSpold01Categories: wooden materials/processing
Synonyms: Ekki; Lophira alata; Bongassi
Tags: ConvertedDataset
Scenario: Business-as-Usual
System model: Allocation at the point of substitution
Generated by: Frank Werner (obsolete)
Published in: Althaus H.J. 2007
Database: ecoinvent
isCopyrightProtected: true
accessRestrictedTo: 1

## General comment
This dataset represents the sawing and planing of one m3 Azobe logs. The debarked Azobe wood logs have been imported to Europe from Central Africa.

The sawing and planing process produces panels of which production data are from a sawmill in the Netherlands. The sawmill uses modern equipment and is considered representative for Europe.

Natural drying is assumed. It is also assumed that 30% of log input, including sapwood, is generated as co-product that is sold or used for energy recovery outside this process.

## Included activities start
Sawing and planing processes starting from debarked Azobe logs at sawmill in Europe.

## Included activities end
This activity ends with Azobe panels at the sawmill. The dataset includes transportation to sawmill by lorry, sawing and plaining of azobe log and natural drying.

## Geography
Wood from Central Africa, sawing in Europe

## Technology
The dataset is extrapolated from Meranti window production in the Netherlands, which thus represents the technological level of the dataset. Data may vary depending on sawing technology, specific wood density of a particular log and the type of sawn timber produced. The Azobe logs are sawn and plained into 20 mm timber boards.

## Parameters
- fraction, process water, to air: 0.55 dimensionless; name fraction_PW_to_air; lognormal variance with pedigree 0.092025, pedigree (4,4,3,2,4)
  Literature value (Statistics Canada, 2007 & Shaffer, K.H., 2008, Consumptive water use in the Great Lakes Basin, USGS) (Vionnet, S., Quantis Water Database - Technical Report, 2012).
- fraction, tap water, to air: 0.55; name fraction_TW_to_air; = fraction_PW_to_air; lognormal variance with pedigree 0.092025, pedigree (4,4,3,2,4)
  Calculated value. See comment in the other parametres present in this dataset. Tap water is considered to be always used as process water, thus process water fractions to air are applied to all tap water input flows to calculate the amount of water consumed in the processes.

## Reference product
- sawnwood, azobe from sustainable forest management, planed, air dried: 1 m3; By-product classification allocatable product; CPC 31101: Wood, sawn or chipped lengthwise, sliced or peeled, of a thickness exceeding 6 mm, of coniferous wood
  EcoSpold01Location=RER
  Reference product. Sawn and planed timber product at plant in Europe. The sawing and planing is done of azobe logs imported from Central Africa to Europe. The final product is then wooden panels.
  production volume 10119.1 m3; = 30609*0.330592352
    Estimated. The european production volume is extrapolated from the global production volume using the nominal GDP of 2005 (source: United Nations, http://data.un.org/Glossary.aspx?q=GDP+%28current+US%24%29, accessed 20130726 and 20130312).
    Gross domestic product (GDP) at current prices is GDP at prices of the current reporting period. Also known as nominal GDP.
  property carbon content, non-fossil 0.494
    C content of dry mass is 0.494 kgC/kg dry wood (ecoinvent v2.2 report 21).
  property price 265 EUR2005
    Expert judgement (Urs Luginbühl, Swiss Sawmilling industry, personal communication in June 2014). Cross-reference; FAOSTAT (accessed 20140428). The price is calculated by using data on total world import quantity (m3) and import value (1000 USD), year 2005. 109432798 m3 of Sawnwood (C) - coniferous was imported in the world in 2005. The import value was 22249842000 USD. The calculated price is thus (22249842000/109432798=203*0.8=) 164 Euro.
  property carbon content 0.494
    carbon content on a dry matter basis (reserved; not for manual entry)
  property true value 265
    allocation property applied in "true value" allocation // value calculated from revenue
  properties: water in wet mass 150 kg, wet mass 1150 kg, carbon content, fossil 0, water content 0.15, dry mass 1000 kg, carbon allocation 494 kg

## By-products
- residual wood, dry: 0 m3; source ICL/SHR Timber Research 2002; CPC 39283: Non-agglomerated wood waste and scrap; By-product classification allocatable product
  EcoSpold01Location=RER
  Estimation. Calculated based on reference.
  production volume 3035.73 m3; = Ref('45886ba4-238a-4f5d-b93a-db665a3325c1')/ Ref('9d28925d-c6d4-4279-ad2a-bdbf788d5f36')* Ref('9d28925d-c6d4-4279-ad2a-bdbf788d5f36', 'ProductionVolume')
    Unknown
    Calculated from the production volume of sawnwood, azobe from sustainable forest management, planed, air dried, 15% water on dry mass basis in proportion to the respective output amounts.
  property price 26.9 EUR2005
    Calculated based on inputs: The price of the product has been calculated as a sum of the values of the material and energy inputs for this product. This value is therefore a rough estimation. It may underestimate the real price since there are additional expenses when producing any product. These expences can include for example labour costs, treatment of waste materials and profit for the producer. Please consider carefully whether this level of data quality is acceptable for your application.
  property carbon content, non-fossil 0.494
    C content of dry mass is 0.494 kgC/kg dry wood (ecoinvent v2.2 report 9)
  property carbon content 0.494
    carbon content on a dry matter basis (reserved; not for manual entry)
  property true value 8.07
    allocation property applied in "true value" allocation // value calculated from revenue
  properties: carbon content, fossil 0, water in wet mass 97.5 kg, dry mass 650 kg, water content 0.15, wet mass 747.5 kg, carbon allocation 321.1 kg

## Inputs from technosphere
- municipal solid waste: -1.39744 kg; source ICL/SHR Timber Research 2002; lognormal variance with pedigree 0.0541, pedigree (3,4,5,3,1)
  EcoSpold01Location=CH
  Estimation. Calculated based on reference.
  production volume 14571.5 kg; = (Ref('ed616715-02d2-4868-86b3-26bd0c35427f')*-1)/ Ref('9d28925d-c6d4-4279-ad2a-bdbf788d5f36')* Ref('9d28925d-c6d4-4279-ad2a-bdbf788d5f36', 'ProductionVolume')
    Calculated from the production volume of sawnwood, azobe from sustainable forest management, planed, air dried, 15% water on dry mass basis in proportion to the respective output amounts.
  properties: carbon content, non-fossil 0.261655, wet mass 1 kg, carbon content, fossil 0.171549, water content 0.297017, dry mass 0.771 kg
  note on carbon content, non-fossil: MSW composition in tab 4.1, ecoinvent v2.2 report 13_I. C content referred to 1 kg DM
- petrol, low-sulfur: 0 kg; source ICL/SHR Timber Research 2002; pedigree (1,1,1,1,1)
  Estimation. Calculated based on data in reference. US age unclear. Possibly maintenance.
  EcoSpold01Location=RER
  properties: dry mass 1 kg, wet mass 1 kg, carbon content, fossil 0.865
- roundwood, azobe from sustainable forest management, CM, debarked: 1.26158 m3; source ICL/SHR Timber Research 2002; lognormal variance with pedigree 0.0541, pedigree (3,4,5,3,1)
  Estimation. Calculated based on data in reference.
  EcoSpold01Location=RER
  properties: dry mass 1000 kg, carbon content, non-fossil 0.494, wet mass 1300 kg, water content 0.3
  note on carbon content, non-fossil: C content of dry mass is 0.494 kgC/kg dry wood (ecoinvent v2.2 report 21).
- electricity, medium voltage: 102.702 kWh; source ICL/SHR Timber Research 2002; lognormal variance with pedigree 0.0541, pedigree (3,4,5,3,1)
  EcoSpold01Location=UCTE
  Estimation. Calculated based on data in reference.
- heat, district or industrial, natural gas: 12.5382 MJ; source ICL/SHR Timber Research 2002; lognormal variance with pedigree 0.0541, pedigree (3,4,5,3,1)
  EcoSpold01Location=RER
  Estimation. Calculated based on data in reference.
- diesel, burned in building machine: 21.3498 MJ; source ICL/SHR Timber Research 2002; lognormal variance with pedigree 0.0541, pedigree (3,4,5,3,1)
  Estimation. Calculated based on data in reference. US age unclear.
  EcoSpold01Location=GLO
- sawmill: 3.88179e-7 unit; source Werner F. 2002; lognormal variance with pedigree 0.3541, pedigree (3,4,5,3,1)
  Estimation. Based on data in reference.
  EcoSpold01Location=RER
- tap water: 204.958 kg; name tap_water_input; source ICL/SHR Timber Research 2002; lognormal variance with pedigree 0.0541, pedigree (3,4,5,3,1)
  EcoSpold01Location=RER
  Estimation. Calculated based on data in reference.
  properties: water content 2962.17, wet mass 1 kg, carbon content, fossil 0.00178991, dry mass 0.000337476 kg
  note on carbon content, fossil: Bicarbonate content is 2.93 mol/m3. CO2 content is 0.1 mol/m3 (ecoinvent v2.2 report 8, Tab 93.1).
- petrol, low-sulfur: 0.0525782, 0.00100213 kg (2 entries); source ICL/SHR Timber Research 2002; lognormal variance with pedigree 0.0541, pedigree (3,4,5,3,1)
  (same comment as for petrol, low-sulfur)

## Emissions to nature
- BOD5, Biological Oxygen Demand [water, unspecified]: 4.09529e-7 kg; source ICL/SHR Timber Research 2002; lognormal variance with pedigree 0.0941, pedigree (3,4,5,3,1)
  Estimation. Calculated based on reference.
- NMVOC, non-methane volatile organic compounds, unspecified origin [air, unspecified]: 0.0535803 kg; lognormal variance with pedigree 0.0941, pedigree (3,4,5,3,1)
  Estimation. This is an extrapolation reflecting potential emissions from maintenance using gasoline.
- Suspended solids, unspecified [water, unspecified]: 4.19233e-6 kg; source ICL/SHR Timber Research 2002; lognormal variance with pedigree 0.0941, pedigree (3,4,5,3,1)
  Estimation. Calculated based on reference.
- COD, Chemical Oxygen Demand [water, unspecified]: 8.19057e-7 kg; lognormal variance with pedigree 0.0941, pedigree (3,4,5,3,1)
  Proxy. Calculated based on reference as 2*BOD5.
- TOC, Total Organic Carbon [water, unspecified]: 3.03355e-7 kg; lognormal variance with pedigree 0.0941, pedigree (3,4,5,3,1)
  Estimation. Calculated by default as TOC (gC) = COD/2.7 (COD measured in g O2). Should more correctly be calculated from the carbon content of the specified emissions to water.
- DOC, Dissolved Organic Carbon [water, unspecified]: 3.03355e-7 kg; lognormal variance with pedigree 0.0941, pedigree (3,4,5,3,1)
  Proxy. Based on value in reference, assumed equal to TOC.
- Hydrocarbons, aliphatic, unsaturated [water, unspecified]: 1.82444e-7 kg; source ICL/SHR Timber Research 2002; lognormal variance with pedigree 0.3541, pedigree (3,4,5,3,1)
  Estimation. Calculated based on reference.
- Water [air, unspecified]: 0.112727 m3; name water_to_air_unspecified; = (tap_water_input/1000*fraction_TW_to_air); lognormal variance with pedigree 0.0807, pedigree (2,2,5,1,1)
  Calculated value based on literature values and expert opinion. See comments in the parametres' comment field.
  property fraction, origin: unspecified 0; name fraction_origin_unspecified
  property fraction, origin: fresh water 1; name fraction_origin_fresh_water
  property fraction, origin: salt water 0; name fraction_origin_salt_water
- Phenol [water, unspecified]: 8.20998e-6 kg; source ICL/SHR Timber Research 2002; lognormal variance with pedigree 0.3541, pedigree (3,4,5,3,1)
  Estimation. Calculated based on reference.
- Water [water, unspecified]: 0.0922313 m3; name water_to_water_unspecified; = (tap_water_input/1000)*(1-fraction_TW_to_air); lognormal variance with pedigree 0.0807, pedigree (2,2,5,1,1)
  (same comment as for Water)
  property dry mass 0 kg; name DM
  property fraction, origin: unspecified 0; name fraction_origin_unspecified_Ww
  property fraction, origin: fresh water 1; name fraction_origin_fresh_water_Ww
  property carbon content, fossil 0; name C_content_fossil
  property water in wet mass 1000 kg; name WWM
  property wet mass 1000 kg; name WM
  property fraction, origin: salt water 0; name fraction_origin_salt_water_Ww
  property carbon content, non-fossil 0; name C_content_non_fossil

## Sampling procedure
literature

## Extrapolations
see Technology

## Review by Roland Hischier 2011-12-01
Transfer of documentation done.

## Review by Hans-Jörg Althaus 2007-09-25
Passed

## Review by Emilia Moreno Ruiz 2013-04-12
PV set to 1
