# soybean, feed production

Dataset: EcoSpold 2, unit process
Geography: RoW
Time period: 1996-01-01 to 2019-12-31
Technology level: current
Classification: EcoSpold01Categories: agricultural means of production/feed
Classification: ISIC rev.4 ecoinvent: 0111:Growing of cereals (except rice), leguminous crops and oil seeds
Scenario: Business-as-Usual
System model: Allocation at the point of substitution
Generated by: Dominique Maxime
Published in: Nemecek, T. 2007
Database: ecoinvent
isCopyrightProtected: true
accessRestrictedTo: 1

## General comment
The inventory refers to 1 kg processed feedstuff (fresh weight), non expanded. This dataset has been created as a proxy for roasted soybeans.

## Included activities start
The dataset starts with the reception of feedstuff at the processing centre.

## Included activities end
The inventory includes the processing of feedstuff (crushing or milling, heat treatment, dosing, mixing squeezing and pelleting) and the storage of the feed mixes. It also includes water use and wastewater treatment, the transformation and use of land related to the storage buildings. No process emissions were included except heat waste from the use of electricity. Packaging is not included.

## Geography
This dataset is extrapolated from an original dataset covering the geography of Switzerland.

## Technology
This dataset is extrapolated from an original dataset which technology refers to non expanded feedstuff from protein peas and broad beans.

## Time period
Years of the publications of the main sources

## Parameters
- fraction, process water, to air: 0.9 dimensionless; lognormal variance with pedigree 0.092025, pedigree (4,4,3,2,4)
- fraction, tap water, to air: 0.9; lognormal variance with pedigree 0.092025, pedigree (4,4,3,2,4)

## Reference product
- soybean, feed: 1 kg; name REF_PRODUCT; By-product classification allocatable product; CPC 23319: Preparations used in animal feeding n.e.c.
  Processed soybeans used for animal feed (e.g. swine diet). This is not protein meal as no oil extraction is involved.
  production volume 1.12956e9 kg; name REF_PRODUCT_PV
    1996-1999 annual average of World feed beans, expressed as crop primary equivalent. This is 6.8% of World beans production. (FAOSTAT 2013, website section of Commodity balances/Crops primary equivalent (http://faostat3.fao.org/faostat-gateway/go/to/download/B/BC/E).
  property price 0.244 EUR2005; name REF_PRODUCT_price_EUR2005
    Calculated value. The price of soybean is 0.238 EUR/kg. The price for soybean, feed is calculated as the price of soybean plus the value of water and energy added to produce the soybean, feed.
  property carbon content 0.524508
    carbon content on a dry matter basis (reserved; not for manual entry)
  property true value 0.244; name REF_PRODUCT_true_value
    allocation property applied in "true value" allocation // value calculated from revenue
  properties: wet mass 1 kg, water in wet mass 0.11 kg, water content 0.123596, dry mass 0.89 kg, carbon content, non-fossil 0.524508, carbon content, fossil 0, carbon allocation 0.466812 kg

## By-products
- electricity, for reuse in municipal waste incineration only: 0 kWh; CPC 17100: Electrical energy; By-product classification allocatable product; pedigree (1,1,1,1,1)
  Net electricity generated from this waste and used in internal MSWI plant energy redistribution.
  Uncertainty: uncertainty is calculated from uncertainties in waste composition and uncertainties in energy efficiency and the uncertainty in internal energy demand
  production volume 1363.66 kWh
  property exergy 3.6 MJ; name E_el_prod_MSWI_exergy
    This exergy property is based on the exergy content of the product.
  property true value relation 3.6; name E_el_prod_MSWI_true_value_relation
    property to calculate "true value" from
  property price 0.1 EUR2005; name E_el_prod_MSWI_price_EUR2005
    Estimated to be the same price as in case of electricity, medium voltage.
  property true value 4.46783e-8
    allocation property applied in "true value" allocation // value calculated from true value relation
- heat, for reuse in municipal waste incineration only: 0 MJ; CPC 17300: Steam and hot water; By-product classification allocatable product; pedigree (1,1,1,1,1)
  Net useful heat generated from this waste and used in internal MSWI plant energy redistribution.
  Uncertainty: uncertainty is calculated from uncertainties in waste composition and uncertainties in energy efficiency and the uncertainty in internal energy demand
  production volume 9698.33 MJ
  property true value relation 0.1842; name E_th_prod_MSWI_true_value_relation
    property to calculate "true value" from
  property exergy 0.1842 MJ; name E_th_prod_MSWI_exergy
    This exergy property is based on the exergy content of the product.
  property price 0.0106 EUR2005; name E_th_prod_MSWI_price_EUR2005
    Average European district heat price from Ecoheatcool and Euroheat 2005-2006, Ecoheat Work package 1: The European heat market. Final report. 10.6 EUR/GJ i s the price of district heat. http://www.solarthermalworld.org/files/Ecoheatcool%20WP1%20Web.pdf?download
  property true value 1.64401e-8
    (same comment as for electricity, for reuse in municipal waste incineration only)
- zinc concentrate: 0 kg; CPC 14290: Other non-ferrous metal ores and concentrates (other than uranium or thorium ores and concentrates); By-product classification allocatable product
  Calculated value from the knowledge of the properties of both products.
  production volume 0.184486 kg
  property price 0.38 EUR2005; name ByP_price_EUR2005
    Temporary price data. Calculated as 90% of purchasers price based on: Zinc content in concentrate 53%. Concentrate price per kg Zn 86.5% of refined Zn price (13.5% treatment charges according to CHR Metals Limited 2005: Dynamic cost curves. http://www.minecost.com/dynamic.pdf). 2004 zinc price from USGS (2007) Mineral commodity summaries 2007. <http://minerals.usgs.gov/minerals/pubs/mcs/2007/mcs2007.pdf> [Accessed 25 May 2010]
  property zinc content 0.53; name zinc_C_zinc_concentrate
    Zinc content on a dry matter basis. Value taken from teh "zinc mine operation" /GLO dataset.
  property dry mass 1 kg; name DM_zinc_concentrate
  property carbon content 0
    carbon content on a dry matter basis (reserved; not for manual entry)
  property true value 6.05872e-12
    allocation property applied in "true value" allocation // value calculated from revenue
  properties: wet mass 1 kg, water content 0, carbon content, non-fossil 0, carbon content, fossil 0, water in wet mass 0 kg, carbon allocation 0 kg

## Inputs from technosphere
- electricity, low voltage: 0 kWh; pedigree (1,1,1,1,1)
  EcoSpold01Location=CH
  Literature Value. According to Cederberg (1998) for protein mixes from legumes such as “protein peas” and “broad beans” the energy usage is 70% of the expanded feedstuff value of InfoMil (1996) since this is not expanded. This resulted into 25 kWh electricity electricity per tonne of feedstuff.
  Cederberg C. (1998) Life cycle assessment of milk production. A comparison of conventional and organic farming. The Swedish Institute for Food and Biotechnology. SIK-Rapport 1998 No. 643, 86 p.
- building, multi-storey: 8.5e-6 m3; source UFA 2002; lognormal variance with pedigree 0.3446, pedigree (3,3,5,5,1)
  EcoSpold01Location=RER
  Estimation. The typical storage capacity of the cereal silo found in some feed processing centres in Switzerland is 10,000 tonnes, with an effective storage volume of about 80% of the building volume. With an average grain specific weight of 750 kg/m3, this gives a building volume of about 16,650 m3. Assuming that these feed processing centres process 25,000 tonnes of grain per year, the cereals will be stored for about three months before being processed.
  The largest feed processing centre in Switzerland (UFA-Biblis) has a feedstuff storage compound of 29,440 m3 (80 m length * 23 m * 16 m height) with an effective storage capacity of 4,140 tonnes (5520 palettes of 750 kg), or about 150 kg/m3 (UFA 2002). This centre processes 275,000 tonnes of concentrate feeds yearly. After processing, the feedstuff must therefore be stored for approx. one week in the processing centre before being sent to the regional storehouse.
  The average length of storage of the raw materials is set at 3 months in the calculations. The storage volume required was estimated as 1.7 m3/tonne of raw material (grain specific weight 750 kg/m3 and 80% of the building volume used for storage). The lifetime of the storage silo was assumed to be 50 years, the length of the construction phase 2 years. Land use was estimated from the height of Biblis’s storage silo (UFA 2002). Taking the height of 16 m, the area used is 0.1 m2/tonne of feedstuff for 3 months.
- heat, district or industrial, natural gas: 0 MJ; pedigree (1,1,1,1,1)
  Literature Value. See ecoinvent dataset "protein pea, feed production, Swiss integrated production" for details.
  Cederberg C. (1998) Life cycle assessment of milk production. A comparison of conventional and organic farming. The Swedish Institute for Food and Biotechnology. SIK-Rapport 1998 No. 643, 86 p.
  Salzgeber Ch. & Lörcher M. (1996) Produktökobilanz Brot unter verschiedenen Landbaubedingungen. In: Umweltverträgliche Pflanzenproduktion: Indikatoren, Bilanzierungsansätze und ihre Einbindung in Ökobilanzen. 11-12 July 1996, Wittenberg, 249-269.
  Higler J., Kühl R., Fries R., Pfeffer E. & Schulze Lammers P. (1997) Oekonomische und energetische Bewertung einer umweltgerechten Verwertung von Koppelprodukten der Ernährungsbranche und sonstigen organischen Reststoffen in der Landwirtschaft sowie Ansätze zur Entwicklung eines Recyclingkonzeptes. Forschungsberichte / Lehr- und Forschungsschwerpunkt "Umweltverträgliche und Standortgerechte Landwirtschaft" an der Landwirtschaftlichen Fakultät der Rheinischen Friedrich-Wilhelms-Universität 1364765. Bonn Institut für Landwirtschaftliche Betriebslehre.
  EcoSpold01Location=RER
- wastewater, average: 0 m3; name WW; source Salzgeber Ch. 1996; pedigree (1,1,1,1,1)
  Literature Value. Salzgeber & Lörcher (1996) give the total energy and water consumption of a mill processing about 30,000 tonnes of cereals per year. The mill consumes 1800 m3 water and produces 1200 m3 wastewater per year. Water consumption and wastewater output was completed from Salzgeber and Lörcher (1996), namely 56 litres tap water and 38 litres wastewater per tonne of feedstuff produced.
  EcoSpold01Location=CH
  production volume 0 m3
    Calculated from the production volume of soybean, feed, in proportion to the respective output amounts.
  property price 0 EUR2005; name WW_price_EUR2005
  properties: wet mass 1000 kg, carbon content, non-fossil 0.194039, dry mass 0.346837 kg, water content 2882.2
  note on carbon content, non-fossil: 0.0673 kg TOC/m3 (Tab A.17, ecoinvent v2.2 report 13_I). TOC was considered as Total Carbon.
- tap water: 0 kg; source Salzgeber Ch. 1996; pedigree (1,1,1,1,1)
  Literature Value. Salzgeber & Lörcher (1996) give the total energy and water consumption of a mill processing about 30,000 tonnes of cereals per year. The mill consumes 1800 m3 water and produces 1200 m3 wastewater per year. Water consumption and wastewater output was completed from Salzgeber and Lörcher (1996), namely 56 litres tap water and 38 litres wastewater per tonne of feedstuff produced.
  properties: dry mass 0.000337476 kg, carbon content, fossil 0.00178991, wet mass 1 kg, water content 2962.17
  note on carbon content, fossil: Bicarbonate content is 2.93 mol/m3. CO2 content is 0.1 mol/m3 (ecoinvent v2.2 report 8, Tab 93.1).
- soybean: 0 kg; pedigree (1,1,1,1,1)
  Grain input for feed production. Due to lack of representative data, no loss is considered.
  properties: water content 0.123596, carbon content, non-fossil 0.524508, wet mass 1 kg, dry mass 0.89 kg
- electricity, low voltage: 0.000268703, 4.71272e-5, 0.00106885, 0.000375884, 0.00077496, 0.0117196, 0.00389495, 0.00193177, 0.0049181 kWh (9 entries); lognormal variance with pedigree 0.0612, pedigree (2,3,5,5,3)
  (same comment as for electricity, low voltage)
- heat, district or industrial, natural gas: 0.0273055, 0.0676945 MJ (2 entries); lognormal variance with pedigree 0.0612, pedigree (2,3,5,5,3)
  (same comment as for heat, district or industrial, natural gas)
- wastewater, average: -3.70958e-6, -3.42904e-5 m3 (2 entries); source Salzgeber Ch. 1996; lognormal variance with pedigree 0.1246, pedigree (3,3,5,5,4)
  (same comment as for wastewater, average)
  production volume 42923.1 m3
- tap water: 0.022437, 0.000523424, 0.000104128, 0.0026257, 6.83068e-5, 0.000194298, 0.0300472 kg (7 entries); source Salzgeber Ch. 1996; lognormal variance with pedigree 0.1246, pedigree (3,3,5,5,4)
  (same comment as for tap water)
- soybean: 0.265445, 0.734555 kg (2 entries); lognormal variance with pedigree 0.06, pedigree (1,1,5,5,3)
  (same comment as for soybean)

## Inputs from nature
- Occupation, construction site [natural resource, land]: 2e-6 m2*year; source UFA 2002; lognormal variance with pedigree 0.0846, pedigree (3,3,5,5,1)
  Estimation. Corresponds to land use Transformation*2 years (the length of the construction phase is 2 years).
- Occupation, industrial area [natural resource, land]: 5e-5 m2*year; source UFA 2002; lognormal variance with pedigree 0.0846, pedigree (3,3,5,5,1)
  Estimation. Corresponds to 0.2m2/tonne (because the total area occupied as “industrial area” was estimated as twice as high, namely 0.2 m2/tonne) multiplied by 3 months (because the average length of storage of the raw materials is set at 3 months in the calculations).
- Transformation, from unspecified [natural resource, land]: 1e-6 m2; source UFA 2002; lognormal variance with pedigree 0.1646, pedigree (3,3,5,5,1)
  Estimation. Corresponds to occupation industrial area/50 years (the lifetime of the storage silo was assumed to be 50 years).
- Transformation, to industrial area [natural resource, land]: 1e-6 m2; source UFA 2002; lognormal variance with pedigree 0.1646, pedigree (3,3,5,5,1)
  (same comment as for Transformation, from unspecified)

## Emissions to nature
- Water [air, unspecified]: 1.8e-5 m3; lognormal variance with pedigree 0.0827, pedigree (2,2,5,5,1)
  Emission calculated from tap water input and wastewater generation for water balance.

## Sampling procedure
Data based on literature, trade statistics and information from feedstuff processing enterprises.

## Extrapolations
This dataset has been extrapolated from an dataset for "protein peas, feed production" covering the geography GLO and the technology of Swiss Integrated Production (SIP), which was already extrapolated from the geography CH and the technology SIP with uncertainty adjustments. Production volume has been adjusted. The technology of grain processing can be assumed the same for conventional grain as for SIP grain, hence no change is made to the technology-related uncertainty index. Furthermore, the geography-related uncertainty index still remains to "5" since data originate from a CH geography. Note that exchange properties of the reference product (carbon and water contents) are the same as the input grain, as it is also the case for the original dataset. No loss of soybean is considered, due to lack of comprehensive data.
