# treatment of waste packaging paper, unsanitary landfill, hyperarid infiltration class (-250mm)

Dataset: EcoSpold 2, unit process
Geography: GLO
Time period: 2006-01-01 to 2019-12-31
Technology level: current
Classification: ISIC rev.4 ecoinvent: 3821:Treatment and disposal of non-hazardous waste
Synonyms: municipal waste landfill
Scenario: Business-as-Usual
System model: Allocation at the point of substitution
Share of production covered: 1 %
Generated by: Avraam Symeonidis
Database: ecoinvent
isCopyrightProtected: true
accessRestrictedTo: 1

## General comment
This dataset represents the activity of waste disposal of waste packaging paper in a unsanitary landfill. Recommended use of this dataset: For packaging paper, which goes to disposal as part of managed communal waste mixture. Larger amounts of *already separated* packaging paper could go to recycling, depending on country-specific situation. // Waste composition (wet, in ppm): upper heating value 16.77 MJ/kg; lower heating value 14.12 MJ/kg; H2O 110980; O 377790; H 53851; C 403520; S 1381.8; N 4098.6; P 124.15; B 19.101; Cl 1892.4; Br n.a.; F 21.631; I n.a.; Ag n.a.; As 2.2761; Ba 125.43; Cd 1.8323; Co 0.71627; Cr 14.922; Cu 64.327; Hg 0.14537; Mn 39.49; Mo 4.7751; Ni 10.235; Pb 79.273; Sb 0.7879; Se 2.8651; Sn n.a.; V n.a.; Zn 132.49; Be 1.0824; Sc n.a.; Sr 64.751; Ti 191.01; Tl 1.9101; W n.a.; Si 21297; Fe 1305; Ca 3820.1; Al 12415; K 955.03; Mg 4775.1; Na 1020.9; . // Share of carbon in waste that is biogenic 100%. Share of metals in waste not oxidised and bulk-recyclable (exclude very small or thin parts) Iron: 0%; Alu: 0%; Copper: 0%. Overall degradability of waste during 100 years: 27%.

## Included activities start
from final waste deposition (without transports to the site)

## Included activities end
Waste-specific short-term emissions to air via landfill gas and landfill leachate. Waste-specific long-term emissions from landfill.

## Geography
Given name of landfill location is 'infiltration class 1 hyperarid (2018)'. Landfill site with mean annual temperature (MAT) of 8 degC, mean annual precipitation (MAP) of 350 mm/year, and net infiltration of -250 mm/year. Negative infiltration means that leachate flow is reversed and flows upward to the surface, where water is evaporated and dissolved solids become solid evaporites.
Climate adjustments result in an alpha t (temperature) for permafrost areas of 0.999. Total climate adjustments with alpha pt of 0.999.

## Technology
This is an inventory for an unsanitary, sub-controlled landfill for municipal solid waste. Ultimate average landfill height is 15 meters. Operation phase duration is 25 years.Percentage of landfill gas directly emitted is 100w%.
Leachate of the landfill is not treated. Leachate flow is upward to the surface due to net negative infiltration. No leachate treatment can be performed. Based on average waste composition and climate data the end of carbonate phase is estimated to be reached 6681 years after waste deposition. Arid conditions at this location prompt formation of evaporites from landfill contents which are partially eroded by wind. It is assumed that 10% of these evaporites are eroded by wind and airborne. Initial decay in the first 100 years of this waste results in a wind erosion rate corresponding to 335.6 g/m2.year and long-term decay corresponds to wind erosion of 16.11 g/m2.year.

## Reference product
- waste packaging paper: -1 kg; CPC 39240: Waste and scrap of paper or paperboard; By-product classification Recyclable; pedigree (1,1,1,1,1)
  main reference product of this activity (supply of disposal service).
  Uncertainty: Uncertainty is not adjusted, as this is the refence product
  production volume 1 kg
    The amount of the annual production volume is a placeholder value. The contribution of this technology to the different local markets can be found in the markets themselves.
  property price 0.1 EUR2005
    For paper and board waste the price, in 2005, according to [http://ec.europa.eu/eurostat] is about 1 EUR/kg corresponding to a purchase price of 0.099 similar to the price of UN comodittie: Waste, scrap of paper, board, nes (including unsorted).
  property carbon content 0.45389
    carbon content on a dry matter basis (reserved; not for manual entry)
  properties: thallium content 2.1485e-6, magnesium content 0.0053712, wet mass 1 kg, dry mass 0.88902 kg, zinc content 0.00014903, potassium content 0.0010742, lead content 8.9169e-5, carbon content, non-fossil 0.45389, titanium content 0.00021485, water content 0.12483, sodium content 0.0011484, calcium content 0.004297, strontium content 7.2834e-5, selenium content 3.2227e-6, beryllium content 1.2175e-6, water in wet mass 0.11098 kg, silicon content 0.023956, aluminium content 0.013965, iron content 0.001468, antimony content 8.8625e-7, heating value, net 14.12 MJ, chlorine content 0.0021286, fluorine content 2.4332e-5, phosphorus content 0.00013965, oxygen content 0.42495, cobalt content 8.0568e-7, boron content 2.1485e-5, molybdenum content 5.3712e-6, sulfur content 0.0015543, copper content 7.2357e-5, heating value, gross 16.768 MJ, nickel content 1.1512e-5, barium content 0.00014108, manganese content 4.442e-5, cadmium content 2.061e-6, mercury content 1.6352e-7, chromium content 1.6785e-5, arsenic content 2.5603e-6, nitrogen content 0.0046102, hydrogen content 0.060574, carbon allocation 0.403517 kg

## Inputs from technosphere
- excavation, skid-steer loader: 0.00031708 m3; lognormal variance with pedigree 0.082256, pedigree (1,1,3,1,1)
  application of daily cover.
  Uncertainty: Uncertainty calculated from uncertainty in base parameters.
- diesel, burned in building machine: 0.046738 MJ; lognormal variance with pedigree 0.082256, pedigree (1,1,3,1,1)
  for waste distribution and compaction.
  Uncertainty: Uncertainty calculated from uncertainty in base parameters.

## Emissions to nature
- Titanium [air, low population density, long-term]: 1.8843e-5 kg; lognormal variance with pedigree 0.22099, pedigree (1,1,3,1,1)
  burden from windblown long-term leachate evaporite in arid climates.
  Uncertainty: Uncertainty calculated from unertainty of the waste composition of this waste, uncertainty in waste decomposition and short-term leaching in landfill
- Manganese [air, non-urban air or from high stacks]: 1.2227e-6 kg; lognormal variance with pedigree 0.28128, pedigree (1,1,3,1,1)
  burden from direct release or incineration of landfill biogas; or windblown leachate evaporite in arid climates.
  Uncertainty: Uncertainty calculated from unertainty of the waste composition of this waste, uncertainty in waste decomposition and short-term leaching in landfill
- Zinc [soil, industrial]: 0.00011924 kg; lognormal variance with pedigree 0.22865, pedigree (1,1,3,1,1)
  burden from leachate evaporite in arid climates deposited on landflill surface.
  Uncertainty: Uncertainty calculated from unertainty of the waste composition of this waste, uncertainty in waste decomposition and short-term leaching in landfill
- Silicon [air, low population density, long-term]: 6.329e-5 kg; lognormal variance with pedigree 0.84261, pedigree (1,1,3,1,1)
  (same comment as for Titanium)
- Chromium [air, non-urban air or from high stacks]: 4.5983e-9 kg; lognormal variance with pedigree 0.43128, pedigree (1,1,3,1,1)
  (same comment as for Manganese)
- Lead [soil, industrial]: 7.1345e-5 kg; lognormal variance with pedigree 0.24957, pedigree (1,1,3,1,1)
  (same comment as for Zinc)
- Zinc [air, low population density, long-term]: 1.308e-5 kg; lognormal variance with pedigree 0.23315, pedigree (1,1,3,1,1)
  (same comment as for Titanium)
- Copper [air, non-urban air or from high stacks]: 8.5189e-9 kg; lognormal variance with pedigree 0.40948, pedigree (1,1,3,1,1)
  (same comment as for Manganese)
- Nickel [soil, industrial]: 9.2112e-6 kg; lognormal variance with pedigree 0.31172, pedigree (1,1,3,1,1)
  (same comment as for Zinc)
- Beryllium [air, low population density, long-term]: 1.0654e-7 kg; lognormal variance with pedigree 0.3918, pedigree (1,1,3,1,1)
  (same comment as for Titanium)
- Cobalt [air, non-urban air or from high stacks]: 6.2239e-9 kg; lognormal variance with pedigree 0.4367, pedigree (1,1,3,1,1)
  (same comment as for Manganese)
- Molybdenum [soil, industrial]: 2.2512e-6 kg; lognormal variance with pedigree 0.35144, pedigree (1,1,3,1,1)
  (same comment as for Zinc)
- Strontium [air, low population density, long-term]: 6.3735e-6 kg; lognormal variance with pedigree 0.25698, pedigree (1,1,3,1,1)
  (same comment as for Titanium)
- Arsenic [air, non-urban air or from high stacks]: 1.257e-8 kg; lognormal variance with pedigree 0.36094, pedigree (1,1,3,1,1)
  (same comment as for Manganese)
- Manganese [soil, industrial]: 3.5539e-5 kg; lognormal variance with pedigree 0.19173, pedigree (1,1,3,1,1)
  (same comment as for Zinc)
- Selenium [air, low population density, long-term]: 1.0435e-7 kg; lognormal variance with pedigree 0.42251, pedigree (1,1,3,1,1)
  (same comment as for Titanium)
- Cadmium [air, non-urban air or from high stacks]: 9.274e-9 kg; lognormal variance with pedigree 0.39108, pedigree (1,1,3,1,1)
  (same comment as for Manganese)
- Mercury [soil, industrial]: 1.2987e-7 kg; lognormal variance with pedigree 0.44724, pedigree (1,1,3,1,1)
  (same comment as for Zinc)
- Antimony [air, low population density, long-term]: 1.0657e-8 kg; lognormal variance with pedigree 0.64956, pedigree (1,1,3,1,1)
  (same comment as for Titanium)
- Barium [air, non-urban air or from high stacks]: 3.8835e-6 kg; lognormal variance with pedigree 0.24293, pedigree (1,1,3,1,1)
  (same comment as for Manganese)
- Cobalt [soil, industrial]: 6.4463e-7 kg; lognormal variance with pedigree 0.3697, pedigree (1,1,3,1,1)
  (same comment as for Zinc)
- Lead [air, low population density, long-term]: 7.9147e-6 kg; lognormal variance with pedigree 0.25024, pedigree (1,1,3,1,1)
  (same comment as for Titanium)
- Hydrogen chloride [air, non-urban air or from high stacks]: 0.00014703 kg; lognormal variance with pedigree 0.12025, pedigree (1,1,3,1,1)
  (same comment as for Manganese)
- Copper [soil, industrial]: 5.7894e-5 kg; lognormal variance with pedigree 0.25662, pedigree (1,1,3,1,1)
  (same comment as for Zinc)
- Molybdenum [air, low population density, long-term]: 2.3656e-7 kg; lognormal variance with pedigree 0.37324, pedigree (1,1,3,1,1)
  (same comment as for Titanium)
- Hydrogen fluoride [air, non-urban air or from high stacks]: 2.3681e-6 kg; lognormal variance with pedigree 0.31598, pedigree (1,1,3,1,1)
  (same comment as for Manganese)
- Chromium [soil, industrial]: 1.2722e-7 kg; lognormal variance with pedigree 1.8876, pedigree (1,1,3,1,1)
  (same comment as for Zinc)
- Nickel [air, low population density, long-term]: 1.0074e-6 kg; lognormal variance with pedigree 0.31822, pedigree (1,1,3,1,1)
  (same comment as for Titanium)
- Boron [air, non-urban air or from high stacks]: 1.9101e-6 kg; lognormal variance with pedigree 0.29755, pedigree (1,1,3,1,1)
  (same comment as for Manganese)
- Arsenic [soil, industrial]: 2.0471e-6 kg; lognormal variance with pedigree 0.34775, pedigree (1,1,3,1,1)
  (same comment as for Zinc)
- Manganese [air, low population density, long-term]: 2.7291e-6 kg; lognormal variance with pedigree 0.27453, pedigree (1,1,3,1,1)
  (same comment as for Titanium)
- Nitrate [air, non-urban air or from high stacks]: 0.0011438 kg; lognormal variance with pedigree 0.1228, pedigree (1,1,3,1,1)
  burden from windblown leachate evaporite in arid climates.
  Uncertainty: Uncertainty calculated from unertainty of the waste composition of this waste, uncertainty in waste decomposition and short-term leaching in landfill
- Cadmium [soil, industrial]: 1.6485e-6 kg; lognormal variance with pedigree 0.35503, pedigree (1,1,3,1,1)
  (same comment as for Zinc)
- Mercury [air, low population density, long-term]: 1.4161e-8 kg; lognormal variance with pedigree 0.45616, pedigree (1,1,3,1,1)
  (same comment as for Titanium)
- Phosphorus [air, non-urban air or from high stacks]: 1.8721e-7 kg; lognormal variance with pedigree 0.3144, pedigree (1,1,3,1,1)
  (same comment as for Manganese)
- Barium [soil, industrial]: 0.00011288 kg; lognormal variance with pedigree 0.1615, pedigree (1,1,3,1,1)
  (same comment as for Zinc)
- Cobalt [air, low population density, long-term]: 6.5417e-8 kg; lognormal variance with pedigree 0.40529, pedigree (1,1,3,1,1)
  (same comment as for Titanium)
- Nitrogen oxides [air, non-urban air or from high stacks]: 1.5159e-6 kg; lognormal variance with pedigree 0.18235, pedigree (1,1,3,1,1)
  burden from direct release or incineration of landfill biogas.
  Uncertainty: Uncertainty calculated from unertainty of the waste composition of this waste, uncertainty in waste decomposition and short-term leaching in landfill
- Chloride [soil, industrial]: 0.0016869 kg; lognormal variance with pedigree 0.094566, pedigree (1,1,3,1,1)
  (same comment as for Zinc)
- Copper [air, low population density, long-term]: 6.4242e-6 kg; lognormal variance with pedigree 0.25719, pedigree (1,1,3,1,1)
  (same comment as for Titanium)
- Particulates, < 2.5 um [air, non-urban air or from high stacks]: 0.0004475 kg; lognormal variance with pedigree 0.16421, pedigree (1,1,3,1,1)
  (same comment as for Manganese)
- Fluoride [soil, industrial]: 1.748e-5 kg; lognormal variance with pedigree 0.28513, pedigree (1,1,3,1,1)
  (same comment as for Zinc)
- Chromium [air, low population density, long-term]: 9.5488e-9 kg; lognormal variance with pedigree 1.9002, pedigree (1,1,3,1,1)
  (same comment as for Titanium)
- Sulfate [air, non-urban air or from high stacks]: 4.1629e-5 kg; lognormal variance with pedigree 0.18586, pedigree (1,1,3,1,1)
  (same comment as for Nitrate)
- Phosphorus [soil, industrial]: 9.085e-6 kg; lognormal variance with pedigree 0.64755, pedigree (1,1,3,1,1)
  (same comment as for Zinc)
- Arsenic [air, low population density, long-term]: 2.1644e-7 kg; lognormal variance with pedigree 0.36766, pedigree (1,1,3,1,1)
  (same comment as for Titanium)
- Sulfur dioxide [air, non-urban air or from high stacks]: 4.8627e-5 kg; lognormal variance with pedigree 0.23056, pedigree (1,1,3,1,1)
  (same comment as for Nitrogen oxides)
- Nitrogen [soil, industrial]: 0.0035288 kg; lognormal variance with pedigree 0.076013, pedigree (1,1,3,1,1)
  (same comment as for Zinc)
- Cadmium [air, low population density, long-term]: 1.7448e-7 kg; lognormal variance with pedigree 0.37473, pedigree (1,1,3,1,1)
  (same comment as for Titanium)
- Particulates, > 10 um [air, non-urban air or from high stacks]: 0.0011187 kg; lognormal variance with pedigree 0.099053, pedigree (1,1,3,1,1)
  (same comment as for Manganese)
- Boron [soil, industrial]: 1.719e-5 kg; lognormal variance with pedigree 0.29755, pedigree (1,1,3,1,1)
  (same comment as for Zinc)
- Barium [air, low population density, long-term]: 8.6679e-6 kg; lognormal variance with pedigree 0.23608, pedigree (1,1,3,1,1)
  (same comment as for Titanium)
- Particulates, > 2.5 um, and < 10um [air, non-urban air or from high stacks]: 0.00067124 kg; lognormal variance with pedigree 0.11881, pedigree (1,1,3,1,1)
  (same comment as for Manganese)
- Sulfur [soil, industrial]: 0.0012217 kg; lognormal variance with pedigree 0.1334, pedigree (1,1,3,1,1)
  (same comment as for Zinc)
- Boron [air, low population density, long-term]: 1.9101e-15 kg; lognormal variance with pedigree 0.778, pedigree (1,1,3,1,1)
  (same comment as for Titanium)
- Carbon dioxide, non-fossil [air, non-urban air or from high stacks]: 0.17063 kg; lognormal variance with pedigree 0.002, pedigree (1,1,3,1,1)
  (same comment as for Nitrogen oxides)
- Heat, waste [water, ground-, long-term]: 12.247 MJ; lognormal variance with pedigree 0.022384, pedigree (1,1,3,1,1)
  burden from long-term decomposition of waste (>100a).
  Uncertainty: Uncertainty calculated from unertainty of the waste composition of this waste, uncertainty in waste decomposition and short-term leaching in landfill
- Hydrogen chloride [air, low population density, long-term]: 5.8926e-5 kg; lognormal variance with pedigree 0.14995, pedigree (1,1,3,1,1)
  (same comment as for Titanium)
- Methane, non-fossil [air, non-urban air or from high stacks]: 0.078813 kg; lognormal variance with pedigree 0.030477, pedigree (1,1,3,1,1)
  (same comment as for Nitrogen oxides)
- Carbon [soil, industrial]: 0.26808 kg; lognormal variance with pedigree 0.0086113, pedigree (1,1,3,1,1)
  (same comment as for Zinc)
- Hydrogen fluoride [air, low population density, long-term]: 1.8994e-6 kg; lognormal variance with pedigree 0.29373, pedigree (1,1,3,1,1)
  (same comment as for Titanium)
- Occupation, dump site [natural resource, land]: 0.0023333 m2*year; lognormal variance with pedigree 0.082256, pedigree (1,1,3,1,1)
  for landfill operation phase and spontaneous renaturation.
  Uncertainty: Uncertainty calculated from uncertainty in base parameters.
- Heat, waste [soil, industrial]: 2.758 MJ; lognormal variance with pedigree 0.034671, pedigree (1,1,3,1,1)
  burden from short-term decomposition of waste (0-100a).
  Uncertainty: Uncertainty calculated from unertainty of the waste composition of this waste, uncertainty in waste decomposition and short-term leaching in landfill
- Nitrate [air, low population density, long-term]: 0.00059256 kg; lognormal variance with pedigree 0.12721, pedigree (1,1,3,1,1)
  (same comment as for Titanium)
- Sodium [air, non-urban air or from high stacks]: 0.00010232 kg; lognormal variance with pedigree 0.16483, pedigree (1,1,3,1,1)
  (same comment as for Manganese)
- Phosphorus [air, low population density, long-term]: 8.2224e-7 kg; lognormal variance with pedigree 0.69423, pedigree (1,1,3,1,1)
  (same comment as for Titanium)
- Magnesium [air, non-urban air or from high stacks]: 7.966e-5 kg; lognormal variance with pedigree 0.13516, pedigree (1,1,3,1,1)
  (same comment as for Manganese)
- Particulates, < 2.5 um [air, low population density, long-term]: 0.012868 kg; lognormal variance with pedigree 0.12493, pedigree (1,1,3,1,1)
  (same comment as for Titanium)
- Potassium [air, non-urban air or from high stacks]: 1.8877e-5 kg; lognormal variance with pedigree 0.18329, pedigree (1,1,3,1,1)
  (same comment as for Manganese)
- Particulates, > 10 um [air, low population density, long-term]: 0.032171 kg; lognormal variance with pedigree 0.059768, pedigree (1,1,3,1,1)
  (same comment as for Titanium)
- Iron [air, non-urban air or from high stacks]: 4.846e-7 kg; lognormal variance with pedigree 0.27777, pedigree (1,1,3,1,1)
  (same comment as for Manganese)
- Particulates, > 2.5 um, and < 10um [air, low population density, long-term]: 0.019302 kg; lognormal variance with pedigree 0.079522, pedigree (1,1,3,1,1)
  (same comment as for Titanium)
- Aluminium [air, non-urban air or from high stacks]: 1.6778e-5 kg; lognormal variance with pedigree 0.16874, pedigree (1,1,3,1,1)
  (same comment as for Manganese)
- Sulfate [air, low population density, long-term]: 0.00036561 kg; lognormal variance with pedigree 0.15618, pedigree (1,1,3,1,1)
  (same comment as for Titanium)
- Calcium [air, non-urban air or from high stacks]: 1.3447e-5 kg; lognormal variance with pedigree 0.17799, pedigree (1,1,3,1,1)
  (same comment as for Manganese)
- Sodium [soil, industrial]: 0.0009186 kg; lognormal variance with pedigree 0.16573, pedigree (1,1,3,1,1)
  (same comment as for Zinc)
- Silicon [air, non-urban air or from high stacks]: 2.878e-5 kg; lognormal variance with pedigree 0.15323, pedigree (1,1,3,1,1)
  (same comment as for Manganese)
- Magnesium [soil, industrial]: 0.0042974 kg; lognormal variance with pedigree 0.089827, pedigree (1,1,3,1,1)
  (same comment as for Zinc)
- Thallium [air, non-urban air or from high stacks]: 3.002e-9 kg; lognormal variance with pedigree 0.44954, pedigree (1,1,3,1,1)
  (same comment as for Manganese)
- Calcium [soil, industrial]: 0.0034381 kg; lognormal variance with pedigree 0.11621, pedigree (1,1,3,1,1)
  (same comment as for Zinc)
- Strontium [air, non-urban air or from high stacks]: 1.0177e-7 kg; lognormal variance with pedigree 0.33339, pedigree (1,1,3,1,1)
  (same comment as for Manganese)
- Aluminium [soil, industrial]: 0.011174 kg; lognormal variance with pedigree 0.085186, pedigree (1,1,3,1,1)
  (same comment as for Zinc)
- Titanium [air, non-urban air or from high stacks]: 2.5812e-7 kg; lognormal variance with pedigree 0.30185, pedigree (1,1,3,1,1)
  (same comment as for Manganese)
- Potassium [soil, industrial]: 0.00085948 kg; lognormal variance with pedigree 0.12659, pedigree (1,1,3,1,1)
  (same comment as for Zinc)
- Beryllium [air, non-urban air or from high stacks]: 1.7012e-9 kg; lognormal variance with pedigree 0.46797, pedigree (1,1,3,1,1)
  (same comment as for Manganese)
- Silicon [soil, industrial]: 0.00082799 kg; lognormal variance with pedigree 0.7906, pedigree (1,1,3,1,1)
  (same comment as for Zinc)
- Sodium [air, low population density, long-term]: 1.0209e-13 kg; lognormal variance with pedigree 0.64618, pedigree (1,1,3,1,1)
  (same comment as for Titanium)
- Selenium [air, non-urban air or from high stacks]: 8.168e-9 kg; lognormal variance with pedigree 0.41968, pedigree (1,1,3,1,1)
  (same comment as for Manganese)
- Iron [soil, industrial]: 0.0011745 kg; lognormal variance with pedigree 0.15666, pedigree (1,1,3,1,1)
  (same comment as for Zinc)
- Potassium [air, low population density, long-term]: 7.6669e-5 kg; lognormal variance with pedigree 0.16846, pedigree (1,1,3,1,1)
  (same comment as for Titanium)
- Zinc [air, non-urban air or from high stacks]: 1.6964e-7 kg; lognormal variance with pedigree 0.31569, pedigree (1,1,3,1,1)
  (same comment as for Manganese)
- Thallium [soil, industrial]: 1.719e-6 kg; lognormal variance with pedigree 0.36633, pedigree (1,1,3,1,1)
  (same comment as for Zinc)
- Magnesium [air, low population density, long-term]: 0.00039803 kg; lognormal variance with pedigree 0.11685, pedigree (1,1,3,1,1)
  (same comment as for Titanium)
- Nickel [air, non-urban air or from high stacks]: 1.6086e-8 kg; lognormal variance with pedigree 0.3945, pedigree (1,1,3,1,1)
  (same comment as for Manganese)
- Titanium [soil, industrial]: 0.0001719 kg; lognormal variance with pedigree 0.21642, pedigree (1,1,3,1,1)
  (same comment as for Zinc)
- Iron [air, low population density, long-term]: 0.00013002 kg; lognormal variance with pedigree 0.15774, pedigree (1,1,3,1,1)
  (same comment as for Titanium)
- Molybdenum [air, non-urban air or from high stacks]: 1.3613e-8 kg; lognormal variance with pedigree 0.40296, pedigree (1,1,3,1,1)
  (same comment as for Manganese)
- Strontium [soil, industrial]: 5.8275e-5 kg; lognormal variance with pedigree 0.25121, pedigree (1,1,3,1,1)
  (same comment as for Zinc)
- Aluminium [air, low population density, long-term]: 0.0012248 kg; lognormal variance with pedigree 0.08743, pedigree (1,1,3,1,1)
  (same comment as for Titanium)
- Lead [air, non-urban air or from high stacks]: 1.2638e-8 kg; lognormal variance with pedigree 0.3963, pedigree (1,1,3,1,1)
  (same comment as for Manganese)
- Beryllium [soil, industrial]: 9.7412e-7 kg; lognormal variance with pedigree 0.38464, pedigree (1,1,3,1,1)
  (same comment as for Zinc)
- Calcium [air, low population density, long-term]: 0.00036859 kg; lognormal variance with pedigree 0.12344, pedigree (1,1,3,1,1)
  (same comment as for Titanium)
- Antimony [air, non-urban air or from high stacks]: 2.2462e-9 kg; lognormal variance with pedigree 0.4616, pedigree (1,1,3,1,1)
  (same comment as for Manganese)
- Selenium [soil, industrial]: 1.0125e-6 kg; lognormal variance with pedigree 0.39361, pedigree (1,1,3,1,1)
  (same comment as for Zinc)
- Thallium [air, low population density, long-term]: 1.8801e-7 kg; lognormal variance with pedigree 0.37333, pedigree (1,1,3,1,1)
  (same comment as for Titanium)
- Mercury [air, non-urban air or from high stacks]: 1.3427e-9 kg; lognormal variance with pedigree 0.47432, pedigree (1,1,3,1,1)
  (same comment as for Manganese)
- Antimony [soil, industrial]: 1.1608e-7 kg; lognormal variance with pedigree 0.58971, pedigree (1,1,3,1,1)
  (same comment as for Zinc)

## Extrapolations
This dataset has been extrapolated from year 2012 to the year of the calculation (2019). The uncertainty has been adjusted accordingly.
