# wheat bran to generic market for energy feed

Dataset: EcoSpold 2, unit process
Geography: RoW
Time period: 2016-01-01 to 2019-12-31
Technology level: current
Classification: ISIC rev.4 ecoinvent: 108:Manufacture of prepared animal feeds
Scenario: Business-as-Usual
System model: Allocation at the point of substitution
Generated by: Avraam Symeonidis
Database: ecoinvent
isCopyrightProtected: true
accessRestrictedTo: 1

## General comment
This activity is a linking activity, i.e. it connects wheat bran with generic protein feed market. Wheat bran is used partially as a feed for animals, thus traded on generic feed market with other protein - containing products.

## Included activities start
The activity starts with the reception of wheat bran.

## Included activities end
This linking activity has the wheat bran as an input (negative reference product) and protein and energy feed as outputs.

## Geography
Data represent a Global situation.

## Technology
The data are intended to reflect current equipment and processes on a Global level.

## Parameters
- fraction_to_generic_market: 0.9 % (obsolete); lognormal variance with pedigree 0.108, pedigree (4,1,1,1,1)
  It is assumed that 90% of maize grain is traded on generic protein feed market, i.e. its buyers do not care what type of protein feed they are buying. Remaining 10% of the production volume (PV) is assumed to be used for uses, where specific type of protein feed is required and cannot be substituted by any other protein feed.

## Reference product
- energy feed, gross: 1 MJ; name ref_product; = wheat_bran_input*wheat_bran_inpu_gross_E_feed_per_kg_DM_0*wheat_bran_input_DM; CPC 23319: Preparations used in animal feeding n.e.c.; By-product classification allocatable product
  Calculated based on literature values for "wheat bran" (Feedipedia, 2015), which reports a crude protein content of 17.3% of dry matter and a gross energy content equates to 18.9 MJ/kg dry matter of fed, with a dry matter content equates 87% of fed. Reference(s): Feedipedia (2015) Wheat Bran, Animal feed resources information system, Available at: https://www.feedipedia.org/node/726. (Accessed November 2017)
  production volume 3.26861e11 MJ; name ref_product_pv; = 99392782200 *0.2* wheat_bran_input_DM*wheat_bran_inpu_gross_E_feed_per_kg_DM_0
    Calculcated based on the amount of wheat bran produced within the geography of this dataset in the database. It is further assumed that 20% of the wheat bran is actually entering the animal feed market.
  property price 0.0108 EUR2005
    Based on energy feed, gross content in soybean meal and prices per kg of soybean meal. Assumed soybean meal is the most used feed. Soybean meal 2004 prices for World import/export data (tonnes and US$) from FaoStat statistics (http://faostat.fao.org/site/535/default.aspx#ancor, TRADE)- [Accessed 24 May 2010]. See calculations for protein /energy content
  property carbon content 0
    carbon content on a dry matter basis (reserved; not for manual entry)
  property true value 0.177584; name ref_product_true_value
    allocation property applied in "true value" allocation // value calculated from revenue
  properties: wet mass 1 kg, water in wet mass 0 kg, dry mass 1 kg, carbon content, fossil 0, water content 0, carbon content, non-fossil 0, carbon allocation 0 kg

## By-products
- protein feed, 100% crude: 0 kg; name by_product; = wheat_bran_input* wheat_bran_inpu_protein_feed_per_kg_DM_0*wheat_bran_input_DM; By-product classification allocatable product; CPC 23319: Preparations used in animal feeding n.e.c.; pedigree (1,1,1,1,1)
  (same comment as for energy feed, gross)
  production volume 2.9919e9 kg; = ref_product_pv* by_product/ ref_product
    Calculated from production volume of reference product using the relative outputs.
  property price 0.424 EUR2005
    Based on protein content and energy feed, gross content in soybean meal and prices per kg of soybean meal. Assumed soybean meal is the most used feed. Soybean meal 2004 prices for World import/export data (tonnes and US$) from FaoStat statistics (http://faostat.fao.org/site/535/default.aspx#ancor, TRADE)- [Accessed 24 May 2010]. See calculations for protein /energy content
  property carbon content 0.53
    carbon content on a dry matter basis (reserved; not for manual entry)
  property true value 0.0638162; name by_product_true_value
    allocation property applied in "true value" allocation // value calculated from revenue
  properties: dry mass 1 kg, carbon content, non-fossil 0.53, wet mass 1 kg, water content 0, water in wet mass 0 kg, carbon content, fossil 0, carbon allocation 0.53 kg

## Inputs from technosphere
- wheat bran: 0.0447389 kg; name wheat_bran_input; lognormal variance with pedigree 0.0095, pedigree (4,3,2,3,1)
  property water content 0.149425; name wheat_bran_input_water_content; = wheat_bran_input_WWM/wheat_bran_input_DM
  property water in wet mass 0.13 kg; name wheat_bran_input_WWM; = 1-wheat_bran_input_DM
  property wet mass 1 kg; name wheat_bran_input_WM
  property gross energy, feed per kg of dry mass 18.9 MJ/kg; name wheat_bran_inpu_gross_E_feed_per_kg_DM_0
  property protein feed, 100% crude per kg of dry mass 0.173 kg/kg; name wheat_bran_inpu_protein_feed_per_kg_DM_0
  property dry mass 0.87 kg; name wheat_bran_input_DM
  property carbon content, fossil 0; name wheat_bran_input_C_content_fossil
  properties: carbon content, non-fossil 0.475
  note on gross energy, feed per kg of dry mass: Wheat bran gross energy is 18.9MJ/kg dry matter. Reference(s): Feedipedia (2015) Wheat Bran, Animal feed resources information system, Available at: https://www.feedipedia.org/node/726. (Accessed November 2017)
  note on protein feed, 100% crude per kg of dry mass: Wheat bran crude protein is 17.3% of dry matter. Reference(s): Feedipedia (2015) Wheat Bran, Animal feed resources information system, Available at: https://www.feedipedia.org/node/726. (Accessed November 2017)
  note on carbon content, non-fossil: Assumed carbon content, on a dry mass basis according to FAOSTAT. Reference: http://www.fao.org/forestry/17111/en
