# transport, passenger car

Dataset: EcoSpold 2, unit process
Geography: RER
Time period: 2012-01-01 to 2019-12-31
Technology level: current
Classification: ISIC rev.4 ecoinvent: 4922:Other passenger land transport
Scenario: Business-as-Usual
System model: Allocation at the point of substitution
Generated by: Sofia Parada Tur
Database: ecoinvent
isCopyrightProtected: true
accessRestrictedTo: 1

## General comment
This activity provides an average transport in a passenger car. It does so by linking specific "transport, passenger car", both with internal combustion engine and electric, into a generic product.

## Included activities end
This activity provides an average transport in passenger car.

## Technology
Average transport in a passenger car. The average takes into account internal combustion engines and electric cars. For the first type, the average accounts for different car classes(EURO 3, EURO 4 and EURO 5). These at its turn, are an average of the different car sizes (small, medium and large) and fuel types (petrol, diesel and natural gas). For the electric car, it takes into account a medium size electric car.

## Parameters
- production volumes sum: 2.44706e12 km; name PV_sum; = 2.4465E+12 + 2.25E+09/4; lognormal variance with pedigree 0.0186, pedigree (4,5,1,5,1)
  sum of the production volumes of the input exchanges in the present inventory. Values obtained from the ecoinvent datasets that produce these inputs as reference products. Exception: the production volume of the electric car is only known for the GLO average. In order to calculate the European production volume the global value has been divided by 4 (refer to mathematical formula). This is only a rough estimation, due to lack of specific data.

## Reference product
- transport, passenger car: 1 km; By-product classification allocatable product; CPC 64119: Other land transportation services of passengers, n.e.c.
  production volume 2.44706e12 km; = PV_sum
    The production volume is equal to the sum of the individual production volumes of the inputs transport, passenger car, internal combustion engine and transport, passenger car, electric. This value is obtained from the ecoinvent datasets that produce these products as reference product.
    Note: the production volume from electric car has been assumed based for Europe based on global production volume.
  property price 0.158035 EUR2005
    Calculated based on inputs: The price of the product has been calculated as a sum of the values of the material and energy inputs for this product. This value is therefore a rough estimation. It may underestimate the real price since there are additional expenses when producing any product. These expences can include for example labour costs, treatment of waste materials and profit for the producer. Please consider carefully whether this level of data quality is acceptable for your application.

## Inputs from technosphere
- transport, passenger car with internal combustion engine: 0.99977 km; = 2.4465E+12/ PV_sum; lognormal variance with pedigree 0.122, pedigree (1,1,3,1,1)
  calculated value. Based on the production volume of this exchange divided by the total sum of the production volumes from all the inputs. The production volumes are obtained from the ecoinvent datasets where these inputs are produced as reference product.
- transport, passenger car, electric: 0.000229867 km; = (2.25E+09/4)/ PV_sum; lognormal variance with pedigree 0.012, pedigree (3,5,3,1,1)
  Assumption.
  Based on the production volume of this exchange divided by the total sum of the production volumes from all the inputs. The production volumes is calculated based on the global production volume, as found in the global dataset "transport, passenger car, electric", assuming that the European production volume is 4 times smaller.

## Extrapolations
This dataset has been extrapolated from year 2012 to the year of the calculation (2019). The uncertainty has been adjusted accordingly.
