# sorting facility construction, for construction waste

Dataset: EcoSpold 2, unit process
Geography: RoW
Time period: 1996-01-01 to 2019-12-31
Technology level: current
Classification: EcoSpold01Categories: waste management/others
Classification: ISIC rev.4 ecoinvent: 4290:Construction of other civil engineering projects
Tags: ConvertedDataset
Scenario: Business-as-Usual
System model: Allocation at the point of substitution
Generated by: Gabor Doka (obsolete)
Published in: Doka G. 2007
Database: ecoinvent
isCopyrightProtected: true
accessRestrictedTo: 1

## General comment
Sorting plant with a construction waste throughput of 200'000 tons per year. Operation time 50 years.
[This dataset was already contained in the ecoinvent database version 2. It was not individually updated during the transfer to ecoinvent version 3. Life Cycle Impact Assessment results may still have changed, as they are affected by changes in the supply chain, i.e. in other datasets. This dataset was generated following the ecoinvent quality guidelines for version 2. It may have been subject to central changes described in the ecoinvent version 3 change report (http://www.ecoinvent.org/database/ecoinvent-version-3/reports-of-changes/), and the results of the central updates were reviewed extensively. The changes added e.g. consistent water flows and other information throughout the database. The documentation of this dataset can be found in the ecoinvent reports of version 2, which are still available via the ecoinvent website. The change report linked above covers all central changes that were made during the conversion process.]

## Included activities end
infrastructure materials including replacement parts during operation, transport and disposal of infastructure. Land use. Fuel oil demand from small administrative building. Operation time 50 years.

## Geography
Technology used in Switzerland and Germany. Compatibility with other regions unknown.

## Technology
Construction waste sorting plants usually feature a jaw or impact crusher. Here materials from a cone crusher are inventoried. Infrastructure materials are adapted from LCI for a rock crusher for gravel production. Reduced wear and tear from lower annual throughput in construction waste sorting plant (200kt/a) is heeded.

## Reference product
- sorting facility, for construction waste: 1 unit; CPC 53290: Other civil engineering works; By-product classification allocatable product
  EcoSpold01Location=CH
  production volume 3.96633 unit
    This is a placeholder value that does not reflect real-world production volumes. This dataset does not currently require a real-world production volume to work in the database framework, and no actual data were collected yet. This has no negative effect on the results of the ecoinvent database.
  property price 86970.4 EUR2005
    Calculated based on inputs: The price of the product has been calculated as a sum of the values of the material and energy inputs for this product. This value is therefore a rough estimation. It may underestimate the real price since there are additional expenses when producing any product. These expences can include for example labour costs, treatment of waste materials and profit for the producer. Please consider carefully whether this level of data quality is acceptable for your application.
  property true value 86970.4
    allocation property applied in "true value" allocation // value calculated from revenue

## By-products
- heat, for reuse in municipal waste incineration only: 0 MJ; CPC 17300: Steam and hot water; By-product classification allocatable product; pedigree (1,1,1,1,1)
  Net electricity generated from this waste and used in internal MSWI plant energy redistribution.
  Uncertainty: uncertainty is calculated from uncertainties in waste composition and uncertainties in energy efficiency and the uncertainty in internal energy demand
  production volume 416.324 MJ
  property exergy 0.1842 MJ; name E_th_prod_MSWI_exergy
    This exergy property is based on the exergy content of the product.
  property price 0.0106 EUR2005; name E_th_prod_MSWI_price_EUR2005
    Average European district heat price from Ecoheatcool and Euroheat 2005-2006, Ecoheat Work package 1: The European heat market. Final report. 10.6 EUR/GJ i s the price of district heat. http://www.solarthermalworld.org/files/Ecoheatcool%20WP1%20Web.pdf?download
  property true value relation 0.1842; name E_th_prod_MSWI_true_value_relation
    property to calculate "true value" from
  property true value 0.679622
    allocation property applied in "true value" allocation // value calculated from true value relation
- electricity, for reuse in municipal waste incineration only: 0 kWh; CPC 17100: Electrical energy; By-product classification allocatable product; pedigree (1,1,1,1,1)
  (same comment as for heat, for reuse in municipal waste incineration only)
  production volume 59.224 kWh
  property price 0.1 EUR2005; name E_el_prod_MSWI_price_EUR2005
    Estimated to be the same price as in case of electricity, medium voltage.
  property exergy 3.6 MJ; name E_el_prod_MSWI_exergy
    This exergy property is based on the exergy content of the product.
  property true value relation 3.6; name E_el_prod_MSWI_true_value_relation
    property to calculate "true value" from
  property true value 1.8895
    (same comment as for heat, for reuse in municipal waste incineration only)

## Inputs from technosphere
- aluminium, cast alloy: 33.999 kg; lognormal variance with pedigree 0.434, pedigree (1,4,5,5,4)
  EcoSpold01Location=RER
  Data from one inventory study for rock crusher (Landfield & Karra 2000)
  Uncertainty: & basic uncertainty of 3; Data from one inventory study for rock crusher (Landfield & Karra 2000)
  properties: dry mass 1 kg, wet mass 1 kg
- ferromanganese, high-coal, 74.5% Mn: 12599.6 kg; lognormal variance with pedigree 0.434, pedigree (1,4,5,5,4)
  Data from one inventory study for rock crusher (Landfield & Karra 2000)
  EcoSpold01Location=RER
  Uncertainty: & basic uncertainty of 3; Data from one inventory study for rock crusher (Landfield & Karra 2000)
  properties: wet mass 1 kg, dry mass 1 kg, carbon content, fossil 0.075
  note on carbon content, fossil: Typical composition of ferromanganese, high-carbon is given in Tab. 3.4 ecoinvent v2.2 report 20_part VII
- waste plastic, mixture: 0 kg; pedigree (1,1,1,1,1)
  Data from one inventory study for rock crusher (Landfield & Karra 2000)
  EcoSpold01Location=CH
  Uncertainty: & basic uncertainty of 3; Data from one inventory study for rock crusher (Landfield & Karra 2000)
  production volume 0 kg
    Calculated from the production volume of sorting facility, for construction waste in proportion to the respective output amounts.
  properties: carbon content, fossil 0.747344, water content 0.180638, wet mass 1 kg, dry mass 0.847 kg
  note on carbon content, fossil: C content in 1 kg DM was calculated using data in Tab A.2, ecoinvent v2.2 report 13_I
- epoxy resin, liquid: 159.995 kg; lognormal variance with pedigree 0.434, pedigree (1,4,5,5,4)
  (same comment as for aluminium, cast alloy)
  properties: dry mass 1 kg, wet mass 1 kg, carbon content, fossil 0.42325
- brass: 1.27996 kg; lognormal variance with pedigree 0.434, pedigree (1,4,5,5,4)
  (same comment as for waste plastic, mixture)
  properties: wet mass 1 kg, dry mass 1 kg
- waste mineral oil: 0 kg; pedigree (1,1,1,1,1)
  EcoSpold01Location=CH
  Data from one inventory study for rock crusher (Landfield & Karra 2000)
  Uncertainty: & basic uncertainty of 3; Data from one inventory study for rock crusher (Landfield & Karra 2000)
  production volume 0 kg
    (same comment as for waste plastic, mixture)
  properties: dry mass 0.9 kg, wet mass 1 kg, water content 0.111111, carbon content, fossil 0.864444
  note on carbon content, fossil: Tab A.6, ecoinvent v2.2 report 13_I. C content has been calculated after data in the tables, and then referred to 1 kg DM
- bronze: 675.98 kg; lognormal variance with pedigree 0.434, pedigree (1,4,5,5,4)
  (same comment as for waste mineral oil)
  properties: dry mass 1 kg, wet mass 1 kg
- cast iron: 3469.9 kg; lognormal variance with pedigree 0.434, pedigree (1,4,5,5,4)
  (same comment as for ferromanganese, high-coal, 74.5% Mn)
  properties: carbon content, fossil 0.04, wet mass 1 kg, dry mass 1 kg
  note on carbon content, fossil: Cast iron is made by remelting pig iron in small furnaces (e.g. cupola furnaces or electric arc furnaces) and poured into moulds to make castings. It usually contains 2% to 6% carbon (ecoinvent v2.2 report 10_partII). An average content of 4% was considered
- heat, central or small-scale, other than natural gas: 0 MJ; pedigree (1,1,1,1,1)
  Fuel oil demand for administrative heating. Uncertainty estimated from climate variation
  EcoSpold01Location=CH
- steel, unalloyed: 102997 kg; lognormal variance with pedigree 0.434, pedigree (1,4,5,5,4)
  (same comment as for ferromanganese, high-coal, 74.5% Mn)
  properties: carbon content, fossil 0.0025, dry mass 1 kg, wet mass 1 kg
  note on carbon content, fossil: Unalloyed steels or carbon steels are those in which the level of an individual element in no case reaches or exceeds the limiting concentration given in Tab. 3.1 ecoinvent v2.2 report 10_partII. Assumed to have a C content of 0.25%
- lubricating oil: 4999.85 kg; lognormal variance with pedigree 0.434, pedigree (1,4,5,5,4)
  (same comment as for aluminium, cast alloy)
  properties: dry mass 1 kg, carbon content, fossil 0.75, wet mass 1 kg
  note on carbon content, fossil: Lubricating oil is produced from diesel. C-content/dry mass of fats and oils considered 75%, from: ecoinvent v2.2 report, n 15a, pg 40
- waste plastic, mixture: -17.7982, -1.18921, -0.0899377, -0.491184, -0.198433, -0.466425, -15.1649, -124.597 kg (8 entries); lognormal variance with pedigree 0.434, pedigree (1,4,5,5,4)
  (same comment as for waste plastic, mixture)
  production volume 480 kg
- waste mineral oil: -1257.74, -3742.11 kg (2 entries); lognormal variance with pedigree 0.434, pedigree (1,4,5,5,4)
  (same comment as for waste mineral oil)
  production volume 15000 kg
- heat, central or small-scale, other than natural gas: 2132.72, 149203 MJ (2 entries); lognormal variance with pedigree 0.072, pedigree (1,1,5,5,1)
  (same comment as for heat, central or small-scale, other than natural gas)

## Inputs from nature
- Transformation, to industrial area [natural resource, land]: 14999.6 m2; lognormal variance with pedigree 0.188, pedigree (4,5,5,5,1)
  Typical size given for planning data in one source for Germany.
  Uncertainty: & basic uncertainty of 2; typical size given for planning data in one source for Germany.
- Occupation, industrial area [natural resource, land]: 749978 m2*year; lognormal variance with pedigree 0.128, pedigree (4,5,5,5,1)
  Typical size given for planning data in one source for Germany. Estimate on operation time
  Uncertainty: & basic uncertainty of 1.5; typical size given for planning data in one source for Germany. Estimate on operation time
- Transformation, from unspecified [natural resource, land]: 14999.6 m2; lognormal variance with pedigree 0.188, pedigree (4,5,5,5,1)
  (same comment as for Transformation, to industrial area)

## Sampling procedure
Literature data

## Extrapolations
See Technology/Text This dataset has been copied from an original dataset covering the geography CH. The uncertainty has been adjusted accordingly.

## Review by Niels Jungbluth 2003-06-03
Passed.
