# building construction, budget hotel

Dataset: EcoSpold 2, unit process
Geography: PE
Time period: 2017-01-01 to 2019-12-31
Technology level: current
Classification: ISIC rev.4 ecoinvent: 4100:Construction of buildings
Synonyms: 3 star hotel; basic hotel; eco-lodge
Tags: single enterprise data
Scenario: Business-as-Usual
System model: Allocation at the point of substitution
Generated by: Viachaslau Filimonau
Published in: Filimonau, V. 2018
Database: ecoinvent
isCopyrightProtected: true
accessRestrictedTo: 1

## General comment
This dataset represents a tourist accommodation facility located in Junín, Peru. The case study hotel is classed as budget hotel (comfort category 3 star). It was first opened in 2006 although the building where the hotel resides was constructed in 1957. Prior to becoming a hotel, the building was used as a farm. The hotel has capacity of 50 beds and offers 20 double-size rooms with double or twin beds, with additional capacity to install an extra single bed in each room in the periods of high demand and if and when required. The hotel is made up by 21 stand-alone buildings, where 20 buildings host guest rooms and 1 building represents an administrative building. All buildings have 1 floor. The load bearing structure of hotel buildings is made of concrete and the facade is made of concrete and brickwork. The administrative building hosts a lobby, a restaurant, a bar and a conference hall. There is a swimming pool (70 m2) and a parking lot (220 m2) for guest use on site. Laundry is available on site. The hotel occupies a total area of 420000 m2 which is the legacy of it being a farm in the past. The area in actual use (i.e. the area occupied by all hotel buildings and amenities) is 2181 m2 and the hotel's Gross Floor Area (GFA) is 1366 m2. The average annual occupancy of the hotel is 30% which is equal to 5475 guest nights per year. The hotel's occupancy is significantly lower than the country's average of 66%
(Source: Hotel News Now 2015. The state of Peru's tourism, hotels. Available from: http://www.hotelnewsnow.biz/Articles/27650/The-state-of-Perus-tourism-hotels Accessed 16 March 2018). This can in part be explained by the hotel location which is rather remote. This is also because of the hotel positioning itself as an eco-lodge which does not appeal to the mass consumer.

## Included activities start
This dataset is modelled to include the inputs for the construction of a hotel building. This includes:energy and water used in construction, land transformation, building structure and outer building shell, inner walls, roofs, ceiling and windows, doors, floors, finishing and painting, bathroom equipment. Activities include hotel building construction with lifeframe of the hotel building of 75 years. Maintenance is included only through the consideration of the lifetime of the different exchanges. For example, windows are assumed to have a lifetime of 35 years, therefore the exchange amount is multiplied by 75years / 35 years=2.14. Hotel building foundation is included in the form of estimates based on the hotel area and construction practices in Peru.

## Included activities end
Activities end with 1 unit of hotel building, including maintenance. Due to data availability, the following building construction processes have been excluded: cables, gutter, drains.

## Geography
The hotel is located in Junín, Peru

## Technology
Technology in use is considered current.

## Time period
The survey was done in the year 2017 with the data provided covering the operational year 2016-2017.

## Parameters
- volume: 4098 m3; = GFA*3
  Assuming 1 floor is 3 meters high. Gross floor area (GFA) of the hotel is 1366 m2.
- gross floor area: 1366 m2; name GFA
  This represents gross floor area for buildings.
- occupancy rate/year: 0.3 dimensionless; name occupancy_y
  The case study hotel reports average occupancy of 30%.

## Reference product
- iron scrap, unsorted: 1 kg; = steel; CPC 39310: Slag, dross, scalings and other waste from the manufacture of iron or steel; By-product classification Recyclable; pedigree (1,1,1,1,1)
  Calculated value.The amount is set equal to the amount of the input material, steel.
  production volume 583330 kg; = Ref('ffa1a7a7-e416-472a-84f7-7a76b24ede57', 'ProductionVolume') * (Ref('d6f507bb-a780-4b02-a2ce-623a5eef81fe') / Ref('ffa1a7a7-e416-472a-84f7-7a76b24ede57'))
    Calculated from production volume of reference product using the relative outputs.
  property price 0.149 EUR2005
    Temporary price data. Calculated as 90% of purchasers price based on: estimated at 85% of sorted scrap
  property carbon content 0
    carbon content on a dry matter basis (reserved; not for manual entry)
  property true value 1498.55
    allocation property applied in "true value" allocation // value calculated from revenue
  properties: water in wet mass 0 kg, water content 0, wet mass 1 kg, carbon content, fossil 0, carbon content, non-fossil 0, dry mass 1 kg, carbon allocation 0 kg
- building, budget hotel: 0 unit; name RP; source Hotel News Now 2015; By-product classification allocatable product
  production volume 58 unit; name RP_PV
    In 2014 there were 729 hotels in Peru classed under the 3 star comfort category. Source: Hotel News Now 2015. The state of Peru’s tourism, hotels. Available from: http://www.hotelnewsnow.biz/Articles/27650/The-state-of-Perus-tourism-hotels Accessed 22 March 2018. Same source states that, between 2009 and 2014, the Peru’s hotel supply had an average growth of 8% per year. Assuming this growth distributes equally across various categories of hotels in Peru, it can be estimated that the number of 3 star hotel properties annually constructed in Peru is equal to: 729 hotels * 0.08 = 58 hotels.
  property price 666584 EUR2005; name RP_price_EUR2005
    Calculated based on inputs: The price of the product has been calculated as a sum of the values of the material and energy inputs for this product. This value is therefore a rough estimation. It may underestimate the real price since there are additional expenses when producing any product. These expences can include for example labour costs, treatment of waste materials and profit for the producer. Please consider carefully whether this level of data quality is acceptable for your application.
  property lifetime 75 year; name lifetime
    The lifetime of a hotel building is assumed to be equal to 75 years which is an average of the 50-100 years' estimates available in the literature. Source: Filimonau et al. 2011. Reviewing the carbon footprint analysis of hotels: Life Cycle Energy Analysis (LCEA) as a holistic method for carbon impact appraisal of tourist accommodation. Journal of Cleaner Production, 19, 1917-1930.
  property lifetime capacity 6.4605e6 guest night; name lifetime_guests; = 236*365*lifetime
    The total capacity of the hotel is 236 guests. The lifetime capacity is calculated accordingly.
  property true value 666584; name RP_true_value
    allocation property applied in "true value" allocation // value calculated from revenue

## By-products
- electricity, for reuse in municipal waste incineration only: 0 kWh; CPC 17100: Electrical energy; By-product classification allocatable product; pedigree (1,1,1,1,1)
  Net electricity generated from this waste and used in internal MSWI plant energy redistribution.
  Uncertainty: uncertainty is calculated from uncertainties in waste composition and uncertainties in energy efficiency and the uncertainty in internal energy demand
  production volume 61226.4 kWh
  property exergy 3.6 MJ; name E_el_prod_MSWI_exergy
    This exergy property is based on the exergy content of the product.
  property true value relation 3.6; name E_el_prod_MSWI_true_value_relation
    property to calculate "true value" from
  property price 0.1 EUR2005; name E_el_prod_MSWI_price_EUR2005
    Estimated to be the same price as in case of electricity, medium voltage.
  property true value 136.232
    allocation property applied in "true value" allocation // value calculated from true value relation
- heat, for reuse in municipal waste incineration only: 0 MJ; CPC 17300: Steam and hot water; By-product classification allocatable product; pedigree (1,1,1,1,1)
  Net useful heat generated from this waste and used in internal MSWI plant energy redistribution.
  Uncertainty: uncertainty is calculated from uncertainties in waste composition and uncertainties in energy efficiency and the uncertainty in internal energy demand
  production volume 445052 MJ
  property true value relation 0.1842; name E_th_prod_MSWI_true_value_relation
    property to calculate "true value" from
  property exergy 0.1842 MJ; name E_th_prod_MSWI_exergy
    This exergy property is based on the exergy content of the product.
  property price 0.0106 EUR2005; name E_th_prod_MSWI_price_EUR2005
    Average European district heat price from Ecoheatcool and Euroheat 2005-2006, Ecoheat Work package 1: The European heat market. Final report. 10.6 EUR/GJ i s the price of district heat. http://www.solarthermalworld.org/files/Ecoheatcool%20WP1%20Web.pdf?download
  property true value 50.6684
    (same comment as for electricity, for reuse in municipal waste incineration only)
- zinc concentrate: 0 kg; CPC 14290: Other non-ferrous metal ores and concentrates (other than uranium or thorium ores and concentrates); By-product classification allocatable product
  Calculated value from the knowledge of the properties of both products.
  production volume 0.969505 kg
  property price 0.38 EUR2005; name ByP_price_EUR2005
    Temporary price data. Calculated as 90% of purchasers price based on: Zinc content in concentrate 53%. Concentrate price per kg Zn 86.5% of refined Zn price (13.5% treatment charges according to CHR Metals Limited 2005: Dynamic cost curves. http://www.minecost.com/dynamic.pdf). 2004 zinc price from USGS (2007) Mineral commodity summaries 2007. <http://minerals.usgs.gov/minerals/pubs/mcs/2007/mcs2007.pdf> [Accessed 25 May 2010]
  property zinc content 0.53; name zinc_C_zinc_concentrate
    Zinc content on a dry matter basis. Value taken from teh "zinc mine operation" /GLO dataset.
  property dry mass 1 kg; name DM_zinc_concentrate
  property carbon content 0
    carbon content on a dry matter basis (reserved; not for manual entry)
  property true value 0.00635193
    allocation property applied in "true value" allocation // value calculated from revenue
  properties: wet mass 1 kg, water content 0, carbon content, non-fossil 0, carbon content, fossil 0, water in wet mass 0 kg, carbon allocation 0 kg
- copper: 0 kg; source Rentz O. 1999; By-product classification allocatable product; CPC 41413: Refined copper and copper alloys, unwrought; master alloys of copper
  Literature value. Copper uses: Before end-use copper is manufactured into semi fabricated products, such as shapes and ingots (known as 'semis'). These manufacturing processes are subdivided into hot working, cold working and, if necessary, process annealing. Few of the semis are ready for use as such. They more typically travel to first-stage manufacturers, who make metal rods, wire, and casting, and then to component manufacturers who produce such things as motors, valves, and insulated cables The components in turn are incorporated by final-stage manufacturers into a variety of finished products - automobiles, commercial buildings, residential housing, and so forth. These uses account for about 79% of the world-wide consumption of copper.
  production volume 11.8734 kg
  property price 5.52 EUR2005
    Literature value (http://www.economist.com/news/business/21576714-mining-industry-has-enriched-chile-its-future-precarious-copper-solution). Average price between 20015 and 2013.
  property carbon content 0
    carbon content on a dry matter basis (reserved; not for manual entry)
  property true value 1.13002
    allocation property applied in "true value" allocation // value calculated from revenue
  properties: dry mass 1 kg, water in wet mass 0 kg, wet mass 1 kg, carbon content, non-fossil 0, water content 0, carbon content, fossil 0, carbon allocation 0 kg
- aluminium oxide, non-metallurgical: 0 kg; source European Aluminium Association 2008; CPC 41432: Alumina (aluminium oxide), except artificial corundum; By-product classification allocatable product; CAS 1344-28-1; pedigree (1,1,1,1,1)
  production volume 336.942 kg
  property carbon content, non-fossil 0; name C_content_non_fossil
  property price 0.28 EUR2005; name Al2O3Amount_price_EUR2005
    From UN trade database. http://data.un.org/ Import data from the largest economies of the world are used (Brazil, India, USA, China, Japan and EU-27).
  property dry mass 1 kg; name DM
  property water content 0; name water_content
  property wet mass 1 kg; name WM
  property water in wet mass 0 kg; name WWM
  property carbon content, fossil 0; name C_content_fossil
  property carbon content 0
    carbon content on a dry matter basis (reserved; not for manual entry)
  property true value 1.62662
    allocation property applied in "true value" allocation // value calculated from revenue
  properties: carbon allocation 0 kg
- aluminium, cast alloy: 0 kg; source European Aluminium Association 2008; By-product classification allocatable product; CPC 41431: Unwrought aluminium; pedigree (1,1,1,1,1)
  EcoSpold01Location=RER
  production volume 3149.67 kg
  property price 1.3 EUR2005; name castAlloyAmount_price_EUR2005
    Temporary price data. Calculated as 90% of purchasers price based on: Source: London Metal Exchange, Aluminium alloy price for 2005
  property carbon content 0
    carbon content on a dry matter basis (reserved; not for manual entry)
  property true value 70.5959
    allocation property applied in "true value" allocation // value calculated from revenue
  properties: water in wet mass 0 kg, carbon content, non-fossil 0, water content 0, dry mass 1 kg, carbon content, fossil 0, wet mass 1 kg, carbon allocation 0 kg
- aluminium, wrought alloy: 0 kg; source European Aluminium Association 2008; By-product classification allocatable product; CPC 4153: Semi-finished products of aluminium or aluminium alloys; pedigree (1,1,1,1,1)
  production volume 1378.86 kg
  property price 1.44 EUR2005; name secondaryAluminiumOutput_price_EUR2005
    Estimated based on literature values and expert judgement. Aluminium ccast alloys are about 90% of the price of aluminium wrought alloys.
  property carbon content 0
    carbon content on a dry matter basis (reserved; not for manual entry)
  property true value 34.2338
    allocation property applied in "true value" allocation // value calculated from revenue
  properties: wet mass 1 kg, water content 0, carbon content, fossil 0, water in wet mass 0 kg, carbon content, non-fossil 0, dry mass 1 kg, carbon allocation 0 kg
- iron scrap, sorted, pressed: 0 kg; By-product classification Recyclable; CPC 39310: Slag, dross, scalings and other waste from the manufacture of iron or steel; pedigree (1,1,1,1,1)
  Iron scrap recovered from this waste.
  Uncertainty: uncertainty calculated from uncertainty in waste composition, uncertainty of share of recyclable metal, uncertainty of transfer coefficient to bottom ash, uncertainty of the efficiency of scrap removal in MSWI plant.
  production volume 202.674 kg
  property price 0.175 EUR2005
    Temporary price data. Calculated as 90% of purchasers price based on: 2005 import and export prices (total trades (USD) divided by total weight (kg) in biggest economies of the world: EU27, USA, Brasil, China, India, Japan and Russia) from UN Commodity Trade Statistics Database (http://data.un.org/Explorer.aspxDatabase [Accessed 2011.06.20]). Commodity: Waste or scrap, of cast iron
  property carbon content 0
    carbon content on a dry matter basis (reserved; not for manual entry)
  property true value 0.611515
    allocation property applied in "true value" allocation // value calculated from revenue
  properties: wet mass 1 kg, water in wet mass 0 kg, carbon content, non-fossil 0, carbon content, fossil 0, dry mass 1 kg, water content 0, carbon allocation 0 kg

## Inputs from technosphere
- waste glass: -0.000270855 kg; = (flat_glass)*-1; lognormal variance with pedigree 0.122825, pedigree (1,4,2,2,5)
  Calculated value.The amount is set equal to the amount of the input material, flat glass, coated.
  production volume 70470 kg; = Ref('ffa1a7a7-e416-472a-84f7-7a76b24ede57', 'ProductionVolume') * ((Ref('8776d8a4-743d-4cd0-9d2c-7508cced536a')*-1) / Ref('ffa1a7a7-e416-472a-84f7-7a76b24ede57'))
    Calculated from production volume of reference product using the relative outputs.
  properties: wet mass 1 kg, dry mass 1 kg
- window frame, wood, U=1.5 W/m2K: 3.09548e-5 m2; name window_frame; = 64.8*(lifetime/35); lognormal variance with pedigree 0.122825, pedigree (1,4,2,2,5)
  Calculated value. The amount of exchange is calculated as: amount of input product * (lifetime of the hotel / lifetime of the product). Assumed service life of 35 years. Source: Asif et al. 2002. LIFE CYCLE OF WINDOW MATERIALS - A COMPARATIVE ASSESSMENT. Available from: http://ohp.parks.ca.gov/pages/1054/files/uk%20window%20frame%20lca.pdf Accessed 16 March 2018.
  properties: carbon content, fossil 0.0315533, wet mass 80.2 kg, carbon content, non-fossil 0.615911, water content 0.0526316, dry mass 76.19 kg
- door, inner, wood: 8.35972e-6 m2; name door_inner; = 20*(lifetime/40); lognormal variance with pedigree 0.122825, pedigree (1,4,2,2,5)
  Calculated value. The amount of exchange is calculated as: amount of input product * (lifetime of the hotel / lifetime of the product). Assumed service life of 40 years. Source: Cobut et al. 2015. The environmental footprint of interior wood doors in non-residential buildings – part 1: life cycle assessment. Journal of Cleaner Production, 109, 232-246. In terms of outputs, assumed to have gone to used door, inner, wood.
  properties: water content 0.0526316, carbon content, non-fossil 0.715131, dry mass 26.22 kg, carbon content, fossil 0.074995, wet mass 27.6 kg
- used window frame, wood: -3.09548e-5 m2; = (window_frame)*-1; lognormal variance with pedigree 0.122825, pedigree (1,4,2,2,5)
  Calculated value.The amount is set equal to the amount of the input material, window frame, wood.
  production volume 8053.71 m2; = Ref('ffa1a7a7-e416-472a-84f7-7a76b24ede57', 'ProductionVolume') * ((Ref('d4012499-029a-4aba-9d2f-2eee131a928e')*-1) / Ref('ffa1a7a7-e416-472a-84f7-7a76b24ede57'))
    Calculated from production volume of reference product using the relative outputs.
  properties: carbon content, fossil 0.0315533, water content 0.0526316, carbon content, non-fossil 0.615911, dry mass 76.19 kg, wet mass 80.2 kg
- alkyd paint, white, without water, in 60% solution state: 0.00112856 kg; name alkyd; = (2250/10*1.5)*(lifetime/5); lognormal variance with pedigree 0.122825, pedigree (1,4,2,2,5)
  Calculated value. Used here in place of water soluble acrylic paint. The amount of exchange is calculated as: amount of input product * (lifetime of the hotel / lifetime of the product). Combined of all instances of use across the building structure and walls. Assuming 1 liter of paint is required to paint 10 m2 and weighs 1.5 kg. Source: BQ 2018. Wall painting calculator. Available from: https://www.diy.com/help-advice/wall-painting-calculator/Dev_npcart_100008.art Accessed 16 March 2018. Assumed service life of 5 years which is equivalent to the period of major refurbishments in hotels. Source: Filimonau et al. 2011. Reviewing the carbon footprint analysis of hotels: Life Cycle Energy Analysis (LCEA) as a holistic method for carbon impact appraisal of tourist accommodation. Journal of Cleaner Production, 19(17-18), 1917-1930. In terms of outputs assumed to have gone to waste concrete.
  properties: carbon content, fossil 0.414587, dry mass 1 kg, carbon content, non-fossil 0.161654, wet mass 1 kg
- polyvinylchloride, bulk polymerised: 0.00141321 kg; name PVC; = (1470*2.3)*(lifetime/40); lognormal variance with pedigree 0.122825, pedigree (1,4,2,2,5)
  Calculated value. The amount of exchange is calculated as: amount of input product * (lifetime of the hotel / lifetime of the product). Used here in place of the floor material. No data on the type of flooring was provided by the case study hotel so PVC was used as proxy. This is because PVC flooring is most cost-effective for hotels. Source: Mikulski 2015. TOP HOSPITALITY FLOORING OPTIONS FOR HOTELS. Available from: http://www.businessflooring.net/blog/top-hospitality-flooring-options-for-hotels Accessed 16 March 2018. Combined of all instances of use across the building. Assumed density of PVC 2.3 kg/m2. Source: The colour flooring company 2018. VINYL FLOORING TECHNICAL SPECIFICATIONS. Available from: https://www.colourflooring.co.uk/pages/vinyl-flooring-technical-specifications Accessed 16 March 2018. Assumed service life of PVC floors is 40 years. Source: Bowyer et al. 2009. LIFE CYCLE ASSESSMENT OF FLOORING MATERIALS A GUIDE TO INTELLIGENT SELECTION. Doviteil Partners. Available from: http://www.dovetailinc.org/report_pdfs/2009/dovetailfloors0809.pdf Accessed 16 March 2018. In terms of outputs, assumed to have gone to waste PVC.
  properties: wet mass 1 kg, dry mass 1 kg, carbon content, fossil 0.387097
  note on carbon content, fossil: Monomer is vynyl chloride, C2H3Cl (ecoinvent v2.2 report 11_II). MW=62 g/mol
- steel, low-alloyed: 0.00224204 kg; name steel; = (1842*0.7/1000*7800); lognormal variance with pedigree 0.122825, pedigree (1,4,2,2,5)
  Calculated value. Combined of all instances of use across the building structure and walls. The amount of exchange is calculated as: amount of input product * (lifetime of the hotel / lifetime of the product). Assumed thickness of 0.7 mm and density 7800 kg/m3. Source: MCRMA 2004. PROFILED METAL ROOFING
  DESIGN GUIDE. MCRMA Technical Paper No. 6. Available from: http://www.mcrma.co.uk/pdf/mcrma_t06.pdf Accessed 16 March 2018. Assumed service life of 75 years which is equal to the service life of the hotel building with minor refurbishments throughout. In terms of outputs, assumed to have gone to iron scrap, unsorted.
  properties: wet mass 1 kg, dry mass 1 kg, carbon content, fossil 0.005
- flat glass, coated: 0.000270855 kg; name flat_glass; = (64.8*5)*(lifetime/20); lognormal variance with pedigree 0.122825, pedigree (1,4,2,2,5)
  Calculated value. The amount of exchange is calculated as: amount of input product * (lifetime of the hotel / lifetime of the product). Assuming 5 kg of window glass is required to cover 1 m2 of area. Source: Glass Weight Calculator 2018. Glass weight calculator. Available from: https://www.glass-ts.com/glass-weight-calculator Accessed 16 March 2018. Assumed average service life of 20 years. Source: Howard et al. 2007. Comparative service life assessment of window systems. Available from: http://www.fwpa.com.au/images/marketaccess/PR07.1047%20Final%20Report%20WEB.pdf Accessed 16 March 2018. In terms of outputs assumed to have gone to waste glass.
  properties: wet mass 1 kg, dry mass 1 kg
- waste polyvinylchloride: -0.00141321 kg; = (PVC)*-1; lognormal variance with pedigree 0.122825, pedigree (1,4,2,2,5)
  Calculated value. Amount of output material is set equal to the amount of respective input material, PVC.
  production volume 367684 kg; = Ref('ffa1a7a7-e416-472a-84f7-7a76b24ede57', 'ProductionVolume') * ((Ref('b9db82b1-aa7e-4cd1-ba6e-2c76cbb02a17')*-1) / Ref('ffa1a7a7-e416-472a-84f7-7a76b24ede57'))
    Calculated from production volume of reference product using the relative outputs.
  properties: dry mass 0.998 kg, carbon content, fossil 0.440882, wet mass 1 kg, water content 0.00200401
- used door, inner, wood: -8.35972e-6 m2; = (door_inner)*-1; lognormal variance with pedigree 0.122825, pedigree (1,4,2,2,5)
  Calculated value.The amount is set equal to the amount of the input material, door, inner, wood.
  production volume 2175 m2; = Ref('ffa1a7a7-e416-472a-84f7-7a76b24ede57', 'ProductionVolume') * ((Ref('5b5b2525-b9b6-4bcd-a1d0-5fba9f0e2263')*-1) / Ref('ffa1a7a7-e416-472a-84f7-7a76b24ede57'))
    Calculated from production volume of reference product using the relative outputs.
  properties: carbon content, non-fossil 0.715131, water content 0.0526316, wet mass 27.6 kg, carbon content, fossil 0.074995, dry mass 26.22 kg
- used door, outer, wood-aluminium: -1.99797e-5 m2; = (door_outer)*-1; lognormal variance with pedigree 0.122825, pedigree (1,4,2,2,5)
  Calculated value.The amount is set equal to the amount of the input material, door,outer, wood-aluminium.
  production volume 5198.25 m2; = Ref('ffa1a7a7-e416-472a-84f7-7a76b24ede57', 'ProductionVolume') * ((Ref('392e3d2e-59ff-46ed-a3fa-53627c3b2222')*-1) / Ref('ffa1a7a7-e416-472a-84f7-7a76b24ede57'))
    Calculated from production volume of reference product using the relative outputs.
  properties: carbon content, non-fossil 0.275711, wet mass 38.8 kg, carbon content, fossil 0.025815, dry mass 36.86 kg, water content 0.0526316
- sanitary ceramics: 0.00156605 kg; name san_cer; = ((26*15)*( lifetime/15)+(29*35)*( lifetime/15)); lognormal variance with pedigree 0.422225, pedigree (1,4,2,2,5)
  Calculated value. The amount of exchange is calculated as: amount of input product * (lifetime of the hotel / lifetime of the product). This flow represents ceramic washing basin and ceramic toilet seat. The hotel has 26 washing basins and 29 toilet seats. Washing basins are assumed to weigh 15 kg (information taken from IKEA (2018) for the product "TÖRNVIKEN Countertop wash-basin", source retrieved from: http://www.ikea.com/gb/en/products/washstands-taps/wash-basins/t%C3%B6rnviken-countertop-wash-basin-white-art-90291518/, accessed 12 Feb 2018). The assumed lifetime is 15 years. Toilet seats are assumed to weigh 35 kg (information taken from B&Q (2018) for the product "COOKE & LEWIS FABIENNE CLOSE-COUPLED TOILET WITH SOFT CLOSE SEAT", source retrieved from: https://www.diy.com/departments/cooke-lewis-fabienne-close-coupled-toilet-with-soft-close-seat/1142804_BQ.prd?B/R_Toilets_C_CT, accessed 12 Feb 2018). The assumed lifetime is 15 years. In terms of outputs, assumed to have gone to inert waste.
  properties: wet mass 1 kg, dry mass 1 kg
- clay brick: 0.205662 kg; name clay_b; = 480*1922; lognormal variance with pedigree 0.122825, pedigree (1,4,2,2,5)
  Calculated value. Combined of all instances of use across the building structure and walls. The amount of exchange is calculated as: amount of input product * (lifetime of the hotel / lifetime of the product). Assumed density of bricks is 1922 kg/m3. Source: The Calculator Site, 2018. Construction. Available from: https://www.thecalculatorsite.com/conversions/substances/construction.php. Accessed 13 January 2018. Assumed service life of 75 years which is equal to the service life of the hotel building with minor refurbishments throughout. In terms of outputs assumed to have gone to waste concrete.
  properties: dry mass 1 kg, wet mass 1 kg
- waste concrete: -0.80825 kg; name waste_concrete; = ((concrete*concrete_WM) + clay_b)*-1; lognormal variance with pedigree 0.122825, pedigree (1,4,2,2,5)
  Calculated value. Amount of output material is set equal to the amount of respective input material, concrete, normal. It also includes waste clay brick and waste concrete from hotel foundation. For waste concrete, conversion is made from m3 of concrete to kg of concrete based on the wet mass property of concrete (see properties section).
  production volume 2.10287e8 kg; = waste_concrete*RP_PV
    Calculated from production volume of reference product using the relative outputs.
  property price 0 EUR2005; name waste_concrete_price_EUR2005
  properties: water content 1, wet mass 1 kg, dry mass 0.5 kg
- door, outer, wood-aluminium: 1.99797e-5 m2; name door_outer; = 47.8*(lifetime/40); lognormal variance with pedigree 0.122825, pedigree (1,4,2,2,5)
  Calculated value. The amount of exchange is calculated as: amount of input product * (lifetime of the hotel / lifetime of the product). Assumed service life of 40 years. Source: Cobut et al. 2015. The environmental footprint of interior wood doors in non-residential buildings - part 1: life cycle assessment. Journal of Cleaner Production, 109, 232-246. In terms of outputs, assumed to have gone to used door, outer, wood-alunimium.
  properties: carbon content, non-fossil 0.275711, dry mass 36.86 kg, wet mass 38.8 kg, water content 0.0526316, carbon content, fossil 0.025815
- diesel, burned in building machine: 0.0045714 MJ; = 1.39*3.6* volume; lognormal variance with pedigree 0.422225, pedigree (1,4,2,2,5)
  Calculated value. Assuming that 1.39 kWh/m3 of diesel is necessary to construct a building. Source: Zabalza et al. 2013. Use of LCA as a Tool for Building Ecodesign. A Case Study of a Low Energy Building in Spain. Energies, 6(8), 3901-3921. Assuming 1 kWh = 3.6 MJ.
- waste paint on wall: -0.00112856 kg; = (alkyd)*-1; lognormal variance with pedigree 0.122825, pedigree (1,4,2,2,5)
  Calculated value. Amount of output material is set equal to the amount of respective input material, alkyd paint.
  production volume 293625 kg; = Ref('ffa1a7a7-e416-472a-84f7-7a76b24ede57', 'ProductionVolume') * ((Ref('72807ec0-cdeb-4ea2-8a71-c99adb80271c')*-1) / Ref('ffa1a7a7-e416-472a-84f7-7a76b24ede57'))
    Calculated from production volume of reference product using the relative outputs.
  properties: carbon content, fossil 0.65, wet mass 1 kg, dry mass 1 kg
- wastewater, average: -0.000152258 m3; = (tap_water/1000)*-1; lognormal variance with pedigree 0.122825, pedigree (1,4,2,2,5)
  Calculated value. The amount is set equal to the amount of input material, tap water.
  production volume 39614 m3; = Ref('ffa1a7a7-e416-472a-84f7-7a76b24ede57', 'ProductionVolume') * ((Ref('0c9d438a-2bed-46b8-9ddd-1e7259cc60af')*-1) / Ref('ffa1a7a7-e416-472a-84f7-7a76b24ede57'))
    Calculated from production volume of reference product using the relative outputs.
  properties: wet mass 1000 kg, dry mass 0.346837 kg, water content 2882.2, carbon content, non-fossil 0.194039
  note on carbon content, non-fossil: 0.0673 kg TOC/m3 (Tab A.17, ecoinvent v2.2 report 13_I). TOC was considered as Total Carbon.
- plywood, for outdoor use: 0.000152704 m3; name plywood_o; lognormal variance with pedigree 0.122825, pedigree (1,4,2,2,5)
  Calculated value. Combined of all instances of use across the building structure and walls. The amount of exchange is calculated as: amount of input product * (lifetime of the hotel / lifetime of the product). Assumed service life of 75 years which is equal to the service life of the hotel building with minor refurbishments throughout. In terms of outputs, assumed to have gone to waste wood, untreated.
  property wet mass 625 kg; name ply_o_WM
  properties: carbon content, fossil 0.0439893, carbon content, non-fossil 0.424285, water content 0.0601214, dry mass 589.555 kg
- ceramic tile: 0.00740337 kg; name tile; = (180*12.3)*(lifetime/5); lognormal variance with pedigree 0.122825, pedigree (1,4,2,2,5)
  Calculated value. Combined of all instances of use across the building structure and walls. The amount of exchange is calculated as: amount of input product * (lifetime of the hotel / lifetime of the product). Assuming 12.3 kg of tiles is required to cover 1 m2. Source: Victoria Plumbing 2018. British ceramic tile. Available from: https://victoriaplum.com/product/british-ceramic-tile-metro-bevel-white-gloss-tile-100mm-x-200mm Accessed 16 March 2018. Assumed service life of 5 years which is equivalent to the period of major refurbishments in hotels. Source: Filimonau et al. 2011. Reviewing the carbon footprint analysis of hotels: Life Cycle Energy Analysis (LCEA) as a holistic method for carbon impact appraisal of tourist accommodation. Journal of Cleaner Production, 19(17-18), 1917-1930. In terms of outputs assumed to have gone to waste concrete.
  properties: dry mass 1 kg, wet mass 1 kg
- waste wood, untreated: -0.0954401 kg; = (plywood_o*ply_o_WM)*-1; lognormal variance with pedigree 0.122825, pedigree (1,4,2,2,5)
  Calculated value.The amount is set equal to the amount of the input material, plywood, for outdoor use. The conversion from m3 to kg is based on the density reported in the property section (see wet mass).
  production volume 2.48312e7 kg; = Ref('ffa1a7a7-e416-472a-84f7-7a76b24ede57', 'ProductionVolume') * ((Ref('56176dea-4909-4cfb-94fd-8b2b91ae6a3f')*-1) / Ref('ffa1a7a7-e416-472a-84f7-7a76b24ede57'))
    Calculated from production volume of reference product using the relative outputs.
  properties: wet mass 1 kg, dry mass 0.8 kg, water content 0.25, carbon content, non-fossil 0.48632
- electricity, low voltage: 0.000274065 kWh; = 0.3* volume; lognormal variance with pedigree 0.422225, pedigree (1,4,2,2,5)
  Calculated value. Assuming that 0.30 kWh/m3 of electricity is necessary to construct a building. Source: Zabalza et al. 2013. Use of LCA as a Tool for Building Ecodesign. A Case Study of a Low Energy Building in Spain. Energies, 6(8), 3901-3921.
- waste cement, hydrated: -0.217819 kg; = (cement)*-1; lognormal variance with pedigree 0.122825, pedigree (1,4,2,2,5)
  Calculated value.The amount is set equal to the amount of the input material, cement.
  production volume 5.66714e7 kg; = Ref('ffa1a7a7-e416-472a-84f7-7a76b24ede57', 'ProductionVolume') * ((Ref('115bffbe-a7e3-4da3-bce6-9c5ac2fc1799')*-1) / Ref('ffa1a7a7-e416-472a-84f7-7a76b24ede57'))
    Calculated from production volume of reference product using the relative outputs.
  properties: dry mass 1 kg, wet mass 1 kg
- tap water: 0.152258 kg; name tap_water; = (0.5*1000*GFA); lognormal variance with pedigree 0.422225, pedigree (1,4,2,2,5)
  Calculated value. Assuming that 0.5 kl per 1 m2 of floor area (GFA) is required in building construction. Source: Crawford et al. 2005. In terms of outputs assumed to have gone to wastewater. Value double checked in McCormack, et al. 2007.
  Reference:
  Crawford, Robert and Treloar, Graham 2005, An assessment of the energy and water embodied in commercial building construction, in Australian Life Cycle Assessment Conference (4th : 2005 : Novotel, Sydney, N.S.W.), Australian Life Cycle Assessment Society, Sydney, N.S.W., pp. 1-10.
  McCormack, et al. 2007. Modelling direct and indirect water requirements of construction. Building research & information. 35(2), 156-162.
  properties: dry mass 0.000337476 kg, wet mass 1 kg, carbon content, fossil 0.00178991, water content 2962.17
  note on carbon content, fossil: Bicarbonate content is 2.93 mol/m3. CO2 content is 0.1 mol/m3 (ecoinvent v2.2 report 8, Tab 93.1).
- concrete, normal: 0.000253188 m3; name concrete; = 685+(1470*225/1000)+(480*0.5*0.5); lognormal variance with pedigree 0.122825, pedigree (1,4,2,2,5)
  Calculated value.
  Combined of all instances of use across the building structure and walls (1015.8m3). Assumed thickness of concrete of 225 mm. Source: Insulation 2011. Thermafloor TF70. INSULATION FOR SOLID CONCRETE AND SUSPENDED GROUND FLOORS. Available from http://kingspaninsulation.co.uk/getattachment/5fdd04b2-e58e-4622-97bb-5861799ab02a/Thermafloor-TF70-pdf.pdf Accessed 23 March 2018. Assumed service life of 75 years which is equal to the service life of the hotel building with minor refurbishments throughout.
  Additionally the concrete for foundations is accounted for (120m3). Estimated value based on the hotel area and construction practices in Peru. The foundation is assumed to be 480 m long, 0.5 m wide and 0.5 m deep. In terms of outputs assumed to have gone to waste concrete.
  property wet mass 2380 kg; name concrete_WM
  properties: water content 0.086758, dry mass 2190 kg
- inert waste: -0.00896942 kg; = (tile+ san_cer)*-1; lognormal variance with pedigree 0.122825, pedigree (1,4,2,2,5)
  Calculated value. Represents here waste sanitary ceramics and waste ceramic tile.
  production volume 2.33363e6 kg; = Ref('ffa1a7a7-e416-472a-84f7-7a76b24ede57', 'ProductionVolume') * ((Ref('9a05a9ce-a1c1-4b88-90e7-a07822d69bcf')*-1) / Ref('ffa1a7a7-e416-472a-84f7-7a76b24ede57'))
    Calculated from production volume of reference product using the relative outputs.
  properties: wet mass 1 kg, dry mass 1 kg
- cement, unspecified: 0.217819 kg; name cement; = (100*18/1000*1506)+(647*1506); lognormal variance with pedigree 0.122825, pedigree (1,4,2,2,5)
  Calculated value. Combined of all instances of use across the building structure and walls. The amount of exchange is calculated as: amount of input product * (lifetime of the hotel / lifetime of the product). When used in roof tiles, assumed thickness of cement is 18 mm. Source: Marleyeternit 2018. Concrete. Tiles and slates. Available from: https://www.marleyeternit.co.uk/~/media/Roofing-Specification/pdfs/Roofing-Specification-Guide---Concrete.pdf Accessed 24 March 2018. Assumed density of cement is 1506 kg/m3. Source: The calculator site, 2018. Construction. Available from: https://www.thecalculatorsite.com/conversions/substances/construction.php. Accessed 13 January 2018. Assumed service life of 75 years which is equal to the service life of the hotel building with minor refurbishments throughout.
  properties: dry mass 1 kg, wet mass 1 kg

## Inputs from nature
- Occupation, urban, continuously built [natural resource, land]: 0.0228388 m2*year; = GFA* lifetime; lognormal variance with pedigree 0.162225, pedigree (1,4,2,2,5)
  Calculated value. Based on survey data, the gross floor area is 1366 m2, multiplied by the lifetime of the building.
- Transformation, from heterogeneous, agricultural [natural resource, land]: 0.000304517 m2; = GFA; lognormal variance with pedigree 0.242225, pedigree (1,4,2,2,5)
  Calculated value. Based on survey data, the gross floor area is 1366 m2.
- Transformation, to urban, continuously built [natural resource, land]: 0.000304517 m2; = GFA; lognormal variance with pedigree 0.242225, pedigree (1,4,2,2,5)
  Calculated value. Based on survey data, the gross floor area is 1366 m2.

## Sampling procedure
Primary data from the hotel supplemented with literature-based calculations and estimates, where appropriate.

## Extrapolations
In terms of operations, energy and water consumption are aggregate and represent the case study hotel as a whole, rather than its specific operational areas (e.g. guest rooms, restaurant and bar). The comments to respective processes explain this in detail.
