# treatment of waste expanded polystyrene, municipal incineration

Dataset: EcoSpold 2, unit process
Geography: RoW
Time period: 2006-01-01 to 2019-12-31
Technology level: current
Classification: ISIC rev.4 ecoinvent: 3821:Treatment and disposal of non-hazardous waste
Synonyms: Kehrichtverbrennung; municipal waste incineration; Siedlungsabfallverbrennung
Scenario: Business-as-Usual
System model: Allocation at the point of substitution
Share of production covered: 1.8 %
Generated by: Gabor Doka
Published in: Doka G. 2013
Database: ecoinvent
isCopyrightProtected: true
accessRestrictedTo: 1

## General comment
This dataset represents the activity of waste disposal of waste expanded polystyrene in a municipal solid waste incinerator (MSWI) // Recommended use of this dataset: For EPS, which goes to incineration as part of communal waste mixture. Larger amounts of clean, separated EPS could go to recycling. For non-expanded polystyrene use other dataset. // // Waste composition (wet, in ppm): upper heating value 33.2 MJ/kg; lower heating value 32.2 MJ/kg; H2O 1988.4; O 38626; H 77592; C 863430; S 674.8; N 1931.3; P n.a.; B n.a.; Cl 1125.5; Br 6700; F 14.167; I n.a.; Ag n.a.; As 1.8311; Ba 179.73; Cd 23.201; Co 30.444; Cr 39.382; Cu 106.94; Hg 0.81832; Mn 77.018; Mo n.a.; Ni 19.852; Pb 14.848; Sb 41.408; Se 2.0238; Sn 25.255; V 277.7; Zn 829.75; Be 0.48186; Sc n.a.; Sr 85.289; Ti 963.72; Tl 0.38549; W n.a.; Si n.a.; Fe 3590.5; Ca n.a.; Al 192.74; K n.a.; Mg n.a.; Na 1412.3; // Share of carbon in waste that is biogenic 0%. // Share of metals in waste not oxidised and bulk-recyclable (exclude very small or thin parts) Iron: 0%; Alu: 0%; Copper: 0%. // One kg of this waste produces 0.02561 kg of slag and 0.01194 kg of residues, which are landfilled. Additional solidification with 0.004777 kg of cement. // Net energy production: 4.07MJ/kg electric energy and 7.88MJ/kg thermal energy. // Recovery of metal scrap to recycling: 0g iron scrap, 0g aluminium scrap, 0g copper scrap.

## Included activities start
waste incineration from waste reception gate and delivery into waste bunker at incinerator plant site (without transports to the incinerator)

## Included activities end
Waste-specific short-term emissions to water from leachate. Long-term emissions from landfill to ground water.

## Geography
Specific to the technology mix encountered in Switzerland in 2010. Well applicable to modern incineration practices in Europe, North America or Japan.

## Technology
average Swiss MSWI plants in 2010 (grate incinerators) with electrostatic precipitator for fly ash (ESP), wet flue gas scrubber and 25% SNCR , 42.77% SCR-high dust , 32.68% SCR-low dust -DeNOx facilities and 0% without Denox (weighted according to mass of burnt waste, representing Swiss average). Efficiency of iron scrap separation from slag : 58%. Efficiency of non-ferrous scrap separation from slag : 31%. Gross electric efficiency technology mix 15.84% and Gross thermal efficiency technology mix 28.51%

## Time period
Waste composition as given in literature reference, theoretical data or other source. Transfer coefficients for modern MSWI.

## Reference product
- waste expanded polystyrene: 0 kg; CPC 39: Wastes or scraps; By-product classification Waste; CAS 9003-53-6
  Main reference product of this activity (supply of disposal service).
  production volume 0 kg
    assumed to be 50% of PS, based on resin demand figures for PS and EPS (APME 2011)
  property price 0 EUR2005
    Waste products are assigned a price of zero as they are assumed to require further treatment.
  property carbon content 0.864875
    carbon content on a dry matter basis (reserved; not for manual entry)
  properties: water content 0.0526316, wet mass 1 kg, water in wet mass 0.05 kg, dry mass 0.95 kg, carbon content, non-fossil 0, carbon content, fossil 0.864875, carbon allocation 0.821631 kg
- electricity, for reuse in municipal waste incineration only: 1 kWh; CPC 17100: Electrical energy; By-product classification allocatable product; pedigree (1,1,1,1,1)
  Net electricity generated from this waste and used in internal MSWI plant energy redistribution.
  Uncertainty: uncertainty is calculated from uncertainties in waste composition and uncertainties in energy efficiency and the uncertainty in internal energy demand
  production volume 1.1757e9 kWh

## By-products
- electricity, for reuse in municipal waste incineration only: 0 kWh; name E_el_prod_MSWI; CPC 17100: Electrical energy; By-product classification allocatable product; pedigree (1,1,1,1,1)
  (same comment as for electricity, for reuse in municipal waste incineration only)
  production volume 0 kWh
    calculated in proportion to reference product waste input to incinerator
  property exergy 3.6 MJ; name E_el_prod_MSWI_exergy
    This exergy property is based on the exergy content of the product.
  property true value relation 3.6; name E_el_prod_MSWI_true_value_relation
    property to calculate "true value" from
  property price 0.1 EUR2005; name E_el_prod_MSWI_price_EUR2005
    Estimated to be the same price as in case of electricity, medium voltage.
- heat, for reuse in municipal waste incineration only: 0 MJ; name E_th_prod_MSWI; CPC 17300: Steam and hot water; By-product classification allocatable product; pedigree (1,1,1,1,1)
  (same comment as for electricity, for reuse in municipal waste incineration only)
  production volume 0 MJ
    calculated in proportion to reference product waste input to incinerator
  property exergy 0.1842 MJ; name E_th_prod_MSWI_exergy
    This exergy property is based on the exergy content of the product.
  property true value relation 0.1842; name E_th_prod_MSWI_true_value_relation
    property to calculate "true value" from
  property price 0.0106 EUR2005; name E_th_prod_MSWI_price_EUR2005
    Average European district heat price from Ecoheatcool and Euroheat 2005-2006, Ecoheat Work package 1: The European heat market. Final report. 10.6 EUR/GJ i s the price of district heat. http://www.solarthermalworld.org/files/Ecoheatcool%20WP1%20Web.pdf?download

## Inputs from technosphere
- iron (III) chloride, without water, in 40% solution state: 0 kg; pedigree (1,1,1,1,1)
  Auxilliary inputs for the wastewater treatment stage of the incinerator plant.
  Uncertainty: uncertainty calculated from uncertainty in average FeCl3 input, of transfer coefficients in the incinerator, and the uncertainty of the waste composition of this waste
  properties: dry mass 1 kg, wet mass 1 kg
- slag landfill: 0 unit; pedigree (1,1,1,1,1)
  Landfill infrastructure required for landfilling of bottom ash.
  Uncertainty: uncertainty is calculated from uncertainties in waste composition and transfer coefficients in incinerator
- hydrochloric acid, without water, in 30% solution state: 0 kg; pedigree (1,1,1,1,1)
  Auxilliary inputs for the wastewater treatment stage of the incinerator plant.
  Uncertainty: uncertainty calculated from uncertainty in average HCl input, of transfer coefficients in the incinerator, and the uncertainty of the waste composition of this waste
  properties: wet mass 1 kg, dry mass 1 kg
- waste cement, hydrated: 0 kg; pedigree (1,1,1,1,1)
  Hydrated cement output for solidification of landfilled residual material.
  Uncertainty: Uncertainty calculated from uncertainty of the waste composition of this waste and transfer coefficients in the incinerator and of the solidification recipe.
  production volume 0 kg
    calculated in proportion to reference product waste input to incinerator
  properties: wet mass 1 kg, dry mass 1 kg
- process-specific burdens, slag landfill: 0, 0, 0 kg (3 entries); pedigree (1,1,1,1,1)
  Mass-specific expenditures required for landfilling of bottom ash.
  Uncertainty: uncertainty is calculated from uncertainties in waste composition and transfer coefficients in incinerator
- chemical, inorganic: 0 kg; pedigree (1,1,1,1,1)
  Auxilliary inputs for the wastewater treatment stage of the incinerator plant. Proxy for Polyelectrolyte.
  Uncertainty: uncertainty calculated from uncertainty in average Polyelectrolyte input, of transfer coefficients in the incinerator, and the uncertainty of the waste composition of this waste
  properties: carbon content, fossil 0.003, wet mass 1 kg, dry mass 1 kg
- municipal waste incineration facility: 0 unit
  Demands per kilogram waste.
- chemical, organic: 0 kg; pedigree (1,1,1,1,1)
  Auxilliary inputs for the wastewater treatment stage of the incinerator plant. Proxy for (pure) Trisodium-trimercapto-s-triazine (CAS 17766-26-6), used as 15% diluted solution, aka TMT15.
  Uncertainty: uncertainty calculated from uncertainty in average TMT15 input, of transfer coefficients in the incinerator, and the uncertainty of the waste composition of this waste
  properties: carbon content, fossil 0.628, wet mass 1 kg, dry mass 1 kg
- titanium dioxide: 8.5256e-7 kg; lognormal variance with pedigree 0.54011, pedigree (1,1,3,1,1)
  Input to DeNOx stage (TiO2 catalyst carrier)
  Uncertainty: uncertainty calculated from uncertainty in average DeNOx input, uncertainty in the share of thermal NOx, uncertainty of nitrogen content in average municipal waste and the uncertainty in nitrogen content in *this* waste.
  properties: dry mass 1 kg, wet mass 1 kg
- transport, freight, lorry, unspecified: 0, 0, 0 metric ton*km (3 entries); pedigree (1,1,1,1,1)
  Transport services to transport incineration residues to landfills.
  Uncertainty: uncertainty calculated from uncertainty of the waste composition of this waste, uncertainty of transfer coefficients and the uncertainty in generic transportation distances
- heat, district or industrial, natural gas: 0 MJ; pedigree (1,1,1,1,1)
  Input to DeNOx stage, to heat up flue gas in low-dust SCR.
  Uncertainty: uncertainty calculated from uncertainty in average DeNOx input, uncertainty in the share of thermal NOx, uncertainty of nitrogen content in average municipal waste and the uncertainty in nitrogen content in *this* waste.
- process-specific burdens, residual material landfill: 0, 0, 0 kg (3 entries); pedigree (1,1,1,1,1)
  Mass-specific expenditures required for landfilling of incineration residues.
  Uncertainty: uncertainty is calculated from uncertainties in waste composition and transfer coefficients in incinerator
- water, decarbonised: 0, 0, 0, 0, 0, 0, 0, 0, 0, 0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 kg (13 entries); pedigree (1,1,1,1,1)
  Incinerator process water used in flue gas scrubber stage.
  Uncertainty: uncertainty calculated from uncertainty in average water input, and the uncertainty of the waste composition of this waste
  properties: wet mass 1 kg
- residual material landfill: 0 unit; pedigree (1,1,1,1,1)
  Landfill infrastructure required for landfilling of incineration residues.
  Uncertainty: uncertainty is calculated from uncertainties in waste composition and transfer coefficients in incinerator
- chromium oxide, flakes: 0 kg; pedigree (1,1,1,1,1)
  Input to DeNOx stage.
  Uncertainty: uncertainty calculated from uncertainty in average DeNOx input, uncertainty in the share of thermal NOx, uncertainty of nitrogen content in average municipal waste and the uncertainty in nitrogen content in *this* waste.
  properties: wet mass 1 kg, dry mass 1 kg
- quicklime, milled, packed: 0 kg; pedigree (1,1,1,1,1)
  Auxilliary inputs for the flue gas treatment stage of the incinerator plant.
  Uncertainty: uncertainty calculated from uncertainty in average CaO input, of transfer coefficients in the incinerator, and the uncertainty of the waste composition of this waste
  properties: wet mass 1 kg, water content 0.010101, dry mass 0.99 kg
- cement, unspecified: 0, 0, 0, 0, 0, 0, 0, 0, 0, 0 kg (10 entries); pedigree (1,1,1,1,1)
  Cement required for solidification of landfilled residual material.
  Uncertainty: Uncertainty calculated from uncertainty of the waste composition of this waste, of transfer coefficients in the incinerator and of the solidification recipe.
  properties: wet mass 1 kg, dry mass 1 kg
- sodium hydroxide, without water, in 50% solution state: 0 kg; pedigree (1,1,1,1,1)
  Auxilliary inputs for the flue gas treatment stage of the incinerator plant.
  Uncertainty: uncertainty calculated from uncertainty in average NaOH input, of transfer coefficients in the incinerator, and the uncertainty of the waste composition of this waste
  properties: dry mass 1 kg, wet mass 1 kg
- ammonia, liquid: 0 kg; pedigree (1,1,1,1,1)
  Input to DeNOx stage (100% NH3).
  Uncertainty: uncertainty calculated from uncertainty in average DeNOx input, uncertainty in the share of thermal NOx, uncertainty of nitrogen content in average municipal waste and the uncertainty in nitrogen content in *this* waste.
  properties: dry mass 1 kg, wet mass 1 kg
- waste cement, hydrated: 0, 0 kg (2 entries); pedigree (1,1,1,1,1)
  (same comment as for waste cement, hydrated)
- heat, district or industrial, natural gas: 0.000209845, 0.000751658, 0.0118636 MJ (3 entries); lognormal variance with pedigree 0.2588, pedigree (1,1,3,1,1)
  (same comment as for heat, district or industrial, natural gas)
- metal working, average for steel product manufacturing: 0.000585519 kg; lognormal variance with pedigree 0.0101, pedigree (2,5,2,3,2)
  Brackets, manufacture
- extrusion, plastic film: 0.00166979 kg; lognormal variance with pedigree 0.0101, pedigree (2,5,2,3,2)
  Net and rope, manufacture, replaced every 2 years
- extrusion, plastic pipes: 0.00170798 kg; lognormal variance with pedigree 0.0101, pedigree (2,5,2,3,2)
  HDPE pipes, manufacture
- steel, low-alloyed: 0.00374695 kg; lognormal variance with pedigree 0.0101, pedigree (2,5,2,3,2)
  Brackets, catwalk and wire ropes, material
- polyethylene, high density, granulate: 0.00206404 kg; lognormal variance with pedigree 0.0101, pedigree (2,5,2,3,2)
  HDPE pipes, material
- wire drawing, steel: 0.00134122 kg; lognormal variance with pedigree 0.0101, pedigree (2,5,2,3,2)
  Wire ropes, manufacture
- polystyrene, expandable: 0.000465347 kg; lognormal variance with pedigree 0.0101, pedigree (2,5,2,3,2)
  Pipe filling for flotation
- weaving, synthetic fibre: 0.00159803 kg; lognormal variance with pedigree 0.0101, pedigree (2,5,2,3,2)
  Net and rope, manufacture, replaced every 2 years
- sheet rolling, steel: 0.00567468 kg; lognormal variance with pedigree 0.0101, pedigree (2,5,2,3,2)
  Catwalk, manufacture
- waste polyethylene: -4.47918e-6, -5.13068e-7, -2.11915e-7, -2.01233e-7, -7.6788e-6, -8.56113e-8, -3.88025e-8, -5.37558e-5 kg (8 entries); lognormal variance with pedigree 0.0101, pedigree (2,5,2,3,2)
  A 10% of expanded polystyrene is considered to be a waste flow of the system
  production volume 2.184 kg
- waste expanded polystyrene: -2.54178e-6, -0.000203834 kg (2 entries); lognormal variance with pedigree 0.0101, pedigree (2,5,2,3,2)
  A 10% of polyethylene is considered to be a waste flow of the system
  production volume 8.016 kg
- nylon 6-6: 0.000528297, 0.00106974 kg (2 entries); lognormal variance with pedigree 0.0101, pedigree (2,5,2,3,2)
  Net and rope, material, replaced every 2 years
- scrap steel: -0.00232257, -2.38138e-7, -0.00790902 kg (3 entries); lognormal variance with pedigree 0.0101, pedigree (2,5,2,3,2)
  A 10% of steel is considered to be a waste flow of the system.
  production volume 12.12 kg
- corrugated board box: 0.000199658 kg; lognormal variance with pedigree 0.202, pedigree (3,4,5,1,3)
  Schwarz et al. 1992
  EcoSpold01Location=RER
  Uncertainty: Schwarz et al. 1992
- waste paperboard, unsorted: -0.000248448 kg; lognormal variance with pedigree 0.202, pedigree (3,4,5,1,3)
  EcoSpold01Location=CH
  Calculated with use
  Uncertainty: Calculated with use
  production volume 69.4775 kg
- steel, low-alloyed, hot rolled: 0.013362 kg; lognormal variance with pedigree 0.1381, pedigree (1,2,4,1,1)
  EcoSpold01Location=RER
  Literature and own estimations
  Uncertainty: Literature and own estimations
- polyurethane, flexible foam: 2.10094e-6 kg; lognormal variance with pedigree 0.1381, pedigree (1,2,4,1,1)
  (same comment as for steel, low-alloyed, hot rolled)
- aluminium, wrought alloy: 0.00899174 kg; lognormal variance with pedigree 0.1381, pedigree (1,2,4,1,1)
  Literature and own estimations
  EcoSpold01Location=RER
  Uncertainty: Literature and own estimations
- section bar extrusion, aluminium: 0.0065559 kg; lognormal variance with pedigree 0.202, pedigree (3,4,5,1,3)
  Estimation
  EcoSpold01Location=RER
  Uncertainty: Estimation
- synthetic rubber: 0.000229929 kg; lognormal variance with pedigree 0.1381, pedigree (1,2,4,1,1)
  (same comment as for steel, low-alloyed, hot rolled)
- section bar rolling, steel: 0.0019786 kg; lognormal variance with pedigree 0.202, pedigree (3,4,5,1,3)
  EcoSpold01Location=RER
  Brunschweiler 1993
  Uncertainty: Brunschweiler 1993
- polystyrene, high impact: 0.00100962 kg; lognormal variance with pedigree 0.202, pedigree (3,4,5,1,3)
  EcoSpold01Location=RER
  Schwarz et al. 1992
  Uncertainty: Schwarz et al. 1992
- waste polystyrene isolation, flame-retardant: -0.000214859, -2.07607e-6 kg (2 entries); lognormal variance with pedigree 0.202, pedigree (3,4,5,1,3)
  EcoSpold01Location=CH
  Disposal of plastics parts at end of life
  Uncertainty: Disposal of plastics parts at end of life
  production volume 3.65679 kg
- waste polyethylene/polypropylene product: -0.000540498, -1.06621e-5 kg (2 entries); lognormal variance with pedigree 0.202, pedigree (3,4,5,1,3)
  Disposal of plastics parts at end of life
  EcoSpold01Location=CH
  Uncertainty: Disposal of plastics parts at end of life
  production volume 784.501 kg
- section bar rolling, steel: 0.000720211 kg; source Jungbluth N. 2012; lognormal variance with pedigree 0.008, pedigree (1,1,4,1,1)
  EcoSpold01Location=RER
  Estimation/measured value. Data from different manufacturers of open ground mounting systems. An expert estimation is then taken for this dataset.
- zinc coat, pieces: 3.81084e-5 m2; source Jungbluth N. 2012, p. 104; lognormal variance with pedigree 0.1899, pedigree (3,4,5,1,3)
  Estimation. Used for the coating of the zinc coated steel used for the mounting structure.
  EcoSpold01Location=RER
- reinforcing steel: 0.00286403 kg; source Jungbluth N. 2012, p. 101; lognormal variance with pedigree 0.008, pedigree (1,1,4,1,1)
  Literature and own estimations
  EcoSpold01Location=RER
- section bar extrusion, aluminium: 0.00157674 kg; source Jungbluth N. 2012; lognormal variance with pedigree 0.1365, pedigree (1,2,4,1,1)
  Estimation/measured value. Data from different manufacturers of open ground mounting systems. An expert estimation is then taken for this dataset.
  EcoSpold01Location=RER
- zinc coat, coils: 0.000709608 m2; source Frischknecht R. 1996; lognormal variance with pedigree 0.1899, pedigree (3,4,5,1,3)
  EcoSpold01Location=RER
  Literature value / estimation. According to Daniel Fraile Montoro from EPIA all ground-mounted PV systems have a fence because of the insurance and the risk of high voltage access. He states that there are many different types of fences, but as a normal one a two meters meshed fence with some wire on the top could be considered [Personal communication with Daniel Fraile Montoro from the European Photovoltaic Industry Associa-tion, 17.11.2009]. For the inventory of such a fence, we consider the steel, zinc, and concrete input. The steel is drawn to wire and the zinc is used for a coils coating.
- concrete, normal: 3.72189e-8 m3; source de Wild-Scholten M. J. 2006; lognormal variance with pedigree 0.008, pedigree (1,1,4,1,1)
  Literature value / estimation. According to Daniel Fraile Montoro from EPIA all ground-mounted PV systems have a fence because of the insurance and the risk of high voltage access. He states that there are many different types of fences, but as a normal one a two meters meshed fence with some wire on the top could be considered [Personal communication with Daniel Fraile Montoro from the European Photovoltaic Industry Associa-tion, 17.11.2009]. For the inventory of such a fence, we consider the steel, zinc, and concrete input. The steel is drawn to wire and the zinc is used for a coils coating.
  EcoSpold01Location=CH
- steel, chromium steel 18/8, hot rolled: 0.000720785 kg; source Jungbluth N. 2012, p. 101; lognormal variance with pedigree 0.1459, pedigree (2,3,4,1,1)
  Estimation/measured value. Stainless steel. Data from different manufacturers of open ground mounting systems. An expert estimation is then taken for this dataset.
  EcoSpold01Location=RER
  Uncertainty: It has to be noted that the amount of materials per m2 is quite variable. It depends on factors like actual panel size and location of installation. Thus, for example in Switzerland the mounting structure must be stable also with a certain snow load on the panel while this might not be necessary in Southern Europe. Also the expected maximum wind velocities influence the amount of materials used in the mounting structure. Moreover, larger panels need less amount of mounting materials per square metre.
- waste polyethylene/polypropylene product: -0.000568113 kg; lognormal variance with pedigree 0.1899, pedigree (3,4,5,1,3)
  EcoSpold01Location=CH
  Estimation. Disposal of plastics parts at end of life
  production volume 3.08138 kg
- waste polystyrene isolation, flame-retardant: -0.000432196 kg; lognormal variance with pedigree 0.1899, pedigree (3,4,5,1,3)
  EcoSpold01Location=CH
  Calculated value. Disposal of plastics parts at end of life
  production volume 15.4071 kg
- scrap aluminium: -9.17609e-5, -4.07001e-6, -0.00149647 kg (3 entries)
  Calculated value
  production volume 13490.3 kg
- corrugated board box: 5.67629e-7, 4.82221e-5 kg (2 entries); source Schwarz U. 1992; lognormal variance with pedigree 0.1899, pedigree (3,4,5,1,3)
  EcoSpold01Location=RER
  Literature value. Packaging material. Packaging materials are assumed to be the same as reported by Schwarz & Keller (1992) for a mounted slanted roof system.
- waste reinforced concrete: -0.00663395, -1.37828e-5, -0.0779763 kg (3 entries)
  production volume 28980.4 kg
- sheet rolling, steel: 0.00169463 kg; lognormal variance with pedigree 0.202, pedigree (3,4,5,1,3)
  EcoSpold01Location=RER
  Estimation
  Uncertainty: Estimation
- concrete, normal: 5.79872e-7 m3; lognormal variance with pedigree 0.0831, pedigree (3,5,5,3,3)
- sheet rolling, aluminium: 8.24707e-5 kg; lognormal variance with pedigree 0.0831, pedigree (3,5,5,3,3)
  Activity link used to reflect the reality of the local market
- polystyrene foam slab: 0.000931861 kg; lognormal variance with pedigree 0.0831, pedigree (3,5,5,3,3)
- clay brick: 0.0069462 kg; lognormal variance with pedigree 0.288, pedigree (4,5,5,5,5)
- flat glass, uncoated: 0.000262622 kg; lognormal variance with pedigree 0.288, pedigree (4,5,5,5,5)
- diesel, burned in building machine: 0.0126665 MJ; lognormal variance with pedigree 0.288, pedigree (4,5,5,5,5)
- fibre cement corrugated slab: 0.00116022 kg; lognormal variance with pedigree 0.288, pedigree (4,5,5,5,5)
- stone wool, packed: 0.000848139 kg; lognormal variance with pedigree 0.288, pedigree (4,5,5,5,5)
- waste cement-fibre slab: -0.00105032 kg; lognormal variance with pedigree 0.288, pedigree (4,5,5,5,5)
  production volume 99 kg
- waste mineral wool: -0.000214361, -0.000522739 kg (2 entries); lognormal variance with pedigree 0.288, pedigree (4,5,5,5,5)
  production volume 39.6 kg
- cement mortar: 7.74514e-6, 0.00153935 kg (2 entries); lognormal variance with pedigree 0.288, pedigree (4,5,5,5,5)
- waste cement in concrete and mortar: -0.000880535, -0.00223228 kg (2 entries); lognormal variance with pedigree 0.288, pedigree (4,5,5,5,5)
  production volume 63 kg
- waste glass sheet: -8.94674e-5, -0.000344751 kg (2 entries); lognormal variance with pedigree 0.288, pedigree (4,5,5,5,5)
  production volume 13.5 kg
- waste bulk iron, excluding reinforcement: -0.00137845, -0.00286643 kg (2 entries); lognormal variance with pedigree 0.288, pedigree (4,5,5,5,5)
  production volume 99.6 kg
- concrete, normal: 1.33889e-6, 1.3951e-7, 1.12943e-6, 6.35307e-7, 2.69035e-6, 9.07438e-8, 5.22897e-5 m3 (7 entries); lognormal variance with pedigree 0.288, pedigree (4,5,5,5,5)
- electricity, medium voltage: 3.92128e-5, 7.13507e-6, 4.19882e-5, 0.000142905, 0.000121, 0.00175437, 0.000251084, 0.000822653 kWh (8 entries); lognormal variance with pedigree 0.288, pedigree (4,5,5,5,5)
- waste brick: -0.000101325, -0.00769503 kg (2 entries); lognormal variance with pedigree 0.288, pedigree (4,5,5,5,5)
  production volume 321 kg
- particle board, for indoor use: 9.87659e-7 m3; lognormal variance with pedigree 0.288, pedigree (4,5,5,5,5)
- sawnwood, softwood, raw, dried (u=10%): 2.24623e-6 m3; lognormal variance with pedigree 0.288, pedigree (4,5,5,5,5)
- glued laminated timber, for indoor use: 1.31173e-6 m3; lognormal variance with pedigree 0.288, pedigree (4,5,5,5,5)
- waste fibreboard: -0.00149171 kg; lognormal variance with pedigree 0.288, pedigree (4,5,5,5,5)
  production volume 177.6 kg
- sawnwood, softwood, dried (u=10%), planed: 1.28356e-7 m3; lognormal variance with pedigree 0.288, pedigree (4,5,5,5,5)
- waste wood, untreated: -0.000208817, -2.59278e-5, -1.89561e-6, -7.28233e-5, -1.10018e-5, -1.7393e-5, -0.00032513, -0.00277036 kg (8 entries); lognormal variance with pedigree 0.288, pedigree (4,5,5,5,5)
  production volume 239.7 kg
- inverter, 2.5kW: 4.87177e-6 unit; lognormal variance with pedigree 0.38, pedigree (4,4,5,5,3)
  Data from 3kWel unit for use in photovoltaics
  EcoSpold01Location=RER
  Uncertainty: data from 3kWel unit for use in photovoltaics
- transport, passenger car: 0.00243588 km; lognormal variance with pedigree 0.2, pedigree (4,4,5,5,3)
  EcoSpold01Location=CH
  Estimation
  Uncertainty: estimation
- injection moulding: 0.00103655 kg; lognormal variance with pedigree 0.0546, pedigree (2,4,5,5,1)
  EcoSpold01Location=RER
  Based on material input
  Uncertainty: based on material input
- platinum: 7.30765e-9 kg; lognormal variance with pedigree 0.074, pedigree (3,4,5,5,3)
  EcoSpold01Location=RER
  Value for expected serial production
  Uncertainty: value for expected serial production
- polypropylene, granulate: 3.65729e-6 kg; lognormal variance with pedigree 0.0726, pedigree (2,4,5,5,3)
  (same comment as for platinum)
- fuel cell, stack polymer electrolyte membrane, 2kW electrical, future: 6.08971e-6 unit; lognormal variance with pedigree 0.37, pedigree (5,5,5,5,1)
  EcoSpold01Location=CH
  Material input
  Uncertainty: material input
- sheet rolling, chromium steel: 0.000350563 kg; lognormal variance with pedigree 0.0546, pedigree (2,4,5,5,1)
  EcoSpold01Location=RER
  Based on material input
  Uncertainty: based on material input
- building, hall, steel construction: 2.55768e-8 m2; lognormal variance with pedigree 0.372, pedigree (4,4,5,5,1)
  EcoSpold01Location=CH
  Rough estimation based on company data
  Uncertainty: rough estimation based on company data
- sheet rolling, aluminium: 0.000643188 kg; lognormal variance with pedigree 0.0546, pedigree (2,4,5,5,1)
  EcoSpold01Location=RER
  Based on material input
  Uncertainty: based on material input
- wastewater, from residence: -8.89098e-7 m3; lognormal variance with pedigree 0.142, pedigree (4,4,5,5,4)
  Approximation for waste water treatment
  EcoSpold01Location=CH
  Uncertainty: approximation for waste water treatment
  production volume 0.438 m3
- heating and sanitary equipment, mini CHP plant: 3.95831e-6 unit; lognormal variance with pedigree 0.39, pedigree (4,4,5,5,3)
  Approximation based on similar process
  EcoSpold01Location=CH
  Uncertainty: approximation based on similar process
- charcoal: 3.04486e-6 kg; lognormal variance with pedigree 0.282, pedigree (4,4,5,5,5)
  EcoSpold01Location=GLO
  Proxy for activated carbon
  Uncertainty: proxy for activated carbon
- cast iron: 0.000758775 kg; lognormal variance with pedigree 0.0726, pedigree (2,4,5,5,3)
  (same comment as for platinum)
- building, multi-storey: 1.52243e-7 m3; lognormal variance with pedigree 0.372, pedigree (4,4,5,5,1)
  EcoSpold01Location=RER
  Rough estimation based on company data
  Uncertainty: rough estimation based on company data
- electricity, low voltage: 0.000846967, 0.000148547, 0.00336906, 0.0120789, 0.00244271, 0.0369409, 0.00608905, 0.0173445 kWh (8 entries); lognormal variance with pedigree 0.064, pedigree (3,4,5,5,3)
  EcoSpold01Location=CH
  Estimation based on specific energy demand of engineering hours
  Uncertainty: estimation based on specific energy demand of engineering hours
- heat, central or small-scale, other than natural gas: 0.000131157, 0.00917563 MJ (2 entries); lognormal variance with pedigree 0.064, pedigree (3,4,5,5,3)
  (same comment as for electricity, low voltage)
- waste bitumen sheet: -3.82322e-6 kg; lognormal variance with pedigree 0.0421, pedigree (1,2,5,5,1)
  EcoSpold01Location=CH
  production volume 3.54 kg
- copper: 0.000157393 kg; lognormal variance with pedigree 0.0421, pedigree (1,2,5,5,1)
  EcoSpold01Location=RER
- glass fibre: 3.25617e-6 kg; lognormal variance with pedigree 0.0421, pedigree (1,2,5,5,1)
  EcoSpold01Location=RER
- excavation, skid-steer loader: 3.8231e-5 m3; lognormal variance with pedigree 0.0421, pedigree (1,2,5,5,1)
  EcoSpold01Location=RER
- waste polyurethane foam: -3.44562e-5 kg; lognormal variance with pedigree 0.0421, pedigree (1,2,5,5,1)
  EcoSpold01Location=CH
  production volume 16.29 kg
- stone wool: 0.000456898 kg; lognormal variance with pedigree 0.0421, pedigree (1,2,5,5,1)
  EcoSpold01Location=CH
- sawnwood, softwood, dried (u=20%), planed: 3.59169e-6 m3; lognormal variance with pedigree 0.0421, pedigree (1,2,5,5,1)
  EcoSpold01Location=RER
- glass fibre reinforced plastic, polyester resin, hand lay-up: 1.46616e-5 kg; lognormal variance with pedigree 0.0421, pedigree (1,2,5,5,1)
  EcoSpold01Location=RER
- waste building wood, chrome preserved: -0.000196429 kg; lognormal variance with pedigree 0.0421, pedigree (1,2,5,5,1)
  EcoSpold01Location=CH
  production volume 1494 kg
- polyurethane, rigid foam: 3.44562e-5 kg; lognormal variance with pedigree 0.0421, pedigree (1,2,5,5,1)
  EcoSpold01Location=RER
- epoxy resin, liquid: 4.73323e-5 kg; lognormal variance with pedigree 0.0421, pedigree (1,2,5,5,1)
  EcoSpold01Location=RER
- gravel, round: 0.00866775 kg; lognormal variance with pedigree 0.0421, pedigree (1,2,5,5,1)
  EcoSpold01Location=CH
- lean concrete: 2.16616e-6 m3; lognormal variance with pedigree 0.0421, pedigree (1,2,5,5,1)
  EcoSpold01Location=CH
- aluminium, cast alloy: 7.6812e-6 kg; lognormal variance with pedigree 0.0421, pedigree (1,2,5,5,1)
  EcoSpold01Location=RER
- sanitary ceramics: 0.00017151 kg; lognormal variance with pedigree 0.0421, pedigree (1,2,5,5,1)
  EcoSpold01Location=CH
- fibre cement facing tile: 0.000626735 kg; lognormal variance with pedigree 0.0421, pedigree (1,2,5,5,1)
  EcoSpold01Location=CH
- kraft paper, unbleached: 6.53039e-5 kg; lognormal variance with pedigree 0.0421, pedigree (1,2,5,5,1)
  EcoSpold01Location=RER
- excavation, hydraulic digger: 0.000152809 m3; lognormal variance with pedigree 0.0421, pedigree (1,2,5,5,1)
  EcoSpold01Location=RER
- cement, Portland: 0.000178258, 5.74804e-6, 9.96199e-6, 8.17175e-6, 0.00017223, 0.000199441, 8.39483e-6, 0.00117297 kg (8 entries); lognormal variance with pedigree 0.0421, pedigree (1,2,5,5,1)
  EcoSpold01Location=CH
- waste glass: -2.60352e-7, -2.39961e-8, -5.4439e-10, -2.2388e-9, -3.39974e-9, -1.00178e-8, -4.89627e-7, -2.45359e-6 kg (8 entries); lognormal variance with pedigree 0.0421, pedigree (1,2,5,5,1)
  EcoSpold01Location=CH
  production volume 26.37 kg
- pitch: 4.57755e-6, 2.60883e-7, 1.51689e-5, 1.18075e-5, 5.29261e-7, 7.5557e-7, 6.6749e-5 kg (7 entries); lognormal variance with pedigree 0.0421, pedigree (1,2,5,5,1)
  EcoSpold01Location=CH
- waste concrete, not reinforced: -0.000327767, -0.0046778 kg (2 entries); lognormal variance with pedigree 0.0421, pedigree (1,2,5,5,1)
  EcoSpold01Location=CH
  production volume 13770 kg
- waste plastic, mixture: -2.40786e-7, -1.60884e-8, -1.21674e-9, -6.64509e-9, -2.68454e-9, -6.31014e-9, -2.05161e-7, -1.68564e-6 kg (8 entries); lognormal variance with pedigree 0.0421, pedigree (1,2,5,5,1)
  EcoSpold01Location=CH
  production volume 17.58 kg
- waste bitumen: -3.12157e-5, -6.49116e-5 kg (2 entries); lognormal variance with pedigree 0.0421, pedigree (1,2,5,5,1)
  EcoSpold01Location=CH
  production volume 3240 kg
- roof tile: 0.000113695 kg; lognormal variance with pedigree 0.0421, pedigree (1,2,5,5,1)
  EcoSpold01Location=RER
- calendering, rigid sheets: 4.24031e-7 kg; lognormal variance with pedigree 0.0421, pedigree (1,2,5,5,1)
  EcoSpold01Location=RER
- waste sealing sheet, polyvinylchloride: -4.24031e-7 kg; lognormal variance with pedigree 0.0421, pedigree (1,2,5,5,1)
  EcoSpold01Location=CH
  production volume 4.47 kg
- polyvinylchloride, bulk polymerised: 4.83081e-5 kg; lognormal variance with pedigree 0.0421, pedigree (1,2,5,5,1)
  EcoSpold01Location=RER
- sand: 1.09219e-8, 2.1038e-6, 0.000136906 kg (3 entries); lognormal variance with pedigree 0.0421, pedigree (1,2,5,5,1)
  EcoSpold01Location=CH
- waste polyvinylchloride product: -1.34006e-5, -3.44834e-5 kg (2 entries); lognormal variance with pedigree 0.0421, pedigree (1,2,5,5,1)
  EcoSpold01Location=CH
  production volume 22.92 kg
- used air filter in exhaust air valve: -0.00054668 unit; lognormal variance with pedigree 0.046, pedigree (3,4,5,5,1)
  Questionnaire, Data related to building considered
  EcoSpold01Location=CH
  Uncertainty: Questionnaire, Data related to building considered
- used air filter decentralized unit, 180-250 m3/h: -0.000365177 unit; lognormal variance with pedigree 0.046, pedigree (3,4,5,5,1)
  (same comment as for used air filter in exhaust air valve)
- used silencer steel, DN 125: -0.000101519 unit; lognormal variance with pedigree 0.046, pedigree (3,4,5,5,1)
  (same comment as for used air filter in exhaust air valve)
- blower and heat exchange unit, decentralized, 180-250 m3/h: 2.53907e-5 unit; lognormal variance with pedigree 0.046, pedigree (3,4,5,5,1)
  EcoSpold01Location=RER
  Questionnaire, Data related to building considered
  Uncertainty: Questionnaire, Data related to building considered
- flexible duct, aluminium/PET, DN of 125: 6.1903e-5 m; lognormal variance with pedigree 0.046, pedigree (3,4,5,5,1)
  (same comment as for blower and heat exchange unit, decentralized, 180-250 m3/h)
- used blower and heat exchange unit decentralized, 180-250 m3/h: -2.53907e-5 unit; lognormal variance with pedigree 0.046, pedigree (3,4,5,5,1)
  (same comment as for used air filter in exhaust air valve)
- air filter, decentralized unit, 180-250 m3/h: 0.000365177 unit; lognormal variance with pedigree 0.046, pedigree (3,4,5,5,1)
  (same comment as for blower and heat exchange unit, decentralized, 180-250 m3/h)
- used flexible duct aluminium/PET, DN of 125: -6.1903e-5 m; lognormal variance with pedigree 0.046, pedigree (3,4,5,5,1)
  EcoSpold01Location=CH
  Questionnaire, Data related to building considered
  Uncertainty: Questionnaire, Data related to building considered
- ventilation control and wiring, decentralized unit: 2.53907e-5 unit; lognormal variance with pedigree 0.046, pedigree (3,4,5,5,1)
  (same comment as for blower and heat exchange unit, decentralized, 180-250 m3/h)
- used ventilation control and wiring decentralized unit: -2.53907e-5 unit; lognormal variance with pedigree 0.046, pedigree (3,4,5,5,1)
  (same comment as for used air filter in exhaust air valve)
- ventilation system, decentralized, 6 x 120 m3/h, polyethylene ducts, with earth tube heat exchanger: 1.39134e-7 unit; lognormal variance with pedigree 0.046, pedigree (3,4,5,5,1)
  (same comment as for used flexible duct aluminium/PET, DN of 125)
- air filter, in exhaust air valve: 0.00054668 unit; lognormal variance with pedigree 0.046, pedigree (3,4,5,5,1)
  (same comment as for blower and heat exchange unit, decentralized, 180-250 m3/h)
- silencer, steel, DN 125: 0.000101519 unit; lognormal variance with pedigree 0.046, pedigree (3,4,5,5,1)
  (same comment as for used air filter in exhaust air valve)
- ventilation system, decentralized, 6 x 120 m3/h, polyethylene ducts: 1.39134e-7 unit; lognormal variance with pedigree 0.046, pedigree (3,4,5,5,1)
  (same comment as for used flexible duct aluminium/PET, DN of 125)
- ventilation system, decentralized, 6 x 120 m3/h, steel ducts, with earth tube heat exchanger: 1.38707e-7 unit; lognormal variance with pedigree 0.042, pedigree (1,1,5,5,1)
  3,4,1,1,1,nA; Questionnaire, Data related to building considered
  EcoSpold01Location=CH
- ventilation system, decentralized, 6 x 120 m3/h, steel ducts: 1.38707e-7 unit; lognormal variance with pedigree 0.046, pedigree (3,4,5,5,1)
  (same comment as for used flexible duct aluminium/PET, DN of 125)
- exhaust air roof hood, steel, DN 400: 5.91888e-7 unit; lognormal variance with pedigree 0.042, pedigree (1,1,5,5,1)
  2,4,1,1,1,nA; Questionnaire, Data related to building considered
  EcoSpold01Location=CH
- used room-connecting overflow element steel, approx. 40 m3/h: -5.61155e-5 unit; lognormal variance with pedigree 0.0446, pedigree (2,4,5,5,1)
  (same comment as for used air filter in exhaust air valve)
  production volume 71.394 unit
- outside air intake, stainless steel, DN 370: 5.91888e-7 unit; lognormal variance with pedigree 0.0446, pedigree (2,4,5,5,1)
  Questionnaire, Data related to building considered
  EcoSpold01Location=RER
  Uncertainty: Questionnaire, Data related to building considered
- used insulation spiral-seam duct rockwool, DN 400: -2.36755e-5 m; lognormal variance with pedigree 0.0446, pedigree (2,4,5,5,1)
  (same comment as for used flexible duct aluminium/PET, DN of 125)
  production volume 158.653 m
- insulation spiral-seam duct, rockwool, DN 400, 30 mm: 2.36755e-5 m; lognormal variance with pedigree 0.0446, pedigree (2,4,5,5,1)
  (same comment as for blower and heat exchange unit, decentralized, 180-250 m3/h)
- used exhaust air roof hood steel, DN 400: -5.91888e-7 unit; lognormal variance with pedigree 0.0446, pedigree (2,4,5,5,1)
  (same comment as for used flexible duct aluminium/PET, DN of 125)
  production volume 3.96633 unit
- supply air inlet, steel/SS, DN 75: 9.35258e-5 unit; lognormal variance with pedigree 0.0446, pedigree (2,4,5,5,1)
  (same comment as for outside air intake, stainless steel, DN 370)
- air distribution terminal panel, steel, 120 m3/h: 3.74103e-5 unit; lognormal variance with pedigree 0.0446, pedigree (2,4,5,5,1)
  (same comment as for used flexible duct aluminium/PET, DN of 125)
- exhaust air valve, in-wall housing, plastic/steel, DN 125: 5.61155e-5 unit; lognormal variance with pedigree 0.0446, pedigree (2,4,5,5,1)
  (same comment as for used air filter in exhaust air valve)
- spiral-seam duct, steel, DN 125: 3.74103e-5 m; lognormal variance with pedigree 0.0446, pedigree (2,4,5,5,1)
  (same comment as for outside air intake, stainless steel, DN 370)
- used air distribution terminal panel steel, 120 m3/h: -3.74103e-5 unit; lognormal variance with pedigree 0.0446, pedigree (2,4,5,5,1)
  (same comment as for used air filter in exhaust air valve)
  production volume 47.596 unit
- spiral-seam duct, steel, DN 400: 2.36755e-5 m; lognormal variance with pedigree 0.0446, pedigree (2,4,5,5,1)
  (same comment as for blower and heat exchange unit, decentralized, 180-250 m3/h)
- used exhaust air valve in-wall housing, plastic/steel: -5.61155e-5 unit; lognormal variance with pedigree 0.0446, pedigree (2,4,5,5,1)
  (same comment as for used flexible duct aluminium/PET, DN of 125)
  production volume 71.394 unit
- polyethylene pipe, DN 200, SDR 41: 7.10266e-5 m; lognormal variance with pedigree 0.0446, pedigree (2,4,5,5,1)
  (same comment as for blower and heat exchange unit, decentralized, 180-250 m3/h)
- room-connecting overflow element, steel, approx. 40 m3/h: 5.61155e-5 unit; lognormal variance with pedigree 0.0446, pedigree (2,4,5,5,1)
  (same comment as for outside air intake, stainless steel, DN 370)
- polyethylene pipe, corrugated, DN 75: 0.000687417 m; lognormal variance with pedigree 0.0446, pedigree (2,4,5,5,1)
  (same comment as for outside air intake, stainless steel, DN 370)
- sealing tape, aluminium/PE, 50 mm wide: 0.001323 m; lognormal variance with pedigree 0.0446, pedigree (2,4,5,5,1)
  (same comment as for blower and heat exchange unit, decentralized, 180-250 m3/h)
- used outside air intake stainless steel, DN 370: -5.91888e-7 unit; lognormal variance with pedigree 0.0446, pedigree (2,4,5,5,1)
  (same comment as for used flexible duct aluminium/PET, DN of 125)
  production volume 3.96633 unit
- used sealing tape aluminium/PE, 50 mm wide: -0.001323 m; lognormal variance with pedigree 0.0446, pedigree (2,4,5,5,1)
  (same comment as for used air filter in exhaust air valve)
  production volume 793.266 m
- exhaust air outlet, steel/aluminium, 85x365 mm: 3.03077e-5 unit; lognormal variance with pedigree 0.0446, pedigree (2,4,5,5,1)
  (same comment as for used flexible duct aluminium/PET, DN of 125)
- ventilation duct, steel, 100x50 mm: 0.000839391 m; lognormal variance with pedigree 0.0446, pedigree (2,4,5,5,1)
  (same comment as for blower and heat exchange unit, decentralized, 180-250 m3/h)
- ventilation duct, elbow 90°, steel, 100x50 mm: 0.000318969 unit; lognormal variance with pedigree 0.0446, pedigree (2,4,5,5,1)
  (same comment as for outside air intake, stainless steel, DN 370)
- ventilation duct, connection piece, steel, 100x50 mm: 0.000209848 unit; lognormal variance with pedigree 0.0446, pedigree (2,4,5,5,1)
  (same comment as for blower and heat exchange unit, decentralized, 180-250 m3/h)
- lubricating oil: 6.7873e-6 kg; source ETA Heiztechnik GmbH 2011; lognormal variance with pedigree 0.0618, pedigree (3,3,5,5,1)
  EcoSpold01Location=RER
  estimation - used for the manufacturing of the furnace and for the maintenance. It is just added to the internal part of the furnace. It is assumed not to be dispersed or disposed
- electronics scrap from control units: -1.80458e-5 kg; lognormal variance with pedigree 0.0186, pedigree (1,5,4,5,1)
  EcoSpold01Location=RER
  disposal of the electronics devices of the boiler
  production volume 1.24312e6 kg
- electronics, for control units: 5.86577e-5 kg; source ETA Heiztechnik GmbH 2011; lognormal variance with pedigree 0.0112, pedigree (1,3,4,5,1)
  measured value
  EcoSpold01Location=RER
- inert waste, for final disposal: -0.00315516 kg; lognormal variance with pedigree 0.0186, pedigree (1,5,4,5,1)
  EcoSpold01Location=CH
  disposal of refractory bricks
  production volume 2.62438e7 kg
- refractory, fireclay, packed: 0.00314192 kg; source ETA Heiztechnik GmbH 2011; lognormal variance with pedigree 0.0112, pedigree (1,3,4,5,1)
  EcoSpold01Location=DE
  measured value - refractory bricks in fireclay are used in the combustion chamber inside the furnace (value measured with a technician during wood boilers exposition in the modeled furnace)
- alkyd paint, white, without solvent, in 60% solution state: 6.09222e-6 kg; source ETA Heiztechnik GmbH 2011; lognormal variance with pedigree 0.0284, pedigree (2,3,4,5,1)
  EcoSpold01Location=RER
  calculated value for the furnace cladding
- waste mineral oil: -1.70739e-6, -5.07991e-6 kg (2 entries); lognormal variance with pedigree 0.0186, pedigree (1,5,4,5,1)
  disposal of lubricating oil
  production volume 165750 kg
- waste mineral wool, for final disposal: -0.000181907, -0.000240401 kg (2 entries); lognormal variance with pedigree 0.0186, pedigree (1,5,4,5,1)
  EcoSpold01Location=CH
  disposal of the insulation inside the furnace and for the chimney flue pipes
  production volume 1.24312e7 kg
- waste concrete: -0.003743, -0.051024 kg (2 entries); lognormal variance with pedigree 0.0186, pedigree (1,5,4,5,1)
  EcoSpold01Location=CH
  disposal of the concrete for the furnace basement - around 0,2 m3 of concrete * 2350 kg/m3 (concrete density) = around 460 kg
  production volume 1.26246e8 kg
- waste polyethylene: -2.13915e-6 kg; lognormal variance with pedigree 0.0186, pedigree (1,5,4,5,1)
  EcoSpold01Location=CH
  disposal of plastic materials
  production volume 1.51938e6 kg
- scrap copper: -4.48967e-6, -9.4534e-6 kg (2 entries); lognormal variance with pedigree 0.0186, pedigree (1,5,4,5,1)
  disposal of copper
  production volume 552500 kg
- iron-nickel-chromium alloy: 8.1985e-5 kg; source Uniconfort srl 2011; lognormal variance with pedigree 0.0298, pedigree (3,3,4,5,1)
  estimation - components for the conveyor grate in the combustion chamber
  EcoSpold01Location=RER
- drawing of pipe, steel: 7.77667e-6 kg; source Uniconfort srl 2011; lognormal variance with pedigree 0.0298, pedigree (3,3,4,5,1)
  EcoSpold01Location=RER
  estimation - for water pipes connections
- polyurethane, flexible foam: 5.72828e-7 kg; lognormal variance with pedigree 0.1401, pedigree (1,2,4,5,1)
  Literature and own estimations. Rounded values in the reference table.
  EcoSpold01Location=RER
- steel, unalloyed: 0.00216748 kg; lognormal variance with pedigree 0.0546, pedigree (2,4,5,5,1)
  EcoSpold01Location=RER
  Questionnaire
  Uncertainty: Questionnaire
- waste rubber, unspecified: -5.21136e-7 kg; lognormal variance with pedigree 0.072, pedigree (4,4,5,5,1)
  EcoSpold01Location=CH
  Estimations on precentage material disposed
  Uncertainty: Estimations on precentage material disposed
  production volume 0.02598 kg
- wire drawing, copper: 9.21825e-5 kg; lognormal variance with pedigree 0.056, pedigree (3,4,5,5,1)
  EcoSpold01Location=RER
  Questionnaire, estimations
  Uncertainty: Questionnaire, estimations
- ventilation components factory: 2.04532e-11 unit; lognormal variance with pedigree 0.396, pedigree (4,5,5,5,3)
  EcoSpold01Location=RER
  Calculated with data of a similar company
  Uncertainty: Calculated with data of a similar company
- powder coat, steel: 0.000222107 m2; lognormal variance with pedigree 0.056, pedigree (3,4,5,5,1)
  EcoSpold01Location=RER
  Questionnaire, estimations
  Uncertainty: Questionnaire, estimations
- waste polystyrene: -1.10986e-5, -7.41563e-7, -5.60832e-8, -3.06292e-7, -1.23738e-7, -2.90853e-7, -7.7696e-5 kg (7 entries); lognormal variance with pedigree 0.072, pedigree (4,4,5,5,1)
  Estimations on precentage material disposed
  EcoSpold01Location=CH
  Uncertainty: Estimations on precentage material disposed
  production volume 1.98 kg
- heat, district or industrial, other than natural gas: 4.55965e-6, 0.0101709 MJ (2 entries); lognormal variance with pedigree 0.072, pedigree (1,1,5,5,1)
  EcoSpold01Location=RER
  4,5,1,1,1,5; Data estimated from related companies

## Inputs from nature
- Oxygen [natural resource, in air]: 0 kg; pedigree (1,1,1,1,1)
  Oxygen from ambient air needed to combust and oxidise this waste. Net demand, i.e. without O2 leaving the plant in flue gas uncombusted.
  Uncertainty: uncertainty is calculated from uncertainties in waste composition and transfer coefficients to flue gas and soild residues in incinerator
- Transformation, from pasture, man made [natural resource, land]: 0.000371343 m2; source Mason J. M. 2006; lognormal variance with pedigree 0.1899, pedigree (3,4,5,1,3)
  Literature value/Estimation. The total area of PV modules used in the large PV power plants is not calculated from the cell efficiency, but corresponds to the actual situation at the power plants investigated. The land use related to an open ground mounting system is 4.7 m2 per m2 of installed modules, based on information about a 3.5 MWp open ground power plant described by Mason et al. (2006) and a 560 kWp open ground power plant described by Frischknecht et al. (1996)
  [Frischknecht R., Bollens U., Bosshart S., Ciot M., Ciseri L., Doka G., Dones R., Gantner U., Hischier R. and Martin A. (1996) Ökoinventare von Energiesyste-men: Grundlagen für den ökologischen Vergleich von Energiesystemen und den Einbezug von Energiesystemen in Ökobilanzen für die Schweiz. 3. Gruppe Energie - Stoffe - Umwelt (ESU), Eidgenössische Technische Hochschule Zürich und Sektion Ganzheitliche Systemanalysen, Paul Scherrer Institut, Villigen, Bundesamt für Energie (Hrsg.), Bern, CH, retrieved from: www.energieforschung.ch.]
- Transformation, to industrial area [natural resource, land]: 0.000433835 m2; source Jungbluth N. 2012; lognormal variance with pedigree 0.188, pedigree (3,3,5,3,3)
  Literature value/Estimation. The total area of PV modules used in the large PV power plants is not calculated from the cell efficiency, but corresponds to the actual situation at the power plants investigated.
- Occupation, industrial area [natural resource, land]: 0.0120266 m2*year; source Jungbluth N. 2012; lognormal variance with pedigree 0.188, pedigree (3,3,5,3,3)
  Calculated value.
- Transformation, from unspecified [natural resource, land]: 0.000110889 m2; lognormal variance with pedigree 0.4081, pedigree (3,5,5,3,3)
- Water, unspecified natural origin [natural resource, in water]: 8.89098e-7 m3; lognormal variance with pedigree 0.1246, pedigree (2,4,5,5,4)
  Approximation with company data of similar branch
  Uncertainty: approximation with company data of similar branch
- Occupation, urban, discontinuously built [natural resource, land]: 0.00241685 m2*year; lognormal variance with pedigree 0.0821, pedigree (1,2,5,5,1)
- Occupation, construction site [natural resource, land]: 9.65917e-5 m2*year; lognormal variance with pedigree 0.0821, pedigree (1,2,5,5,1)
- Transformation, to urban, discontinuously built [natural resource, land]: 4.83975e-5 m2; lognormal variance with pedigree 0.1621, pedigree (1,2,5,5,1)

## Emissions to nature
- Chromium [air, urban air close to ground]: 0 kg; pedigree (1,1,1,1,1)
  Emission to air from waste composition and transfer coefficients.
  Uncertainty: uncertainty is calculated from uncertainties in waste composition and transfer coefficients in incinerator
- Dioxins, measured as 2,3,7,8-tetrachlorodibenzo-p-dioxin [air, urban air close to ground]: 0 kg; pedigree (1,1,1,1,1)
  Incomplete combustion product emitted to air.
  Uncertainty: uncertainty calculated from uncertainty in average operation emissions, and the uncertainty of the flue gas volume from this waste.
- Cobalt [air, urban air close to ground]: 0 kg; pedigree (1,1,1,1,1)
  (same comment as for Chromium)
- Lead [water, surface water]: 0 kg; pedigree (1,1,1,1,1)
  Emissions to water from waste composition and transfer coefficients in incinerator and landfills.
  Uncertainty: uncertainty is calculated from uncertainties in waste composition and transfer coefficients in incinerator and landfills
- Hydrogen chloride [air, urban air close to ground]: 0 kg; pedigree (1,1,1,1,1)
  (same comment as for Chromium)
- Manganese [air, urban air close to ground]: 0 kg; pedigree (1,1,1,1,1)
  (same comment as for Chromium)
- NMVOC, non-methane volatile organic compounds, unspecified origin [air, urban air close to ground]: 0 kg; pedigree (1,1,1,1,1)
  (same comment as for Dioxins, measured as 2,3,7,8-tetrachlorodibenzo-p-dioxin)
- Manganese [water, surface water]: 0 kg; pedigree (1,1,1,1,1)
  (same comment as for Lead)
- Cyanide [air, urban air close to ground]: 0 kg; pedigree (1,1,1,1,1)
  Nitrogen species emitted to air after DeNOx stage.
  Uncertainty: uncertainty calculated from uncertainty in average N-emissions and uncertainty in the share of thermal NOx and the uncertainty in nitrogen content in *this* waste.
- Benzo(a)pyrene [air, urban air close to ground]: 0 kg; pedigree (1,1,1,1,1)
  (same comment as for Dioxins, measured as 2,3,7,8-tetrachlorodibenzo-p-dioxin)
- Copper, ion [water, surface water]: 0 kg; pedigree (1,1,1,1,1)
  (same comment as for Lead)
- Barium [water, ground-, long-term]: 0 kg; pedigree (1,1,1,1,1)
  Long-term emissions from landfilling of incineration residues.
  Uncertainty: uncertainty is calculated from uncertainties in waste composition and transfer coefficients in incinerator and landfills.
- Titanium, ion [water, ground-, long-term]: 0 kg; pedigree (1,1,1,1,1)
  (same comment as for Barium)
- Arsenic, ion [water, ground-, long-term]: 0 kg; pedigree (1,1,1,1,1)
  (same comment as for Barium)
- Tin, ion [water, ground-, long-term]: 0 kg; pedigree (1,1,1,1,1)
  (same comment as for Barium)
- Cobalt [water, ground-, long-term]: 0 kg; pedigree (1,1,1,1,1)
  (same comment as for Barium)
- Vanadium, ion [water, surface water]: 0 kg; pedigree (1,1,1,1,1)
  (same comment as for Lead)
- Fluoride [water, surface water]: 0 kg; pedigree (1,1,1,1,1)
  (same comment as for Lead)
- Water [air, urban air close to ground]: 0 m3; pedigree (1,1,1,1,1)
  Water vapour from waste humidity, hydrogen oxidation and part of the process water.
  Uncertainty: Uncertainty calculated from uncertainty in waste composition, process water input and the uncertainty of fraction to air.
- Titanium, ion [water, surface water]: 0 kg; pedigree (1,1,1,1,1)
  (same comment as for Lead)
- Strontium [air, urban air close to ground]: 0 kg; pedigree (1,1,1,1,1)
  (same comment as for Chromium)
- TOC, Total Organic Carbon [water, surface water]: 0 kg; pedigree (1,1,1,1,1)
  (same comment as for Lead)
- Iron, ion [water, ground-, long-term]: 0 kg; pedigree (1,1,1,1,1)
  (same comment as for Barium)
- Chromium, ion [water, surface water]: 0 kg; pedigree (1,1,1,1,1)
  (same comment as for Lead)
- Cobalt [water, surface water]: 0 kg; pedigree (1,1,1,1,1)
  (same comment as for Lead)
- Chloride [water, surface water]: 0 kg; pedigree (1,1,1,1,1)
  (same comment as for Lead)
- Benzene [air, urban air close to ground]: 0 kg; pedigree (1,1,1,1,1)
  (same comment as for Dioxins, measured as 2,3,7,8-tetrachlorodibenzo-p-dioxin)
- COD, Chemical Oxygen Demand [water, ground-, long-term]: 0 kg; pedigree (1,1,1,1,1)
  (same comment as for Barium)
- Sulfate [water, ground-, long-term]: 0 kg; pedigree (1,1,1,1,1)
  (same comment as for Barium)
- Chromium VI [water, ground-, long-term]: 0 kg; pedigree (1,1,1,1,1)
  (same comment as for Barium)
- Aluminium [water, ground-, long-term]: 0 kg; pedigree (1,1,1,1,1)
  (same comment as for Barium)
- Iron [air, urban air close to ground]: 0 kg; pedigree (1,1,1,1,1)
  (same comment as for Chromium)
- Strontium [water, surface water]: 0 kg; pedigree (1,1,1,1,1)
  (same comment as for Lead)
- Lead [air, urban air close to ground]: 0 kg; pedigree (1,1,1,1,1)
  (same comment as for Chromium)
- Carbon dioxide, fossil [air, urban air close to ground]: 0 kg; pedigree (1,1,1,1,1)
  (same comment as for Chromium)
- Chloride [water, ground-, long-term]: 0 kg; pedigree (1,1,1,1,1)
  (same comment as for Barium)
- Vanadium, ion [water, ground-, long-term]: 0 kg; pedigree (1,1,1,1,1)
  (same comment as for Barium)
- Sulfur dioxide [air, urban air close to ground]: 0 kg; pedigree (1,1,1,1,1)
  (same comment as for Chromium)
- Sodium, ion [water, surface water]: 0 kg; pedigree (1,1,1,1,1)
  (same comment as for Lead)
- Selenium [water, ground-, long-term]: 0 kg; pedigree (1,1,1,1,1)
  (same comment as for Barium)
- Arsenic, ion [water, surface water]: 0 kg; pedigree (1,1,1,1,1)
  (same comment as for Lead)
- Cadmium [air, urban air close to ground]: 0 kg; pedigree (1,1,1,1,1)
  (same comment as for Chromium)
- Nitrate [water, ground-, long-term]: 0 kg; pedigree (1,1,1,1,1)
  (same comment as for Barium)
- Zinc, ion [water, ground-, long-term]: 0 kg; pedigree (1,1,1,1,1)
  (same comment as for Barium)
- Antimony [water, ground-, long-term]: 0 kg; pedigree (1,1,1,1,1)
  (same comment as for Barium)
- Hydrogen fluoride [air, urban air close to ground]: 0 kg; pedigree (1,1,1,1,1)
  (same comment as for Chromium)
- Strontium [water, ground-, long-term]: 0 kg; pedigree (1,1,1,1,1)
  (same comment as for Barium)
- Nickel [air, urban air close to ground]: 0 kg; pedigree (1,1,1,1,1)
  (same comment as for Chromium)
- Bromine [water, surface water]: 0 kg; pedigree (1,1,1,1,1)
  (same comment as for Lead)
- Tin [air, urban air close to ground]: 0 kg; pedigree (1,1,1,1,1)
  (same comment as for Chromium)
- Methane, fossil [air, urban air close to ground]: 0 kg; pedigree (1,1,1,1,1)
  (same comment as for Dioxins, measured as 2,3,7,8-tetrachlorodibenzo-p-dioxin)
- Ammonia [air, urban air close to ground]: 0 kg; pedigree (1,1,1,1,1)
  (same comment as for Cyanide)
- Sodium [air, urban air close to ground]: 0 kg; pedigree (1,1,1,1,1)
  (same comment as for Chromium)
- Antimony [water, surface water]: 0 kg; pedigree (1,1,1,1,1)
  (same comment as for Lead)
- Beryllium [water, surface water]: 0 kg; pedigree (1,1,1,1,1)
  (same comment as for Lead)
- COD, Chemical Oxygen Demand [water, surface water]: 0 kg; pedigree (1,1,1,1,1)
  (same comment as for Lead)
- Thallium [water, surface water]: 0 kg; pedigree (1,1,1,1,1)
  (same comment as for Lead)
- Particulates, > 2.5 um, and < 10um [air, urban air close to ground]: 0 kg; pedigree (1,1,1,1,1)
  (same comment as for Dioxins, measured as 2,3,7,8-tetrachlorodibenzo-p-dioxin)
- Nickel, ion [water, surface water]: 0 kg; pedigree (1,1,1,1,1)
  (same comment as for Lead)
- Sulfate [water, surface water]: 0 kg; pedigree (1,1,1,1,1)
  (same comment as for Lead)
- Heat, waste [water, surface water]: 0 MJ; pedigree (1,1,1,1,1)
  Waste heat generated from heating value of this waste plus any electricity required to process it.
  Uncertainty: uncertainty is calculated from uncertainties in waste composition and uncertainties in energy efficiency and the uncertainty in internal energy demand
- Iron, ion [water, surface water]: 0 kg; pedigree (1,1,1,1,1)
  (same comment as for Lead)
- Chromium VI [water, surface water]: 0 kg; pedigree (1,1,1,1,1)
  (same comment as for Lead)
- Nickel, ion [water, ground-, long-term]: 0 kg; pedigree (1,1,1,1,1)
  (same comment as for Barium)
- Selenium [air, urban air close to ground]: 0 kg; pedigree (1,1,1,1,1)
  (same comment as for Chromium)
- Benzene, hexachloro- [air, urban air close to ground]: 0 kg; pedigree (1,1,1,1,1)
  (same comment as for Dioxins, measured as 2,3,7,8-tetrachlorodibenzo-p-dioxin)
- Toluene [air, urban air close to ground]: 0 kg; pedigree (1,1,1,1,1)
  (same comment as for Dioxins, measured as 2,3,7,8-tetrachlorodibenzo-p-dioxin)
- Mercury [air, urban air close to ground]: 0 kg; pedigree (1,1,1,1,1)
  (same comment as for Chromium)
- BOD5, Biological Oxygen Demand [water, surface water]: 0 kg; pedigree (1,1,1,1,1)
  (same comment as for Lead)
- Fluoride [water, ground-, long-term]: 0 kg; pedigree (1,1,1,1,1)
  (same comment as for Barium)
- Lead [water, ground-, long-term]: 0 kg; pedigree (1,1,1,1,1)
  (same comment as for Barium)
- Phenol, pentachloro- [air, urban air close to ground]: 0 kg; pedigree (1,1,1,1,1)
  (same comment as for Dioxins, measured as 2,3,7,8-tetrachlorodibenzo-p-dioxin)
- Barium [water, surface water]: 0 kg; pedigree (1,1,1,1,1)
  (same comment as for Lead)
- DOC, Dissolved Organic Carbon [water, ground-, long-term]: 0 kg; pedigree (1,1,1,1,1)
  (same comment as for Barium)
- Nitrate [water, surface water]: 0 kg; pedigree (1,1,1,1,1)
  (same comment as for Lead)
- Cadmium, ion [water, surface water]: 0 kg; pedigree (1,1,1,1,1)
  (same comment as for Lead)
- Sodium, ion [water, ground-, long-term]: 0 kg; pedigree (1,1,1,1,1)
  (same comment as for Barium)
- BOD5, Biological Oxygen Demand [water, ground-, long-term]: 0 kg; pedigree (1,1,1,1,1)
  (same comment as for Barium)
- Bromine [air, urban air close to ground]: 0 kg; pedigree (1,1,1,1,1)
  (same comment as for Chromium)
- Manganese [water, ground-, long-term]: 0 kg; pedigree (1,1,1,1,1)
  (same comment as for Barium)
- Mercury [water, ground-, long-term]: 0 kg; pedigree (1,1,1,1,1)
  (same comment as for Barium)
- Beryllium [water, ground-, long-term]: 0 kg; pedigree (1,1,1,1,1)
  (same comment as for Barium)
- Vanadium [air, urban air close to ground]: 0 kg; pedigree (1,1,1,1,1)
  (same comment as for Chromium)
- Thallium [water, ground-, long-term]: 0 kg; pedigree (1,1,1,1,1)
  (same comment as for Barium)
- Copper, ion [water, ground-, long-term]: 0 kg; pedigree (1,1,1,1,1)
  (same comment as for Barium)
- Heat, waste [air, urban air close to ground]: 0 MJ; pedigree (1,1,1,1,1)
  (same comment as for Heat, waste)
- Bromine [water, ground-, long-term]: 0 kg; pedigree (1,1,1,1,1)
  (same comment as for Barium)
- Aluminium [air, urban air close to ground]: 0 kg; pedigree (1,1,1,1,1)
  (same comment as for Chromium)
- Cadmium, ion [water, ground-, long-term]: 0 kg; pedigree (1,1,1,1,1)
  (same comment as for Barium)
- Selenium [water, surface water]: 0 kg; pedigree (1,1,1,1,1)
  (same comment as for Lead)
- Zinc, ion [water, surface water]: 0 kg; pedigree (1,1,1,1,1)
  (same comment as for Lead)
- Thallium [air, urban air close to ground]: 0 kg; pedigree (1,1,1,1,1)
  (same comment as for Chromium)
- Water [water, surface water]: 0 m3; pedigree (1,1,1,1,1)
  Process water released to surface water.
  Uncertainty: uncertainty calculated from uncertainty in process water input and the uncertainty of fraction to surface water.
- Benzene, pentachloro- [air, urban air close to ground]: 0 kg; pedigree (1,1,1,1,1)
  (same comment as for Dioxins, measured as 2,3,7,8-tetrachlorodibenzo-p-dioxin)
- Titanium [air, urban air close to ground]: 0 kg; pedigree (1,1,1,1,1)
  (same comment as for Chromium)
- Zinc [air, urban air close to ground]: 0 kg; pedigree (1,1,1,1,1)
  (same comment as for Chromium)
- Dinitrogen monoxide [air, urban air close to ground]: 0 kg; pedigree (1,1,1,1,1)
  (same comment as for Cyanide)
- Aluminium [water, surface water]: 0 kg; pedigree (1,1,1,1,1)
  (same comment as for Lead)
- Particulates, < 2.5 um [air, urban air close to ground]: 0 kg; pedigree (1,1,1,1,1)
  (same comment as for Dioxins, measured as 2,3,7,8-tetrachlorodibenzo-p-dioxin)
- DOC, Dissolved Organic Carbon [water, surface water]: 0 kg; pedigree (1,1,1,1,1)
  (same comment as for Lead)
- Barium [air, urban air close to ground]: 0 kg; pedigree (1,1,1,1,1)
  (same comment as for Chromium)
- Antimony [air, urban air close to ground]: 0 kg; pedigree (1,1,1,1,1)
  (same comment as for Chromium)
- Tin, ion [water, surface water]: 0 kg; pedigree (1,1,1,1,1)
  (same comment as for Lead)
- TOC, Total Organic Carbon [water, ground-, long-term]: 0 kg; pedigree (1,1,1,1,1)
  (same comment as for Barium)
- Copper [air, urban air close to ground]: 0 kg; pedigree (1,1,1,1,1)
  (same comment as for Chromium)
- Arsenic [air, urban air close to ground]: 0 kg; pedigree (1,1,1,1,1)
  (same comment as for Chromium)
- Mercury [water, surface water]: 0 kg; pedigree (1,1,1,1,1)
  (same comment as for Lead)
- Nitrogen oxides [air, urban air close to ground]: 0 kg; pedigree (1,1,1,1,1)
  Sum of fuel-Nox and thermal-NOx emitted to air after DeNOx stage.
  Uncertainty: uncertainty calculated from uncertainty in average N-emissions and uncertainty in the share of thermal NOx and the uncertainty in nitrogen content in *this* waste.
- Carbon monoxide, fossil [air, urban air close to ground]: 0 kg; pedigree (1,1,1,1,1)
  (same comment as for Dioxins, measured as 2,3,7,8-tetrachlorodibenzo-p-dioxin)
- Water [air, unspecified]: 1.33365e-7 m3; lognormal variance with pedigree 0.0827, pedigree (2,2,5,5,1)
  Calculated value based on literature values and expert opinion. See comments in the parametres' comment field.
