# concentrated solar power plant construction, solar tower power plant, 20 MW

Dataset: EcoSpold 2, unit process
Geography: RoW
Time period: 2010-01-01 to 2020-01-01
Technology level: current
Classification: ISIC rev.4 ecoinvent: 4220a: Construction of utility projects for electricity production, except for liquid fuels
Tags: Concentrated Solar Power; CSP
Scenario: Business-as-Usual
System model: Allocation at the point of substitution
Generated by: Karin Treyer
Published in: Telsnig, Thomas 2015
Database: ecoinvent
isCopyrightProtected: true
accessRestrictedTo: 1

## General comment
This activity represents the construction of a concentrated solar power solar tower plant with a capacity of 20 MW in Upington, South Africa. The construction of the solar power plant requires five different units in order to produce electricity. The five key units are collector field area, receiver system, thermal storage unit, steam generation system and a power block unit. Further, site preparation activities are also included in the dataset (e.g. clearing shrubs, construction of roads, fences, providing water connectivity).
This dataset is entirely based on the detailed life cycle inventory as presented in the dissertation report by
Telsnig, Thomas. 2015. Standortabhängige Analyse und Bewertung solarthermischer Kraftwerke am Beispiel Südafrikas. Forschungsbericht. Band 123. ISSN 0938-1228. Institut für Energiewirtschaft und Rationelle Energieanwendung, Universität Stuttgart, Germany.

## Included activities start
The activity starts with the preparation of the site (land use, access roads, buildings, water supply, clearing shrubs, construction of roads, fences, etc.)

## Included activities end
The activity ends with the power plant ready for electricity production after combination of all necessary components and and all necessary preparations.

## Geography
This dataset has been extrapolated from a dataset modelled for the location Upington, South Africa. Uncertainty has not been adjusted as it is assumed that the modelled 20 MW solar tower power plant would be very similar in other parts of the world.

## Reference product
- concentrated solar power plant, solar tower, 20 MW: 1 unit; CPC 53262: Power plants; By-product classification allocatable product; pedigree (1,1,1,1,1)
  Reference product unit for a concentrated solar plant construction of 20 mega watts.
  production volume 1 unit
    Data about concentrating solar power plants in operation, construction and development globally are available from SolarPACES (https://solarpaces.nrel.gov/, accessed April 2019). On average 2 solar tower concentrating solar power plants per year went in operation worldwide between 2010 and 2019. This includes plants with an installed capacity other than 20MW and is used as approximate annual production volume for this dataset.
  property price 1.303e8 EUR2005
    Telsnig 2015: Investment cost for a 20MW CSP solar tower plant in South Africa (EUR2010) with limited storage capacity (see Table 4-4 in Telsnig, 2015). Apart from the cost of the components this includes about 25 million Euros of indirect cost and owner's cost.
    Reference(s): Telsnig, Thomas. 2015. Standortabhängige Analyse und Bewertung solarthermischer Kraftwerke am Beispiel Südafrikas. Forschungsbericht. Band 123. ISSN 0938-1228. Institut für Energiewirtschaft und Rationelle Energieanwendung, Universität Stuttgart, Germany.
  property lifetime 30 year; name lifetime
    The economic lifetime of the plant is assumed to be 30 years.
  property true value 1.303e8
    allocation property applied in "true value" allocation // value calculated from revenue

## By-products
- iron scrap, sorted, pressed: 0 kg; By-product classification Recyclable; CPC 39310: Slag, dross, scalings and other waste from the manufacture of iron or steel; pedigree (1,1,1,1,1)
  Iron scrap recovered from this waste.
  Uncertainty: uncertainty calculated from uncertainty in waste composition, uncertainty of share of recyclable metal, uncertainty of transfer coefficient to bottom ash, uncertainty of the efficiency of scrap removal in MSWI plant.
  production volume 48.5372 kg
  property price 0.175 EUR2005
    Temporary price data. Calculated as 90% of purchasers price based on: 2005 import and export prices (total trades (USD) divided by total weight (kg) in biggest economies of the world: EU27, USA, Brasil, China, India, Japan and Russia) from UN Commodity Trade Statistics Database (http://data.un.org/Explorer.aspxDatabase [Accessed 2011.06.20]). Commodity: Waste or scrap, of cast iron
  property carbon content 0
    carbon content on a dry matter basis (reserved; not for manual entry)
  property true value 0.115106
    allocation property applied in "true value" allocation // value calculated from revenue
  properties: wet mass 1 kg, water in wet mass 0 kg, carbon content, non-fossil 0, carbon content, fossil 0, dry mass 1 kg, water content 0, carbon allocation 0 kg

## Inputs from technosphere
- power block, solar tower power plant, 20 MW: 1 unit; lognormal variance with pedigree 0.0137, pedigree (4,4,3,3,2)
  Represents the power block unit input required for the complete construction of the 20MW solar tower.
- building, hall, wood construction: 2411 m2; lognormal variance with pedigree 0.0137, pedigree (4,4,3,3,2)
  Includes warehouse maintenance, electrical control of building and security
- water supply network: 5 km; lognormal variance with pedigree 0.0137, pedigree (4,4,3,3,2)
  For sanitary sewers and drains
- collector field area, solar tower power plant, 20 MW: 1 unit; lognormal variance with pedigree 0.0137, pedigree (4,4,3,3,2)
  Represents the collector field area unit input required for the complete construction of the 20MW solar tower.
- waste reinforcement steel: 0 kg; pedigree (1,1,1,1,1)
  All steel masses combined for disposal.
  production volume 0 kg
    Calculated from production volume of reference product using the relative outputs.
  properties: wet mass 1 kg, dry mass 1 kg
- steam generation system, solar tower power plant, 20 MW: 1 unit; lognormal variance with pedigree 0.0137, pedigree (4,4,3,3,2)
  Represents the steam generation unit input required for the complete construction of the 20MW solar tower.
- decommissioned road: -25414 m*year; = (road)*-1; lognormal variance with pedigree 0.0137, pedigree (4,4,3,3,2)
  End of life treatment for roads constructed
  production volume 25414 m*year; = Ref('9ae77ba1-3a10-4239-bdf6-d6ec521e0355', 'ProductionVolume') * ((Ref('8e73b112-4f25-4e20-ba59-e4f68591b65f')*-1) / Ref('9ae77ba1-3a10-4239-bdf6-d6ec521e0355'))
    Calculated from production volume of reference product using the relative outputs.
  properties: dry mass 122 kg, carbon content, fossil 0.0220896, wet mass 122 kg
- thermal storage system, solar tower power plant, 20 MW: 1 unit; lognormal variance with pedigree 0.0137, pedigree (4,4,3,3,2)
  Represents the thernal storage unit input required for the complete construction of the 20MW solar tower.
- road: 25414 m*year; lognormal variance with pedigree 0.0137, pedigree (4,4,3,3,2)
  Access roads primarily constructed for transport of construction materials, operational and maintenance activities.
- excavation, hydraulic digger: 22937 m3; lognormal variance with pedigree 0.0137, pedigree (4,4,3,3,2)
  Piping- yardpiping backfill and excavation. It is assumed that the whole excavated volume also has to be put back again once the pipes have been set.
- wire drawing, steel: 2186 kg; = steel; lognormal variance with pedigree 0.0137, pedigree (4,4,3,3,2)
  Process done to draw wires from steel to construct fences
- steel, unalloyed: 2186 kg; name steel; lognormal variance with pedigree 0.0137, pedigree (4,4,3,3,2)
  Used for construction of site fences. The fences are 2 m tall and 2.4 kg in mass.
  properties: dry mass 1 kg, carbon content, fossil 0.0025, wet mass 1 kg
- receiver system, solar tower power plant, 20 MW: 1 unit; lognormal variance with pedigree 0.0137, pedigree (4,4,3,3,2)
  Represents the receiver system unit input required for the complete construction of the 20MW solar tower.
- waste reinforcement steel: -1.51681, -2184.48 kg (2 entries); lognormal variance with pedigree 0.0137, pedigree (4,4,3,3,2)
  All steel masses combined for disposal.
  production volume 4372 kg

## Inputs from nature
- Occupation, industrial area [natural resource, land]: 2.25566e7 m2*year; = transformation_from*lifetime
  Area occupied by CSP plant over the lifetime of the plant.
- Transformation, to industrial area [natural resource, land]: 751888 m2; = transformation_from
  Process of transforming unused area to industrial sector
- Transformation, from grassland, natural (non-use) [natural resource, land]: 751888 m2; name transformation_from; lognormal variance with pedigree 0.0137, pedigree (4,4,3,3,2)
  Process of transforming unused area to industrial sector

## Sampling procedure
This dataset is entirely based on the detailed life cycle inventory as presented in the dissertation report by
Telsnig, Thomas. 2015. Standortabhängige Analyse und Bewertung solarthermischer Kraftwerke am Beispiel Südafrikas. Forschungsbericht. Band 123. ISSN 0938-1228. Institut für Energiewirtschaft und Rationelle Energieanwendung, Universität Stuttgart, Germany.

Further, data in Telsnig 2015 are not shown explicitely for the downscaled 20 MW solar tower power plant. This gap is filled in the ecoinvent report.

## Extrapolations
This dataset has been extrapolated from a dataset modelled for the location Upington, South Africa. The original data modelling a 440 MW power plant have been scaled down with parameter specific linear and non-linear equations to represent a 20 MW plant design. Uncertainty has not been adjusted as it is assumed that the modelled 20 MW solar tower power plant would be very similar in other parts of the world.

## Review by Christopher Oberschelp 2017-03-13
Very detailed, structured and well-documented datasets. Main exchanges have been checked and make sense.
