# machine operation, diesel, >= 74.57 kW, low load factor

Dataset: EcoSpold 2, unit process
Geography: GLO
Time period: 2014-01-01 to 2019-12-31
Technology level: current
Classification: EcoSpold01Categories: construction processes/machinery
Classification: ISIC rev.4 ecoinvent: 4312:Site preparation
Synonyms: industrial - other material handling equip; light commercial - welders; industrial - aerial lifts; construction - tractors/loaders/backhoes; construction - dumpers/tenders; construction - skid steer loaders
Tags: template dataset
Scenario: Business-as-Usual
System model: Allocation at the point of substitution
Generated by: Jean-Francois Menard
Published in: Kellenberger D. 2007
Database: ecoinvent
isCopyrightProtected: true
accessRestrictedTo: 1

## General comment
This dataset represents the operation of construction/industrial/light commercial machines (see list in Synonyms field). The U.S. EPA NONROAD2008 model for off-road machines has been used as basis for this dataset, it refers to engine power in units of horsepower (hp), the engine power range for the dataset is then >= 100 hp. The fuel consumption and emission factors from the model have been kept in the original units of kg/hp.hour for transparency reasons. However the engine power parameter used as input data for the dataset is quantified in the SI power unit of kilowatt (kW).
As cited in the U.S. EPA NONROAD2008 model documentation (Median Life, Annual Activity, and Load Factor Values for Nonroad engine Emissions Modeling, NR-005d, 47 pp, EPA-420-R-10-016, July 2010, http://www.epa.gov/oms/models/nonrdmdl/nonrdmdl2010/420r10016.pdf), "Each diesel nonroad equipment type was assigned one of three composite load factors (High load factor, Low load factor, or 7-cycle average, i.e. steady-state). To apply these load factors, we matched nonroad applications with the test cycle that most closely represents the nonroad activity for the application". The functional unit is 1 hour of operation.
The fuel consumption and basic emission factors are generated by the U.S. EPA NONROAD2008 model. Supplementary emissions are provided by the U.S. EPA NMIM model and copied directly from the ecoinvent v3.0 dataset "diesel burned in building machine, GLO 2001". The building machine infrastructure and lubricating oil input and waste output have been copied from the same ecoinvent dataset.
This dataset is a template dataset and has been parameterized for the machine power (in kW), emission standard (referred to as "tier" by the U.S EPA, the European equivalents would be the Stage I to IV standards published by the European Commission) and load factor to enable the creation of specific instances. To do so, the tier fraction (e.g. T0) and power (e.g. T0_kW), and the load factor parameters could be changed to reflect a specific situation/machine. The diesel fuel sulfur content (see Exchange Properties) could also be changed (the ultra-low sulfur nonroad diesel sulfur content of 0,0015% or 15 ppm, effective June 2010 in the United States of America is used as default).

## Included activities end
Includes the inputs " building machine" for infrastructure, lubricating oil and fuel consumption, and air emissions and waste oil as outputs.

## Geography
Fuel flow and most emission flows are extrapolated from US conditions, some emission flows and the other intermediate product flows (building machine, lubricating oil) are extrapolated from RER and CH conditions. The uncertainty has been adjusted accordingly.

## Technology
Average current technology for one typical machine representing the category.

## Parameters
- total hydrocarbon emissions tier T1 for hp < 600: 0.00046 kg/hp*h; name T1_thc_600hp; lognormal variance with pedigree 0.138, pedigree (4,5,5,5,4)
  Literature value. Taken from the NONROAD2008 model.
- power tier T3: 99.4366 kW; name T3_kW; lognormal variance with pedigree 0.0986, pedigree (4,5,5,5,4)
  Calculated value. Represents the average engine nominal power of the US (lower 48 states) 2014 machine population of the type represented by this dataset (>=74.57 kW, low load factor, see list in Synonyms field) for which the model year falls under the tier T3 emission standard (from 2007 to 2011 for machines < 130.50 kW, and from 2006 to 2010 for machines < 559.27 kW). Value calculated from the population data included in the NONROAD2008 model. The NONROAD2008 data is given in the unit of horsepower, the "horsepower to kilowatt conversion factor" parameter was used to convert the result in kW, the SI unit of power.
  Basic parameter used to define the machine population represented by the dataset, could be changed to create a new instance of the dataset to reflect a specific situation/machine.
- particulates <= 10 um emissions tier T3 for hp < 175: 0.00052 kg/hp*h; name T3_PM10_175hp; lognormal variance with pedigree 0.218, pedigree (4,5,5,5,4)
  Literature value. Taken from the NONROAD2008 model.
- particulates <= 10 um emissions tier T3 for hp < 750: 0.00036 kg/hp*h; name T3_PM10_750hp; lognormal variance with pedigree 0.218, pedigree (4,5,5,5,4)
  Literature value. Taken from the NONROAD2008 model.
- total hydrocarbon emissions tier T2-T3 for hp >= 300: 0.00038 kg/hp*h; name T23_thc_300php; lognormal variance with pedigree 0.138, pedigree (4,5,5,5,4)
  Literature value. Taken from the NONROAD2008 model.
- particulates <= 10 um emissions tier T1 for hp < 600: 0.0004 kg/hp*h; name T1_PM10_600hp; lognormal variance with pedigree 0.218, pedigree (4,5,5,5,4)
  Literature value. Taken from the NONROAD2008 model.
- particulates <= 10 um emissions tier T4-T4N for hp < 750: 9.2e-6 kg/hp*h; name T44N_PM10_750hp; lognormal variance with pedigree 0.218, pedigree (4,5,5,5,4)
  Literature value. Taken from the NONROAD2008 model.
- particulates <= 10 um emissions tier T2 for hp < 175: 0.00036 kg/hp*h; name T2_PM10_175hp; lognormal variance with pedigree 0.218, pedigree (4,5,5,5,4)
  Literature value. Taken from the NONROAD2008 model.
- total hydrocarbon emissions tier T4N for hp >= 750: 0.00013 kg/hp*h; name T4N_thc_750php; lognormal variance with pedigree 0.138, pedigree (4,5,5,5,4)
  Literature value. Taken from the NONROAD2008 model.
- particulates <= 10 um emissions tier T1 for hp < 750: 0.00043 kg/hp*h; name T1_PM10_750hp; lognormal variance with pedigree 0.218, pedigree (4,5,5,5,4)
  Literature value. Taken from the NONROAD2008 model.
- total hydrocarbon emissions tier T4-T4N for hp < 750: 0.00013 kg/hp*h; name T44N_thc_750hp; lognormal variance with pedigree 0.138, pedigree (4,5,5,5,4)
  Literature value. Taken from the NONROAD2008 model.
- fraction tier T3: 0.312444 dimensionless; name T3
  Calculated value. Represents the fraction of the US (lower 48 states) 2014 machine population of the type represented by this dataset (>= 74.57 kW, low load factor, see list in Synonyms field) for which the model year falls under the tier T3 emission standard (from 2007 to 2011 for machines < 130.50 kW, and from 2006 to 2010 for machines < 559.27 kW). Value calculated from the population data included in the NONROAD2008 model.
  Basic parameter used to define the machine population represented by the dataset, could be changed to create a new instance of the dataset to reflect a specific situation/machine.
- fraction tier T4N: 0.423752 dimensionless; name T4N
  Calculated value. Represents the fraction of the US (lower 48 states) 2014 machine population of the type represented by this dataset (>= 74.57 kW, low load factor, see list in Synonyms field) for which the model year falls under the tier T4N emission standard (from 2014 for machines < 559.27 kW, and from 2015 for machines >= 559.27 kW). Value calculated from the population data included in the NONROAD2008 model.
  Basic parameter used to define the machine population represented by the dataset, could be changed to create a new instance of the dataset to reflect a specific situation/machine.
- fraction tier T4: 0.210054 dimensionless; name T4
  Calculated value. Represents the fraction of the US (lower 48 states) 2014 machine population of the type represented by this dataset (>= 74.57 kW, low load factor, see list in Synonyms field) for which the model year falls under the tier T4 emission standard (from 2012 to 2013 for machines < 130.50 kW, from 2011 to 2013 for machines < 559.27 kW, and from 2011 to 2014 for machines >= 559.27 kW). Value calculated from the population data included in the NONROAD2008 model.
  Basic parameter used to define the machine population represented by the dataset, could be changed to create a new instance of the dataset to reflect a specific situation/machine.
- particulates <= 10 um emissions tier T1 for hp < 300: 0.0005 kg/hp*h; name T1_PM10_300hp; lognormal variance with pedigree 0.218, pedigree (4,5,5,5,4)
  Literature value. Taken from the NONROAD2008 model.
- total hydrocarbon emissions tier T1 for hp >= 750: 0.00066 kg/hp*h; name T1_thc_750php; lognormal variance with pedigree 0.138, pedigree (4,5,5,5,4)
  Literature value. Taken from the NONROAD2008 model.
- particulates <= 10 um emissions tier T1 for hp < 175: 0.00055 kg/hp*h; name T1_PM10_175hp; lognormal variance with pedigree 0.218, pedigree (4,5,5,5,4)
  Literature value. Taken from the NONROAD2008 model.
- total hydrocarbon emissions tier T1-T2 for hp < 175: 0.00078 kg/hp*h; name T12_thc_175hp; lognormal variance with pedigree 0.138, pedigree (4,5,5,5,4)
  Literature value. Taken from the NONROAD2008 model.
- fraction tier T2: 0.0313053 dimensionless; name T2
  Calculated value. Represents the fraction of the US (lower 48 states) 2014 machine population of the type represented by this dataset (>= 74.57 kW, low load factor, see list in Synonyms field) for which the model year falls under the tier T2 emission standard (from 2003 to 2006 for machines < 130.50 kW, from 2003 to 2005 for machines < 223.71 kW, from 2001 to 2005 for machines < 447.42 kW, from 2002 to 2005 for machines < 559.27 kW, and from 2006 to 2010 for machines >= 559.27 kW). Value calculated from the population data included in the NONROAD2008 model.
  Basic parameter used to define the machine population represented by the dataset, could be changed to create a new instance of the dataset to reflect a specific situation/machine.
- power tier T0: 351.581 kW; name T0_kW; lognormal variance with pedigree 0.0986, pedigree (4,5,5,5,4)
  Calculated value. Represents the average engine nominal power of the US (lower 48 states) 2014 machine population of the type represented by this dataset (>= 74.57 kW, low load factor, see list in Synonyms field) for which the model year falls under the tier T0 emission standard ((pre-1997 for machines < 130.50 kW, pre-1996 for machines < 559.27 kW and pre-2006 for machines >= 559.27 kW). Value calculated from the population data included in the NONROAD2008 model. The NONROAD2008 data is given in the unit of horsepower, the "horsepower to kilowatt conversion factor" parameter was used to convert the result in kW, the SI unit of power.
  Basic parameter used to define the machine population represented by the dataset, could be changed to create a new instance of the dataset to reflect a specific situation/machine.
- total hydrocarbon emissions tier T0 for hp >= 100: 0.00156 kg/hp*h; name T0_thc_100php; lognormal variance with pedigree 0.138, pedigree (4,5,5,5,4)
  Literature value. Taken from the NONROAD2008 model.
- horsepower to kilowatt conversion factor: 0.7457 dimensionless; name hp_to_kW; lognormal variance with pedigree 0, pedigree (1,1,1,1,1)
  Literature value. Taken from http://en.wikipedia.org/wiki/Horsepower.
- power tier T1: 124.941 kW; name T1_kW; lognormal variance with pedigree 0.0986, pedigree (4,5,5,5,4)
  Calculated value. Represents the average engine nominal power of the US (lower 48 states) 2014 machine population of the type represented by this dataset (>= 74.57 kW, low load factor, see list in Synonyms field) for which the model year falls under the tier T1 emission standard (from 1997 to 2002 for machines < 130.50 kW, from 1996 to 2002 for machines < 223.71 kW, from 1996 to 2000 for machines < 447.42 kW, from 1996 to 2001 for machines < 559.27 kW, and from 2000 to 2005 for machines >= 559.27 kW). Value calculated from the population data included in the NONROAD2008 model. The NONROAD2008 data is given in the unit of horsepower, the "horsepower to kilowatt conversion factor" parameter was used to convert the result in kW, the SI unit of power.
  Basic parameter used to define the machine population represented by the dataset, could be changed to create a new instance of the dataset to reflect a specific situation/machine.
- total hydrocarbon emissions tier T4 for hp >= 750: 0.00028 kg/hp*h; name T4_thc_750php; lognormal variance with pedigree 0.138, pedigree (4,5,5,5,4)
  Literature value. Taken from the NONROAD2008 model.
- volatile organic compound emissions ratio: 1.053 dimensionless; name VOC_to_THC; lognormal variance with pedigree 0.138, pedigree (4,5,5,5,4)
  Literature value. Taken from the NONROAD2008 model.
- particulates <= 10 um emissions tier T4N for hp >= 750: 2.76e-5 kg/hp*h; name T4N_PM10_750php; lognormal variance with pedigree 0.218, pedigree (4,5,5,5,4)
  Literature value. Taken from the NONROAD2008 model.
- fraction tier T0: 0.00311779 dimensionless; name T0
  Calculated value. Represents the fraction of the US (lower 48 states) 2014 machine population of the type represented by this dataset (>= 74.57 kW, low load factor, see list in Synonyms field) for which the model year falls under the tier T0 emission standard (pre-1997 for machines < 130.50 kW, pre-1996 for machines < 559.27 kW and pre-2006 for machines >= 559.27 kW). Value calculated from the population data included in the NONROAD2008 model.
  Basic parameter used to define the machine population represented by the dataset, could be changed to create a new instance of the dataset to reflect a specific situation/machine.
- total particulates <= 10 um emissions: 0.00573712 kg; name PM10; = (T0*T0_kW/hp_to_kW*T0_PM10_100php+T1*T1_kW/hp_to_kW*if(T1_kW/hp_to_kW<175;T1_PM10_175hp;if(T1_kW/hp_to_kW<300;T1_PM10_300hp;if(T1_kW/hp_to_kW<600;T1_PM10_600hp;if(T1_kW/hp_to_kW<750;T1_PM10_750hp;T1_PM10_750php))))+T2*T2_kW/hp_to_kW*if(T2_kW/hp_to_kW<175;T2_PM10_175hp;T2_PM10_175php)+T3*T3_kW/hp_to_kW*if(T3_kW/hp_to_kW<175;T3_PM10_175hp;T3_PM10_750hp)+T4*T4_kW/hp_to_kW*if(T4_kW/hp_to_kW<750;T44N_PM10_750hp;T4_PM10_750php)+T4N*T4N_kW/hp_to_kW*if(T4N_kW/hp_to_kW<750;T44N_PM10_750hp;T4N_PM10_750php))*load; lognormal variance with pedigree 0, pedigree (1,1,1,1,1)
  Calculated value. Represents the emissions per hour of operation of the US weigthed average machine represented by this dataset (>= 74.57 kW, low load factor, see list in Synonyms field).
  Uncertainty: Calculated variable. Uncertainty should be determined from propagation of uncertainty factors of underlying variables, however no uncertainty could be generated for the terms of the power function. Uncertainty of actual relation between variables not accounted at this time, although this could be included in a future update.
- fraction tier T1: 0.0193268 dimensionless; name T1
  Calculated value. Represents the fraction of the US (lower 48 states) 2014 machine population of the type represented by this dataset (>= 74.57 kW, low load factor, see list in Synonyms field) for which the model year falls under the tier T1 emission standard (from 1997 to 2002 for machines < 130.50 kW, from 1996 to 2002 for machines < 223.71 kW, from 1996 to 2000 for machines < 447.42 kW, from 1996 to 2001 for machines < 559.27 kW, and from 2000 to 2005 for machines >= 559.27 kW). Value calculated from the population data included in the NONROAD2008 model.
  Basic parameter used to define the machine population represented by the dataset, could be changed to create a new instance of the dataset to reflect a specific situation/machine.
- total volatile organic compound emissions: 0.00849732 kg; name VOC; = THC*VOC_to_THC; lognormal variance with pedigree 0, pedigree (1,1,1,1,1)
  (same comment as for total particulates <= 10 um emissions)
- particulates <= 10 um emissions tier T4 for hp >= 750: 6.9e-5 kg/hp*h; name T4_PM10_750php; lognormal variance with pedigree 0.218, pedigree (4,5,5,5,4)
  Literature value. Taken from the NONROAD2008 model.
- load factor: 0.21 dimensionless; name load; lognormal variance with pedigree 0.0986, pedigree (4,5,5,5,4)
  Literature value. Represents the average fraction of the nominal engine power output used by the machine during its normal work cycle. Taken from the NONROAD2008 model.
  As cited in the U.S. EPA NONROAD2008 model documentation (Median Life, Annual Activity, and Load Factor Values for Nonroad engine Emissions Modeling, NR-005d, 47 pp, EPA-420-R-10-016, July 2010, http://www.epa.gov/oms/models/nonrdmdl/nonrdmdl2010/420r10016.pdf), "Each diesel nonroad equipment type was assigned one of three composite load factors (High load factor or 0.59, Low load factor or 0.21, or 7-cycle average, i.e. steady-state, or 0.43). To apply these load factors, we matched nonroad applications with the test cycle that most closely represents the nonroad activity for the application".
  Basic parameter used to define the machine population represented by the dataset, could be changed to create a new instance of the dataset to reflect a specific situation/machine.
- particulates <= 10 um emissions tier T2 for hp >= 175: 0.00026 kg/hp*h; name T2_PM10_175php; lognormal variance with pedigree 0.218, pedigree (4,5,5,5,4)
  Literature value. Taken from the NONROAD2008 model.
- particulates <= 10 um emissions tier T1 for hp >= 750: 0.00038 kg/hp*h; name T1_PM10_750php; lognormal variance with pedigree 0.218, pedigree (4,5,5,5,4)
  Literature value. Taken from the NONROAD2008 model.
- total hydrocarbon emissions: 0.00806963 kg; name THC; = (T0*T0_kW/hp_to_kW*T0_thc_100php+T1*T1_kW/hp_to_kW*if(T1_kW/hp_to_kW<175;T12_thc_175hp;if(T1_kW/hp_to_kW<300;T12_thc_300hp;if(T1_kW/hp_to_kW<600;T1_thc_600hp;if(T1_kW/hp_to_kW<750;T1_thc_750hp;T1_thc_750php))))+T2*T2_kW/hp_to_kW*if(T2_kW/hp_to_kW<175;T12_thc_175hp;if(T2_kW/hp_to_kW<300;T12_thc_300hp;T23_thc_300php))+T3*T3_kW/hp_to_kW*if(T3_kW/hp_to_kW<300;T3_thc_300hp;T23_thc_300php)+T4*T4_kW/hp_to_kW*if(T4_kW/hp_to_kW<750;T44N_thc_750hp;T4_thc_750php)+T4N*T4N_kW/hp_to_kW*if(T4_kW/hp_to_kW<750;T44N_thc_750hp;T4N_thc_750php))*load; lognormal variance with pedigree 0, pedigree (1,1,1,1,1)
  (same comment as for total particulates <= 10 um emissions)
- total hydrocarbon emissions tier T1 for hp < 750: 0.00034 kg/hp*h; name T1_thc_750hp; lognormal variance with pedigree 0.138, pedigree (4,5,5,5,4)
  Literature value. Taken from the NONROAD2008 model.
- power tier T2: 122.882 kW; name T2_kW; lognormal variance with pedigree 0.0986, pedigree (4,5,5,5,4)
  Calculated value. Represents the average engine nominal power of the US (lower 48 states) 2014 machine population of the type represented by this dataset (>=74.57 kW, low load factor, see list in Synonyms field) for which the model year falls under the tier T2 emission standard (from 2003 to 2006 for machines < 130.50 kW, from 2003 to 2005 for machines < 223.71 kW, from 2001 to 2005 for machines < 447.42 kW, from 2002 to 2005 for machines < 559.27 kW, and from 2006 to 2010 for machines >= 559.27 kW). ). Value calculated from the population data included in the NONROAD2008 model. The NONROAD2008 data is given in the unit of horsepower, the "horsepower to kilowatt conversion factor" parameter was used to convert the result in kW, the SI unit of power.
  Basic parameter used to define the machine population represented by the dataset, could be changed to create a new instance of the dataset to reflect a specific situation/machine.
- total hydrocarbon emissions tier T3 for hp < 300: 0.00042 kg/hp*h; name T3_thc_300hp; lognormal variance with pedigree 0.138, pedigree (4,5,5,5,4)
  Literature value. Taken from the NONROAD2008 model.
- particulates <= 10 um emissions tier T0 for hp >= 100: 0.00079 kg/hp*h; name T0_PM10_100php; lognormal variance with pedigree 0.218, pedigree (4,5,5,5,4)
  Literature value. Taken from the NONROAD2008 model.
- power tier T4N: 108.314 kW; name T4N_kW; lognormal variance with pedigree 0.0986, pedigree (4,5,5,5,4)
  Calculated value. Represents the average engine nominal power of the US (lower 48 states) 2014 machine population of the type represented by this dataset (>= 74.57 kW, low load factor, see list in Synonyms field) for which the model year falls under the tier T4N emission standard (from 2014 for machines < 559.27 kW, and from 2015 for machines >= 559.27 kW). Value calculated from the population data included in the NONROAD2008 model. The NONROAD2008 data is given in the unit of horsepower, the "horsepower to kilowatt conversion factor" parameter was used to convert the result in kW, the SI unit of power.
  Basic parameter used to define the machine population represented by the dataset, could be changed to create a new instance of the dataset to reflect a specific situation/machine.
- total hydrocarbon emissions tier T1-T2 for hp < 300: 0.00071 kg/hp*h; name T12_thc_300hp; lognormal variance with pedigree 0.138, pedigree (4,5,5,5,4)
  Literature value. Taken from the NONROAD2008 model.
- power tier T4: 111.523 kW; name T4_kW; lognormal variance with pedigree 0.0986, pedigree (4,5,5,5,4)
  Calculated value. Represents the average engine nominal power of the US (lower 48 states) 2014 machine population of the type represented by this dataset (>= 74.57 kW, low load factor, see list in Synonyms field) for which the model year falls under the tier T4 emission standard (from 2012 to 2013 for machines < 130.50 kW, from 2011 to 2013 for machines < 559.27 kW, and from 2011 to 2014 for machines >= 559.27 kW). Value calculated from the population data included in the NONROAD2008 model. The NONROAD2008 data is given in the unit of horsepower, the "horsepower to kilowatt conversion factor" parameter was used to convert the result in kW, the SI unit of power.
  Basic parameter used to define the machine population represented by the dataset, could be changed to create a new instance of the dataset to reflect a specific situation/machine.

## Reference product
- machine operation, diesel, >= 74.57 kW, low load factor: 1 hour; name RefProd; By-product classification allocatable product; CPC 543: Site preparation services
  production volume 4 hour; name ProdVol
    This is a placeholder value that does not reflect real-world production volumes. This dataset does not currently require a real-world production volume to work in the database framework, and no actual data were collected yet. This has no negative effect on the results of the ecoinvent database.
  property price 2.82245 EUR2005; name RefProd_price_EUR2005
    Calculated based on inputs: The price of the product has been calculated as a sum of the values of the material and energy inputs for this product. This value is therefore a rough estimation. It may underestimate the real price since there are additional expenses when producing any product. These expences can include for example labour costs, treatment of waste materials and profit for the producer. Please consider carefully whether this level of data quality is acceptable for your application.

## Inputs from technosphere
- building machine: 3.41499e-5 unit; = diesel*machine_ratio; lognormal variance with pedigree 0.002, pedigree (1,1,3,1,1)
  EcoSpold01Location=RER
  Calculated value (see Exchange Properties).
  Uncertainty: Calculated variable. Uncertainty should be determined from propagation of uncertainty factors of underlying variables, however no uncertainty could be generated for the terms of the power function. Uncertainty of actual relation between variables not accounted at this time, although this could be included in a future update.
  property consumption ratio 5.73e-6; name machine_ratio
  note on consumption ratio: Calculated value. The consumption value has been taken directly from the ecoinvent v3.0 dataset "diesel, burned in building machine, GLO 2001" and divided by the diesel fuel consumption indicated in the same dataset (0,0234 kg) to obtain the consumption ratio per kg of diesel fuel.
- waste mineral oil: 0 kg; name waste_oil; pedigree (1,1,1,1,1)
  EcoSpold01Location=CH
  Uncertainty: Calculated variable. Uncertainty should be determined from propagation of uncertainty factors of underlying variables, however no uncertainty could be generated for the terms of the power function. Uncertainty of actual relation between variables not accounted at this time, although this could be included in a future update.
  production volume 0 kg
    Calculated from production volume of reference product using the relative outputs.
  property price 0 EUR2005; name waste_oil_price_EUR2005
  properties: dry mass 0.9 kg, wet mass 1 kg, water content 0.111111, carbon content, fossil 0.864444
  note on carbon content, fossil: Tab A.6, ecoinvent v2.2 report 13_I. C content has been calculated after data in the tables, and then referred to 1 kg DM
- diesel: 5.95984 kg; = (T0*T0_kW/hp_to_kW+T1*T1_kW/hp_to_kW+T2*T2_kW/hp_to_kW+T3*T3_kW/hp_to_kW+T4*T4_kW/hp_to_kW+T4N*T4N_kW/hp_to_kW)*T012344N_diesel_100php*load; lognormal variance with pedigree 0.002, pedigree (1,1,3,1,1)
  Calculated value. Represents the diesel fuel consumption per hour of operation of the US weigthed average machine represented by this dataset (>= 74.57 kW, low load factor, see list in Synonyms field).
  EcoSpold01Location=RER
  Uncertainty: Calculated variable. Uncertainty should be determined from propagation of uncertainty factors of underlying variables, however no uncertainty could be generated for the terms of the power function. Uncertainty of actual relation between variables not accounted at this time, although this could be included in a future update.
  property carbon content, fossil 0.865; name diesel_C
  property fuel consumption tier T0-T1-T2-T3-T4-T4N for hp >= 100 0.196409 kg/hp*h; name T012344N_diesel_100php
  property sulfur content 1.5e-5; name diesel_S_content
  properties: wet mass 1 kg, dry mass 1 kg
  note on carbon content, fossil: C-content of diesel is 86.5% (ecoinvent v2.2 report 6_IV, Tab 3.14)
  note on sulfur content: sulfur content on a dry matter basis. Basic parameter used to define the diesel fuel sulfur content (the default value is the ultra-low sulfur nonroad diesel sulfur content, effective June 2010 in the United States of America), could be changed to create a new instance of the dataset to reflect a specific situation/machine.
- lubricating oil: 0 kg; name oil; pedigree (1,1,1,1,1)
  Calculated value (see Exchange Properties).
  EcoSpold01Location=RER
  Uncertainty: Calculated variable. Uncertainty should be determined from propagation of uncertainty factors of underlying variables, however no uncertainty could be generated for the terms of the power function. Uncertainty of actual relation between variables not accounted at this time, although this could be included in a future update.
  property consumption ratio 0.022; name oil_ratio
  properties: wet mass 1 kg, carbon content, fossil 0.75, dry mass 1 kg
  note on carbon content, fossil: Lubricating oil is produced from diesel. C-content/dry mass of fats and oils considered 75%, from: ecoinvent v2.2 report, n 15a, pg 40
- waste mineral oil: -0.0327922, -0.000758779, -0.0975654 kg (3 entries); lognormal variance with pedigree 0.002, pedigree (1,1,3,1,1)
  (same comment as for waste mineral oil)
  production volume 0.524466 kg
- lubricating oil: 0.0228138, 0.108303 kg (2 entries); lognormal variance with pedigree 0.002, pedigree (1,1,3,1,1)
  (same comment as for lubricating oil)
  properties: wet mass 1 kg, carbon content, fossil 0.75, consumption ratio 0.022, dry mass 1 kg

## Inputs from nature
- Oxygen [natural resource, in air]: 13.7695 kg; = acetaldehyde*acetaldehyde_O+acrolein*acrolein_O+formaldehyde*formaldehyde_O+propanal*propanal_O+N2O*N2O_O+NOx*NOx_O+CO*CO_O+CO2*CO2_O+dioxins*dioxins_O+SO2*SO2_O; lognormal variance with pedigree 0.002, pedigree (1,1,3,1,1)
  Calculated value.
  Uncertainty: Calculated variable. Uncertainty should be determined from propagation of uncertainty factors of underlying variables, however no uncertainty could be generated for the terms of the power function. Uncertainty of actual relation between variables not accounted at this time, although this could be included in a future update.

## Emissions to nature
- Benzo(k)fluoranthene [air, unspecified]: 2.00799e-9 kg; name benzoKfluoranthene; = PM10*benzoKfluoranthene_ratio; lognormal variance with pedigree 0.002, pedigree (1,1,3,1,1)
  Calculated value (see Exchange Properties).
  Uncertainty: Calculated variable. Uncertainty should be determined from propagation of uncertainty factors of underlying variables, however no uncertainty could be generated for the terms of the power function. Uncertainty of actual relation between variables not accounted at this time, although this could be included in a future update.
  property carbon content, fossil 0.952065; name benzoKfluoranthene_C
  property emission ratio 3.5e-7 kg/kg; name benzoKfluoranthene_ratio
- Benzene, ethyl- [air, unspecified]: 2.63425e-5 kg; name ethylbenzene; = VOC*ethylbenzene_ratio; lognormal variance with pedigree 0.002, pedigree (1,1,3,1,1)
  (same comment as for Benzo(k)fluoranthene)
  property carbon content, fossil 0.905065; name ethylbenzene_C
  property emission ratio 0.0031001 kg/kg; name ethylbenzene_ratio
- Chromium [air, unspecified]: 7.02742e-10 kg; = diesel*chromium_ratio; lognormal variance with pedigree 0.002, pedigree (1,1,3,1,1)
  (same comment as for Benzo(k)fluoranthene)
  property emission ratio 1.17913e-10 kg/kg; name chromium_ratio
- Benzo(ghi)perylene [air, unspecified]: 1.09005e-9 kg; name benzoGHIperylene; = PM10*benzoGHIperylene_ratio; lognormal variance with pedigree 0.002, pedigree (1,1,3,1,1)
  (same comment as for Benzo(k)fluoranthene)
  property carbon content, fossil 0.956232; name benzoGHIperylene_C
  property emission ratio 1.9e-7 kg/kg; name benzoGHIperylene_ratio
- Ethane [air, unspecified]: 8.06963e-6 kg; name ethane; = THC*ethane_ratio; lognormal variance with pedigree 0.002, pedigree (1,1,3,1,1)
  (same comment as for Benzo(k)fluoranthene)
  property emission ratio 0.001 kg/kg; name ethane_ratio
  property carbon content, fossil 0.798885; name ethane_C
- Sulfur dioxide [air, unspecified]: 0.000174619 kg; name SO2; = (T0*T0_kW/hp_to_kW*(T012344N_diesel_100php*sulfur_to_direct_PM-T0_thc_100php)+T1*T1_kW/hp_to_kW*(T012344N_diesel_100php*sulfur_to_direct_PM-if(T1_kW/hp_to_kW<175;T12_thc_175hp;if(T1_kW/hp_to_kW<300;T12_thc_300hp;if(T1_kW/hp_to_kW<600;T1_thc_600hp;if(T1_kW/hp_to_kW<750;T1_thc_750hp;T1_thc_750php)))))+T2*T2_kW/hp_to_kW*(T012344N_diesel_100php*sulfur_to_direct_PM-if(T2_kW/hp_to_kW<175;T12_thc_175hp;if(T2_kW/hp_to_kW<300;T12_thc_300hp;T23_thc_300php)))+T3*T3_kW/hp_to_kW*(T012344N_diesel_100php*sulfur_to_direct_PM-if(T3_kW/hp_to_kW<300;T3_thc_300hp;T23_thc_300php))+T4*T4_kW/hp_to_kW*(T012344N_diesel_100php*sulfur_to_direct_PM-if(T4_kW/hp_to_kW<750;T44N_thc_750hp;T4_thc_750php))+T4N*T4N_kW/hp_to_kW*(T012344N_diesel_100php*sulfur_to_direct_PM-if(T4_kW/hp_to_kW<750;T44N_thc_750hp;T4N_thc_750php)))*diesel_S_content*2*load; lognormal variance with pedigree 0.002, pedigree (1,1,3,1,1)
  Calculated value. Represents the emissions per hour of operation of the US weigthed average machine represented by this dataset (>= 74.57 kW, low load factor, see list in Synonyms field). Based on the diesel fuel sulfur content, modulated by the estimated fraction of sulfur directly converted to particulate form (value of 0,978 taken from NONROAD2008 model). The value of 2 in the mathematical relation repressents the stoichiometric relationship between sulfur dioxide and elementary sulfur (2 g SO2/g S).
  Uncertainty: Calculated variable. Uncertainty should be determined from propagation of uncertainty factors of underlying variables, however no uncertainty could be generated for the terms of the power function. Uncertainty of actual relation between variables not accounted at this time, although this could be included in a future update.
  property oxygen content 0.499477; name SO2_O
  property fraction of diesel sulfur converted to direct PM (hydrated sulfuric acid) 0.978; name sulfur_to_direct_PM
- Benzo(b)fluoranthene [air, unspecified]: 2.81119e-9 kg; name benzoBfluoranthene; = PM10*benzoBfluoranthene_ratio; lognormal variance with pedigree 0.002, pedigree (1,1,3,1,1)
  (same comment as for Benzo(k)fluoranthene)
  property carbon content, fossil 0.952065; name benzoBfluoranthene_C
  property emission ratio 4.9e-7 kg/kg; name benzoBfluoranthene_ratio
- Chromium VI [air, unspecified]: 3.62019e-10 kg; = diesel*chromiumVI_ratio; lognormal variance with pedigree 0.002, pedigree (1,1,3,1,1)
  (same comment as for Benzo(k)fluoranthene)
  property emission ratio 6.07431e-11 kg/kg; name chromiumVI_ratio
- Particulates, < 2.5 um [air, unspecified]: 0.00556501 kg; name PM25; = PM10*PM25_ratio; lognormal variance with pedigree 0.002, pedigree (1,1,3,1,1)
  (same comment as for Benzo(k)fluoranthene)
  property carbon content, fossil 0.922582; name PM_C
  property emission ratio 0.97 kg/kg; name PM25_ratio
- Benz(a)anthracene [air, unspecified]: 4.07335e-9 kg; name benzAanthracene; = PM10*benzAanthracene_ratio; lognormal variance with pedigree 0.002, pedigree (1,1,3,1,1)
  (same comment as for Benzo(k)fluoranthene)
  property emission ratio 7.1e-7 kg/kg; name benzAanthracene_ratio
  property carbon content, fossil 0.947021; name benzAanthracene_C
- Benzene [air, unspecified]: 0.000172869 kg; name benzene; = VOC*benzene_ratio; lognormal variance with pedigree 0.002, pedigree (1,1,3,1,1)
  (same comment as for Benzo(k)fluoranthene)
  property emission ratio 0.020344 kg/kg; name benzene_ratio
  property carbon content, fossil 0.922582; name benzene_C
- Nitrogen oxides [air, unspecified]: 0.0586176 kg; name NOx; = (T0*T0_kW/hp_to_kW*T0_nox_100php+T1*T1_kW/hp_to_kW*if(T1_kW/hp_to_kW<175;T1_nox_175hp;if(T1_kW/hp_to_kW<300;T1_nox_300hp;if(T1_kW/hp_to_kW<600;T1_nox_600hp;if(T1_kW/hp_to_kW<750;T1_nox_750hp;T1_nox_750php))))+T2*T2_kW/hp_to_kW*if(T2_kW/hp_to_kW<175;T2_nox_175hp;if(T2_kW/hp_to_kW<300;T2_nox_300hp;if(T2_kW/hp_to_kW<600;T2_nox_600hp;T2_nox_600php)))+T3*T3_kW/hp_to_kW*T3_nox_750hp+T4*T4_kW/hp_to_kW*if(T4_kW/hp_to_kW<750;T4_nox_750hp;T44N_nox_750php)+T4N*T4N_kW/hp_to_kW*if(T4N_kW/hp_to_kW<750;T4N_nox_750hp;T44N_nox_750php))*load; lognormal variance with pedigree 0.002, pedigree (1,1,3,1,1)
  (same comment as for total particulates <= 10 um emissions)
  property nitrogen oxides emissions tier T4 for hp < 750 0.0025 kg/hp*h; name T4_nox_750hp
  property nitrogen oxides emissions tier T1 for hp < 750 0.00642 kg/hp*h; name T1_nox_750hp
  property nitrogen oxides emissions tier T2 for hp < 600 0.00478 kg/hp*h; name T2_nox_600hp
  property nitrogen oxides emissions tier T3 for hp < 750 0.00303 kg/hp*h; name T3_nox_750hp
  property nitrogen oxides emissions tier T1 for hp >= 750 0.00679 kg/hp*h; name T1_nox_750php
  property nitrogen oxides emissions tier T2 for hp < 175 0.00452 kg/hp*h; name T2_nox_175hp
  property nitrogen oxides emissions tier T2 for hp >= 600 0.00452 kg/hp*h; name T2_nox_600php
  property nitrogen oxides emissions tier T2 for hp < 300 0.00441 kg/hp*h; name T2_nox_300hp
  property nitrogen oxides emissions tier T4-T4N for hp >= 750 0.00239 kg/hp*h; name T44N_nox_750php
  property nitrogen oxides emissions tier T1 for hp < 300 0.00615 kg/hp*h; name T1_nox_300hp
  property nitrogen oxides emissions tier T4N for hp < 750 0.00028 kg/hp*h; name T4N_nox_750hp
  property nitrogen oxides emissions tier T1 for hp < 175 0.00624 kg/hp*h; name T1_nox_175hp
  property nitrogen oxides emissions tier T0 for hp >= 100 0.00925 kg/hp*h; name T0_nox_100php
  property nitrogen oxides emissions tier T1 for hp < 600 0.00664 kg/hp*h; name T1_nox_600hp
  property oxygen content 0.695533; name NOx_O
- Anthracene [air, unspecified]: 2.46696e-9 kg; name anthracene; = PM10*anthracene_ratio; lognormal variance with pedigree 0.002, pedigree (1,1,3,1,1)
  (same comment as for Benzo(k)fluoranthene)
  property emission ratio 4.3e-7 kg/kg; name anthracene_ratio
  property carbon content, fossil 0.94345; name anthracene_C
- Butadiene [air, unspecified]: 1.58186e-5 kg; name butadiene; = VOC*butadiene_ratio; lognormal variance with pedigree 0.002, pedigree (1,1,3,1,1)
  (same comment as for Benzo(k)fluoranthene)
  property emission ratio 0.0018616 kg/kg; name butadiene_ratio
  property carbon content, fossil 0.8882; name butadiene_C
- Copper [air, unspecified]: 1.01317e-5 kg; = diesel*copper_ratio; lognormal variance with pedigree 0.002, pedigree (1,1,3,1,1)
  (same comment as for Benzo(k)fluoranthene)
  property emission ratio 1.7e-6 kg/kg; name copper_ratio
- Acrolein [air, unspecified]: 2.57609e-5 kg; name acrolein; = VOC*acrolein_ratio; lognormal variance with pedigree 0.002, pedigree (1,1,3,1,1)
  (same comment as for Benzo(k)fluoranthene)
  property emission ratio 0.00303165 kg/kg; name acrolein_ratio
  property oxygen content 0.285372; name acrolein_O
  property carbon content, fossil 0.642716; name acrolein_C
- Carbon dioxide, fossil [air, unspecified]: 18.8572 kg; name CO2; = (diesel*diesel_C-trimethylpentane*trimethylpentane_C-acenaphthene*acenaphthene_C-acenaphthylene*acenaphthylene_C-acetaldehyde*acetaldehyde_C-acrolein*acrolein_C-anthracene*anthracene_C-benzAanthracene*benzAanthracene_C-benzene*benzene_C-ethylbenzene*ethylbenzene_C-benzoApyrene*benzoApyrene_C-benzoBfluoranthene*benzoBfluoranthene_C-benzoGHIperylene*benzoGHIperylene_C-benzoKfluoranthene*benzoKfluoranthene_C-butadiene*butadiene_C-chrysene*chrysene_C-dibenzAHanthracene*dibenzAHanthracene_C-dioxins*dioxins_C-ethane*ethane_C-fluoranthene*fluoranthene_C-fluorene*fluorene_C-formaldehyde*formaldehyde_C-hexane*hexane_C-indeno123CDpyrene*indeno123CDpyrene_C-methane*methane_C-naphthalene*naphthalene_C-NMVOC*NMVOC_C-phenanthrene*phenanthrene_C-(PM10p+PM25+PM2510)*PM_C-propanal*propanal_C-pyrene*pyrene_C-styrene*styrene_C-toluene*toluene_C-xylene*xylene_C)*44/12; lognormal variance with pedigree 0.002, pedigree (1,1,3,1,1)
  Calculated value. Represents the emissions per hour of operation of the US weigthed average machine represented by this dataset (>= 74.57 kW, low load factor, see list in Synonyms field). Based on the carbon balance, considers the diesel fuel carbon content and the carbon in the other carbon containing emissions and converts the remaining into carbon dioxide. The 44/12 term represents the stoichiometric relationship between carbon dioxide and carbon.
  Uncertainty: Calculated variable. Uncertainty should be determined from propagation of uncertainty factors of underlying variables, however no uncertainty could be generated for the terms of the power function. Uncertainty of actual relation between variables not accounted at this time, although this could be included in a future update.
  property oxygen content 0.727079; name CO2_O; = 1-CO2_C
  property carbon content, fossil 0.272921; name CO2_C
- Acetaldehyde [air, unspecified]: 0.000451038 kg; name acetaldehyde; = VOC*acetaldehyde_ratio; lognormal variance with pedigree 0.002, pedigree (1,1,3,1,1)
  (same comment as for Benzo(k)fluoranthene)
  property oxygen content 0.363179; name acetaldehyde_O
  property emission ratio 0.05308 kg/kg; name acetaldehyde_ratio
  property carbon content, fossil 0.545303; name acetaldehyde_C
- NMVOC, non-methane volatile organic compounds, unspecified origin [air, unspecified]: 0.00645944 kg; name NMVOC; = VOC-trimethylpentane-acetaldehyde-acrolein-benzene-ethylbenzene-butadiene-formaldehyde-hexane-propanal-styrene-toluene-xylene; lognormal variance with pedigree 0.002, pedigree (1,1,3,1,1)
  (same comment as for Oxygen)
  property carbon content, fossil 0.854049; name NMVOC_C
- Acenaphthylene [air, unspecified]: 4.81918e-7 kg; name acenaphthylene; = PM10*acenaphthylene_ratio; lognormal variance with pedigree 0.002, pedigree (1,1,3,1,1)
  (same comment as for Benzo(k)fluoranthene)
  property emission ratio 8.4e-5 kg/kg; name acenaphthylene_ratio
  property carbon content, fossil 0.947021; name acenaphthylene_C
- Zinc [air, unspecified]: 5.95984e-6 kg; = diesel*zinc_ratio; lognormal variance with pedigree 0.002, pedigree (1,1,3,1,1)
  (same comment as for Benzo(k)fluoranthene)
  property emission ratio 1e-6 kg/kg; name zinc_ratio
- Acenaphthene [air, unspecified]: 5.73712e-7 kg; name acenaphthene; = PM10*acenaphthene_ratio; lognormal variance with pedigree 0.002, pedigree (1,1,3,1,1)
  (same comment as for Benzo(k)fluoranthene)
  property carbon content, fossil 0.934641; name acenaphthene_C
  property emission ratio 0.0001 kg/kg; name acenaphthene_ratio
- Benzo(a)pyrene [air, unspecified]: 2.00799e-9 kg; name benzoApyrene; = PM10*benzoApyrene_ratio; lognormal variance with pedigree 0.3201, pedigree (1,5,3,3,1)
  Calculated value (see Exchange Properties).
  property emission ratio 3.5e-7 kg/kg; name benzoApyrene_ratio
  property carbon content, fossil 0.952065; name benzoApyrene_C
- 2,2,4-Trimethyl pentane [air, unspecified]: 6.11157e-6 kg; name trimethylpentane; = VOC*trimethylpentane_ratio; lognormal variance with pedigree 0.002, pedigree (1,1,3,1,1)
  (same comment as for Benzo(k)fluoranthene)
  property carbon content, fossil 0.841179; name trimethylpentane_C
  property emission ratio 0.000719235 kg/kg; name trimethylpentane_ratio
- Cadmium [air, unspecified]: 5.95984e-8 kg; = diesel*cadmium_ratio; lognormal variance with pedigree 0.002, pedigree (1,1,3,1,1)
  (same comment as for Benzo(k)fluoranthene)
  property emission ratio 1e-8 kg/kg; name cadmium_ratio
- Pyrene [air, unspecified]: 1.66376e-8 kg; name pyrene; = PM10*pyrene_ratio; lognormal variance with pedigree 0.002, pedigree (1,1,3,1,1)
  (same comment as for Benzo(k)fluoranthene)
  property carbon content, fossil 0.950167; name pyrene_C
  property emission ratio 2.9e-6 kg/kg; name pyrene_ratio
- Particulates, > 10 um [air, unspecified]: 0.000365815 kg; name PM10p; = PM10*PM10p_ratio; lognormal variance with pedigree 0.002, pedigree (1,1,3,1,1)
  (same comment as for Benzo(k)fluoranthene)
  property emission ratio 0.0637628 kg/kg; name PM10p_ratio
- Particulates, > 2.5 um, and < 10um [air, unspecified]: 0.000172114 kg; name PM2510; = PM10-PM25; lognormal variance with pedigree 0.002, pedigree (1,1,3,1,1)
  (same comment as for Oxygen)
- Phenanthrene [air, unspecified]: 1.49165e-6 kg; name phenanthrene; = PM10*phenanthrene_ratio; lognormal variance with pedigree 0.002, pedigree (1,1,3,1,1)
  (same comment as for Benzo(k)fluoranthene)
  property carbon content, fossil 0.94345; name phenanthrene_C
  property emission ratio 0.00026 kg/kg; name phenanthrene_ratio
- Propanal [air, unspecified]: 0.000100268 kg; name propanal; = VOC*propanal_ratio; lognormal variance with pedigree 0.002, pedigree (1,1,3,1,1)
  (same comment as for Benzo(k)fluoranthene)
  property oxygen content 0.275468; name propanal_O
  property carbon content, fossil 0.620409; name propanal_C
  property emission ratio 0.0118 kg/kg; name propanal_ratio
- Dioxins, measured as 2,3,7,8-tetrachlorodibenzo-p-dioxin [air, unspecified]: 3.57705e-12 kg; name dioxins; = diesel*dioxins_ratio; lognormal variance with pedigree 0.002, pedigree (1,1,3,1,1)
  (same comment as for Benzo(k)fluoranthene)
  property oxygen content 0.0993808; name dioxins_O
  property carbon content, fossil 0.447652; name dioxins_C
  property emission ratio 6.00192e-13 kg/kg; name dioxins_ratio
- Naphthalene [air, unspecified]: 2.63907e-6 kg; name naphthalene; = PM10*Naphthalene_ratio; lognormal variance with pedigree 0.002, pedigree (1,1,3,1,1)
  (same comment as for Benzo(k)fluoranthene)
  property emission ratio 0.00046 kg/kg; name naphthalene_ratio
  property carbon content, fossil 0.937091; name naphthalene_C
- Xylene [air, unspecified]: 8.99186e-5 kg; name xylene; = VOC*xylene_ratio; lognormal variance with pedigree 0.002, pedigree (1,1,3,1,1)
  (same comment as for Benzo(k)fluoranthene)
  property carbon content, fossil 0.905065; name xylene_C
  property emission ratio 0.010582 kg/kg; name xylene_ratio
- Dinitrogen monoxide [air, unspecified]: 0.00071518 kg; name N2O; = diesel*N2O_ratio; lognormal variance with pedigree 0.002, pedigree (1,1,3,1,1)
  (same comment as for Benzo(k)fluoranthene)
  property oxygen content 0.363506; name N2O_O
  property emission ratio 0.00012 kg/kg; name N2O_ratio
- Indeno(1,2,3-cd)pyrene [air, unspecified]: 4.53232e-10 kg; name indeno123CDpyrene; = PM10*indeno123CDpyrene_ratio; lognormal variance with pedigree 0.002, pedigree (1,1,3,1,1)
  (same comment as for Benzo(k)fluoranthene)
  property emission ratio 7.9e-8 kg/kg; name indeno123CDpyrene_ratio
  property carbon content, fossil 0.956232; name indeno123CDpyrene_C
- Toluene [air, unspecified]: 0.000127179 kg; name toluene; = VOC*toluene_ratio; lognormal variance with pedigree 0.002, pedigree (1,1,3,1,1)
  (same comment as for Benzo(k)fluoranthene)
  property carbon content, fossil 0.91249; name toluene_C
  property emission ratio 0.014967 kg/kg; name toluene_ratio
- Selenium [air, unspecified]: 5.95984e-8 kg; = diesel*selenium_ratio; lognormal variance with pedigree 0.002, pedigree (1,1,3,1,1)
  (same comment as for Benzo(k)fluoranthene)
  property emission ratio 1e-8 kg/kg; name selenium_ratio
- Fluorene [air, unspecified]: 5.73712e-7 kg; name fluorene; = PM10*fluorene_ratio; lognormal variance with pedigree 0.002, pedigree (1,1,3,1,1)
  (same comment as for Benzo(k)fluoranthene)
  property carbon content, fossil 0.939364; name fluorene_C
  property emission ratio 0.0001 kg/kg; name fluorene_ratio
- Styrene [air, unspecified]: 5.05149e-6 kg; name styrene; = VOC*styrene_ratio; lognormal variance with pedigree 0.002, pedigree (1,1,3,1,1)
  (same comment as for Benzo(k)fluoranthene)
  property carbon content, fossil 0.922582; name styrene_C
  property emission ratio 0.00059448 kg/kg; name styrene_ratio
- Nickel [air, unspecified]: 7.22267e-8 kg; = diesel*nickel_ratio; lognormal variance with pedigree 0.002, pedigree (1,1,3,1,1)
  Calculated value (see Exchange Properties).
  property emission ratio 1.21189e-8 kg/kg; name nickel_ratio
- Fluoranthene [air, unspecified]: 9.7531e-8 kg; name fluoranthene; = PM10*fluoranthene_ratio; lognormal variance with pedigree 0.002, pedigree (1,1,3,1,1)
  (same comment as for Benzo(k)fluoranthene)
  property emission ratio 1.7e-5 kg/kg; name fluoranthene_ratio
  property carbon content, fossil 0.950167; name fluoranthene_C
- Manganese [air, unspecified]: 4.86242e-8 kg; = diesel*manganese_ratio; lognormal variance with pedigree 0.002, pedigree (1,1,3,1,1)
  (same comment as for Benzo(k)fluoranthene)
  property emission ratio 8.15864e-9 kg/kg; name manganese_ratio
- Ammonia [air, unspecified]: 0.000154783 kg; = diesel*ammonia_ratio; lognormal variance with pedigree 0.002, pedigree (1,1,3,1,1)
  (same comment as for Benzo(k)fluoranthene)
  property emission ratio 2.59711e-5 kg/kg; name ammonia_ratio
- Dibenz(a,h)anthracene [air, unspecified]: 1.66376e-11 kg; name dibenzAHanthracene; = PM10*dibenzAHanthracene_ratio; lognormal variance with pedigree 0.002, pedigree (1,1,3,1,1)
  (same comment as for Benzo(k)fluoranthene)
  property carbon content, fossil 0.949307; name dibenzAHanthracene_C
  property emission ratio 2.9e-9 kg/kg; name dibenzAHanthracene_ratio
- Hexane [air, unspecified]: 1.35218e-5 kg; name hexane; = VOC*hexane_ratio; lognormal variance with pedigree 0.002, pedigree (1,1,3,1,1)
  (same comment as for Benzo(k)fluoranthene)
  property carbon content, fossil 0.836259; name hexane_C
  property emission ratio 0.0015913 kg/kg; name hexane_ratio
- Methane, fossil [air, unspecified]: 0.000129114 kg; name methane; = THC*methane_ratio; lognormal variance with pedigree 0.002, pedigree (1,1,3,1,1)
  (same comment as for Benzo(k)fluoranthene)
  property emission ratio 0.016 kg/kg; name methane_ratio
  property carbon content, fossil 0.748694; name methane_C
- Chrysene [air, unspecified]: 1.09005e-8 kg; name chrysene; = PM10*chrysene_ratio; lognormal variance with pedigree 0.002, pedigree (1,1,3,1,1)
  (same comment as for Benzo(k)fluoranthene)
  property emission ratio 1.9e-6 kg/kg; name chrysene_ratio
  property carbon content, fossil 0.947021; name chrysene_C
- Formaldehyde [air, unspecified]: 0.001004 kg; name formaldehyde; = VOC*formaldehyde_ratio; lognormal variance with pedigree 0.002, pedigree (1,1,3,1,1)
  (same comment as for Benzo(k)fluoranthene)
  property carbon content, fossil 0.400023; name formaldehyde_C
  property oxygen content 0.532842; name formaldehyde_O
  property emission ratio 0.118155 kg/kg; name formaldehyde_ratio
- Carbon monoxide, fossil [air, unspecified]: 0.0298805 kg; name CO; = (T0*T0_kW/hp_to_kW*T0_co_100php+T1*T1_kW/hp_to_kW*if(T1_kW/hp_to_kW<175;T123_co_175hp;if(T1_kW/hp_to_kW<300;T123_co_300hp;if(T1_kW/hp_to_kW<600;T1_co_600hp;if(T1_kW/hp_to_kW<750;T123_co_750hp;T124_co_750php))))+T2*T2_kW/hp_to_kW*if(T2_kW/hp_to_kW<175;T123_co_175hp;if(T2_kW/hp_to_kW<300;T123_co_300hp;if(T2_kW/hp_to_kW<600;T23_co_600hp;if(T2_kW/hp_to_kW<750;T123_co_750hp;T124_co_750php))))+T3*T3_kW/hp_to_kW*if(T3_kW/hp_to_kW<175;T123_co_175hp;if(T3_kW/hp_to_kW<300;T123_co_300hp;if(T3_kW/hp_to_kW<600;T23_co_600hp;T123_co_750hp)))+T4*T4_kW/hp_to_kW*if(T4_kW/hp_to_kW<175;T44N_co_175hp;if(T4_kW/hp_to_kW<300;T44N_co_300hp;if(T4_kW/hp_to_kW<600;T44N_co_600hp;if(T4_kW/hp_to_kW<750;T44N_co_750hp;T124_co_750php))))+T4N*T4N_kW/hp_to_kW*if(T4N_kW/hp_to_kW<175;T44N_co_175hp;if(T4N_kW/hp_to_kW<300;T44N_co_300hp;if(T4N_kW/hp_to_kW<600;T44N_co_600hp;if(T4N_kW/hp_to_kW<750;T44N_co_750hp;T4N_co_750php)))))*load; lognormal variance with pedigree 0.002, pedigree (1,1,3,1,1)
  (same comment as for total particulates <= 10 um emissions)
  property carbon monoxide emissions tier T4-T4N for hp < 175 0.00022 kg/hp*h; name T44N_co_175hp
  property carbon monoxide emissions tier T4-T4N for hp < 600 0.00022 kg/hp*h; name T44N_co_600hp
  property carbon monoxide emissions tier T4-T4N for hp < 300 0.00019 kg/hp*h; name T44N_co_300hp
  property carbon monoxide emissions tier T4N for hp >= 750 0.0002 kg/hp*h; name T4N_co_750php
  property carbon monoxide emissions tier T1 for hp < 600 0.00336 kg/hp*h; name T1_co_600hp
  property carbon content, fossil 0.428811; name CO_C
  property carbon monoxide emissions tier T1-T2-T4 for hp >= 750 0.00196 kg/hp*h; name T124_co_750php
  property carbon monoxide emissions tier T1-T2-T3 for hp < 300 0.00192 kg/hp*h; name T123_co_300hp
  property oxygen content 0.571189; name CO_O; = 1-CO_C
  property carbon monoxide emissions tier T4-T4N for hp < 750 0.00034 kg/hp*h; name T44N_co_750hp
  property carbon monoxide emissions tier T2-T3 for hp < 600 0.00217 kg/hp*h; name T23_co_600hp
  property carbon monoxide emissions tier T1-T2-T3 for hp < 750 0.00341 kg/hp*h; name T123_co_750hp
  property carbon monoxide emissions tier T0 for hp >= 100 0.00694 kg/hp*h; name T0_co_100php
  property carbon monoxide emissions tier T1-T2-T3 for hp < 175 0.00223 kg/hp*h; name T123_co_175hp

## Sampling procedure
Most data from the U.S. EPA NONROAD2008 and NMIM models. Some data from the LCA study Oekoinventare von Energiesystemen 1996 and emissions from the Swiss "Offroad" database.

## Extrapolations
This dataset has been extrapolated from year 2014 to the year of the calculation (2019). The uncertainty has been adjusted accordingly.
