# pipeline construction, natural gas, long distance, high capacity, onshore

Dataset: EcoSpold 2, unit process
Geography: GLO
Time period: 1996-01-01 to 2019-12-31
Technology level: current
Classification: ISIC rev.4 ecoinvent: 4220:Construction of utility projects
Classification: EcoSpold01Categories: natural gas/production
Tags: ConvertedDataset
Scenario: Business-as-Usual
System model: Allocation at the point of substitution
Generated by: Mireille Faist Emmenegger (obsolete)
Published in: Faist Emmenegger, M. 2007
Database: ecoinvent
isCopyrightProtected: true
accessRestrictedTo: 1

## General comment
It is assumed that half of the pipelines are disposed in a discharge at the end of life, the other half stays in the soil. The life time of the pipeline is 40 years.
[This dataset was already contained in the ecoinvent database version 2. It was not individually updated during the transfer to ecoinvent version 3. Life Cycle Impact Assessment results may still have changed, as they are affected by changes in the supply chain, i.e. in other datasets. This dataset was generated following the ecoinvent quality guidelines for version 2. It may have been subject to central changes described in the ecoinvent version 3 change report (http://www.ecoinvent.org/database/ecoinvent-version-3/reports-of-changes/), and the results of the central updates were reviewed extensively. The changes added e.g. consistent water flows and other information throughout the database. The documentation of this dataset can be found in the ecoinvent reports of version 2, which are still available via the ecoinvent website. The change report linked above covers all central changes that were made during the conversion process.]

## Included activities end
This dataset describes the infrastructure needed for a long-distance pipeline onshore with a capacity from average 1.1e6 Sm3/h gas including material requirements, construction and disposal. Helicopter flights for inspection are included.

## Geography
The data is calculated for a pipeline with capacity of 1.1 Mio. Nm3 gas per hour.

## Technology
The steel quantities are calculated on the basis of the geometry of the pipeline (diameter 1219mm, thickness 12.3 mm). Coating is assumed to be the same as in the low capacity onshore pipeline.

## Parameters
- fraction, process water, to air: 0.15 dimensionless; name fraction_PW_to_air; lognormal variance with pedigree 0.092025, pedigree (4,4,3,2,4)
  Literature value. In case when no industry/process specific data are available, default evaporation fraction value is used. This value is 15% and is based on literature (Statistics Canada, 2007 & Shaffer, K.H., 2008, Consumptive water use in the Great Lakes Basin, USGS & Shiklomanov, 2003, World Water Resources at the Beginning of the 21st Century) and has been approved by an expert.

## Reference product
- pipeline, natural gas, long distance, high capacity, onshore: 1 km; By-product classification allocatable product; CPC 53241: Long-distance pipelines
  EcoSpold01Location=GLO
  production volume 1 km
    Unknown
    Dummy value to be replaced by measured, estimated or calculated value
  property price 784617 EUR2005
    UNdata;(Average prices of EU27; 1.291 EUR/kg) http://data.un.org/Data.aspx?q=pipeline&d=ComTrade&f=_l1Code%3a74%3bcmdCode%3a730410. Pipes, line, iron or steel, for oil or gas pipelines. Weight 759 t (excl. sand).
  property true value 784617
    allocation property applied in "true value" allocation // value calculated from revenue

## By-products
- electricity, for reuse in municipal waste incineration only: 0 kWh; CPC 17100: Electrical energy; By-product classification allocatable product; pedigree (1,1,1,1,1)
  Net electricity generated from this waste and used in internal MSWI plant energy redistribution.
  Uncertainty: uncertainty is calculated from uncertainties in waste composition and uncertainties in energy efficiency and the uncertainty in internal energy demand
  production volume 404.691 kWh
  property exergy 3.6 MJ; name E_el_prod_MSWI_exergy
    This exergy property is based on the exergy content of the product.
  property true value relation 3.6; name E_el_prod_MSWI_true_value_relation
    property to calculate "true value" from
  property price 0.1 EUR2005; name E_el_prod_MSWI_price_EUR2005
    Estimated to be the same price as in case of electricity, medium voltage.
  property true value 41.4623
    allocation property applied in "true value" allocation // value calculated from true value relation
- heat, for reuse in municipal waste incineration only: 0 MJ; CPC 17300: Steam and hot water; By-product classification allocatable product; pedigree (1,1,1,1,1)
  Net useful heat generated from this waste and used in internal MSWI plant energy redistribution.
  Uncertainty: uncertainty is calculated from uncertainties in waste composition and uncertainties in energy efficiency and the uncertainty in internal energy demand
  production volume 2887.12 MJ
  property exergy 0.1842 MJ; name E_th_prod_MSWI_exergy
    This exergy property is based on the exergy content of the product.
  property true value relation 0.1842; name E_th_prod_MSWI_true_value_relation
    property to calculate "true value" from
  property price 0.0106 EUR2005; name E_th_prod_MSWI_price_EUR2005
    Average European district heat price from Ecoheatcool and Euroheat 2005-2006, Ecoheat Work package 1: The European heat market. Final report. 10.6 EUR/GJ i s the price of district heat. http://www.solarthermalworld.org/files/Ecoheatcool%20WP1%20Web.pdf?download
  property true value 15.1698
    (same comment as for electricity, for reuse in municipal waste incineration only)
- zinc concentrate: 0 kg; CPC 14290: Other non-ferrous metal ores and concentrates (other than uranium or thorium ores and concentrates); By-product classification allocatable product
  Calculated value from the knowledge of the properties of both products.
  production volume 1.7639e-5 kg
  property price 0.38 EUR2005; name ByP_price_EUR2005
    Temporary price data. Calculated as 90% of purchasers price based on: Zinc content in concentrate 53%. Concentrate price per kg Zn 86.5% of refined Zn price (13.5% treatment charges according to CHR Metals Limited 2005: Dynamic cost curves. http://www.minecost.com/dynamic.pdf). 2004 zinc price from USGS (2007) Mineral commodity summaries 2007. <http://minerals.usgs.gov/minerals/pubs/mcs/2007/mcs2007.pdf> [Accessed 25 May 2010]
  property zinc content 0.53; name zinc_C_zinc_concentrate
    Zinc content on a dry matter basis. Value taken from teh "zinc mine operation" /GLO dataset.
  property dry mass 1 kg; name DM_zinc_concentrate
  property carbon content 0
    carbon content on a dry matter basis (reserved; not for manual entry)
  property true value 5.65472e-8
    allocation property applied in "true value" allocation // value calculated from revenue
  properties: wet mass 1 kg, water content 0, carbon content, non-fossil 0, carbon content, fossil 0, water in wet mass 0 kg, carbon allocation 0 kg
- iron scrap, sorted, pressed: 0 kg; By-product classification Recyclable; CPC 39310: Slag, dross, scalings and other waste from the manufacture of iron or steel; pedigree (1,1,1,1,1)
  metallic iron scrap removed from ash reamains and recycled.
  Uncertainty: uncertainty is calculated from uncertainties in waste composition and transfer coefficients to soild residues
  production volume 16.0224 kg
  property price 0.175 EUR2005
    Temporary price data. Calculated as 90% of purchasers price based on: 2005 import and export prices (total trades (USD) divided by total weight (kg) in biggest economies of the world: EU27, USA, Brasil, China, India, Japan and Russia) from UN Commodity Trade Statistics Database (http://data.un.org/Explorer.aspxDatabase [Accessed 2011.06.20]). Commodity: Waste or scrap, of cast iron
  property carbon content 0
    carbon content on a dry matter basis (reserved; not for manual entry)
  property true value 2.40233
    allocation property applied in "true value" allocation // value calculated from revenue
  properties: carbon content, non-fossil 0, wet mass 1 kg, dry mass 1 kg, water content 0, carbon content, fossil 0, water in wet mass 0 kg, carbon allocation 0 kg
- copper: 0 kg; source Rentz O. 1999; By-product classification allocatable product; CPC 41413: Refined copper and copper alloys, unwrought; master alloys of copper
  Literature value. Copper uses: Before end-use copper is manufactured into semi fabricated products, such as shapes and ingots (known as 'semis'). These manufacturing processes are subdivided into hot working, cold working and, if necessary, process annealing. Few of the semis are ready for use as such. They more typically travel to first-stage manufacturers, who make metal rods, wire, and casting, and then to component manufacturers who produce such things as motors, valves, and insulated cables The components in turn are incorporated by final-stage manufacturers into a variety of finished products - automobiles, commercial buildings, residential housing, and so forth. These uses account for about 79% of the world-wide consumption of copper.
  production volume 0.516295 kg
  property price 5.52 EUR2005
    Literature value (http://www.economist.com/news/business/21576714-mining-industry-has-enriched-chile-its-future-precarious-copper-solution). Average price between 20015 and 2013.
  property carbon content 0
    carbon content on a dry matter basis (reserved; not for manual entry)
  property true value 2.41198
    allocation property applied in "true value" allocation // value calculated from revenue
  properties: dry mass 1 kg, water in wet mass 0 kg, wet mass 1 kg, carbon content, non-fossil 0, water content 0, carbon content, fossil 0, carbon allocation 0 kg
- iron scrap, unsorted: 0 kg; source European Aluminium Association 2008; CPC 39310: Slag, dross, scalings and other waste from the manufacture of iron or steel; By-product classification Recyclable; pedigree (1,1,1,1,1)
  production volume 0.000423888 kg
  property price 0.149 EUR2005; name ironScrapAmount_price_EUR2005
    Temporary price data. Calculated as 90% of purchasers price based on: estimated at 85% of sorted scrap
  property carbon content 0
    carbon content on a dry matter basis (reserved; not for manual entry)
  property true value 5.81927e-5
    allocation property applied in "true value" allocation // value calculated from revenue
  properties: water in wet mass 0 kg, water content 0, carbon content, fossil 0, carbon content, non-fossil 0, dry mass 1 kg, wet mass 1 kg, carbon allocation 0 kg
- aluminium oxide, non-metallurgical: 0 kg; source European Aluminium Association 2008; CPC 41432: Alumina (aluminium oxide), except artificial corundum; By-product classification allocatable product; CAS 1344-28-1; pedigree (1,1,1,1,1)
  production volume 0.0266736 kg
  property carbon content, non-fossil 0; name C_content_non_fossil
  property price 0.28 EUR2005; name Al2O3Amount_price_EUR2005
    From UN trade database. http://data.un.org/ Import data from the largest economies of the world are used (Brazil, India, USA, China, Japan and EU-27).
  property dry mass 1 kg; name DM
  property water content 0; name water_content
  property wet mass 1 kg; name WM
  property water in wet mass 0 kg; name WWM
  property carbon content, fossil 0; name C_content_fossil
  property carbon content 0
    carbon content on a dry matter basis (reserved; not for manual entry)
  property true value 0.00688132
    allocation property applied in "true value" allocation // value calculated from revenue
  properties: carbon allocation 0 kg
- aluminium, cast alloy: 0 kg; source European Aluminium Association 2008; By-product classification allocatable product; CPC 41431: Unwrought aluminium; pedigree (1,1,1,1,1)
  EcoSpold01Location=RER
  production volume 0.249339 kg
  property price 1.3 EUR2005; name castAlloyAmount_price_EUR2005
    Temporary price data. Calculated as 90% of purchasers price based on: Source: London Metal Exchange, Aluminium alloy price for 2005
  property carbon content 0
    carbon content on a dry matter basis (reserved; not for manual entry)
  property true value 0.298652
    allocation property applied in "true value" allocation // value calculated from revenue
  properties: water in wet mass 0 kg, carbon content, non-fossil 0, water content 0, dry mass 1 kg, carbon content, fossil 0, wet mass 1 kg, carbon allocation 0 kg
- aluminium, wrought alloy: 0 kg; source European Aluminium Association 2008; By-product classification allocatable product; CPC 4153: Semi-finished products of aluminium or aluminium alloys; pedigree (1,1,1,1,1)
  production volume 0.109156 kg
  property price 1.44 EUR2005; name secondaryAluminiumOutput_price_EUR2005
    Estimated based on literature values and expert judgement. Aluminium ccast alloys are about 90% of the price of aluminium wrought alloys.
  property carbon content 0
    carbon content on a dry matter basis (reserved; not for manual entry)
  property true value 0.144824
    allocation property applied in "true value" allocation // value calculated from revenue
  properties: wet mass 1 kg, water content 0, carbon content, fossil 0, water in wet mass 0 kg, carbon content, non-fossil 0, dry mass 1 kg, carbon allocation 0 kg

## Inputs from technosphere
- transport, helicopter: 25.9979 hour; lognormal variance with pedigree 0.1792, pedigree (2,3,5,1,3)
  Estimates based on published data
  EcoSpold01Location=GLO
  Uncertainty: estimates based on published data
- pitch: 0 kg; pedigree (1,1,1,1,1)
  Estimates based on published data
  EcoSpold01Location=RER
  Uncertainty: estimates based on published data
  properties: carbon content, fossil 0.83, dry mass 1 kg, wet mass 1 kg
- waste bitumen: 0 kg; pedigree (1,1,1,1,1)
  Estimates
  EcoSpold01Location=CH
  Uncertainty: estimates
  production volume 0 kg
    Calculated from the production volume of pipeline, natural gas, long distance, high capacity, onshore in proportion to the respective output amounts.
  properties: carbon content, fossil 0.842657, water content 0.0141988, wet mass 1 kg, dry mass 0.986 kg
- sand: 0 kg; pedigree (1,1,1,1,1)
  EcoSpold01Location=CH
  Estimates based on published data
  Uncertainty: estimates based on published data
  properties: wet mass 1 kg, dry mass 1 kg
- polyethylene, low density, granulate: 4639.63 kg; lognormal variance with pedigree 0.0606, pedigree (2,1,5,1,1)
  EcoSpold01Location=RER
  Estimates based on published data
  Uncertainty: estimates based on published data
  properties: carbon content, fossil 0.857143, dry mass 1 kg, wet mass 1 kg
  note on carbon content, fossil: Polyethylene is formed out of a huge amount of ethylene monomers (C2H4) (ecoinvent v2.2 report 11_II). MW=28 g/mol
- waste plastic, mixture: 0 kg; pedigree (1,1,1,1,1)
  EcoSpold01Location=CH
  Estimates
  Uncertainty: estimates
  production volume 0 kg
    (same comment as for waste bitumen)
  properties: water content 0.180638, carbon content, fossil 0.747344, dry mass 0.847 kg, wet mass 1 kg
  note on carbon content, fossil: C content in 1 kg DM was calculated using data in Tab A.2, ecoinvent v2.2 report 13_I
- transport, helicopter, LTO cycle: 10.3992 unit; lognormal variance with pedigree 0.1792, pedigree (2,3,5,1,3)
  EcoSpold01Location=GLO
  Estimates based on published data
  Uncertainty: estimates based on published data
- hazardous waste, for incineration: 0 kg; pedigree (1,1,1,1,1)
  Environmental report
  EcoSpold01Location=CH
  Uncertainty: environmental report
  production volume 0 kg
    (same comment as for waste bitumen)
  properties: carbon content, fossil 0.554667, water content 0.333333, dry mass 0.75 kg, wet mass 1 kg
  note on carbon content, fossil: Tab A.6, ecoinvent v2.2 report 13_I. C content has been calculated after data in the tables, and then referred to 1 kg DM
- reinforcing steel: 375970 kg; lognormal variance with pedigree 0.0506, pedigree (2,1,5,1,1)
  (same comment as for pitch)
  properties: carbon content, fossil 0.004, wet mass 1 kg, dry mass 1 kg
- municipal solid waste: 0 kg; pedigree (1,1,1,1,1)
  EcoSpold01Location=CH
  Environmental report
  Uncertainty: environmental report
  production volume 0 kg
    (same comment as for waste bitumen)
  properties: water content 0.297017, dry mass 0.771 kg, carbon content, non-fossil 0.261655, carbon content, fossil 0.171549, wet mass 1 kg
  note on carbon content, non-fossil: MSW composition in tab 4.1, ecoinvent v2.2 report 13_I. C content referred to 1 kg DM
- decommissioned pipeline, natural gas: 0 kg; pedigree (1,1,1,1,1)
  Estimates
  EcoSpold01Location=CH
  Uncertainty: estimates
  production volume 0 kg
    (same comment as for waste bitumen)
  properties: wet mass 1 kg, dry mass 1 kg
- drawing of pipe, steel: 375970 kg; lognormal variance with pedigree 0.0506, pedigree (2,1,5,1,1)
  (same comment as for pitch)
- diesel, burned in building machine: 3.30974e6 MJ; lognormal variance with pedigree 0.0412, pedigree (2,3,5,1,1)
  Environmental report
  EcoSpold01Location=GLO
  Uncertainty: environmental report
- pitch: 352.073, 6.05513, 274.054, 17.5369, 106.246, 12.2842, 2.31485, 1549.25 kg (8 entries); lognormal variance with pedigree 0.0606, pedigree (2,1,5,1,1)
  (same comment as for pitch)
- waste bitumen: -373.491, -9.76282, -776.655 kg (3 entries); lognormal variance with pedigree 0.078, pedigree (3,5,5,1,3)
  Estimates
  EcoSpold01Location=CH
  Uncertainty: estimates
  production volume 1160 kg
- sand: 179.077, 34494.1, 413.006, 2.24473e6 kg (4 entries); lognormal variance with pedigree 0.0606, pedigree (2,1,5,1,1)
  (same comment as for sand)
- waste plastic, mixture: -223.293, -17.2146, -7.11024, -6.75184, -257.641, -2.87246, -1.30191, -1803.63 kg (8 entries); lognormal variance with pedigree 0.078, pedigree (3,5,5,1,3)
  EcoSpold01Location=CH
  Estimates
  Uncertainty: estimates
  production volume 2320 kg
- hazardous waste, for incineration: -1136.57, -29.7093, -2363.44 kg (3 entries); lognormal variance with pedigree 0.0412, pedigree (2,3,5,1,1)
  Environmental report
  EcoSpold01Location=CH
  Uncertainty: environmental report
  production volume 3530 kg
- municipal solid waste: -370.403, -2.2703, -1.58867, -6.30487, -4459.05 kg (5 entries); lognormal variance with pedigree 0.0412, pedigree (2,3,5,1,1)
  EcoSpold01Location=CH
  Environmental report
  Uncertainty: environmental report
  production volume 4840 kg
- decommissioned pipeline, natural gas: -11193.6, -1.3187e6 kg (2 entries); lognormal variance with pedigree 0.078, pedigree (3,5,5,1,3)
  Estimates
  EcoSpold01Location=CH
  Uncertainty: estimates
  production volume 1.33e6 kg

## Inputs from nature
- Transformation, to heterogeneous, agricultural [natural resource, land]: 1999.84 m2; lognormal variance with pedigree 0.1886, pedigree (4,3,5,1,1)
  Qualified estimates
  Uncertainty: qualified estimates
- Water, unspecified natural origin [natural resource, in water]: 186.985 m3; name water_UNO_input; lognormal variance with pedigree 0.0412, pedigree (2,3,5,1,1)
  Environmental report
  Uncertainty: environmental report
- Transformation, from forest, unspecified [natural resource, land]: 1999.84 m2; lognormal variance with pedigree 0.1886, pedigree (4,3,5,1,1)
  Qualified estimates
  Uncertainty: qualified estimates
- Occupation, construction site [natural resource, land]: 3329.74 m2*year; lognormal variance with pedigree 0.1086, pedigree (4,3,5,1,1)
  Qualified estimates
  Uncertainty: qualified estimates

## Emissions to nature
- Water [water, unspecified]: 158.937 m3; name water_to_water_unspecified; = water_UNO_input*(1-fraction_PW_to_air); lognormal variance with pedigree 0.0807, pedigree (2,2,5,1,1)
  Calculated value based on literature values and expert opinion. See comments in the parametres' comment field.
  property carbon content, non-fossil 0; name C_content_non_fossil
  property dry mass 0 kg; name DM
  property wet mass 1000 kg; name WM
  property carbon content, fossil 0; name C_content_fossil
  property water in wet mass 1000 kg; name WWM
  property fraction, origin: unspecified 1; name fraction_origin_unspecified_Ww
  property fraction, origin: fresh water 0; name fraction_origin_fresh_water_Ww
  property fraction, origin: salt water 0; name fraction_origin_salt_water_Ww
- Water [air, unspecified]: 28.0478 m3; name water_to_air_unspecified; = (water_UNO_input*fraction_PW_to_air); lognormal variance with pedigree 0.0807, pedigree (2,2,5,1,1)
  (same comment as for Water)
  property fraction, origin: fresh water 0; name fraction_origin_fresh_water
  property fraction, origin: salt water 0; name fraction_origin_salt_water
  property fraction, origin: unspecified 1; name fraction_origin_unspecified

## Sampling procedure
environmental report

## Review by Michael Spielmann (obsolete) 2003-09-22
Passed.
