# solar collector factory construction

Dataset: EcoSpold 2, unit process
Geography: RER
Time period: 2001-01-01 to 2019-12-31
Technology level: current
Classification: ISIC rev.4 ecoinvent: 4100:Construction of buildings
Classification: EcoSpold01Categories: solar collector systems/production of components
Tags: ConvertedDataset
Scenario: Business-as-Usual
System model: Allocation at the point of substitution
Generated by: Niels Jungbluth
Published in: Jungbluth, N. 2007
Database: ecoinvent
isCopyrightProtected: true
accessRestrictedTo: 1

## General comment
Factory with an annual production of 100'000m2 and a life time of 50 years.
[This dataset was already contained in the ecoinvent database version 2. It was not individually updated during the transfer to ecoinvent version 3. Life Cycle Impact Assessment results may still have changed, as they are affected by changes in the supply chain, i.e. in other datasets. This dataset was generated following the ecoinvent quality guidelines for version 2. It may have been subject to central changes described in the ecoinvent version 3 change report (http://www.ecoinvent.org/database/ecoinvent-version-3/reports-of-changes/), and the results of the central updates were reviewed extensively. The changes added e.g. consistent water flows and other information throughout the database. The documentation of this dataset can be found in the ecoinvent reports of version 2, which are still available via the ecoinvent website. The change report linked above covers all central changes that were made during the conversion process.]

## Included activities end
Building, land occupation and transformation of a factory for flat plate collectors. Not including machinery.

## Geography
Average of two production plants in DE and CH.

## Technology
Factory for production of solar collectors.

## Time period
Material data have been investigated for a collector produced in 2002. Data for energy uses during production have been investigated for 2001.

## Reference product
- solar collector factory: 1 unit; By-product classification allocatable product; CPC 53269: Other constructions for manufacturing
  EcoSpold01Location=RER
  production volume 1.32237 unit
    This is a placeholder value that does not reflect real-world production volumes. This dataset does not currently require a real-world production volume to work in the database framework, and no actual data were collected yet. This has no negative effect on the results of the ecoinvent database. The placeholder value of this activity was scaled according to the nominal GDP of 2005 (source: United Nations, http://data.un.org/Glossary.aspx?q=GDP+%28current+US%24%29, accessed 20130726) to reflect an appropriate share of the global production volume, which is also a placeholder value.
  property price 951610 EUR2005
    Calculated based on inputs: The price of the product has been calculated as a sum of the values of the material and energy inputs for this product. This value is therefore a rough estimation. It may underestimate the real price since there are additional expenses when producing any product. These expences can include for example labour costs, treatment of waste materials and profit for the producer. Please consider carefully whether this level of data quality is acceptable for your application.

## Inputs from technosphere
- building, hall: 1500 m2; lognormal variance with pedigree 0.0821, pedigree (1,4,5,3,1)
  EcoSpold01Location=CH
  Company information
  Uncertainty: Company information
- building, multi-storey: 5960 m3; lognormal variance with pedigree 0.0821, pedigree (1,4,5,3,1)
  Company information
  EcoSpold01Location=RER
  Uncertainty: Company information

## Inputs from nature
- Transformation, to industrial area [natural resource, land]: 10590 m2; lognormal variance with pedigree 0.1621, pedigree (1,4,5,3,1)
  Company information
  Uncertainty: Company information
- Transformation, from unspecified [natural resource, land]: 10600 m2; lognormal variance with pedigree 0.1621, pedigree (1,4,5,3,1)
  Company information
  Uncertainty: Company information
- Occupation, industrial area [natural resource, land]: 530000 m2*year; lognormal variance with pedigree 0.0821, pedigree (1,4,5,3,1)
  50a occupation
  Uncertainty: 50a occupation

## Sampling procedure
Questionnaires.

## Extrapolations
This dataset has been extrapolated from year 2001 to the year of the calculation (2019). The uncertainty has been adjusted accordingly.

## Review by Sebastiano Meier 2003-07-07
Passed.
