# operation, internet access equipment

Dataset: EcoSpold 2, unit process
Geography: CH
Time period: 2005-01-01 to 2019-12-31
Technology level: current
Classification: EcoSpold01Categories: electronics/services
Classification: ISIC rev.4 ecoinvent: 6110:Wired telecommunications activities
Tags: ConvertedDataset; Operation
Scenario: Business-as-Usual
System model: Allocation at the point of substitution
Generated by: Marianne Leuenberger
Published in: Spielmann M. 2007
Database: ecoinvent
isCopyrightProtected: true
accessRestrictedTo: 1

## General comment
The data set represents average values for one hour use of network access devices per work station.
[This dataset was already contained in the ecoinvent database version 2. It was not individually updated during the transfer to ecoinvent version 3. Life Cycle Impact Assessment results may still have changed, as they are affected by changes in the supply chain, i.e. in other datasets. This dataset was generated following the ecoinvent quality guidelines for version 2. It may have been subject to central changes described in the ecoinvent version 3 change report (http://www.ecoinvent.org/database/ecoinvent-version-3/reports-of-changes/), and the results of the central updates were reviewed extensively. The changes added e.g. consistent water flows and other information throughout the database. The documentation of this dataset can be found in the ecoinvent reports of version 2, which are still available via the ecoinvent website. The change report linked above covers all central changes that were made during the conversion process.]

## Included activities end
This data set includes the use of internet access devices for one end user during one hour, taking into account device use and electricity consumption (consumer mix)

## Geography
Data for Swiss conditions

## Technology
Included devices: ADSL modem with router (0.0042kW) and DSLAM (0.0013 kW) per end user

## Reference product
- operation, internet access equipment: 1 hour; CPC 8422: Internet access services; By-product classification allocatable product
  EcoSpold01Location=CH
  production volume 0.0336675 hour; = 4*0.008416886
    Estimated. The swiss production volume is a dummy variable calculated using the nominal GDP of 2005 (source: United Nations, http://data.un.org/Glossary.aspx?q=GDP+%28current+US%24%29, accessed 20130726 and 20130312). Where global dummy variable is set to 4 and swiss GDP is 0.008417
    Gross domestic product (GDP) at current prices is GDP at prices of the current reporting period. Also known as nominal GDP.
  property price 0.00137038 EUR2005
    Calculated based on inputs: The price of the product has been calculated as a sum of the values of the material and energy inputs for this product. This value is therefore a rough estimation. It may underestimate the real price since there are additional expenses when producing any product. These expences can include for example labour costs, treatment of waste materials and profit for the producer. Please consider carefully whether this level of data quality is acceptable for your application.

## Inputs from technosphere
- electricity, low voltage: 0.0075556 kWh; lognormal variance with pedigree 0.0446, pedigree (4,3,4,1,3)
  EcoSpold01Location=CH
  Electricity demand: 4.2Wh ADSL, 1.3Wh DSLAM per port, 4.2Wh/Router at 1MBit/s
  Uncertainty: Electricity demand: 4.2Wh ADSL, 1.3Wh DSLAM per port, 4.2Wh/Router at 1MBit/s
- internet access equipment: 9.009e-5 unit; lognormal variance with pedigree 0.3446, pedigree (4,3,4,1,3)
  EcoSpold01Location=CH
  1 ADSL modem/router, DSLAM per port
  Uncertainty: 1 ADSL modem/router, DSLAM per port

## Extrapolations
This dataset has been extrapolated from year 2009 to the year of the calculation (2019). The uncertainty has been adjusted accordingly.

## Review by Emilia Moreno Ruiz 2015-10-16
PV adjusted/GLO created

## Review by Christian Bauer 2010-02-07
26.01.2010
passed
C:\Dokumente und Einstellungen\Marianne\Eigene Dateien\Projekte\277_Mobitool\Ecoinvent\Review\Upload 1\[Ecospold_Use_Devices-v1.1.xls]X-Process
