# petroleum production, onshore

Dataset: EcoSpold 2, unit process
Geography: RU
Time period: 2000-01-01 to 2019-12-31
Technology level: current
Classification: ISIC rev.4 ecoinvent: 0610:Extraction of crude petroleum
Classification: EcoSpold01Categories: oil/production
Tags: ConvertedDataset
Scenario: Business-as-Usual
System model: Allocation at the point of substitution
Share of production covered: 100 %
Generated by: Niels Jungbluth
Published in: Jungbluth, N. 2007
Database: ecoinvent
isCopyrightProtected: true
accessRestrictedTo: 1

## General comment
Production mainly in Siberia.
[This dataset was already contained in the ecoinvent database version 2. It was not individually updated during the transfer to ecoinvent version 3. Life Cycle Impact Assessment results may still have changed, as they are affected by changes in the supply chain, i.e. in other datasets. This dataset was generated following the ecoinvent quality guidelines for version 2. It may have been subject to central changes described in the ecoinvent version 3 change report (http://www.ecoinvent.org/database/ecoinvent-version-3/reports-of-changes/), and the results of the central updates were reviewed extensively. The changes added e.g. consistent water flows and other information throughout the database. The documentation of this dataset can be found in the ecoinvent reports of version 2, which are still available via the ecoinvent website. The change report linked above covers all central changes that were made during the conversion process.]

## Included activities end
Production of oil including energy use, infrastructure and emissions.

## Geography
Data for RU.

## Technology
Onshore crude oil production.

## Time period
Time of most relevant publications and statistics. Other generic data, e.g. for water emissions are based on older publications.

## Parameters
- fraction, process water, to air: 0.15 dimensionless; name fraction_PW_to_air; lognormal variance with pedigree 0.092025, pedigree (4,4,3,2,4)
  Literature value. In case when no industry/process specific data are available, default evaporation fraction value is used. This value is 15% and is based on literature (Statistics Canada, 2007 & Shaffer, K.H., 2008, Consumptive water use in the Great Lakes Basin, USGS & Shiklomanov, 2003, World Water Resources at the Beginning of the 21st Century) and has been approved by an expert.

## Reference product
- petroleum: 1 kg; name petroleum_RP; CPC 12010: Petroleum oils and oils obtained from bituminous minerals, crude; By-product classification allocatable product
  EcoSpold01Location=RU
  production volume 5.05e11 kg; name petroleum_RP_pv
    This represents all the petroleum extracted in RU in 2010 (2011, BP, BP Statistical Review of World Energy June 2011, 3 - SeparatePublication, http://www.bp.com/statisticalreview).
  property price 0.192 EUR2005
    Temporary price data. Calculated as 90% of purchasers price based on: Crude oil prices from U.S. energy information administration_Independent statistics and analysis: Weekly All Countries Spot Price FOB Weighted by Estimated Export Volume (Dollars per Barrel) (http://tonto.eia.doe.gov/dnav/pet/pet_pri_wco_k_w.htm; accessed 06072010). Conversion factors - 0.159 m3/barrel with crude oil density of 853 kg/m3
  property carbon content, fossil 0.85
    C-content of crude oil is 83-87% (ecoinven report 6_IV, Tab 3.2). An average C-content of 0.85 kg C/kg crude oil was considered
  property carbon content 0.85
    carbon content on a dry matter basis (reserved; not for manual entry)
  property true value 0.192; name petroleum_RP_true_value
    allocation property applied in "true value" allocation // value calculated from revenue
  properties: carbon content, non-fossil 0, water in wet mass 0 kg, wet mass 1 kg, dry mass 1 kg, water content 0, carbon allocation 0.85 kg

## By-products
- electricity, for reuse in municipal waste incineration only: 0 kWh; CPC 17100: Electrical energy; By-product classification allocatable product; pedigree (1,1,1,1,1)
  Net electricity generated from this waste and used in internal MSWI plant energy redistribution.
  Uncertainty: uncertainty is calculated from uncertainties in waste composition and uncertainties in energy efficiency and the uncertainty in internal energy demand
  production volume 1.23466e6 kWh
  property exergy 3.6 MJ; name E_el_prod_MSWI_exergy
    This exergy property is based on the exergy content of the product.
  property true value relation 3.6; name E_el_prod_MSWI_true_value_relation
    property to calculate "true value" from
  property price 0.1 EUR2005; name E_el_prod_MSWI_price_EUR2005
    Estimated to be the same price as in case of electricity, medium voltage.
  property true value 3.16353e-7
    allocation property applied in "true value" allocation // value calculated from true value relation
- heat, for reuse in municipal waste incineration only: 0 MJ; CPC 17300: Steam and hot water; By-product classification allocatable product; pedigree (1,1,1,1,1)
  Net useful heat generated from this waste and used in internal MSWI plant energy redistribution.
  Uncertainty: uncertainty is calculated from uncertainties in waste composition and uncertainties in energy efficiency and the uncertainty in internal energy demand
  production volume 9.12029e6 MJ
  property true value relation 0.1842; name E_th_prod_MSWI_true_value_relation
    property to calculate "true value" from
  property exergy 0.1842 MJ; name E_th_prod_MSWI_exergy
    This exergy property is based on the exergy content of the product.
  property price 0.0106 EUR2005; name E_th_prod_MSWI_price_EUR2005
    Average European district heat price from Ecoheatcool and Euroheat 2005-2006, Ecoheat Work package 1: The European heat market. Final report. 10.6 EUR/GJ i s the price of district heat. http://www.solarthermalworld.org/files/Ecoheatcool%20WP1%20Web.pdf?download
  property true value 1.1957e-7
    (same comment as for electricity, for reuse in municipal waste incineration only)
- zinc concentrate: 0 kg; CPC 14290: Other non-ferrous metal ores and concentrates (other than uranium or thorium ores and concentrates); By-product classification allocatable product
  Calculated value from the knowledge of the properties of both products.
  production volume 1.22471e-5 kg
  property price 0.38 EUR2005; name ByP_price_EUR2005
    Temporary price data. Calculated as 90% of purchasers price based on: Zinc content in concentrate 53%. Concentrate price per kg Zn 86.5% of refined Zn price (13.5% treatment charges according to CHR Metals Limited 2005: Dynamic cost curves. http://www.minecost.com/dynamic.pdf). 2004 zinc price from USGS (2007) Mineral commodity summaries 2007. <http://minerals.usgs.gov/minerals/pubs/mcs/2007/mcs2007.pdf> [Accessed 25 May 2010]
  property zinc content 0.53; name zinc_C_zinc_concentrate
    Zinc content on a dry matter basis. Value taken from teh "zinc mine operation" /GLO dataset.
  property dry mass 1 kg; name DM_zinc_concentrate
  property carbon content 0
    carbon content on a dry matter basis (reserved; not for manual entry)
  property true value 9.21566e-18
    allocation property applied in "true value" allocation // value calculated from revenue
  properties: wet mass 1 kg, water content 0, carbon content, non-fossil 0, carbon content, fossil 0, water in wet mass 0 kg, carbon allocation 0 kg
- iron scrap, sorted, pressed: 0 kg; By-product classification Recyclable; CPC 39310: Slag, dross, scalings and other waste from the manufacture of iron or steel; pedigree (1,1,1,1,1)
  Iron scrap recovered from this waste.
  Uncertainty: uncertainty calculated from uncertainty in waste composition, uncertainty of share of recyclable metal, uncertainty of transfer coefficient to bottom ash, uncertainty of the efficiency of scrap removal in MSWI plant.
  production volume 155453 kg
  property price 0.175 EUR2005
    Temporary price data. Calculated as 90% of purchasers price based on: 2005 import and export prices (total trades (USD) divided by total weight (kg) in biggest economies of the world: EU27, USA, Brasil, China, India, Japan and Russia) from UN Commodity Trade Statistics Database (http://data.un.org/Explorer.aspxDatabase [Accessed 2011.06.20]). Commodity: Waste or scrap, of cast iron
  property carbon content 0
    carbon content on a dry matter basis (reserved; not for manual entry)
  property true value 5.38697e-8
    allocation property applied in "true value" allocation // value calculated from revenue
  properties: dry mass 1 kg, water content 0, carbon content, non-fossil 0, water in wet mass 0 kg, carbon content, fossil 0, wet mass 1 kg, carbon allocation 0 kg
- iron scrap, unsorted: 0 kg; source European Aluminium Association 2008; CPC 39310: Slag, dross, scalings and other waste from the manufacture of iron or steel; By-product classification Recyclable; pedigree (1,1,1,1,1)
  production volume 4.42279 kg
  property price 0.149 EUR2005; name ironScrapAmount_price_EUR2005
    Temporary price data. Calculated as 90% of purchasers price based on: estimated at 85% of sorted scrap
  property carbon content 0
    carbon content on a dry matter basis (reserved; not for manual entry)
  property true value 1.30494e-12
    allocation property applied in "true value" allocation // value calculated from revenue
  properties: water in wet mass 0 kg, water content 0, carbon content, fossil 0, carbon content, non-fossil 0, dry mass 1 kg, wet mass 1 kg, carbon allocation 0 kg
- aluminium oxide, non-metallurgical: 0 kg; source European Aluminium Association 2008; CPC 41432: Alumina (aluminium oxide), except artificial corundum; By-product classification allocatable product; CAS 1344-28-1; pedigree (1,1,1,1,1)
  production volume 278.31 kg
  property carbon content, non-fossil 0; name C_content_non_fossil
  property price 0.28 EUR2005; name Al2O3Amount_price_EUR2005
    From UN trade database. http://data.un.org/ Import data from the largest economies of the world are used (Brazil, India, USA, China, Japan and EU-27).
  property dry mass 1 kg; name DM
  property water content 0; name water_content
  property wet mass 1 kg; name WM
  property water in wet mass 0 kg; name WWM
  property carbon content, fossil 0; name C_content_fossil
  property carbon content 0
    carbon content on a dry matter basis (reserved; not for manual entry)
  property true value 1.5431e-10
    allocation property applied in "true value" allocation // value calculated from revenue
  properties: carbon allocation 0 kg
- aluminium, cast alloy: 0 kg; source European Aluminium Association 2008; By-product classification allocatable product; CPC 41431: Unwrought aluminium; pedigree (1,1,1,1,1)
  EcoSpold01Location=RER
  production volume 2601.58 kg
  property price 1.3 EUR2005; name castAlloyAmount_price_EUR2005
    Temporary price data. Calculated as 90% of purchasers price based on: Source: London Metal Exchange, Aluminium alloy price for 2005
  property carbon content 0
    carbon content on a dry matter basis (reserved; not for manual entry)
  property true value 6.69713e-9
    allocation property applied in "true value" allocation // value calculated from revenue
  properties: water in wet mass 0 kg, carbon content, non-fossil 0, water content 0, dry mass 1 kg, carbon content, fossil 0, wet mass 1 kg, carbon allocation 0 kg
- aluminium, wrought alloy: 0 kg; source European Aluminium Association 2008; By-product classification allocatable product; CPC 4153: Semi-finished products of aluminium or aluminium alloys; pedigree (1,1,1,1,1)
  production volume 1138.92 kg
  property price 1.44 EUR2005; name secondaryAluminiumOutput_price_EUR2005
    Estimated based on literature values and expert judgement. Aluminium ccast alloys are about 90% of the price of aluminium wrought alloys.
  property carbon content 0
    carbon content on a dry matter basis (reserved; not for manual entry)
  property true value 3.24762e-9
    allocation property applied in "true value" allocation // value calculated from revenue
  properties: wet mass 1 kg, water content 0, carbon content, fossil 0, water in wet mass 0 kg, carbon content, non-fossil 0, dry mass 1 kg, carbon allocation 0 kg
- copper: 0 kg; source Rentz O. 1999; By-product classification allocatable product; CPC 41413: Refined copper and copper alloys, unwrought; master alloys of copper
  Literature value. Copper uses: Before end-use copper is manufactured into semi fabricated products, such as shapes and ingots (known as 'semis'). These manufacturing processes are subdivided into hot working, cold working and, if necessary, process annealing. Few of the semis are ready for use as such. They more typically travel to first-stage manufacturers, who make metal rods, wire, and casting, and then to component manufacturers who produce such things as motors, valves, and insulated cables The components in turn are incorporated by final-stage manufacturers into a variety of finished products - automobiles, commercial buildings, residential housing, and so forth. These uses account for about 79% of the world-wide consumption of copper.
  production volume 4948.06 kg
  property price 5.52 EUR2005
    Literature value (http://www.economist.com/news/business/21576714-mining-industry-has-enriched-chile-its-future-precarious-copper-solution). Average price between 20015 and 2013.
  property carbon content 0
    carbon content on a dry matter basis (reserved; not for manual entry)
  property true value 5.40857e-8
    allocation property applied in "true value" allocation // value calculated from revenue
  properties: dry mass 1 kg, water in wet mass 0 kg, wet mass 1 kg, carbon content, non-fossil 0, water content 0, carbon content, fossil 0, carbon allocation 0 kg

## Inputs from technosphere
- onshore petroleum field infrastructure: 5.12999e-9 unit; lognormal variance with pedigree 0.3686, pedigree (4,3,5,1,1)
  Standard distances
  EcoSpold01Location=GLO
  Uncertainty: Standard distances
- chemical, inorganic: 0.00012 kg; lognormal variance with pedigree 0.374, pedigree (3,4,5,5,3)
  Generic value, basic uncertainity = 3
  EcoSpold01Location=GLO
  Uncertainty: Generic value, basic uncertainity = 3
  properties: wet mass 1 kg, dry mass 1 kg, carbon content, fossil 0.003
  note on carbon content, fossil: This dataset is an unweighted average of 20 inorganic substances (listed in Tab 88.1, ecoinvent v2.2 report 8, part II), being part of the top100 chemicals included in this database. The C-content has also been calculated as an unweighted average of the C content of the substances composing this dataset.
- pipeline, petroleum: 4.54999e-8 km; lognormal variance with pedigree 0.3686, pedigree (4,3,5,1,1)
  Literature
  EcoSpold01Location=RER
  Uncertainty: Literature
- low level radioactive waste: -1.99999e-7 m3; name LLRW; lognormal variance with pedigree 0.194, pedigree (3,4,5,5,3)
  EcoSpold01Location=CH
  Generic value, basic uncertainity = 2
  Uncertainty: Generic value, basic uncertainity = 2
  production volume 101000 m3; = LLRW*petroleum_RP_PV/petroleum_RP
    Calculated from the production volume of petroleum in proportion to the respective output amounts.
  property price 0 EUR2005; name LLRW_price_EUR2005
  properties: wet mass 2500 kg, dry mass 2500 kg
- chemical, organic: 8.99997e-5 kg; lognormal variance with pedigree 0.374, pedigree (3,4,5,5,3)
  EcoSpold01Location=GLO
  Generic value, basic uncertainity = 3
  Uncertainty: Generic value, basic uncertainity = 3
  properties: dry mass 1 kg, carbon content, fossil 0.628, wet mass 1 kg
  note on carbon content, fossil: This dataset is an unweighted average of 20 organic substances (listed in Tab 88.1, ecoinvent v2.2 report 8, part II), being part of the top100 chemicals included in this database. The C-content has also been calculated as an unweighted average of the C content of the substances composing this dataset.
- sour gas, burned in gas turbine: 0.0903997 MJ; lognormal variance with pedigree 0.194, pedigree (3,4,5,5,3)
  Generic value, basic uncertainity = 2
  EcoSpold01Location=NO
  Uncertainty: Generic value, basic uncertainity = 2
  properties: dry mass 0.027027 kg, carbon content, fossil 0.571, wet mass 0.027027 kg
- diesel, burned in diesel-electric generating set, 10MW: 0.421999 MJ; lognormal variance with pedigree 0.194, pedigree (3,4,5,5,3)
  EcoSpold01Location=GLO
  Generic value, basic uncertainity = 2
  Uncertainty: Generic value, basic uncertainity = 2
- water discharge from petroleum/natural gas extraction, onshore: -1.37 kg; name water_discharge_onshore; lognormal variance with pedigree 0.1786, pedigree (4,3,5,1,1)
  (same comment as for diesel, burned in diesel-electric generating set, 10MW)
  production volume 6.9185e11 kg; = water_discharge_onshore*petroleum_RP_PV/petroleum_RP
    (same comment as for low level radioactive waste)
  property price 0 EUR2005; name water_discharge_onshore_price_EUR2005
  properties: water content 10.784, carbon content, non-fossil 0.00101223, dry mass 0.0848608 kg, wet mass 1 kg, carbon content, fossil 0.00168491
- onshore well, oil/gas: 6.24998e-5 m; lognormal variance with pedigree 0.352, pedigree (3,1,5,1,1)
  EcoSpold01Location=GLO
  Generic value for RU
  Uncertainty: Generic value for RU
- waste natural gas, sour: -2.27999 MJ; name waste_NG_sour; lognormal variance with pedigree 0.1786, pedigree (4,3,5,1,1)
  EcoSpold01Location=GLO
  Literature, 92.5% of total, basic uncertainity = 2
  Uncertainty: Literature, 92.5% of total, basic uncertainity = 2
  production volume 1.1514e12 MJ; = waste_NG_sour*petroleum_RP_PV/petroleum_RP
    (same comment as for low level radioactive waste)
  property price 0 EUR2005; name waste_NG_sour_price_EUR2005
  properties: dry mass 0.027027 kg, carbon content, fossil 0.571226, wet mass 0.027027 kg
  note on carbon content, fossil: Calculated out of data in Tab 3.4, ecoinvent v2.2 report 6_V.
- municipal solid waste: -9.99997e-5 kg; name MSW; lognormal variance with pedigree 0.194, pedigree (3,4,5,5,3)
  (same comment as for low level radioactive waste)
  production volume 5.05e7 kg; = MSW*petroleum_RP_PV/petroleum_RP
    (same comment as for low level radioactive waste)
  properties: carbon content, non-fossil 0.261655, dry mass 0.771 kg, water content 0.297017, wet mass 1 kg, carbon content, fossil 0.171549
  note on carbon content, non-fossil: MSW composition in tab 4.1, ecoinvent v2.2 report 13_I. C content referred to 1 kg DM
- natural gas, vented: 0.00449999 m3; lognormal variance with pedigree 0.194, pedigree (3,4,5,5,3)
  EcoSpold01Location=GLO
  Generic value 7.5% of total, basic uncertainity = 2
  Uncertainty: Generic value 7.5% of total, basic uncertainity = 2
  properties: carbon content, fossil 0.602381, wet mass 0.84 kg, dry mass 0.84 kg
  note on carbon content, fossil: An average C content of 0.506 kg C/ m3 has been assumed (this average has been calculated using data in Tab 3.5, ecoinvent v2.2 report 6_V
- heat, district or industrial, other than natural gas: 0.227999 MJ; lognormal variance with pedigree 0.1786, pedigree (4,3,5,1,1)
  Generic value, basic uncertainity = 2
  EcoSpold01Location=RER
  Uncertainty: Generic value, basic uncertainity = 2

## Inputs from nature
- Gas, natural, in ground [natural resource, in ground]: 7.99998e-5 m3; lognormal variance with pedigree 0.074, pedigree (3,4,5,5,3)
  Losses
  Uncertainty: Losses
- Oil, crude, in ground [natural resource, in ground]: 1.02 kg; lognormal variance with pedigree 0.0512, pedigree (2,5,5,5,1)
  Incl. losses
  Uncertainty: Incl. losses
- Water, unspecified natural origin [natural resource, in water]: 0.00136 m3; name water_UNO_input; lognormal variance with pedigree 0.0686, pedigree (4,3,5,1,1)
  Literature
  Uncertainty: Literature

## Emissions to nature
- Methane, fossil [air, non-urban air or from high stacks]: 2.49999e-5 kg; lognormal variance with pedigree 0.5, pedigree (5,5,5,5,5)
  Generic value, basic uncertainity = 3
  Uncertainty: Generic value, basic uncertainity = 3
- Oils, unspecified [water, surface water]: 0.0199999 kg; lognormal variance with pedigree 0.3686, pedigree (4,3,5,1,1)
  Literature, estimation for share to water
  Uncertainty: Literature, estimation for share to water
- TOC, Total Organic Carbon [water, surface water]: 0.0173 kg; lognormal variance with pedigree 0.0901, pedigree (3,5,5,3,1)
  Extrapolation for sum parameter
  Uncertainty: Extrapolation for sum parameter
- Oils, unspecified [soil, forestry]: 0.0249999 kg; lognormal variance with pedigree 0.3686, pedigree (4,3,5,1,1)
  Literature, estimation for oil contaminated area, basic uncertainity estimated = 3
  Uncertainty: Literature, estimation for oil contaminated area, basic uncertainity estimated = 3
- AOX, Adsorbable Organic Halogen as Cl [water, surface water]: 2.05999e-7 kg; lognormal variance with pedigree 0.0901, pedigree (3,5,5,3,1)
  Extrapolation for sum parameter
  Uncertainty: Extrapolation for sum parameter
- COD, Chemical Oxygen Demand [water, surface water]: 0.0629998 kg; lognormal variance with pedigree 0.0901, pedigree (3,5,5,3,1)
  Extrapolation for sum parameter
  Uncertainty: Extrapolation for sum parameter
- Sulfur [water, surface water]: 5.35998e-5 kg; lognormal variance with pedigree 0.0901, pedigree (3,5,5,3,1)
  Extrapolation for sum parameter
  Uncertainty: Extrapolation for sum parameter
- Methane, bromotrifluoro-, Halon 1301 [air, non-urban air or from high stacks]: 5.81998e-8 kg; lognormal variance with pedigree 0.374, pedigree (3,4,5,5,3)
  Generic value, basic uncertainity = 3
  Uncertainty: Generic value, basic uncertainity = 3
- DOC, Dissolved Organic Carbon [water, surface water]: 0.0173 kg; lognormal variance with pedigree 0.0901, pedigree (3,5,5,3,1)
  Extrapolation for sum parameter
  Uncertainty: Extrapolation for sum parameter
- NMVOC, non-methane volatile organic compounds, unspecified origin [air, non-urban air or from high stacks]: 7.49998e-5 kg; lognormal variance with pedigree 0.5, pedigree (5,5,5,5,5)
  Generic value, basic uncertainity = 3
  Uncertainty: Generic value, basic uncertainity = 3
- BOD5, Biological Oxygen Demand [water, surface water]: 0.0629998 kg; lognormal variance with pedigree 0.0901, pedigree (3,5,5,3,1)
  Extrapolation for sum parameter
  Uncertainty: Extrapolation for sum parameter
- Water [water, unspecified]: 0.001156 m3; name water_to_water_unspecified; = water_UNO_input*(1-fraction_PW_to_air); lognormal variance with pedigree 0.0807, pedigree (2,2,5,1,1)
  Calculated value based on literature values and expert opinion. See comments in the parametres' comment field.
  property dry mass 0 kg; name DM
  property fraction, origin: unspecified 1; name fraction_origin_unspecified_Ww
  property carbon content, non-fossil 0; name C_content_non_fossil
  property wet mass 1000 kg; name WM
  property fraction, origin: salt water 0; name fraction_origin_salt_water_Ww
  property fraction, origin: fresh water 0; name fraction_origin_fresh_water_Ww
  property carbon content, fossil 0; name C_content_fossil
  property water in wet mass 1000 kg; name WWM
- Nitrogen [water, surface water]: 1.54e-5 kg; lognormal variance with pedigree 0.0901, pedigree (3,5,5,3,1)
  Extrapolation for sum parameter
  Uncertainty: Extrapolation for sum parameter
- Water [air, unspecified]: 0.000203999 m3; name water_to_air_unspecified; = (water_UNO_input*fraction_PW_to_air); lognormal variance with pedigree 0.0807, pedigree (2,2,5,1,1)
  (same comment as for Water)
  property fraction, origin: fresh water 0; name fraction_origin_fresh_water
  property fraction, origin: salt water 0; name fraction_origin_salt_water
  property fraction, origin: unspecified 1; name fraction_origin_unspecified

## Sampling procedure
Independent investigation of Greenpeace and international statistics.

## Extrapolations
A part of the data has been estimated with generic assumptions for onshore production.

## Review by Michael Spielmann (obsolete) 2003-09-22
Passed.

## Review by Emilia Moreno Ruiz 2017-09-06
PV adjsuted

## Review by Emilia Moreno Ruiz 2014-06-21
PV adjusted
