# heat production, mixed logs, at furnace 30kW

Dataset: EcoSpold 2, unit process
Geography: RoW
Time period: 2000-01-01 to 2019-12-31
Technology level: current
Classification: EcoSpold01Categories: wood energy/heating systems
Classification: ISIC rev.4 ecoinvent: 3530:Steam and air conditioning supply
Scenario: Business-as-Usual
System model: Allocation at the point of substitution
Share of production covered: 0.1 %
Generated by: Christian Bauer
Published in: Bauer, C. 2007
Database: ecoinvent
isCopyrightProtected: true
accessRestrictedTo: 1

## General comment
This activity represents heat production from combustion of wood logs in Switzerland and is used for the global activity as first approximation (uncertainty factors adjusted accordingly). Wood log LHV=9430 MJ/m3. It is supposed to be representative for average installed technology. The inventory shall be considered valid for wood log boilers with nominal capacities in the range of 15-50 kW.

Some emission data are from the late 1990's; key emission parameters (CO, PM, NOx, CH4, NMVOC) have been updated according to latest available data. The activity represents average annual operation including start-stop and part-load operation, which results in a reduced efficiency and increasing emissions compared to manufacturer information.
[This dataset was already contained in the ecoinvent database version 2. It was not individually updated during the transfer to ecoinvent version 3. Life Cycle Impact Assessment results may still have changed, as they are affected by changes in the supply chain, i.e. in other datasets. This dataset was generated following the ecoinvent quality guidelines for version 2. It may have been subject to central changes described in the ecoinvent version 3 change report (http://www.ecoinvent.org/database/ecoinvent-version-3/reports-of-changes/), and the results of the central updates were reviewed extensively. The changes added e.g. consistent water flows and other information throughout the database. The documentation of this dataset can be found in the ecoinvent reports of version 2, which are still available via the ecoinvent website. The change report linked above covers all central changes that were made during the conversion process.]

## Included activities start
From delivery of wood logs.

## Included activities end
This module describes the combustion of natural wood logs. Included are the infrastructure, the wood requirements, the emissions to air, the electricity needed for operation, and the disposal of the ashes.

## Geography
Inventory represents Swiss conditions and was used as global activity as first approximation.

## Technology
Boiler of average technology installed on market.

## Time period
Key emission factors PM, CO, NMVOC, NOx, CH4 were aupdated according to latest available information. Other emission data (which hardly depend on the combustion technology) are from the second half of the 1990´s.

## Parameters
- share of hardwood: 0.878; name share_hardwood
  Note that the hardwood and softwood shares do not add to 1. The difference is from industrial wood.
- share of softwood: 0.083; name share_softwood
  (same comment as for share of hardwood)
- scaling factor: 1.42857 dimensionless; name scaling_factor; = 1/0.7; lognormal variance with pedigree 0.0043, pedigree (2,2,1,5,2)
  The scaling factor represents the inverse of the average annual efficiency of the boiler. This efficiency corresponds to average annual operation including start/stop (warm up / cool down) and will therefore be lower than nameplate efficiencies provided by manufacturers. Value according to personal information from Thomas Nussbaumer, Verenum, Switzerland (January 2014).

## Reference product
- heat, central or small-scale, other than natural gas: 1 MJ; name heat_out; = 0.7*scaling_factor; source Thomas Nussbaumer 2014; By-product classification allocatable product; CPC 17300: Steam and hot water
  Reference product scaled to 1. Emission data and amounts of other exchanges in the mathematical relation refer to the input of 1 MJ end energy (in the fuel) and were scaled to the output of 1MJ useful energy (heat). Efficiency provided by the source represents average annual operation including warm-up and cool-down and will therefore be lower than nameplate efficiencies provided by manufacturers,
  production volume 2.40844e10 MJ; name APV_heat_out
    Literature value / calculation.
    Data taken from BFE (2012) and extrapolated to global conditions with a factor 1:10 between CH:GLO.
    Total energy input from wood in different types of plants in 2009 in Switzerland amounts to 36800 TJ. Out of it, only a certain share is turned into heat due to efficiencies lower than 1. These efficiencies could be calculated with data present for the year 2012, which were taken over for calculating the heat output for 2009. The resulting output of 23852 TJ was evenly distributed between the six 9 datasets modelling heat production with wood in the database
    (3 datasets for heat production with mixed logs, 2 datasets for heat production with hardwood, softwood and wood pellets each)
    BFE. 2012. Schweizerische Gesamtenergiestatistik 2012. Bundesamt für Energie, Bern, Switzerland.
  property price 0.0106 EUR2005; name heat_out_price_EUR2005
    Average European district heat price from Ecoheatcool and Euroheat 2005-2006, Ecoheat Work package 1: The European heat market. Final report. 10.6 EUR/GJ i s the price of district heat. http://www.solarthermalworld.org/files/Ecoheatcool%20WP1%20Web.pdf?download
  property true value 0.0106; name heat_out_true_value
    allocation property applied in "true value" allocation // value calculated from revenue

## By-products
- heat, for reuse in municipal waste incineration only: 0 MJ; CPC 17300: Steam and hot water; By-product classification allocatable product; pedigree (1,1,1,1,1)
  Net electricity generated from this waste and used in internal MSWI plant energy redistribution.
  Uncertainty: uncertainty is calculated from uncertainties in waste composition and uncertainties in energy efficiency and the uncertainty in internal energy demand
  production volume 334.549 MJ
  property exergy 0.1842 MJ; name E_th_prod_MSWI_exergy
    This exergy property is based on the exergy content of the product.
  property price 0.0106 EUR2005; name E_th_prod_MSWI_price_EUR2005
    (same comment as for heat, central or small-scale, other than natural gas)
  property true value relation 0.1842; name E_th_prod_MSWI_true_value_relation
    property to calculate "true value" from
  property true value 5.99514e-11
    allocation property applied in "true value" allocation // value calculated from true value relation
- electricity, for reuse in municipal waste incineration only: 0 kWh; CPC 17100: Electrical energy; By-product classification allocatable product; pedigree (1,1,1,1,1)
  (same comment as for heat, for reuse in municipal waste incineration only)
  production volume 47.1135 kWh
  property price 0.1 EUR2005; name E_el_prod_MSWI_price_EUR2005
    Estimated to be the same price as in case of electricity, medium voltage.
  property exergy 3.6 MJ; name E_el_prod_MSWI_exergy
    This exergy property is based on the exergy content of the product.
  property true value relation 3.6; name E_el_prod_MSWI_true_value_relation
    property to calculate "true value" from
  property true value 1.65006e-10
    (same comment as for heat, for reuse in municipal waste incineration only)

## Inputs from technosphere
- wood ash mixture, pure: 0 kg; name ash; source Bauer, C. 2007; pedigree (1,1,1,1,1)
  EcoSpold01Location=CH
  estimation, based on measurements
  production volume 0 kg
    Calculated from production volume of heat using the relative outputs.
  property price 0 EUR2005; name ash_price_EUR2005
  properties: wet mass 1 kg, dry mass 1 kg, carbon content, non-fossil 0.012
- furnace, logs, 30kW: 3.08642e-7 unit; = 1/(15*2000*30*3.6); lognormal variance with pedigree 0.0413, pedigree (2,2,4,5,2)
  estimation based on lifetime 15 years, annual operation time 2000 h/a, 30kW
- electricity, low voltage: 0 kWh; source Bauer, C. 2007; pedigree (1,1,1,1,1)
  EcoSpold01Location=CH
  estimation, based on measurements
- cleft timber, measured as dry mass: 0 kg; name cleft_timber; pedigree (1,1,1,1,1)
  kg dry mass, including bark; 0.0539=wood input in [kg/MJ LHV]
  property wet mass 1.3 kg; name cleft_timber_WM
  property dry wood density 430 kg/m3; name cleft_timber_dry_wood_d
  property dry mass 1 kg; name cleft_timber_DM
  property heating value, gross 20.4 MJ; name cleft_timber_Gross_Heat_Value
  property carbon content, fossil 0; name cleft_timber_C_content_fossil
  property heating value, net 14.46 MJ; name cleft_timber_Net_Heat_Value
  property apparent wood density 491.9 kg/m3; name cleft_timber_apparent_wood_d
  property basic wood density 378.4; name cleft_timber_basic_wood_d
  property carbon content, non-fossil 0.494; name cleft_timber_C_content_non_fossil
  property water in wet mass 0.3 kg; name cleft_timber_WWM
  property water content 0.3; name cleft_timber_water_content
- wood ash mixture, pure: -0.000259311, -0.000540689 kg (2 entries); source Bauer, C. 2007; lognormal variance with pedigree 0.0527, pedigree (2,2,5,5,1)
  EcoSpold01Location=CH
  estimation, based on measurements
  production volume 1.98473e7 kg
- electricity, low voltage: 4.24381e-5, 7.4431e-6, 0.00016881, 0.000605226, 0.000122394, 0.00185096, 0.000305098, 0.00086906 kWh (8 entries); source Bauer, C. 2007; lognormal variance with pedigree 0.4727, pedigree (2,2,5,5,1)
  EcoSpold01Location=CH
  estimation, based on measurements
- cleft timber, measured as dry mass: 0.00272911, 0.00192183, 0.0723491 kg (3 entries); lognormal variance with pedigree 0.0153, pedigree (2,2,3,5,2)
  kg dry mass, including bark; 0.0539=wood input in [kg/MJ LHV]
  properties: wet mass 1.3 kg, dry wood density 430 kg/m3, dry mass 1 kg, heating value, gross 20.4 MJ, heating value, net 14.46 MJ, apparent wood density 491.9 kg/m3, basic wood density 378.4, carbon content, non-fossil 0.494, water content 0.3

## Emissions to nature
- Zinc [air, urban air close to ground]: 4.28571e-7 kg; = 3E-07*scaling_factor; source Bauer, C. 2007; lognormal variance with pedigree 0.4727, pedigree (2,2,5,5,1)
  estimation, based on measurements
- Sodium [air, urban air close to ground]: 1.85714e-6 kg; = 1.3e-6*scaling_factor; source Bauer, C. 2007; lognormal variance with pedigree 0.4727, pedigree (2,2,5,5,1)
  estimation, based on measurements
- Toluene [air, urban air close to ground]: 4.28571e-7 kg; = 3e-7*scaling_factor; source Bauer, C. 2007; lognormal variance with pedigree 0.4727, pedigree (2,2,5,5,1)
  estimation, based on measurements
- Copper [air, urban air close to ground]: 3.14286e-8 kg; = 2.2e-8*scaling_factor; source Bauer, C. 2007; lognormal variance with pedigree 0.4727, pedigree (2,2,5,5,1)
  estimation, based on measurements
- Chlorine [air, urban air close to ground]: 2.57143e-7 kg; = 1.8e-7*scaling_factor; source Bauer, C. 2007; lognormal variance with pedigree 0.4727, pedigree (2,2,5,5,1)
  estimation, based on measurements
- Chromium [air, urban air close to ground]: 5.65714e-9 kg; = 3.96e-9*scaling_factor; source Bauer, C. 2007; lognormal variance with pedigree 0.4727, pedigree (2,2,5,5,1)
  estimation, based on measurements
- Phenol, pentachloro- [air, urban air close to ground]: 1.15714e-11 kg; = 8.1e-12*scaling_factor; source Bauer, C. 2007; lognormal variance with pedigree 0.4727, pedigree (2,2,5,5,1)
  estimation, based on measurements
- Chromium VI [air, urban air close to ground]: 5.71429e-11 kg; = 4e-11*scaling_factor; source Bauer, C. 2007; lognormal variance with pedigree 0.4727, pedigree (2,2,5,5,1)
  estimation, based on measurements
- Benzene, hexachloro- [air, urban air close to ground]: 1.02857e-14 kg; = 7.2e-15*scaling_factor; source Bauer, C. 2007; lognormal variance with pedigree 0.4727, pedigree (2,2,5,5,1)
  estimation, based on measurements
- PAH, polycyclic aromatic hydrocarbons [air, urban air close to ground]: 1.58571e-8 kg; = 1.11e-8*scaling_factor; source Bauer, C. 2007; lognormal variance with pedigree 0.4727, pedigree (2,2,5,5,1)
  estimation, based on measurements
- Mercury [air, urban air close to ground]: 4.28571e-10 kg; = 3e-10*scaling_factor; source Bauer, C. 2007; lognormal variance with pedigree 0.4727, pedigree (2,2,5,5,1)
  estimation, based on measurements
- Potassium [air, urban air close to ground]: 3.34286e-5 kg; = 2.34e-5*scaling_factor; source Bauer, C. 2007; lognormal variance with pedigree 0.4727, pedigree (2,2,5,5,1)
  estimation, based on measurements
- Cadmium [air, urban air close to ground]: 1e-9 kg; = 7e-10*scaling_factor; source Bauer, C. 2007; lognormal variance with pedigree 0.4727, pedigree (2,2,5,5,1)
  estimation, based on measurements
- Carbon dioxide, non-fossil [air, urban air close to ground]: 0.140143 kg; = 0.0981*scaling_factor; source Bauer, C. 2007; lognormal variance with pedigree 0.4727, pedigree (2,2,5,5,1)
  estimation, based on measurements
- Arsenic [air, urban air close to ground]: 1.42857e-9 kg; = 1e-9*scaling_factor; source Bauer, C. 2007; lognormal variance with pedigree 0.4727, pedigree (2,2,5,5,1)
  estimation, based on measurements
- Manganese [air, urban air close to ground]: 2.42857e-7 kg; = 1.7e-7*scaling_factor; source Bauer, C. 2007; lognormal variance with pedigree 0.4727, pedigree (2,2,5,5,1)
  estimation, based on measurements
- Ammonia [air, urban air close to ground]: 2.47143e-6 kg; = 1.73e-6*scaling_factor; source Bauer, C. 2007; lognormal variance with pedigree 0.4727, pedigree (2,2,5,5,1)
  estimation, based on measurements
- Hydrocarbons, aliphatic, unsaturated [air, urban air close to ground]: 4.42857e-6 kg; = 3.1e-6*scaling_factor; source Bauer, C. 2007; lognormal variance with pedigree 0.4727, pedigree (2,2,5,5,1)
  estimation, based on measurements
- Benzene [air, urban air close to ground]: 1.3e-6 kg; = 9.1e-7*scaling_factor; source Bauer, C. 2007; lognormal variance with pedigree 0.4727, pedigree (2,2,5,5,1)
  estimation, based on measurements
- Nitrogen oxides [air, urban air close to ground]: 0.000114286 kg; = 8e-5*scaling_factor; source Thomas Nussbaumer 2014; lognormal variance with pedigree 0.4347, pedigree (2,2,3,5,1)
  expert estimate (see source)
- Calcium [air, urban air close to ground]: 8.35714e-6 kg; = 5.85e-6*scaling_factor; source Bauer, C. 2007; lognormal variance with pedigree 0.4727, pedigree (2,2,5,5,1)
  estimation, based on measurements
- Lead [air, urban air close to ground]: 3.57143e-8 kg; = 2.5e-8*scaling_factor; source Bauer, C. 2007; lognormal variance with pedigree 0.4727, pedigree (2,2,5,5,1)
  estimation, based on measurements
- Dinitrogen monoxide [air, urban air close to ground]: 5.71429e-6 kg; = 4e-6*scaling_factor; source Bauer, C. 2007; lognormal variance with pedigree 0.4727, pedigree (2,2,5,5,1)
  estimation, based on measurements
- Nickel [air, urban air close to ground]: 8.57143e-9 kg; = 6e-9*scaling_factor; source Bauer, C. 2007; lognormal variance with pedigree 0.4727, pedigree (2,2,5,5,1)
  estimation, based on measurements
- Water [air, urban air close to ground]: 1.66e-5 m3; lognormal variance with pedigree 0.0103, pedigree (2,2,3,5,2)
  calculation; ensures correct water balance
- Acetaldehyde [air, urban air close to ground]: 8.71429e-8 kg; = 6.1E-08*scaling_factor; source Bauer, C. 2007; lognormal variance with pedigree 0.4727, pedigree (2,2,5,5,1)
  estimation, based on measurements
- Phosphorus [air, urban air close to ground]: 4.28571e-7 kg; = 3e-7*scaling_factor; source Bauer, C. 2007; lognormal variance with pedigree 0.4727, pedigree (2,2,5,5,1)
  estimation, based on measurements
- Particulates, > 2.5 um, and < 10um [air, non-urban air or from high stacks]: 3.57143e-6 kg; = 2.5e-6*scaling_factor; source Thomas Nussbaumer 2014; lognormal variance with pedigree 0.4347, pedigree (2,2,3,5,1)
  expert estimate (see source)
- Particulates, < 2.5 um [air, urban air close to ground]: 6.42857e-5 kg; = 4.5e-5*scaling_factor; source Thomas Nussbaumer 2014; lognormal variance with pedigree 0.4347, pedigree (2,2,3,5,1)
  expert estimate (see source)
- Formaldehyde [air, urban air close to ground]: 1.85714e-7 kg; = 1.3e-7*scaling_factor; source Bauer, C. 2007; lognormal variance with pedigree 0.4727, pedigree (2,2,5,5,1)
  estimation, based on measurements
- Magnesium [air, urban air close to ground]: 5.14286e-7 kg; = 3.6e-7*scaling_factor; source Bauer, C. 2007; lognormal variance with pedigree 0.4727, pedigree (2,2,5,5,1)
  estimation, based on measurements
- Dioxins, measured as 2,3,7,8-tetrachlorodibenzo-p-dioxin [air, urban air close to ground]: 4.42857e-14 kg; = 3.1e-14*scaling_factor; source Bauer, C. 2007; lognormal variance with pedigree 0.4727, pedigree (2,2,5,5,1)
  estimation, based on measurements
- Hydrocarbons, aliphatic, alkanes, unspecified [air, urban air close to ground]: 1.3e-6 kg; = 9.1e-7*scaling_factor; source Bauer, C. 2007; lognormal variance with pedigree 0.4727, pedigree (2,2,5,5,1)
  estimation, based on measurements
- Fluorine [air, urban air close to ground]: 7.14286e-8 kg; = 5e-8*scaling_factor; source Bauer, C. 2007; lognormal variance with pedigree 0.4727, pedigree (2,2,5,5,1)
  estimation, based on measurements
- m-Xylene [air, urban air close to ground]: 1.71429e-7 kg; = 1.2e-7*scaling_factor; source Bauer, C. 2007; lognormal variance with pedigree 0.4727, pedigree (2,2,5,5,1)
  estimation, based on measurements
- NMVOC, non-methane volatile organic compounds, unspecified origin [air, urban air close to ground]: 5e-5 kg; = 35e-6*scaling_factor; source Thomas Nussbaumer 2014; lognormal variance with pedigree 0.4347, pedigree (2,2,3,5,1)
  expert estimate (see source)
- Benzo(a)pyrene [air, urban air close to ground]: 7.14286e-10 kg; = 5e-10*scaling_factor; source Bauer, C. 2007; lognormal variance with pedigree 0.4727, pedigree (2,2,5,5,1)
  estimation, based on measurements
- Bromine [air, urban air close to ground]: 8.57143e-8 kg; = 6e-8*scaling_factor; source Bauer, C. 2007; lognormal variance with pedigree 0.4727, pedigree (2,2,5,5,1)
  estimation, based on measurements
- Methane, non-fossil [air, urban air close to ground]: 2.14286e-5 kg; = 1.5e-5*scaling_factor; source Thomas Nussbaumer 2014; lognormal variance with pedigree 0.4347, pedigree (2,2,3,5,1)
  expert estimate (see source)
- Sulfur dioxide [air, urban air close to ground]: 3.57143e-6 kg; = 2.5e-6*scaling_factor; source Bauer, C. 2007; lognormal variance with pedigree 0.4727, pedigree (2,2,5,5,1)
  estimation, based on measurements
- Carbon monoxide, non-fossil [air, urban air close to ground]: 0.00214286 kg; = 1500e-6*scaling_factor; source Thomas Nussbaumer 2014; lognormal variance with pedigree 0.4347, pedigree (2,2,3,5,1)
  expert estimate (see source)
- Benzene, ethyl- [air, urban air close to ground]: 4.28571e-8 kg; = 3e-8*scaling_factor; source Bauer, C. 2007; lognormal variance with pedigree 0.4727, pedigree (2,2,5,5,1)
  estimation, based on measurements

## Sampling procedure
literature and expert judgement

## Extrapolations
This dataset has been copied from an original dataset covering the geography CH. The uncertainty has been adjusted accordingly.

## Review by Emilia Moreno Ruiz 2014-06-03
input changed to cleft timber
