# polyethylene terephthalate production, granulate, amorphous

Dataset: EcoSpold 2, unit process
Geography: CA-QC
Time period: 1999-01-01 to 2019-12-31
Technology level: current
Classification: EcoSpold01Categories: plastics/polymers
Classification: ISIC rev.4 ecoinvent: 2013:Manufacture of plastics and synthetic rubber in primary forms
Synonyms: PET
Tags: recontextualization
Scenario: Business-as-Usual
System model: Allocation at the point of substitution
Generated by: Pascal Lesage
Published in: Hischier R. 2007
Database: ecoinvent
isCopyrightProtected: true
accessRestrictedTo: 1

## General comment
Data are based on the average unit process from the Eco-profiles of the European plastics industry
[This dataset was already contained in the ecoinvent database version 2. It was not individually updated during the transfer to ecoinvent version 3. Life Cycle Impact Assessment results may still have changed, as they are affected by changes in the supply chain, i.e. in other datasets. This dataset was generated following the ecoinvent quality guidelines for version 2. It may have been subject to central changes described in the ecoinvent version 3 change report (http://www.ecoinvent.org/database/ecoinvent-version-3/reports-of-changes/), and the results of the central updates were reviewed extensively. The changes added e.g. consistent water flows and other information throughout the database. The documentation of this dataset can be found in the ecoinvent reports of version 2, which are still available via the ecoinvent website. The change report linked above covers all central changes that were made during the conversion process.]
Child dataset exchanges identical to GLO dataset. Created to enable linking to regional markets (e.g. for electricity). Data uncertainty adjusted accordingly.

## Included activities end
Average data for the production of amorphous PET out of ethylene glycol and PTA. The data include material and energy input, waste as well as air and water emissions. Missing sum parameters to water (DOC, TOC), transport and infrastructure are estimated.

## Geography
Data from several European production sites
Child dataset exchanges identical to GLO dataset. Created to enable linking to regional markets (e.g. for electricity). Data uncertainty adjusted accordingly.

## Technology
PET production out of PTA and ethylene gylcol

## Time period
date of publication

## Parameters
- world gross domestic product 2011: 7e13 USD(2011); name worldGDP2011; lognormal variance with pedigree 0.0006, pedigree (1,1,1,1,1)
  World Gross domestic product for 2011, expressed in 2011 USD. Source: World Bank.
- Quebec gross domestic product 2011: 3.11e11 USD(2011); name quebecGDP2011; lognormal variance with pedigree 0.0006, pedigree (1,1,1,1,1)
  Quebec Gross domestic product for 2011, expressed in 2011 USD. Source: Institut de la statistique du Québec. Converted from CAD to USD using a yearly average exchange rate of 0.989 CAD/USD (Source: bank of Canada).
- fraction, cooling water, cooling pond system, to air: 0.032; lognormal variance with pedigree 0.0413, pedigree (2,3,1,3,1)
- fraction, cooling water, to air: 0.3875; lognormal variance with pedigree 0.092025, pedigree (4,4,3,2,4)
- fraction, cooling water, recirculating system, to air: 0.771; lognormal variance with pedigree 0.0413, pedigree (2,3,1,3,1)
- fraction, cooling water, once-through system, to air: 0.004; lognormal variance with pedigree 0.0413, pedigree (2,3,1,3,1)
- fraction, process water, to air: 0.205 dimensionless; lognormal variance with pedigree 0.092025, pedigree (4,4,3,2,4)

## Reference product
- polyethylene terephthalate, granulate, amorphous: 1 kg; name RefProd; By-product classification allocatable product; CPC 34710: Polymers of ethylene, in primary forms; CAS 25038-59-9
  EcoSpold01Location=RER
  production volume 0.0177714 kg; name ProdVol; = PARENTVALUE*quebecGDP2011/worldGDP2011
    Gross approximation of Quebec production volume using relative value of Quebec GDP to world GDP.
  property carbon content, fossil 0.625
    Polymer of the ethylen terephtalate monomer (C10H8O4)n (ecoinvent v2.2 report 11_II), MW=192 g/mol
  property carbon content 0.625
    carbon content on a dry matter basis (reserved; not for manual entry)
  property true value 1.29; name RefProd_true_value
    allocation property applied in "true value" allocation // value calculated from revenue
  properties: price 1.29 EUR2005, water content 0, carbon content, non-fossil 0, water in wet mass 0 kg, dry mass 1 kg, wet mass 1 kg, carbon allocation 0.625 kg

## By-products
- heat, for reuse in municipal waste incineration only: 0 MJ; CPC 17300: Steam and hot water; By-product classification allocatable product; pedigree (1,1,1,1,1)
  Net electricity generated from this waste and used in internal MSWI plant energy redistribution.
  Uncertainty: uncertainty is calculated from uncertainties in waste composition and uncertainties in energy efficiency and the uncertainty in internal energy demand
  production volume 3.38449e-5 MJ
  property exergy 0.1842 MJ; name E_th_prod_MSWI_exergy
    This exergy property is based on the exergy content of the product.
  property price 0.0106 EUR2005; name E_th_prod_MSWI_price_EUR2005
    Average European district heat price from Ecoheatcool and Euroheat 2005-2006, Ecoheat Work package 1: The European heat market. Final report. 10.6 EUR/GJ i s the price of district heat. http://www.solarthermalworld.org/files/Ecoheatcool%20WP1%20Web.pdf?download
  property true value relation 0.1842; name E_th_prod_MSWI_true_value_relation
    property to calculate "true value" from
  property true value 1.25069e-5
    allocation property applied in "true value" allocation // value calculated from true value relation
- electricity, for reuse in municipal waste incineration only: 0 kWh; CPC 17100: Electrical energy; By-product classification allocatable product; pedigree (1,1,1,1,1)
  (same comment as for heat, for reuse in municipal waste incineration only)
  production volume 4.81459e-6 kWh
  property price 0.1 EUR2005; name E_el_prod_MSWI_price_EUR2005
    Estimated to be the same price as in case of electricity, medium voltage.
  property exergy 3.6 MJ; name E_el_prod_MSWI_exergy
    This exergy property is based on the exergy content of the product.
  property true value relation 3.6; name E_el_prod_MSWI_true_value_relation
    property to calculate "true value" from
  property true value 3.47721e-5
    (same comment as for heat, for reuse in municipal waste incineration only)

## Inputs from technosphere
- steam, in chemical industry: 0.939966 kg; lognormal variance with pedigree 0.0532, pedigree (2,3,5,5,1)
  EcoSpold01Location=RER
  European average value, based on industrial survey
  Uncertainty: european average value, based on industrial survey
  properties: dry mass 1 kg, wet mass 1 kg
- hazardous waste, for underground deposit: -8.99967e-5 kg; name HazWaste; lognormal variance with pedigree 0.0532, pedigree (2,3,5,5,1)
  European average value, based on industrial survey
  EcoSpold01Location=DE
  Uncertainty: european average value, based on industrial survey
  production volume 1.59943e-6 kg; = ProdVol*HazWaste/RefProd
    Calculated from the production volume of polyethylene terephthalate, granulate, amorphous in proportion to the respective output amounts.
  properties: wet mass 1 kg, dry mass 1 kg, carbon content, fossil 0.554667
  note on carbon content, fossil: Tab A.6, ecoinvent v2.2 report 13_I, average hazardous waste composition was used, and referred to 0% water mass. No waste-specific emission are currently inventoried for underground deposits. Accordingly, no waste composition must be specified. For generic, average waste to underground deposit deposition in a 200 liter steel drum without cement solidification is assumed (ecoinvent v2.2 report 13_I).
- average incineration residue: -0.000399985 kg; name IncinRes; lognormal variance with pedigree 0.0532, pedigree (2,3,5,5,1)
  European average value, based on industrial survey
  EcoSpold01Location=CH
  Uncertainty: european average value, based on industrial survey
  production volume 7.10857e-6 kg; = ProdVol*IncinRes/RefProd
    (same comment as for hazardous waste, for underground deposit)
  properties: carbon content, fossil 0.0325466, carbon content, non-fossil 0.0511208, wet mass 1 kg, dry mass 1 kg
  note on carbon content, fossil: Tab A.1, ecoinvent v2.2 report 13_I. It is considered that 61.1% of the C has a biogenic origin
- municipal solid waste: -0.000879968 kg; name MSW; lognormal variance with pedigree 0.0532, pedigree (2,3,5,5,1)
  (same comment as for average incineration residue)
  production volume 1.56389e-5 kg; = ProdVol*MSW/RefProd
    (same comment as for hazardous waste, for underground deposit)
  properties: carbon content, fossil 0.171549, carbon content, non-fossil 0.261655, dry mass 0.771 kg, water content 0.297017, wet mass 1 kg
  note on carbon content, fossil: MSW composition in tab 4.1, ecoinvent v2.2 report 13_I. C content referred to 1 kg DM
- waste plastic, mixture: -0.00230992 kg; name PlastWaste; lognormal variance with pedigree 0.0532, pedigree (2,3,5,5,1)
  (same comment as for average incineration residue)
  production volume 4.1052e-5 kg; = ProdVol*PlastWaste/RefProd
    (same comment as for hazardous waste, for underground deposit)
  properties: carbon content, fossil 0.747344, dry mass 0.847 kg, wet mass 1 kg, water content 0.180638
  note on carbon content, fossil: C content in 1 kg DM was calculated using data in Tab A.2, ecoinvent v2.2 report 13_I
- chemical factory, organics: 3.99985e-10 unit; lognormal variance with pedigree 0.448, pedigree (4,5,5,5,5)
  EcoSpold01Location=RER
  Estimation
  Uncertainty: estimation
- electricity, medium voltage: 0.193993 kWh; lognormal variance with pedigree 0.0532, pedigree (2,3,5,5,1)
  European average value, based on industrial survey
  EcoSpold01Location=UCTE
  Uncertainty: european average value, based on industrial survey
- heat, district or industrial, natural gas: 0.664976 MJ; lognormal variance with pedigree 0.1332, pedigree (2,3,5,5,4)
  EcoSpold01Location=RER
  Amount industrial survey - distribution according to cumulated data
  Uncertainty: amount industrial survey - distribution according to cumulated data
- heat, district or industrial, other than natural gas: 0.964965 MJ; lognormal variance with pedigree 0.1332, pedigree (2,3,5,5,4)
  Amount industrial survey - distribution according to cumulated data
  EcoSpold01Location=RER
  Uncertainty: amount industrial survey - distribution according to cumulated data
- ethylene glycol: 0.333988 kg; lognormal variance with pedigree 0.0532, pedigree (2,3,5,5,1)
  European average value, based on industrial survey
  EcoSpold01Location=RER
  Uncertainty: european average value, based on industrial survey
  properties: carbon content, fossil 0.387097, wet mass 1 kg, dry mass 1 kg
- nitrogen, liquid: 0.0297989 kg; lognormal variance with pedigree 0.0532, pedigree (2,3,5,5,1)
  (same comment as for ethylene glycol)
  properties: wet mass 1 kg, dry mass 1 kg
- purified terephthalic acid: 0.874968 kg; lognormal variance with pedigree 0.0532, pedigree (2,3,5,5,1)
  (same comment as for steam, in chemical industry)
  properties: dry mass 1 kg, carbon content, fossil 0.578313, wet mass 1 kg

## Inputs from nature
- Water, unspecified natural origin [natural resource, in water]: 0.000162994 m3; lognormal variance with pedigree 0.0532, pedigree (2,3,5,5,1)
  European average value, based on industrial survey
  Uncertainty: european average value, based on industrial survey
- Water, cooling, unspecified natural origin [natural resource, in water]: 0.00639977 m3; lognormal variance with pedigree 0.0532, pedigree (2,3,5,5,1)
  (same comment as for Water, unspecified natural origin)

## Emissions to nature
- Particulates, > 2.5 um, and < 10um [air, urban air close to ground]: 4.29984e-7 kg; lognormal variance with pedigree 0.1832, pedigree (2,3,5,5,1)
  (same comment as for Water, unspecified natural origin)
- Water [water, unspecified]: 0.00404944 m3; lognormal variance with pedigree 0.0827, pedigree (2,2,5,5,1)
  Calculated value based on literature values and expert opinion. See comments in the parametres' comment field.
  property dry mass 0 kg; name DM
  property water in wet mass 1000 kg; name WWM
  property wet mass 1000 kg; name WM
  property carbon content, fossil 0; name C_content_fossil
  property carbon content, non-fossil 0; name C_content_non_fossil
- TOC, Total Organic Carbon [water, surface water]: 0.00026199 kg; lognormal variance with pedigree 0.23, pedigree (5,5,5,5,4)
  Estimated, based on rules in Frischknecht 2003
  Uncertainty: estimated, based on rules in Frischknecht 2003
- Water [air, unspecified]: 0.00251332 m3; lognormal variance with pedigree 0.0827, pedigree (2,2,5,5,1)
  (same comment as for Water)
- NMVOC, non-methane volatile organic compounds, unspecified origin [air, urban air close to ground]: 8.99967e-5 kg; lognormal variance with pedigree 0.1832, pedigree (2,3,5,5,1)
  (same comment as for Water, unspecified natural origin)
- DOC, Dissolved Organic Carbon [water, surface water]: 0.00026199 kg; lognormal variance with pedigree 0.23, pedigree (5,5,5,5,4)
  (same comment as for TOC, Total Organic Carbon)
- Particulates, < 2.5 um [air, urban air close to ground]: 2.49991e-7 kg; lognormal variance with pedigree 0.3632, pedigree (2,3,5,5,1)
  (same comment as for Water, unspecified natural origin)
- Suspended solids, unspecified [water, surface water]: 9.99963e-7 kg; lognormal variance with pedigree 0.1032, pedigree (2,3,5,5,1)
  (same comment as for Water, unspecified natural origin)
- COD, Chemical Oxygen Demand [water, surface water]: 0.00101996 kg; lognormal variance with pedigree 0.1032, pedigree (2,3,5,5,1)
  (same comment as for Water, unspecified natural origin)
- BOD5, Biological Oxygen Demand [water, surface water]: 0.000159994 kg; lognormal variance with pedigree 0.1032, pedigree (2,3,5,5,1)
  (same comment as for Water, unspecified natural origin)
- Hydrocarbons, unspecified [water, surface water]: 0.000498982 kg; lognormal variance with pedigree 0.3632, pedigree (2,3,5,5,1)
  (same comment as for Water, unspecified natural origin)
- Particulates, > 10 um [air, urban air close to ground]: 3.19988e-7 kg; lognormal variance with pedigree 0.1032, pedigree (2,3,5,5,1)
  (same comment as for Water, unspecified natural origin)

## Sampling procedure
company data

## Extrapolations
no extrapolation
The exchanges in this child dataset are identical to those of the corresponding GLO dataset. It was created to enable linking to regional markets (e.g. for electricity). Data uncertainty adjusted accordingly.
The GLO dataset was itself originally based on an original dataset covering the geography RER. The uncertainty had also been adjusted accordingly.

## Review by Mischa Classen 2003-06-10
passed
