# treatment of waste graphical paper, unsanitary landfill, moist infiltration class (300mm)

Dataset: EcoSpold 2, unit process
Geography: GLO
Time period: 2006-01-01 to 2019-12-31
Technology level: current
Classification: ISIC rev.4 ecoinvent: 3821:Treatment and disposal of non-hazardous waste
Synonyms: municipal waste landfill
Scenario: Business-as-Usual
System model: Allocation at the point of substitution
Share of production covered: 1 %
Generated by: Avraam Symeonidis
Database: ecoinvent
isCopyrightProtected: true
accessRestrictedTo: 1

## General comment
This dataset represents the activity of waste disposal of waste graphical paper in a unsanitary landfill. Recommended use of this dataset: For paper, which goes to disposal as part of managed communal waste mixture. Larger amounts of *already separated* paper could go to recycling, depending on country-specific situation. // Waste composition (wet, in ppm): upper heating value 16.61 MJ/kg; lower heating value 14.12 MJ/kg; H2O 110830; O 378670; H 53852; C 404000; S 1406.7; N 3756.6; P 112.95; B 17.19; Cl 1837.5; Br n.a.; F 19.468; I n.a.; Ag 0.047733; As 2.0485; Ba 114.24; Cd 1.6629; Co 0.7359; Cr 14.461; Cu 60.893; Hg 0.13902; Mn 40.221; Mo 4.2976; Ni 9.4431; Pb 80.374; Sb 0.70911; Se 2.5786; Sn n.a.; V n.a.; Zn 124.8; Be 0.97413; Sc n.a.; Sr 58.276; Ti 171.9; Tl 1.719; W n.a.; Si 21255; Fe 1188.4; Ca 3438.1; Al 12391; K 1327.5; Mg 4297.6; Na 918.83; . // Share of carbon in waste that is biogenic 100%. Share of metals in waste not oxidised and bulk-recyclable (exclude very small or thin parts) Iron: 0%; Alu: 0%; Copper: 0%. Overall degradability of waste during 100 years: 27%.

## Included activities start
from final waste deposition (without transports to the site)

## Included activities end
Waste-specific short-term emissions to air via landfill gas and landfill leachate. Waste-specific long-term emissions from landfill.

## Geography
Given name of landfill location is 'infiltration class 3 moist (2018)'. Landfill site with mean annual temperature (MAT) of 8 degC, mean annual precipitation (MAP) of 900 mm/year, and net infiltration of 300 mm/year.
Climate adjustments result in an alpha t (temperature) for permafrost areas of 0.999. Total climate adjustments with alpha pt of 0.999.

## Technology
This is an inventory for an unsanitary, sub-controlled landfill for municipal solid waste. Ultimate average landfill height is 15 meters. Operation phase duration is 25 years.Percentage of landfill gas directly emitted is 100w%.
Leachate of the landfill is not treated. Based on average waste composition and climate data the end of carbonate phase is estimated to be reached 5581 years after waste deposition.

## Reference product
- waste graphical paper: -1 kg; By-product classification Waste; CPC 39990: Other wastes n.e.c.; pedigree (1,1,1,1,1)
  main reference product of this activity (supply of disposal service).
  Uncertainty: Uncertainty is not adjusted, as this is the refence product
  production volume 1 kg
    The amount of the annual production volume is a placeholder value. The contribution of this technology to the different local markets can be found in the markets themselves.
  property price 0 EUR2005
    Waste products are assigned a price of zero as they are assumed to require further treatment.
  property carbon content 0.45435
    carbon content on a dry matter basis (reserved; not for manual entry)
  properties: chlorine content 0.0020665, cadmium content 1.8702e-6, calcium content 0.0038666, titanium content 0.00019333, silicon content 0.023904, cobalt content 8.2762e-7, silver content 5.3682e-8, magnesium content 0.0048333, hydrogen content 0.060564, nitrogen content 0.0042248, oxygen content 0.42587, sulfur content 0.001582, heating value, net 14.12 MJ, heating value, gross 16.611 MJ, strontium content 6.5539e-5, chromium content 1.6263e-5, fluorine content 2.1895e-5, barium content 0.00012848, selenium content 2.9e-6, dry mass 0.88917 kg, iron content 0.0013366, carbon content, non-fossil 0.45435, nickel content 1.062e-5, water content 0.12464, molybdenum content 4.8333e-6, aluminium content 0.013935, wet mass 1 kg, manganese content 4.5234e-5, zinc content 0.00014036, phosphorus content 0.00012703, water in wet mass 0.11083 kg, potassium content 0.0014929, arsenic content 2.3039e-6, beryllium content 1.0955e-6, mercury content 1.5635e-7, copper content 6.8483e-5, sodium content 0.0010334, boron content 1.9333e-5, lead content 9.0392e-5, antimony content 7.9749e-7, thallium content 1.9333e-6, carbon allocation 0.403994 kg

## Inputs from technosphere
- excavation, skid-steer loader: 0.00031708 m3; lognormal variance with pedigree 0.082256, pedigree (1,1,3,1,1)
  application of daily cover.
  Uncertainty: Uncertainty calculated from uncertainty in base parameters.
- diesel, burned in building machine: 0.046738 MJ; lognormal variance with pedigree 0.082256, pedigree (1,1,3,1,1)
  for waste distribution and compaction.
  Uncertainty: Uncertainty calculated from uncertainty in base parameters.

## Emissions to nature
- Strontium [water, ground-]: 9.1367e-7 kg; lognormal variance with pedigree 0.33845, pedigree (1,1,3,1,1)
  burden from short-term leachate to groundwater in uncontrolled landfill in moist cimate.
  Uncertainty: Uncertainty calculated from unertainty of the waste composition of this waste, uncertainty in waste decomposition and short-term leaching in landfill
- Strontium [water, ground-, long-term]: 5.7362e-5 kg; lognormal variance with pedigree 0.26049, pedigree (1,1,3,1,1)
  Emissions from long-term leachate (>100a) directly from MSW landfill and indirectly via incineration of treatement sludge from leachate treatement.
  Uncertainty: Uncertainty calculated depending on waste input and uncertainty of long-term transfer coefficents in landfill.
- Iron [air, non-urban air or from high stacks]: 1.1005e-9 kg; lognormal variance with pedigree 0.55325, pedigree (1,1,3,1,1)
  burden from direct release or incineration of landfill biogas; or windblown leachate evaporite in arid climates.
  Uncertainty: Uncertainty calculated from unertainty of the waste composition of this waste, uncertainty in waste decomposition and short-term leaching in landfill
- Titanium, ion [water, ground-]: 2.3174e-6 kg; lognormal variance with pedigree 0.30683, pedigree (1,1,3,1,1)
  (same comment as for Strontium)
- Selenium [water, ground-, long-term]: 8.2072e-7 kg; lognormal variance with pedigree 0.44393, pedigree (1,1,3,1,1)
  (same comment as for Strontium)
- Silicon [air, non-urban air or from high stacks]: 7.1631e-8 kg; lognormal variance with pedigree 0.42249, pedigree (1,1,3,1,1)
  (same comment as for Iron)
- Silicon [water, ground-]: 0.00028652 kg; lognormal variance with pedigree 0.15425, pedigree (1,1,3,1,1)
  (same comment as for Strontium)
- Lead [water, ground-, long-term]: 8.0246e-5 kg; lognormal variance with pedigree 0.24978, pedigree (1,1,3,1,1)
  (same comment as for Strontium)
- Calcium [air, non-urban air or from high stacks]: 3.0182e-8 kg; lognormal variance with pedigree 0.44597, pedigree (1,1,3,1,1)
  (same comment as for Iron)
- Thallium [water, ground-]: 2.6952e-8 kg; lognormal variance with pedigree 0.45473, pedigree (1,1,3,1,1)
  (same comment as for Strontium)
- Antimony [water, ground-, long-term]: 8.1956e-8 kg; lognormal variance with pedigree 0.69362, pedigree (1,1,3,1,1)
  (same comment as for Strontium)
- Strontium [air, non-urban air or from high stacks]: 2.2842e-10 kg; lognormal variance with pedigree 0.60614, pedigree (1,1,3,1,1)
  (same comment as for Iron)
- Selenium [water, ground-]: 7.3332e-8 kg; lognormal variance with pedigree 0.42483, pedigree (1,1,3,1,1)
  (same comment as for Strontium)
- Zinc, ion [water, ground-, long-term]: 0.00012321 kg; lognormal variance with pedigree 0.23514, pedigree (1,1,3,1,1)
  (same comment as for Strontium)
- Titanium [air, non-urban air or from high stacks]: 5.7935e-10 kg; lognormal variance with pedigree 0.57508, pedigree (1,1,3,1,1)
  (same comment as for Iron)
- Beryllium [water, ground-]: 1.5273e-8 kg; lognormal variance with pedigree 0.47317, pedigree (1,1,3,1,1)
  (same comment as for Strontium)
- Nickel, ion [water, ground-, long-term]: 9.295e-6 kg; lognormal variance with pedigree 0.32088, pedigree (1,1,3,1,1)
  (same comment as for Strontium)
- Beryllium [air, non-urban air or from high stacks]: 3.8182e-12 kg; lognormal variance with pedigree 0.74086, pedigree (1,1,3,1,1)
  (same comment as for Iron)
- Zinc, ion [water, ground-]: 1.5944e-6 kg; lognormal variance with pedigree 0.31904, pedigree (1,1,3,1,1)
  (same comment as for Strontium)
- Manganese [water, ground-, long-term]: 2.7795e-5 kg; lognormal variance with pedigree 0.27392, pedigree (1,1,3,1,1)
  (same comment as for Strontium)
- Thallium [air, non-urban air or from high stacks]: 6.738e-12 kg; lognormal variance with pedigree 0.72242, pedigree (1,1,3,1,1)
  (same comment as for Iron)
- Lead [water, ground-]: 1.2771e-7 kg; lognormal variance with pedigree 0.39805, pedigree (1,1,3,1,1)
  (same comment as for Strontium)
- Molybdenum [water, ground-, long-term]: 1.8896e-6 kg; lognormal variance with pedigree 0.38791, pedigree (1,1,3,1,1)
  (same comment as for Strontium)
- Zinc [air, non-urban air or from high stacks]: 3.5431e-10 kg; lognormal variance with pedigree 0.59131, pedigree (1,1,3,1,1)
  (same comment as for Iron)
- Antimony [water, ground-]: 2.0166e-8 kg; lognormal variance with pedigree 0.46677, pedigree (1,1,3,1,1)
  (same comment as for Strontium)
- Mercury [water, ground-, long-term]: 1.3543e-7 kg; lognormal variance with pedigree 0.45758, pedigree (1,1,3,1,1)
  (same comment as for Strontium)
- Selenium [air, non-urban air or from high stacks]: 1.8333e-11 kg; lognormal variance with pedigree 0.6897, pedigree (1,1,3,1,1)
  (same comment as for Iron)
- Molybdenum [water, ground-]: 1.2222e-7 kg; lognormal variance with pedigree 0.4081, pedigree (1,1,3,1,1)
  (same comment as for Strontium)
- Copper, ion [water, ground-, long-term]: 6.0813e-5 kg; lognormal variance with pedigree 0.25902, pedigree (1,1,3,1,1)
  (same comment as for Strontium)
- Lead [air, non-urban air or from high stacks]: 4.2571e-11 kg; lognormal variance with pedigree 0.66019, pedigree (1,1,3,1,1)
  (same comment as for Iron)
- Nickel, ion [water, ground-]: 1.4805e-7 kg; lognormal variance with pedigree 0.39884, pedigree (1,1,3,1,1)
  (same comment as for Strontium)
- Cobalt [water, ground-, long-term]: 6.7209e-7 kg; lognormal variance with pedigree 0.40441, pedigree (1,1,3,1,1)
  (same comment as for Strontium)
- Antimony [air, non-urban air or from high stacks]: 5.0416e-12 kg; lognormal variance with pedigree 0.73163, pedigree (1,1,3,1,1)
  (same comment as for Iron)
- Manganese [water, ground-]: 1.2423e-5 kg; lognormal variance with pedigree 0.28202, pedigree (1,1,3,1,1)
  (same comment as for Strontium)
- Cadmium, ion [water, ground-, long-term]: 1.5835e-6 kg; lognormal variance with pedigree 0.37789, pedigree (1,1,3,1,1)
  (same comment as for Strontium)
- Manganese [air, non-urban air or from high stacks]: 3.1057e-9 kg; lognormal variance with pedigree 0.52026, pedigree (1,1,3,1,1)
  (same comment as for Iron)
- Mercury [water, ground-]: 2.5682e-9 kg; lognormal variance with pedigree 0.53085, pedigree (1,1,3,1,1)
  (same comment as for Strontium)
- Barium [water, ground-, long-term]: 7.8948e-5 kg; lognormal variance with pedigree 0.23919, pedigree (1,1,3,1,1)
  (same comment as for Strontium)
- Molybdenum [air, non-urban air or from high stacks]: 3.0555e-11 kg; lognormal variance with pedigree 0.67296, pedigree (1,1,3,1,1)
  (same comment as for Iron)
- Copper, ion [water, ground-]: 8.0415e-8 kg; lognormal variance with pedigree 0.41324, pedigree (1,1,3,1,1)
  (same comment as for Strontium)
- Chromium VI [water, ground-, long-term]: 7.8218e-8 kg; lognormal variance with pedigree 2.0091, pedigree (1,1,3,1,1)
  (same comment as for Strontium)
- Nickel [air, non-urban air or from high stacks]: 3.7013e-11 kg; lognormal variance with pedigree 0.66653, pedigree (1,1,3,1,1)
  (same comment as for Iron)
- Cobalt [water, ground-]: 6.3788e-8 kg; lognormal variance with pedigree 0.43753, pedigree (1,1,3,1,1)
  (same comment as for Strontium)
- Arsenic, ion [water, ground-, long-term]: 1.9479e-6 kg; lognormal variance with pedigree 0.3711, pedigree (1,1,3,1,1)
  (same comment as for Strontium)
- Copper [air, non-urban air or from high stacks]: 2.2976e-11 kg; lognormal variance with pedigree 0.68027, pedigree (1,1,3,1,1)
  (same comment as for Iron)
- Chromium VI [water, ground-]: 4.4453e-8 kg; lognormal variance with pedigree 0.43407, pedigree (1,1,3,1,1)
  (same comment as for Strontium)
- Silver, ion [water, ground-, long-term]: 4.7669e-8 kg; lognormal variance with pedigree 0.48245, pedigree (1,1,3,1,1)
  (same comment as for Strontium)
- Chromium [air, non-urban air or from high stacks]: 1.1113e-11 kg; lognormal variance with pedigree 0.70524, pedigree (1,1,3,1,1)
  (same comment as for Iron)
- Cadmium, ion [water, ground-]: 7.8911e-8 kg; lognormal variance with pedigree 0.42567, pedigree (1,1,3,1,1)
  (same comment as for Strontium)
- Fluoride [water, ground-, long-term]: 1.7094e-5 kg; lognormal variance with pedigree 0.29723, pedigree (1,1,3,1,1)
  (same comment as for Strontium)
- Mercury [air, non-urban air or from high stacks]: 1.0273e-9 kg; lognormal variance with pedigree 0.55775, pedigree (1,1,3,1,1)
  (same comment as for Iron)
- Silver, ion [water, ground-]: 6.3035e-11 kg; lognormal variance with pedigree 0.63668, pedigree (1,1,3,1,1)
  (same comment as for Strontium)
- Chloride [water, ground-, long-term]: 0.00057212 kg; lognormal variance with pedigree 0.1509, pedigree (1,1,3,1,1)
  (same comment as for Strontium)
- Cadmium [air, non-urban air or from high stacks]: 5.2608e-10 kg; lognormal variance with pedigree 0.57869, pedigree (1,1,3,1,1)
  (same comment as for Iron)
- Arsenic, ion [water, ground-]: 9.9227e-8 kg; lognormal variance with pedigree 0.41835, pedigree (1,1,3,1,1)
  (same comment as for Strontium)
- Boron [water, ground-, long-term]: 1.719e-14 kg; lognormal variance with pedigree 0.7815, pedigree (1,1,3,1,1)
  (same comment as for Strontium)
- Barium [air, non-urban air or from high stacks]: 8.8212e-9 kg; lognormal variance with pedigree 0.48552, pedigree (1,1,3,1,1)
  (same comment as for Iron)
- Barium [water, ground-]: 3.5285e-5 kg; lognormal variance with pedigree 0.24728, pedigree (1,1,3,1,1)
  (same comment as for Strontium)
- Phosphate [water, ground-, long-term]: 2.2926e-5 kg; lognormal variance with pedigree 0.69736, pedigree (1,1,3,1,1)
  (same comment as for Strontium)
- Cobalt [air, non-urban air or from high stacks]: 1.5947e-11 kg; lognormal variance with pedigree 0.69375, pedigree (1,1,3,1,1)
  (same comment as for Iron)
- Boron [water, ground-]: 1.719e-5 kg; lognormal variance with pedigree 0.30104, pedigree (1,1,3,1,1)
  (same comment as for Strontium)
- Nitrite [water, ground-, long-term]: 2.7214e-5 kg; lognormal variance with pedigree 0.12994, pedigree (1,1,3,1,1)
  (same comment as for Strontium)
- Arsenic [air, non-urban air or from high stacks]: 1.391e-9 kg; lognormal variance with pedigree 0.54685, pedigree (1,1,3,1,1)
  (same comment as for Iron)
- Chloride [water, ground-]: 0.0012478 kg; lognormal variance with pedigree 0.14782, pedigree (1,1,3,1,1)
  (same comment as for Strontium)
- Nitrogen, organic bound [water, ground-, long-term]: 0.00081723 kg; lognormal variance with pedigree 0.12994, pedigree (1,1,3,1,1)
  (same comment as for Strontium)
- Hydrogen fluoride [air, non-urban air or from high stacks]: 2.0928e-6 kg; lognormal variance with pedigree 0.32652, pedigree (1,1,3,1,1)
  (same comment as for Iron)
- Fluoride [water, ground-]: 3.857e-7 kg; lognormal variance with pedigree 0.36823, pedigree (1,1,3,1,1)
  (same comment as for Strontium)
- Nitrate [water, ground-, long-term]: 5.2584e-5 kg; lognormal variance with pedigree 0.12994, pedigree (1,1,3,1,1)
  (same comment as for Strontium)
- Silver [air, non-urban air or from high stacks]: 1.801e-14 kg; lognormal variance with pedigree 0.9037, pedigree (1,1,3,1,1)
  (same comment as for Iron)
- Nitrite [water, ground-]: 5.2538e-5 kg; lognormal variance with pedigree 0.12553, pedigree (1,1,3,1,1)
  (same comment as for Strontium)
- Hydrogen sulfide [water, ground-, long-term]: 9.0372e-5 kg; lognormal variance with pedigree 0.1556, pedigree (1,1,3,1,1)
  (same comment as for Strontium)
- Nitrogen oxides [air, non-urban air or from high stacks]: 1.3894e-6 kg; lognormal variance with pedigree 0.18509, pedigree (1,1,3,1,1)
  burden from direct release or incineration of landfill biogas.
  Uncertainty: Uncertainty calculated from unertainty of the waste composition of this waste, uncertainty in waste decomposition and short-term leaching in landfill
- Phosphate [water, ground-]: 5.2198e-6 kg; lognormal variance with pedigree 0.31754, pedigree (1,1,3,1,1)
  (same comment as for Strontium)
- Sulfate [water, ground-, long-term]: 0.0034669 kg; lognormal variance with pedigree 0.1556, pedigree (1,1,3,1,1)
  (same comment as for Strontium)
- Sulfur dioxide [air, non-urban air or from high stacks]: 4.9507e-5 kg; lognormal variance with pedigree 0.22998, pedigree (1,1,3,1,1)
  (same comment as for Nitrogen oxides)
- Nitrate [water, ground-]: 0.00010151 kg; lognormal variance with pedigree 0.12553, pedigree (1,1,3,1,1)
  (same comment as for Strontium)
- Ammonium, ion [water, ground-, long-term]: 0.00050001 kg; lognormal variance with pedigree 0.12994, pedigree (1,1,3,1,1)
  (same comment as for Strontium)
- Hydrogen chloride [air, non-urban air or from high stacks]: 1.7987e-5 kg; lognormal variance with pedigree 0.23928, pedigree (1,1,3,1,1)
  (same comment as for Iron)
- Nitrogen, organic bound [water, ground-]: 0.0015777 kg; lognormal variance with pedigree 0.12553, pedigree (1,1,3,1,1)
  (same comment as for Strontium)
- DOC, Dissolved Organic Carbon [water, ground-, long-term]: 0.29505 kg; lognormal variance with pedigree 0.0087475, pedigree (1,1,3,1,1)
  (same comment as for Strontium)
- Carbon dioxide, non-fossil [air, non-urban air or from high stacks]: 0.17084 kg; lognormal variance with pedigree 0.002, pedigree (1,1,3,1,1)
  (same comment as for Nitrogen oxides)
- Hydrogen sulfide [water, ground-]: 1.029e-5 kg; lognormal variance with pedigree 0.18528, pedigree (1,1,3,1,1)
  (same comment as for Strontium)
- TOC, Total Organic Carbon [water, ground-, long-term]: 0.29505 kg; lognormal variance with pedigree 0.0087475, pedigree (1,1,3,1,1)
  (same comment as for Strontium)
- Methane, non-fossil [air, non-urban air or from high stacks]: 0.07891 kg; lognormal variance with pedigree 0.030462, pedigree (1,1,3,1,1)
  (same comment as for Nitrogen oxides)
- Ammonium, ion [water, ground-]: 0.00096528 kg; lognormal variance with pedigree 0.12553, pedigree (1,1,3,1,1)
  (same comment as for Strontium)
- BOD5, Biological Oxygen Demand [water, ground-, long-term]: 0.076396 kg; lognormal variance with pedigree 0.0087475, pedigree (1,1,3,1,1)
  (same comment as for Strontium)
- Occupation, dump site [natural resource, land]: 0.0023333 m2*year; lognormal variance with pedigree 0.082256, pedigree (1,1,3,1,1)
  for landfill operation phase and spontaneous renaturation.
  Uncertainty: Uncertainty calculated from uncertainty in base parameters.
- DOC, Dissolved Organic Carbon [water, ground-]: 0.0031733 kg; lognormal variance with pedigree 0.10612, pedigree (1,1,3,1,1)
  (same comment as for Strontium)
- COD, Chemical Oxygen Demand [water, ground-, long-term]: 0.32271 kg; lognormal variance with pedigree 0.0087475, pedigree (1,1,3,1,1)
  (same comment as for Strontium)
- Sodium, ion [water, ground-, long-term]: 9.1883e-13 kg; lognormal variance with pedigree 0.64962, pedigree (1,1,3,1,1)
  (same comment as for Strontium)
- Sulfate [water, ground-]: 0.00039476 kg; lognormal variance with pedigree 0.18528, pedigree (1,1,3,1,1)
  (same comment as for Strontium)
- Potassium, ion [water, ground-, long-term]: 0.0010657 kg; lognormal variance with pedigree 0.15774, pedigree (1,1,3,1,1)
  (same comment as for Strontium)
- TOC, Total Organic Carbon [water, ground-]: 0.0031733 kg; lognormal variance with pedigree 0.10612, pedigree (1,1,3,1,1)
  (same comment as for Strontium)
- Aluminium [water, ground-, long-term]: 0.012223 kg; lognormal variance with pedigree 0.087489, pedigree (1,1,3,1,1)
  (same comment as for Strontium)
- BOD5, Biological Oxygen Demand [water, ground-]: 0.00082165 kg; lognormal variance with pedigree 0.10612, pedigree (1,1,3,1,1)
  (same comment as for Strontium)
- Magnesium [water, ground-, long-term]: 0.0035823 kg; lognormal variance with pedigree 0.12014, pedigree (1,1,3,1,1)
  (same comment as for Strontium)
- COD, Chemical Oxygen Demand [water, ground-]: 0.0034708 kg; lognormal variance with pedigree 0.10612, pedigree (1,1,3,1,1)
  (same comment as for Strontium)
- Sodium, ion [water, ground-]: 0.0009186 kg; lognormal variance with pedigree 0.16916, pedigree (1,1,3,1,1)
  (same comment as for Strontium)
- Iron, ion [water, ground-, long-term]: 0.001184 kg; lognormal variance with pedigree 0.16078, pedigree (1,1,3,1,1)
  (same comment as for Strontium)
- Magnesium [air, non-urban air or from high stacks]: 1.788e-7 kg; lognormal variance with pedigree 0.38764, pedigree (1,1,3,1,1)
  (same comment as for Iron)
- Magnesium [water, ground-]: 0.00071518 kg; lognormal variance with pedigree 0.13928, pedigree (1,1,3,1,1)
  (same comment as for Strontium)
- Calcium, ion [water, ground-, long-term]: 0.0033173 kg; lognormal variance with pedigree 0.12675, pedigree (1,1,3,1,1)
  (same comment as for Strontium)
- Sodium [air, non-urban air or from high stacks]: 2.2965e-7 kg; lognormal variance with pedigree 0.37777, pedigree (1,1,3,1,1)
  (same comment as for Iron)
- Aluminium [water, ground-]: 0.00016703 kg; lognormal variance with pedigree 0.16982, pedigree (1,1,3,1,1)
  (same comment as for Strontium)
- Silicon [water, ground-, long-term]: 0.00053364 kg; lognormal variance with pedigree 0.91845, pedigree (1,1,3,1,1)
  (same comment as for Strontium)
- Heat, waste [soil, industrial]: 2.7136 MJ; lognormal variance with pedigree 0.034991, pedigree (1,1,3,1,1)
  burden from short-term decomposition of waste (0-100a).
  Uncertainty: Uncertainty calculated from unertainty of the waste composition of this waste, uncertainty in waste decomposition and short-term leaching in landfill
- Potassium, ion [water, ground-]: 0.00026174 kg; lognormal variance with pedigree 0.17362, pedigree (1,1,3,1,1)
  (same comment as for Strontium)
- Thallium [water, ground-, long-term]: 1.6921e-6 kg; lognormal variance with pedigree 0.37677, pedigree (1,1,3,1,1)
  (same comment as for Strontium)
- Heat, waste [water, ground-, long-term]: 12.131 MJ; lognormal variance with pedigree 0.022385, pedigree (1,1,3,1,1)
  burden from long-term decomposition of waste (>100a).
  Uncertainty: Uncertainty calculated from unertainty of the waste composition of this waste, uncertainty in waste decomposition and short-term leaching in landfill
- Iron, ion [water, ground-]: 4.4022e-6 kg; lognormal variance with pedigree 0.28223, pedigree (1,1,3,1,1)
  (same comment as for Strontium)
- Titanium, ion [water, ground-, long-term]: 0.00016959 kg; lognormal variance with pedigree 0.22449, pedigree (1,1,3,1,1)
  (same comment as for Strontium)
- Potassium [air, non-urban air or from high stacks]: 6.5435e-8 kg; lognormal variance with pedigree 0.4195, pedigree (1,1,3,1,1)
  (same comment as for Iron)
- Calcium, ion [water, ground-]: 0.00012073 kg; lognormal variance with pedigree 0.18237, pedigree (1,1,3,1,1)
  (same comment as for Strontium)
- Beryllium [water, ground-, long-term]: 9.5885e-7 kg; lognormal variance with pedigree 0.39521, pedigree (1,1,3,1,1)
  (same comment as for Strontium)
- Aluminium [air, non-urban air or from high stacks]: 4.1758e-8 kg; lognormal variance with pedigree 0.43807, pedigree (1,1,3,1,1)
  (same comment as for Iron)

## Extrapolations
This dataset has been extrapolated from year 2012 to the year of the calculation (2019). The uncertainty has been adjusted accordingly.
