# fishmeal and fish oil production, 65-67% protein

Dataset: EcoSpold 2, unit process
Geography: RoW
Time period: 2010-01-01 to 2020-12-31
Technology level: current
Classification: ISIC rev.4 ecoinvent: 1020:Processing and preserving of fish, crustaceans and molluscs
Scenario: Business-as-Usual
System model: Allocation at the point of substitution
Generated by: Angel Avadi
Published in: Avadí, A. 2018
Database: ecoinvent
isCopyrightProtected: true
accessRestrictedTo: 1

## General comment
The activity represents the co-production of fishmeal and fish oil in a reduction plant. The life cycle inventories were produced based on a representative sample of 2 Peruvian plants and their activity.~200 fishmeal plants existed in Peru as of 2016. This activity can be used to modelfishmeal production in other geographies, after substituting the fish provision exchanges.
System boundaries of FMFO production and relations between activities

## Included activities start
From delivery of raw material to the plant, through its Use phase (production), including all upstream activities (e.g. provision of fuels, electricity and chemicals)

## Geography
Representative of Peru and Chile.

## Technology
Production of Prime fishmeal quality (65-67% protein) by indirect drying, natural gas powered. Data from one plant representing 4% of the total amount of anchovy processed into Prime fishmeal (155 535 t/y out of 5.2 million t/y * 84%, in 2008-2010). The technology is common in the world for Prime fishmeal production.

After arrival of the fishing vessel at the floating terminal, the fish is pumped out of the vessel’s hold and conveyed to the plant mixed with seawater in a proportion close to 1 m3 per t of fish. There the fish is separated from the mix of water, fish residues and blood (bloodwater) through a screw drainer. The drained bloodwater is processed in a rotating screen in order to remove the solid residues (flesh, scale, etc.) that are then conveyed to the “solid line” (described below), and the remaining water is processed first in an oil and solids separator and then in a flotation tank where oil is recuperated thanks to its positive buoyancy. The oil is conveyed to the “liquid line” (described below) whereas the remaining water is discharged at sea through a long underwater pipe (e.g. one-km long). In modern plants, the flotation process is accelerated by the release of fine air bubbles at the bottom of the flotation tank. The remaining bulk of the fish is then conveyed by a wire mesh conveyor belt to an automated weighting hopper and then released into large storage pits. From there fish is conveyed to a cooker using a conveyor, whereas additional bloodwater is processed into a specific trommel. There, a continuous cooking occurs by means of an internal rotary screw conveyor, at a temperature of 95 to 100°C in order to coagulate the proteins. The cooking process is indirect, thanks to steam-heated jacket surrounding the conveyor, but still generates odorous fumes. From the cooker the product is conveyed to strainer (or first to a pre-strainer and then to double helicoid press) that allows draining a mix of oil, protein (dissolved and suspended) and water from the solid mass, thanks to the previous cooking step. From the straining process starts the major separation between the liquid line (oily water or “press liquor") and the solid line (presscake), but with further bridging connections.
The processes in the liquid line consists in a further separation between oil, water and protein coming from different paths. The press liquor, along with the bloodwater, is first transferred by pipe to an oil and liquid separator (or decanter) which is a horizontal centrifuge. After two to three separation phases, the oil and liquid separator returns the remaining solid (sludge) to the solid line whereas the liquid goes to a vertical disk centrifuge. The centrifugation process allows further separation between fish oil and the aqueous phase named “stickwater”. Stickwater is concentrated in a multi-stage (two to four) evaporation unit, prior to enzyme addition aimed at reducing its viscosity. The unit must be cleaned at regular interval, usually using caustic soda, to maintain its thermal efficiency. This is because the evaporator tubes where steam circulates are quickly fouled. The final phase of the liquid line is oil polishing, which is carried out in special separators and facilitated by using hot water, which extracts impurities from the oil (resulting in additional stickwater) and thus ensures stability during storage. This phase ends with the transfer of the stickwater to the evaporation unit and with the pumping of the refined oil into storage.
The presscake along with the sludge from the oil and liquid separator is conveyed first to a wet mill and then to a rotating dryer. As indicated earlier, direct-fire dryers or indirect steam dryers can be used and will result in different qualities of fishmeal. The drying process also generates smells and particles, especially in the case of direct-fire dryers. The raw dry meal (“scrap”) first passes through a sieve to remove large extraneous material mostly collected during the purse-seining operation (wood, rope, plastic residues, etc.). Then the meal is pneumatically conveyed to a cyclonic tower to extract fish meal particles from the drying air. In the sampled plant of FAQ fishmeal, the air emission of the cyclone was processed in a scrubbing tower where water is pulverised in order to limit particles and odours emissions. The fishmeal is then milled in a dry mill. Follows a centrifuging purifier that allows a final elimination of small extraneous material. Finally anti-oxidant is added before automatic weighting and conditioning into plastic bags for distribution.
Steam is produced in a series of boilers and distributed throughout the plant by insulated pipes, forming close circuits in order to save energy. Steam condensate is also returned to the boiler through a piping systems.
The energy source in boilers is either natural gas when available or heavy fuel. In the past fish oil was recycled in boiler burners because its commercial value was very low.
Electricity from the Peruvian grid is used most of the time, except during peak hours (or power breakdowns) where it is supplied by a series of powerful electric generators fuelled by light fuel. This strategy is used to reduce production costs because self-generated energy is cheaper than the grid energy during peak hours.
Process diagram of FMFO production

## Time period
Production figures represent the period 2005-2015, relative production of the three fishmeal types represent the period 2012-2014 (chosen due to an ongoing trend in shifting production from FAQ to Prime), and fishmeal and fish oil yields represent the period 2001-2011. Valid as of 2017.

## Parameters
- antioxidant use: 0.17 kg; name antioxidant_use; triangular min 0.153, mostLikely 0.17, max 0.187, pedigree (1,4,1,1,1)
  Antioxidant use per t of processed raw material
  Uncertainty: Data from one representative plant. Molecule: Cyclohexane
- biological oxygen demand 5 emissions: 9.17 kg; name bod5_emissions; triangular min 8.71, mostLikely 9.17, max 9.63, pedigree (1,4,1,1,1)
  BOD5 emitted to ocean per t of processed raw material
  Uncertainty: Data from one representative plant.
- fuel use: 1498 MJ; name fuel_use; triangular min 1348, mostLikely 1498, max 1648, pedigree (1,4,1,1,1)
  Fuel use per t of processed raw material
  Uncertainty: Data from one representative plant.
- oil and fat emissions: 3.14 kg; name oil_emissions; triangular min 2.983, mostLikely 3.14, max 3.297, pedigree (1,4,1,1,1)
  Oils and fats from raw material emitted to ocean per t of processed raw material
  Uncertainty: Data from one representative plant.
- raw material to fishmeal ratio: 4.21 kg/kg; name fish_to_fm; triangular min 2.98, mostLikely 4.21, max 5.66, pedigree (1,1,1,1,1)
  Amount of raw material needed to produce 1000 kg of fishmeal
  Uncertainty: Based on PRODUCE annual production figures for the period 2001-2011
- suspended solids emissions: 3.7 kg; name suspended_solids_emissions; triangular min 3.515, mostLikely 3.7, max 3.885, pedigree (1,4,1,1,1)
  Suspended solids from raw material emitted to ocean per t of processed raw material
  Uncertainty: Data from one representative plant.
- fishmeal bags use: 0.609 kg; name fm_bag_use; triangular min 0.5481, mostLikely 0.609, max 0.6699, pedigree (1,4,1,1,1)
  Fishmeal bags use per t of processed raw material
  Uncertainty: Data from one representative plant.
- electricity use: 20.6 kWh; name electricity_use; triangular min 18.54, mostLikely 20.6, max 22.7, pedigree (1,4,1,1,1)
  Electricity use per t of processed raw material
  Uncertainty: Data from one representative plant.

## Reference product
- fishmeal, 65-67% protein: 1 kg; name production; source Pierre Fréon 2017; CPC 21291: Flours, meals and pellets, inedible, of fish, crustaceans, molluscs or other aquatic invertebrates; By-product classification allocatable product
  Fishmeal from fishmeal and fish oil co-production
  production volume 3.14678e9 kg; name prod_vol; = 1183000000*0.84/0.24
    1.183 million t (24% of world's production) produced per year in Peru in the period 2012-2014, as reported by PRODUCE. 84% of fishmeal production was Prime quality in the period.
  property price 1.27239 EUR2005; name production_price_EUR2005
    Calculated value based on data from United Nations Commodity Trade Statistics Database (comtrade.un.org). UN comtrade category: 230120 Flours, meals and pellets; of fish or of crustaceans, molluscs or other aquatic invertebrates. Year 2015. Using exchange rate of 1EURO = 1.209 USD. Average of price of import into 5 main markets (EU, US, IN, JPN and CN).
  property ash content 0.1494 kg; name FMPrime_ash
    Data for Peruvian anchovies FM
  property carbon content, non-fossil 0.466282; = (1-FMPrime_protein-FMPrime_fat-FMPrime_ash)*0.444+FMPrime_protein*0.535+FMPrime_fat*0.774
    Calculated from C_content = polysaccharids*0.444+protein*0.535+lipids*0.774 and polysaccharids = 1-(protein+lipids+ash)
  property fat content 0.0819; name FMPrime_fat
    Data for Peruvian anchovies FM
  property water in wet mass 0.076944 kg; name FM67_water
  property carbon content, fossil 0.000613897; name production_C_content_fossil; = antiox_C_fossil*(antiox/(1000-antiox))
    Calculated from the inclusion rate of antioxidant cyclohexane in fishmeal
  property protein content 0.6768; name FMPrime_protein
    Data for Peruvian anchovies FM
  property carbon content 0.466896
    carbon content on a dry matter basis (reserved; not for manual entry)
  property true value 1272.39; name production_true_value
    allocation property applied in "true value" allocation // value calculated from revenue
  properties: dry mass 0.916 kg, wet mass 0.992944 kg, water content 0.084, energy content 17.9 MJ, carbon allocation 0.427677 kg

## By-products
- fish oil, from anchovy: 0 kg; name prod_FO; source Pierre Fréon 2017; CPC 21525: Fats and oils and their fractions, of fish, other than liver oils; By-product classification allocatable product; pedigree (1,1,1,1,1)
  Fish oil from the coproduction of fishmeal and fish oil. The ratio between the two co-products is statistically variable.
  Uncertainty: Based on PRODUCE annual production figures for the period 2001-2011
  production volume 6.468e8 kg; = 230000000*0.84/0.23
    230 000 t (23% of world's production) produced per year in Peru in the period 2012-2014, as reported by PRODUCE. 84% of oil was associated with Prime quality fishmeal in the period.
  property fat content 0.99; name oil_fat
    Data for Peruvian anchovies FO
  property water in wet mass 0 kg; name FO_water
  property protein content 0; name oil_protein
    Data for Peruvian anchovies FO
  property carbon content, non-fossil 0.7263; name FO_CCNF; = (1-oil_protein-oil_fat-oil_ash)*0.444+oil_protein*0.535+oil_fat*0.774
    (same comment as for fishmeal, 65-67% protein)
  property ash content 0.1 kg; name oil_ash
    Data for Peruvian anchovies FO
  property price 2.78243 EUR2005; name prod_FO_price_EUR2005
    Calculated value based on data from United Nations Commodity Trade Statistics Database (comtrade.un.org). UN comtrade category: 150420 Fats and oils and their fractions; of fish, (excluding liver-oils). Year 2015. Using exchange rate of 1EURO = 1.209 USD. Average of price of import into 5 main markets (EU, US, IN, JPN and CN).
  property carbon content 0.7263
    carbon content on a dry matter basis (reserved; not for manual entry)
  property true value 584.311; name prod_FO_true_value
    allocation property applied in "true value" allocation // value calculated from revenue
  properties: water content 0, wet mass 1 kg, energy content 38.6 MJ, dry mass 1 kg, carbon allocation 0.7263 kg
- heat, for reuse in municipal waste incineration only: 0 MJ; CPC 17300: Steam and hot water; By-product classification allocatable product; pedigree (1,1,1,1,1)
  Net electricity generated from this waste and used in internal MSWI plant energy redistribution.
  Uncertainty: uncertainty is calculated from uncertainties in waste composition and uncertainties in energy efficiency and the uncertainty in internal energy demand
  production volume 6.99771e6 MJ
  property exergy 0.1842 MJ; name E_th_prod_MSWI_exergy
    This exergy property is based on the exergy content of the product.
  property price 0.0106 EUR2005; name E_th_prod_MSWI_price_EUR2005
    Average European district heat price from Ecoheatcool and Euroheat 2005-2006, Ecoheat Work package 1: The European heat market. Final report. 10.6 EUR/GJ i s the price of district heat. http://www.solarthermalworld.org/files/Ecoheatcool%20WP1%20Web.pdf?download
  property true value relation 0.1842; name E_th_prod_MSWI_true_value_relation
    property to calculate "true value" from
  property true value 0.0108863
    allocation property applied in "true value" allocation // value calculated from true value relation
- electricity, for reuse in municipal waste incineration only: 0 kWh; CPC 17100: Electrical energy; By-product classification allocatable product; pedigree (1,1,1,1,1)
  (same comment as for heat, for reuse in municipal waste incineration only)
  production volume 995456 kWh
  property price 0.1 EUR2005; name E_el_prod_MSWI_price_EUR2005
    Estimated to be the same price as in case of electricity, medium voltage.
  property exergy 3.6 MJ; name E_el_prod_MSWI_exergy
    This exergy property is based on the exergy content of the product.
  property true value relation 3.6; name E_el_prod_MSWI_true_value_relation
    property to calculate "true value" from
  property true value 0.0302662
    (same comment as for heat, for reuse in municipal waste incineration only)

## Inputs from technosphere
All rows: source Pierre Fréon 2017
- landed anchovy, fresh: 2.88503 kg; name fish; = fish_to_fm*1000
  Fresh anchovy from Eastern Pacific Ocean (EPO), 81% provided by steel industrial fleet
  property protein content 0.191; name anch_protein
  property fat content 0.088; name anch_fat
  property water in wet mass 0.73798 kg; name anch_water
  property ash content 0.02 kg; name anch_ash
  properties: carbon content, non-fossil 0.481541, water content 2.81651, dry mass 0.26202 kg, energy content 7.9 MJ, wet mass 1 kg
  note on carbon content, non-fossil: Calculated from C_content = polysaccharids*0.444+protein*0.535+lipids*0.774 and polysaccharids = 1-(protein+lipids+ash)
- fishmeal plant: 0.00288503 unit; = fish_to_fm
  One unit of plant represents the installed capacity required to process 1 t of raw material, including infrastructure maintenance.
  properties: lifetime 30 year, capacity [kg] 1000 kg
- heat, district or industrial, natural gas: 0, 0.181556, 4.14022 MJ (3 entries)
  Fuel use per t of processed raw material multiplied by the fishmeal yield
- extrusion, plastic film: 0.00175699 kg; = fm_bag_use*fish_to_fm
  Polypropylene fishmeal bags consumed per t of processed raw material multiplied by the fishmeal yield.
- cyclohexane: 0.000490456 kg; name antiox; = antioxidant_use*fish_to_fm
  Antioxidant use per t of processed raw material multiplied by the fishmeal yield
  property carbon content, fossil 0.857143; name antiox_C_fossil
  properties: dry mass 1 kg, wet mass 1 kg
- weaving, synthetic fibre: 0.00175699 kg; = fm_bag_use*fish_to_fm
  (same comment as for extrusion, plastic film)
  properties: wet mass 1 kg, dry mass 1 kg
- electricity, medium voltage: 0, 0.000373526, 0.000185124, 0.00175269, 0.000626215, 2.36156e-5, 0.000193858, 2.96058e-5, 4.90979e-5, 9.86275e-7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 kWh (30 entries)
  Electricity use per t of processed raw material multiplied by the fishmeal yield
- polypropylene, granulate: 0.00175699 kg; = fm_bag_use*fish_to_fm
  (same comment as for extrusion, plastic film)
  property carbon content, fossil 0.857143; name poly_CCF
  properties: dry mass 1 kg, wet mass 1 kg
- waste plastic, mixture: 0 kg; name plastic_w
  (same comment as for extrusion, plastic film)
  production volume 0 kg
    Calculated from production volume of reference product using the relative outputs.
  property price 0 EUR2005; name plastic_w_price_EUR2005
  properties: wet mass 1 kg, water content 0.180638, carbon content, fossil 0.857143, dry mass 0.847 kg
- waste plastic, mixture: -0.000195375, -1.30542e-5, -9.87266e-7, -5.39184e-6, -5.12006e-6, -0.000169328, -0.00136773 kg (7 entries)
  (same comment as for extrusion, plastic film)
  production volume 8.068e6 kg

## Emissions to nature
- DOC, Dissolved Organic Carbon [water, ocean]: 0.0423292 kg; = (bod5_emissions*fish_to_fm)*1.6; source Pierre Fréon 2017
  DOC is assumed to correspond approximately to TOC, following https://dowac.custhelp.com/app/answers/detail/a_id/4219/~/dow-water-and-process-solutions---correlation-between-kmno4%2C-cod%2C-bod%2C-doc-and
- Oils, non-fossil [water, ocean]: 0.00905901 kg; = oil_emissions*fish_to_fm; source Pierre Fréon 2017
  Oils and fats emitted to ocean per t of processed raw material multiplied by the fishmeal yield
- TOC, Total Organic Carbon [water, ocean]: 0.0423292 kg; = (bod5_emissions*fish_to_fm)*1.6; source Pierre Fréon 2017
  Ratio BOD/TOC from https://cgi.tu-harburg.de/~awwweb/wbt/emwater/lessons/lesson_a1/lm_pg_1068.html
- COD, Chemical Oxygen Demand [water, ocean]: 0.0145507 kg; = (bod5_emissions*fish_to_fm)*0.55; source Pierre Fréon 2017
  Ratio BOD/COD from https://cgi.tu-harburg.de/~awwweb/wbt/emwater/lessons/lesson_a1/lm_pg_1068.html
- Suspended solids, unspecified [water, ocean]: 0.0106746 kg; = suspended_solids_emissions*fish_to_fm; source Pierre Fréon 2017
  Suspended solids emitted to ocean per t of processed raw material multiplied by the fishmeal yield
- Water [air, low population density, long-term]: 0.00207637 m3; = ((fish*anch_water)-(production*FM67_water)-(prod_FO*FO_water))/1000; source Avadí, A. 2018
  Volume of water from raw material emitted to air via evaporation
- BOD5, Biological Oxygen Demand [water, ocean]: 0.0264558 kg; = bod5_emissions*fish_to_fm; source Pierre Fréon 2017
  BOD5 emitted to ocean per t of processed raw material multiplied by the fishmeal yield

## Sampling procedure
Data from 1 fishmeal plant, opperated by the largest fish processing companies in the country. This plant is representative of the current technology and management, as determined by interviews with many technical, commercial, academic and governmental representatives.
In Peru, as of 2016 there are 207 fishmeal plants, out of which 37 have cancelled permits.
