# butane extraction, from natural gas liquids

Dataset: EcoSpold 2, unit process
Geography: GLO
Time period: 2008-01-01 to 2019-12-31
Technology level: current
Classification: ISIC rev.4 ecoinvent: 2011:Manufacture of basic chemicals
Synonyms: NGL
Scenario: Business-as-Usual
System model: Allocation at the point of substitution
Generated by: Sofia Parada Tur
Database: ecoinvent
isCopyrightProtected: true
accessRestrictedTo: 1

## General comment
In the present inventory, butane is extracted from natural gas liquids.
NGL is defined as ethane, propane and pentane plus (http://www.igu.org/html/wgc2006/pdf/paper/add17999.pdf)
The NGL mix consists roughly of 50% propane, 30% butane and 20% pentane plus.

## Included activities start
The activity starts with NGL entering the Fractionator.

## Included activities end
The activity ends when separated butane leaves the debutaniser. Energy use, cooling water and electricity are included. No emissions are included. Waste heat is considered to be recovered in a Waste heat recovery unit (WHRU).

## Technology
Natural Gas Liquids contains a mixture of ethane, propane, butane and pentane plus. The general process for butane extraction is as follows:
The Debutaniser boils-off the butanes. The NGL steam is heated in the debutaniser by a reboiler. Butan vaporises and travels up and out the top of the column. The liquid butane product flows to the reflux drum where some product can be sent back to the column as reflux and some can be sent out of the system as product. This can be sold or further refined to further separate butane from isobutene. This step is not considered here.

## Time period
Reference year of production volume

## Parameters
- technology efficiency: 1 dimensionless; name technology_efficiency; lognormal variance with pedigree 0.0188, pedigree (4,5,2,5,1)
  Literature value. http://www.igu.org/html/wgc2006/pdf/paper/add17999.pdf
- fraction of cooling water which evaporates to air: 0.3875; name fraction_CW_to_air; = (0.5*fraction_CW_OT_to_air)+(0.5*fraction_CW_R_to_air); lognormal variance with pedigree 0.092025, pedigree (4,4,3,2,4)
  fraction of cooling water which evaporates to air, i.e. is consumed
- fraction of butane in NGL: 0.3 dimensionless; name fraction_of_butane_in_NGL; lognormal variance with pedigree 0.0108, pedigree (4,1,2,5,1)
  Literature value.
  (http://digitalcommons.mcmaster.ca/cgi/viewcontent.cgi?article=1200&context=esr)
- density_natural_gas_liquids: 0.8 kg/l; lognormal variance with pedigree 0.0012, pedigree (2,1,1,1,1)
  Literature value. The specific gravity of natural gas liquids is 0.8 (Favennec, 1998). Using density of water as a reference substance the density of natural gas liquids can be calculated.
  specific gravity = density of sample / density of reference substance (water)
  density of the sample = 0.8 * 1 kg/l = 0.8 kg/l
  Source: Favennec, P.,Petroleum Refining: Refinery operation and management, Band 5, Technip Ed. 1998; pg 26
- fraction of cooling water which evaporates to air, recirculating cooling system: 0.771; name fraction_CW_R_to_air; lognormal variance with pedigree 0.092025, pedigree (4,4,3,2,4)
  Calculated based on literature value (Scown, C.D., 2011, Water Footprint of U.S. Transportation Fuels and supplying information of the article) (Vionnet, S., Quantis Water Database - Technical Report, 2012).
- fraction of cooling water which evaporates to air, once-through cooling system: 0.004; name fraction_CW_OT_to_air; lognormal variance with pedigree 0.092025, pedigree (4,4,3,2,4)
  (same comment as for fraction of cooling water which evaporates to air, recirculating cooli)

## Reference product
- butane: 1 kg; source Naini, Abbas 2000; CPC 341: Basic organic chemicals; By-product classification allocatable product
  Proces efficiency is 100%
  production volume 5.9656e10 kg; name butane_PV; = UnitConversion(10405000, 'barrel oil', 'l')*365*(1-0.35)*0.8 *0.19* technology_efficiency
    Calculated value from global natural gas liquids production. Assumed that all NGL produced is fractioned into its components. T
    he world supply of NGL and condensate in 2008 were 10405 thousand barrels per day. This has been recalculated for 365 days in one year (pg 25).
    In the NGL and condensate mix, the estimate of concentrate is 35% (pg 9)
    Gas condensates have a specific gravity of 0.8 kg/l or less.(Favennec, P.,Petroleum Refining: Refinery operation and management, Band 5, Technip Ed. 1998; pg 26)
    NGL contains 19% of butane.
  property heating value, gross 49.155 MJ; name butane_Gross_Heat_Value; = 49155/1000
    Literature value (Ullmann's Encyclopedia), gross (upper) heating (calorific) value.
  property heating value, net 47.238 MJ; name butane_Net_Heat_Value_1; = butane_Gross_Heat_Value-(butane_Gross_Heat_Value*0.039)
    Calculated value based on literature data (http://hypertextbook.com/facts/2004/NicoleWeathers.shtml). The net (lower) heating (calorific) value of butane is approximately 3.9% lower the the gross (upper) heating (calorific) value.
  property density 0.583 kg/l; name butane_density
    Literature value (Ullmann's Encyclopedia), density of liquid butane at saturation pressure; 15.6°C.
  property price 0.26 EUR2005; name butane_price_EUR2005
    Temporary price data. Calculated as 90% of purchasers price based on: 2004 import and export prices (total trades (USD) divided by total weight (kg) in EU27, USA, China, Japan and India) from UN Commodity Trade Statistics Database (http://data.un.org/Explorer.aspxDatabase [Accessed 2 July 2010]). Commodity: Butanes, liquefied
  property carbon content 0.827586
    carbon content on a dry matter basis (reserved; not for manual entry)
  properties: carbon content, fossil 0.827586, wet mass 1 kg, carbon content, non-fossil 0, dry mass 1 kg, water content 0, water in wet mass 0 kg, carbon allocation 0.827586 kg

## Inputs from technosphere
- natural gas liquids: 1 kg; = butane; source Naini, Abbas 2000, p. 50; lognormal variance with pedigree 0.0186, pedigree (3,5,4,1,1)
  Mass balanced. In order to keep mass balance in this dataset, the input of NGL is equal to the output of butane. NGL contains 19% butane.
  property water in wet mass 0 kg; name WWM
  property carbon content, non-fossil 0; name C_content_non_fossil
  property water content 0; name water_content
  property wet mass 1 kg; name WM
  property carbon content, fossil 0.812659; name C_content_fossil
  property dry mass 1 kg; name DM
- heat, district or industrial, other than natural gas: 1.18906 MJ; = butane*(30*3600*8640) /((261285+257900+150444+115123)*1000); source Safruddin, Rahmat 2006; lognormal variance with pedigree 0.0086, pedigree (1,1,4,1,1)
  Industrial value. Total energy consumption for heat from hot oil in an NGL processing plant in Indonesia. Hot oil is used as a heating medium for the reboilers, distillation columns of fractionation and defrost heater. The energy consumption for the hot oil is 30 MW. It is assumed a constant energy use in time.
  The total energy use is recalculated in MJ and divided by the yearly reported production of co-products ethane, propane, butane and pentane (given in tonnage/year) (pg 8). It is assumed the heat consumption is equal for the extraction of all fractions.
  This value is then calculated for the amount of reference product.
- electricity, medium voltage: 0.198177 kWh; = butane*(18*8640*1000)/((261288+257900+150444+115123)*1000); source Safruddin, Rahmat 2006; lognormal variance with pedigree 0.0172, pedigree (2,5,4,1,1)
  Industrial value. Reported electricity required by a NGL fractionation plant in Indonesia. The electric power required for the whole plant is 18 MW.
  The total electricity use is recalculated in kWh and is divided by the yearly reported production of co-products ethane, propane, butane and pentane (given in tonnage/year) (pg 8). It is assumed the heat consumption is equal for the extraction of all fractions.
  This value is then calculated for the amount of reference product

## Inputs from nature
- Water, cooling, unspecified natural origin [natural resource, in water]: 4.5e-5 m3; name water_cooling_UNO_input; = butane *0.000045; source Hydrocarbon Processing 2008; lognormal variance with pedigree 0.0172, pedigree (4,3,4,1,1)
  Estimation. Due to lack of process specific data, the amount of cooling water of 4.5+E-5 m3/kg is estimated based on literature value for liquid petroleum gas extraction processes (Refining Processes Handbook 2008, www.hydrocarbonprocessing.com)

## Emissions to nature
- Water [air, unspecified]: 1.74375e-5 m3; name water_to_air_unspecified; = water_cooling_UNO_input*fraction_CW_to_air; lognormal variance with pedigree 0.0487, pedigree (2,2,4,1,1)
  Calculated value based on literature values and expert opinion. See comments in the parametres' comment field.
- Water [water, unspecified]: 2.75625e-5 m3; name water_to_water_unspecified; = water_cooling_UNO_input*(1-fraction_CW_to_air); lognormal variance with pedigree 0.0487, pedigree (2,2,4,1,1)
  (same comment as for Water)

## Extrapolations
This dataset has been extrapolated from year 2008 to the year of the calculation (2019). The uncertainty has been adjusted accordingly.
