# treatment of used intermodal shipping container, 40-foot

Dataset: EcoSpold 2, unit process
Geography: GLO
Time period: 2010-01-01 to 2019-12-31
Technology level: current
Classification: ISIC rev.4 ecoinvent: 3830:Materials recovery
Classification: EcoSpold01Categories: transport systems/road
Scenario: Business-as-Usual
System model: Allocation at the point of substitution
Generated by: Tereza Levova
Database: ecoinvent
isCopyrightProtected: true
accessRestrictedTo: 1

## General comment
This dataset represents the treatment of used intermodal shipping container.

## Included activities start
The activity starts when the used container enters the waste treatment facility.

The data on energy needed during dismantling are unknown.

## Included activities end
The activity ends by different waste materials being ready for further treatment.

## Technology
The inventory is created by looking at the material composition of the container.

## Reference product
- used intermodal shipping container, 40-foot: -1 unit; name used_container_RP; CPC 39990: Other wastes n.e.c.; By-product classification Waste
  production volume 192000 unit; name used_container_RP_PV
    Estimated to be the same as the amount of containers produced each year.
  property price 0 EUR2005; name used_container_RP_price_EUR2005
    Waste products are assigned a price of zero as they are assumed to require further treatment.
  property carbon content 0.0628947
    carbon content on a dry matter basis (reserved; not for manual entry)
  properties: carbon content, fossil 0.0107895, water content 0.007446, dry mass 3771.9 kg, water in wet mass 28.086 kg, carbon content, non-fossil 0.0521053, wet mass 3800 kg, carbon allocation 237.233 kg

## By-products
- wood chips, from post-consumer wood, measured as dry mass: 0 kg; By-product classification allocatable product; CPC 3928: Sawdust and wood waste and scrap
  EcoSpold01Location=CH
  production volume 0 kg
    Production of waste urban and demolition wood in CH in 2003 is 0.2 million m3.
    year 2003 values
    Calculated from the production volume of waste wood, 40% water on dry mass basis in proportion to the respective output amounts.
  property price 0.107 EUR2005
    Expert judgement (Urs Luginbühl, Swiss Sawmilling industry, personal communication in June 2014). Wood chips from softwood should have a price of 0.101 EUR/kg. Woodchips from hardwood should have a price of 0.112 EUR/kg. Average of these two values is used. Cross-reference; FAOSTAT database; http://faostat.fao.org/site/626/DesktopDefault.aspx?PageID=626#ancor; Average import/export prices of EU for 'chips and particles'. Price: 48.76 Euro/m3. The density of the wood chips is 650 kg/m3. The price is recalculated accordingly.
  property carbon content, non-fossil 0.494
    C content of dry mass is 0.494 kgC/kg dry wood (ecoinvent v2.2 report 6_IX & ecoinvent v2.2 report 9).
  property carbon content 0.494
    carbon content on a dry matter basis (reserved; not for manual entry)
  properties: carbon content, fossil 0, water in wet mass 0.4 kg, dry mass 1 kg, wet mass 1.4 kg, water content 0.4, carbon allocation 0.494 kg
- heat, for reuse in municipal waste incineration only: 0 MJ; CPC 17300: Steam and hot water; By-product classification allocatable product; pedigree (1,1,1,1,1)
  Net electricity generated from this waste and used in internal MSWI plant energy redistribution.
  Uncertainty: uncertainty is calculated from uncertainties in waste composition and uncertainties in energy efficiency and the uncertainty in internal energy demand
  property exergy 0.1842 MJ; name E_th_prod_MSWI_exergy
    This exergy property is based on the exergy content of the product.
  property price 0.0106 EUR2005; name E_th_prod_MSWI_price_EUR2005
    Average European district heat price from Ecoheatcool and Euroheat 2005-2006, Ecoheat Work package 1: The European heat market. Final report. 10.6 EUR/GJ i s the price of district heat. http://www.solarthermalworld.org/files/Ecoheatcool%20WP1%20Web.pdf?download
  property true value relation 0.1842; name E_th_prod_MSWI_true_value_relation
    property to calculate "true value" from
- electricity, for reuse in municipal waste incineration only: 0 kWh; CPC 17100: Electrical energy; By-product classification allocatable product; pedigree (1,1,1,1,1)
  (same comment as for heat, for reuse in municipal waste incineration only)
  property true value relation 3.6; name E_el_prod_MSWI_true_value_relation
    property to calculate "true value" from
  property price 0.1 EUR2005; name E_el_prod_MSWI_price_EUR2005
    Estimated to be the same price as in case of electricity, medium voltage.
  property exergy 3.6 MJ; name E_el_prod_MSWI_exergy
    This exergy property is based on the exergy content of the product.
- zinc concentrate: 0 kg; CPC 14290: Other non-ferrous metal ores and concentrates (other than uranium or thorium ores and concentrates); By-product classification allocatable product
  Calculated value from the knowledge of the properties of both products.
  property price 0.38 EUR2005; name ByP_price_EUR2005
    Temporary price data. Calculated as 90% of purchasers price based on: Zinc content in concentrate 53%. Concentrate price per kg Zn 86.5% of refined Zn price (13.5% treatment charges according to CHR Metals Limited 2005: Dynamic cost curves. http://www.minecost.com/dynamic.pdf). 2004 zinc price from USGS (2007) Mineral commodity summaries 2007. <http://minerals.usgs.gov/minerals/pubs/mcs/2007/mcs2007.pdf> [Accessed 25 May 2010]
  property zinc content 0.53; name zinc_C_zinc_concentrate
    Zinc content on a dry matter basis. Value taken from teh "zinc mine operation" /GLO dataset.
  property dry mass 1 kg; name DM_zinc_concentrate
  property carbon content 0
    carbon content on a dry matter basis (reserved; not for manual entry)
  properties: wet mass 1 kg, water content 0, carbon content, non-fossil 0, carbon content, fossil 0, water in wet mass 0 kg, carbon allocation 0 kg
- iron scrap, sorted, pressed: 0 kg; By-product classification Recyclable; CPC 39310: Slag, dross, scalings and other waste from the manufacture of iron or steel; pedigree (1,1,1,1,1)
  Iron scrap recovered from this waste.
  property price 0.175 EUR2005
    Temporary price data. Calculated as 90% of purchasers price based on: 2005 import and export prices (total trades (USD) divided by total weight (kg) in biggest economies of the world: EU27, USA, Brasil, China, India, Japan and Russia) from UN Commodity Trade Statistics Database (http://data.un.org/Explorer.aspxDatabase [Accessed 2011.06.20]). Commodity: Waste or scrap, of cast iron
  property carbon content 0
    carbon content on a dry matter basis (reserved; not for manual entry)
  properties: water content 0, water in wet mass 0 kg, carbon content, fossil 0, dry mass 1 kg, carbon content, non-fossil 0, wet mass 1 kg, carbon allocation 0 kg

## Inputs from technosphere
- scrap steel: 0 kg; pedigree (1,1,1,1,1)
  Calculated value based on the composition of the container.
  production volume 0 kg
    Calculated from production volume of reference product using the relative outputs.
  properties: dry mass 1 kg, wet mass 1 kg
- waste wood, post-consumer: -466.712 kg; = (0.79238*589)*-1
  Calculated value based on the composition of the container.
  production volume 8.96087e7 kg; = ABS(used_container_RP_PV * ((Ref('21073539-34eb-4376-aba7-6a0f42e9c0f0')*-1) / used_container_RP))
    Calculated from production volume of reference product using the relative outputs.
  properties: price 0.079 EUR2005, water content 0.4, dry mass 1 kg, wet mass 1.4 kg, carbon content, non-fossil 0.494
- waste rubber, unspecified: 0 kg; pedigree (1,1,1,1,1)
  Calculated value based on the composition of the container.
  production volume 0 kg
    Calculated from production volume of reference product using the relative outputs.
  properties: dry mass 1 kg, wet mass 1 kg, carbon content, fossil 0.853
- building, hall: 0.00325744 m2; = 1/(( lifetime_building*365)/(12.192*2.438*2)); lognormal variance with pedigree 0.318, pedigree (4,5,3,1,1)
  Calculated value based on estimates.
  1m2 of hall is available every day for 50 years
  1 container occupies during the dismantling the area of its based for the period of 2 days
  property lifetime 50 year; name lifetime_building
- scrap steel: -803.356, -1.01564, -2494.89 kg (3 entries); lognormal variance with pedigree 0.0026, pedigree (1,1,3,1,1)
  Calculated value based on the composition of the container.
  production volume 6.33459e8 kg
- waste rubber, unspecified: -2.6884, -0.112859, -2.6884 kg (3 entries); lognormal variance with pedigree 0.0026, pedigree (1,1,3,1,1)
  Calculated value based on the composition of the container.
  production volume 1.05402e6 kg

## Extrapolations
This dataset has been extrapolated from year 2014 to the year of the calculation (2019). The uncertainty has been adjusted accordingly.

## Review by Gabor Doka 2014-12-19
passed
