# wind turbine construction, 2MW, onshore

Dataset: EcoSpold 2, unit process
Geography: GLO
Time period: 2008-01-01 to 2019-12-31
Technology level: modern
Classification: ISIC rev.4 ecoinvent: 4220a: Construction of utility projects for electricity production, except for liquid fuels
Tags: infrastructure; wind power
Scenario: Business-as-Usual
System model: Allocation at the point of substitution
Generated by: Christian Bauer
Published in: Elsam Engineering A/S,Fredericia,Denmark 2004
Database: ecoinvent
isCopyrightProtected: true
accessRestrictedTo: 1

## General comment
This dataset represents the construction of a wind turbine with a capacity of 2MW for onshore use. The term "wind turbine" inludes moving parts such as nacelle, rotor, rotor blades, transition piece as well as fixed parts such as the tower and the foundation.

The LCI model is based on the environmental assessment of this turbine in (Elsam 2004a), in which the Danish wind park Tjaerborg with eight turbines of differing capacities is analysed, among them the Vestas V80/2 MW. This type can be taken as reference technology for wind turbines with a capacity between 1 and 3 MW.
Parts of the wind turbine are the following:
- Rotor: Rotor blades, rotor hub, extender
- Nacelle: The nacelle consists of the nacelle cover, which includes generator, gear, main shaft, yaw system, flanges etc.
- Electronics
- Tower (steel)
- Foundation

## Included activities start
From the transformation of pasture land to industrial site, and from the reception and treatment of building materials and turbine parts.

## Included activities end
This activity ends with the decommissioning of the wind turbine and the treatment of the resulting materials in the end of the lifetime.

This dataset includes
- all materials for the construction of the wind turbine and their treatment, but not the energy for their assembling
- land transformation and use
- energy needed for erection and dismantling of the wind turbine.

This dataset doesn't include
- the connection to the grid, which is modeled in a separate dataset.
- the operation and maintenance of the fully finished wind power plant. It is assumed that all parts will hold for the lifetime of 20 years and don't have to be replaced.
- auxiliary materials such as packaging materials or vacuum fleece.
- any losses of materials (waste) during the processing of the different wind turbine parts.
- neither the energy use for assembly of the different wind turbine parts nor their transportation from manufacture to the construction site.

## Technology
The Vestas V80/2 MW turbine is chosen as reference technology.
Characteristics:
- Capacity: 2000 kW
- Diameter of the rotor: 80 m
- Number of rotor blades: 3
- rotor weight: 37000 kg
- rotor blade weight: 6500 kg
- nacelle weight: 61000 kg

- tower type: tubular steel tower
- tower weight: 165000 kg
- material of the tower: Steel
- tower hub height: 78 m
- tower diameter: 4m
- foundation weight: 805000
- cable for network connection (per turbine): 1000 m
- Lifetime: 20 years

Source: Elsam (2004a) Life Cycle Assessment of offshore and onshore sited wind farms. Elsam Engineering A/S, Fredericia, Denmark

Further characteristics:

Operational data
Rated power: 2,000 kW
Cut-in wind speed: 4 m/s
Rated wind speed: 16 m/s
Cut-out wind speed: 25 m/s
Wind class: IEC IA and IEC IIA
Operating temperature range: standard turbine -20°C to 40°C, low temperature turbine -30°C to 40°C

Rotor
Rotor diameter: 80 m
Swept area: 5,027 m2
Nominal revolutions: 16.7 rpm
Operational interval: 10.8-19.1 rpm
Air brake: Full blade feathering with three-pitch cylinders

Electrical
Frequency: 50 Hz/60 Hz
Generator type: 4-pole doubly fed generator, slip rings

Gearbox
Type: three-stage planetary/helical

Power regulation
Pitch regulated with variable speed

Source: Vestas. 2010. V80-2.0MW. Vestas. Wind. It means the world to us.TM

## Parameters
- Installed capacity: 26911 MW; name capacity_installed_new; lognormal variance with pedigree 0.0018, pedigree (2,1,1,1,2)
  Literature value/statistics. New installed capacity of wind power in the world, onshore, 2008. Calculated from the total new installed capacity (27261 MW) minus new capacity offshore (350 MW). [WWEA, 2009. World Wind Energy Report 2008. World Wind Energy Association, Bonn. Table p.12f and chapter "offshore wind energy", p.8]
- Percentage of onshore wind power plant class capacity on total: 0.696; name percentage_onshore_class_1to3; lognormal variance with pedigree 0.009325, pedigree (2,2,1,2,2)
  Percentages onshore 2008 of the three wind power plant classes (average from 41 countries worldwide): <1MW 19.7%; 1-3MW 69.6%; >3MW 10.7% [compilation out of "The Wind Power Database, 2011"]. These percentages are taken to calculate the number of new wind power plants per class with the assumption of average capacity values (0.8MW, 2MW, 4.5MW) .
  Source:
  The Wind Power. 2011. Wind power and wind farms database. www.thewindpower.net

## Reference product
- iron scrap, unsorted: 1 kg; name scrap_iron; = cast_iron; CPC 39310: Slag, dross, scalings and other waste from the manufacture of iron or steel; By-product classification Recyclable
  Calculated value. It can be assumed that 100% of the iron enter a recycling process.
  production volume 1.94185e8 kg; = apv_turbine_2MW * scrap_iron
    Calculated from production volume of reference product using the relative outputs.
  property price 0.149 EUR2005; name scrap_iron_price_EUR2005
    Temporary price data. Calculated as 90% of purchasers price based on: estimated at 85% of sorted scrap
  property lifetime 20 year; name scrap_iron_lifetime
    Literature value
  property carbon content 0
    carbon content on a dry matter basis (reserved; not for manual entry)
  property true value 3089.54; name scrap_iron_true_value
    allocation property applied in "true value" allocation // value calculated from revenue
  properties: dry mass 1 kg, water content 0, water in wet mass 0 kg, carbon content, fossil 0, carbon content, non-fossil 0, wet mass 1 kg, carbon allocation 0 kg
- wind turbine, 2MW, onshore: 0 unit; name wind_turbine; CPC 53262: Power plants; By-product classification allocatable product
  production volume 9365.03 unit; name apv_turbine_2MW; = capacity_installed_new* percentage_onshore_class_1to3/ wind_turbine_capacity_MW
    Calculated value. See parameters for a closer look at the values used.
  property price 2.7692e6 EUR2005; name wind_turbine_price_EUR2005
    Data from the report in Energie-spiegel, Facts for the energy decisions of tomorrow N0. 20 /June 2012 from the Paul Scherrer Institut (PSI), table 2. Capital costs for a wind turbine are 1.8-2.5 1000CHF/kWel for a turbine onshore and 2.7-4.0 1000CHF/kWel for a turbine offshore). The average of onshore values is used for onshore turbines and for offshore values to calculate the price of offshore turbines. The capacity of the turbine is used to calculate the price
  property capacity [MW] 2 MW; name wind_turbine_capacity_MW
    Literature value
  property true value 2.7692e6; name wind_turbine_true_value
    allocation property applied in "true value" allocation // value calculated from revenue

## By-products
- electricity, for reuse in municipal waste incineration only: 0 kWh; CPC 17100: Electrical energy; By-product classification allocatable product; pedigree (1,1,1,1,1)
  Net electricity generated from this waste and used in internal MSWI plant energy redistribution.
  Uncertainty: uncertainty is calculated from uncertainties in waste composition and uncertainties in energy efficiency and the uncertainty in internal energy demand
  production volume 1.63946e8 kWh
  property true value relation 3.6; name E_el_prod_MSWI_true_value_relation
    property to calculate "true value" from
  property exergy 3.6 MJ; name E_el_prod_MSWI_exergy
    This exergy property is based on the exergy content of the product.
  property price 0.1 EUR2005; name E_el_prod_MSWI_price_EUR2005
    Estimated to be the same price as in case of electricity, medium voltage.
  property true value 310.154
    allocation property applied in "true value" allocation // value calculated from true value relation
- heat, for reuse in municipal waste incineration only: 0 MJ; CPC 17300: Steam and hot water; By-product classification allocatable product; pedigree (1,1,1,1,1)
  Net useful heat generated from this waste and used in internal MSWI plant energy redistribution.
  Uncertainty: uncertainty is calculated from uncertainties in waste composition and uncertainties in energy efficiency and the uncertainty in internal energy demand
  production volume 1.13763e9 MJ
  property true value relation 0.1842; name E_th_prod_MSWI_true_value_relation
    property to calculate "true value" from
  property exergy 0.1842 MJ; name E_th_prod_MSWI_exergy
    This exergy property is based on the exergy content of the product.
  property price 0.0106 EUR2005; name E_th_prod_MSWI_price_EUR2005
    Average European district heat price from Ecoheatcool and Euroheat 2005-2006, Ecoheat Work package 1: The European heat market. Final report. 10.6 EUR/GJ i s the price of district heat. http://www.solarthermalworld.org/files/Ecoheatcool%20WP1%20Web.pdf?download
  property true value 110.676
    (same comment as for electricity, for reuse in municipal waste incineration only)
- zinc concentrate: 0 kg; CPC 14290: Other non-ferrous metal ores and concentrates (other than uranium or thorium ores and concentrates); By-product classification allocatable product
  Calculated value from the knowledge of the properties of both products.
  production volume 9063.52 kg
  property price 0.38 EUR2005; name ByP_price_EUR2005
    Temporary price data. Calculated as 90% of purchasers price based on: Zinc content in concentrate 53%. Concentrate price per kg Zn 86.5% of refined Zn price (13.5% treatment charges according to CHR Metals Limited 2005: Dynamic cost curves. http://www.minecost.com/dynamic.pdf). 2004 zinc price from USGS (2007) Mineral commodity summaries 2007. <http://minerals.usgs.gov/minerals/pubs/mcs/2007/mcs2007.pdf> [Accessed 25 May 2010]
  property zinc content 0.53; name zinc_C_zinc_concentrate
    Zinc content on a dry matter basis. Value taken from teh "zinc mine operation" /GLO dataset.
  property dry mass 1 kg; name DM_zinc_concentrate
  property carbon content 0
    carbon content on a dry matter basis (reserved; not for manual entry)
  property true value 0.00725755
    allocation property applied in "true value" allocation // value calculated from revenue
  properties: wet mass 1 kg, water content 0, carbon content, non-fossil 0, carbon content, fossil 0, water in wet mass 0 kg, carbon allocation 0 kg
- copper: 0 kg; By-product classification allocatable product; CPC 41413: Refined copper and copper alloys, unwrought; master alloys of copper
  production volume 1.94185e7 kg
  properties: water in wet mass 0 kg, water content 0, carbon content, non-fossil 0, dry mass 1 kg, carbon content, fossil 0, price 5.52 EUR2005, wet mass 1 kg, carbon content 0, carbon allocation 0 kg, true value 4088.93
- lead: 0 kg; CPC 41441: Lead, unwrought; By-product classification allocatable product
  EcoSpold01Location=SE
  production volume 9231.57 kg
  property price 0.744 EUR2005
    Temporary price data. Calculated as 90% of purchasers price based on: Source: ecoinvent v2 report 10-part IX, Tab 5.10 & 2.5
  property carbon content 0
    carbon content on a dry matter basis (reserved; not for manual entry)
  property true value 0.733397
    allocation property applied in "true value" allocation // value calculated from revenue
  properties: wet mass 1 kg, water content 0, carbon content, non-fossil 0, carbon content, fossil 0, dry mass 1 kg, water in wet mass 0 kg, carbon allocation 0 kg
- nickel, 99.5%: 0 kg; CPC 41422: Unwrought nickel; By-product classification allocatable product
  EcoSpold01Location=SE
  production volume 19270.7 kg
  property price 10.4 EUR2005
    Temporary price data. Calculated as 90% of purchasers price based on: 2004 nickel price from USGS (2007) Mineral commodity summaries 2007. <http://minerals.usgs.gov/minerals/pubs/mcs/2007/mcs2007.pdf> [Accessed 25 May 2010]
  property carbon content 0
    carbon content on a dry matter basis (reserved; not for manual entry)
  property true value 21.4003
    allocation property applied in "true value" allocation // value calculated from revenue
  properties: water in wet mass 0 kg, wet mass 1 kg, carbon content, non-fossil 0, dry mass 1 kg, water content 0, carbon content, fossil 0, carbon allocation 0 kg
- silver: 0 kg; CPC 41310: Silver (including silver plated with gold or platinum), unwrought or in semi-manufactured forms, or in powder […]; By-product classification allocatable product; CAS 7440-22-4
  EcoSpold01Location=SE
  production volume 3182.36 kg
  property price 178 EUR2005
    (same comment as for lead)
  property carbon content 0
    carbon content on a dry matter basis (reserved; not for manual entry)
  property true value 60.4867
    allocation property applied in "true value" allocation // value calculated from revenue
  properties: wet mass 1 kg, carbon content, non-fossil 0, dry mass 1 kg, water content 0, carbon content, fossil 0, water in wet mass 0 kg, carbon allocation 0 kg
- palladium: 0 kg; CPC 4160: Other non-ferrous metals and articles thereof (including waste and scrap of some metals); cermets and articles […]; By-product classification allocatable product
  EcoSpold01Location=SE
  production volume 176.164 kg
  property price 5640 EUR2005
    Temporary price data. Calculated as 90% of purchasers price based on: 2004 price from USGS (2007) Mineral commodity summaries 2007. <http://minerals.usgs.gov/minerals/pubs/mcs/2007/mcs2007.pdf> [Accessed 25 May 2010]
  property carbon content 0
    carbon content on a dry matter basis (reserved; not for manual entry)
  property true value 106.093
    allocation property applied in "true value" allocation // value calculated from revenue
  properties: wet mass 1 kg, carbon content, fossil 0, water in wet mass 0 kg, water content 0, carbon content, non-fossil 0, dry mass 1 kg, carbon allocation 0 kg
- gold: 0 kg; CPC 41320: Gold (including gold plated with platinum), unwrought or in semi-manufactured forms, or in powder form; By-product classification allocatable product; CAS 7440-57-5
  EcoSpold01Location=SE
  production volume 96.6077 kg
  property price 10600 EUR2005
    Temporary price data. Calculated as 90% of purchasers price based on: Source: ecoinvent v2 report 10-part IX, Tab 2.5
  property carbon content 0
    carbon content on a dry matter basis (reserved; not for manual entry)
  property true value 109.347
    allocation property applied in "true value" allocation // value calculated from revenue
  properties: wet mass 1 kg, carbon content, fossil 0, dry mass 1 kg, carbon content, non-fossil 0, water content 0, water in wet mass 0 kg, carbon allocation 0 kg
- iron scrap, sorted, pressed: 0 kg; By-product classification Recyclable; CPC 39310: Slag, dross, scalings and other waste from the manufacture of iron or steel; pedigree (1,1,1,1,1)
  Iron scrap recovered from this waste.
  production volume 2.20844e8 kg
  property price 0.175 EUR2005
    Temporary price data. Calculated as 90% of purchasers price based on: 2005 import and export prices (total trades (USD) divided by total weight (kg) in biggest economies of the world: EU27, USA, Brasil, China, India, Japan and Russia) from UN Commodity Trade Statistics Database (http://data.un.org/Explorer.aspxDatabase [Accessed 2011.06.20]). Commodity: Waste or scrap, of cast iron
  property carbon content 0
    carbon content on a dry matter basis (reserved; not for manual entry)
  property true value 27.8119
    allocation property applied in "true value" allocation // value calculated from revenue
  properties: water content 0, water in wet mass 0 kg, carbon content, fossil 0, dry mass 1 kg, carbon content, non-fossil 0, wet mass 1 kg, carbon allocation 0 kg
- aluminium oxide, non-metallurgical: 0 kg; source European Aluminium Association 2008; CPC 41432: Alumina (aluminium oxide), except artificial corundum; By-product classification allocatable product; CAS 1344-28-1; pedigree (1,1,1,1,1)
  production volume 899177 kg
  property carbon content, non-fossil 0; name C_content_non_fossil
  property price 0.28 EUR2005; name Al2O3Amount_price_EUR2005
    From UN trade database. http://data.un.org/ Import data from the largest economies of the world are used (Brazil, India, USA, China, Japan and EU-27).
  property dry mass 1 kg; name DM
  property water content 0; name water_content
  property wet mass 1 kg; name WM
  property water in wet mass 0 kg; name WWM
  property carbon content, fossil 0; name C_content_fossil
  property carbon content 0
    carbon content on a dry matter basis (reserved; not for manual entry)
  property true value 26.884
    allocation property applied in "true value" allocation // value calculated from revenue
  properties: carbon allocation 0 kg
- aluminium, cast alloy: 0 kg; source European Aluminium Association 2008; By-product classification allocatable product; CPC 41431: Unwrought aluminium; pedigree (1,1,1,1,1)
  EcoSpold01Location=RER
  production volume 8.40531e6 kg
  property price 1.3 EUR2005; name castAlloyAmount_price_EUR2005
  properties: water in wet mass 0 kg, carbon content, non-fossil 0, water content 0, dry mass 1 kg, carbon content, fossil 0, wet mass 1 kg, carbon content 0, carbon allocation 0 kg, true value 1166.78
- aluminium, wrought alloy: 0 kg; source European Aluminium Association 2008; By-product classification allocatable product; CPC 4153: Semi-finished products of aluminium or aluminium alloys; pedigree (1,1,1,1,1)
  production volume 3.67968e6 kg
  property price 1.44 EUR2005; name secondaryAluminiumOutput_price_EUR2005
  properties: wet mass 1 kg, water content 0, carbon content, fossil 0, water in wet mass 0 kg, carbon content, non-fossil 0, dry mass 1 kg, carbon content 0, carbon allocation 0 kg, true value 565.801

## Inputs from technosphere
- excavation, hydraulic digger: 1.87238e-5 m3; = concrete_foundation
  Calculated value
- aluminium, cast alloy: 2.87256e-5 kg; name alu_cast; = 0.32*1678; source Elsam Engineering A/S,Fredericia,Denmark 2004, p. p. 25, Tab. 5.3; lognormal variance with pedigree 0.051625, pedigree (2,4,5,2,3)
  Literature value/calculated value. The shares of cast alloy and wrought alloy aluminium in the cancelled ecoinvent v2 "aluminium production mix" dataset amounted to 32% (cast alloy) and 68% (wrought alloy) respectively. These shares have been overtaken to distribute the original amount of 1678 kg aluminium.
  Uncertainty: estimated variance. slightly higher technological score because of the split of the aluminium use in the two aluminium types.
  properties: dry mass 1 kg, wet mass 1 kg
- aluminium, wrought alloy: 6.10418e-5 kg; name alu_wrought; = 0.68*1678; source Elsam Engineering A/S,Fredericia,Denmark 2004, p. p. 25, Tab. 5.3; lognormal variance with pedigree 0.051625, pedigree (2,4,5,2,3)
  (same comment as for aluminium, cast alloy)
  properties: dry mass 1 kg, wet mass 1 kg
- electronics scrap from control units: -2.35385e-5 kg; name electronics_scrap; = (electronics)*-1
  Calculated value
  production volume 4.12061e6 kg; = apv_turbine_2MW * ((Ref('b7653bb7-63c6-47a1-a9e8-6b2f486a6f20')*-1) / wind_turbine)
    Calculated from production volume of reference product using the relative outputs.
  property lifetime 20 year; name lifetime
  property price 0 EUR2005; name electronics_scrap_price_EUR2005
  properties: carbon content, fossil 0.337146, dry mass 1 kg, wet mass 1 kg, carbon content, non-fossil 0.00013442
- wire drawing, copper: 0.000150647 kg; = copper
  Calculated value
- waste reinforced concrete: 0 kg; name waste_concrete_reinforced
  Calculated value. A density of 2400kg/m3 is assumed for the reinforced concrete.
  production volume 0 kg
    Calculated from production volume of reference product using the relative outputs.
  property price 0 EUR2005; name waste_concrete_reinforced_price_EUR2005
  property lifetime 20 year; name waste_concrete_reinforced_lifetime
  properties: water content 0.00585407, wet mass 1 kg, dry mass 0.99418 kg
  note on lifetime: Literature value. 10% of this waste type incur during the construction of the wind turbine and therefore would only have a very short lifetime.
- sheet rolling, steel: 0.0104928 kg; = steel_lowalloyed
  Calculated value. The steel is delivered to in steel plates, which have already been pre-cut. In addition, there is no waste of steel. The plates for the tower sections are rolled. Every section is welded lengthwise, then the individual sections are welded together.
- concrete, normal: 1.87238e-5 m3; name concrete_foundation; source Elsam Engineering A/S,Fredericia,Denmark 2004, p. p. 13, 21+25, Tab. 5.3; lognormal variance with pedigree 0.044225, pedigree (2,4,5,2,2)
  Literature value. Used for foundation.
  The traditional bottom plates are approx 15 × 15m wide and 2m deep. In total, approx 400m3 of reinforced concrete.
  Uncertainty: estimated variance
  properties: water content 0.086758, wet mass 2380 kg, dry mass 2190 kg
- scrap copper: 0 kg; name scrap_copper
  Calculated value. It can be assumed that 100% of the copper enter a recycling process.
  production volume 0 kg
    Calculated from production volume of reference product using the relative outputs.
  property price 0 EUR2005; name scrap_copper_price_EUR2005
  property lifetime 20 year; name scrap_copper_lifetime
  properties: dry mass 1 kg, wet mass 1 kg
- copper: 0.000150647 kg; source Elsam Engineering A/S,Fredericia,Denmark 2004, p. p. 25, Tab. 5.3; lognormal variance with pedigree 0.044225, pedigree (2,4,5,2,2)
  Literature value. Used in the cables.
  Uncertainty: estimated variance
  properties: wet mass 1 kg, dry mass 1 kg
- sheet rolling, aluminium: 8.97674e-5 kg; = alu_cast+alu_wrought
  Proxy for wire drawing of aluminium.
- waste polyethylene: 0 kg; name waste_polyethy
  Calculated value
  production volume 0 kg
    Calculated from production volume of reference product using the relative outputs.
  property price 0 EUR2005; name waste_polyethy_price_EUR2005
  property lifetime 20 year; name waste_polyethy_lifetime
  properties: water content 0.00401606, dry mass 0.996 kg, wet mass 1 kg, carbon content, fossil 0.825301
  note on carbon content, fossil: C content in 1 kg DM was calculated using data in Tab A.1, ecoinvent v2.2 report 13_I
- aluminium scrap, post-consumer: -8.97674e-5 kg; name scrap_alu; = (alu_cast+alu_wrought)*-1
  Calculated value. It can be assumed that 100% of the aluminium enter a recycling process.
  production volume 1.57145e7 kg; = apv_turbine_2MW * ((Ref('8eb9a3e9-b758-4aa8-b82d-9496ab041ffa')*-1) / wind_turbine)
    Calculated from production volume of reference product using the relative outputs.
  property lifetime 20 year; name scrap_alu_lifetime
  property price 0.685 EUR2005; name scrap_alu_price_EUR2005
  properties: wet mass 1 kg, dry mass 1 kg
- zinc: 1.08598e-5 kg; source Elsam Engineering A/S,Fredericia,Denmark 2004, p. p. 25, Tab. 5.3; lognormal variance with pedigree 0.044225, pedigree (2,4,5,2,2)
  Literature value
  Uncertainty: estimated variance
  properties: dry mass 1 kg, wet mass 1 kg
- electronics, for control units: 2.35385e-5 kg; name electronics; source Vestas 2011, p. p.41; lognormal variance with pedigree 0.044225, pedigree (2,4,5,2,2)
  Literature value.
  Uncertainty: estimated variance
  properties: carbon content, non-fossil 0.00013442, wet mass 1 kg, dry mass 1 kg, carbon content, fossil 0.337146
  note on carbon content, non-fossil: The control unit has a composition of 46% steel (housing), 32% plastics, 14% printed wiring boards and 8% cables (various types).;
- zinc coat, pieces: 5.24096e-5 m2; = 78*4*3.14
  Calculated value. The surface for zinc coating is estimated with a diameter and a height of the tower of 4 m and 78 m, respectively.
- waste plastic, mixture: 0 kg; name waste_plastic
  Estimation. The glass fibre reinforced plastic of the rotor is disposed of as 50% glass and 50% plastic. When using PrePreg in the manufacturing process, up to 10% of the PrePreg turns into waste due to cutoffs directly. A large percentage of this waste is sent to recycling as it is directly used in the production of e.g. high-strength construction panels. The remaining glass fibre reinforced plastic amount will turn into waste/by-product after 20 years.
  Today, it is not possible to recycle the turbine blades. When the turbine’s lifetime expires, the blades will
  be dismantled into smaller pieces, which are deposited at controlled waste deposits.[Elsam. 2004b. Life Cycle Assessment of turbines PSO 1999. Elsam Engineering A/S, Fredericia, Denmark]
  production volume 0 kg
    Calculated from production volume of reference product using the relative outputs.
  property lifetime 20 year; name waste_plastic_lifetime
  property price 0 EUR2005; name waste_plastic_price_EUR2005
  properties: water content 0.180638, dry mass 0.847 kg, wet mass 1 kg, carbon content, fossil 0.747344
  note on carbon content, fossil: C content in 1 kg DM was calculated using data in Tab A.2, ecoinvent v2.2 report 13_I
- scrap steel: 0 kg; name scrap_steel
  Calculated value. The zinc coating of the steel tower is included in the scrap steel, which is a simplification. It can be assumed that 100% of the steel enter a recycling process.
  production volume 0 kg
    Calculated from production volume of reference product using the relative outputs.
  property lifetime 20 year; name scrap_steel_lifetime
  property price 0 EUR2005; name scrap_steel_price_EUR2005
  properties: dry mass 1 kg, wet mass 1 kg
- polyethylene, high density, granulate: 0.000165198 kg; name hdpe; source Elsam Engineering A/S,Fredericia,Denmark 2004, p. p. 25, Tab. 5.3; lognormal variance with pedigree 0.044225, pedigree (2,4,5,2,2)
  Literature value
  Uncertainty: estimated variance
  properties: carbon content, fossil 0.857143, wet mass 1 kg, dry mass 1 kg
  note on carbon content, fossil: Polyethylene is formed out of a huge amount of ethylene monomers (C2H4) (ecoinvent v2.2 report 11_II). MW=28 g/mol
- waste glass: 0 kg; name waste_glass
  Estimation. The glass fibre reinforced plastic of the rotor is disposed of as 50% glass and 50% plastic. When using PrePreg in the manufacturing process, up to 10% of the PrePreg turns into waste due to cutoffs directly. The remaining amount will turn into waste/by-product after 20 years.
  Today, it is not possible to recycle the turbine blades. When the turbine’s lifetime expires, the blades will
  be dismantled into smaller pieces, which are deposited at controlled waste deposits.[Elsam. 2004b. Life Cycle Assessment of turbines PSO 1999. Elsam Engineering A/S, Fredericia, Denmark]
  production volume 0 kg
    Calculated from production volume of reference product using the relative outputs.
  property price 0 EUR2005; name waste_glass_price_EUR2005
  property lifetime 20 year; name waste_glass_lifetime
  properties: dry mass 1 kg, wet mass 1 kg
- sheet rolling, chromium steel: 0.000713004 kg; = chromium_steel
  Calculated value
- electricity, medium voltage: 0.00771953 kWh; = ( steel_reinforcing+ chromium_steel+ steel_lowalloyed+cast_iron+ glass_plastic+hdpe+copper+alu_cast+alu_wrought+zinc+ epoxy)*0.5; source Burger, B. 2007; lognormal variance with pedigree 0.1006, pedigree (5,4,5,4,3)
  Literatur value / calculation: Additional to energy requirements for material processing, a factor of 0.5 kWh/kg material (except of concrete for the foundation) after is included.Total wind turbine weight is about 286000 kg (see Technology comment for details). This should also cover the energy required for mounting and removal of the turbine.
  Uncertainty: rough estimation
- cast iron: 0.00110674 kg; name cast_iron; source Elsam Engineering A/S,Fredericia,Denmark 2004, p. p. 25, Tab. 5.3; lognormal variance with pedigree 0.044225, pedigree (2,4,5,2,2)
  Literature value
  Uncertainty: estimated variance
  properties: carbon content, fossil 0.04, wet mass 1 kg, dry mass 1 kg
  note on carbon content, fossil: Cast iron is made by remelting pig iron in small furnaces (e.g. cupola furnaces or electric arc furnaces) and poured into moulds to make castings. It usually contains 2% to 6% carbon (ecoinvent v2.2 report 10_partII). An average content of 4% was considered
- waste polyethylene/polypropylene product: 0 kg; name waste_polyethypropy
  Calculated value. Proxy for the treatment of the epoxy resin (polyepoxide, formed from reaction of an epoxide resin with polyamine hardener). When using PrePreg in the manufacturing process, up to 10% of the PrePreg turns into waste due to cutoffs directly. The remaining amount will turn into waste/by-product after 20 years.
  production volume 0 kg
    Calculated from production volume of reference product using the relative outputs.
  property lifetime 20 year; name waste_polyethypropy_lifetime
  property price 0 EUR2005; name waste_polyethypropy_price_EUR2005
  properties: carbon content, fossil 0.748045, water content 0.180638, dry mass 0.847 kg, wet mass 1 kg
  note on carbon content, fossil: Mixed various plastics was used to estimate the C content of this waste (Tab A.2, ecoinvent v2.2 report 13_I)
- reinforcing steel: 0.00144441 kg; name steel_reinforcing; source Elsam Engineering A/S,Fredericia,Denmark 2004, p. p. 21; lognormal variance with pedigree 0.045625, pedigree (3,4,5,2,2)
  Literature value. Used in the foundation.
  Elsam (2004) indicate a reinforcing steel use of 27t for the foundation; it is not 100% clear whether this amount is included in the overall steel use in Tab. 5.3 p.25 of the source of 223140kg. Here, it is assumed that the reinforcing steel has been considered, so that this amount is separated to the exchange "reinforcing steel".
  Uncertainty: estimated variance. higher uncertainty because of the fact discussed in the comment.
  properties: carbon content, fossil 0.004, dry mass 1 kg, wet mass 1 kg
- welding, arc, steel: 1.5835e-5 m; source Burger, B. 2007; lognormal variance with pedigree 0.211, pedigree (5,5,5,5,5)
  Literature/empiric value: The number for welding is an empiric factor. The steel is delivered to in steel plates, which have already been pre-cut. In addition, there is no waste of steel. The plates for the tower sections are rolled. Every section is welded lengthwise, then the individual sections are welded together.
  Uncertainty: empiric factor, high uncertainty
- steel, chromium steel 18/8: 0.000713004 kg; name chromium_steel; source Elsam Engineering A/S,Fredericia,Denmark 2004, p. p. 25, Tab. 5.3; lognormal variance with pedigree 0.045625, pedigree (3,4,5,2,2)
  Literature value
  Uncertainty: estimated variance. higher uncertainty because of the fact discussed in the comment.
  properties: dry mass 1 kg, wet mass 1 kg, carbon content, fossil 0.0008
  note on carbon content, fossil: Stainless steel model is the grade 304 steel (18/8 stainless, 18% chromium 8% nickel; max. 0.08% C)
- steel, low-alloyed: 0.0104928 kg; name steel_lowalloyed; = 223140-steel_reinforcing; source Elsam Engineering A/S,Fredericia,Denmark 2004, p. p. 25, Tab. 5.3; lognormal variance with pedigree 0.044225, pedigree (2,4,5,2,2)
  Literature value. Used in the tower. The steel is delivered in steel plates, which have already been pre-cut. In addition, there is no waste of steel. The plates for the tower sections are rolled. Every section is welded lengthwise, then the individual sections are welded together. Subsequent surface treatment (i.e. sandblasting) is not taken into account in this dataset.
  Elsam (2004) indicate a reinforcing steel use of 27t for the foundation; it is not 100% clear whether this amount is included in the overall steel use in Tab. 5.3 p.25 of the source of 223140kg. Here, it is assumed that the reinforcing steel has been considered, so that this amount is separated to the exchange "reinforcing steel".
  Uncertainty: estimated variance
  properties: wet mass 1 kg, carbon content, fossil 0.005, dry mass 1 kg
  note on carbon content, fossil: Low alloyed steel composition given in Tab. 3.2 ecoinvent v2.2 report 10_partII. Steel assumed to have a C content of 0.5%
- epoxy resin, liquid: 0 kg; name epoxy
  Literature value. Used for the rotor blades. Steel and aluminium blades are used for small wind turbines. For large ones, they have problems of weight or metal fatigue. Most modern rotor blades on large wind turbines are made of glass fiber reinforced polyester or epoxy. Carbon fiber or Kevlar seems to be too expensive for large turbines. [Chataignere A. and Le Boulch D. (2003) Wind Turbine Systems. Final report ECLIPSE. EDF R&D, Clamart Cedex, France.]
  Prepreg is used as material for the blades in this dataset. It was not possible to get information on the exact composition of Prepreg. From the supplier’s PrePreg safety data sheets it is assumed that Prepreg consists of approx 40% epoxy and 60% glass fibre. Total Prepreg mass is 21507 kg. When using PrePreg in the manufacturing process, up to 10% of the PrePreg turns into waste due to cutoffs.
  properties: carbon content, fossil 0.42325, wet mass 1 kg, dry mass 1 kg
- road: 0.000427973 m*year; = (10000/25)* lifetime; source Vestas 2011, p. p.81; lognormal variance with pedigree 0.044225, pedigree (2,4,5,2,2)
  Literature value/estimation. Generally a combination of tarred roads and dirt roads need to be built to provide access to the power plant turbines, which are often located in remote locations. It has been estimated that 10 km of tarred road is needed for a power plant with 25 wind turbines.
  No maintenance is assumed.
  Uncertainty: estimated variance
- glass fibre reinforced plastic, polyamide, injection moulded: 0.000759365 kg; name glass_plastic; = 21507*0.6*1.1; source Elsam Engineering A/S,Fredericia,Denmark 2004, p. p. 25, Tab. 5.3; lognormal variance with pedigree 0.044225, pedigree (2,4,5,2,2)
  Literature value. Used for the rotor blades. Steel and aluminium blades are used for small wind turbines. For large ones, they have problems of weight or metal fatigue. Most modern rotor blades on large wind turbines are made of glass fiber reinforced polyester or epoxy. Carbon fiber or Kevlar seems to be too expensive for large turbines. [Chataignere A. and Le Boulch D. (2003) Wind Turbine Systems. Final report ECLIPSE. EDF R&D, Clamart Cedex, France.]
  Prepreg is a glass fibre mat impregnated with epoxy resin used for the blades in this dataset. It was not possible to get information on the exact composition of Prepreg. From the supplier’s PrePreg safety data sheets it is assumed that Prepreg consists of approx 40% epoxy and 60% glass fibre. Total Prepreg mass is 21507 kg. When using PrePreg in the manufacturing process, up to 10% of the PrePreg turns into waste due to cutoffs.
  Uncertainty: estimated variance
  properties: carbon content, fossil 0.446018, dry mass 1 kg, wet mass 1 kg
  note on carbon content, fossil: Polyamide resin assimilate to Nylon 66 (ecoinvent v2.2 report 7_XIII). Nylon 66 is derived from hexamethylene diamine and adipic acid and has the following structure: -(HN-(CH2)6-NH-CO-(CH2)4-CO)n- (ecoinvent v2.2 report 11_II), C12H22N2O2. MW=226 g/mol. Here Nylon 66 is – mainly for improved stiffness and stability – modified with glass fibres. The glass fibre content in the product is assumed of 30%. (ecoinvent v2.2 report 11_II)
- waste reinforced concrete: -0.00303498, -3.21579e-5, -0.0433145 kg (3 entries)
  Calculated value. A density of 2400kg/m3 is assumed for the reinforced concrete.
  production volume 8.11948e9 kg
  properties: water content 0.00585407, wet mass 1 kg, dry mass 0.99418 kg, lifetime 20 year
- scrap copper: -4.77863e-5, -2.24203e-6, -0.000100618 kg (3 entries)
  Calculated value. It can be assumed that 100% of the copper enter a recycling process.
  production volume 2.63719e7 kg
  properties: dry mass 1 kg, wet mass 1 kg, lifetime 20 year
- waste polyethylene: -1.59011e-5, -1.22588e-6, -5.06331e-7, -4.80809e-7, -1.8347e-5, -2.04552e-7, -9.27111e-8, -0.000128439 kg (8 entries)
  Calculated value
  production volume 2.89192e7 kg
  properties: water content 0.00401606, dry mass 0.996 kg, wet mass 1 kg, carbon content, fossil 0.825301, lifetime 20 year
- waste plastic, mixture: -3.65462e-5, -2.8175e-6, -1.16373e-6, -1.10507e-6, -4.21679e-5, -4.70133e-7, -2.13083e-7, -0.000295199 kg (8 entries)
  (same comment as for waste plastic, mixture)
  production volume 6.64665e7 kg
  properties: water content 0.180638, dry mass 0.847 kg, wet mass 1 kg, carbon content, fossil 0.747344, lifetime 20 year
- scrap steel: -0.00273121, -3.45294e-6, -0.00848203 kg (3 entries)
  (same comment as for scrap steel)
  production volume 1.96357e9 kg
  properties: dry mass 1 kg, wet mass 1 kg, lifetime 20 year
- waste glass: -5.77988e-5, -2.80448e-6, -2.61654e-7, -1.17081e-6, -3.0428e-5, -3.97336e-7, -6.36243e-8, -0.000286758 kg (8 entries)
  (same comment as for waste glass)
  production volume 6.64665e7 kg
  properties: dry mass 1 kg, wet mass 1 kg, lifetime 20 year
- waste polyethylene/polypropylene product: -0.000141998, -4.26099e-6, -0.000359984 kg (3 entries)
  (same comment as for waste polyethylene/polypropylene product)
  production volume 8.8622e7 kg
  properties: carbon content, fossil 0.748045, water content 0.180638, dry mass 0.847 kg, wet mass 1 kg, lifetime 20 year
- epoxy resin, liquid: 8.80863e-5, 0.000418157 kg (2 entries)
  (same comment as for epoxy resin, liquid)

## Inputs from nature
- Transformation, to industrial area [natural resource, land]: 1.20367e-5 m2; = land_from
  Calculated value
- Transformation, from pasture, man made [natural resource, land]: 1.20367e-5 m2; name land_from; = 15*15; source Elsam Engineering A/S,Fredericia,Denmark 2004; lognormal variance with pedigree 0.216, pedigree (5,5,5,5,5)
  Literature value. The foundation for the onshore turbine consists of plate foundations made with reinforced concrete.
  Typically, the size is 15 × 15 metres and 2 metres deep.
  Uncertainty: Estimated variance.
- Occupation, industrial area [natural resource, land]: 0.000240735 m2*year; = land_from*lifetime
  Calculated value

## Sampling procedure
Literature, estimations, item lists

## Extrapolations
This dataset valid for 2MW onshore wind turbines is based on one single type of a 2MW onshore wind turbine (Vestas 2MW wind turbine; where Vestas held a market share of ca.20% in the wind turbine market in 2001/02 (Chataignère et al. 2003)).

[Chataignere A. and Le Boulch D. (2003) Wind Turbine Systems. Final report ECLIPSE. EDF R&D, Clamart Cedex, France.]

## Review by Bo Weidema 2012-02-23
This dataset has only been reviewed by two editors.

## Review by Carl Vadenbo 2012-02-23
The dataset were found to meet the quality guidelines for the ecoinvent database on 2012.04.06.

Improvements in the following areas/aspects are recommended for future revisions in order to strenghen the overall quality of the dataset:
-energy use and emissions arising during the manufacturing process of the components and during the final assembly;
-material losses during manufacturing
-packaging materials;
-transport of components between the location of the manufacturing processes and the site of the installation;

Furthermore, in the modeling of the output of material from the wind mill rotor blades, waste plastics and waste glass have been used as proxy exchanges which represent a simplification of reality. To improve the quality of the dataset and to enable the identification of the appropriate treatment activities, it is hence recommended that the output material(s) from the rotor blades is more accurately described and defined in future revisions of the dataset.
