# treatment of used liquid crystal display, mechanical treatment

Dataset: EcoSpold 2, unit process
Geography: GLO
Time period: 2005-01-01 to 2019-12-31
Technology level: current
Classification: EcoSpold01Categories: waste management/recycling
Classification: ISIC rev.4 ecoinvent: 3830:Materials recovery
Tags: ConvertedDataset; Treatment
Scenario: Business-as-Usual
System model: Allocation at the point of substitution
Generated by: Roland Hischier
Published in: Hischier R. 2007
Database: ecoinvent
isCopyrightProtected: true
accessRestrictedTo: 1

## General comment
manual dismantling plus subsequent shredding/separation procedure, based on common transfer coefficients for both steps. Data from literature and from own experiences in Switzerland.
[This dataset was already contained in the ecoinvent database version 2. It was not individually updated during the transfer to ecoinvent version 3. Life Cycle Impact Assessment results may still have changed, as they are affected by changes in the supply chain, i.e. in other datasets. This dataset was generated following the ecoinvent quality guidelines for version 2. It may have been subject to central changes described in the ecoinvent version 3 change report (http://www.ecoinvent.org/database/ecoinvent-version-3/reports-of-changes/), and the results of the central updates were reviewed extensively. The changes added e.g. consistent water flows and other information throughout the database. The documentation of this dataset can be found in the ecoinvent reports of version 2, which are still available via the ecoinvent website. The change report linked above covers all central changes that were made during the conversion process.]

## Included activities end
This dataset represents the mechanical treatment of a WEEE devices in Switzerland. Two process steps are included: manual depollution and the mechanical treatment (shredder) of the remaining part.

## Geography
European data, used as average for global situation

## Technology
4-step-procedure (shredder - separation - shredder - separation) as used currently often in Europe

## Reference product
- iron scrap, sorted, pressed: 1 kg; By-product classification Recyclable; CPC 39310: Slag, dross, scalings and other waste from the manufacture of iron or steel; pedigree (1,1,1,1,1)
  replaces the original flow "Fe fraction of used liquid crystal display from mechanical treatment"
  production volume 0.00701646 kg
    Unkonwn
    Calculated from the production volume of used liquid crystal display in proportion to the respective output amounts.
  property price 0.175 EUR2005
    Temporary price data. Calculated as 90% of purchasers price based on: 2005 import and export prices (total trades (USD) divided by total weight (kg) in biggest economies of the world: EU27, USA, Brasil, China, India, Japan and Russia) from UN Commodity Trade Statistics Database (http://data.un.org/Explorer.aspxDatabase [Accessed 2011.06.20]). Commodity: Waste or scrap, of cast iron
  property carbon content 0
    carbon content on a dry matter basis (reserved; not for manual entry)
  property true value 0.0013461
    allocation property applied in "true value" allocation // value calculated from revenue
  properties: water in wet mass 0 kg, dry mass 1 kg, carbon content, non-fossil 0, carbon content, fossil 0, wet mass 1 kg, water content 0, carbon allocation 0 kg
- used liquid crystal display: 0 kg; CPC 39990: Other wastes n.e.c.; By-product classification Waste
  EcoSpold01Location=GLO
  production volume 0.77 kg
    Unkonwn
    proportion; source: Hischier 2005
  property price 0 EUR2005
    Waste products are assigned a price of zero as they are assumed to require further treatment.
  property carbon content, fossil 0.307481
    Composition data from LCD screen, divided by its weight, 5.14 kg (Tab 4.12, ecoinvent v2.2 report 18_V)
  property carbon content, non-fossil 7.44321e-5
    (same comment as for used liquid crystal display)
  property carbon content 0.307556
    carbon content on a dry matter basis (reserved; not for manual entry)
  property true value 0
    allocation property applied in "true value" allocation // value calculated from revenue
  properties: wet mass 1 kg, water content 0, dry mass 1 kg, water in wet mass 0 kg, carbon allocation 0.307556 kg
- iron scrap, unsorted: 0 kg; source European Aluminium Association 2008; CPC 39310: Slag, dross, scalings and other waste from the manufacture of iron or steel; By-product classification Recyclable; pedigree (1,1,1,1,1)
  production volume 7.11275e-5 kg
  property price 0.149 EUR2005; name ironScrapAmount_price_EUR2005
    Temporary price data. Calculated as 90% of purchasers price based on: estimated at 85% of sorted scrap
  property carbon content 0
    carbon content on a dry matter basis (reserved; not for manual entry)
  property true value 1.33645e-5
    allocation property applied in "true value" allocation // value calculated from revenue
  properties: water in wet mass 0 kg, water content 0, carbon content, fossil 0, carbon content, non-fossil 0, dry mass 1 kg, wet mass 1 kg, carbon allocation 0 kg
- aluminium oxide, non-metallurgical: 0 kg; source European Aluminium Association 2008; CPC 41432: Alumina (aluminium oxide), except artificial corundum; By-product classification allocatable product; CAS 1344-28-1; pedigree (1,1,1,1,1)
  production volume 0.00330546 kg
  property carbon content, non-fossil 0; name C_content_non_fossil
  property price 0.28 EUR2005; name Al2O3Amount_price_EUR2005
    From UN trade database. http://data.un.org/ Import data from the largest economies of the world are used (Brazil, India, USA, China, Japan and EU-27).
  property dry mass 1 kg; name DM
  property water content 0; name water_content
  property wet mass 1 kg; name WM
  property water in wet mass 0 kg; name WWM
  property carbon content, fossil 0; name C_content_fossil
  property carbon content 0
    carbon content on a dry matter basis (reserved; not for manual entry)
  property true value 0.00115479
    allocation property applied in "true value" allocation // value calculated from revenue
  properties: carbon allocation 0 kg
- aluminium, cast alloy: 0 kg; source European Aluminium Association 2008; By-product classification allocatable product; CPC 41431: Unwrought aluminium; pedigree (1,1,1,1,1)
  EcoSpold01Location=RER
  production volume 0.0308988 kg
  property price 1.3 EUR2005; name castAlloyAmount_price_EUR2005
    Temporary price data. Calculated as 90% of purchasers price based on: Source: London Metal Exchange, Aluminium alloy price for 2005
  property carbon content 0
    carbon content on a dry matter basis (reserved; not for manual entry)
  property true value 0.0501183
    allocation property applied in "true value" allocation // value calculated from revenue
  properties: water in wet mass 0 kg, carbon content, non-fossil 0, water content 0, dry mass 1 kg, carbon content, fossil 0, wet mass 1 kg, carbon allocation 0 kg
- heat, for reuse in municipal waste incineration only: 0 MJ; CPC 17300: Steam and hot water; By-product classification allocatable product; pedigree (1,1,1,1,1)
  Net electricity generated from this waste and used in internal MSWI plant energy redistribution.
  Uncertainty: uncertainty is calculated from uncertainties in waste composition and uncertainties in energy efficiency and the uncertainty in internal energy demand
  production volume 5.21066 MJ
  property exergy 0.1842 MJ; name E_th_prod_MSWI_exergy
    This exergy property is based on the exergy content of the product.
  property true value relation 0.1842; name E_th_prod_MSWI_true_value_relation
    property to calculate "true value" from
  property price 0.0106 EUR2005; name E_th_prod_MSWI_price_EUR2005
    Average European district heat price from Ecoheatcool and Euroheat 2005-2006, Ecoheat Work package 1: The European heat market. Final report. 10.6 EUR/GJ i s the price of district heat. http://www.solarthermalworld.org/files/Ecoheatcool%20WP1%20Web.pdf?download
  property true value 0.0222056
    allocation property applied in "true value" allocation // value calculated from true value relation
- electricity, for reuse in municipal waste incineration only: 0 kWh; CPC 17100: Electrical energy; By-product classification allocatable product; pedigree (1,1,1,1,1)
  (same comment as for heat, for reuse in municipal waste incineration only)
  production volume 0.729416 kWh
  property exergy 3.6 MJ; name E_el_prod_MSWI_exergy
    This exergy property is based on the exergy content of the product.
  property true value relation 3.6; name E_el_prod_MSWI_true_value_relation
    property to calculate "true value" from
  property price 0.1 EUR2005; name E_el_prod_MSWI_price_EUR2005
    Estimated to be the same price as in case of electricity, medium voltage.
  property true value 0.0607192
    (same comment as for heat, for reuse in municipal waste incineration only)
- aluminium, wrought alloy: 0 kg; source European Aluminium Association 2008; By-product classification allocatable product; CPC 4153: Semi-finished products of aluminium or aluminium alloys; pedigree (1,1,1,1,1)
  production volume 0.0135269 kg
  property price 1.44 EUR2005; name secondaryAluminiumOutput_price_EUR2005
    Estimated based on literature values and expert judgement. Aluminium ccast alloys are about 90% of the price of aluminium wrought alloys.
  property carbon content 0
    carbon content on a dry matter basis (reserved; not for manual entry)
  property true value 0.0243037
    allocation property applied in "true value" allocation // value calculated from revenue
  properties: wet mass 1 kg, water content 0, carbon content, fossil 0, water in wet mass 0 kg, carbon content, non-fossil 0, dry mass 1 kg, carbon allocation 0 kg
- lead: 0 kg; CPC 41441: Lead, unwrought; By-product classification allocatable product
  EcoSpold01Location=SE
  production volume 0.000864132 kg
  property price 0.744 EUR2005
    Temporary price data. Calculated as 90% of purchasers price based on: Source: ecoinvent v2 report 10-part IX, Tab 5.10 & 2.5
  property carbon content 0
    carbon content on a dry matter basis (reserved; not for manual entry)
  property true value 0.000834954
    allocation property applied in "true value" allocation // value calculated from revenue
  properties: wet mass 1 kg, water content 0, carbon content, non-fossil 0, carbon content, fossil 0, dry mass 1 kg, water in wet mass 0 kg, carbon allocation 0 kg
- copper: 0 kg; By-product classification allocatable product; CPC 41413: Refined copper and copper alloys, unwrought; master alloys of copper
  EcoSpold01Location=SE
  production volume 0.0172322 kg
  property price 5.52 EUR2005
    Literature value (http://www.economist.com/news/business/21576714-mining-industry-has-enriched-chile-its-future-precarious-copper-solution). Average price between 20015 and 2013.
  property carbon content 0
    carbon content on a dry matter basis (reserved; not for manual entry)
  property true value 0.107705
    allocation property applied in "true value" allocation // value calculated from revenue
  properties: water content 0, water in wet mass 0 kg, carbon content, fossil 0, carbon content, non-fossil 0, dry mass 1 kg, wet mass 1 kg, carbon allocation 0 kg
- nickel, 99.5%: 0 kg; CPC 41422: Unwrought nickel; By-product classification allocatable product
  EcoSpold01Location=SE
  production volume 0.00180385 kg
  property price 10.4 EUR2005
    Temporary price data. Calculated as 90% of purchasers price based on: 2004 nickel price from USGS (2007) Mineral commodity summaries 2007. <http://minerals.usgs.gov/minerals/pubs/mcs/2007/mcs2007.pdf> [Accessed 25 May 2010]
  property carbon content 0
    carbon content on a dry matter basis (reserved; not for manual entry)
  property true value 0.0243637
    allocation property applied in "true value" allocation // value calculated from revenue
  properties: water in wet mass 0 kg, wet mass 1 kg, carbon content, non-fossil 0, dry mass 1 kg, water content 0, carbon content, fossil 0, carbon allocation 0 kg
- silver: 0 kg; CPC 41310: Silver (including silver plated with gold or platinum), unwrought or in semi-manufactured forms, or in powder […]; By-product classification allocatable product; CAS 7440-22-4
  EcoSpold01Location=SE
  production volume 0.000297888 kg
  property price 178 EUR2005
    (same comment as for lead)
  property carbon content 0
    carbon content on a dry matter basis (reserved; not for manual entry)
  property true value 0.0688625
    allocation property applied in "true value" allocation // value calculated from revenue
  properties: wet mass 1 kg, carbon content, non-fossil 0, dry mass 1 kg, water content 0, carbon content, fossil 0, water in wet mass 0 kg, carbon allocation 0 kg
- palladium: 0 kg; CPC 4160: Other non-ferrous metals and articles thereof (including waste and scrap of some metals); cermets and articles […]; By-product classification allocatable product
  EcoSpold01Location=SE
  production volume 1.64901e-5 kg
  property price 5640 EUR2005
    Temporary price data. Calculated as 90% of purchasers price based on: 2004 price from USGS (2007) Mineral commodity summaries 2007. <http://minerals.usgs.gov/minerals/pubs/mcs/2007/mcs2007.pdf> [Accessed 25 May 2010]
  property carbon content 0
    carbon content on a dry matter basis (reserved; not for manual entry)
  property true value 0.120784
    allocation property applied in "true value" allocation // value calculated from revenue
  properties: wet mass 1 kg, carbon content, fossil 0, water in wet mass 0 kg, water content 0, carbon content, non-fossil 0, dry mass 1 kg, carbon allocation 0 kg
- gold: 0 kg; CPC 41320: Gold (including gold plated with platinum), unwrought or in semi-manufactured forms, or in powder form; By-product classification allocatable product; CAS 7440-57-5
  EcoSpold01Location=SE
  production volume 9.04309e-6 kg
  property price 10600 EUR2005
    Temporary price data. Calculated as 90% of purchasers price based on: Source: ecoinvent v2 report 10-part IX, Tab 2.5
  property carbon content 0
    carbon content on a dry matter basis (reserved; not for manual entry)
  property true value 0.124489
    allocation property applied in "true value" allocation // value calculated from revenue
  properties: wet mass 1 kg, carbon content, fossil 0, dry mass 1 kg, carbon content, non-fossil 0, water content 0, water in wet mass 0 kg, carbon allocation 0 kg
- mercury: 0 kg; CPC 4160: Other non-ferrous metals and articles thereof (including waste and scrap of some metals); cermets and articles […]; By-product classification allocatable product; CAS 7439-97-6
  production volume 4.2735e-5 kg
  property price 12.5 EUR2005
    Temporary price data. Calculated as 90% of purchasers price based on: 2005 import and export prices (total trades (USD) divided by total weight (kg) in biggest economies of the world: EU27, USA, Brasil, China, India, Japan and Russia) from UN Commodity Trade Statistics Database (http://data.un.org/Explorer.aspxDatabase [Accessed 2011.06.20]). Commodity: Mercury
  property carbon content 0
    carbon content on a dry matter basis (reserved; not for manual entry)
  property true value 0.00069375
    allocation property applied in "true value" allocation // value calculated from revenue
  properties: carbon content, fossil 0, water in wet mass 0 kg, water content 0, dry mass 1 kg, wet mass 1 kg, carbon content, non-fossil 0, carbon allocation 0 kg
- glass cullet, for Saint-Gobain ISOVER SA: 0 kg; CPC 37111: Glass in the mass, in balls (except microspheres), rods or tubes, unworked; waste and scrap of glass; By-product classification Recyclable; pedigree (1,1,1,1,1)
  production volume 2.65112e-5 kg
  property price 0.08 EUR2005
    Estimated to be the same price as for glass cullet, sorted (Temporary price data. The price of the glass cullet, sorted is estimated to be two times higher than the price of the waste packaging glass, unsorted.).
  property true value 2.75441e-6
    allocation property applied in "true value" allocation // value calculated from revenue
  properties: dry mass 1 kg, wet mass 1 kg
- zinc concentrate: 0 kg; CPC 14290: Other non-ferrous metal ores and concentrates (other than uranium or thorium ores and concentrates); By-product classification allocatable product
  Calculated value from the knowledge of the properties of both products.
  production volume 0.000127663 kg
  property price 0.38 EUR2005; name ByP_price_EUR2005
    Temporary price data. Calculated as 90% of purchasers price based on: Zinc content in concentrate 53%. Concentrate price per kg Zn 86.5% of refined Zn price (13.5% treatment charges according to CHR Metals Limited 2005: Dynamic cost curves. http://www.minecost.com/dynamic.pdf). 2004 zinc price from USGS (2007) Mineral commodity summaries 2007. <http://minerals.usgs.gov/minerals/pubs/mcs/2007/mcs2007.pdf> [Accessed 25 May 2010]
  property zinc content 0.53; name zinc_C_zinc_concentrate
    Zinc content on a dry matter basis. Value taken from teh "zinc mine operation" /GLO dataset.
  property dry mass 1 kg; name DM_zinc_concentrate
  property carbon content 0
    carbon content on a dry matter basis (reserved; not for manual entry)
  property true value 9.37801e-7
    allocation property applied in "true value" allocation // value calculated from revenue
  properties: wet mass 1 kg, water content 0, carbon content, non-fossil 0, carbon content, fossil 0, water in wet mass 0 kg, carbon allocation 0 kg
- heat, district or industrial, other than natural gas: 0 MJ; CPC 17300: Steam and hot water; By-product classification allocatable product; pedigree (1,1,1,1,1)
  net production of heat from landfill gas utilisation.
  Uncertainty: U
  production volume 1.55773e-12 MJ
  property price 0.0106 EUR2005
    (same comment as for heat, for reuse in municipal waste incineration only)
  property carbon content 0
    carbon content on a dry matter basis (reserved; not for manual entry)
  property true value 1.31233e-14
    (same comment as for heat, for reuse in municipal waste incineration only)
  properties: wet mass 1 kg, water content 0, water in wet mass 0 kg, true value relation 0.1842, dry mass 1 kg, carbon content, non-fossil 0, carbon content, fossil 0, carbon allocation 0 kg
- electricity, medium voltage: 0 kWh; By-product classification allocatable product; CPC 17100: Electrical energy; pedigree (1,1,1,1,1)
  net production of electricity from landfill gas utilisation (minus electricity demand for landfill gas pumping).
  Uncertainty: U
  production volume 8.63714e-13 kWh
  property price 0.1 EUR2005
    Calculated to be between the price of electricity, high voltage and electricity, low voltage.
  property true value 1.42212e-13
    (same comment as for heat, for reuse in municipal waste incineration only)
  properties: true value relation 3.6

## Inputs from technosphere
- waste electric and electronic equipment: -0.105959 kg; lognormal variance with pedigree 0.134, pedigree (3,4,5,1,4)
  Rough estimation
  EcoSpold01Location=GLO
  Uncertainty: rough estimation
  production volume 0.347424 kg
    Calculated from the production volume of used liquid crystal display in proportion to the respective output amounts.
  properties: wet mass 1 kg, dry mass 1 kg, carbon content, non-fossil 0.000485011, carbon content, fossil 0.0877555
- aluminium scrap, post-consumer, prepared for melting: -0.012821 kg; lognormal variance with pedigree 0.2106, pedigree (5,5,5,5,5)
  replaces the original flow "Al fraction of used liquid crystal display from mechanical treatment"
  production volume 0.0420382 kg
    (same comment as for iron scrap, sorted, pressed)
  property water in wet mass 0 kg; name WWM
  property carbon content, non-fossil 0; name C_content_non_fossil
  property wet mass 1 kg; name WM
  property dry mass 1 kg; name DM
  property carbon content, fossil 0; name C_content_fossil
  property water content 0; name water_content
  properties: price 0.806 EUR2005
- used printed wiring boards: -0.00502553 kg; lognormal variance with pedigree 0.054, pedigree (3,4,5,1,1)
  Calculated - based on composition data
  EcoSpold01Location=GLO
  Uncertainty: calculated - based on composition data
  production volume 0.016478 kg
    (same comment as for waste electric and electronic equipment)
  properties: carbon content, non-fossil 0.000960142, wet mass 1 kg, carbon content, fossil 0.193742, dry mass 1 kg
  note on carbon content, non-fossil: Composition of printed wiring boards used to calculate C content
- waste plastic, consumer electronics: 0 kg; pedigree (1,1,1,1,1)
  EcoSpold01Location=CH
  Calculated - based on composition data
  Uncertainty: calculated - based on composition data
  production volume 0 kg
    (same comment as for waste electric and electronic equipment)
  properties: wet mass 1 kg, water content 0.180638, carbon content, fossil 0.830215, dry mass 0.847 kg
  note on carbon content, fossil: C content in 1 kg DM was calculated using data in Tab A.2, ecoinvent v2.2 report 13_I
- electronics scrap: -0.0114436 kg; lognormal variance with pedigree 0.2106, pedigree (5,5,5,5,5)
  replaces the original flow "Cu fraction of used liquid crystal display from mechanical treatment"
  production volume 0.0375221 kg
    (same comment as for iron scrap, sorted, pressed)
  properties: price 16.1 EUR2005, wet mass 1 kg, dry mass 1 kg
- used liquid crystal display module: 0 kg; pedigree (1,1,1,1,1)
  Calculated - based on composition data
  EcoSpold01Location=CH
  Uncertainty: calculated - based on composition data
  production volume 0 kg
    (same comment as for waste electric and electronic equipment)
  properties: dry mass 1 kg, carbon content, non-fossil 4.20542e-5, wet mass 1 kg, carbon content, fossil 0.327872
- residue from mechanical treatment, liquid crystal display: 0 kg; pedigree (1,1,1,1,1)
  (same comment as for waste plastic, consumer electronics)
  production volume 0 kg
    (same comment as for waste electric and electronic equipment)
  properties: dry mass 1 kg, carbon content, fossil 0.809363, wet mass 1 kg
  note on carbon content, fossil: Tab 4.29, ecoinvent v2.2 report 18_V, for details in fraction composition. Carbon content in plastic was calculated using data in Tab A.2, ecoinvent v2.2 report 13_I. Others was also considered plastic, and calculated the same way (from pg 70, ecoinvent v2.2 report 18_V). Ferro was assumed to have a C content of 0.012 kg C/ kg (C content of steel, calculated out of emission factors published in Commission Decision of 18 July 2007 establishing guidelines for the monitoring and reporting of greenhouse gas emissions pursuant to Directive 2003/87/EC of the European Parliament and of the Council (notified under document number C(2007) 3416)). The other component of the fraction were considered to content no C.
- used fluorescent lamp: -0.0026067 kg; lognormal variance with pedigree 0.054, pedigree (3,4,5,1,1)
  EcoSpold01Location=GLO
  Calculated - based on composition data
  Uncertainty: calculated - based on composition data
  production volume 0.008547 kg
    (same comment as for waste electric and electronic equipment)
  properties: carbon content, fossil 0.554974, dry mass 1 kg, wet mass 1 kg
  note on carbon content, fossil: CCFL backlight lamps is used as a specific example of fluorescent lamps (ecoinvent v2.2 report 18_V)
- waste plastic, consumer electronics: -8.24819e-5, -0.00545969 kg (2 entries); lognormal variance with pedigree 0.054, pedigree (3,4,5,1,1)
  (same comment as for waste plastic, consumer electronics)
  production volume 0.018172 kg
- used liquid crystal display module: -0.00154304, -0.102138 kg (2 entries); lognormal variance with pedigree 0.054, pedigree (3,4,5,1,1)
  (same comment as for used liquid crystal display module)
  production volume 0.339955 kg
- residue from mechanical treatment, liquid crystal display: -0.00119532, -0.0791215 kg (2 entries); lognormal variance with pedigree 0.054, pedigree (3,4,5,1,1)
  (same comment as for waste plastic, consumer electronics)
  production volume 0.263348 kg

## Sampling procedure
literature and own experiences

## Review by Bo Weidema 2012-05-31
Passed. This dataset is based on an earlier ecoinvent dataset. The outputs are now specified in terms of materials that can be treated by existing treatment activities.

## Review by Jürgen Sutter 2007-08-31
passed.
