# electricity production, hard coal

Dataset: EcoSpold 2, unit process
Geography: MY
Time period: 1980-01-01 to 2019-12-31
Technology level: modern
Classification: ISIC rev.4 ecoinvent: 3510:Electric power generation, transmission and distribution
Classification: EcoSpold01Categories: hard coal/power plants
Synonyms: anthracite; coking coal; other bituminous coal
Tags: hard coal power; fossil fuels; coal power
Scenario: Business-as-Usual
System model: Allocation at the point of substitution
Generated by: Karin Treyer
Published in: Röder, A. 2007
Database: ecoinvent
isCopyrightProtected: true
accessRestrictedTo: 1

## General comment
This dataset represents the production of high voltage electricity in an average hard coal power plant in Malaysia in 2012. 'Hard coal' includes anthracite, coking coal and other bituminous coal according to the definition of the IEA electricity information 2014. (IEA. 2014. Electricity Information 2014. ISBN 978-92-64-21692-1. International Energy Agency (IEA), Paris Cedex (FR).)
All exchanges in this dataset except for emissions of SO2, NOx and particles are production-weighted averages of the figures in the datasets in ecoinvent version two, which are valid for the following 14 countries: AT, BE, ES, FR, IT, NL, PT, DE, CZ, HR, PL, SK, CN, US. The exception values are production-weighted averages of version 2 countries and the new countries in version 3 (AU, CA, CL, ID, IN, KR, MX, MY, PE, RU, TH, TR, TW, TZ, UA, ZA)
Comments on the inventory data of emissions:
- For the assessment of main characteristics (sulphur and ash content of coal, efficiency of the plant) and CO2 a bottom-up approach has been used. It consists in the collection of information about single plants.
- The size distribution of particle emissions has been derived from German data.
- Halogene emissions have been estimated on the basis of the content of the species in the country-specific coal input mix, assuming average retention rates.
- For CO and particle emissions average values for the former UCTE are included (Union for the Coordination of the Transmission of Electricity, since 2009 replaced by ENTSO-E European Network of Transmission System Operators for Electricity).
- The country specific emission depend on the share of DeNOx.
- Emissions of trace elements were calculated by means of a formula (CORINAIR) using the ash content in the country-specific coal input mix and average transfer coefficients for coal power plants, taking into account the share of DeSOx installed.
- Emission of uranium and thorium radioactive isotopes were assumed proportional to the corresponding element emitted with particles; the other non-gaseous radioactive isotopes of the uranium and thorium decay chain were assumed proportional to the emitted U-238 or Th-232.
- The emission of gaseous radon and K-40 are taken from the literature.
IEA. 2009. Coal information, 2009 edition. Documentation for beyond 2020 files. International Energy Agency.
European Environment Agency (1991) CORINAIR Inventory; VOC's Default Emission Factors

## Included activities start
From the constructed hard coal power plant ready to produce electricity.
From reception of hard coal and operating materials at power plant gate.

## Included activities end
This activity ends with 1kWh of high voltage electricity produced at the power plant and arrived at the busbar.

This dataset includes:
- all operation and maintenance activities and materials of the power plants.
- Use of fuel oil for startup
- Particle removal (dedusting of the flue gas)

- Desulfurisation and denitrification. These processes are described in separate modules; it can be decided by changing the values of NOx and SOx retained whether and how much DeNOx and DeSOx are installed.
- Cooling: It is assumed that all plants use wet cooling with a cooling tower. No cooling tower is included in this dataset (will be implemented in future versions)
- Loss of feed water
- Transport of the hard coal from the delivering country to Malaysia, but not the transports within Malaysia.

This dataset doesn't include
- raw materials extraction, decommissioning and waste treatment as these activities are already included in the infrastructure datasets
- transformation of the electricity produced
- The disposal of non-recycled ashes is modelled separately.

## Technology
POWER PLANT:
Hard coal power plant input is a market mix of 100MWe power plants (representing all power plants with a capacity <250MWe and 7% of the installed capacity) and 500MWe power plants (representing all power plants with a capacity >250MWe and 93% of the installed capacity). The plants are used for middle load with 4000 hours of operation at full capacity per year. The plants are assumed to operate 150000 hours during its lifetime.
OTHER DATA:
- Share of installed capacity with desulfurisation 77% (figure based on IEA 212 )
- Average efficiency of desulfurisation installations: 97% (figure based on IEA 212 )
- Share of installed capacity with denitrification (primary and/or secondary installations): 79% (figure based on IEA 212 )
- Average efficiency of denitrification installations: 6% (estimation based on Dones et al. 27, p.128. Valid for primary denitrification systems)
- Share of installed capacity with particle filters: 81% (figure based on IEA 212 )
- Average efficiency of particle filters: 99.3% (figure based on IEA 212 )
- IEA 2012. Coal Power Database. International Energy Agency Clean Coal Centre, London
- IEA/OECD. 2010. Electricity Information 2010. International Energy Agency (IEA), Paris Cedex (FR). Part IV. Detailed OECD Electricity And Heat Data.
- Dones, R., Bauer, C., Röder, A. (2007) Kohle. In: Dones, R. (Ed.) et al., Sachbilanzen von Energiesystemen: Grundlagen für den ökologischen Vergleich von Energiesystemen und den Einbezug von Energiesystemen in Ökobilanzen für die Schweiz. Final report ecoinvent No.

## Time period
The Annual Production Volume is valid for the year 2012.

## Parameters
- losses from gross electricity production: 0.07 dimensionless; name losses_gross_net; lognormal variance with pedigree 0.003525, pedigree (3,2,2,2,2)
  Calculated value. Own use of electricity plants in this country in 2012. For the non-OECD countries, the losses were first calculated for the total electricity sector based on the IEA electricity information 2014, table 1.1 (net electricity = gross electricity minus own use). However, this value can be very low if the share of electricity from fossiles is low in a specific country. Therefore, the default loss as described by the IEA in the electricity statistic is applied, which is 0.07 (IEA electricity information 2014: The difference between gross and net electricity production is generally observed to be about 7% for conventional thermal stations, 1% for hydro stations and 6% for nuclear.)
  IEA. 2014. Electricity Information 2014. ISBN 978-92-64-21692-1. International Energy Agency (IEA), Paris Cedex (FR).
  nan
  Uncertainty: Generic IEA value used.
- efficiency: 0.315 dimensionless; lognormal variance with pedigree 0.004225, pedigree (3,3,1,2,2)
  Literature value/calculated value. Net electrical efficiency based on the lower heating value (LHV).
  For all OECD countries, the IEA Electricity information 2014 provides data for the year 2012 on fuel input (TJ, Net calorific value NCV) and gross electricity production (GWh) as well as heat production (TJ) in tables 8 and 9 for each country for electricity only and Combined Heat and Power (CHP) plants each. Together with the information on own use (see parameter 'losses'), the net electrical efficiency based on the NCV is calculated.
  For all non-OECD countries, data from the IEA Energy balances of non-OECD countries 2014 have been used. These tables do not always provide information on how much of the electricity has been produced in electricity only and in CHP plants, but often give the total value only.
  IEA. 2014. Electricity Information 2014. ISBN 978-92-64-21692-1. International Energy Agency (IEA), Paris Cedex (FR).
  IEA/OECD. 2014. Energy balances of non-OECD countries 2014. International Energy Agency (IEA), Paris Cedex (FR).
- gross electricity production: 5.5788e10 kWh; name gross_electricity; lognormal variance with pedigree 0.0012, pedigree (2,1,1,1,1)
  Literature value/statistics. Taken from the IEA electricity information 2014, table 1.3.
  IEA. 2014. Electricity Information 2014. ISBN 978-92-64-21692-1. International Energy Agency (IEA), Paris Cedex (FR).
  nan
- factor: input of MJ for the production of 1 kWh: 11.4286 MJ/kWh; name factor_MJ_kWh; = 1*3.6/efficiency; lognormal variance with pedigree 0.0532, pedigree (4,4,3,4,4)
  Calculated value. 3.6 MJ = 1kWh.
  nan
- fraction, water, completely softened, to air: 0.15; name fraction_WCS_to_air; = fraction_PW_to_air; lognormal variance with pedigree 0.092025, pedigree (4,4,3,2,4)
  Calculated value. See comment in the other parametres present in this dataset. Water, completely softened is considered to be always used as process water, thus process water fractions to air are applied to all water, completely softened input flows to calculate the amount of water consumed in the processes.
  nan
- fraction, water, decarbonised, to air: 0.0299662; name fraction_WDC_to_air; = fraction_CW_to_air; lognormal variance with pedigree 0.092025, pedigree (4,4,3,2,4)
  Calculated value. See comments in the other parametres present in this dataset. Decarbonised water is considered to be always used as cooling water, thus cooling water fractions to air are applied to all carbonised water input flows to calculate the amount of water consumed in the processes.
  nan
- once-through and cooling pond cooling systems as a fraction of all cooling syste: 0.625 dimensionless; name once_through_andCP_CS_fractio_from_allCS; lognormal variance with pedigree 0.092025, pedigree (4,4,3,2,4)
  Calculated as an average of data available for Europe (Floerke, 2008, Future changes of freshwater needs in the electricity production sector) and USA (NERL, 2011, Estimating freshwater needs to meet future thermoelectric generation requirements).
  nan
- water consumption, electricity production from hard coal, recirculating CS: 0.0018 m3/kWh; name WConsumption_EP_HC_recirculatingCS; lognormal variance with pedigree 0.092025, pedigree (4,4,3,2,4)
  Estimated based on literature (Scown, 2011, Water Footprint of U.S. Transportation Fuels, SI). The amount of water consumed while burning lignite and peat is assumed to be the same as in case of coal.
  nan
- water withdrawal, electricity production from hard coal, recirculating CS: 0.0021 m3/kWh; name WWithdrawal_EP_HC_recirculating_CS; lognormal variance with pedigree 0.092025, pedigree (4,4,3,2,4)
  Estimated based on literature (Scown, 2011, Water Footprint of U.S. Transportation Fuels, SI). The amount of water withdrawn while burning lignite and peat is assumed to be the same as in case of coal.
  nan
- fraction, cooling water, to air: 0.0299662; name fraction_CW_to_air; = (WConsumption_EP_HC_recirculatingCS*recirculating_CS_fraction_from_allCS+WConsumption_EP_HC_once_through_andCP_CS*once_through_andCP_CS_fractio_from_allCS)/(WWithdrawal_EP_HC_recirculating_CS*recirculating_CS_fraction_from_allCS+WWithdrawal_EP_HC_once_through_andCP_CS*once_through_andCP_CS_fractio_from_allCS); lognormal variance with pedigree 0.092025, pedigree (4,4,3,2,4)
  Calculated
  nan
- water withdrawal, electricity production from hard coal, once-through and coolin: 0.0815 m3/kWh; name WWithdrawal_EP_HC_once_through_andCP_CS; lognormal variance with pedigree 0.092025, pedigree (4,4,3,2,4)
  (same comment as for water withdrawal, electricity production from hard coal, recirculating)
- water consumption, electricity production from hard coal, once-through and cooli: 0.0014 m3/kWh; name WConsumption_EP_HC_once_through_andCP_CS; lognormal variance with pedigree 0.092025, pedigree (4,4,3,2,4)
  (same comment as for water consumption, electricity production from hard coal, recirculatin)
- recirculating cooling system as a fraction of all cooling systems: 0.375 dimensionless; name recirculating_CS_fraction_from_allCS; lognormal variance with pedigree 0.092025, pedigree (4,4,3,2,4)
  (same comment as for once-through and cooling pond cooling systems as a fraction of all coo)
- fraction, process water, to air: 0.15 dimensionless; name fraction_PW_to_air; lognormal variance with pedigree 0.092025, pedigree (4,4,3,2,4)
  Literature value. In case when no industry/process specific data are available, default evaporation fraction value is used. This value is 15% and is based on literature (Statistics Canada, 2007 & Shaffer, K.H., 2008, Consumptive water use in the Great Lakes Basin, USGS & Shiklomanov, 2003, World Water Resources at the Beginning of the 21st Century) and has been approved by an expert.
  nan

## Reference product
- electricity, high voltage: 1 kWh; name electricity; CPC 17100: Electrical energy; By-product classification allocatable product
  production volume 5.18828e10 kWh; name electricity_apv; = gross_electricity*(1- losses_gross_net)
    Calculated value
  property price 0.0977 EUR2005
    Temporary price data. Calculated as 90% of purchasers price based on: 94% of the average price (to account for a 6% loss in transformation and transmission) for electricity for industrial consumersin 2005 (excluded taxes). From IEA.
  property true value 0.0977; name electricity_true_value
    allocation property applied in "true value" allocation // value calculated from revenue

## By-products
- heat, for reuse in municipal waste incineration only: 0 MJ; CPC 17300: Steam and hot water; By-product classification allocatable product; pedigree (1,1,1,1,1)
  Net electricity generated from this waste and used in internal MSWI plant energy redistribution.
  Uncertainty: uncertainty is calculated from uncertainties in waste composition and uncertainties in energy efficiency and the uncertainty in internal energy demand
  production volume 1347.13 MJ
  property exergy 0.1842 MJ; name E_th_prod_MSWI_exergy
    This exergy property is based on the exergy content of the product.
  property price 0.0106 EUR2005; name E_th_prod_MSWI_price_EUR2005
    Average European district heat price from Ecoheatcool and Euroheat 2005-2006, Ecoheat Work package 1: The European heat market. Final report. 10.6 EUR/GJ i s the price of district heat. http://www.solarthermalworld.org/files/Ecoheatcool%20WP1%20Web.pdf?download
  property true value relation 0.1842; name E_th_prod_MSWI_true_value_relation
    property to calculate "true value" from
  property true value 1.70794e-10
    allocation property applied in "true value" allocation // value calculated from true value relation
- electricity, for reuse in municipal waste incineration only: 0 kWh; CPC 17100: Electrical energy; By-product classification allocatable product; pedigree (1,1,1,1,1)
  (same comment as for heat, for reuse in municipal waste incineration only)
  production volume 189.727 kWh
  property true value relation 3.6; name E_el_prod_MSWI_true_value_relation
    property to calculate "true value" from
  property price 0.1 EUR2005; name E_el_prod_MSWI_price_EUR2005
    Estimated to be the same price as in case of electricity, medium voltage.
  property exergy 3.6 MJ; name E_el_prod_MSWI_exergy
    This exergy property is based on the exergy content of the product.
  property true value 4.70117e-10
    (same comment as for heat, for reuse in municipal waste incineration only)

## Inputs from technosphere
- water, decarbonised: 2.28571 kg; name water_decarbonised_user; = factor_MJ_kWh*0.2; lognormal variance with pedigree 0.054, pedigree (4,5,4,5,3)
  Literature value/calculated value. Cooling water, decarbonised, for the cooling water circuit lost when producing 1kWh of electricity from hard coal, based on the value for burning 1MJ of hard coal. Röder et al. 2007, Tab. 9.65 and Tab. 9.66, p. 160f. These tables give an amount of 0.15 kg/MJ burned, which is valid for the assumption of 75% wet cooling and 25% run-through cooling. However, this revised dataset assumes 100% wet cooling.
  properties: wet mass 1 kg
- light fuel oil: 0.000194286 kg; name light_fuel_oil; = factor_MJ_kWh*0.000017; lognormal variance with pedigree 0.024, pedigree (3,4,4,5,1)
  Literature value/calculated value. Light fuel oil use per 1MJ of hard coal burned, use for start-up of the power plant after shut down. Weighted average with electricity production data (Itten&Frischknecht 2012) and ight fuel oil use values of 14 countries
  (AT, BE, ES, FR, IT, NL, PT, DE, CZ, HR, PL, SK, CN, US) (Röder et al. 2007)
  Country values are typical values for hard coal plants.
  Source:
  Itten R. and Frischknecht R. (2012) Life Cycle Inventories of Electricity Mixes and Grid. ESU-services Ltd., Uster, Switzerland.
  properties: carbon content, fossil 0.862, dry mass 1 kg, wet mass 1 kg
- residue from cooling tower: -6.28571e-5 kg; name amount_residue; = (factor_MJ_kWh*0.000005*1.1)*-1; lognormal variance with pedigree 0.0812, pedigree (5,3,4,5,2)
  Literature value/calculated value. Amount of cooling tower needed for producing 1kWh of electricity from hard coal, based on the value for burning 1MJ of hard coal. Weighted average with electricity production data (Itten&Frischknecht 2012) and values of 14 countries
  (AT, BE, ES, FR, IT, NL, PT, DE, CZ, HR, PL, SK, CN, US) (Röder et al. 2007) .
  Country values calculated from mass balance.
  Source:
  Itten R. and Frischknecht R. (2012) Life Cycle Inventories of Electricity Mixes and Grid. ESU-services Ltd., Uster, Switzerland.
  production volume 3.26121e6 kg; = amount_residue/electricity*electricity_apv
    Calculated from the production volume of hard coal, burned in power plant in proportion to the respective output amounts.
  property price 0 EUR2005; name amount_residue_price_EUR2005
  properties: wet mass 1 kg, water content 0.428571, carbon content, fossil 0.0544233, dry mass 0.7 kg
- transport, freight, sea, bulk carrier for dry goods: 1.68322 metric ton*km; = 0.40283/1000*2430+0.10358/1000*6800; lognormal variance with pedigree 0.31, pedigree (5,5,5,5,5)
  Estimation.
  Transport of the hard coal from Indonesia to Malaysia.
  Estimated ID port: Makassar
  Estimated MY port: Port Kelang
  Calculated distance: 2430 km
  http://sea-distances.com/
  Transport of the hard coal from Australia to Malaysia.
  Estimated AU port: Adelaida
  Estimated MY port: Port Kelang
  Calculated distance: 6800 km
  http://sea-distances.com/
  Domestic transports within MY are not modelled.
- NOx retained, by selective catalytic reduction: 0 kg; name nox_retained; source Itten R. 2012; pedigree (4,4,5,5,4)
  No SCR installed
  properties: wet mass 1 kg, dry mass 1 kg
- SOx retained, in hard coal flue gas desulfurisation: 0.00852 kg; name sox_retained; source IEA 2012; lognormal variance with pedigree 0.0057, pedigree (3,2,3,1,2)
  Calculated value departing from the installed desulfurisation, its efficiency and the SO2 emitted in the air (see Technology Comment for details).
  properties: wet mass 1 kg, dry mass 1 kg
- hard coal ash: -0.0854857 kg; name amount_ash; = (factor_MJ_kWh*0.00748)*-1; lognormal variance with pedigree 0.0986, pedigree (5,3,4,5,3)
  Literature value/calculated value. Hard coal ash produced when producing 1kWh of electricity from hard coal, based on the value for burning 1MJ of hard coal. Weighted average with electricity production data (Itten&Frischknecht 2012) and values of 12 countries
  (AT, BE, ES, FR, IT, NL, PT, DE, CZ, HR, PL, SK). These values were valid for the ash being disposed off. Now, total amount of ash has been calculated (disposed+recycled) with the data in Tab. 9.69 p. 165 in Röder et al. 2007. Globally, 74% of the lignite ash are recycled, 26% go to disposal.
  Source:
  Itten R. and Frischknecht R. (2012) Life Cycle Inventories of Electricity Mixes and Grid. ESU-services Ltd., Uster, Switzerland.
  production volume 4.43524e9 kg; = amount_ash/electricity*electricity_apv
    (same comment as for residue from cooling tower)
  property price 0 EUR2005; name amount_ash_price_EUR2005
  properties: dry mass 1 kg, wet mass 1 kg
- hard coal: 0.0901029 kg; = 0.0438* factor_MJ_kWh*0.18; source IEA 2012; lognormal variance with pedigree 0.21, pedigree (5,5,5,5,5)
  Calculated value. Coal origin: about 12% domestic, 88% imported (whereas 70% from Indonesia, 18% from Australia)
  properties: dry mass 0.94 kg, wet mass 1 kg, water content 0.0638298, carbon content, fossil 0.845
  note on carbon content, fossil: C content 75-94% (specified in Tab 1.1, report 6, part VI). A mean content of 0.845 kg C/ kg dry hard coal was considered
- water, completely softened: 0.0685714 kg; name water_completely_softened; = factor_MJ_kWh*0.006; lognormal variance with pedigree 0.054, pedigree (4,5,4,5,3)
  Literature value/calculated value. Feed water for the steam circuit lost when producing 1kWh of electricity from hard coal, based on the value for burning 1MJ of hard coal. Röder et al. 2007, Tab. 9.65 and Tab. 9.66, p. 160f.
  properties: wet mass 1 kg
- hard coal: 0.3504 kg; = 0.0438* factor_MJ_kWh*0.7; source IEA 2012; lognormal variance with pedigree 0.0026, pedigree (1,1,3,1,1)
  (same comment as for hard coal)
  property carbon content, fossil 0.845; name C_content_fossil
  property dry mass 0.94 kg; name DM
  property water content 0.0638298; name water_content
  property wet mass 1 kg; name WM
  property carbon content, non-fossil 0; name C_content_non_fossil
  property water in wet mass 0.06 kg; name WWM
- hard coal: 0.0600686 kg; name hard_coal; = 0.0438* factor_MJ_kWh*0.12; source IEA 2012; lognormal variance with pedigree 0.0026, pedigree (1,1,3,1,1)
  (same comment as for hard coal)
  properties: wet mass 1 kg, water content 0.0638298, dry mass 0.94 kg, carbon content, fossil 0.845
- chlorine, liquid: 0 kg; pedigree (1,1,3,1,1)
  Exchange present due to parent child relationship
- hard coal: 0, 0, 0, 0 kg (4 entries); pedigree (1,1,3,1,1)
  exchange present because of parent/child relationship
- hard coal power plant: 1.33333e-11 unit; name hard_coal_power_plant; = 1/ (150000*500*1000); source Röder, A. 2007; lognormal variance with pedigree 0.3686, pedigree (5,3,4,5,3)
  Calculated value. At the moment, the hard coal power plant input consists of a market mix of a 100MWe power plant and a 500MWe power plant
  .
  For this calculation, 4000 load hours per year are assumed. It is assumed that a total of 150'000h is reached during the lifetime. A capacity of 500MW is taken for the calculation.

## Inputs from nature
- Water, cooling, unspecified natural origin [natural resource, in water]: 0.0522673 m3; name water_cooling_UNO_input; = ((recirculating_CS_fraction_from_allCS*WWithdrawal_EP_HC_recirculating_CS)+(once_through_andCP_CS_fractio_from_allCS*WWithdrawal_EP_HC_once_through_andCP_CS))/11.31*factor_MJ_kWh; lognormal variance with pedigree 0.098025, pedigree (4,4,4,2,4)
  Calculated based on literature data.

## Emissions to nature
- Propene [air, non-urban air or from high stacks]: 1.08229e-7 kg; name propene; = factor_MJ_kWh*0.00000000947; lognormal variance with pedigree 0.08, pedigree (3,5,4,5,1)
  Literature value/calculated value. Emissions when producing 1kWh of electricity from hard coal, based on the value for burning 1MJ of hard coal. Weighted average with electricity production data (Itten&Frischknecht 2012) and emission values of 14 countries
  (AT, BE, ES, FR, IT, NL, PT, DE, CZ, HR, PL, SK, CN, US) (Röder et al. 2007)
  Country emissions values based on literature.
  Source:
  Itten R. and Frischknecht R. (2012) Life Cycle Inventories of Electricity Mixes and Grid. ESU-services Ltd., Uster, Switzerland.
- Polonium-210 [air, non-urban air or from high stacks]: 0.00140571 kBq; name polonium_210; = factor_MJ_kWh*0.000123; lognormal variance with pedigree 0.3986, pedigree (5,3,4,5,3)
  Literature value/calculated value. Emissions when producing 1kWh of electricity from hard coal, based on the value for burning 1MJ of hard coal. Weighted average with electricity production data (Itten&Frischknecht 2012) and emission values of 14 countries
  (AT, BE, ES, FR, IT, NL, PT, DE, CZ, HR, PL, SK, CN, US) (Röder et al. 2007)
  Country emissions values calculated from trace element balance, input uncertain
  Source:
  Itten R. and Frischknecht R. (2012) Life Cycle Inventories of Electricity Mixes and Grid. ESU-services Ltd., Uster, Switzerland.
- Magnesium [air, non-urban air or from high stacks]: 1.03543e-6 kg; name magnesium; = factor_MJ_kWh*0.0000000906; lognormal variance with pedigree 0.7086, pedigree (5,3,4,5,3)
  (same comment as for Propene)
- Thorium-234 [air, non-urban air or from high stacks]: 1.17714e-5 kBq; name thorium_234; = factor_MJ_kWh*0.00000103; lognormal variance with pedigree 0.3206, pedigree (3,3,4,5,3)
  (same comment as for Propene)
- Manganese [air, non-urban air or from high stacks]: 4.09143e-7 kg; name manganese; = factor_MJ_kWh*0.0000000358; lognormal variance with pedigree 0.7486, pedigree (5,3,4,5,3)
  (same comment as for Polonium-210)
- Butane [air, non-urban air or from high stacks]: 1.28e-7 kg; name butane; = factor_MJ_kWh*0.0000000112; lognormal variance with pedigree 0.08, pedigree (3,5,4,5,1)
  (same comment as for Propene)
- Particulates, > 2.5 um, and < 10um [air, non-urban air or from high stacks]: 0.000302 kg; name particulates_2_5_to_10; source IEA 2012; lognormal variance with pedigree 0.0667, pedigree (4,2,4,4,4)
  Calculated value. Based on the total particle emissions, global production-weighted average of ecoinvent version 2 countries.
  The shares of the three particulates classes are taken from Dones et al 2007, Tab. 9.39 p. 130 and amount to
  - particulates >10um: 5%
  - particulates 2.5-10 um: 10%
  - particulates < 2.5 um: 85%
  Global total emissions without any particulate filter were calculated to amount to 80 g/kWh and were then figured together with the share of installed particle filter and efficiency of the filter (see technology comment for details).
- NMVOC, non-methane volatile organic compounds, unspecified origin [air, non-urban air or from high stacks]: 1.06286e-5 kg; name nmvoc; = factor_MJ_kWh*0.00000093; lognormal variance with pedigree 0.1406, pedigree (3,3,4,5,3)
  (same comment as for Propene)
- Hydrocarbons, aliphatic, alkanes, cyclic [air, non-urban air or from high stacks]: 5.45143e-8 kg; name hydrocarbons_al_al_cyclic; = factor_MJ_kWh*0.00000000477; lognormal variance with pedigree 0.1406, pedigree (3,3,4,5,3)
  (same comment as for Propene)
- Thorium-232 [air, non-urban air or from high stacks]: 5.52e-5 kBq; name thorium_232; = factor_MJ_kWh*0.00000483; lognormal variance with pedigree 0.3986, pedigree (5,3,4,5,3)
  (same comment as for Polonium-210)
- Vanadium [air, non-urban air or from high stacks]: 1.69143e-7 kg; name vanadium; = factor_MJ_kWh*0.0000000148; lognormal variance with pedigree 0.7486, pedigree (5,3,4,5,3)
  (same comment as for Polonium-210)
- Benzo(a)pyrene [air, non-urban air or from high stacks]: 4.92571e-12 kg; name benzo_a_pyrene; = factor_MJ_kWh*0.000000000000431; lognormal variance with pedigree 0.08, pedigree (3,5,4,5,1)
  (same comment as for Propene)
- Thorium-230 [air, non-urban air or from high stacks]: 1.17714e-5 kBq; name thorium_230; = factor_MJ_kWh*0.00000103; lognormal variance with pedigree 0.3586, pedigree (5,3,4,5,3)
  (same comment as for Propene)
- Iodine [air, non-urban air or from high stacks]: 1.81714e-6 kg; name iodine; = factor_MJ_kWh*0.000000159; lognormal variance with pedigree 0.2186, pedigree (5,3,4,5,3)
  (same comment as for Polonium-210)
- Ethane [air, non-urban air or from high stacks]: 2.77714e-7 kg; name ethane; = factor_MJ_kWh*0.0000000243; lognormal variance with pedigree 0.08, pedigree (3,5,4,5,1)
  (same comment as for Propene)
- Cyanide [air, non-urban air or from high stacks]: 2.35429e-7 kg; name cyanide; = factor_MJ_kWh*0.0000000206; lognormal variance with pedigree 0.1786, pedigree (5,3,4,5,3)
  Literature value/calculated value. Emissions when producing 1kWh of electricity from hard coal, based on the value for burning 1MJ of hard coal. Weighted average with electricity production data (Itten&Frischknecht 2012) and emission values of 14 countries
  (AT, BE, ES, FR, IT, NL, PT, DE, CZ, HR, PL, SK, CN, US) (Röder et al. 2007)
  Source:
  Itten R. and Frischknecht R. (2012) Life Cycle Inventories of Electricity Mixes and Grid. ESU-services Ltd., Uster, Switzerland.
- Sulfur dioxide [air, non-urban air or from high stacks]: 0.00402 kg; name sulfur_dioxide; source IEA 2012; lognormal variance with pedigree 0.0057, pedigree (3,2,3,1,2)
  Calculated value based on the IEA Clean Coal Centre Coal Power Database. Calculation was made with the sulfur content of the coal used (weight % as received), the input of coal (Mt/y), the efficiency of the desulfurisation and the capacity of the power plants. According to Röder et al. 2007, about 95% of the sulfur contained in the coal turns into SO2.
- Xylene [air, non-urban air or from high stacks]: 6.24e-6 kg; name xylene; = factor_MJ_kWh*0.000000546; lognormal variance with pedigree 0.08, pedigree (3,5,4,5,1)
  (same comment as for Propene)
- Selenium [air, non-urban air or from high stacks]: 1.88571e-7 kg; name selenium; = factor_MJ_kWh*0.0000000165; lognormal variance with pedigree 0.7486, pedigree (5,3,4,5,3)
  (same comment as for Polonium-210)
- Actinides, radioactive, unspecified [air, non-urban air or from high stacks]: 0.000195429 kBq; name actinides_radioactive_unspecified; = factor_MJ_kWh*0.0000171; lognormal variance with pedigree 0.3206, pedigree (3,3,4,5,3)
  (same comment as for Propene)
- Mercury [air, non-urban air or from high stacks]: 3.08571e-8 kg; name mercury; = factor_MJ_kWh*0.0000000027; lognormal variance with pedigree 0.7486, pedigree (5,3,4,5,3)
  (same comment as for Polonium-210)
- Dinitrogen monoxide [air, non-urban air or from high stacks]: 1.50857e-5 kg; name dinitrogen_monoxide; = factor_MJ_kWh*0.00000132; lognormal variance with pedigree 0.074, pedigree (3,4,4,5,1)
  (same comment as for Propene)
- Furan [air, non-urban air or from high stacks]: 4.70857e-13 kg; name furan; = factor_MJ_kWh*4.12E-14; lognormal variance with pedigree 0.1406, pedigree (3,3,4,5,3)
  (same comment as for Propene)
- Benzene [air, non-urban air or from high stacks]: 1.58857e-6 kg; name benzene; = factor_MJ_kWh*0.000000139; lognormal variance with pedigree 0.088, pedigree (3,5,4,5,3)
  (same comment as for Propene)
- Antimony [air, non-urban air or from high stacks]: 1.37143e-8 kg; name antimony; = factor_MJ_kWh*0.0000000012; lognormal variance with pedigree 0.7486, pedigree (5,3,4,5,3)
  (same comment as for Polonium-210)
- Aldehydes, unspecified [air, non-urban air or from high stacks]: 8.94857e-8 kg; name aldehydes_unspecified; = factor_MJ_kWh*0.00000000783; lognormal variance with pedigree 0.1406, pedigree (3,3,4,5,3)
  (same comment as for Propene)
- Lead [air, non-urban air or from high stacks]: 4.24e-7 kg; name lead; = factor_MJ_kWh*0.0000000371; lognormal variance with pedigree 0.7486, pedigree (5,3,4,5,3)
  (same comment as for Polonium-210)
- Sulfate [air, non-urban air or from high stacks]: 4.50286e-9 kg; name sulfate; = factor_MJ_kWh*0.000000000394; lognormal variance with pedigree 0.1786, pedigree (5,3,4,5,3)
  (same comment as for Propene)
- PAH, polycyclic aromatic hydrocarbons [air, non-urban air or from high stacks]: 8.56e-8 kg; name pah; = factor_MJ_kWh*0.00000000749; lognormal variance with pedigree 0.34, pedigree (3,5,4,5,1)
  (same comment as for Propene)
- Hydrocarbons, aliphatic, alkanes, unspecified [air, non-urban air or from high stacks]: 1.54286e-6 kg; name hydrocarbons_al_al_unspec; = factor_MJ_kWh*0.000000135; lognormal variance with pedigree 0.08, pedigree (3,5,4,5,1)
  (same comment as for Propene)
- Carbon monoxide, fossil [air, non-urban air or from high stacks]: 0.0001008 kg; name carbon_monoxide_fossil; = factor_MJ_kWh*0.00000882; lognormal variance with pedigree 0.674, pedigree (3,4,4,5,1)
  (same comment as for Propene)
- Nickel [air, non-urban air or from high stacks]: 2.28571e-7 kg; name nickel; = factor_MJ_kWh*0.00000002; lognormal variance with pedigree 0.7486, pedigree (5,3,4,5,3)
  (same comment as for Polonium-210)
- Methane, fossil [air, non-urban air or from high stacks]: 1.03086e-5 kg; name methane_fossil; = factor_MJ_kWh*0.000000902; lognormal variance with pedigree 0.074, pedigree (3,4,4,5,1)
  (same comment as for Propene)
- Cumene [air, non-urban air or from high stacks]: 5.13143e-10 kg; name cumene; = factor_MJ_kWh*0.0000000000449; lognormal variance with pedigree 0.124, pedigree (1,1,3,5,1)
  (same comment as for Cyanide)
- Ethene, tetrachloro- [air, non-urban air or from high stacks]: 4.04571e-9 kg; name ethene_tetrachloro; = factor_MJ_kWh*0.000000000354; lognormal variance with pedigree 0.1786, pedigree (5,3,4,5,3)
  (same comment as for Propene)
- Hydrogen chloride [air, non-urban air or from high stacks]: 0.000302857 kg; name hydrogen_chloride; = factor_MJ_kWh*0.0000265; lognormal variance with pedigree 0.2186, pedigree (5,3,4,5,3)
  (same comment as for Polonium-210)
- Ethane, 1,1,1-trichloro-, HCFC-140 [air, non-urban air or from high stacks]: 1.88571e-9 kg; name ethane_trichloro; = factor_MJ_kWh*0.000000000165; lognormal variance with pedigree 0.1406, pedigree (3,3,4,5,3)
  (same comment as for Propene)
- Radium-228 [air, non-urban air or from high stacks]: 6.75429e-5 kBq; name radium_228; = factor_MJ_kWh*0.00000591; lognormal variance with pedigree 0.3986, pedigree (5,3,4,5,3)
  (same comment as for Polonium-210)
- Copper [air, non-urban air or from high stacks]: 9.38286e-8 kg; name copper; = factor_MJ_kWh*0.00000000821; lognormal variance with pedigree 0.7486, pedigree (5,3,4,5,3)
  (same comment as for Polonium-210)
- Radium-226 [air, non-urban air or from high stacks]: 0.000209143 kBq; name radium_226; = factor_MJ_kWh*0.0000183; lognormal variance with pedigree 0.3907, pedigree (3,3,5,3,3)
  (same comment as for Polonium-210)
- Uranium-234 [air, non-urban air or from high stacks]: 2.30857e-5 kBq; name uranium_234; = factor_MJ_kWh*0.00000202; lognormal variance with pedigree 0.3586, pedigree (5,3,4,5,3)
  (same comment as for Propene)
- Potassium-40 [air, non-urban air or from high stacks]: 0.000262857 kBq; name potassium_40; = factor_MJ_kWh*0.000023; lognormal variance with pedigree 0.3986, pedigree (5,3,4,5,3)
  (same comment as for Polonium-210)
- Arsenic [air, non-urban air or from high stacks]: 1.13943e-7 kg; name arsenic; = factor_MJ_kWh*0.00000000997; lognormal variance with pedigree 0.7486, pedigree (5,3,4,5,3)
  (same comment as for Polonium-210)
- Ethane, 1,2-dichloro- [air, non-urban air or from high stacks]: 3.76e-9 kg; name ethane_dichloro; = factor_MJ_kWh*0.000000000329; lognormal variance with pedigree 0.1786, pedigree (5,3,4,5,3)
  (same comment as for Propene)
- Zinc [air, non-urban air or from high stacks]: 4.75429e-7 kg; name zinc; = factor_MJ_kWh*0.0000000416; lognormal variance with pedigree 0.7486, pedigree (5,3,4,5,3)
  (same comment as for Polonium-210)
- Water [water, unspecified]: 0.0529765 m3; name water_to_water_unspecified; = (water_completely_softened/1000)*(1-fraction_WCS_to_air)+(water_decarbonised_user/1000)*(1-fraction_WDC_to_air)+water_cooling_UNO_input*(1-fraction_CW_to_air); lognormal variance with pedigree 0.098025, pedigree (4,4,4,2,4)
  Calculated value based on literature values and expert opinion. See comments in the parametres' comment field.
  property fraction, origin: fresh water 0.0429448; name fraction_origin_fresh_water_Ww
  property fraction, origin: unspecified 0.957055; name fraction_origin_unspecified_Ww
  property fraction, origin: salt water 0; name fraction_origin_salt_water_Ww
- Cobalt [air, non-urban air or from high stacks]: 3.81714e-8 kg; name cobalt; = factor_MJ_kWh*0.00000000334; lognormal variance with pedigree 0.7486, pedigree (5,3,4,5,3)
  (same comment as for Polonium-210)
- Radon-220 [air, non-urban air or from high stacks]: 0.00579429 kBq; name radon_220; = factor_MJ_kWh*0.000507; lognormal variance with pedigree 0.3986, pedigree (5,3,4,5,3)
  (same comment as for Polonium-210)
- Nitrogen oxides [air, non-urban air or from high stacks]: 0.00174 kg; name nitrogen_oxides; source IEA 2012; lognormal variance with pedigree 0.14, pedigree (5,5,5,5,4)
  Basic data overtaken from electricity production with lignite in South Africa; own share of DeNOx infrastructure taken into account.
- Water [air, unspecified]: 0.00164503 m3; name water_to_air_unspecified; = (water_completely_softened/1000)*fraction_WCS_to_air+(water_decarbonised_user/1000)*fraction_WDC_to_air+water_cooling_UNO_input*fraction_CW_to_air; lognormal variance with pedigree 0.098025, pedigree (4,4,4,2,4)
  (same comment as for Water)
  property fraction, origin: fresh water 0.0478804; name fraction_origin_fresh_water
  property fraction, origin: unspecified 0.95212; name fraction_origin_unspecified
  property fraction, origin: salt water 0; name fraction_origin_salt_water
- Propane [air, non-urban air or from high stacks]: 2.36571e-7 kg; name propane; = factor_MJ_kWh*0.0000000207; lognormal variance with pedigree 0.08, pedigree (3,5,4,5,1)
  (same comment as for Propene)
- Styrene [air, non-urban air or from high stacks]: 2.33143e-9 kg; name styrene; = factor_MJ_kWh*0.000000000204; lognormal variance with pedigree 0.1406, pedigree (3,3,4,5,3)
  (same comment as for Propene)
- Dioxins, measured as 2,3,7,8-tetrachlorodibenzo-p-dioxin [air, non-urban air or from high stacks]: 1.21143e-13 kg; name dioxins; = factor_MJ_kWh*1.06E-14; lognormal variance with pedigree 0.34, pedigree (3,5,4,5,1)
  (same comment as for Propene)
- Beryllium [air, non-urban air or from high stacks]: 1.97714e-9 kg; name beryllium; = factor_MJ_kWh*0.000000000173; lognormal variance with pedigree 0.6706, pedigree (3,3,4,5,3)
  (same comment as for Cyanide)
- Chromium [air, non-urban air or from high stacks]: 9.37143e-8 kg; name chromium; = factor_MJ_kWh*0.0000000082; lognormal variance with pedigree 0.7486, pedigree (5,3,4,5,3)
  (same comment as for Polonium-210)
- Radon-222 [air, non-urban air or from high stacks]: 0.00569143 kBq; name radon_222; = factor_MJ_kWh*0.000498; lognormal variance with pedigree 0.3986, pedigree (5,3,4,5,3)
  (same comment as for Polonium-210)
- Acenaphthene [air, non-urban air or from high stacks]: 4.8e-11 kg; name acenaphthene; = factor_MJ_kWh*0.0000000000042; lognormal variance with pedigree 0.1406, pedigree (3,3,4,5,3)
  (same comment as for Propene)
- Protactinium-234 [air, non-urban air or from high stacks]: 1.17714e-5 kBq; name protactinium_234; = factor_MJ_kWh*0.00000103; lognormal variance with pedigree 0.3206, pedigree (3,3,4,5,3)
  (same comment as for Propene)
- Particulates, > 10 um [air, non-urban air or from high stacks]: 0.000151 kg; name particulates_gt10; source IEA 2012; lognormal variance with pedigree 0.0667, pedigree (4,2,4,4,4)
  (same comment as for Particulates, > 2.5 um, and < 10um)
- Carbon dioxide, fossil [air, non-urban air or from high stacks]: 1.09143 kg; name carbon_dioxide_fossil; = factor_MJ_kWh*0.0955; lognormal variance with pedigree 0.0206, pedigree (3,3,4,5,3)
  (same comment as for Propene)
- Phenol [air, non-urban air or from high stacks]: 1.50857e-9 kg; name phenol; = factor_MJ_kWh*0.000000000132; lognormal variance with pedigree 0.1406, pedigree (3,3,4,5,3)
  (same comment as for Propene)
- Benzene, ethyl- [air, non-urban air or from high stacks]: 8.85714e-9 kg; name benzene_ethyl; = factor_MJ_kWh*0.000000000775; lognormal variance with pedigree 0.1406, pedigree (3,3,4,5,3)
  (same comment as for Cyanide)
- Strontium [air, non-urban air or from high stacks]: 6.76571e-7 kg; name strontium; = factor_MJ_kWh*0.0000000592; lognormal variance with pedigree 0.7486, pedigree (5,3,4,5,3)
  (same comment as for Polonium-210)
- Carbon disulfide [air, non-urban air or from high stacks]: 1.22286e-8 kg; name carbon_disulfide; = factor_MJ_kWh*0.00000000107; lognormal variance with pedigree 0.3206, pedigree (3,3,4,5,3)
  (same comment as for Cyanide)
- Chloroform [air, non-urban air or from high stacks]: 9.23429e-9 kg; name chloroform; = factor_MJ_kWh*0.000000000808; lognormal variance with pedigree 0.1406, pedigree (3,3,4,5,3)
  (same comment as for Cyanide)
- Barium [air, non-urban air or from high stacks]: 7.41714e-7 kg; name barium; = factor_MJ_kWh*0.0000000649; lognormal variance with pedigree 0.7486, pedigree (5,3,4,5,3)
  (same comment as for Polonium-210)
- Cadmium [air, non-urban air or from high stacks]: 1.18857e-8 kg; name cadmium; = factor_MJ_kWh*0.00000000104; lognormal variance with pedigree 0.7486, pedigree (5,3,4,5,3)
  (same comment as for Polonium-210)
- Particulates, < 2.5 um [air, non-urban air or from high stacks]: 0.00257 kg; name particulates_lt2_5; source IEA 2012; lognormal variance with pedigree 0.0667, pedigree (4,2,4,4,4)
  (same comment as for Particulates, > 2.5 um, and < 10um)
- Bromine [air, non-urban air or from high stacks]: 3.57714e-6 kg; name bromine; = factor_MJ_kWh*0.000000313; lognormal variance with pedigree 0.1806, pedigree (3,3,4,5,3)
  (same comment as for Polonium-210)
- Formaldehyde [air, non-urban air or from high stacks]: 4.14857e-7 kg; name formaldehyde; = factor_MJ_kWh*0.0000000363; lognormal variance with pedigree 0.08, pedigree (3,5,4,5,1)
  (same comment as for Propene)
- Chromium VI [air, non-urban air or from high stacks]: 1.6e-8 kg; name chromium_vi; = factor_MJ_kWh*0.0000000014; lognormal variance with pedigree 0.5006, pedigree (3,3,4,5,3)
  Literature value/calculated value. Emissions when producing 1kWh of electricity from hard coal, based on the value for burning 1MJ of hard coal. Weighted average with electricity production data (Itten&Frischknecht 2012) and emission values of 14 countries
  (AT, BE, ES, FR, IT, NL, PT, DE, CZ, HR, PL, SK, CN, US) (Röder et al. 2007)
  Country emissions values based on range of data.
  Source:
  Itten R. and Frischknecht R. (2012) Life Cycle Inventories of Electricity Mixes and Grid. ESU-services Ltd., Uster, Switzerland.
- Acrolein [air, non-urban air or from high stacks]: 2.73143e-8 kg; name acrolein; = factor_MJ_kWh*0.00000000239; lognormal variance with pedigree 0.3586, pedigree (5,3,4,5,3)
  (same comment as for Propene)
- Methane, dichloro-, HCC-30 [air, non-urban air or from high stacks]: 2.73143e-8 kg; name methane_dichloro; = factor_MJ_kWh*0.00000000239; lognormal variance with pedigree 0.1786, pedigree (5,3,4,5,3)
  (same comment as for Propene)
- Hydrogen fluoride [air, non-urban air or from high stacks]: 3.23429e-5 kg; name hydrogen_fluoride; = factor_MJ_kWh*0.00000283; lognormal variance with pedigree 0.2186, pedigree (5,3,4,5,3)
  (same comment as for Polonium-210)
- Methane, monochloro-, R-40 [air, non-urban air or from high stacks]: 4.99429e-8 kg; name methane_monochloro; = factor_MJ_kWh*0.00000000437; lognormal variance with pedigree 0.1406, pedigree (3,3,4,5,3)
  (same comment as for Propene)
- Toluene [air, non-urban air or from high stacks]: 7.6e-7 kg; name toluene; = factor_MJ_kWh*0.0000000665; lognormal variance with pedigree 0.08, pedigree (3,5,4,5,1)
  (same comment as for Propene)
- Hydrocarbons, aliphatic, unsaturated [air, non-urban air or from high stacks]: 1.46286e-6 kg; name hydrocarbons_aliphatic_unsaturated; = factor_MJ_kWh*0.000000128; lognormal variance with pedigree 0.08, pedigree (3,5,4,5,1)
  (same comment as for Propene)
- Hydrocarbons, chlorinated [air, non-urban air or from high stacks]: 1.90857e-8 kg; name hydrocarbons_chlorinated; = factor_MJ_kWh*0.00000000167; lognormal variance with pedigree 0.1786, pedigree (5,3,4,5,3)
  (same comment as for Propene)
- Uranium-238 [air, non-urban air or from high stacks]: 0.000181714 kBq; name uranium_238; = factor_MJ_kWh*0.0000159; lognormal variance with pedigree 0.3986, pedigree (5,3,4,5,3)
  (same comment as for Polonium-210)
- Boron [air, non-urban air or from high stacks]: 4.37714e-6 kg; name boron; = factor_MJ_kWh*0.000000383; lognormal variance with pedigree 0.7486, pedigree (5,3,4,5,3)
  (same comment as for Polonium-210)
- Hexane [air, non-urban air or from high stacks]: 6.34286e-9 kg; name hexane; = factor_MJ_kWh*0.000000000555; lognormal variance with pedigree 0.1786, pedigree (5,3,4,5,3)
  (same comment as for Propene)
- Lead-210 [air, non-urban air or from high stacks]: 0.000792 kBq; name lead_210; = factor_MJ_kWh*0.0000693; lognormal variance with pedigree 0.3986, pedigree (5,3,4,5,3)
  (same comment as for Polonium-210)
- Molybdenum [air, non-urban air or from high stacks]: 1.31429e-8 kg; name molybdenum; = factor_MJ_kWh*0.00000000115; lognormal variance with pedigree 0.7486, pedigree (5,3,4,5,3)
  (same comment as for Polonium-210)
- Thorium-228 [air, non-urban air or from high stacks]: 3.77143e-5 kBq; name throium_228; = factor_MJ_kWh*0.0000033; lognormal variance with pedigree 0.3986, pedigree (5,3,4,5,3)
  (same comment as for Polonium-210)
- Pentane [air, non-urban air or from high stacks]: 9.94286e-7 kg; name pentane; = factor_MJ_kWh*0.000000087; lognormal variance with pedigree 0.08, pedigree (3,5,4,5,1)
  (same comment as for Propene)

## Sampling procedure
literature and statistics

## Extrapolations
Data from 1993 have been updated for the years 2000 (v1.0), and 2004-2005 (v2.0). Uncertainty was adjusted accordingly.

Most of the exchanges were extrapolated through production-weighted averages of the datasets of the following 14 countries: AT, BE, ES, FR, IT, NL, PT, DE, CZ, HR, PL, SK, CN, US.

The original data were valid for the burning of 1MJ of hard coal. In this dataset, the values are scaled to the net output of 1kWh of electricity, based on the electrical efficiency.

## Review by Carl Vadenbo 2015-07-23
The update of the whole electricity sector for the ecoinvent v3.2 database consist of hundreds of datasets. All these datasets have passed through a streamlined review processes where the underlying modelling of production volumes, technology shares and efficiencies was reviewed in detail prior to the datasets being submitted to the database.
