# treatment of Sn-based antifouling paint emissions

Dataset: EcoSpold 2, unit process
Geography: PE
Time period: 2010-01-01 to 2019-12-31
Technology level: current
Classification: ISIC rev.4 ecoinvent: 0311:Marine fishing
Scenario: Business-as-Usual
System model: Allocation at the point of substitution
Generated by: Angel Avadí
Published in: Avadí, A. 2018
Database: ecoinvent
isCopyrightProtected: true
accessRestrictedTo: 1

## General comment
This activity represents the direct emissions to ocean of Sn-based antifouling paint. 2/3 of the dry matter of the active substances present in the paint are assumed to be emitted. Data from analysis of 1 antifouling paints used in Peru

## Included activities start
Direct emissions to the marine environment

## Geography
Data from Peru, extrapolated to global (GLO). Not representative of European conditions

## Technology
One sample of the most common antifouling paints used in Peru, OceanJet, was analysed by the French laboratory UT2A (http://www.univ-pau.fr/ut2a) in 2010. Uncertainty data are also based on measured values.

## Reference product
- antifouling paint emissions: -1 kg; name mass; source Angel Avadí 2014; By-product classification Waste; CPC 34666: Hazardous pesticides
  Mass of solids from antifouling paint
  production volume 0.002923 kg
    GDP for Peru as a proportion of the world
  property price 0 EUR2005; name mass_price_EUR2005
    Waste products are assigned a price of zero as they are assumed to require further treatment.
  property water in wet mass 0 kg; name mass_WWM
  property carbon content, fossil 0.21; name mass_C_content_fossil
    Calculated from antifouling paint formulation
  property dry mass 1 kg; name mass_DM
  property carbon content, non-fossil 0.21; name mass_C_content_non_fossil
    Calculated from antifouling paint formulation
  property wet mass 1 kg; name mass_WM
  property water content 0; name mass_water_content
  property carbon content 0.42
    carbon content on a dry matter basis (reserved; not for manual entry)
  properties: carbon allocation 0.42 kg

## Emissions to nature
- Copper, ion [water, ocean]: 0.254 kg; name a; source Angel Avadí 2014; triangular min 0.215, mostLikely 0.254, max 0.293, pedigree (1,3,4,1,1)
  Mass of copper emitted
  Uncertainty: 1 sample
  property wet mass 1 kg; name a_WM
  property carbon content, fossil 0; name a_C_content_fossil
  property water content 0; name a_water_content
  property carbon content, non-fossil 0; name a_C_content_non_fossil
  property water in wet mass 0 kg; name a_WWM
  property dry mass 1 kg; name a_DM
- Monobutyltin [water, ocean]: 0.000155 kg; name f; source Angel Avadí 2014; triangular min 0.000131, mostLikely 0.000155, max 0.000179, pedigree (1,3,4,1,1)
  Mass of monobutyltin emitted
  Uncertainty: 1 sample
  property wet mass 1 kg; name f_WM
  property dry mass 1 kg; name f_DM
  property carbon content, fossil 0.648488; name f_C_content_fossil
  property water in wet mass 0 kg; name f_WWM
  property water content 0; name f_water_content
- Oils, unspecified [water, ocean]: 0.558114 kg; name binder; = ABS(mass+a+b+c+d+e+f+g+h+i+j+k); source Avadí, A. 2018
  Proxy for the paint's binder, also emitted to ocean
  property water in wet mass 0 kg; name binder_WWM
  property water content 0; name binder_water_content
  property dry mass 1 kg; name binder_DM
  property carbon content, fossil 0.375; name binder_C_content_fossil
  property wet mass 1 kg; name binder_WM
  property carbon content, non-fossil 0.375; name binder_C_content_non_fossil
- Monophenyltin [water, ocean]: 1.7e-7 kg; name h; source Angel Avadí 2014; triangular min 1.6e-7, mostLikely 1.7e-7, max 1.8e-7, pedigree (1,3,4,1,1)
  Mass of monophenyltin emitted
  Uncertainty: 1 sample
  property water in wet mass 0 kg; name h_WWM
  property dry mass 1 kg; name h_DM
  property wet mass 1 kg; name h_WM
  property carbon content, fossil 0.238478; name h_C_content_fossil
  property water content 0; name h_water_content
- Lead [water, ocean]: 0.000225 kg; name b; source Angel Avadí 2014; triangular min 0.00021, mostLikely 0.000225, max 0.00024, pedigree (1,3,4,1,1)
  Mass of lead emitted
  Uncertainty: 1 sample
  property wet mass 1 kg; name b_WM
  property water in wet mass 0 kg; name b_WWM
  property dry mass 1 kg; name b_DM
  property carbon content, non-fossil 0; name b_C_content_non_fossil
  property water content 0; name b_water_content
  property carbon content, fossil 0; name b_C_content_fossil
- Diphenyltin [water, ocean]: 5.7e-5 kg; name i; source Angel Avadí 2014; triangular min 4.2e-5, mostLikely 5.7e-5, max 7.2e-5, pedigree (1,3,4,1,1)
  Mass of diphenyltin emitted
  Uncertainty: 1 3 sample
  property carbon content, fossil 0.528063; name i_C_content_fossil
  property water in wet mass 0 kg; name i_WWM
  property water content 0; name i_water_content
  property dry mass 1 kg; name i_DM
  property wet mass 1 kg; name i_WM
- Tin, ion [water, ocean]: 0.00039 kg; name c; source Angel Avadí 2014; triangular min 0.000368, mostLikely 0.00039, max 0.000412, pedigree (1,3,4,1,1)
  Mass of tin emitted
  Uncertainty: 1 sample
  property water content 0; name c_water_content
  property water in wet mass 0 kg; name c_WWM
  property wet mass 1 kg; name c_WM
  property dry mass 1 kg; name c_DM
  property carbon content, fossil 0; name c_C_content_fossil
  property carbon content, non-fossil 0; name c_C_content_non_fossil
- Tributyltin compounds [water, ocean]: 1.1e-6 kg; name e; source Angel Avadí 2014; triangular min 9e-7, mostLikely 1.1e-6, max 1.3e-6, pedigree (1,3,4,1,1)
  Mass of TBT emitted
  Uncertainty: 1 sample
  property carbon content, fossil 0.49691; name e_C_content_fossil
  property water in wet mass 0 kg; name e_WWM
  property dry mass 1 kg; name e_DM
  property wet mass 1 kg; name e_WM
  property water content 0; name e_water_content
  property carbon content, non-fossil 0; name e_C_content_non_fossil
- Trioctyltin [water, ocean]: 4e-5 kg; name k; source Angel Avadí 2014; triangular min 3.7e-5, mostLikely 4e-5, max 4.3e-5, pedigree (1,3,4,1,1)
  Mass of trioctyltin emitted
  Uncertainty: 1 sample
  property water in wet mass 0 kg; name k_WWM
  property water content 0; name k_water_content
  property carbon content, fossil 0.58368; name k_C_content_fossil
  property dry mass 1 kg; name k_DM
  property wet mass 1 kg; name k_WM
- Zinc, ion [water, ocean]: 0.187 kg; name d; source Angel Avadí 2014; triangular min 0.168, mostLikely 0.187, max 0.206, pedigree (1,3,4,1,1)
  Mass of zinc emitted
  Uncertainty: 1 sample
  property water in wet mass 0 kg; name d_WWM
  property wet mass 1 kg; name d_WM
  property dry mass 1 kg; name d_DM
  property carbon content, non-fossil 0; name d_C_content_non_fossil
  property water content 0; name d_water_content
  property carbon content, fossil 0; name d_C_content_fossil
- Dibutyltin [water, ocean]: 9e-7 kg; name g; source Angel Avadí 2014; triangular min 7e-7, mostLikely 9e-7, max 1.1e-6, pedigree (1,3,4,1,1)
  Mass of dibutyltin emitted
  Uncertainty: 1 sample
  property carbon content, fossil 0.412463; name g_C_content_fossil
  property water in wet mass 0 kg; name g_WWM
  property dry mass 1 kg; name g_DM
  property water content 0; name g_water_content
  property wet mass 1 kg; name g_WM
- Triphenyltin [water, ocean]: 1.7e-5 kg; name j; source Angel Avadí 2014; triangular min 1.6e-5, mostLikely 1.7e-5, max 1.8e-5, pedigree (1,3,4,1,1)
  Mass of triphenyltin emitted
  Uncertainty: 1 sample
  property wet mass 1 kg; name j_WM
  property water in wet mass 0 kg; name j_WWM
  property dry mass 1 kg; name j_DM
  property water content 0; name j_water_content
  property carbon content, fossil 0.56081; name j_C_content_fossil

## Extrapolations
This dataset has been extrapolated from year 2010 to the year of the calculation (2019). The uncertainty has been adjusted accordingly.
