# tap water production, conventional with biological treatment

Dataset: EcoSpold 2, unit process
Geography: RoW
Time period: 2012-01-01 to 2019-12-31
Technology level: current
Classification: EcoSpold01Categories: water supply/production
Classification: ISIC rev.4 ecoinvent: 3600:Water collection, treatment and supply
Synonyms: potable water
Scenario: Business-as-Usual
System model: Allocation at the point of substitution
Generated by: Marylène Dussault
Database: ecoinvent
isCopyrightProtected: true
accessRestrictedTo: 1

## General comment
This dataset represents production of 1 kg of tap water under pressure at facility gate, ready for distribution in network. It represents average operation of conventional with biological filtration treatment for production of tap water. Conventional with biological filtration treatment includes coagulation and decantation, biological filtration and disinfection. Other treatment such as oxidation (ultraviolet radiation, ozone) and other adjustment (pH, alkalinity, etc.) can be present in some plant. Inventory was constructed from reported chemicals, energy inputs and wastes from 2 distinct conventional with biological filtration plants located in Québec.
[This dataset is meant to replace the following datasets:
- tap water production and supply, GLO, 2000 - 2000]

## Included activities start
From the intake pumping of raw surface water into the water treatment plant.

## Included activities end
This dataset ends with the production of tap water, at facility gate, under pressure. It includes energy for intake pumping, treatment system, lighting and heating of the building as well as the energy of the pump pressurizing water to the beginning of the network. It includes all chemicals and material added to the water during treatment and, when needed, ultraviolent lamps for replacement. It excludes energy for pumping stations and water losses within the network which is included in the tap water market. Emissions to the environment occurring during the treatment and during the distribution were not considered as they are assumed negligible. Main substance in water that would be released in the environment are assumed to be considered in wastewater processes.

## Geography
Extrapolated from data from two plants in Quebec (Canada). The uncertainty was adjusted accordingly.

## Technology
Most frequent technology in tap water production facility in Quebec

## Time period
Time of publication.

## Parameters
- unit conversion, days in a year: 365.25 d/year; name days_per_year; lognormal variance with pedigree 0.0006, pedigree (1,1,1,1,1)
  Conversion factor.

## Reference product
- tap water: 1 kg; name tapwater; CPC 18000: Natural water; By-product classification allocatable product; CAS 7732-18-5
  production volume 1.02537e14 kg; name PV_tapwater; = ((4e15*0.3)-3.5E12)*0.113
    Calculated value based on literature data and expert judgement. The amount of freshwater which falls as rainwater is 110000km3/year. Out of that only 40000km3/year is converted into surface runoff (http://www.fao.org/nr/water/aquastat/water_use/index.stm, accessed 20140522). The total water withdrawal in the world is around 4000km3/year, i.e. 4E15kg (cross-referenced with 3 publications; Shiklomanov, 2003, UN - http://unesdoc.unesco.org/images/0022/002257/225741E.pdf and http://unesdoc.unesco.org/images/0018/001819/181993e.pdf, accessed 20140522). Out of that app. 70% goes for irrigation (http://www.fao.org/nr/water/aquastat/water_use/index.stm, accessed 20140522), thus 1.2E15kg is left for municipal and industrial use.
    The total tap water production technology shares in the world, present in the ecoinvent database are calculated to be as follows; tap water production, conventional treatment - 40%, tap water production, conventional with biological treatment - 11%, tap water production, direct filtration treatment - 18.5%, tap water production, microstainer treatment - 2.2%, tap water production, ultrafiltration treatment - 2.3%, tap water production, seawater reverse osmosis conventional pretreatment, enhance module, single - 0.5%, tap water production, seawater reverse osmosis, conventional pretreatment, enhance module, single stage - 0.1%, tap water production, seawater reverse osmosis, conventional pretreatment, enhance module, two stages - 0.066%, tap water production, seawater reverse osmosis, ultrafiltration pretreatment, baseline module, single stage - 0.049%, tap water production, seawater reverse osmosis, ultrafiltration pretreatment, enhance module, single stage - 0.01%, tap water production, seawater reverse osmosis, ultrafiltration pretreatment, enhance module, two stages - 0.007%, tap water production, underground water with chemical treatment - 10.7%, tap water production, underground water with disinfection - 2.7%, tap water production, underground water without chemical treatment - 11.4%, tap water production, artificial recharge wells - 0.8%.
  property price 0.000397 EUR2005
    Converted from EU price by using Purchasing Power Parities (0.8458 in 2003 and 0.8426 in 2004)
  property carbon content 0.0017899
    carbon content on a dry matter basis (reserved; not for manual entry)
  property true value 0.000397; name tapwater_true_value
    allocation property applied in "true value" allocation // value calculated from revenue
  properties: wet mass 1 kg, carbon content, fossil 0.0017899, water in wet mass 0.99966 kg, carbon content, non-fossil 0, water content 2940.18, dry mass 0.00034 kg, carbon allocation 6.08566e-7 kg

## By-products
- heat, for reuse in municipal waste incineration only: 0 MJ; CPC 17300: Steam and hot water; By-product classification allocatable product; pedigree (1,1,1,1,1)
  Net electricity generated from this waste and used in internal MSWI plant energy redistribution.
  Uncertainty: uncertainty is calculated from uncertainties in waste composition and uncertainties in energy efficiency and the uncertainty in internal energy demand
  production volume 3.20259e8 MJ
  property exergy 0.1842 MJ; name E_th_prod_MSWI_exergy
    This exergy property is based on the exergy content of the product.
  property price 0.0106 EUR2005; name E_th_prod_MSWI_price_EUR2005
    Average European district heat price from Ecoheatcool and Euroheat 2005-2006, Ecoheat Work package 1: The European heat market. Final report. 10.6 EUR/GJ i s the price of district heat. http://www.solarthermalworld.org/files/Ecoheatcool%20WP1%20Web.pdf?download
  property true value relation 0.1842; name E_th_prod_MSWI_true_value_relation
    property to calculate "true value" from
  property true value 2.05821e-8
    allocation property applied in "true value" allocation // value calculated from true value relation
- electricity, for reuse in municipal waste incineration only: 0 kWh; CPC 17100: Electrical energy; By-product classification allocatable product; pedigree (1,1,1,1,1)
  (same comment as for heat, for reuse in municipal waste incineration only)
  production volume 4.44799e7 kWh
  property price 0.1 EUR2005; name E_el_prod_MSWI_price_EUR2005
    Estimated to be the same price as in case of electricity, medium voltage.
  property exergy 3.6 MJ; name E_el_prod_MSWI_exergy
    This exergy property is based on the exergy content of the product.
  property true value relation 3.6; name E_el_prod_MSWI_true_value_relation
    property to calculate "true value" from
  property true value 5.58685e-8
    (same comment as for heat, for reuse in municipal waste incineration only)

## Inputs from technosphere
- silica sand: 1.15682e-6 kg; lognormal variance with pedigree 0.0072, pedigree (3,3,3,5,1)
  Calculated value. Amount of sand to compensate losses through sand filter washing. Extrapolated to all plant from one reported value.Note that only 1 of the 2 plants reported this consumable.
  properties: dry mass 0.99 kg, water content 0.010101, wet mass 1 kg
- charcoal: 2.27288e-7 kg; lognormal variance with pedigree 0.0152, pedigree (2,3,3,5,1)
  EcoSpold01Location=GLO
  Measured value. Average use of activated charcoal in surveyed conventional treatment plants. Note than both plants reported using this input.
  Uncertainty: Literature
  properties: carbon content, non-fossil 0.8, wet mass 1 kg, dry mass 1 kg
- water works, capacity 1.1E10l/year: 1.52074e-12 unit; = 1/(Q_av* days_per_year*lifetime*UnitConversion(1, 'm3', 'l')); lognormal variance with pedigree 0.002, pedigree (1,1,3,1,1)
  Calculated value. Amount of water works construction attributed to the production of 1kg of tap water. Value is based on assumed lifetime production of water treatment plant and an assumed typical medium-sized plant of 30,000 m3/day.
  Uncertainty: Calculated variable. Uncertainty will be determined from propagation of uncertainty factors of underlying variables.
  property lifetime 60 year; name lifetime
  property plant average daily flow rate 30000 m3/d; name Q_av
  note on lifetime: Estimated Value. Expected lifetime of water works as defined in the construction process.
  note on plant average daily flow rate: Fixed values, Flow rate of a conventional water purification plant for a medium-size facility as defined in the water works process.
- sodium hydroxide, without water, in 50% solution state: 5.74889e-6 kg; lognormal variance with pedigree 0.0072, pedigree (2,4,3,5,1)
  Measured value. Average use of sodium hydroxide (dry basis) for adjustement in surveyed conventional treatment plants. Input of exchange "water", based on NaOH concentration, was added accordingly. Note the 2 plants reported using this substance.
  properties: wet mass 1 kg, dry mass 1 kg
- activated silica: 1.31142e-6 kg; lognormal variance with pedigree 0.0072, pedigree (2,4,3,5,1)
  Measured value. Average use of substance reported in surveyed conventional with biological treatment plants. Note than 1 plant reported using this substance. Plants not reporting this consumable were attributed an input value of 0 during the calculation of the weighted average.
- wastewater, unpolluted: -4.85906e-5 m3; name ww; lognormal variance with pedigree 0.0046, pedigree (1,1,3,5,1)
  EcoSpold01Location=CH
  Measured value. Average amount of wastewater produced during treatment.
  Uncertainty: Calculated variable. Uncertainty will be determined from propagation of uncertainty factors of underlying variables.
  production volume 4.98332e9 m3; = PV_tapwater*(ww/tapwater)
    Calculated from the production volume of tap water, at user in proportion to the respective output amounts.
  property price 0 EUR2005; name ww_price_EUR2005
  properties: wet mass 1000 kg, dry mass 0.337476 kg, carbon content, fossil 0.00178991, carbon content, non-fossil 0.00178991, water content 2962.17
  note on carbon content, fossil: Assumed to be like in tap water. Bicarbonate content is 2.93 mol/m3. CO2 content is 0.1 mol/m3 (ecoinvent v2.2 report 8, Tab 93.1).
- electricity, medium voltage: 0 kWh; pedigree (1,1,1,1,1)
  Measured value. Average electricity consumption for entire process including pumping for water intake and pumping for distribution at the plant gate. All plants (2) reported electricity use.
  EcoSpold01Location=UCTE
- sodium hypochlorite, without water, in 15% solution state: 3.29936e-6 kg; lognormal variance with pedigree 0.0058, pedigree (2,3,3,5,1)
  Measured value. Average use of hypochlorite (dry basis) for disinfection in surveyed conventional with biological treatment plants. Reported concentration of solution is 12% (w/w), input of exchange "water" was added accordingly. Note the 2 plants reported using this substance.
  properties: wet mass 1 kg, dry mass 1 kg
- sodium phosphate: 1.14311e-6 kg; lognormal variance with pedigree 0.0072, pedigree (2,4,3,5,1)
  (same comment as for activated silica)
  properties: wet mass 1 kg, dry mass 1 kg
- waste wood, untreated: 0 kg; name w_charcoal; pedigree (1,1,1,1,1)
  EcoSpold01Location=CH
  Calculated value, assuming all consumed charcoal ends up in this waste stream.
  Uncertainty: Calculated variable. Uncertainty will be determined from propagation of uncertainty factors of underlying variables.
  production volume 0 kg
    (same comment as for wastewater, unpolluted)
  property price 0 EUR2005; name w_charcoal_price_EUR2005
  properties: carbon content, non-fossil 0.48632, wet mass 1 kg, water content 0.25, dry mass 0.8 kg
  note on carbon content, non-fossil: Tab A.4, ecoinvent v2.2 report 13_I. C content has been referred to 1 kg DM,
- sodium pyrophosphate: 2.66983e-7 kg; name tetrasodiumpyrophosphate; lognormal variance with pedigree 0.0072, pedigree (2,4,3,5,1)
  Measured value. Average use of tetrasodium pyrophosphate reported in surveyed conventional with biological treatment plants. Note than 1 plant reported using this substance. Plants not reporting this consumable were attributed an input value of 0 during the calculation of the weighted average.
- aluminium sulfate, powder: 6.35878e-5 kg; lognormal variance with pedigree 0.0152, pedigree (2,3,3,5,1)
  EcoSpold01Location=RER
  Measured value. Value reprensent average for use of pre-hydrolysed coagulant (PASS) and average for use au aluminium sulphate solution. Note that both plants reported using PASS and aluminium sulphate solution.
  properties: wet mass 1 kg, dry mass 1 kg
- potassium permanganate: 5.44218e-7 kg; lognormal variance with pedigree 0.0072, pedigree (2,4,3,5,1)
  (same comment as for activated silica)
  properties: dry mass 1 kg, wet mass 1 kg
- lime, hydrated, loose weight: 5.43022e-6 kg; lognormal variance with pedigree 0.0072, pedigree (2,4,3,5,1)
  Measured value. Average use of lime for pH adjustment in surveyed conventional with biological treatment plants. Note than 1 of the 2 plants reported using this substance. Plants not reporting this consumable were attributed an input value of 0 during the calculation of the weighted average.
  properties: wet mass 1 kg, water content 0.00300903, dry mass 0.997 kg
- diesel, burned in building machine: 6.56686e-5 MJ; = diesel_use*density_diesel*NHV; lognormal variance with pedigree 0.002, pedigree (1,1,3,1,1)
  Calculated value.
  Uncertainty: Calculated variable. Uncertainty will be determined from propagation of uncertainty factors of underlying variables.
  property heating value, net 43.2 MJ; name NHV
  property fuel input in physical units, L 1.81e-6 l; name diesel_use
  property density 0.84 kg/l; name density_diesel
  note on heating value, net: Literature. net (lower) heating (calorific) value for diesel in MJ/kg
  note on fuel input in physical units, L: Measured value. Average of diesel volume consumed in a year. All plants reported diesel use.
- oxygen, liquid: 1.74466e-6 kg; lognormal variance with pedigree 0.0058, pedigree (2,3,3,5,1)
  Measured value. Average use of liquid oxygen for onsite ozone production in surveyed conventional with biological treatment plants. Note than only 1 plant reported using this substance although ozonation was applied in the other plant using air. Plants not reporting this consumable were attributed an input value of 0 during the calculation of the weighted average.
  properties: wet mass 1 kg, dry mass 1 kg
- polyacrylamide: 1.64638e-7 kg; lognormal variance with pedigree 0.0058, pedigree (2,3,3,5,1)
  Measured value. Average use of polymer for floculation in surveyed conventional with biological treatment plants. Polymers assumed to be 100% polyacrylamide. Note the 2 plants reported using this substance.
- tap water: 0 kg; pedigree (1,1,1,1,1)
  Calculated value. Water content of hypochlorite solution, sodium hydroxide, prehydrolysed coagulant and aluminium sulfate.
  properties: wet mass 1 kg, water content 2962.17, carbon content, fossil 0.00178991, dry mass 0.000337476 kg
  note on carbon content, fossil: Bicarbonate content is 2.93 mol/m3. CO2 content is 0.1 mol/m3 (ecoinvent v2.2 report 8, Tab 93.1).
- heat, district or industrial, natural gas: 0.000337187 MJ; = fuel_input*heating_value*fuel_use; lognormal variance with pedigree 0.002, pedigree (1,1,3,1,1)
  (same comment as for diesel, burned in building machine)
  property lower heating value 36.3 MJ/Nm3; name heating_value
  property fuel input in physical units, m3 8.37e-6 m3; name fuel_input
  property Corresponding fuel use 1.11 MJ; name fuel_use
  note on fuel input in physical units, m3: Measured value. Average natural gas consumption in surveyed plants for this technology type. Note than only 1 of the 2 plants reported using natural gas. Plants not reporting natural gas were attributed an input value of 0 during the calculation of the weighted average.
  note on Corresponding fuel use: Lower heating value of the fuel input related to the heat/electricity output
- electricity, medium voltage: 4.61118e-6, 1.63132e-6, 2.1637e-5, 7.73064e-6, 2.91535e-7, 2.39318e-6, 3.65485e-7, 6.06114e-7, 1.21756e-8, 4.94215e-7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 kWh (28 entries); lognormal variance with pedigree 0.0058, pedigree (2,3,3,5,1)
  (same comment as for electricity, medium voltage)
- waste wood, untreated: -1.52154e-7, -1.38124e-9, -5.30627e-8, -8.01649e-9, -1.26734e-8 kg (5 entries); lognormal variance with pedigree 0.0026, pedigree (1,1,3,1,1)
  (same comment as for waste wood, untreated)
  production volume 2.331e7 kg
- tap water: 1.0839e-6, 5.43729e-6, 1.4145e-7, 4.02351e-7, 6.22217e-5 kg (5 entries); lognormal variance with pedigree 0.0072, pedigree (3,3,3,5,1)
  (same comment as for tap water)

## Inputs from nature
- Water, lake [natural resource, in water]: 8.97338e-5 m3; name waterIn_L; lognormal variance with pedigree 0.0052, pedigree (2,1,3,5,1)
  Calculated value. Surface water withdrawal represents average withdrawal from surveyed plants. Share of subcompartiment type (river-91%, lake-9%) is estimated based on share number of people in Quebec desserved by water source types.
- Water, river [natural resource, in water]: 0.000958635 m3; name waterIn_R; lognormal variance with pedigree 0.0052, pedigree (2,1,3,5,1)
  (same comment as for Water, lake)

## Sampling procedure
Based on data collected from two conventional treatment plants in Quebec (Canada). See corresponding Quebec dataset for more information. Note that percent representativeness is not supplied because technology-specific global production volumes is too uncertain. Should this information become available, the representativeness can be calculated by dividing the sum of the water treated by the Quebec plants that served as a basis for the Global dataset by the technology-specific global production volume. (2.31E10 kg/a)

## Extrapolations
From two conventional tap water production facilities with biological treatment in Quebec to global average of same technology. The uncertainty has been changed accordingly.
