# petroleum refinery construction

Dataset: EcoSpold 2, unit process
Geography: RoW
Time period: 1993-01-01 to 2019-12-31
Technology level: current
Classification: ISIC rev.4 ecoinvent: 4290a: Construction of infrastructure for petroleum refining and distribution
Classification: EcoSpold01Categories: oil/fuels
Tags: ConvertedDataset
Scenario: Business-as-Usual
System model: Allocation at the point of substitution
Share of production covered: 1 %
Generated by: Niels Jungbluth
Published in: Jungbluth, N. 2007
Database: ecoinvent
isCopyrightProtected: true
accessRestrictedTo: 1

## General comment
The inventory describes the use of materials for the refinery equipment and the land use for a refinery with an annual capacity of 1 mio. tonnes crude oil throughput and a life time of 30 years.
[This dataset was already contained in the ecoinvent database version 2. It was not individually updated during the transfer to ecoinvent version 3. Life Cycle Impact Assessment results may still have changed, as they are affected by changes in the supply chain, i.e. in other datasets. This dataset was generated following the ecoinvent quality guidelines for version 2. It may have been subject to central changes described in the ecoinvent version 3 change report (http://www.ecoinvent.org/database/ecoinvent-version-3/reports-of-changes/), and the results of the central updates were reviewed extensively. The changes added e.g. consistent water flows and other information throughout the database. The documentation of this dataset can be found in the ecoinvent reports of version 2, which are still available via the ecoinvent website. The change report linked above covers all central changes that were made during the conversion process.]

## Included activities end
Infrastructure for chemical processing and land use. No data for construction, storage facilities and office buildings.

## Geography
Estimation for a refinery in Europe.

## Technology
Data for a distillation unit have been estimated to assess the use of materials.

## Time period
Time of publications and information in the literature

## Parameters
- fraction, process water, to air: 0.15 dimensionless; name fraction_PW_to_air; lognormal variance with pedigree 0.092025, pedigree (4,4,3,2,4)

## Reference product
- petroleum refinery: 1 unit; CPC 53290: Other civil engineering works; By-product classification allocatable product
  EcoSpold01Location=RER
  production volume 2.67763 unit
    This is a placeholder value that does not reflect real-world production volumes. This dataset does not currently require a real-world production volume to work in the database framework, and no actual data were collected yet. This has no negative effect on the results of the ecoinvent database.
  property price 8.49339e6 EUR2005
    Calculated based on inputs: The price of the product has been calculated as a sum of the values of the material and energy inputs for this product. This value is therefore a rough estimation. It may underestimate the real price since there are additional expenses when producing any product. These expences can include for example labour costs, treatment of waste materials and profit for the producer. Please consider carefully whether this level of data quality is acceptable for your application.
  property true value 8.49339e6
    allocation property applied in "true value" allocation // value calculated from revenue

## By-products
- heat, for reuse in municipal waste incineration only: 0 MJ; CPC 17300: Steam and hot water; By-product classification allocatable product; pedigree (1,1,1,1,1)
  Net electricity generated from this waste and used in internal MSWI plant energy redistribution.
  Uncertainty: uncertainty is calculated from uncertainties in waste composition and uncertainties in energy efficiency and the uncertainty in internal energy demand
  production volume 124915 MJ
  property exergy 0.1842 MJ; name E_th_prod_MSWI_exergy
    This exergy property is based on the exergy content of the product.
  property price 0.0106 EUR2005; name E_th_prod_MSWI_price_EUR2005
    Average European district heat price from Ecoheatcool and Euroheat 2005-2006, Ecoheat Work package 1: The European heat market. Final report. 10.6 EUR/GJ i s the price of district heat. http://www.solarthermalworld.org/files/Ecoheatcool%20WP1%20Web.pdf?download
  property true value relation 0.1842; name E_th_prod_MSWI_true_value_relation
    property to calculate "true value" from
  property true value 225.273
    allocation property applied in "true value" allocation // value calculated from true value relation
- electricity, for reuse in municipal waste incineration only: 0 kWh; CPC 17100: Electrical energy; By-product classification allocatable product; pedigree (1,1,1,1,1)
  (same comment as for heat, for reuse in municipal waste incineration only)
  production volume 17769.7 kWh
  property true value relation 3.6; name E_el_prod_MSWI_true_value_relation
    property to calculate "true value" from
  property price 0.1 EUR2005; name E_el_prod_MSWI_price_EUR2005
    Estimated to be the same price as in case of electricity, medium voltage.
  property exergy 3.6 MJ; name E_el_prod_MSWI_exergy
    This exergy property is based on the exergy content of the product.
  property true value 626.309
    (same comment as for heat, for reuse in municipal waste incineration only)

## Inputs from technosphere
- stone wool, packed: 29997 kg; lognormal variance with pedigree 0.152, pedigree (3,5,5,5,4)
  Literature
  EcoSpold01Location=CH
  Uncertainty: Literature
  properties: carbon content, fossil 0.015401, wet mass 1 kg, dry mass 1 kg
  note on carbon content, fossil: The chemical composition of the glass fibres used in the rock wool production is similar to the composition of naturally cooled volcano basalt and has a composition listed in Tab. 3.1 and 3.2 in ecoinvent v2.2 report 16, part XIV. Rock wool contains: a minimum of 96% mineral fibres,between 0.5 and 3.0 weight percent of phenolic resin depending on the specific product characteristics, and about 0.2 percent mineral oil (ecoinvent v2.2 report 16, part XIV). An average composition of 1.8% phenolic resin, 0.2% mineral oil, and 98% mineral fibres has been assumed and used to calculate C content of the rock wool
- steel, chromium steel 18/8, hot rolled: 319968 kg; lognormal variance with pedigree 0.152, pedigree (3,5,5,5,4)
  Literature
  EcoSpold01Location=RER
  Uncertainty: Literature
  properties: carbon content, fossil 0.0008, wet mass 1 kg, dry mass 1 kg
  note on carbon content, fossil: Stainless steel model is the grade 304 steel (18/8 stainless, 18% chromium 8% nickel; max. 0.08% C)
- brazing solder, cadmium free: 167983 kg; lognormal variance with pedigree 0.152, pedigree (3,5,5,5,4)
  EcoSpold01Location=RER
  Literature
  Uncertainty: Literature
  properties: dry mass 1 kg, wet mass 1 kg
- heat, district or industrial, other than natural gas: 0 MJ; pedigree (1,1,1,1,1)
  Literature
  EcoSpold01Location=CH
  Uncertainty: Literature
- waste plastic, mixture: 0 kg; pedigree (1,1,1,1,1)
  Literature
  EcoSpold01Location=CH
  Uncertainty: Literature
  production volume 0 kg
    Calculated from the production volume of refinery in proportion to the respective output amounts.
  properties: carbon content, fossil 0.747344, water content 0.180638, wet mass 1 kg, dry mass 0.847 kg
  note on carbon content, fossil: C content in 1 kg DM was calculated using data in Tab A.2, ecoinvent v2.2 report 13_I
- waste mineral wool: -29997 kg; lognormal variance with pedigree 0.152, pedigree (3,5,5,5,4)
  Literature
  EcoSpold01Location=CH
  Uncertainty: Literature
  production volume 90000 kg
    (same comment as for waste plastic, mixture)
  properties: wet mass 1 kg, dry mass 1 kg
- electricity, medium voltage: 0 kWh; pedigree (1,1,1,1,1)
  Literature
  EcoSpold01Location=UCTE
  Uncertainty: Literature
- waste cement in concrete and mortar: -999900 kg; lognormal variance with pedigree 0.152, pedigree (3,5,5,5,4)
  Literature
  EcoSpold01Location=CH
  Uncertainty: Literature
  production volume 3e6 kg
    (same comment as for waste plastic, mixture)
  properties: water content 0.00502513, dry mass 0.995 kg, wet mass 1 kg
- polyethylene, high density, granulate: 47995.2 kg; lognormal variance with pedigree 0.152, pedigree (3,5,5,5,4)
  Literature
  EcoSpold01Location=RER
  Uncertainty: Literature
  properties: carbon content, fossil 0.857143, dry mass 1 kg, wet mass 1 kg
  note on carbon content, fossil: Polyethylene is formed out of a huge amount of ethylene monomers (C2H4) (ecoinvent v2.2 report 11_II). MW=28 g/mol
- steel, unalloyed: 4.15958e6 kg; lognormal variance with pedigree 0.152, pedigree (3,5,5,5,4)
  Literature
  EcoSpold01Location=RER
  Uncertainty: Literature
  properties: carbon content, fossil 0.0025, dry mass 1 kg, wet mass 1 kg
  note on carbon content, fossil: Unalloyed steels or carbon steels are those in which the level of an individual element in no case reaches or exceeds the limiting concentration given in Tab. 3.1 ecoinvent v2.2 report 10_partII. Assumed to have a C content of 0.25%
- concrete, normal: 0 m3; pedigree (1,1,1,1,1)
  EcoSpold01Location=CH
  Literature
  Uncertainty: Literature
  properties: water content 0.086758, wet mass 2380 kg, dry mass 2190 kg
- sulfuric acid: 191981 kg; lognormal variance with pedigree 0.152, pedigree (3,5,5,5,4)
  EcoSpold01Location=RER
  Literature
  Uncertainty: Literature
  properties: wet mass 1 kg, dry mass 1 kg
- heat, district or industrial, other than natural gas: 7151.01, 1.59512e7 MJ (2 entries); lognormal variance with pedigree 0.152, pedigree (3,5,5,5,4)
  Literature
  EcoSpold01Location=CH
  Uncertainty: Literature
- waste plastic, mixture: -5898.12, -394.089, -29.8043, -162.773, -65.7584, -154.568, -41290.1 kg (7 entries); lognormal variance with pedigree 0.152, pedigree (3,5,5,5,4)
  Literature
  EcoSpold01Location=CH
  Uncertainty: Literature
  production volume 144000 kg
- electricity, medium voltage: 52357.7, 9526.9, 161562, 2.34248e6, 335253, 1.09842e6 kWh (6 entries); lognormal variance with pedigree 0.152, pedigree (3,5,5,5,4)
  Literature
  EcoSpold01Location=UCTE
  Uncertainty: Literature
- concrete, normal: 10.4228, 1.08604, 8.79227, 4.94565, 20.9435, 0.70641, 407.058 m3 (7 entries); lognormal variance with pedigree 0.152, pedigree (3,5,5,5,4)
  EcoSpold01Location=CH
  Literature
  Uncertainty: Literature

## Inputs from nature
- Transformation, from unspecified [natural resource, land]: 156984 m2; lognormal variance with pedigree 0.1632, pedigree (2,3,5,5,1)
  Plant data
  Uncertainty: Plant data
- Occupation, industrial area [natural resource, land]: 4.70953e6 m2*year; lognormal variance with pedigree 0.0832, pedigree (2,3,5,5,1)
  Plant data
  Uncertainty: Plant data
- Water, unspecified natural origin [natural resource, in water]: 167.983 m3; name water_UNO_input; lognormal variance with pedigree 0.152, pedigree (3,5,5,5,4)
  Literature
  Uncertainty: Literature
- Transformation, to industrial area [natural resource, land]: 156884 m2; lognormal variance with pedigree 0.1632, pedigree (2,3,5,5,1)
  Plant data
  Uncertainty: Plant data

## Emissions to nature
- Water [water, unspecified]: 142.786 m3; name water_to_water_unspecified; lognormal variance with pedigree 0.0827, pedigree (2,2,5,5,1)
  Calculated value based on literature values and expert opinion. See comments in the parametres' comment field.
  property fraction, origin: salt water 0; name fraction_origin_salt_water_Ww
  property fraction, origin: fresh water 0; name fraction_origin_fresh_water_Ww
  property fraction, origin: unspecified 1; name fraction_origin_unspecified_Ww
  property dry mass 0 kg; name DM
  property wet mass 1000 kg; name WM
  property water in wet mass 1000 kg; name WWM
  property carbon content, non-fossil 0; name C_content_non_fossil
  property carbon content, fossil 0; name C_content_fossil
- Water [air, unspecified]: 25.1975 m3; name water_to_air_unspecified; lognormal variance with pedigree 0.0827, pedigree (2,2,5,5,1)
  (same comment as for Water)
  property fraction, origin: fresh water 0; name fraction_origin_fresh_water
  property fraction, origin: salt water 0; name fraction_origin_salt_water
  property fraction, origin: unspecified 1; name fraction_origin_unspecified

## Sampling procedure
Literature survey.

## Extrapolations
From single plant parts to whole refinery. This dataset has been copied from an original dataset covering the geography RER. The uncertainty has been adjusted accordingly.

## Review by Michael Spielmann (obsolete) 2003-07-04
passed.
