# soybean meal to generic market for protein feed

Dataset: EcoSpold 2, unit process
Geography: GLO
Time period: 2012-01-01 to 2019-12-31
Technology level: modern
Classification: ISIC rev.4 ecoinvent: 108:Manufacture of prepared animal feeds
Scenario: Business-as-Usual
System model: Allocation at the point of substitution
Generated by: Tereza Levova
Database: ecoinvent
isCopyrightProtected: true
accessRestrictedTo: 1

## General comment
This activity is a linking activity, i.e. it connects soybean meal with generic protein feed market. Soybean meal is used mainly as a feed for animals, thus traded on generic feed market with other protein - containing products.

## Included activities end
This linking activity has the soybean meal as input and produces protein and energy feed as outputs.

## Parameters
- fraction_to_generic_market: 0.9 % (obsolete); lognormal variance with pedigree 0.108, pedigree (4,1,1,1,1)
  It is assumed that 90% of soybean meal is traded on generic protein feed market, i.e. its buyers do not care what type of protein feed they are buying. Remaining 10% of the production volume (PV) is assumed to be used for uses, where specific type of protein feed is required and cannot be substituted by any other protein feed.

## Reference product
- protein feed, 100% crude: 1 kg; name protein_feed_crude_RP; = soybean_meal_in_protein_feed_per_kg_DM_0*0.89; By-product classification allocatable product; CPC 23319: Preparations used in animal feeding n.e.c.
  Calculated based on literature value from Agroscope database (http://www.feed-alp.admin.ch). Agroscope (http://www.agroscope.admin.ch/org/index.html?lang=en) is a research institute which belongs to the Swiss Federal Office for Agriculture. The amount of protein, feed in soybean meal might vary depending on the amount of fat present in the meal. This meal is considered to have less than 1.3% of fat. The dry mass of the reference product is 0.89kg/kg.
  production volume 5.883e10 kg; = ((1/0.23447)*33979485*1000*fraction_to_generic_market)* protein_feed_crude_RP
    3.4E+10 kg of soybean oil, crude was produced globally in 2005 (FAO). Based on "soybean oil mill operation" activity for each 1 kg of soybean meal produced 0.23447 kg of soybean oil, crude is produced as a by-product. It is assumed that 90% of soybean meal is traded on generic protein feed market, i.e. its buyers do not care what type of protein feed they are buying. Remaining 10% of the production volume (PV) is assumed to be used for uses, where specific type of protein feed is required and cannot be substituted by any other protein feed.
  property price 0.424 EUR2005; name protein_feed_crude_RP_price_EUR2005
    Based on protein content and energy feed, gross content in soybean meal and prices per kg of soybean meal. Assumed soybean meal is the most used feed. Soybean meal 2004 prices for World import/export data (tonnes and US$) from FaoStat statistics (http://faostat.fao.org/site/535/default.aspx#ancor, TRADE)- [Accessed 24 May 2010]. See calculations for protein /energy content
  property carbon content, non-fossil 0.53
    considered pure protein (ecoinvent v2.2 report 17, pg 288). C-content in protein is estimated to be 53% ( from "Evolutionary and Biochemical Aspects", A.D. Kay and T. Vrede (in Global Ecology, 2010, Elsevier B.V., S.E. Jørgensen Ed.).
  property carbon content 0.53
    carbon content on a dry matter basis (reserved; not for manual entry)
  property true value 0.191246; name protein_feed_crude_RP_true_value
    allocation property applied in "true value" allocation // value calculated from revenue
  properties: water content 0, carbon content, fossil 0, water in wet mass 0 kg, wet mass 1 kg, dry mass 1 kg, carbon allocation 0.53 kg

## By-products
- energy feed, gross: 0 MJ; = soybean_meal_in_gross_E_feed_per_kg_DM_0*0.89; CPC 23319: Preparations used in animal feeding n.e.c.; By-product classification allocatable product; pedigree (1,1,1,1,1)
  Calculated based on literature value from Agroscope database (http://www.feed-alp.admin.ch). Agroscope (http://www.agroscope.admin.ch/org/index.html?lang=en) is a research institute which belongs to the Swiss Federal Office for Agriculture. The gross energy in soybean meal might vary depending on the amount of fat present in the meal. This meal is considered to have less than 1.3% of fat. The dry mass of the reference product is 0.89kg/kg.
  production volume 2.31234e12 MJ; = Ref('e845e707-6557-4301-937e-293f7a166cc7', 'ProductionVolume') * (Ref('dd75c4e1-4c47-429b-872d-d7d8bfd42e99') / Ref('e845e707-6557-4301-937e-293f7a166cc7'))
    Calculated from production volume of reference product using the relative outputs.
  property price 0.0108 EUR2005
    Based on energy feed, gross content in soybean meal and prices per kg of soybean meal. Assumed soybean meal is the most used feed. Soybean meal 2004 prices for World import/export data (tonnes and US$) from FaoStat statistics (http://faostat.fao.org/site/535/default.aspx#ancor, TRADE)- [Accessed 24 May 2010]. See calculations for protein /energy content
  property carbon content 0
    carbon content on a dry matter basis (reserved; not for manual entry)
  property true value 0.191471
    allocation property applied in "true value" allocation // value calculated from revenue
  properties: water in wet mass 0 kg, water content 0, wet mass 1 kg, dry mass 1 kg, carbon content, non-fossil 0, carbon content, fossil 0, carbon allocation 0 kg

## Inputs from technosphere
- soybean meal: 0 kg; pedigree (1,1,1,1,1)
  property gross energy, feed per kg of dry mass 19.92 MJ/kg; name soybean_meal_in_gross_E_feed_per_kg_DM_0
  property protein feed, 100% crude per kg of dry mass 0.5068 kg/kg; name soybean_meal_in_protein_feed_per_kg_DM_0
  properties: water content 0.123596, carbon content, non-fossil 0.475627, dry mass 0.89 kg, wet mass 1 kg
  note on carbon content, non-fossil: Composition data obtained from Table 2 in Uses of Canola Meal, J. Bonnardeaux, Department of Agriculture and Food, Western Australia, 2007. First, composition data were refered to 1 kg dry mass. Then, C-contents were calculated considering a C-content/dry mass of 46% in carbohydrates (including fibres), 53% in proteins and 75% in fats. All data from "Evolutionary and Biochemical Aspects", A.D. Kay and T. Vrede (in Global Ecology, 2010, Elsevier B.V., S.E. Jørgensen Ed.).
  note on gross energy, feed per kg of dry mass: Literature value from Agroscope database (http://www.feed-alp.admin.ch). Agroscope (http://www.agroscope.admin.ch/org/index.html?lang=en) is a research institute which belongs to the Swiss Federal Office for Agriculture. The gross energy in soybean meal might vary depending on the amount of fat present in the meal. This meal is considered to have less than 1.3% of fat.
  note on protein feed, 100% crude per kg of dry mass: Literature value from Agroscope database (http://www.feed-alp.admin.ch). Agroscope (http://www.agroscope.admin.ch/org/index.html?lang=en) is a research institute which belongs to the Swiss Federal Office for Agriculture. The amount of protein, feed in soybean meal might vary depending on the amount of fat present in the meal. This meal is considered to have less than 1.3% of fat.
- soybean meal: 0.184521, 0.923347 kg (2 entries); lognormal variance with pedigree 0.002, pedigree (1,1,3,1,1)
  properties: water content 0.123596, carbon content, non-fossil 0.475627, dry mass 0.89 kg, wet mass 1 kg, gross energy, feed per kg of dry mass 19.92 MJ/kg, protein feed, 100% crude per kg of dry mass 0.5068 kg/kg

## Review by Bo Weidema 2012-03-14
Production volumes are for 2005, even though the dataset is indicated to be valid for 2012.
