# electricity production, nuclear, boiling water reactor

Dataset: EcoSpold 2, unit process
Geography: CH
Time period: 1990-01-01 to 2019-12-31
Technology level: current
Classification: ISIC rev.4 ecoinvent: 3510:Electric power generation, transmission and distribution
Synonyms: BWR
Tags: nuclear power
Scenario: Business-as-Usual
System model: Allocation at the point of substitution
Generated by: Karin Treyer
Published in: Dones, R. 2007
Database: ecoinvent
isCopyrightProtected: true
accessRestrictedTo: 1

## General comment
This dataset represents the production of high voltage electricity at a grid-connected nuclear boiling water reactor (BWR) in Switzerland in 2012.
It is based on data for Swiss BWR plants. The basic source for all exchanges is the ecoinvent report \'Kernenergie\' (see Modelling and Administrative).
The average burnup 48.6 MWd/kg heavy metal of finally discharged fuel elements from the 2000/2002 fuel cycles has been assumed representative for the lifetime of the modeled plant (the burnup has increased from the initial about 33 MWd/kg heavy metal and may increase to 55 MWd/kg heavy metal in the future). The average burnup corresponds to an average enrichment of 3.8% U235 for fresh uranium fuel elements. For the calculation of the total net electricity delivered in 40 years lifetime, the sum of the actual production till 2002 and the prospective (9000 GWh/a) till end of life using is considered; this gives 3.46E11 kWh; the inverse gives the utilisation factor for the infrastructure. Full detailed information on material requirements during operation for 1991/1992 are available. The diesel requirements for the yearly test of diesel emergency generators are accounted for. Radioactive emission species to air and water are weighted averages of the emissions of the nuclear power plants Leibstadt and Mühleberg (CH) from 1995 to 2002. Alpha aerosols emission to air have been described with 'aerosols, unspecified'. Considered radioactive waste streams are: spent fuel to reprocessing (40%) and conditioning (60%); operational low active waste for conditioning in the intermediate repository; and, contaminated waste from dismantling.
[This dataset is meant to replace the following datasets:]

## Included activities start
From the constructed power plant ready to produce electricity and from the fuel ready in the power plant.

## Included activities end
This activity ends with 1kWh of high voltage electricity produced at the power plant and arrived at the busbar.
The module includes fuel elements, chemicals, and diesel requirements as well as the relevant transport requirements. Water use (fresh and decarbonized) for cooling is included. Considered radioactive waste streams are: spent fuel to reprocessing and conditioning; operational low active waste for conditioning in the intermediate repository; and, contaminated waste from dismantling. Non-radioactive wastes are accounted for.

The module includes fuel elements, chemicals, and diesel requirements as well as the relevant transport requirements. Water use (fresh and decarbonized) for cooling is included, but no cooling tower infrastructure. Considered radioactive waste streams are: spent fuel to reprocessing and conditioning; operational low active waste for conditioning in the intermediate repository; and, contaminated waste from dismantling. Non-radioactive wastes are accounted for.

## Geography
Swiss data of one specific plant for requirements and all Swiss BWRs for emissions.

## Technology
Best current technology for fuel element. Standard technology for commercial operation.

## Time period
The Annual Production Volume is valid for the year 2011.

## Parameters
All rows: lognormal variance with pedigree 0.092025, pedigree (4,4,3,2,4)
- once-through and cooling pond cooling systems as a fraction of all cooling syste: 0.73 dimensionless; name once_through_andCP_CS_fractio_from_allCS
  Calculated as an average of data available for Europe (Floerke, 2008, Future changes of freshwater needs in the electricity production sector) and USA (NERL, 2011, Estimating freshwater needs to meet future thermoelectric generation requirements).
  nan
- water withdrawal, electricity production, nuclear, once-T and coolingP CS: 0.0995 m3/kWh; name WWithdrawal_EP_nuclear_onceT_andCP_CS
  Estimated based on literature (Scown, 2011, Water Footprint of U.S. Transportation Fuels, SI).
  nan
- water consumption, electricity production, nuclear, recirculating CS: 0.0024 m3/kWh; name WConsumption_EP_nuclear_recirculatingCS
  (same comment as for water withdrawal, electricity production, nuclear, once-T and coolingP)
- water consumption, electricity production, nuclear, once-T and coolingP CS: 0.00296 m3/kWh; name WConsumption_EP_nuclear_onceT_andCP_CS
  (same comment as for water withdrawal, electricity production, nuclear, once-T and coolingP)
- recirculating cooling system as a fraction of all cooling systems: 0.27 dimensionless; name recirculating_CS_fraction_from_allCS
  (same comment as for once-through and cooling pond cooling systems as a fraction of all coo)
- fraction, cooling water, to air: 0.0380756; name fraction_CW_to_air; = (WConsumption_EP_nuclear_recirculatingCS*recirculating_CS_fraction_from_allCS+WConsumption_EP_nuclear_onceT_andCP_CS*once_through_andCP_CS_fractio_from_allCS)/(WWithdrawal_EP_nuclear_recirculating_CS*recirculating_CS_fraction_from_allCS+WWithdrawal_EP_nuclear_onceT_andCP_CS*once_through_andCP_CS_fractio_from_allCS)
  Calculated value based on literature value (Scown, 2011 & Floerke, 2009, Future changes of freshwater needs in the electricity production sector & Stiegel, 2008, Estimating Freshwater Needs to Meet Future Thermoelectric Generation Requirements) (Vionnet, S., Quantis Water Database - Technical Report, 2012).
- water withdrawal, electricity production, nuclear, recirculating CS: 0.0042 m3/kWh; name WWithdrawal_EP_nuclear_recirculating_CS
  (same comment as for water withdrawal, electricity production, nuclear, once-T and coolingP)
- fraction, water, decarbonised, to air: 0.0380756; name fraction_WDC_to_air; = fraction_CW_to_air
  Calculated value. See comments in the other parametres present in this dataset. Decarbonised water is considered to be always used as cooling water, thus cooling water fractions to air are applied to all carbonised water input flows to calculate the amount of water consumed in the processes.
  nan

## Reference product
- electricity, high voltage: 1 kWh; CPC 17100: Electrical energy; By-product classification allocatable product
  production volume 1.25578e10 kWh; name apv_electricity; = 13254000000*(1-0.06)+99000000
    Literature value/calculated value. Valid for 2011.
    Based on Stolz&Frischknecht 2015, Tables 3.7, 3.6 and the SBB railway electricity mix from Itten et al. 2012 Table 3.182.
    A loss of 6% from gross to net is assumed for nuclear power.
    An extra amount of electricity has been added due to direct linking reasons (electricity for the Swiss Federal Railways).
    Stolz, P., Frischnkecht, R. 2015. Umweltbilanz Strommix Schweiz 2011. Issued by treeze Ltd. for the Federal Office for the Environment, Switzerland.
    Itten, R., Frischknecht, R., Stucki, M. 2012. Life Cycle Inventories of Electricity Mixes and Grid. ESU-services Ltd., fair conulting in sustainability, Uster. "
  property price 0.0977 EUR2005; name electricity_price_EUR2005
    Temporary price data. Calculated as 90% of purchasers price based on: 94% of the average price (to account for a 6% loss in transformation and transmission) for electricity for industrial consumersin 2005 (excluded taxes). From IEA.
  property true value 0.0977
    allocation property applied in "true value" allocation // value calculated from revenue

## By-products
- electricity, for reuse in municipal waste incineration only: 0 kWh; CPC 17100: Electrical energy; By-product classification allocatable product; pedigree (1,1,1,1,1)
  Net electricity generated from this waste and used in internal MSWI plant energy redistribution.
  Uncertainty: uncertainty is calculated from uncertainties in waste composition and uncertainties in energy efficiency and the uncertainty in internal energy demand
  production volume 1365 kWh
  property exergy 3.6 MJ; name E_el_prod_MSWI_exergy
    This exergy property is based on the exergy content of the product.
  property true value relation 3.6; name E_el_prod_MSWI_true_value_relation
    property to calculate "true value" from
  property price 0.1 EUR2005; name E_el_prod_MSWI_price_EUR2005
    Estimated to be the same price as in case of electricity, medium voltage.
  property true value 1.40511e-8
    allocation property applied in "true value" allocation // value calculated from true value relation
- heat, for reuse in municipal waste incineration only: 0 MJ; CPC 17300: Steam and hot water; By-product classification allocatable product; pedigree (1,1,1,1,1)
  Net useful heat generated from this waste and used in internal MSWI plant energy redistribution.
  Uncertainty: uncertainty is calculated from uncertainties in waste composition and uncertainties in energy efficiency and the uncertainty in internal energy demand
  production volume 10022.9 MJ
  property true value relation 0.1842; name E_th_prod_MSWI_true_value_relation
    property to calculate "true value" from
  property exergy 0.1842 MJ; name E_th_prod_MSWI_exergy
    This exergy property is based on the exergy content of the product.
  property price 0.0106 EUR2005; name E_th_prod_MSWI_price_EUR2005
    Average European district heat price from Ecoheatcool and Euroheat 2005-2006, Ecoheat Work package 1: The European heat market. Final report. 10.6 EUR/GJ i s the price of district heat. http://www.solarthermalworld.org/files/Ecoheatcool%20WP1%20Web.pdf?download
  property true value 5.27903e-9
    (same comment as for electricity, for reuse in municipal waste incineration only)
- zinc concentrate: 0 kg; CPC 14290: Other non-ferrous metal ores and concentrates (other than uranium or thorium ores and concentrates); By-product classification allocatable product
  Calculated value from the knowledge of the properties of both products.
  production volume 6.55581e-8 kg
  property price 0.38 EUR2005; name ByP_price_EUR2005
    Temporary price data. Calculated as 90% of purchasers price based on: Zinc content in concentrate 53%. Concentrate price per kg Zn 86.5% of refined Zn price (13.5% treatment charges according to CHR Metals Limited 2005: Dynamic cost curves. http://www.minecost.com/dynamic.pdf). 2004 zinc price from USGS (2007) Mineral commodity summaries 2007. <http://minerals.usgs.gov/minerals/pubs/mcs/2007/mcs2007.pdf> [Accessed 25 May 2010]
  property zinc content 0.53; name zinc_C_zinc_concentrate
    Zinc content on a dry matter basis. Value taken from teh "zinc mine operation" /GLO dataset.
  property dry mass 1 kg; name DM_zinc_concentrate
  property carbon content 0
    carbon content on a dry matter basis (reserved; not for manual entry)
  property true value 1.9838e-18
    allocation property applied in "true value" allocation // value calculated from revenue
  properties: wet mass 1 kg, water content 0, carbon content, non-fossil 0, carbon content, fossil 0, water in wet mass 0 kg, carbon allocation 0 kg
- iron scrap, sorted, pressed: 0 kg; By-product classification Recyclable; CPC 39310: Slag, dross, scalings and other waste from the manufacture of iron or steel; pedigree (1,1,1,1,1)
  metallic iron scrap removed from ash reamains and recycled.
  Uncertainty: uncertainty is calculated from uncertainties in waste composition and transfer coefficients to soild residues
  production volume 150.619 kg
  property price 0.175 EUR2005
    Temporary price data. Calculated as 90% of purchasers price based on: 2005 import and export prices (total trades (USD) divided by total weight (kg) in biggest economies of the world: EU27, USA, Brasil, China, India, Japan and Russia) from UN Commodity Trade Statistics Database (http://data.un.org/Explorer.aspxDatabase [Accessed 2011.06.20]). Commodity: Waste or scrap, of cast iron
  property carbon content 0
    carbon content on a dry matter basis (reserved; not for manual entry)
  property true value 2.09896e-9
    allocation property applied in "true value" allocation // value calculated from revenue
  properties: carbon content, non-fossil 0, wet mass 1 kg, dry mass 1 kg, water content 0, carbon content, fossil 0, water in wet mass 0 kg, carbon allocation 0 kg
- copper: 0 kg; source Rentz O. 1999; By-product classification allocatable product; CPC 41413: Refined copper and copper alloys, unwrought; master alloys of copper
  Literature value. Copper uses: Before end-use copper is manufactured into semi fabricated products, such as shapes and ingots (known as 'semis'). These manufacturing processes are subdivided into hot working, cold working and, if necessary, process annealing. Few of the semis are ready for use as such. They more typically travel to first-stage manufacturers, who make metal rods, wire, and casting, and then to component manufacturers who produce such things as motors, valves, and insulated cables The components in turn are incorporated by final-stage manufacturers into a variety of finished products - automobiles, commercial buildings, residential housing, and so forth. These uses account for about 79% of the world-wide consumption of copper.
  production volume 4.79422 kg
  property price 5.52 EUR2005
    Literature value (http://www.economist.com/news/business/21576714-mining-industry-has-enriched-chile-its-future-precarious-copper-solution). Average price between 20015 and 2013.
  property carbon content 0
    carbon content on a dry matter basis (reserved; not for manual entry)
  property true value 2.10739e-9
    allocation property applied in "true value" allocation // value calculated from revenue
  properties: dry mass 1 kg, water in wet mass 0 kg, wet mass 1 kg, carbon content, non-fossil 0, water content 0, carbon content, fossil 0, carbon allocation 0 kg
- iron scrap, unsorted: 0 kg; source European Aluminium Association 2008; CPC 39310: Slag, dross, scalings and other waste from the manufacture of iron or steel; By-product classification Recyclable; pedigree (1,1,1,1,1)
  production volume 0.00428514 kg
  property price 0.149 EUR2005; name ironScrapAmount_price_EUR2005
    Temporary price data. Calculated as 90% of purchasers price based on: estimated at 85% of sorted scrap
  property carbon content 0
    carbon content on a dry matter basis (reserved; not for manual entry)
  property true value 5.0844e-14
    allocation property applied in "true value" allocation // value calculated from revenue
  properties: water in wet mass 0 kg, water content 0, carbon content, fossil 0, carbon content, non-fossil 0, dry mass 1 kg, wet mass 1 kg, carbon allocation 0 kg
- aluminium oxide, non-metallurgical: 0 kg; source European Aluminium Association 2008; CPC 41432: Alumina (aluminium oxide), except artificial corundum; By-product classification allocatable product; CAS 1344-28-1; pedigree (1,1,1,1,1)
  production volume 0.269648 kg
  property carbon content, non-fossil 0; name C_content_non_fossil
  property price 0.28 EUR2005; name Al2O3Amount_price_EUR2005
    From UN trade database. http://data.un.org/ Import data from the largest economies of the world are used (Brazil, India, USA, China, Japan and EU-27).
  property dry mass 1 kg; name DM
  property water content 0; name water_content
  property wet mass 1 kg; name WM
  property water in wet mass 0 kg; name WWM
  property carbon content, fossil 0; name C_content_fossil
  property carbon content 0
    carbon content on a dry matter basis (reserved; not for manual entry)
  property true value 6.01233e-12
    allocation property applied in "true value" allocation // value calculated from revenue
  properties: carbon allocation 0 kg
- aluminium, cast alloy: 0 kg; source European Aluminium Association 2008; By-product classification allocatable product; CPC 41431: Unwrought aluminium; pedigree (1,1,1,1,1)
  EcoSpold01Location=RER
  production volume 2.52061 kg
  property price 1.3 EUR2005; name castAlloyAmount_price_EUR2005
    Temporary price data. Calculated as 90% of purchasers price based on: Source: London Metal Exchange, Aluminium alloy price for 2005
  property carbon content 0
    carbon content on a dry matter basis (reserved; not for manual entry)
  property true value 2.60938e-10
    allocation property applied in "true value" allocation // value calculated from revenue
  properties: water in wet mass 0 kg, carbon content, non-fossil 0, water content 0, dry mass 1 kg, carbon content, fossil 0, wet mass 1 kg, carbon allocation 0 kg
- aluminium, wrought alloy: 0 kg; source European Aluminium Association 2008; By-product classification allocatable product; CPC 4153: Semi-finished products of aluminium or aluminium alloys; pedigree (1,1,1,1,1)
  production volume 1.10347 kg
  property price 1.44 EUR2005; name secondaryAluminiumOutput_price_EUR2005
    Estimated based on literature values and expert judgement. Aluminium ccast alloys are about 90% of the price of aluminium wrought alloys.
  property carbon content 0
    carbon content on a dry matter basis (reserved; not for manual entry)
  property true value 1.26536e-10
    allocation property applied in "true value" allocation // value calculated from revenue
  properties: wet mass 1 kg, water content 0, carbon content, fossil 0, water in wet mass 0 kg, carbon content, non-fossil 0, dry mass 1 kg, carbon allocation 0 kg

## Inputs from technosphere
- argon, liquid: 2.34e-5 kg; lognormal variance with pedigree 0.002, pedigree (1,1,3,1,1)
  Estimation. Gas use in the power plant. Argon and helium are summed up in this exchange
  properties: dry mass 1 kg, wet mass 1 kg
- nitrogen, liquid: 5.55e-5 kg; lognormal variance with pedigree 0.002, pedigree (1,1,3,1,1)
  Estimation. Gas use in the power plant. Nitrogen use and use of forming gas (5-10% H2, 90-95% N2) are summed up in this exchange.
  properties: dry mass 1 kg, wet mass 1 kg
- carbon dioxide, liquid: 1.5e-7 kg; lognormal variance with pedigree 0.002, pedigree (1,1,3,1,1)
  Estimation. Gas use in the power plant.
  properties: dry mass 1 kg, carbon content, fossil 0.272727, wet mass 1 kg
- oxygen, liquid: 1.5e-5 kg; lognormal variance with pedigree 0.002, pedigree (1,1,3,1,1)
  Estimation. Gas use in the power plant.
  properties: wet mass 1 kg, dry mass 1 kg
- cationic resin: 1.06e-6 kg; lognormal variance with pedigree 0.002, pedigree (1,1,3,1,1)
  Operator information. All resin types needed are modeled as 50% anionic resin and 50% cationic resin.
  properties: dry mass 0.5 kg, wet mass 1 kg, carbon content, fossil 0.521606, water content 1
  note on carbon content, fossil: Chemically inert polystyrene beads are treated with concentrated sulfuric or chlorosulfonic acid to give cross-linked polystyrene 3-sulfonic acid (Cation exchange resins, Ullmann). The resine was approximated as C8H8O3S (from Ullmann, Cation exchange resins). The resine is hydrated (ecoinvent v2.2 report 8, part II, Tab 93.5)
- hydrogen, liquid: 9.25e-6 kg; lognormal variance with pedigree 0.002, pedigree (1,1,3,1,1)
  Estimation. Gas use in the power plant.
  properties: wet mass 1 kg, dry mass 1 kg
- uranium, enriched 3.8%, in fuel element for light water reactor: 2.68e-6 kg; lognormal variance with pedigree 0.002, pedigree (1,1,3,1,1)
  estimated variation over lifetime
  properties: dry mass 1 kg, wet mass 1 kg
- concrete, normal: 1.59e-8 m3; lognormal variance with pedigree 0.002, pedigree (1,1,3,1,1)
  Literature value
  properties: dry mass 2190 kg, wet mass 2380 kg, water content 0.086758
- nuclear power plant, boiling water reactor 1000MW: 2.89e-12 unit; lognormal variance with pedigree 0.0439, pedigree (2,2,5,5,2)
  Estimation. Total net electricity over a lifetime: 3.46E11 kWh
- lubricating oil: 1.46e-6 kg; name lubricating_oil; lognormal variance with pedigree 0.002, pedigree (1,1,3,1,1)
  Operator information. Oil and fats for hydraulic systems and general lubricating use.
  properties: carbon content, fossil 0.75, wet mass 1 kg, dry mass 1 kg
  note on carbon content, fossil: Lubricating oil is produced from diesel. C-content/dry mass of fats and oils considered 75%, from: ecoinvent v2.2 report, n 15a, pg 40
- chemical, inorganic: 6.01e-7 kg; lognormal variance with pedigree 0.002, pedigree (1,1,3,1,1)
  Operator information. Decontamination chemicals and salt for water softening.
  properties: wet mass 1 kg, dry mass 1 kg, carbon content, fossil 0.003
  note on carbon content, fossil: This dataset is an unweighted average of 20 inorganic substances (listed in Tab 88.1, ecoinvent v2.2 report 8, part II), being part of the top100 chemicals included in this database. The C-content has also been calculated as an unweighted average of the C content of the substances composing this dataset.
- boric acid, anhydrous, powder: 2.31e-8 kg; lognormal variance with pedigree 0.002, pedigree (1,1,3,1,1)
  Operator information.
  properties: wet mass 1 kg, dry mass 1 kg
- reinforcing steel: 7.7e-7 kg; lognormal variance with pedigree 0.002, pedigree (1,1,3,1,1)
  Operator information
  properties: wet mass 1 kg, dry mass 1 kg, carbon content, fossil 0.004
- cement, Portland: 7.71e-6 kg; lognormal variance with pedigree 0.022, pedigree (1,1,3,1,1)
  Operator information. Cement use for conditioning of the hard waste.
  properties: wet mass 1 kg, dry mass 1 kg
- nuclear fuel element, for boiling water reactor, UO2 4.0% & MOX: 0 kg; pedigree (5,5,5,5,5)
  Exchange present due to parent child relationship but not relevant in this dataset.
  properties: wet mass 1 kg, dry mass 1 kg
- diesel, burned in diesel-electric generating set, 10MW: 0.000333 MJ; lognormal variance with pedigree 0.002, pedigree (1,1,3,1,1)
  Estimation. Diesel use for testing of the emergency power in the power plant.
- acetylene: 3.24e-8 kg; lognormal variance with pedigree 0.002, pedigree (1,1,3,1,1)
  Operator information
  properties: wet mass 1 kg, dry mass 1 kg, carbon content, fossil 0.923077
  note on carbon content, fossil: C2H2. ecoinvent v2.2 report n 8. Produced from partial oxidation of natural gas
- low level radioactive waste: -1.6568e-8 m3; name low_level_waste; lognormal variance with pedigree 0.002, pedigree (1,1,3,1,1)
  Literature data
  production volume 208.057 m3; = low_level_waste * apv_electricity
    Calculated from the production volume of electricity, high voltage in proportion to the respective output amounts.
  property price 0 EUR2005; name low_level_waste_price_EUR2005
  properties: wet mass 2500 kg, dry mass 2500 kg
- nuclear power plant, boiling water reactor 1000MW: 0 unit; uniform min 0, max 0, pedigree (1,1,3,1,1)
  Estimation. Total net electricity over a lifetime: 3.46E11 kWh
- hazardous waste, for incineration: -8.73e-7 kg; name hazwaste; lognormal variance with pedigree 0.002, pedigree (1,1,3,1,1)
  Literature data
  production volume 10962.9 kg; = hazwaste * apv_electricity
    (same comment as for low level radioactive waste)
  property price 0 EUR2005; name hazwaste_price_EUR2005
  properties: carbon content, fossil 0.554667, dry mass 0.75 kg, wet mass 1 kg, water content 0.333333
  note on carbon content, fossil: Tab A.6, ecoinvent v2.2 report 13_I. C content has been calculated after data in the tables, and then referred to 1 kg DM
- chemical, organic: 1.24e-6 kg; lognormal variance with pedigree 0.002, pedigree (1,1,3,1,1)
  Operator information. This category contains solvents, frost protection, anticorrosives, industrial alcohol, washing agents.
  properties: wet mass 1 kg, dry mass 1 kg, carbon content, fossil 0.628
  note on carbon content, fossil: This dataset is an unweighted average of 20 organic substances (listed in Tab 88.1, ecoinvent v2.2 report 8, part II), being part of the top100 chemicals included in this database. The C-content has also been calculated as an unweighted average of the C content of the substances composing this dataset.
- anionic resin: 1.06e-6 kg; lognormal variance with pedigree 0.002, pedigree (1,1,3,1,1)
  (same comment as for cationic resin)
  properties: carbon content, fossil 0.680721, wet mass 1 kg, dry mass 0.5 kg, water content 1
  note on carbon content, fossil: Cross-linked polystyrene beads are treated with chloromethyl methyl ether under anhydrous conditions, with either aluminum chloride or tin(IV) chloride as catalyst. Chloromethylated polystyrene is obtained. In a second stage, the chlorine in the chloromethylated group can be replaced by an amine (Anion exchange resins, in Ullmann). In this case, Trimethylamine, C3H9N, is used (ecoinvent v2.2 report 8-part 93). That is, the resine can be formulated as C12H18NCl (after Ullmann, Anion exchange resins). The resine is hydrated (ecoinvent v2.2 report 8, part II, Tab 93.7)
- cast iron: 1.16e-7 kg; lognormal variance with pedigree 0.012, pedigree (1,1,3,1,1)
  Operator information
  properties: carbon content, fossil 0.04, wet mass 1 kg, dry mass 1 kg
  note on carbon content, fossil: Cast iron is made by remelting pig iron in small furnaces (e.g. cupola furnaces or electric arc furnaces) and poured into moulds to make castings. It usually contains 2% to 6% carbon (ecoinvent v2.2 report 10_partII). An average content of 4% was considered
- low level radioactive waste for final repository: -4.05e-8 m3; name low_level_waste_final; lognormal variance with pedigree 0.032, pedigree (1,1,3,1,1)
  Literature data
  production volume 508.589 m3; = low_level_waste_final * apv_electricity
    (same comment as for low level radioactive waste)
  property price 0 EUR2005; name low_level_waste_final_price_EUR2005
  properties: dry mass 2500 kg, wet mass 2500 kg
- borax, anhydrous, powder: 2.89e-8 kg; lognormal variance with pedigree 0.002, pedigree (1,1,3,1,1)
  Operator information.
  properties: wet mass 1 kg, dry mass 1 kg
- fly ash and scrubber sludge: -1.97e-6 kg; name fly_ash; lognormal variance with pedigree 0.002, pedigree (1,1,3,1,1)
  Literature data
  production volume 24738.8 kg; = fly_ash * apv_electricity
    (same comment as for low level radioactive waste)
  property price 0 EUR2005; name fly_ash_price_EUR2005
  properties: wet mass 1 kg, carbon content, fossil 0.167, dry mass 0.1 kg, water content 9
- paper, woodfree, coated: 5.78e-7 kg; lognormal variance with pedigree 0.002, pedigree (1,1,3,1,1)
  Operator information. Paper use in office. No other office materials have been considered.
  properties: carbon content, non-fossil 0.22775, carbon content, fossil 0.0590617, water content 0.0582011, wet mass 1 kg, dry mass 0.945 kg
  note on carbon content, non-fossil: Biogenic C content was calculated after biogenic C contents of chemicals used in the production of the paper (in Tab 8.72 & 8.73 ecoinvent v2.2 report 11_III, part 8). The cellulose content in 1 kg of paper (on a wet mas basis) was estimated as (1-chemical content), C content of cellulose was considered 0.44 kgC/kg dry mass (ecoinvent v2.2 report, n 15a, pg 40)
  note on carbon content, fossil: Fossil C content was calculated after fossil C contents of chemicals used in the production of the paper (in Tab 8.72 & 8.73 ecoinvent v2.2 report 11_III, part 8).
- waste mineral oil: -1.46e-6 kg; name waste_oil; = (lubricating_oil)*-1; lognormal variance with pedigree 0.002, pedigree (1,1,3,1,1)
  Literature data
  production volume 18334.3 kg; = waste_oil* apv_electricity
    (same comment as for low level radioactive waste)
  property price 0 EUR2005; name waste_oil_price_EUR2005
  properties: wet mass 1 kg, dry mass 0.9 kg, carbon content, fossil 0.864444, water content 0.111111
- flat glass, coated: 3.93e-6 kg; lognormal variance with pedigree 0.002, pedigree (1,1,3,1,1)
  Operator information. Materials for sand blasting equipment.
  properties: dry mass 1 kg, wet mass 1 kg
- spent nuclear fuel: -2.68e-6 kg; name spent_nuclear_fuel; lognormal variance with pedigree 0.002, pedigree (1,1,3,1,1)
  Literature data
  production volume 33654.8 kg; = spent_nuclear_fuel * apv_electricity
    (same comment as for low level radioactive waste)
  property price 0 EUR2005; name spent_nuclear_price_EUR2005
  properties: dry mass 1 kg, wet mass 1 kg
- water, decarbonised: 3.2812 kg; name water_decarbonised_input; = 900/(8.65E9/(365*24*60*60)); lognormal variance with pedigree 0.002, pedigree (1,1,3,1,1)
  It is estimated that all decarbonised water in the mentioned table is evaporated.
  Estimated average net electricity production per year: 8.65E9 kWh/y (Tab. 9.3, p. 166)
  Water use in BWR see Tab. 9.17 p.196 in Dones et al. - decarbonised water use (900 kg/s)
  Literature value/estimation.
  In contrast to the literature reference and the datasets in ecoinvent version 2, this dataset only takes into account real water use, i.e. the water which is evaporated during the cooling process.
  properties: wet mass 1 kg
- steel, low-alloyed, hot rolled: 5.4e-6 kg; lognormal variance with pedigree 0.042, pedigree (1,1,3,1,1)
  Literature value
  properties: wet mass 1 kg, dry mass 1 kg, carbon content, fossil 0.005
  note on carbon content, fossil: Low alloyed steel composition given in Tab. 3.2 ecoinvent v2.2 report 10_partII. Steel assumed to have a C content of 0.5%

## Inputs from nature
- Water, cooling, unspecified natural origin [natural resource, in water]: 0.073769 m3; name water_cooling_UNO_input; lognormal variance with pedigree 0.098025, pedigree (4,4,4,2,4)
  Calculated based on literature data.
  property carbon content, non-fossil 0; name C_content_non_fossil
  property dry mass 0.1101 kg; name DM
  property water content 9081.65; name water_content
  property carbon content, fossil 0.0104329; name C_content_fossil
  property wet mass 1000 kg; name WM
  property water in wet mass 999.89 kg; name WWM

## Emissions to nature
- Hydrogen-3, Tritium [water, surface water]: 0.0975 kBq; lognormal variance with pedigree 0.042, pedigree (1,1,3,1,1)
  Operator data. Weighted radioactive emissions into water of Swiss nuclear power plants 1995-2002 (Weighting with net electricity production).
  BAG 1996-2003. Bundesamt für Gesundheit. Umweltradioaktivitat und Strahlendosen in der Schweiz. BAG, Abteilung Strahlenschutz, Sektion Überwachung der Radioaktivitat. Freiburg, Schweiz.
- Iodine-131 [water, surface water]: 4.62e-6 kBq; lognormal variance with pedigree 0.042, pedigree (1,1,3,1,1)
  BAG 1996-2003. Bundesamt für Gesundheit. Umweltradioaktivitat und Strahlendosen in der Schweiz. BAG, Abteilung Strahlenschutz, Sektion Überwachung der Radioaktivitat. Freiburg, Schweiz.
  Operator data. Weighted radioactive emissions into water of Swiss nuclear power plants 1995-2002 (Weighting with net electricity production).
- Cerium-141 [air, non-urban air or from high stacks]: 4.51e-7 kBq; lognormal variance with pedigree 0.042, pedigree (1,1,3,1,1)
  Operator data. Weighted radioactive emissions into air of Swiss nuclear power plants 1995-2002 (Weighting with net electricity production).
  BAG 1996-2003. Bundesamt für Gesundheit. Umweltradioaktivitat und Strahlendosen in der Schweiz. BAG, Abteilung Strahlenschutz, Sektion Überwachung der Radioaktivitat. Freiburg, Schweiz.
- Iodine-131 [air, non-urban air or from high stacks]: 6.44e-5 kBq; lognormal variance with pedigree 0.042, pedigree (1,1,3,1,1)
  BAG 1996-2003. Bundesamt für Gesundheit. Umweltradioaktivitat und Strahlendosen in der Schweiz. BAG, Abteilung Strahlenschutz, Sektion Überwachung der Radioaktivitat. Freiburg, Schweiz.
  Operator data. Weighted radioactive emissions into air of Swiss nuclear power plants 1995-2002 (Weighting with net electricity production).
- Krypton-88 [air, non-urban air or from high stacks]: 0.00786 kBq; lognormal variance with pedigree 0.042, pedigree (1,1,3,1,1)
  (same comment as for Iodine-131)
- Molybdenum-99 [water, surface water]: 1.77e-6 kBq; lognormal variance with pedigree 0.042, pedigree (1,1,3,1,1)
  (same comment as for Hydrogen-3, Tritium)
- Cobalt-58 [water, surface water]: 7.84e-5 kBq; lognormal variance with pedigree 0.042, pedigree (1,1,3,1,1)
  (same comment as for Iodine-131)
- Xenon-135m [air, non-urban air or from high stacks]: 0.289 kBq; lognormal variance with pedigree 0.042, pedigree (1,1,3,1,1)
  (same comment as for Iodine-131)
- Cobalt-60 [water, surface water]: 0.000844 kBq; lognormal variance with pedigree 0.042, pedigree (1,1,3,1,1)
  (same comment as for Hydrogen-3, Tritium)
- Krypton-85 [air, non-urban air or from high stacks]: 0.00468 kBq; lognormal variance with pedigree 0.042, pedigree (1,1,3,1,1)
  (same comment as for Cerium-141)
- Lanthanum-140 [water, surface water]: 4.55e-6 kBq; lognormal variance with pedigree 0.042, pedigree (1,1,3,1,1)
  (same comment as for Hydrogen-3, Tritium)
- Zinc-65 [water, surface water]: 0.000182 kBq; lognormal variance with pedigree 0.042, pedigree (1,1,3,1,1)
  (same comment as for Iodine-131)
- Zinc-65 [air, non-urban air or from high stacks]: 7.39e-8 kBq; lognormal variance with pedigree 0.042, pedigree (1,1,3,1,1)
  (same comment as for Iodine-131)
- Iron-59 [water, surface water]: 3.22e-7 kBq; lognormal variance with pedigree 0.042, pedigree (1,1,3,1,1)
  (same comment as for Hydrogen-3, Tritium)
- Cesium-137 [water, surface water]: 0.000453 kBq; lognormal variance with pedigree 0.042, pedigree (1,1,3,1,1)
  (same comment as for Iodine-131)
- Technetium-99m [water, surface water]: 3.74e-5 kBq; lognormal variance with pedigree 0.042, pedigree (1,1,3,1,1)
  (same comment as for Hydrogen-3, Tritium)
- Cobalt-60 [air, non-urban air or from high stacks]: 2.63e-7 kBq; lognormal variance with pedigree 0.042, pedigree (1,1,3,1,1)
  (same comment as for Iodine-131)
- Niobium-95 [air, non-urban air or from high stacks]: 1.62e-9 kBq; lognormal variance with pedigree 0.042, pedigree (1,1,3,1,1)
  (same comment as for Cerium-141)
- Radioactive species, other beta emitters [air, non-urban air or from high stacks]: 0 kBq; pedigree (5,5,5,5,5)
  Exchange present due to parent child relationship but not relevant in this dataset.
- Xenon-137 [air, non-urban air or from high stacks]: 0.00917 kBq; lognormal variance with pedigree 0.042, pedigree (1,1,3,1,1)
  (same comment as for Cerium-141)
- Zirconium-95 [air, non-urban air or from high stacks]: 1.59e-9 kBq; lognormal variance with pedigree 0.042, pedigree (1,1,3,1,1)
  (same comment as for Cerium-141)
- Radioactive species, Nuclides, unspecified [water, surface water]: 0 kBq; pedigree (5,5,5,5,5)
  Exchange present due to parent child relationship but not relevant in this dataset.
- Cesium-137 [air, non-urban air or from high stacks]: 3.74e-7 kBq; lognormal variance with pedigree 0.042, pedigree (1,1,3,1,1)
  (same comment as for Cerium-141)
- Cobalt-58 [air, non-urban air or from high stacks]: 2.02e-8 kBq; lognormal variance with pedigree 0.042, pedigree (1,1,3,1,1)
  (same comment as for Cerium-141)
- Tellurium-123m [water, surface water]: 0 kBq; pedigree (5,5,5,5,5)
  Exchange present due to parent child relationship but not relevant in this dataset.
- Xenon-133m [air, non-urban air or from high stacks]: 0.00107 kBq; lognormal variance with pedigree 0.042, pedigree (1,1,3,1,1)
  (same comment as for Iodine-131)
- Cerium-141 [water, surface water]: 1.72e-6 kBq; lognormal variance with pedigree 0.042, pedigree (1,1,3,1,1)
  (same comment as for Hydrogen-3, Tritium)
- Xenon-133 [air, non-urban air or from high stacks]: 0.407 kBq; lognormal variance with pedigree 0.042, pedigree (1,1,3,1,1)
  (same comment as for Iodine-131)
- Barium-140 [air, non-urban air or from high stacks]: 1.86e-6 kBq; lognormal variance with pedigree 0.042, pedigree (1,1,3,1,1)
  (same comment as for Iodine-131)
- Cesium-134 [water, surface water]: 6.21e-6 kBq; lognormal variance with pedigree 0.042, pedigree (1,1,3,1,1)
  (same comment as for Hydrogen-3, Tritium)
- Lanthanum-140 [air, non-urban air or from high stacks]: 1.59e-7 kBq; lognormal variance with pedigree 0.042, pedigree (1,1,3,1,1)
  (same comment as for Cerium-141)
- Water [air, unspecified]: 0.00293373 m3; name water_to_air_unspecified; = (water_decarbonised_input/1000)*fraction_WDC_to_air+water_cooling_UNO_input*fraction_CW_to_air; lognormal variance with pedigree 0.098025, pedigree (4,4,4,2,4)
  Calculated value based on literature values and expert opinion. See comments in the parametres' comment field.
  property fraction, origin: salt water 0; name fraction_origin_salt_water
  property fraction, origin: unspecified 0.771054; name fraction_origin_unspecified
  property fraction, origin: fresh water 0.228946; name fraction_origin_fresh_water
- Xenon-138 [air, non-urban air or from high stacks]: 0.0683 kBq; lognormal variance with pedigree 0.042, pedigree (1,1,3,1,1)
  (same comment as for Cerium-141)
- Radioactive species, alpha emitters [water, surface water]: 4.69e-8 kBq; lognormal variance with pedigree 0.042, pedigree (1,1,3,1,1)
  (same comment as for Hydrogen-3, Tritium)
- Hydrogen-3, Tritium [air, non-urban air or from high stacks]: 0.0614 kBq; lognormal variance with pedigree 0.042, pedigree (1,1,3,1,1)
  (same comment as for Cerium-141)
- Antimony-124 [air, non-urban air or from high stacks]: 2.16e-9 kBq; lognormal variance with pedigree 0.042, pedigree (1,1,3,1,1)
  (same comment as for Cerium-141)
- Chromium-51 [air, non-urban air or from high stacks]: 2.89e-8 kBq; lognormal variance with pedigree 0.042, pedigree (1,1,3,1,1)
  (same comment as for Iodine-131)
- Antimony-124 [water, surface water]: 1e-6 kBq; lognormal variance with pedigree 0.042, pedigree (1,1,3,1,1)
  (same comment as for Hydrogen-3, Tritium)
- Manganese-54 [water, surface water]: 7.29e-5 kBq; lognormal variance with pedigree 0.042, pedigree (1,1,3,1,1)
  (same comment as for Iodine-131)
- Cesium-134 [air, non-urban air or from high stacks]: 2.16e-8 kBq; lognormal variance with pedigree 0.042, pedigree (1,1,3,1,1)
  (same comment as for Cerium-141)
- Barium-140 [water, surface water]: 4.84e-6 kBq; lognormal variance with pedigree 0.042, pedigree (1,1,3,1,1)
  (same comment as for Hydrogen-3, Tritium)
- Krypton-87 [air, non-urban air or from high stacks]: 0.00594 kBq; lognormal variance with pedigree 0.042, pedigree (1,1,3,1,1)
  (same comment as for Cerium-141)
- Strontium-89 [water, surface water]: 2.55e-5 kBq; lognormal variance with pedigree 0.042, pedigree (1,1,3,1,1)
  (same comment as for Iodine-131)
- Ruthenium-103 [air, non-urban air or from high stacks]: 3.86e-10 kBq; lognormal variance with pedigree 0.042, pedigree (1,1,3,1,1)
  (same comment as for Iodine-131)
- Krypton-89 [air, non-urban air or from high stacks]: 0.00335 kBq; lognormal variance with pedigree 0.042, pedigree (1,1,3,1,1)
  (same comment as for Cerium-141)
- Sodium-24 [water, surface water]: 1.25e-6 kBq; lognormal variance with pedigree 0.042, pedigree (1,1,3,1,1)
  (same comment as for Iodine-131)
- Xenon-131m [air, non-urban air or from high stacks]: 0.0312 kBq; lognormal variance with pedigree 0.042, pedigree (1,1,3,1,1)
  (same comment as for Iodine-131)
- Zirconium-95 [water, surface water]: 2.78e-7 kBq; lognormal variance with pedigree 0.042, pedigree (1,1,3,1,1)
  (same comment as for Hydrogen-3, Tritium)
- Krypton-85m [air, non-urban air or from high stacks]: 0.0147 kBq; lognormal variance with pedigree 0.042, pedigree (1,1,3,1,1)
  (same comment as for Cerium-141)
- Aerosols, radioactive, unspecified [air, non-urban air or from high stacks]: 8.73e-9 kBq; lognormal variance with pedigree 0.042, pedigree (1,1,3,1,1)
  (same comment as for Cerium-141)
- Manganese-54 [air, non-urban air or from high stacks]: 1.48e-8 kBq; lognormal variance with pedigree 0.042, pedigree (1,1,3,1,1)
  (same comment as for Cerium-141)
- Iodine-133 [water, surface water]: 2.53e-6 kBq; lognormal variance with pedigree 0.042, pedigree (1,1,3,1,1)
  (same comment as for Hydrogen-3, Tritium)
- Argon-41 [air, non-urban air or from high stacks]: 0.00107 kBq; lognormal variance with pedigree 0.042, pedigree (1,1,3,1,1)
  (same comment as for Iodine-131)
- Chromium-51 [water, surface water]: 0.000345 kBq; lognormal variance with pedigree 0.042, pedigree (1,1,3,1,1)
  (same comment as for Iodine-131)
- Ruthenium-103 [water, surface water]: 2.67e-8 kBq; lognormal variance with pedigree 0.042, pedigree (1,1,3,1,1)
  (same comment as for Iodine-131)
- Strontium-90 [water, surface water]: 2.87e-6 kBq; lognormal variance with pedigree 0.042, pedigree (1,1,3,1,1)
  (same comment as for Hydrogen-3, Tritium)
- Water [water, unspecified]: 0.0741165 m3; name water_to_water_unspecified; = (water_decarbonised_input/1000)*(1-fraction_WDC_to_air)+water_cooling_UNO_input*(1-fraction_CW_to_air); lognormal variance with pedigree 0.098025, pedigree (4,4,4,2,4)
  (same comment as for Water)
  property fraction, origin: fresh water 0.0917233; name fraction_origin_fresh_water_Ww
  property fraction, origin: unspecified 0.908277; name fraction_origin_unspecified_Ww
  property fraction, origin: salt water 0; name fraction_origin_salt_water_Ww
- Antimony-125 [water, surface water]: 1.31e-6 kBq; lognormal variance with pedigree 0.042, pedigree (1,1,3,1,1)
  (same comment as for Iodine-131)
- Carbon-14 [air, non-urban air or from high stacks]: 0.0467 kBq; lognormal variance with pedigree 0.042, pedigree (1,1,3,1,1)
  (same comment as for Iodine-131)
- Xenon-135 [air, non-urban air or from high stacks]: 0.255 kBq; lognormal variance with pedigree 0.042, pedigree (1,1,3,1,1)
  (same comment as for Iodine-131)
- Niobium-95 [water, surface water]: 2.59e-6 kBq; lognormal variance with pedigree 0.042, pedigree (1,1,3,1,1)
  (same comment as for Iodine-131)
- Silver-110 [water, surface water]: 0.00128 kBq; lognormal variance with pedigree 0.042, pedigree (1,1,3,1,1)
  (same comment as for Iodine-131)

## Sampling procedure
Literature, statistics, and information from operators.

## Review by Carl Vadenbo 2015-07-03
The update of the whole electricity sector for the ecoinvent v3.2 database consist of hundreds of datasets. All these datasets have passed through a streamlined review processes where the underlying modelling of production volumes, technology shares and efficiencies was reviewed in detail prior to the datasets being submitted to the database.
