# treatment of hard coal ash, residual material landfill

Dataset: EcoSpold 2, unit process
Geography: FR
Time period: 1994-01-01 to 2019-12-31
Technology level: current
Classification: EcoSpold01Categories: waste management/residual material landfill
Classification: ISIC rev.4 ecoinvent: 3822:Treatment and disposal of hazardous waste
Tags: Treatment; ConvertedDataset
Scenario: Business-as-Usual
System model: Allocation at the point of substitution
Generated by: Gabor Doka (obsolete)
Published in: Doka G. 2009
Database: ecoinvent
isCopyrightProtected: true
accessRestrictedTo: 1

## General comment
Inventoried waste contains 100% FR hard coal ash; .
waste composition (wet, in ppm): H2O n.a.; O 540660; H n.a.; C n.a.; S 2629.4; N n.a.; P 1026.8; B 219.46; Cl 35.935; Br 39.825; F 82.318; I 2.7918; Ag n.a.; As 50.08; Ba 1494.4; Cd 0.81967; Co 39.332; Cr 148.13; Cu 74.111; Hg 0.13533; Mn 429.54; Mo 12.58; Ni 112.38; Pb 132.49; Sb 14.047; Se 10.231; Sn 34.465; V 211.82; Zn 631.72; Be 13.254; Sc 41.949; Sr 1515.5; Ti 6333.1; Tl 6.5216; W 17.367; Si 185270; Fe 52187; Ca 14819; Al 126300; K 14737; Mg 43325; Na 7345.1;
Share of carbon in waste that is biogenic 60.4%.
[This dataset was already contained in the ecoinvent database version 2. It was not individually updated during the transfer to ecoinvent version 3. Life Cycle Impact Assessment results may still have changed, as they are affected by changes in the supply chain, i.e. in other datasets. This dataset was generated following the ecoinvent quality guidelines for version 2. It may have been subject to central changes described in the ecoinvent version 3 change report (http://www.ecoinvent.org/database/ecoinvent-version-3/reports-of-changes/), and the results of the central updates were reviewed extensively. The changes added e.g. consistent water flows and other information throughout the database. The documentation of this dataset can be found in the ecoinvent reports of version 2, which are still available via the ecoinvent website. The change report linked above covers all central changes that were made during the conversion process.]

## Included activities end
Waste-specific short-term emissions to water from leachate. Long-term emissions from landfill to ground water.

## Geography
Technology encountered in Switzerland in 2000. Landfill includes base seal and leachate collection system.

## Technology
Swiss residual material landfill for polluted, inorganic waste. With base seal and leachate collection system. Recultivation after closure.

## Time period
Waste composition as given in literature reference, theoretical data or other source. Transfer coefficients from prospective model.

## Reference product
- hard coal ash: -1 kg; CPC 39: Wastes or scraps; By-product classification Waste
  EcoSpold01Location=FR
  production volume 4.92017e7 kg
    Estimated. Energy prodcution in mainly responsible for hard coal ashes. The production volume is calculated as the sum of hard coal ashes resulting from electricity and heat and power co-generation production from hard coal in the respective country.
  property price 0 EUR2005
    Waste products are assigned a price of zero as they are assumed to require further treatment.
  property carbon content 0
    carbon content on a dry matter basis (reserved; not for manual entry)
  properties: carbon content, non-fossil 0, water in wet mass 0 kg, wet mass 1 kg, dry mass 1 kg, carbon content, fossil 0, water content 0, carbon allocation 0 kg

## Inputs from technosphere
- process-specific burdens, residual material landfill: 1 kg; lognormal variance with pedigree 0.04, pedigree (1,1,5,1,1)
  EcoSpold01Location=CH
  demands per kilogram waste. uncertainty is heeded in the module;activityLink introduced to establish a direct link to the corresponding regional supply of this product
- residual material landfill: 2.0833e-9 unit; lognormal variance with pedigree 0.04, pedigree (1,1,5,1,1)
  EcoSpold01Location=CH
  demands per kilogram waste. uncertainty is heeded in the module

## Emissions to nature
- Nickel, ion [water, ground-, long-term]: 4.0685e-5 kg; lognormal variance with pedigree 1.24, pedigree (1,1,5,1,1)
  uncertainty is calculated from uncertainties in waste composition and transfer coefficients in incinerator and landfills.
- Titanium, ion [water, ground-, long-term]: 0.00188 kg; lognormal variance with pedigree 0.83, pedigree (1,1,5,1,1)
  (same comment as for Nickel, ion)
- Tungsten [water, ground-, long-term]: 1.1243e-5 kg; lognormal variance with pedigree 1.24, pedigree (1,1,5,1,1)
  (same comment as for Nickel, ion)
- Sodium, ion [water, ground-, long-term]: 0.0045887 kg; lognormal variance with pedigree 0.45, pedigree (1,1,5,1,1)
  (same comment as for Nickel, ion)
- Sulfate [water, surface water]: 0.00084632 kg; lognormal variance with pedigree 0.69, pedigree (1,1,5,1,1)
  uncertainty is calculated from uncertainties in waste composition and transfer coefficients in residual landfill
- Nickel, ion [water, surface water]: 6.7922e-8 kg; lognormal variance with pedigree 1.7, pedigree (1,1,5,1,1)
  (same comment as for Sulfate)
- Phosphate [water, ground-, long-term]: 0.00070337 kg; lognormal variance with pedigree 1.26, pedigree (1,1,5,1,1)
  (same comment as for Nickel, ion)
- Vanadium, ion [water, ground-, long-term]: 0.00016281 kg; lognormal variance with pedigree 0.92, pedigree (1,1,5,1,1)
  (same comment as for Nickel, ion)
- Beryllium [water, surface water]: 8.011e-9 kg; lognormal variance with pedigree 1.99, pedigree (1,1,5,1,1)
  (same comment as for Sulfate)
- Mercury [water, surface water]: 1.0664e-11 kg; lognormal variance with pedigree 2.85, pedigree (1,1,5,1,1)
  (same comment as for Sulfate)
- Beryllium [water, ground-, long-term]: 4.7986e-6 kg; lognormal variance with pedigree 1.53, pedigree (1,1,5,1,1)
  (same comment as for Nickel, ion)
- Titanium, ion [water, surface water]: 3.1386e-6 kg; lognormal variance with pedigree 1.21, pedigree (1,1,5,1,1)
  (same comment as for Sulfate)
- Silicon [water, surface water]: 0.00041665 kg; lognormal variance with pedigree 0.66, pedigree (1,1,5,1,1)
  (same comment as for Sulfate)
- Mercury [water, ground-, long-term]: 6.3879e-9 kg; lognormal variance with pedigree 4.2, pedigree (1,1,5,1,1)
  (same comment as for Nickel, ion)
- Fluoride [water, surface water]: 4.4609e-6 kg; lognormal variance with pedigree 1.21, pedigree (1,1,5,1,1)
  (same comment as for Sulfate)
- Barium [water, ground-, long-term]: 1.2344e-5 kg; lognormal variance with pedigree 6.4, pedigree (1,1,5,1,1)
  (same comment as for Nickel, ion)
- Cadmium, ion [water, surface water]: 9.2899e-12 kg; lognormal variance with pedigree 2.88, pedigree (1,1,5,1,1)
  (same comment as for Sulfate)
- Cadmium, ion [water, ground-, long-term]: 5.5646e-9 kg; lognormal variance with pedigree 7.87, pedigree (1,1,5,1,1)
  (same comment as for Nickel, ion)
- Arsenic, ion [water, surface water]: 5.008e-5 kg; lognormal variance with pedigree 1.09, pedigree (1,1,5,1,1)
  (same comment as for Sulfate)
- Potassium, ion [water, surface water]: 0.004154 kg; lognormal variance with pedigree 0.4, pedigree (1,1,5,1,1)
  (same comment as for Sulfate)
- Magnesium [water, surface water]: 8.2183e-6 kg; lognormal variance with pedigree 1.11, pedigree (1,1,5,1,1)
  (same comment as for Sulfate)
- Tin, ion [water, surface water]: 1.0903e-9 kg; lognormal variance with pedigree 2.25, pedigree (1,1,5,1,1)
  (same comment as for Sulfate)
- Scandium [water, ground-, long-term]: 3.6029e-5 kg; lognormal variance with pedigree 1.12, pedigree (1,1,5,1,1)
  (same comment as for Nickel, ion)
- Boron [water, ground-, long-term]: 0.00021578 kg; lognormal variance with pedigree 0.9, pedigree (1,1,5,1,1)
  (same comment as for Nickel, ion)
- Strontium [water, surface water]: 9.1596e-7 kg; lognormal variance with pedigree 1.36, pedigree (1,1,5,1,1)
  (same comment as for Sulfate)
- Selenium [water, surface water]: 3.6081e-6 kg; lognormal variance with pedigree 1.33, pedigree (1,1,5,1,1)
  (same comment as for Sulfate)
- Aluminium [water, surface water]: 6.2591e-5 kg; lognormal variance with pedigree 0.89, pedigree (1,1,5,1,1)
  (same comment as for Sulfate)
- Manganese [water, ground-, long-term]: 3.5481e-6 kg; lognormal variance with pedigree 6.56, pedigree (1,1,5,1,1)
  (same comment as for Nickel, ion)
- Thallium [water, ground-, long-term]: 2.3611e-6 kg; lognormal variance with pedigree 1.62, pedigree (1,1,5,1,1)
  (same comment as for Nickel, ion)
- Copper, ion [water, surface water]: 4.7627e-9 kg; lognormal variance with pedigree 2.06, pedigree (1,1,5,1,1)
  (same comment as for Sulfate)
- Sulfate [water, ground-, long-term]: 0.0070419 kg; lognormal variance with pedigree 0.57, pedigree (1,1,5,1,1)
  (same comment as for Nickel, ion)
- Calcium, ion [water, ground-, long-term]: 0.001339 kg; lognormal variance with pedigree 1.81, pedigree (1,1,5,1,1)
  (same comment as for Nickel, ion)
- Lead [water, ground-, long-term]: 6.8726e-7 kg; lognormal variance with pedigree 7.89, pedigree (1,1,5,1,1)
  (same comment as for Nickel, ion)
- Chromium VI [water, surface water]: 8.9042e-6 kg; lognormal variance with pedigree 1.12, pedigree (1,1,5,1,1)
  (same comment as for Sulfate)
- Thallium [water, surface water]: 3.9417e-9 kg; lognormal variance with pedigree 2.08, pedigree (1,1,5,1,1)
  (same comment as for Sulfate)
- Iron, ion [water, ground-, long-term]: 0.00026156 kg; lognormal variance with pedigree 7.24, pedigree (1,1,5,1,1)
  (same comment as for Nickel, ion)
- Lead [water, surface water]: 1.1473e-9 kg; lognormal variance with pedigree 2.24, pedigree (1,1,5,1,1)
  (same comment as for Sulfate)
- Tin, ion [water, ground-, long-term]: 6.5309e-7 kg; lognormal variance with pedigree 5.08, pedigree (1,1,5,1,1)
  (same comment as for Nickel, ion)
- Potassium, ion [water, ground-, long-term]: 0.010583 kg; lognormal variance with pedigree 0.37, pedigree (1,1,5,1,1)
  (same comment as for Nickel, ion)
- Copper, ion [water, ground-, long-term]: 2.8529e-6 kg; lognormal variance with pedigree 3.69, pedigree (1,1,5,1,1)
  (same comment as for Nickel, ion)
- Bromine [water, ground-, long-term]: 7.8335e-6 kg; lognormal variance with pedigree 1.14, pedigree (1,1,5,1,1)
  (same comment as for Nickel, ion)
- Molybdenum [water, surface water]: 1.2522e-5 kg; lognormal variance with pedigree 1.28, pedigree (1,1,5,1,1)
  (same comment as for Sulfate)
- Calcium, ion [water, surface water]: 2.2354e-6 kg; lognormal variance with pedigree 1.26, pedigree (1,1,5,1,1)
  (same comment as for Sulfate)
- Chloride [water, surface water]: 1.0278e-5 kg; lognormal variance with pedigree 1.18, pedigree (1,1,5,1,1)
  (same comment as for Sulfate)
- Vanadium, ion [water, surface water]: 5.1984e-7 kg; lognormal variance with pedigree 1.44, pedigree (1,1,5,1,1)
  (same comment as for Sulfate)
- Iron, ion [water, surface water]: 4.3666e-7 kg; lognormal variance with pedigree 1.51, pedigree (1,1,5,1,1)
  (same comment as for Sulfate)
- Tungsten [water, surface water]: 6.1247e-6 kg; lognormal variance with pedigree 1.26, pedigree (1,1,5,1,1)
  (same comment as for Sulfate)
- Cobalt [water, ground-, long-term]: 6.7244e-6 kg; lognormal variance with pedigree 1.91, pedigree (1,1,5,1,1)
  (same comment as for Nickel, ion)
- Arsenic, ion [water, ground-, long-term]: 5.008e-14 kg; lognormal variance with pedigree 1.12, pedigree (1,1,5,1,1)
  (same comment as for Nickel, ion)
- Magnesium [water, ground-, long-term]: 0.0049227 kg; lognormal variance with pedigree 1.42, pedigree (1,1,5,1,1)
  (same comment as for Nickel, ion)
- Cobalt [water, surface water]: 1.1226e-8 kg; lognormal variance with pedigree 1.94, pedigree (1,1,5,1,1)
  (same comment as for Sulfate)
- Molybdenum [water, ground-, long-term]: 5.7754e-8 kg; lognormal variance with pedigree 1.3, pedigree (1,1,5,1,1)
  (same comment as for Nickel, ion)
- Selenium [water, ground-, long-term]: 6.623e-6 kg; lognormal variance with pedigree 1.31, pedigree (1,1,5,1,1)
  (same comment as for Nickel, ion)
- Bromine [water, surface water]: 3.1992e-5 kg; lognormal variance with pedigree 1.13, pedigree (1,1,5,1,1)
  (same comment as for Sulfate)
- Strontium [water, ground-, long-term]: 0.00054866 kg; lognormal variance with pedigree 0.9, pedigree (1,1,5,1,1)
  (same comment as for Nickel, ion)
- Antimony [water, surface water]: 4.9538e-6 kg; lognormal variance with pedigree 1.29, pedigree (1,1,5,1,1)
  (same comment as for Sulfate)
- Barium [water, surface water]: 2.0608e-8 kg; lognormal variance with pedigree 1.86, pedigree (1,1,5,1,1)
  (same comment as for Sulfate)
- Zinc, ion [water, surface water]: 1.2926e-8 kg; lognormal variance with pedigree 1.92, pedigree (1,1,5,1,1)
  (same comment as for Sulfate)
- Aluminium [water, ground-, long-term]: 0.037492 kg; lognormal variance with pedigree 0.51, pedigree (1,1,5,1,1)
  (same comment as for Nickel, ion)
- Chloride [water, ground-, long-term]: 2.5657e-5 kg; lognormal variance with pedigree 1.14, pedigree (1,1,5,1,1)
  (same comment as for Nickel, ion)
- Fluoride [water, ground-, long-term]: 7.7857e-5 kg; lognormal variance with pedigree 1.03, pedigree (1,1,5,1,1)
  (same comment as for Nickel, ion)
- Silicon [water, ground-, long-term]: 0.18485 kg; lognormal variance with pedigree 0.11, pedigree (1,1,5,1,1)
  (same comment as for Nickel, ion)
- Iodide [water, ground-, long-term]: 2.7918e-13 kg; lognormal variance with pedigree 1.5, pedigree (1,1,5,1,1)
  (same comment as for Nickel, ion)
- Iodide [water, surface water]: 2.7918e-6 kg; lognormal variance with pedigree 1.48, pedigree (1,1,5,1,1)
  (same comment as for Sulfate)
- Boron [water, surface water]: 1.7195e-6 kg; lognormal variance with pedigree 1.29, pedigree (1,1,5,1,1)
  (same comment as for Sulfate)
- Antimony [water, ground-, long-term]: 9.0933e-6 kg; lognormal variance with pedigree 1.27, pedigree (1,1,5,1,1)
  (same comment as for Nickel, ion)
- Chromium VI [water, ground-, long-term]: 2.8127e-5 kg; lognormal variance with pedigree 0.96, pedigree (1,1,5,1,1)
  (same comment as for Nickel, ion)
- Scandium [water, surface water]: 5.9203e-6 kg; lognormal variance with pedigree 1.21, pedigree (1,1,5,1,1)
  (same comment as for Sulfate)
- Sodium, ion [water, surface water]: 0.0027565 kg; lognormal variance with pedigree 0.47, pedigree (1,1,5,1,1)
  (same comment as for Sulfate)
- Phosphate [water, surface water]: 1.1742e-6 kg; lognormal variance with pedigree 1.48, pedigree (1,1,5,1,1)
  (same comment as for Sulfate)
- Manganese [water, surface water]: 5.9234e-9 kg; lognormal variance with pedigree 2.03, pedigree (1,1,5,1,1)
  (same comment as for Sulfate)
- Zinc, ion [water, ground-, long-term]: 7.7424e-6 kg; lognormal variance with pedigree 5.6, pedigree (1,1,5,1,1)
  (same comment as for Nickel, ion)

## Sampling procedure
Landfill model based on observed leachate concentrations in literature. Extrapolated to 60'000 years heeding chemical characteristics. Initial waste composition from various literature sources.

## Extrapolations
This dataset has been extrapolated from year 2000 to the year of the calculation (2019). The uncertainty has been adjusted accordingly.

## Review by Niels Jungbluth 2009-02-15
passed.
