# treatment of waste graphical paper, open dump, hyperarid infiltration class (-250mm)

Dataset: EcoSpold 2, unit process
Geography: GLO
Time period: 2006-01-01 to 2019-12-31
Technology level: current
Classification: ISIC rev.4 ecoinvent: 3821:Treatment and disposal of non-hazardous waste
Synonyms: municipal waste landfill
Scenario: Business-as-Usual
System model: Allocation at the point of substitution
Share of production covered: 1 %
Generated by: Avraam Symeonidis
Database: ecoinvent
isCopyrightProtected: true
accessRestrictedTo: 1

## General comment
This dataset represents the activity of waste disposal of waste graphical paper in a open dump. Recommended use of this dataset: For paper, which goes to disposal as part of unmanaged communal waste mixture. Larger amounts of *already separated* paper could go to recycling, depending on country-specific situation. // Waste composition (wet, in ppm): upper heating value 16.61 MJ/kg; lower heating value 14.12 MJ/kg; H2O 110830; O 378670; H 53852; C 404000; S 1406.7; N 3756.6; P 112.95; B 17.19; Cl 1837.5; Br n.a.; F 19.468; I n.a.; Ag 0.047733; As 2.0485; Ba 114.24; Cd 1.6629; Co 0.7359; Cr 14.461; Cu 60.893; Hg 0.13902; Mn 40.221; Mo 4.2976; Ni 9.4431; Pb 80.374; Sb 0.70911; Se 2.5786; Sn n.a.; V n.a.; Zn 124.8; Be 0.97413; Sc n.a.; Sr 58.276; Ti 171.9; Tl 1.719; W n.a.; Si 21255; Fe 1188.4; Ca 3438.1; Al 12391; K 1327.5; Mg 4297.6; Na 918.83; . // Share of carbon in waste that is biogenic 100%. Share of metals in waste not oxidised and bulk-recyclable (exclude very small or thin parts) Iron: 0%; Alu: 0%; Copper: 0%. Overall degradability of waste during 100 years: 27%.

## Included activities start
from final waste deposition (without transports to the site)

## Included activities end
Waste-specific short-term emissions to air via landfill gas and landfill leachate. Waste-specific long-term emissions from landfill.

## Geography
Given name of landfill location is 'infiltration class 1 hyperarid (2018)'. Landfill site with mean annual temperature (MAT) of 8 degC, mean annual precipitation (MAP) of 350 mm/year, and net infiltration of -250 mm/year. Negative infiltration means that leachate flow is reversed and flows upward to the surface, where water is evaporated and dissolved solids become solid evaporites.
Climate adjustments result in an alpha t (temperature) for permafrost areas of 0.999. Total climate adjustments with alpha pt of 0.999.

## Technology
This is an inventory for an open, uncontrolled waste dump for municipal solid waste. Ultimate average landfill height is 7 meters. Operation phase duration is 15 years.Percentage of landfill gas directly emitted is 100w%. A Methane Correction Factor (MCF) for landfill air emissions of 0.7057 is employed.
Leachate of the landfill is not treated. Leachate flow is upward to the surface due to net negative infiltration. No leachate treatment can be performed. Based on average waste composition and climate data the end of carbonate phase is estimated to be reached 3171 years after waste deposition. Arid conditions at this location prompt formation of evaporites from landfill contents which are partially eroded by wind. It is assumed that 10% of these evaporites are eroded by wind and airborne. Initial decay in the first 100 years of this waste results in a wind erosion rate corresponding to 148.9 g/m2.year and long-term decay corresponds to wind erosion of 7.514 g/m2.year.

## Reference product
- waste graphical paper: -1 kg; By-product classification Waste; CPC 39990: Other wastes n.e.c.; pedigree (1,1,1,1,1)
  main reference product of this activity (supply of disposal service).
  Uncertainty: Uncertainty is not adjusted, as this is the refence product
  production volume 1 kg
    The amount of the annual production volume is a placeholder value. The contribution of this technology to the different local markets can be found in the markets themselves.
  property price 0 EUR2005
    Waste products are assigned a price of zero as they are assumed to require further treatment.
  property carbon content 0.45435
    carbon content on a dry matter basis (reserved; not for manual entry)
  properties: silicon content 0.023904, thallium content 1.9333e-6, water in wet mass 0.11083 kg, sodium content 0.0010334, aluminium content 0.013935, magnesium content 0.0048333, iron content 0.0013366, dry mass 0.88917 kg, water content 0.12464, potassium content 0.0014929, wet mass 1 kg, calcium content 0.0038666, carbon content, non-fossil 0.45435, titanium content 0.00019333, chlorine content 0.0020665, sulfur content 0.001582, boron content 1.9333e-5, cadmium content 1.8702e-6, cobalt content 8.2762e-7, silver content 5.3682e-8, hydrogen content 0.060564, manganese content 4.5234e-5, lead content 9.0392e-5, antimony content 7.9749e-7, heating value, net 14.12 MJ, copper content 6.8483e-5, chromium content 1.6263e-5, oxygen content 0.42587, mercury content 1.5635e-7, barium content 0.00012848, beryllium content 1.0955e-6, zinc content 0.00014036, fluorine content 2.1895e-5, selenium content 2.9e-6, arsenic content 2.3039e-6, phosphorus content 0.00012703, strontium content 6.5539e-5, nickel content 1.062e-5, molybdenum content 4.8333e-6, heating value, gross 16.611 MJ, nitrogen content 0.0042248, carbon allocation 0.403994 kg

## Emissions to nature
- Nitrate [air, low population density, long-term]: 0.00054311 kg; lognormal variance with pedigree 0.12994, pedigree (1,1,3,1,1)
  burden from windblown long-term leachate evaporite in arid climates.
  Uncertainty: Uncertainty calculated from unertainty of the waste composition of this waste, uncertainty in waste decomposition and short-term leaching in landfill
- Carbon dioxide, non-fossil [air, non-urban air or from high stacks]: 0.23471 kg; lognormal variance with pedigree 0.002, pedigree (1,1,3,1,1)
  burden from direct release or incineration of landfill biogas.
  Uncertainty: Uncertainty calculated from unertainty of the waste composition of this waste, uncertainty in waste decomposition and short-term leaching in landfill
- Heat, waste [water, ground-, long-term]: 12.132 MJ; lognormal variance with pedigree 0.022384, pedigree (1,1,3,1,1)
  burden from long-term decomposition of waste (>100a).
  Uncertainty: Uncertainty calculated from unertainty of the waste composition of this waste, uncertainty in waste decomposition and short-term leaching in landfill
- Phosphorus [air, low population density, long-term]: 7.4807e-7 kg; lognormal variance with pedigree 0.69737, pedigree (1,1,3,1,1)
  (same comment as for Nitrate)
- Methane, non-fossil [air, non-urban air or from high stacks]: 0.055681 kg; lognormal variance with pedigree 0.030463, pedigree (1,1,3,1,1)
  (same comment as for Carbon dioxide, non-fossil)
- Sodium [air, non-urban air or from high stacks]: 9.209e-5 kg; lognormal variance with pedigree 0.16825, pedigree (1,1,3,1,1)
  burden from direct release or incineration of landfill biogas; or windblown leachate evaporite in arid climates.
  Uncertainty: Uncertainty calculated from unertainty of the waste composition of this waste, uncertainty in waste decomposition and short-term leaching in landfill
- Sulfate [air, low population density, long-term]: 0.0003722 kg; lognormal variance with pedigree 0.1556, pedigree (1,1,3,1,1)
  (same comment as for Nitrate)
- Magnesium [air, non-urban air or from high stacks]: 7.1694e-5 kg; lognormal variance with pedigree 0.13843, pedigree (1,1,3,1,1)
  (same comment as for Sodium)
- Particulates, < 2.5 um [air, low population density, long-term]: 0.01286 kg; lognormal variance with pedigree 0.1254, pedigree (1,1,3,1,1)
  (same comment as for Nitrate)
- Aluminium [air, non-urban air or from high stacks]: 1.6744e-5 kg; lognormal variance with pedigree 0.16879, pedigree (1,1,3,1,1)
  (same comment as for Sodium)
- Particulates, > 2.5 um, and < 10um [air, low population density, long-term]: 0.01929 kg; lognormal variance with pedigree 0.079993, pedigree (1,1,3,1,1)
  (same comment as for Nitrate)
- Potassium [air, non-urban air or from high stacks]: 2.6238e-5 kg; lognormal variance with pedigree 0.17262, pedigree (1,1,3,1,1)
  (same comment as for Sodium)
- Sodium [soil, industrial]: 0.00082674 kg; lognormal variance with pedigree 0.16916, pedigree (1,1,3,1,1)
  burden from leachate evaporite in arid climates deposited on landflill surface.
  Uncertainty: Uncertainty calculated from unertainty of the waste composition of this waste, uncertainty in waste decomposition and short-term leaching in landfill
- Silicon [air, non-urban air or from high stacks]: 2.8723e-5 kg; lognormal variance with pedigree 0.15329, pedigree (1,1,3,1,1)
  (same comment as for Sodium)
- Magnesium [soil, industrial]: 0.0038677 kg; lognormal variance with pedigree 0.092458, pedigree (1,1,3,1,1)
  (same comment as for Sodium)
- Calcium [air, non-urban air or from high stacks]: 1.2102e-5 kg; lognormal variance with pedigree 0.1813, pedigree (1,1,3,1,1)
  (same comment as for Sodium)
- Particulates, > 10 um [air, low population density, long-term]: 0.03215 kg; lognormal variance with pedigree 0.06024, pedigree (1,1,3,1,1)
  (same comment as for Nitrate)
- Iron [air, non-urban air or from high stacks]: 4.413e-7 kg; lognormal variance with pedigree 0.2808, pedigree (1,1,3,1,1)
  (same comment as for Sodium)
- Aluminium [soil, industrial]: 0.011151 kg; lognormal variance with pedigree 0.085244, pedigree (1,1,3,1,1)
  (same comment as for Sodium)
- Strontium [air, non-urban air or from high stacks]: 9.1592e-8 kg; lognormal variance with pedigree 0.33689, pedigree (1,1,3,1,1)
  (same comment as for Sodium)
- Potassium [soil, industrial]: 0.0011947 kg; lognormal variance with pedigree 0.11801, pedigree (1,1,3,1,1)
  (same comment as for Sodium)
- Thallium [air, non-urban air or from high stacks]: 2.7018e-9 kg; lognormal variance with pedigree 0.45296, pedigree (1,1,3,1,1)
  (same comment as for Sodium)
- Calcium [soil, industrial]: 0.0030943 kg; lognormal variance with pedigree 0.11936, pedigree (1,1,3,1,1)
  (same comment as for Sodium)
- Potassium [air, low population density, long-term]: 0.00010657 kg; lognormal variance with pedigree 0.15774, pedigree (1,1,3,1,1)
  (same comment as for Nitrate)
- Titanium [air, non-urban air or from high stacks]: 2.3231e-7 kg; lognormal variance with pedigree 0.30534, pedigree (1,1,3,1,1)
  (same comment as for Sodium)
- Thallium [soil, industrial]: 1.5471e-6 kg; lognormal variance with pedigree 0.36973, pedigree (1,1,3,1,1)
  (same comment as for Sodium)
- Sodium [air, low population density, long-term]: 9.1883e-14 kg; lognormal variance with pedigree 0.64962, pedigree (1,1,3,1,1)
  (same comment as for Nitrate)
- Beryllium [air, non-urban air or from high stacks]: 1.531e-9 kg; lognormal variance with pedigree 0.47138, pedigree (1,1,3,1,1)
  (same comment as for Sodium)
- Iron [soil, industrial]: 0.0010696 kg; lognormal variance with pedigree 0.15968, pedigree (1,1,3,1,1)
  (same comment as for Sodium)
- Magnesium [air, low population density, long-term]: 0.00035823 kg; lognormal variance with pedigree 0.12014, pedigree (1,1,3,1,1)
  (same comment as for Nitrate)
- Zinc [air, non-urban air or from high stacks]: 1.5979e-7 kg; lognormal variance with pedigree 0.31768, pedigree (1,1,3,1,1)
  (same comment as for Sodium)
- Silicon [soil, industrial]: 0.00054476 kg; lognormal variance with pedigree 1.1172, pedigree (1,1,3,1,1)
  (same comment as for Sodium)
- Iron [air, low population density, long-term]: 0.0001184 kg; lognormal variance with pedigree 0.16078, pedigree (1,1,3,1,1)
  (same comment as for Nitrate)
- Selenium [air, non-urban air or from high stacks]: 7.3512e-9 kg; lognormal variance with pedigree 0.42312, pedigree (1,1,3,1,1)
  (same comment as for Sodium)
- Titanium [soil, industrial]: 0.00015471 kg; lognormal variance with pedigree 0.21988, pedigree (1,1,3,1,1)
  (same comment as for Sodium)
- Calcium [air, low population density, long-term]: 0.00033173 kg; lognormal variance with pedigree 0.12675, pedigree (1,1,3,1,1)
  (same comment as for Nitrate)
- Nickel [air, non-urban air or from high stacks]: 1.4842e-8 kg; lognormal variance with pedigree 0.39716, pedigree (1,1,3,1,1)
  (same comment as for Sodium)
- Strontium [soil, industrial]: 5.2448e-5 kg; lognormal variance with pedigree 0.25467, pedigree (1,1,3,1,1)
  (same comment as for Sodium)
- Aluminium [air, low population density, long-term]: 0.0012223 kg; lognormal variance with pedigree 0.087489, pedigree (1,1,3,1,1)
  (same comment as for Nitrate)
- Antimony [air, non-urban air or from high stacks]: 2.0216e-9 kg; lognormal variance with pedigree 0.46499, pedigree (1,1,3,1,1)
  (same comment as for Sodium)
- Beryllium [soil, industrial]: 8.7671e-7 kg; lognormal variance with pedigree 0.38803, pedigree (1,1,3,1,1)
  (same comment as for Sodium)
- Silicon [air, low population density, long-term]: 3.1877e-5 kg; lognormal variance with pedigree 1.1721, pedigree (1,1,3,1,1)
  (same comment as for Nitrate)
- Lead [air, non-urban air or from high stacks]: 1.2813e-8 kg; lognormal variance with pedigree 0.39584, pedigree (1,1,3,1,1)
  (same comment as for Sodium)
- Zinc [soil, industrial]: 0.00011232 kg; lognormal variance with pedigree 0.23062, pedigree (1,1,3,1,1)
  (same comment as for Sodium)
- Titanium [air, low population density, long-term]: 1.6959e-5 kg; lognormal variance with pedigree 0.22449, pedigree (1,1,3,1,1)
  (same comment as for Nitrate)
- Mercury [air, non-urban air or from high stacks]: 1.284e-9 kg; lognormal variance with pedigree 0.47566, pedigree (1,1,3,1,1)
  (same comment as for Sodium)
- Selenium [soil, industrial]: 5.4193e-7 kg; lognormal variance with pedigree 0.47327, pedigree (1,1,3,1,1)
  (same comment as for Sodium)
- Thallium [air, low population density, long-term]: 1.6921e-7 kg; lognormal variance with pedigree 0.37677, pedigree (1,1,3,1,1)
  (same comment as for Nitrate)
- Manganese [air, non-urban air or from high stacks]: 1.2453e-6 kg; lognormal variance with pedigree 0.28067, pedigree (1,1,3,1,1)
  (same comment as for Sodium)
- Lead [soil, industrial]: 7.2336e-5 kg; lognormal variance with pedigree 0.24911, pedigree (1,1,3,1,1)
  (same comment as for Sodium)
- Zinc [air, low population density, long-term]: 1.2321e-5 kg; lognormal variance with pedigree 0.23514, pedigree (1,1,3,1,1)
  (same comment as for Nitrate)
- Molybdenum [air, non-urban air or from high stacks]: 1.2252e-8 kg; lognormal variance with pedigree 0.40641, pedigree (1,1,3,1,1)
  (same comment as for Sodium)
- Nickel [soil, industrial]: 8.4988e-6 kg; lognormal variance with pedigree 0.31436, pedigree (1,1,3,1,1)
  (same comment as for Sodium)
- Beryllium [air, low population density, long-term]: 9.5885e-8 kg; lognormal variance with pedigree 0.39521, pedigree (1,1,3,1,1)
  (same comment as for Nitrate)
- Cobalt [air, non-urban air or from high stacks]: 6.3945e-9 kg; lognormal variance with pedigree 0.43583, pedigree (1,1,3,1,1)
  (same comment as for Sodium)
- Antimony [soil, industrial]: 6.3329e-8 kg; lognormal variance with pedigree 0.75838, pedigree (1,1,3,1,1)
  (same comment as for Sodium)
- Strontium [air, low population density, long-term]: 5.7362e-6 kg; lognormal variance with pedigree 0.26049, pedigree (1,1,3,1,1)
  (same comment as for Nitrate)
- Copper [air, non-urban air or from high stacks]: 8.0641e-9 kg; lognormal variance with pedigree 0.4113, pedigree (1,1,3,1,1)
  (same comment as for Sodium)
- Mercury [soil, industrial]: 1.2419e-7 kg; lognormal variance with pedigree 0.44865, pedigree (1,1,3,1,1)
  (same comment as for Sodium)
- Antimony [air, low population density, long-term]: 5.02e-9 kg; lognormal variance with pedigree 0.8402, pedigree (1,1,3,1,1)
  (same comment as for Nitrate)
- Chromium [air, non-urban air or from high stacks]: 4.4562e-9 kg; lognormal variance with pedigree 0.43232, pedigree (1,1,3,1,1)
  (same comment as for Sodium)
- Molybdenum [soil, industrial]: 1.2458e-6 kg; lognormal variance with pedigree 0.40502, pedigree (1,1,3,1,1)
  (same comment as for Sodium)
- Lead [air, low population density, long-term]: 8.0246e-6 kg; lognormal variance with pedigree 0.24978, pedigree (1,1,3,1,1)
  (same comment as for Nitrate)
- Barium [air, non-urban air or from high stacks]: 3.5372e-6 kg; lognormal variance with pedigree 0.24603, pedigree (1,1,3,1,1)
  (same comment as for Sodium)
- Copper [soil, industrial]: 5.4804e-5 kg; lognormal variance with pedigree 0.25844, pedigree (1,1,3,1,1)
  (same comment as for Sodium)
- Selenium [air, low population density, long-term]: 5.2882e-8 kg; lognormal variance with pedigree 0.51832, pedigree (1,1,3,1,1)
  (same comment as for Nitrate)
- Arsenic [air, non-urban air or from high stacks]: 1.1313e-8 kg; lognormal variance with pedigree 0.36417, pedigree (1,1,3,1,1)
  (same comment as for Sodium)
- Manganese [soil, industrial]: 3.6196e-5 kg; lognormal variance with pedigree 0.19124, pedigree (1,1,3,1,1)
  (same comment as for Sodium)
- Molybdenum [air, low population density, long-term]: 1.2621e-7 kg; lognormal variance with pedigree 0.43901, pedigree (1,1,3,1,1)
  (same comment as for Nitrate)
- Cadmium [air, non-urban air or from high stacks]: 8.4169e-9 kg; lognormal variance with pedigree 0.39414, pedigree (1,1,3,1,1)
  (same comment as for Sodium)
- Cadmium [soil, industrial]: 1.4962e-6 kg; lognormal variance with pedigree 0.35811, pedigree (1,1,3,1,1)
  (same comment as for Sodium)
- Nickel [air, low population density, long-term]: 9.295e-7 kg; lognormal variance with pedigree 0.32088, pedigree (1,1,3,1,1)
  (same comment as for Nitrate)
- Silver [air, non-urban air or from high stacks]: 6.3212e-12 kg; lognormal variance with pedigree 0.63446, pedigree (1,1,3,1,1)
  (same comment as for Sodium)
- Cobalt [soil, industrial]: 6.6229e-7 kg; lognormal variance with pedigree 0.36886, pedigree (1,1,3,1,1)
  (same comment as for Sodium)
- Mercury [air, low population density, long-term]: 1.3543e-8 kg; lognormal variance with pedigree 0.45758, pedigree (1,1,3,1,1)
  (same comment as for Nitrate)
- Hydrogen fluoride [air, non-urban air or from high stacks]: 2.1313e-6 kg; lognormal variance with pedigree 0.31944, pedigree (1,1,3,1,1)
  (same comment as for Sodium)
- Chromium [soil, industrial]: 8.2104e-8 kg; lognormal variance with pedigree 2.3511, pedigree (1,1,3,1,1)
  (same comment as for Sodium)
- Manganese [air, low population density, long-term]: 2.7796e-6 kg; lognormal variance with pedigree 0.27392, pedigree (1,1,3,1,1)
  (same comment as for Nitrate)
- Hydrogen chloride [air, non-urban air or from high stacks]: 0.00014277 kg; lognormal variance with pedigree 0.12105, pedigree (1,1,3,1,1)
  (same comment as for Sodium)
- Barium [soil, industrial]: 0.00010281 kg; lognormal variance with pedigree 0.1639, pedigree (1,1,3,1,1)
  (same comment as for Sodium)
- Copper [air, low population density, long-term]: 6.0813e-6 kg; lognormal variance with pedigree 0.25902, pedigree (1,1,3,1,1)
  (same comment as for Nitrate)
- Sulfate [air, non-urban air or from high stacks]: 4.238e-5 kg; lognormal variance with pedigree 0.18528, pedigree (1,1,3,1,1)
  burden from windblown leachate evaporite in arid climates.
  Uncertainty: Uncertainty calculated from unertainty of the waste composition of this waste, uncertainty in waste decomposition and short-term leaching in landfill
- Arsenic [soil, industrial]: 1.8424e-6 kg; lognormal variance with pedigree 0.3511, pedigree (1,1,3,1,1)
  (same comment as for Sodium)
- Chromium [air, low population density, long-term]: 4.6776e-9 kg; lognormal variance with pedigree 2.3611, pedigree (1,1,3,1,1)
  (same comment as for Nitrate)
- Nitrate [air, non-urban air or from high stacks]: 0.0010484 kg; lognormal variance with pedigree 0.12553, pedigree (1,1,3,1,1)
  (same comment as for Sulfate)
- Silver [soil, industrial]: 4.2959e-8 kg; lognormal variance with pedigree 0.48169, pedigree (1,1,3,1,1)
  (same comment as for Sodium)
- Cadmium [air, low population density, long-term]: 1.5835e-7 kg; lognormal variance with pedigree 0.37789, pedigree (1,1,3,1,1)
  (same comment as for Nitrate)
- Boron [air, non-urban air or from high stacks]: 1.719e-6 kg; lognormal variance with pedigree 0.30104, pedigree (1,1,3,1,1)
  (same comment as for Sodium)
- Fluoride [soil, industrial]: 1.5732e-5 kg; lognormal variance with pedigree 0.28857, pedigree (1,1,3,1,1)
  (same comment as for Sodium)
- Barium [air, low population density, long-term]: 7.8949e-6 kg; lognormal variance with pedigree 0.23919, pedigree (1,1,3,1,1)
  (same comment as for Nitrate)
- Phosphorus [air, non-urban air or from high stacks]: 1.7032e-7 kg; lognormal variance with pedigree 0.31755, pedigree (1,1,3,1,1)
  (same comment as for Sodium)
- Boron [soil, industrial]: 1.5471e-5 kg; lognormal variance with pedigree 0.30104, pedigree (1,1,3,1,1)
  (same comment as for Sodium)
- Cobalt [air, low population density, long-term]: 6.7209e-8 kg; lognormal variance with pedigree 0.40441, pedigree (1,1,3,1,1)
  (same comment as for Nitrate)
- Nitrogen oxides [air, non-urban air or from high stacks]: 1.3894e-6 kg; lognormal variance with pedigree 0.18509, pedigree (1,1,3,1,1)
  (same comment as for Carbon dioxide, non-fossil)
- Chloride [soil, industrial]: 0.001638 kg; lognormal variance with pedigree 0.09523, pedigree (1,1,3,1,1)
  (same comment as for Sodium)
- Hydrogen chloride [air, low population density, long-term]: 5.7217e-5 kg; lognormal variance with pedigree 0.1509, pedigree (1,1,3,1,1)
  (same comment as for Nitrate)
- Sulfur dioxide [air, non-urban air or from high stacks]: 4.9505e-5 kg; lognormal variance with pedigree 0.22998, pedigree (1,1,3,1,1)
  (same comment as for Carbon dioxide, non-fossil)
- Sulfur [soil, industrial]: 0.0012438 kg; lognormal variance with pedigree 0.13289, pedigree (1,1,3,1,1)
  (same comment as for Sodium)
- Arsenic [air, low population density, long-term]: 1.9479e-7 kg; lognormal variance with pedigree 0.3711, pedigree (1,1,3,1,1)
  (same comment as for Nitrate)
- Particulates, > 10 um [air, non-urban air or from high stacks]: 0.0010636 kg; lognormal variance with pedigree 0.098133, pedigree (1,1,3,1,1)
  (same comment as for Sodium)
- Nitrogen [soil, industrial]: 0.0032343 kg; lognormal variance with pedigree 0.077834, pedigree (1,1,3,1,1)
  (same comment as for Sodium)
- Silver [air, low population density, long-term]: 4.7669e-9 kg; lognormal variance with pedigree 0.48245, pedigree (1,1,3,1,1)
  (same comment as for Nitrate)
- Particulates, > 2.5 um, and < 10um [air, non-urban air or from high stacks]: 0.00063817 kg; lognormal variance with pedigree 0.11789, pedigree (1,1,3,1,1)
  (same comment as for Sodium)
- Phosphorus [soil, industrial]: 8.2656e-6 kg; lognormal variance with pedigree 0.65066, pedigree (1,1,3,1,1)
  (same comment as for Sodium)
- Hydrogen fluoride [air, low population density, long-term]: 1.7094e-6 kg; lognormal variance with pedigree 0.29723, pedigree (1,1,3,1,1)
  (same comment as for Nitrate)
- Particulates, < 2.5 um [air, non-urban air or from high stacks]: 0.00042545 kg; lognormal variance with pedigree 0.16329, pedigree (1,1,3,1,1)
  (same comment as for Sodium)
- Carbon [soil, industrial]: 0.2684 kg; lognormal variance with pedigree 0.0085976, pedigree (1,1,3,1,1)
  (same comment as for Sodium)
- Boron [air, low population density, long-term]: 1.719e-15 kg; lognormal variance with pedigree 0.7815, pedigree (1,1,3,1,1)
  (same comment as for Nitrate)
- Occupation, dump site [natural resource, land]: 0.0035714 m2*year; lognormal variance with pedigree 0.082256, pedigree (1,1,3,1,1)
  for landfill operation phase and spontaneous renaturation.
  Uncertainty: Uncertainty calculated from uncertainty in base parameters.
- Heat, waste [soil, industrial]: 3.6001 MJ; lognormal variance with pedigree 0.023794, pedigree (1,1,3,1,1)
  burden from short-term decomposition of waste (0-100a).
  Uncertainty: Uncertainty calculated from unertainty of the waste composition of this waste, uncertainty in waste decomposition and short-term leaching in landfill

## Extrapolations
This dataset has been extrapolated from year 2012 to the year of the calculation (2019). The uncertainty has been adjusted accordingly.
