# ethyl acetate production

Dataset: EcoSpold 2, unit process
Geography: RER
Time period: 1991-01-01 to 2020-12-31
Technology level: current
Classification: ISIC rev.4 ecoinvent: 2011:Manufacture of basic chemicals
Synonyms: Acetic ether; Ethyl ethanoate; Ethyl acetic ester; Acetoxyethane; Vinegar naphtha; ETHYL ACETATE
Scenario: Business-as-Usual
System model: Allocation at the point of substitution
Share of production covered: 100 %
Generated by: Jürgen Sutter
Published in: Sutter, J. 2007
Database: ecoinvent
isCopyrightProtected: true
accessRestrictedTo: 1

## General comment
This dataset represents the production of 1 kg of ethyl acetate from ethanol. Ethyl acetate (CH3COOC2H5) is a colourless, mobile, volatile liquid with a pleasant fruity odour. It is soluble in ethyl alcohol and ether, and slightly soluble in water. Ethyl acetate is an active solvent that is available in three grades: anhydrous with 85 - 88 %, with 12 - 15 % ethanol denaturated with 1 % MIK, 99% and 99.5% (urethane grade). The most popular grade, 99% is mainly used in industrial lacquers and surface coating resins. It is also used as an extraction solvent in the production of pharmaceuticals and food and as a carrier solvent for herbicides. About 60% of the demand is in coatings. Process solvents, including pharmaceuticals and organic synthesis, account for 15% of the demand, as does printing inks. Miscellaneous uses, including adhesives and cosmetics, account for 10% of consumption.
This dataset considers the production of ethyl acetate by means of the esterification of ethanol with acetic acid. The raw materials and energy consumptions are modelled with literature data. The water exchanges are approximated based on data from a large chemical factory (Gendorf 2016). The emissions are estimated and the infrastructure is included with a default value.
References:
Sutter, J. (2007) Life Cycle Inventories of Petrochemical Solvents. ecoinvent report No. 22. Swiss Centre for Life Cycle Inventories, Dübendorf, 2007.
Gendorf (2016) Umwelterklärung 2015, Werk Gendorf Industriepark, www.gendorf.de.

## Included activities start
From the reception of ethanol at the factory gate.

## Included activities end
This activity ends with the production of 1kg of ethyl acetate, 100% at the factory gate. The dataset includes the input materials, energy uses, infrastructure and emissions.

## Geography
The inventory is modelled for Europe. Some values are based on data from a large chemical factory located in Germany. These are assumed to be valid for this geography.

## Technology
An aqueous solution of acetic acid is mixed with ethanol; then 1% sulfuric acid is added. The mixture is preheated before passing into an esterifying column where it is refluxed and some of the distillate removed overhead. The mixture, containing about 20% of the ester, goes into a second refluxing column where a ternary azeotrope (consisting of 83% ethyl acetate, 9% ethanol and 8% of water) is removed overhead at a temperature of about 70°C.
An equal volume of water is mixed with the distillate after which it separates into two layers. The bottom layer is fed into a separator column and ester is recovered as a ternary azeotrope. Any alcohol remaining in the bottom layer is vaporized and recycled to the esterification column.
The upper layer, containing around 93% ethyl acetate together with some water and ethanol, passes to a refluxing column where it is mixed with sufficient ester to ensure that the water and ethyl alcohol are removed as a ternary azeotrope overhead. The residue in the column, consisting of 95% ethyl acetate, is redistilled to remove any impurities. The process leads to a yield of 99 %.
Reference:
Wells, G. Margaret: Handbook of petrochemicals and processes. Aldershot, Hampshire 1991

## Time period
Time of publications. Some values are based on data published by the Gendorf factory that were collected between 2011 and 2015. The time period has been adjusted accordingly. For more details, see the comments of the exchanges.

## Reference product
- ethyl acetate: 1 kg; name RP; source Dutia, P. 2004; CPC 34120: Industrial monocarboxylic fatty acids; acid oils from refining; By-product classification allocatable product; CAS 123-86-4
  Ethyl acetate is a colourless, mobile, volatile liquid with a pleasant fruity odour. It is soluble in ethyl alcohol and ether, and slightly soluble in water.
  Ethyl acetate finds use as a solvent in a wide range of applications, across many industries, including:
  1. Surface coating and thinners: Ethyl acetate is one of the most popular solvents and finds wide use in the manufacture of nitrocellulose lacquers, varnishes and thinners. It exhibits high dilution ratios with both aromatic and aliphatic diluents and is the least toxic of industrial organic solvents.
  2. Pharmaceuticals: Ethyl acetate is an important component in extractants for the concentration and purification of antibiotics. It is also used as an intermediate in the manufacture of various drugs.
  3. Flavours and essences: Ethyl acetate finds extensive use in the preparation of synthetic fruit essences, flavours and perfumes.
  4. Flexible packaging: Substantial quantities of ethyl acetate are used in the manufacture of flexible packaging and in the manufacture of polyester films and BOPP films. It is also used in the treatment of aluminium foils.
  5. Miscellaneous: Ethyl acetate is used in the manufacture of adhesives, cleaning fluids, inks, nail-polish removers and silk, coated papers, explosiv.
  Ethyl acetate is an active solvent that is available in three grades: anhydrous with 85 - 88 % with 12 - 15 % ethanol denaturated with 1 % MIK, 99% and 99.5% (urethane grade). The most popular grade, 99% is mainly used in industrial lacquers and surface coating resins. It is also used as an extraction solvent in the production of pharmaceuticals and food and as a carrier solvent for herbicides. About 60% of demand is in coatings. Process solvents, including pharmaceuticals and organic synthesis, account for 15% of demand, as does printing inks. Miscellaneous uses, including adhesives and cosmetics, account for 10% of consumption.
  The total global production for ethyl acetate is estimated to be in the 1.3 million tons in 2002.
  production volume 2.89e8 kg; name RP_PV
    Total production in the world is around 1.3 Million tons.
    Capacity utilisation 85% on total European production capacity (370 million kg) from Dutia P. (2004). Ethyl Acetate: A Techno-Commercial Profile. Chemical Weekly (August 10) p. 179-186 http://www.chemicalweekly.com/Profiles/Ethyl_Acetate.pdf (minus 25 million kg from butane oxidation)
  property price 0.52 EUR2005
    Temporary price data. Calculated as 90% of purchasers price based on: 2004 import and export prices (total trades (USD) divided by total weight (kg) in EU27, USA, China, Japan and India) from UN Commodity Trade Statistics Database (http://data.un.org/Explorer.aspxDatabase [Accessed 2 July 2010]). Commodity: Ethyl acetate
  property carbon content 0.545455
    carbon content on a dry matter basis (reserved; not for manual entry)
  property true value 0.52; name RP_true_value
    allocation property applied in "true value" allocation // value calculated from revenue
  properties: dry mass 1 kg, water in wet mass 0 kg, water content 0, wet mass 1 kg, carbon content, non-fossil 0, carbon content, fossil 0.545455, carbon allocation 0.545455 kg

## By-products
- heat, for reuse in municipal waste incineration only: 0 MJ; CPC 17300: Steam and hot water; By-product classification allocatable product; pedigree (1,1,1,1,1)
  Net electricity generated from this waste and used in internal MSWI plant energy redistribution.
  Uncertainty: uncertainty is calculated from uncertainties in waste composition and uncertainties in energy efficiency and the uncertainty in internal energy demand
  production volume 176.306 MJ
  property exergy 0.1842 MJ; name E_th_prod_MSWI_exergy
    This exergy property is based on the exergy content of the product.
  property price 0.0106 EUR2005; name E_th_prod_MSWI_price_EUR2005
    Average European district heat price from Ecoheatcool and Euroheat 2005-2006, Ecoheat Work package 1: The European heat market. Final report. 10.6 EUR/GJ i s the price of district heat. http://www.solarthermalworld.org/files/Ecoheatcool%20WP1%20Web.pdf?download
  property true value relation 0.1842; name E_th_prod_MSWI_true_value_relation
    property to calculate "true value" from
  property true value 1.16811e-9
    allocation property applied in "true value" allocation // value calculated from true value relation
- electricity, for reuse in municipal waste incineration only: 0 kWh; CPC 17100: Electrical energy; By-product classification allocatable product; pedigree (1,1,1,1,1)
  (same comment as for heat, for reuse in municipal waste incineration only)
  production volume 24.7899 kWh
  property true value relation 3.6; name E_el_prod_MSWI_true_value_relation
    property to calculate "true value" from
  property price 0.1 EUR2005; name E_el_prod_MSWI_price_EUR2005
    Estimated to be the same price as in case of electricity, medium voltage.
  property exergy 3.6 MJ; name E_el_prod_MSWI_exergy
    This exergy property is based on the exergy content of the product.
  property true value 3.17451e-9
    (same comment as for heat, for reuse in municipal waste incineration only)
- zinc concentrate: 0 kg; CPC 14290: Other non-ferrous metal ores and concentrates (other than uranium or thorium ores and concentrates); By-product classification allocatable product
  Calculated value from the knowledge of the properties of both products.
  production volume 0.00335378 kg
  property price 0.38 EUR2005; name ByP_price_EUR2005
    Temporary price data. Calculated as 90% of purchasers price based on: Zinc content in concentrate 53%. Concentrate price per kg Zn 86.5% of refined Zn price (13.5% treatment charges according to CHR Metals Limited 2005: Dynamic cost curves. http://www.minecost.com/dynamic.pdf). 2004 zinc price from USGS (2007) Mineral commodity summaries 2007. <http://minerals.usgs.gov/minerals/pubs/mcs/2007/mcs2007.pdf> [Accessed 25 May 2010]
  property zinc content 0.53; name zinc_C_zinc_concentrate
    Zinc content on a dry matter basis. Value taken from teh "zinc mine operation" /GLO dataset.
  property dry mass 1 kg; name DM_zinc_concentrate
  property carbon content 0
    carbon content on a dry matter basis (reserved; not for manual entry)
  property true value 4.30488e-13
    allocation property applied in "true value" allocation // value calculated from revenue
  properties: wet mass 1 kg, water content 0, carbon content, non-fossil 0, carbon content, fossil 0, water in wet mass 0 kg, carbon allocation 0 kg

## Inputs from technosphere
- sulfuric acid: 0.0131 kg; source Wells, M. 1991; lognormal variance with pedigree 0.0021, pedigree (1,2,3,1,1)
  Literature value.
  Uncertainty: W
  properties: dry mass 1 kg, wet mass 1 kg
- wastewater, average: 0 m3; name BP_wastewater_average; pedigree (1,1,1,1,1)
  Calculated based on literature data published by the industry. This value is a 5-year average of data (2011 - 2015) published by the Gendorf factory (Gendorf, 2016, Umwelterklärung, www.gendorf.de), (Gendorf, 2015, Umwelterklärung, www.gendorf.de), (Gendorf, 2014, Umwelterklärung, www.gendorf.de). The amount of wastewater (which is later on treated in the municipal WWTP) per kg of chemical substance produced is calculated using literature data published by the Gendorf factory based in Germany, which produces a wide range of chemical substances. The factory produced 1657400 tonnes of chemical substances in the year 2015 (Gendorf, 2016, Umwelterklärung, www.gendorf.de) and 740000 tonnes of intermediate products. The amount of wastewater which is later on treated in the municipal WWTP in the year 2015 was 1200 tonnes (Gendorf, 2016, Umwelterklärung, www.gendorf.de). The resulting amount of wastewater is 2.7E-06 m3/kg of chemical product produced.
  production volume 0 m3
    Calculated from the production volume of ethyl acetate in proportion to the respective output amounts.
  property price 0 EUR2005; name BP_wastewater_average_price_EUR2005
  properties: dry mass 0.346837 kg, carbon content, non-fossil 0.194039, wet mass 1000 kg, water content 2882.2
  note on carbon content, non-fossil: 0.0673 kg TOC/m3 (Tab A.17, ecoinvent v2.2 report 13_I). TOC was considered as Total Carbon.
- ethanol, without water, in 99.7% solution state, from ethylene: 0.62 kg; source Wells, M. 1991; lognormal variance with pedigree 0.0021, pedigree (1,2,3,1,1)
  Literature value.
  Uncertainty: W
  properties: wet mass 1 kg, dry mass 1 kg, carbon content, fossil 0.521739
- heat, district or industrial, natural gas: 6.7184 MJ; source Kim S. 2003; lognormal variance with pedigree 0.0021, pedigree (1,2,3,1,1)
  Literature value.
  Uncertainty: K
- chemical factory, organics: 4e-10 unit; lognormal variance with pedigree 0.309225, pedigree (2,3,1,2,3)
  Calculated based on literature data published by the industry. For this activity, no information was readily available concerning infrastructure and land-use. Therefore, the infrastructure is estimated based on data from two chemical factories, the BASF site of Ludwigshafen and the chemical factory in Gendorf (which are both located in Germany), which produce a wide range of chemical substances. Based on this data, the following assumptions are made: the built area amounts to about 4.2 ha, the plant has an average output of 50'000 t/a and a lifespan of fifty years. The estimated infrastructure amount is therefore 4.00 E-10 units per kg of produced chemical.
  References:
  Althaus H.-J., Chudacoff M., Hischier R., Jungbluth N., Osses M. and Primas A. (2007) Life Cycle Inventories of Chemicals. ecoinvent report No. 8, v2.0. EMPA Dübendorf, Swiss Centre for Life Cycle Inventories, Dübendorf, CH.
  Gendorf (2000) Umwelterklärung 2000, Werk Gendorf. Werk Gendorf, Burgkirchen.
- heat, district or industrial, other than natural gas: 3.74993 MJ; source Kim S. 2003; lognormal variance with pedigree 0.0021, pedigree (1,2,3,1,1)
  Literature value.
  Uncertainty: K
- tap water: 0.026 kg; lognormal variance with pedigree 0.009825, pedigree (2,3,1,2,3)
  Calculated based on literature data published by the industry. This value is a 5-year average of data (2011 - 2015) published by the Gendorf factory (Gendorf, 2016, Umwelterklärung, www.gendorf.de), (Gendorf, 2015, Umwelterklärung, www.gendorf.de), (Gendorf, 2014, Umwelterklärung, www.gendorf.de). The amount of tap water per kg of chemical substance produced is calculated using literature data published by the Gendorf factory based in Germany, which produces a wide range of chemical substances. The factory produced 1657400 tonnes of chemical substances in the year 2015 (Gendorf, 2016, Umwelterklärung, www.gendorf.de) and 740000 tonnes of intermediate products. The amount of tap water consumed in the year 2015 was 55100 tonnes (Gendorf, 2016, Umwelterklärung, www.gendorf.de). The resulting amount of tap water is 0.023 kg/kg of chemical product produced. The 5-year average (2011 - 2015, weighted by production volume) is 0.026 kg/kg.
  properties: water content 2962.17, dry mass 0.000337476 kg, wet mass 1 kg, carbon content, fossil 0.00178991
  note on carbon content, fossil: Bicarbonate content is 2.93 mol/m3. CO2 content is 0.1 mol/m3 (ecoinvent v2.2 report 8, Tab 93.1).
- acetic acid, without water, in 98% solution state: 0.69 kg; source Wells, M. 1991; lognormal variance with pedigree 0.0021, pedigree (1,2,3,1,1)
  Literature value.
  Uncertainty: W
  properties: dry mass 1 kg, wet mass 1 kg, carbon content, fossil 0.400016
- electricity, medium voltage: 0.0786772 kWh; source Kim S. 2003; lognormal variance with pedigree 0.0021, pedigree (1,2,3,1,1)
  Literature value.
  Uncertainty: K
- wastewater, average: -2.43642e-6, -2.63575e-7 m3 (2 entries); lognormal variance with pedigree 0.009825, pedigree (2,3,1,2,3)
  (same comment as for wastewater, average)
  production volume 780.3 m3

## Inputs from nature
- Water, river [natural resource, in water]: 0.00086 m3; lognormal variance with pedigree 0.009825, pedigree (2,3,1,2,3)
  Calculated based on literature data published by the industry. This value is a 5-year average of data (2011 - 2015) published by the Gendorf factory (Gendorf, 2016, Umwelterklärung, www.gendorf.de), (Gendorf, 2015, Umwelterklärung, www.gendorf.de), (Gendorf, 2014, Umwelterklärung, www.gendorf.de). The amount of groundwater and surface water (river) extracted per kg of chemical substance produced is calculated using literature data published by the Gendorf factory based in Germany, which produces a wide range of chemical substances. The factory produced 1657400 tonnes of chemical substances in the year 2015 (Gendorf, 2016, Umwelterklärung, www.gendorf.de) and 740000 tonnes of intermediate products. The amount of groundwater and surface water (river) extracted in the year 2015 was 19950000 tonnes and 21488100 tonnes respectively (Gendorf, 2016, Umwelterklärung, www.gendorf.de).
- Water, cooling, unspecified natural origin [natural resource, in water]: 0.0164 m3; lognormal variance with pedigree 0.009825, pedigree (2,3,1,2,3)
  Calculated based on literature data published by the industry. This value is a 5-year average of data (2011 - 2015) published by the Gendorf factory (Gendorf, 2016, Umwelterklärung, www.gendorf.de), (Gendorf, 2015, Umwelterklärung, www.gendorf.de), (Gendorf, 2014, Umwelterklärung, www.gendorf.de). The amount of water for cooling extracted per kg of chemical substance produced is calculated using literature data published by the Gendorf factory based in Germany, which produces a wide range of chemical substances. The factory produced 1657400 tonnes of chemical substances in the year 2015 (Gendorf, 2016, Umwelterklärung, www.gendorf.de) and 740000 tonnes of intermediate products. The reported amounts of water extracted as groundwater and surface water (river) are assumed to be used entirely for cooling purposes.
- Water, well, in ground [natural resource, in water]: 0.00083 m3; lognormal variance with pedigree 0.009825, pedigree (2,3,1,2,3)
  (same comment as for Water, river)

## Emissions to nature
- Water [air, unspecified]: 0.0014 m3; lognormal variance with pedigree 0.009825, pedigree (2,3,1,2,3)
  Calculated to ensure the water balance. In general, in the case of recirculating cooling systems, 77% of the water input evaporates to air. In case of once-through cooling systems, 4% of the water input evaporates to air. The process water has in the chemical industry an average evaporation rate of 20.5%. In the specific case of the Gendorf factory, the calculated evaporation rate based on the data published is 6.3%. This matches the qualitative information, that the majority of the cooling systems in Gendorf are once-through and that the amount of cooling water used is significantly higher than the amount of process water used (Gendorf, 2016, Umwelterklärung, www.gendorf.de).
  property fraction, origin: fresh water 0; name fraction_origin_fresh_water
  property fraction, origin: salt water 0; name fraction_origin_salt_water
  property fraction, origin: unspecified 1; name fraction_origin_unspecified
- Sulfate [water, surface water]: 0.012833 kg; lognormal variance with pedigree 0.188, pedigree (4,5,5,5,5)
  Estimation. 0.8% of the raw material input is assumed to leave the production process with the wastewater.
  It is assumed that the manufacturing plants are located in an urban/industrial area and consequently the emissions are categorised as emanating in a high population density area.
  Water emissions are assumed to be emitted into rivers.
  Uncertainty: E
- Ethanol [water, surface water]: 0.00496 kg; lognormal variance with pedigree 0.188, pedigree (4,5,5,5,5)
  (same comment as for Sulfate)
- BOD5, Biological Oxygen Demand [water, unspecified]: 0.0155699 kg; lognormal variance with pedigree 0.218, pedigree (4,5,5,5,5)
  Calculated value. The BOD, COD, TOC and BOD5 are calculated based on the amount and type of emissions released to water in the same activity.
- Ethanol [air, urban air close to ground]: 0.00124 kg; lognormal variance with pedigree 0.188, pedigree (4,5,5,5,5)
  Estimation. Air emissions occurring from the purge vent, the distillation vent and fugitive emission sources were estimated to 0.2% of the raw material input.
  The carbon contained in the removed ethanol and acetic acid during wastewater treatment was accounted for as CO2 emissions to air.
  It is assumed that the manufacturing plants are located in an urban/industrial area and consequently the emissions are categorised as emanating in a high population density area.
  Uncertainty: E
- DOC, Dissolved Organic Carbon [water, unspecified]: 0.00479002 kg; lognormal variance with pedigree 0.218, pedigree (4,5,5,5,5)
  (same comment as for BOD5, Biological Oxygen Demand)
- Carbon dioxide, fossil [air, urban air close to ground]: 0.0085398 kg; lognormal variance with pedigree 0.1786, pedigree (4,5,5,5,5)
  Estimation. Air emissions occurring from the purge vent, the distillation vent and fugitive emission sources were estimated to 0.2% of the raw material input.
  The carbon contained in the removed ethanol and acetic acid during wastewater treatment was accounted for as CO2 emissions to air.
  It is assumed that the manufacturing plants are located in an urban/industrial area and consequently the emissions are categorised as emanating in a high population density area.
  Uncertainty: C
- COD, Chemical Oxygen Demand [water, unspecified]: 0.0155699 kg; lognormal variance with pedigree 0.218, pedigree (4,5,5,5,5)
  (same comment as for BOD5, Biological Oxygen Demand)
- Acetic acid [water, surface water]: 0.00552 kg; lognormal variance with pedigree 0.448, pedigree (4,5,5,5,5)
  (same comment as for Sulfate)
- TOC, Total Organic Carbon [water, unspecified]: 0.00479002 kg; lognormal variance with pedigree 0.218, pedigree (4,5,5,5,5)
  (same comment as for BOD5, Biological Oxygen Demand)
- Acetic acid [air, urban air close to ground]: 0.00138 kg; lognormal variance with pedigree 0.188, pedigree (4,5,5,5,5)
  (same comment as for Ethanol)
- Water [water, unspecified]: 0.0167 m3; lognormal variance with pedigree 0.009825, pedigree (2,3,1,2,3)
  Calculated based on literature data published by the industry (Gendorf, 2016, Umwelterklärung, www.gendorf.de). The amount of water released back to the environment consists of the amount of process water treated in the internal WWTP and then released back to the environment and the amount of cooling water released back to the environment.
  property wet mass 1000 kg; name WM
  property fraction, origin: salt water 0; name fraction_origin_salt_water_Ww
  property fraction, origin: unspecified 1; name fraction_origin_unspecified_Ww
  property water in wet mass 1000 kg; name WWM
  property dry mass 0 kg; name DM
  property fraction, origin: fresh water 0; name fraction_origin_fresh_water_Ww
  property carbon content, fossil 0; name C_content_fossil
  property carbon content, non-fossil 0; name C_content_non_fossil

## Sampling procedure
Literature data. Some values are calculated based on data from a large chemical factory located in Germany. For more details, see the comments of the exchanges.

## Review by Gregor Wernet 2017-08-04
This dataset was additionally reviewed in a separate review process by Eric Johnson of Atlantic Consulting as well as Emilia Moreno Ruiz and Gregor Wernet of ecoinvent.
