# treatment of used glider, electric scooter, shredding

Dataset: EcoSpold 2, unit process
Geography: GLO
Time period: 2005-01-01 to 2019-12-31
Technology level: current
Classification: EcoSpold01Categories: waste management/recycling
Classification: ISIC rev.4 ecoinvent: 3830:Materials recovery
Tags: Treatment
Scenario: Business-as-Usual
System model: Allocation at the point of substitution
Generated by: Andrea Del Duce
Published in: Hischier R. 2007
Database: ecoinvent
isCopyrightProtected: true
accessRestrictedTo: 1

## General comment
This dataset describes the shredding of the used glider of a scooter, without battery and drivetrain. The entries are given per kg glider. The original data has been collected for a glider of about 80 kg. Data is based on the e-waste shredding dataset which is based on literature. Infrastructure assumptions for the treatment facility are, too, based on assumptions taken from e-waste treatments. The output scrap and waste material quantities are derived from the respective glider dataset. The materialization of the glider is divided in 5 main fractions: scrap steel, scrap Aluminium, scrap Copper, scrap plastics and a shredding residue. These are the output waste flows of the process.The details concerning the materialization of the glider treated in this dataset are described in the dataset described by Leuenberger in "Life cycle assessment of two wheel vehicle" .
[This dataset was already contained in the ecoinvent database version 2. It was not individually updated during the transfer to ecoinvent version 3. Life Cycle Impact Assessment results may still have changed, as they are affected by changes in the supply chain, i.e. in other datasets. This dataset was generated following the ecoinvent quality guidelines for version 2. It may have been subject to central changes described in the ecoinvent version 3 change report (http://www.ecoinvent.org/database/ecoinvent-version-3/reports-of-changes/), and the results of the central updates were reviewed extensively. The changes added e.g. consistent water flows and other information throughout the database. The documentation of this dataset can be found in the ecoinvent reports of version 2, which are still available via the ecoinvent website. The change report linked above covers all central changes that were made during the conversion process.]

## Included activities start
The dataset takes as input the used glider and includes the treatment facility.

## Included activities end
This dataset returns the scrap fractions going to the specific recycling facilities and the emissions produced during the treatment process.

## Geography
Data from a European study, values used as global average data.

## Technology
Modern Shredder facility with 2 shredder, 2 magnetic separation & 2 Eddy-current separation steps.

## Parameters
- plastic fraction recovery: 0.8829; name rec_f_Plastic
  Material recovery fractions based on ecoinvent transfer coefficients from e-waste shredding (ecoinvent report 18, Disposal of Electric and Electronic Equipment (e-Waste), p.21).
- copper fraction recovery: 0.7821; name rec_f_Cu
  (same comment as for plastic fraction recovery)
- aluminum fraction recovery: 0.8258; name rec_f_Al
  (same comment as for plastic fraction recovery)
- steel fraction recovery: 0.95; name rec_f_Fe
  (same comment as for plastic fraction recovery)

## Reference product
- used glider, from electric scooter: 0 kg; By-product classification Waste; CPC 39990: Other wastes n.e.c.
  production volume 0 kg
    Rough estimate based on 1% electric scooters out of 466E6 world two wheeler production projection between 2010 and 2016.(www.electric-bicycle-guide.com)
  property price 0 EUR2005
    Waste products are assigned a price of zero as they are assumed to require further treatment.
- iron scrap, unsorted: 1 kg; source M. Leuenberger 2010; CPC 39310: Slag, dross, scalings and other waste from the manufacture of iron or steel; By-product classification Recyclable; pedigree (1,1,1,1,1)
  Metal outputs from glider shredding based on ecoinvent transfer coefficients from weee shredding (ecoinvent report 18, p.21). Materialization of the scooter glider described in Leuenberger 2010.
  production volume 2.62173e7 kg

## By-products
- iron scrap, unsorted: 0 kg; = 0.44*rec_f_Fe; source M. Leuenberger 2010; CPC 39310: Slag, dross, scalings and other waste from the manufacture of iron or steel; By-product classification Recyclable; pedigree (1,1,1,1,1)
  (same comment as for iron scrap, unsorted)
  production volume 0 kg; = ABS(Ref('267529ce-fe51-467a-88e3-3f9796f62bd4', 'ProductionVolume') * (Ref('c1b24f80-b93d-4130-9404-29f342fa681a') / Ref('267529ce-fe51-467a-88e3-3f9796f62bd4')))
    Calculated from production volume of reference product using the relative outputs.
  property price 0.149 EUR2005
    Temporary price data. Calculated as 90% of purchasers price based on: estimated at 85% of sorted scrap
  property carbon content 0
    carbon content on a dry matter basis (reserved; not for manual entry)
  properties: water content 0, wet mass 1 kg, carbon content, fossil 0, carbon content, non-fossil 0, dry mass 1 kg, water in wet mass 0 kg, carbon allocation 0 kg
- copper: 0 kg; source Rentz O. 1999; By-product classification allocatable product; CPC 41413: Refined copper and copper alloys, unwrought; master alloys of copper
  Literature value. Copper uses: Before end-use copper is manufactured into semi fabricated products, such as shapes and ingots (known as 'semis'). These manufacturing processes are subdivided into hot working, cold working and, if necessary, process annealing. Few of the semis are ready for use as such. They more typically travel to first-stage manufacturers, who make metal rods, wire, and casting, and then to component manufacturers who produce such things as motors, valves, and insulated cables The components in turn are incorporated by final-stage manufacturers into a variety of finished products - automobiles, commercial buildings, residential housing, and so forth. These uses account for about 79% of the world-wide consumption of copper.
  property price 5.52 EUR2005
    Literature value (http://www.economist.com/news/business/21576714-mining-industry-has-enriched-chile-its-future-precarious-copper-solution). Average price between 20015 and 2013.
  property carbon content 0
    carbon content on a dry matter basis (reserved; not for manual entry)
  properties: dry mass 1 kg, water in wet mass 0 kg, wet mass 1 kg, carbon content, non-fossil 0, water content 0, carbon content, fossil 0, carbon allocation 0 kg
- electricity, for reuse in municipal waste incineration only: 0 kWh; CPC 17100: Electrical energy; By-product classification allocatable product; pedigree (1,1,1,1,1)
  Net electricity generated from this waste and used in internal MSWI plant energy redistribution.
  Uncertainty: uncertainty is calculated from uncertainties in waste composition and uncertainties in energy efficiency and the uncertainty in internal energy demand
  property exergy 3.6 MJ; name E_el_prod_MSWI_exergy
    This exergy property is based on the exergy content of the product.
  property true value relation 3.6; name E_el_prod_MSWI_true_value_relation
    property to calculate "true value" from
  property price 0.1 EUR2005; name E_el_prod_MSWI_price_EUR2005
    Estimated to be the same price as in case of electricity, medium voltage.
- heat, for reuse in municipal waste incineration only: 0 MJ; CPC 17300: Steam and hot water; By-product classification allocatable product; pedigree (1,1,1,1,1)
  Net useful heat generated from this waste and used in internal MSWI plant energy redistribution.
  Uncertainty: uncertainty is calculated from uncertainties in waste composition and uncertainties in energy efficiency and the uncertainty in internal energy demand
  property true value relation 0.1842; name E_th_prod_MSWI_true_value_relation
    property to calculate "true value" from
  property exergy 0.1842 MJ; name E_th_prod_MSWI_exergy
    This exergy property is based on the exergy content of the product.
  property price 0.0106 EUR2005; name E_th_prod_MSWI_price_EUR2005
    Average European district heat price from Ecoheatcool and Euroheat 2005-2006, Ecoheat Work package 1: The European heat market. Final report. 10.6 EUR/GJ i s the price of district heat. http://www.solarthermalworld.org/files/Ecoheatcool%20WP1%20Web.pdf?download
- zinc concentrate: 0 kg; CPC 14290: Other non-ferrous metal ores and concentrates (other than uranium or thorium ores and concentrates); By-product classification allocatable product
  Calculated value from the knowledge of the properties of both products.
  property price 0.38 EUR2005; name ByP_price_EUR2005
    Temporary price data. Calculated as 90% of purchasers price based on: Zinc content in concentrate 53%. Concentrate price per kg Zn 86.5% of refined Zn price (13.5% treatment charges according to CHR Metals Limited 2005: Dynamic cost curves. http://www.minecost.com/dynamic.pdf). 2004 zinc price from USGS (2007) Mineral commodity summaries 2007. <http://minerals.usgs.gov/minerals/pubs/mcs/2007/mcs2007.pdf> [Accessed 25 May 2010]
  property zinc content 0.53; name zinc_C_zinc_concentrate
    Zinc content on a dry matter basis. Value taken from teh "zinc mine operation" /GLO dataset.
  property dry mass 1 kg; name DM_zinc_concentrate
  property carbon content 0
    carbon content on a dry matter basis (reserved; not for manual entry)
  properties: wet mass 1 kg, water content 0, carbon content, non-fossil 0, carbon content, fossil 0, water in wet mass 0 kg, carbon allocation 0 kg
- aluminium oxide, non-metallurgical: 0 kg; source European Aluminium Association 2008; CPC 41432: Alumina (aluminium oxide), except artificial corundum; By-product classification allocatable product; CAS 1344-28-1; pedigree (1,1,1,1,1)
  property carbon content, non-fossil 0; name C_content_non_fossil
  property price 0.28 EUR2005; name Al2O3Amount_price_EUR2005
    From UN trade database. http://data.un.org/ Import data from the largest economies of the world are used (Brazil, India, USA, China, Japan and EU-27).
  property dry mass 1 kg; name DM
  property water content 0; name water_content
  property wet mass 1 kg; name WM
  property water in wet mass 0 kg; name WWM
  property carbon content, fossil 0; name C_content_fossil
  property carbon content 0
    carbon content on a dry matter basis (reserved; not for manual entry)
  properties: carbon allocation 0 kg
- aluminium, cast alloy: 0 kg; source European Aluminium Association 2008; By-product classification allocatable product; CPC 41431: Unwrought aluminium; pedigree (1,1,1,1,1)
  EcoSpold01Location=RER
  property price 1.3 EUR2005; name castAlloyAmount_price_EUR2005
    Temporary price data. Calculated as 90% of purchasers price based on: Source: London Metal Exchange, Aluminium alloy price for 2005
  property carbon content 0
    carbon content on a dry matter basis (reserved; not for manual entry)
  properties: water in wet mass 0 kg, carbon content, non-fossil 0, water content 0, dry mass 1 kg, carbon content, fossil 0, wet mass 1 kg, carbon allocation 0 kg
- aluminium, wrought alloy: 0 kg; source European Aluminium Association 2008; By-product classification allocatable product; CPC 4153: Semi-finished products of aluminium or aluminium alloys; pedigree (1,1,1,1,1)
  property price 1.44 EUR2005; name secondaryAluminiumOutput_price_EUR2005
    Estimated based on literature values and expert judgement. Aluminium ccast alloys are about 90% of the price of aluminium wrought alloys.
  property carbon content 0
    carbon content on a dry matter basis (reserved; not for manual entry)
  properties: wet mass 1 kg, water content 0, carbon content, fossil 0, water in wet mass 0 kg, carbon content, non-fossil 0, dry mass 1 kg, carbon allocation 0 kg
- iron scrap, sorted, pressed: 0 kg; By-product classification Recyclable; CPC 39310: Slag, dross, scalings and other waste from the manufacture of iron or steel; pedigree (1,1,1,1,1)
  metallic iron scrap removed from ash reamains and recycled.
  Uncertainty: uncertainty is calculated from uncertainties in waste composition and transfer coefficients to soild residues
  property price 0.175 EUR2005
    Temporary price data. Calculated as 90% of purchasers price based on: 2005 import and export prices (total trades (USD) divided by total weight (kg) in biggest economies of the world: EU27, USA, Brasil, China, India, Japan and Russia) from UN Commodity Trade Statistics Database (http://data.un.org/Explorer.aspxDatabase [Accessed 2011.06.20]). Commodity: Waste or scrap, of cast iron
  property carbon content 0
    carbon content on a dry matter basis (reserved; not for manual entry)
  properties: carbon content, non-fossil 0, wet mass 1 kg, dry mass 1 kg, water content 0, carbon content, fossil 0, water in wet mass 0 kg, carbon allocation 0 kg

## Inputs from technosphere
- electricity, medium voltage: 0.00381029 kWh; source Hischier R. 2007; lognormal variance with pedigree 0.0532, pedigree (3,3,5,4,1)
  EcoSpold01Location=UCTE
  Value taken from shredding process for electronics waste. Pedigree matrix changed accordingly.
  Uncertainty: literature values - based on survey of European companies
- mechanical treatment facility, waste electric and electronic equipment: 0 unit; source Hischier R. 2007; pedigree (1,1,1,1,1)
  EcoSpold01Location=GLO
  Value taken from shredding process for electronics waste. Pedigree matrix changed accordingly.
  Uncertainty: rough estimation of infrastructure
- residue from shredder fraction from manual dismantling: 0 kg; source M. Leuenberger 2010; pedigree (1,1,1,1,1)
  Residue calculated after applying on 1 kg of glider the recovery fractions given in ecoinvent report 18, p.21. Materialization of the scooter glider described in Leuenberger 2010.
  production volume 0 kg; = ABS(Ref('267529ce-fe51-467a-88e3-3f9796f62bd4', 'ProductionVolume') * (Ref('92aeea91-60ef-4193-872d-92ddfb1b67de') / Ref('267529ce-fe51-467a-88e3-3f9796f62bd4')))
    Calculated from production volume of reference product using the relative outputs.
  properties: dry mass 1 kg, wet mass 1 kg, carbon content, fossil 0.664925
- copper scrap, sorted, pressed: 0 kg; = (0.0085)*rec_f_Cu; source M. Leuenberger 2010; pedigree (1,1,1,1,1)
  (same comment as for iron scrap, unsorted)
  production volume 0 kg; = ABS(Ref('267529ce-fe51-467a-88e3-3f9796f62bd4', 'ProductionVolume') * (Ref('b16e3265-81a4-47af-8a4b-60c2d89c273b') / Ref('267529ce-fe51-467a-88e3-3f9796f62bd4')))
    Calculated from production volume of reference product using the relative outputs.
  properties: price 2.84 EUR2005, wet mass 1 kg, dry mass 1 kg
- aluminium scrap, post-consumer: 0 kg; = 0.171*rec_f_Al; source M. Leuenberger 2010; pedigree (1,1,1,1,1)
  (same comment as for iron scrap, unsorted)
  production volume 0 kg; = ABS(Ref('267529ce-fe51-467a-88e3-3f9796f62bd4', 'ProductionVolume') * (Ref('fcb739c7-59a0-44fd-a09f-246dc662a260') / Ref('267529ce-fe51-467a-88e3-3f9796f62bd4')))
    Calculated from production volume of reference product using the relative outputs.
  properties: price 0.685 EUR2005, dry mass 1 kg, wet mass 1 kg
- waste plastic, mixture: 0 kg; = 0.352*rec_f_Plastic; source M. Leuenberger 2010; pedigree (1,1,1,1,1)
  Sum of plastic materials in glider dataset. The final output has been calculated based on ecoinvent transfer coefficients from weee shredding (ecoinvent report 18, p.21). Materialization of the scooter glider described in Leuenberger 2010.
  production volume 0 kg; = ABS(Ref('267529ce-fe51-467a-88e3-3f9796f62bd4', 'ProductionVolume') * (Ref('30b12940-5c11-42c3-a9fb-7a3a3f292bdc') / Ref('267529ce-fe51-467a-88e3-3f9796f62bd4')))
    Calculated from production volume of reference product using the relative outputs.
  properties: wet mass 1 kg, carbon content, fossil 0.747344, dry mass 0.847 kg, water content 0.180638
- residue from shredder fraction from manual dismantling: 0, 0 kg (2 entries); source M. Leuenberger 2010; pedigree (1,1,1,1,1)
  (same comment as for residue from shredder fraction from manual dismantling)
- waste plastic, mixture: 0, 0, 0, 0, 0, 0, 0, 0 kg (8 entries); source M. Leuenberger 2010; pedigree (1,1,1,1,1)
  (same comment as for waste plastic, mixture)
- used glider, from electric scooter: -0.0169346 kg
  production volume 6.213e7 kg
- polyvinylchloride, suspension polymerised: 5.65766e-5 kg; source M. Leuenberger 2010; lognormal variance with pedigree 0.0466, pedigree (4,3,4,5,3)
  15% of passenger car
  EcoSpold01Location=RER
  Uncertainty: 15% of passenger car
- nickel, 99.5%: 1.98304e-5 kg; source M. Leuenberger 2010; lognormal variance with pedigree 0.1306, pedigree (4,3,5,5,4)
  EcoSpold01Location=GLO
  Weight ratio scooter:passenger car
  Uncertainty: weight ratio scooter:passenger car
- wire drawing, copper: 0.000143064 kg; source M. Leuenberger 2010; lognormal variance with pedigree 0.1306, pedigree (4,3,5,5,4)
  EcoSpold01Location=RER
  Weight ratio scooter:passenger car
  Uncertainty: weight ratio scooter:passenger car
- synthetic rubber: 0.000624654 kg; source M. Leuenberger 2010; lognormal variance with pedigree 0.1306, pedigree (4,3,5,5,4)
  (same comment as for wire drawing, copper)
- aluminium, wrought alloy: 0.00215916 kg; source M. Leuenberger 2010; lognormal variance with pedigree 0.0912, pedigree (4,3,5,5,4)
- reinforcing steel: 0.00943046 kg; source M. Leuenberger 2010; lognormal variance with pedigree 0.0466, pedigree (4,3,4,5,3)
  5% of passenger car
  EcoSpold01Location=RER
  Uncertainty: 5% of passenger car
- steel, low-alloyed, hot rolled: 0.00140229 kg; source M. Leuenberger 2010; lognormal variance with pedigree 0.1306, pedigree (4,3,5,5,4)
  Weight ratio scooter:passenger car
  EcoSpold01Location=RER
  Uncertainty: weight ratio scooter:passenger car
- polypropylene, granulate: 0.00155587 kg; source M. Leuenberger 2010; lognormal variance with pedigree 0.0466, pedigree (4,3,4,5,3)
  15% of passenger car
  EcoSpold01Location=RER
  Uncertainty: 15% of passenger car
- chromium: 3.39941e-5 kg; source M. Leuenberger 2010; lognormal variance with pedigree 0.1306, pedigree (4,3,5,5,4)
  (same comment as for steel, low-alloyed, hot rolled)
- heat, district or industrial, natural gas: 0.0218695 MJ; source M. Leuenberger 2010; lognormal variance with pedigree 0.0366, pedigree (4,3,4,5,3)
  EcoSpold01Location=RER
  50% of Environmental report Honda, 2008
  Uncertainty: 50% of Environmental report Honda, 2008
- sheet rolling, steel: 0.00572602 kg; source M. Leuenberger 2010; lognormal variance with pedigree 0.0466, pedigree (4,3,4,5,3)
  EcoSpold01Location=RER
  5% of passenger car
  Uncertainty: 5% of passenger car
- road vehicle factory: 4.12188e-12 unit; source M. Leuenberger 2010; lognormal variance with pedigree 0.4306, pedigree (4,3,5,5,4)
  (same comment as for wire drawing, copper)
- copper: 0.000143064 kg; source M. Leuenberger 2010; lognormal variance with pedigree 0.1306, pedigree (4,3,5,5,4)
  (same comment as for wire drawing, copper)
- injection moulding: 0.00323874 kg; source M. Leuenberger 2010; lognormal variance with pedigree 0.1306, pedigree (4,3,5,5,4)
  All HDPE
  EcoSpold01Location=RER
  Uncertainty: All HDPE
- aluminium, cast alloy: 0.00101608 kg; source M. Leuenberger 2010; lognormal variance with pedigree 0.0912, pedigree (4,3,5,5,4)
- heat, district or industrial, other than natural gas: 0.000808416 MJ; source M. Leuenberger 2010; lognormal variance with pedigree 0.0366, pedigree (4,3,4,5,3)
  50% of Environmental report Honda, 2008
  EcoSpold01Location=RER
  Uncertainty: 50% of Environmental report Honda, 2008
- polyethylene, high density, granulate: 0.00323874 kg; source M. Leuenberger 2010; lognormal variance with pedigree 0.0466, pedigree (4,3,4,5,3)
  EcoSpold01Location=RER
  15% of passenger car
  Uncertainty: 15% of passenger car
- tap water: 0.0456091 kg; source M. Leuenberger 2010; lognormal variance with pedigree 0.1306, pedigree (4,3,5,5,4)
  (same comment as for steel, low-alloyed, hot rolled)
- section bar rolling, steel: 0.0028755 kg; source M. Leuenberger 2010; lognormal variance with pedigree 0.1306, pedigree (4,3,5,5,4)
  (same comment as for steel, low-alloyed, hot rolled)
- zinc: 8.34305e-5 kg; source M. Leuenberger 2010; lognormal variance with pedigree 0.1306, pedigree (4,3,5,5,4)
  (same comment as for steel, low-alloyed, hot rolled)
- aluminium scrap, new: -3.39436e-5, -0.000253945 kg (2 entries); lognormal variance with pedigree 0.0518, pedigree (2,4,5,4,3)
  Production waste. Waste factors taken from F. Habermacher 2011.
  production volume 1.05621e6 kg
- alkyd paint, white, without solvent, in 60% solution state: 1.53224e-5, 7.27376e-5 kg (2 entries); source M. Leuenberger 2010; lognormal variance with pedigree 0.1306, pedigree (4,3,5,5,4)
  (same comment as for wire drawing, copper)
- ethylene, average: 8.97823e-5, 2.72022e-6, 0.00016954 kg (3 entries); source M. Leuenberger 2010; lognormal variance with pedigree 0.1306, pedigree (4,3,5,5,4)
  (same comment as for steel, low-alloyed, hot rolled)

## Emissions to nature
- Bromine [air, urban air close to ground]: 0 kg; source Hischier R. 2007; pedigree (1,1,1,1,1)
  Value taken from shredding process for electronics waste. Pedigree matrix changed accordingly.
  Uncertainty: values from Swiss Recycling company in Morf (2004)
- Nickel [air, urban air close to ground]: 0 kg; source Hischier R. 2007; pedigree (1,1,1,1,1)
  (same comment as for Bromine)
- Tin [air, urban air close to ground]: 0 kg; source Hischier R. 2007; pedigree (1,1,1,1,1)
  (same comment as for Bromine)
- Polychlorinated biphenyls [air, urban air close to ground]: 0 kg; source Hischier R. 2007; pedigree (1,1,1,1,1)
  (same comment as for Bromine)
- Chromium [air, urban air close to ground]: 0 kg; source Hischier R. 2007; pedigree (1,1,1,1,1)
  (same comment as for Bromine)
- Phosphorus [air, urban air close to ground]: 0 kg; source Hischier R. 2007; pedigree (1,1,1,1,1)
  (same comment as for Bromine)
- Zinc [air, urban air close to ground]: 0 kg; source Hischier R. 2007; pedigree (1,1,1,1,1)
  (same comment as for Bromine)
- Antimony [air, urban air close to ground]: 0 kg; source Hischier R. 2007; pedigree (1,1,1,1,1)
  (same comment as for Bromine)
- Mercury [air, urban air close to ground]: 0 kg; source Hischier R. 2007; pedigree (1,1,1,1,1)
  (same comment as for Bromine)
- Copper [air, urban air close to ground]: 0 kg; source Hischier R. 2007; pedigree (1,1,1,1,1)
  (same comment as for Bromine)
- Cadmium [air, urban air close to ground]: 0 kg; source Hischier R. 2007; pedigree (1,1,1,1,1)
  (same comment as for Bromine)
- Aluminium [air, urban air close to ground]: 0 kg; source Hischier R. 2007; pedigree (1,1,1,1,1)
  (same comment as for Bromine)
- Chlorine [air, urban air close to ground]: 0 kg; source Hischier R. 2007; pedigree (1,1,1,1,1)
  (same comment as for Bromine)
- Lead [air, urban air close to ground]: 0 kg; source Hischier R. 2007; pedigree (1,1,1,1,1)
  (same comment as for Bromine)
- Iron [air, urban air close to ground]: 0 kg; source Hischier R. 2007; pedigree (1,1,1,1,1)
  (same comment as for Bromine)
- Phosphate [water, surface water]: 1.41645e-8 kg; source M. Leuenberger 2010; lognormal variance with pedigree 0.1306, pedigree (4,3,5,5,4)
  Weight ratio scooter:passenger car
  Uncertainty: weight ratio scooter:passenger car
- Water [air, unspecified]: 6.84137e-6 m3; lognormal variance with pedigree 0.130025, pedigree (4,4,5,2,4)
  Calculated value based on literature values and expert opinion. See comments in the parametres' comment field.
- BOD5, Biological Oxygen Demand [water, surface water]: 3.68286e-7 kg; source M. Leuenberger 2010; lognormal variance with pedigree 0.1306, pedigree (4,3,5,5,4)
  Weight ratio scooter:passenger car
  Uncertainty: weight ratio scooter:passenger car
- NMVOC, non-methane volatile organic compounds, unspecified origin [air, unspecified]: 6.79904e-5 kg; source M. Leuenberger 2010; lognormal variance with pedigree 0.1306, pedigree (4,3,5,5,4)
  Weight ratio scooter:passenger car
  Uncertainty: weight ratio scooter:passenger car
- Water [water, unspecified]: 3.87678e-5 m3; lognormal variance with pedigree 0.130025, pedigree (4,4,5,2,4)
  (same comment as for Water)
- TOC, Total Organic Carbon [water, surface water]: 1.01247e-6 kg; source M. Leuenberger 2010; lognormal variance with pedigree 0.1306, pedigree (4,3,5,5,4)
  Calculated by default as TOC (gC) = COD/2.7 (COD measured in g O2). Should more correctly be calculated from the carbon content of the specified emissions to water.
  Uncertainty: weight ratio scooter:passenger car
- DOC, Dissolved Organic Carbon [water, surface water]: 1.01247e-6 kg; source M. Leuenberger 2010; lognormal variance with pedigree 0.1306, pedigree (4,3,5,5,4)
  Calculated as equal to TOC.
  Uncertainty: weight ratio scooter:passenger car
- COD, Chemical Oxygen Demand [water, surface water]: 2.73367e-6 kg; source M. Leuenberger 2010; lognormal variance with pedigree 0.1306, pedigree (4,3,5,5,4)
  Weight ratio scooter:passenger car
  Uncertainty: weight ratio scooter:passenger car

## Sampling procedure
own estimation

## Extrapolations
This dataset has been prepared by taking infrastructure, energy efforts and emissions from the dataset "treatment of waste electrical and elctronic equipment, shredding" and the material fractions from the respective glider dataset.

## Review by Christian Bauer 2012-06-04
passed
