# tram track construction

Dataset: EcoSpold 2, unit process
Geography: RoW
Time period: 1990-01-01 to 2019-12-31
Technology level: current
Classification: ISIC rev.4 ecoinvent: 4210:Construction of roads and railways
Classification: EcoSpold01Categories: transport systems/road
Scenario: Business-as-Usual
System model: Allocation at the point of substitution
Generated by: Michael Spielmann (obsolete)
Published in: Spielmann M. 2004
Database: ecoinvent
isCopyrightProtected: true
accessRestrictedTo: 1

## General comment
Based on 'tram track construction, CH 2000'. Inventory for double track concrete stretch (width = 6.5m) and a bitumen layer of 3 cm on top. Alternative constructions of tram-infrastructure (e.g. green stretches) are not accounted for. The life span is estimated at 15 years. The disposal of tram track is included. The dataset of energy use and combustion emissions represents the operation and maintenance of one tram track. The dataset is limited to the energy consumption and land use.

## Included activities start
The datasets starts with the material consumption (concrete, bitumen and gravel). The dataset of energy use and combustion emissions starts with the electricity consumption for signals.

## Included activities end
The inventory includes processes for the supply of construction materials such as gravel, bitumen and concrete. In addition, steel expenditures for railway tracks and bracing are included. NMVOC emissions from bitumen are included. Also transport of materials to the constructions site has been taken into account. The disposal is included. The inventory of the energy use and combustion emissions includes energy consumption for signals. Furthermore, land occupation and transformation are included. The dataset of energy use and combustion emissions ends with the operation and maintenance of one tram track. The dataset includes the electricity consumption and until and including the land use (land occupation and transformation). The dataset does not include the material consumption for the operation and maintenance.

## Geography
Extrapolated from 'tram track construction, CH 2000'. Data refers to average conditions in Switzerland. The data of the energy use and combustion emissions refers to average conditions in Switzerland. For de icing activities, a recent Austrian has been applied.

## Technology
Swiss state of the art technology. The inventory of the energy use and combustion emissions for operation and maintenance of tram infrastructure is limited to the energy consumption for signals (79.5 kWh/m*a) and land use. For the operation of signals a electricity consumption of 79.5 kWh/m*a is accounted for Maibach et al. (1999).
References:
Maibach M., Peter D. and Seiler B. (1999) Ökoinventar Transporte: Grundlagen für den ökologischen Vergleich von Transportsystemen und den Einbezug von Transportsystemen in Ökobilanzen. Technischer Schlussbericht. In: Schweizerischer Nationalfonds zur Förderung der wissenschaftlichen Forschung (ed. SPP Umwelt M.). 2nd Edition.
Maibach M., Peter D. and Seiler B. (1999) Ökoinventar Transporte: Grundlagen für den ökologischen Vergleich von Transportsystemen und den Einbezug von Transportsystemen in Ökobilanzen. Technischer Schlussbericht. In: Schweizerischer Nationalfonds zur Förderung der wissenschaftlichen Forschung (ed. SPP Umwelt M.). 2nd Edition.

## Time period
Tramway length is based on current statistical data (2000). The material consumption represents a situation in the early 1990ties. For the energy use and combustion emissions, the tram track length is based on current statistical data (2000).

## Reference product
- tram track: 1 m*year; By-product classification allocatable product; CPC 53212: Railways
  production volume 3.96633 m*year
    This is a placeholder value that does not reflect real-world production volumes. This dataset does not currently require a real-world production volume to work in the database framework, and no actual data were collected yet. This has no negative effect on the results of the ecoinvent database.
  property price 43.3507 EUR2005
    Calculated based on inputs: The price of the product has been calculated as a sum of the values of the material and energy inputs for this product. This value is therefore a rough estimation. It may underestimate the real price since there are additional expenses when producing any product. These expences can include for example labour costs, treatment of waste materials and profit for the producer. Please consider carefully whether this level of data quality is acceptable for your application.

## Inputs from technosphere
- pitch: 0 kg; source Maibach M. 1999; pedigree (1,1,1,1,1)
  Estimated value based on literature studies.
  Uncertainty: l
  properties: wet mass 1 kg, dry mass 1 kg, carbon content, fossil 0.83
- electricity, medium voltage: 0 kWh; source Maibach M. 1999; pedigree (1,1,1,1,1)
  Literature value. Energy use and combustion emissions
  Uncertainty: l
- diesel, burned in building machine: 390 MJ; lognormal variance with pedigree 0.0546, pedigree (3,3,5,5,1)
  Estimated value based on literature studies.
  Uncertainty: l
- concrete, normal: 0 m3; source Maibach M. 1999; pedigree (1,1,1,1,1)
  Estimated value based on literature studies.
  Uncertainty: l
  properties: wet mass 2380 kg, dry mass 2190 kg, water content 0.086758
- steel, low-alloyed, hot rolled: 12.1 kg; lognormal variance with pedigree 0.0546, pedigree (3,3,5,5,1)
  Estimated value based on literature studies.
  Uncertainty: l
  properties: dry mass 1 kg, wet mass 1 kg, carbon content, fossil 0.005
  note on carbon content, fossil: Low alloyed steel composition given in Tab. 3.2 ecoinvent v2.2 report 10_partII. Steel assumed to have a C content of 0.5%
- decommissioned tram track: -1 m*year; lognormal variance with pedigree 0.044, pedigree (3,1,5,5,1)
  Uncertainty: o
  production volume 3.96633 m*year; = Ref('4426ecbf-a938-4c9b-bbf3-568a71ba512c', 'ProductionVolume') * ((Ref('a4bd1984-9d41-4105-b16e-3dd1696d50d9')*-1) / Ref('4426ecbf-a938-4c9b-bbf3-568a71ba512c'))
    Calculated from production volume of reference product using the relative outputs.
  property dry mass 309 kg; name DM
  property carbon content, fossil 0.0034202; name C_content_fossil
  property carbon content, non-fossil 0; name C_content_non_fossil
  property water content 0; name water_content
  property water in wet mass 0 kg; name WWM
  property wet mass 309 kg; name WM
- excavation, skid-steer loader: 0.3 m3; lognormal variance with pedigree 0.1746, pedigree (3,3,5,5,1)
  Estimated value based on literature studies.
  Uncertainty: l
- reinforcing steel: 0.0858 kg; lognormal variance with pedigree 0.0546, pedigree (3,3,5,5,1)
  Estimated value based on literature studies.
  Uncertainty: l
  properties: carbon content, fossil 0.004, dry mass 1 kg, wet mass 1 kg
- gravel, crushed: 0 kg; source Maibach M. 1999; pedigree (1,1,1,1,1)
  Estimated value based on literature studies.
  Uncertainty: l
  properties: wet mass 1 kg, dry mass 1 kg
- pitch: 0.0550138, 0.00313534, 0.182303, 0.141905, 0.00636075, 0.00908058, 0.802202 kg (7 entries); source Maibach M. 1999; lognormal variance with pedigree 0.0546, pedigree (3,3,5,5,1)
  Estimated value based on literature studies.
  Uncertainty: l
- electricity, medium voltage: 0.837858, 0.152455, 3.5191, 11.9771, 2.5854, 37.4856, 5.3649, 17.5776 kWh (8 entries); source Maibach M. 1999; lognormal variance with pedigree 0.0546, pedigree (3,3,5,5,1)
  Literature value. Energy use and combustion emissions
  Uncertainty: l
- concrete, normal: 0.00254856, 0.000265557, 0.00214987, 0.0012093, 0.00512105, 0.00017273, 0.0995329 m3 (7 entries); source Maibach M. 1999; lognormal variance with pedigree 0.0546, pedigree (3,3,5,5,1)
  Estimated value based on literature studies.
  Uncertainty: l
- gravel, crushed: 4.6289, 1.01112, 0.0925683, 17.7674 kg (4 entries); source Maibach M. 1999; lognormal variance with pedigree 0.0546, pedigree (3,3,5,5,1)
  Estimated value based on literature studies.
  Uncertainty: l

## Inputs from nature
- Transformation, to traffic area, road network [natural resource, land]: 0.0065 m2; lognormal variance with pedigree 0.2527, pedigree (2,2,5,5,5)
  Estimated value based on literature studies. Energy use and combustion emissions
  Uncertainty: l
- Occupation, traffic area, road network [natural resource, land]: 6.5 m2*year; lognormal variance with pedigree 0.1727, pedigree (2,2,5,5,5)
  Estimated value based on literature studies. Estimated value based on literature studies. Energy use and combustion emissions
  Uncertainty: l
- Transformation, from unspecified [natural resource, land]: 0.0065 m2; lognormal variance with pedigree 0.2527, pedigree (2,2,5,5,5)
  (same comment as for Transformation, to traffic area, road network)

## Emissions to nature
- NMVOC, non-methane volatile organic compounds, unspecified origin [air, unspecified]: 1.24 kg; lognormal variance with pedigree 0.1106, pedigree (4,3,5,5,1)
  Estimated value based on literature studies.
  Uncertainty: l

## Sampling procedure
national statistics and literature

## Extrapolations
none This dataset has been copied from an original dataset covering the geography CH. The uncertainty has been adjusted accordingly.

## Review by Carl Vadenbo 2012-06-29
In preparation for the release of ecoinvent v3.0, exchanges for electricity use, land use and decommisioned tram track was moved and extrapolated from the dataset 'transport, tram, CH' to 'tram track construction, GLO 1990-2000' The amounts and the uncertainty information of the exchanges were reviewed and were found to correspond to the disaggregated datasets, and the dataset was accepted for inclusion into the ecoinvent database on 2012.07.04.
