# collector field area construction, solar thermal parabolic trough, 50 MW

Dataset: EcoSpold 2, unit process
Geography: RoW
Time period: 2010-01-01 to 2020-01-01
Technology level: current
Classification: ISIC rev.4 ecoinvent: 4220a: Construction of utility projects for electricity production, except for liquid fuels
Synonyms: solar-field aperture area
Tags: CSP; Concentrated Solar Power
Scenario: Business-as-Usual
System model: Allocation at the point of substitution
Generated by: Karin Treyer
Published in: Telsnig, Thomas 2015
Database: ecoinvent
isCopyrightProtected: true
accessRestrictedTo: 1

## General comment
This activity represents the construction of the collector field area for a 50 MW solar thermal parabolic trough power plant in Upington, South Africa. The total solar aperture area amounts to 600'000m2. The parabolic trough consists of the foundation of the individual collector elements, the steel construction, the collector mirrors, the receiver pipes and the drives of the collectors.
Total land use for the concentrated solar power plant is accounted for in the dataset "concentrated solar power plant construction, solar thermal parabolic trough, 50 MW".
This dataset is entirely based on the detailed life cycle inventory as presented in the dissertation report by
Telsnig, Thomas. 2015. Standortabhängige Analyse und Bewertung solarthermischer Kraftwerke am Beispiel Südafrikas. Forschungsbericht. Band 123. ISSN 0938-1228. Institut für Energiewirtschaft und Rationelle Energieanwendung, Universität Stuttgart, Germany.

## Included activities start
This activity starts with the construction of a precise square area for placement, operationalization and maintenance for the solar power plant.

## Included activities end
This activity concludes with the construction of the parabolic troughs and painting the steel rods that are used to for staging and rotating the troughs.

## Geography
This dataset has been extrapolated from a dataset modelled for the location Upington, South Africa. Uncertainty has not been adjusted as it is assumed that the modelled 50 MW parabolic trough power plant would be very similar in other parts of the world.

## Reference product
- collector field area, solar thermal parabolic trough, 50 MW: 1 unit; By-product classification allocatable product; CPC 54262: General construction services of power plants; pedigree (1,1,1,1,1)
  Reference product unit for construction of collector field area for a 50MW solar thermal parabolic trough,
  production volume 7 unit
    Data about concentrating solar power plants in operation, construction and development globally are available from SolarPACES (https://solarpaces.nrel.gov/, accessed April 2019). On average 8 parabolic through concentrating solar power plants per year went in operation worldwide between 2010 and 2019. This includes plants with an installed capacity other than 50MW and is used as approximate annual production volume for this dataset.
  property lifetime 30 year
    The economic lifetime of the plant is assumed to be 30 years.
  property Surface 600000 m2
    Calculated collector field area (mirror area) for the considered plant design. This does not represent the land area covered.
  property price 1.71e8 EUR2005
    Telsnig 2015: Investment cost for the collector field area of a 50MW CSP solar thermal parabolic trough plant in South Africa (EUR2010) with limited storage capacity (see Table 4-4 in Telsnig, 2015).
    Reference(s): Telsnig, Thomas. 2015. Standortabhängige Analyse und Bewertung solarthermischer Kraftwerke am Beispiel Südafrikas. Forschungsbericht. Band 123. ISSN 0938-1228. Institut für Energiewirtschaft und Rationelle Energieanwendung, Universität Stuttgart, Germany.
  property true value 1.71e8
    allocation property applied in "true value" allocation // value calculated from revenue

## By-products
- iron scrap, sorted, pressed: 0 kg; By-product classification Recyclable; CPC 39310: Slag, dross, scalings and other waste from the manufacture of iron or steel; pedigree (1,1,1,1,1)
  Iron scrap recovered from this waste.
  Uncertainty: uncertainty calculated from uncertainty in waste composition, uncertainty of share of recyclable metal, uncertainty of transfer coefficient to bottom ash, uncertainty of the efficiency of scrap removal in MSWI plant.
  production volume 1.62219e6 kg
  property price 0.175 EUR2005
    Temporary price data. Calculated as 90% of purchasers price based on: 2005 import and export prices (total trades (USD) divided by total weight (kg) in biggest economies of the world: EU27, USA, Brasil, China, India, Japan and Russia) from UN Commodity Trade Statistics Database (http://data.un.org/Explorer.aspxDatabase [Accessed 2011.06.20]). Commodity: Waste or scrap, of cast iron
  property carbon content 0
    carbon content on a dry matter basis (reserved; not for manual entry)
  property true value 961.756
    allocation property applied in "true value" allocation // value calculated from revenue
  properties: wet mass 1 kg, water in wet mass 0 kg, carbon content, non-fossil 0, carbon content, fossil 0, dry mass 1 kg, water content 0, carbon allocation 0 kg
- copper: 0 kg; source Rentz O. 1999; By-product classification allocatable product; CPC 41413: Refined copper and copper alloys, unwrought; master alloys of copper
  Literature value. Copper uses: Before end-use copper is manufactured into semi fabricated products, such as shapes and ingots (known as 'semis'). These manufacturing processes are subdivided into hot working, cold working and, if necessary, process annealing. Few of the semis are ready for use as such. They more typically travel to first-stage manufacturers, who make metal rods, wire, and casting, and then to component manufacturers who produce such things as motors, valves, and insulated cables The components in turn are incorporated by final-stage manufacturers into a variety of finished products - automobiles, commercial buildings, residential housing, and so forth. These uses account for about 79% of the world-wide consumption of copper.
  production volume 63294.4 kg
  properties: dry mass 1 kg, water in wet mass 0 kg, wet mass 1 kg, carbon content, non-fossil 0, water content 0, price 5.52 EUR2005, carbon content, fossil 0, carbon content 0, carbon allocation 0 kg, true value 24956.1
- electricity, for reuse in municipal waste incineration only: 0 kWh; CPC 17100: Electrical energy; By-product classification allocatable product; pedigree (1,1,1,1,1)
  Net electricity generated from this waste and used in internal MSWI plant energy redistribution.
  Uncertainty: uncertainty is calculated from uncertainties in waste composition and uncertainties in energy efficiency and the uncertainty in internal energy demand
  production volume 58945.4 kWh
  property exergy 3.6 MJ; name E_el_prod_MSWI_exergy
    This exergy property is based on the exergy content of the product.
  property true value relation 3.6; name E_el_prod_MSWI_true_value_relation
    property to calculate "true value" from
  property price 0.1 EUR2005; name E_el_prod_MSWI_price_EUR2005
    Estimated to be the same price as in case of electricity, medium voltage.
  property true value 889.55
    allocation property applied in "true value" allocation // value calculated from true value relation
- heat, for reuse in municipal waste incineration only: 0 MJ; CPC 17300: Steam and hot water; By-product classification allocatable product; pedigree (1,1,1,1,1)
  Net useful heat generated from this waste and used in internal MSWI plant energy redistribution.
  Uncertainty: uncertainty is calculated from uncertainties in waste composition and uncertainties in energy efficiency and the uncertainty in internal energy demand
  production volume 522457 MJ
  property true value relation 0.1842; name E_th_prod_MSWI_true_value_relation
    property to calculate "true value" from
  property exergy 0.1842 MJ; name E_th_prod_MSWI_exergy
    This exergy property is based on the exergy content of the product.
  property price 0.0106 EUR2005; name E_th_prod_MSWI_price_EUR2005
    Average European district heat price from Ecoheatcool and Euroheat 2005-2006, Ecoheat Work package 1: The European heat market. Final report. 10.6 EUR/GJ i s the price of district heat. http://www.solarthermalworld.org/files/Ecoheatcool%20WP1%20Web.pdf?download
  property true value 398.246
    (same comment as for electricity, for reuse in municipal waste incineration only)
- zinc concentrate: 0 kg; CPC 14290: Other non-ferrous metal ores and concentrates (other than uranium or thorium ores and concentrates); By-product classification allocatable product
  Calculated value from the knowledge of the properties of both products.
  production volume 10.7271 kg
  property price 0.38 EUR2005; name ByP_price_EUR2005
    Temporary price data. Calculated as 90% of purchasers price based on: Zinc content in concentrate 53%. Concentrate price per kg Zn 86.5% of refined Zn price (13.5% treatment charges according to CHR Metals Limited 2005: Dynamic cost curves. http://www.minecost.com/dynamic.pdf). 2004 zinc price from USGS (2007) Mineral commodity summaries 2007. <http://minerals.usgs.gov/minerals/pubs/mcs/2007/mcs2007.pdf> [Accessed 25 May 2010]
  property zinc content 0.53; name zinc_C_zinc_concentrate
    Zinc content on a dry matter basis. Value taken from teh "zinc mine operation" /GLO dataset.
  property dry mass 1 kg; name DM_zinc_concentrate
  property carbon content 0
    carbon content on a dry matter basis (reserved; not for manual entry)
  property true value 0.00135208
    allocation property applied in "true value" allocation // value calculated from revenue
  properties: wet mass 1 kg, water content 0, carbon content, non-fossil 0, carbon content, fossil 0, water in wet mass 0 kg, carbon allocation 0 kg

## Inputs from technosphere
- copper: 19102 kg; lognormal variance with pedigree 0.0137, pedigree (4,4,3,3,2)
  Copper used for power cables, earthing and ground networks
  properties: wet mass 1 kg, dry mass 1 kg
- waste concrete, not reinforced: 0 kg; pedigree (1,1,1,1,1)
  Calcium carbonate and gypsum are sent to landfill or incineration. The 2200 kg/m3 represents the density of the cement. This is done in order to convert the unit from m3 (vol) to kg (mass)
  production volume 0 kg
    Calculated from production volume of reference product using the relative outputs.
  properties: dry mass 1 kg, wet mass 1 kg
- cast iron: 675.892 kg; name castiron; lognormal variance with pedigree 0.0137, pedigree (4,4,3,3,2)
  Used in setting up of the parabolic troughs to stage the mirrors
  properties: carbon content, fossil 0.04, dry mass 1 kg, wet mass 1 kg
  note on carbon content, fossil: Cast iron is made by remelting pig iron in small furnaces (e.g. cupola furnaces or electric arc furnaces) and poured into moulds to make castings. It usually contains 2% to 6% carbon (ecoinvent v2.2 report 10_partII). An average content of 4% was considered
- concrete, normal: 0 m3; name concrete; pedigree (1,1,1,1,1)
  Used in setting up the rigid frame to hold the mirrors.
  properties: wet mass 2380 kg, water content 0.086758, dry mass 2190 kg
- waste reinforcement steel: 0 kg; pedigree (1,1,1,1,1)
  All steel masses combined. Treatment of reinforced steel is used as a proxy for all steel types.
  production volume 0 kg
    Calculated from production volume of reference product using the relative outputs.
  properties: dry mass 1 kg, wet mass 1 kg
- nickel, 99.5%: 53.9914 kg; name nickel; lognormal variance with pedigree 0.0137, pedigree (4,4,3,3,2)
  Coating of tubes to enhance resistance towards abrasion
  properties: dry mass 1 kg, wet mass 1 kg
- reinforcing steel: 1.78347e7 kg; name steel; lognormal variance with pedigree 0.0137, pedigree (4,4,3,3,2)
  Used in setting up of the parabolic troughs to stage the mirrors
  properties: dry mass 1 kg, carbon content, fossil 0.004, wet mass 1 kg
- scrap copper: 0 kg; pedigree (1,1,1,1,1)
  Scrap copper at end of life not usable in reproduction of copper sent to municipal incineration
  production volume 0 kg
    Calculated from production volume of reference product using the relative outputs.
  properties: wet mass 1 kg, dry mass 1 kg
- chromium: 53.9914 kg; lognormal variance with pedigree 0.0137, pedigree (4,4,3,3,2)
  Coating of tubes to enhance resistance towards abrasion
  properties: wet mass 1 kg, dry mass 1 kg
- alkyd paint, white, without solvent, in 60% solution state: 63556.9 kg; name paint; lognormal variance with pedigree 0.0137, pedigree (4,4,3,3,2)
  Painting the steel and iron rods to prevent rust
  properties: dry mass 1 kg, carbon content, fossil 0.140367, carbon content, non-fossil 0.199629, wet mass 1 kg
  note on carbon content, fossil: C content was calculated as an addition of C content in the raw materials.
- waste glass: 0 kg; pedigree (1,1,1,1,1)
  Inert material cullet sometimes reused in the production of glass but nonusable inert cullet sent to landfill
  production volume 0 kg
    Calculated from production volume of reference product using the relative outputs.
  properties: wet mass 1 kg, dry mass 1 kg
- manganese: 675.892 kg; lognormal variance with pedigree 0.0137, pedigree (4,4,3,3,2)
  Material composition of adsorber tubes
  properties: dry mass 1 kg, wet mass 1 kg
- graphite: 219.965 kg; lognormal variance with pedigree 0.0137, pedigree (4,4,3,3,2)
  Used in field wiring
  properties: dry mass 1 kg, carbon content, fossil 1, wet mass 1 kg
- flat glass, coated: 7.22981e6 kg; name glass; lognormal variance with pedigree 0.0137, pedigree (4,4,3,3,2)
  Flat glass for construction of mirrors
  properties: dry mass 1 kg, wet mass 1 kg
- lubricating oil: 9783.44 kg; lognormal variance with pedigree 0.0137, pedigree (4,4,3,3,2)
  Oil used to lubricate the hinges of the troughs to ensure ease of rotation
  properties: carbon content, fossil 0.75, wet mass 1 kg, dry mass 1 kg
  note on carbon content, fossil: Lubricating oil is produced from diesel. C-content/dry mass of fats and oils considered 75%, from: ecoinvent v2.2 report, n 15a, pg 40
- steel, chromium steel 18/8, hot rolled: 425508 kg; name chromesteel; lognormal variance with pedigree 0.0137, pedigree (4,4,3,3,2)
  Used in combination with tubes that transfer high temperature fluids
  properties: carbon content, fossil 0.0008, dry mass 1 kg, wet mass 1 kg
  note on carbon content, fossil: Stainless steel model is the grade 304 steel (18/8 stainless, 18% chromium 8% nickel; max. 0.08% C)
- polyethylene, high density, granulate: 5892.06 kg; name polyethylene; lognormal variance with pedigree 0.0137, pedigree (4,4,3,3,2)
  Mirror plates consist of a thin line of absorber which uses polyethylene granules to resist anti freeze conditions in winter.
  properties: wet mass 1 kg, carbon content, fossil 0.857143, dry mass 1 kg
  note on carbon content, fossil: Polyethylene is formed out of a huge amount of ethylene monomers (C2H4) (ecoinvent v2.2 report 11_II). MW=28 g/mol
- aluminium oxide, non-metallurgical: 3.99936 kg; lognormal variance with pedigree 0.0137, pedigree (4,4,3,3,2)
  Coating of tubes to enhance resistance towards abrasion
  properties: dry mass 1 kg, wet mass 1 kg
- waste polyethylene: 0 kg; pedigree (1,1,1,1,1)
  Polymer products collected for disposal
  production volume 0 kg
    Calculated from production volume of reference product using the relative outputs.
  properties: carbon content, fossil 0.825301, wet mass 1 kg, dry mass 0.996 kg, water content 0.00401606
  note on carbon content, fossil: C content in 1 kg DM was calculated using data in Tab A.1, ecoinvent v2.2 report 13_I
- waste paint: 0 kg; pedigree (1,1,1,1,1)
  Inert materials in alkyd solvent 60% are disposed in landfill
  production volume 0 kg
    Calculated from production volume of reference product using the relative outputs.
  properties: wet mass 1 kg, dry mass 1 kg, carbon content, fossil 0.65
- glass tube, borosilicate: 24180.2 kg; name glasstube; lognormal variance with pedigree 0.0137, pedigree (4,4,3,3,2)
  Aid to construct mirrors, tubes etc
  properties: wet mass 1 kg, dry mass 1 kg
- waste concrete, not reinforced: -528871, -4.99135e7 kg (2 entries); lognormal variance with pedigree 0.0137, pedigree (4,4,3,3,2)
  (same comment as for waste concrete, not reinforced)
  production volume 3.53153e8 kg
- concrete, normal: 15.8737, 526.891, 54.9013, 444.465, 250.011, 1058.73, 20577.5 m3 (7 entries); lognormal variance with pedigree 0.0137, pedigree (4,4,3,3,2)
  Used in setting up the rigid frame to hold the mirrors.
- waste reinforcement steel: -12671.5, -1.82493e7 kg (2 entries); lognormal variance with pedigree 0.0137, pedigree (4,4,3,3,2)
  (same comment as for waste reinforcement steel)
  production volume 1.46119e8 kg
- scrap copper: -856.058, -18245.9 kg (2 entries); lognormal variance with pedigree 0.0137, pedigree (4,4,3,3,2)
  (same comment as for scrap copper)
  production volume 133735 kg
- waste glass: -583137, -53746.5, -1219.33, -5014.47, -7614.76, -1.10769e6, -5.49557e6 kg (7 entries); lognormal variance with pedigree 0.0137, pedigree (4,4,3,3,2)
  (same comment as for waste glass)
  production volume 5.0786e7 kg
- waste polyethylene: -656.289, -43.8507, -3.31636, -18.1119, -7.317, -568.794, -4594.38 kg (7 entries); lognormal variance with pedigree 0.0137, pedigree (4,4,3,3,2)
  Polymer products collected for disposal
  production volume 41251 kg
- waste paint: -147.421, -63409.5 kg (2 entries); lognormal variance with pedigree 0.0137, pedigree (4,4,3,3,2)
  Inert materials in alkyd solvent 60% are disposed in landfill
  production volume 444969 kg

## Sampling procedure
This dataset is entirely based on the detailed life cycle inventory as presented in the dissertation report by
Telsnig, Thomas. 2015. Standortabhängige Analyse und Bewertung solarthermischer Kraftwerke am Beispiel Südafrikas. Forschungsbericht. Band 123. ISSN 0938-1228. Institut für Energiewirtschaft und Rationelle Energieanwendung, Universität Stuttgart, Germany.

Further, data in Telsnig 2015 are not shown explicitely for the downscaled 50 MW parabolic trough power plant. This gap is filled in the ecoinvent report.

## Extrapolations
This dataset has been extrapolated from a dataset modelled for the location Upington, South Africa.
The original data modelling a 250 MW power plant have been scaled down with parameter specific linear and non-linear equations to represent a 50 MW plant design.
Uncertainty has not been adjusted as it is assumed that the modelled 50 MW parabolic trough plant would be very similar in other parts of the world.

## Review by Christopher Oberschelp 2017-03-06
Very detailed and well-structured dataset with in-depth documentation. Key exchanges have been found reasonable. Comparison of impacts with other technologies might now help to spot any unusual or unexpected exchanges.
