# 3-methylpyridine production

Dataset: EcoSpold 2, unit process
Geography: RoW
Time period: 2010-01-01 to 2019-12-31
Technology level: current
Classification: ISIC rev.4 ecoinvent: 2011:Manufacture of basic chemicals
Synonyms: Beta Picoline; 3-Picoline; 3-Methylpyridine
Scenario: Business-as-Usual
System model: Allocation at the point of substitution
Generated by: Avraam Symeonidis
Database: ecoinvent
isCopyrightProtected: true
accessRestrictedTo: 1

## General comment
The dataset describes the industrial production of 3-methylpyridine (C6H7N, CAS Number: 108-99-6) from ammonia (NH3, CAS Number: 7664-41-7 ) and acrolein (C3H4O, CAS Number: 107-02-8). 3-methylpyridine is an organic compound, isomer of methylpyridine. It is a colourless liquid under standard conditions of temperature and pressure and is also a weak base. Pyridine compounds are widely used in pharmaceuticals. Pyridine derivatives are used also in herbicides and insecticides.
Shimizu, S. , Watanabe, N. , Kataoka, T. , Shoji, T. , Abe, N. , Morishita, S. and Ichimura, H. (2000). Pyridine and Pyridine Derivatives. In Ullmann's Encyclopedia of Industrial Chemistry, (Ed.). doi:10.1002/14356007.a22_399

## Included activities start
The activity starts when the raw materials enter the process.

## Included activities end
Materials entering the process are included as well as energy uses, infrastructure and emissions.

## Geography
The inputs to the process are calculated based on stoichiometry and literature data, they are therefore considered to be valid for the chosen geography. The inputs of heat, electricity, water, factory and nitrogen are mostly taken as average of industry data. Industry data values are a 5-year average of data (2011 - 2015) published by the Gendorf factory (Gendorf, 2016, Umwelterklärung, www.gendorf.de), (Gendorf, 2015, Umwelterklärung, www.gendorf.de), (Gendorf, 2014, Umwelterklärung, www.gendorf.de). The Gendorf factory is based in Germany, it produces a wide range of chemical substances. The factory produced 1657400 tonnes of chemical substances in the year 2015 (Gendorf, 2016, Umwelterklärung, www.gendorf.de) and 740000 tonnes of intermediate products. Given the range of chemicals produced by the german site, the values are used for the GLO geography, with uncertainty adjusted accordingly.

## Technology
In this activity 3-methylpyridine is produced by the reaction of ammonia and acrolein. It is a common industrial method of production.
Reaction: 2 C3H4O + NH3 --> C6H7N + 2H2O
A process efficiency of 95% is assumed.
This inventory representing production of a particular chemical compound is at least partially based on a generic model on the production of chemicals. The data generated by this model have been improved by compound-specific data when available.
The model on production of chemicals is using specific industry or literature data wherever possible and more generic data on chemical production processes to fill compound-specific data gaps when necessary. The basic principles of the model have been published in literature (Hischier 2005, Establishing Life Cycle Inventories of Chemicals Based on Differing Data Availability). The model has been updated and extended with newly available data from the chemical industry.
In the model, unreacted fractions are treated in a waste treatment process, and emissions reported are after a waste treatment process that is included in the scope of this dataset. For volatile reactants, a small level of evaporation is assumed. Solvents and catalysts are mostly recycled in closed-loop systems within the scope of the dataset and reported flows are for losses from this system.
The main source of information for the values for heat, electricity, water (process and cooling), nitrogen, chemical factory is industry data from Gendorf. The values are a 5-year average of data (2011 - 2015) published by the Gendorf factory (Gendorf, 2016, Umwelterklärung, www.gendorf.de), (Gendorf, 2015, Umwelterklärung, www.gendorf.de), (Gendorf, 2014, Umwelterklärung, www.gendorf.de). The Gendorf factory is based in Germany, it produces a wide range of chemical substances. The factory produced 1657400 tonnes of chemical substances in the year 2015 (Gendorf, 2016, Umwelterklärung, www.gendorf.de) and 740000 tonnes of intermediate products.
Reference(s):
Hischier, R. (2005) Establishing Life Cycle Inventories of Chemicals Based on Differing Data Availability (9 pp). The International Journal of Life Cycle Assessment, Volume 10, Issue 1, pp 59–67. 10.1065/lca2004.10.181.7

## Time period
The activity is based on stoichiometry and literature data, it is therefore considered not to change significantly over time in terms of inputs. The inputs of heat, electricity, water, factory and nitrogen are mostly taken as average of industry data. Industry data values are a 5-year average of data (2011 - 2015) published by the Gendorf factory (Gendorf, 2016, Umwelterklärung, www.gendorf.de), (Gendorf, 2015, Umwelterklärung, www.gendorf.de), (Gendorf, 2014, Umwelterklärung, www.gendorf.de). The Gendorf factory is based in Germany, it produces a wide range of chemical substances. The factory produced 1657400 tonnes of chemical substances in the year 2015 (Gendorf, 2016, Umwelterklärung, www.gendorf.de) and 740000 tonnes of intermediate products. The time period is therefore set based on the years from Gendorf reference.

## Reference product
- 3-methylpyridine: 1 kg; By-product classification allocatable product; CPC 341: Basic organic chemicals; CAS 108-99-6
  production volume 7.677e6 kg; name PV_RP
    Value refers to 1989 according to Ullmann's Encyclopedia of Industrial Chemistry.
    References: Shimizu, S. , Watanabe, N. , Kataoka, T. , Shoji, T. , Abe, N. , Morishita, S. and Ichimura, H. (2000). Pyridine and Pyridine Derivatives. In Ullmann's Encyclopedia of Industrial Chemistry, (Ed.). doi:10.1002/14356007.a22_399
  property price 2.265 EUR2005
    Estimated value. This price is averaged from 3 different suppliers available in the commercial webstore of alibaba. The price refers to both bulk and commercial quantity purchase. All websites were retrieved on the 25th April 2019. THe exchange rate used is from 2010 when 1 USD - 0.755 EUR.
    Sources:
    https://www.alibaba.com/product-detail/Cas-108-99-6-3-methylpyridine_60821271056.html?spm=a2700.galleryofferlist.normalList.267.716c2f8c20Onfo
    https://www.alibaba.com/product-detail/BETA-PICOLINE-3-Picoline-108-99_60182412021.html?spm=a2700.galleryofferlist.normalList.2.509a2f8cI2Ayjj
    https://www.alibaba.com/product-detail/3-Methylpyridine-98-5-with-CAS_60824385414.html?spm=a2700.7724857.normalList.1.9ea1416dBOW9Ts
  property carbon content 0.774194
    carbon content on a dry matter basis (reserved; not for manual entry)
  property true value 2.265
    allocation property applied in "true value" allocation // value calculated from revenue
  properties: carbon content, non-fossil 0, water content 0, dry mass 1 kg, wet mass 1 kg, carbon content, fossil 0.774194, water in wet mass 0 kg, carbon allocation 0.774194 kg

## By-products
- heat, for reuse in municipal waste incineration only: 0 MJ; CPC 17300: Steam and hot water; By-product classification allocatable product; pedigree (1,1,1,1,1)
  Net electricity generated from this waste and used in internal MSWI plant energy redistribution.
  Uncertainty: uncertainty is calculated from uncertainties in waste composition and uncertainties in energy efficiency and the uncertainty in internal energy demand
  production volume 1.13618 MJ
  property exergy 0.1842 MJ; name E_th_prod_MSWI_exergy
    This exergy property is based on the exergy content of the product.
  property price 0.0106 EUR2005; name E_th_prod_MSWI_price_EUR2005
    Average European district heat price from Ecoheatcool and Euroheat 2005-2006, Ecoheat Work package 1: The European heat market. Final report. 10.6 EUR/GJ i s the price of district heat. http://www.solarthermalworld.org/files/Ecoheatcool%20WP1%20Web.pdf?download
  property true value relation 0.1842; name E_th_prod_MSWI_true_value_relation
    property to calculate "true value" from
  property true value 9.76396e-10
    allocation property applied in "true value" allocation // value calculated from true value relation
- electricity, for reuse in municipal waste incineration only: 0 kWh; CPC 17100: Electrical energy; By-product classification allocatable product; pedigree (1,1,1,1,1)
  (same comment as for heat, for reuse in municipal waste incineration only)
  production volume 0.157149 kWh
  property price 0.1 EUR2005; name E_el_prod_MSWI_price_EUR2005
    Estimated to be the same price as in case of electricity, medium voltage.
  property exergy 3.6 MJ; name E_el_prod_MSWI_exergy
    This exergy property is based on the exergy content of the product.
  property true value relation 3.6; name E_el_prod_MSWI_true_value_relation
    property to calculate "true value" from
  property true value 2.6394e-9
    (same comment as for heat, for reuse in municipal waste incineration only)

## Inputs from technosphere
- ammonia, liquid: 0.192497 kg; lognormal variance with pedigree 0.017825, pedigree (2,3,4,2,3)
  Calculated value based on stoichiometric calculations and literature data.
  properties: wet mass 1 kg, dry mass 1 kg
- heat, from steam, in chemical industry: 2.35 MJ; lognormal variance with pedigree 0.0184, pedigree (2,3,4,4,3)
  Calculated based on literature data published by the industry. This value is a 5-year average of data (2011 - 2015) published by the Gendorf factory (Gendorf, 2016, Umwelterklärung, www.gendorf.de), (Gendorf, 2015, Umwelterklärung, www.gendorf.de), (Gendorf, 2014, Umwelterklärung, www.gendorf.de). The amount of heat used per kg of chemical substance produced is calculated using literature data published by the Gendorf factory based in Germany, which produces a wide range of chemical substances. The factory produced 1657400 tonnes of chemical substances in the year 2015 (Gendorf, 2016, Umwelterklärung, www.gendorf.de) and 740000 tonnes of intermediate products. The amount of heat in the year 2015 was 523500 GJ (Gendorf, 2016, Umwelterklärung, www.gendorf.de) of which 90% was obtained from natural gas and 10% from steam. The resulting amount of heat from steam is 0.22 MJ/kg of chemical product produced. The 5-year average (2011 - 2015, weighted by production volume) is 0.20 MJ/kg. Cross-reference: the amount of chemicals produced (excluding intermediate products) in the EU-28 in the year 2011 was 327 million tonnes (Eurostat, http://ec.europa.eu/eurostat/statistics-explained/index.php/Chemicals_production_statistics, accessed 20170126). The chemical and petrochemical industry sector consumed 2.33 EJ of energy in 2011 (European Commission - Joint Research Centre, 2014, BAT on Common Waste water and Waste Gas Treatment/Management Systems in the Chemical Sector). The resulting energy (both heat and electricity) consumed per kg of chemicals produced in 2011 is thus 7.13 MJ/kg. This is higher than the value calculated using data published by Gendorf – 3.85 MJ/kg, but that is to be expected as the intermediate products are not accounted for.
- chemical factory, organics: 4e-10 unit; lognormal variance with pedigree 0.3178, pedigree (2,3,4,4,3)
  Calculated based on literature data published by the industry. For this activity, no information was readily available concerning infrastructure and land-use. Therefore, the infrastructure is estimated based on data from two chemical factories, the BASF site of Ludwigshafen and the chemical factory in Gendorf (which are both located in Germany), which produce a wide range of chemical substances. Based on this data, the following assumptions are made: the built area amounts to about 4.2 ha, the plant has an average output of 50'000 t/a and a lifespan of fifty years. The estimated infrastructure amount is therefore 4.00 E-10 units per kg of produced chemical.
  References:
  Althaus H.-J., Chudacoff M., Hischier R., Jungbluth N., Osses M. and Primas A. (2007) Life Cycle Inventories of Chemicals. ecoinvent report No. 8, v2.0. EMPA Dübendorf, Swiss Centre for Life Cycle Inventories, Dübendorf, CH.
  Gendorf (2000) Umwelterklärung 2000, Werk Gendorf. Werk Gendorf, Burgkirchen.
- acrolein: 1.26739 kg; lognormal variance with pedigree 0.017825, pedigree (2,3,4,2,3)
  Calculated value based on stoichiometric calculations and literature data.
  properties: carbon content, fossil 0.64271, dry mass 1 kg, wet mass 1 kg
- nitrogen, liquid: 0.019 kg; lognormal variance with pedigree 0.0184, pedigree (2,3,4,4,3)
  Calculated based on literature data published by the industry. This value is a 5-year average of data (2011 - 2015) published by the Gendorf factory (Gendorf, 2016, Umwelterklärung, www.gendorf.de), (Gendorf, 2015, Umwelterklärung, www.gendorf.de), (Gendorf, 2014, Umwelterklärung, www.gendorf.de). The amount of nitrogen used per kg of chemical substance produced is calculated using literature data published by the Gendorf factory based in Germany, which produces a wide range of chemical substances. The factory produced 1657400 tonnes of chemical substances in the year 2015 (Gendorf, 2016, Umwelterklärung, www.gendorf.de) and 740000 tonnes of intermediate products. The reported amount of nitrogen used in 2015 was 33512400 Nm3 (Gendorf, 2016, Umwelterklärung, www.gendorf.de). One Nm3 of nitrogen is equal to 1.2506 kg. The resulting amount of nitrogen - the 5-year average (2011 - 2015, weighted by production volume) is 0.019 kg/kg. Nitrogen is mainly used during the production of chemicals for 'blanketing', which is the process of applying gas to the vapour space of a container or vessel in order to control its composition.
  properties: wet mass 1 kg, dry mass 1 kg
- tap water: 0 kg; pedigree (1,1,1,1,1)
  Calculated value based on stoichiometric calculations and literature data.
  18.01528g/mol is the molar mass of tap water (H2O).
  In this activity dodecanol is produced through the Ziegler process (Ziegler-Alfol synthesis). It is a method to make fatty alcohols from ethylene in the presence of an organoaluminium catalyst and hence provides an alternative production route to the making of fatty alcohols from natural fats and oils (Noweck & Grafahrend, 2006). The synthesis route was first described and named after Karl Ziegler in 1955. It comprises 5 consecutive steps (hydrogenation, ethylation, growth reaction, oxidation, hydrolysis) and uses an aluminum catalyst in order to oligomerize ethylene as well as to oxygenate alkyls (Noweck & Grafahrend, 2006). Commonly targeted are linear primary C12 – C14 alcohols (Noweck & Grafahrend, 2006).
  Chemical Reaction: 6 C2H4 + 3 H2 + 2 H2O → C12H26O
  A process efficiency of 95% is assumed.
  properties: water content 2962.17, carbon content, fossil 0.00178991, dry mass 0.000337476 kg, wet mass 1 kg
  note on carbon content, fossil: Bicarbonate content is 2.93 mol/m3. CO2 content is 0.1 mol/m3 (ecoinvent v2.2 report 8, Tab 93.1).
- wastewater, average: -2.7e-6 m3; name WW; lognormal variance with pedigree 0.0184, pedigree (2,3,4,4,3)
  Calculated based on literature data published by the industry. This value is a 5-year average of data (2011 - 2015) published by the Gendorf factory (Gendorf, 2016, Umwelterklärung, www.gendorf.de), (Gendorf, 2015, Umwelterklärung, www.gendorf.de), (Gendorf, 2014, Umwelterklärung, www.gendorf.de). The amount of wastewater (which is later on treated in the municipal WWTP) per kg of chemical substance produced is calculated using literature data published by the Gendorf factory based in Germany, which produces a wide range of chemical substances. The factory produced 1657400 tonnes of chemical substances in the year 2015 (Gendorf, 2016, Umwelterklärung, www.gendorf.de) and 740000 tonnes of intermediate products. The amount of wastewater which is later on treated in the municipal WWTP in the year 2015 was 1200 tonnes (Gendorf, 2016, Umwelterklärung, www.gendorf.de). The resulting amount of wastewater is 2.7E-06 m3/kg of chemical product produced.
  production volume 20.7279 m3; = PV_RP*WW
    Value calculated based on the production volume of the reference product.
  property price 0 EUR2005; name WW_price_EUR2005
  properties: water content 2882.2, carbon content, non-fossil 0.194039, dry mass 0.346837 kg, wet mass 1000 kg
  note on carbon content, non-fossil: 0.0673 kg TOC/m3 (Tab A.17, ecoinvent v2.2 report 13_I). TOC was considered as Total Carbon.
- electricity, medium voltage: 0 kWh; pedigree (1,1,1,1,1)
  Calculated based on literature data published by the industry. This value is a 5-year average of data (2011 - 2015) published by the Gendorf factory (Gendorf, 2016, Umwelterklärung, www.gendorf.de), (Gendorf, 2015, Umwelterklärung, www.gendorf.de), (Gendorf, 2014, Umwelterklärung, www.gendorf.de). The amount of electricity per kg of chemical substance produced is calculated using literature data published by the Gendorf factory based in Germany, which produces a wide range of chemical substances. The factory produced 1657400 tonnes of chemical substances in the year 2015 (Gendorf, 2016, Umwelterklärung, www.gendorf.de) and 740000 tonnes of intermediate products. The amount of electricity consumed in the year 2015 was 3498800 GJ (Gendorf, 2016, Umwelterklärung, www.gendorf.de). The resulting amount of electricity is 0.406 kWh/kg (year 2015) of chemical substance produced. The 5-year average (2011 - 2015, weighted by production volume) is 0.416 kWh/kg (1.5 MJ/kg). Cross-reference: the amount of chemicals produced (excluding intermediate products) in the EU-28 in the year 2011 was 327 million tonnes (Eurostat, http://ec.europa.eu/eurostat/statistics-explained/index.php/Chemicals_production_statistics, accessed 20170126). The chemical and petrochemical industry sector consumed 2.33 EJ of energy in 2011 (European Commission - Joint Research Centre, 2014, BAT on Common Waste water and Waste Gas Treatment/Management Systems in the Chemical Sector). The resulting energy (both heat and electricity) consumed per kg of chemicals produced in 2011 is thus 7.13 MJ/kg. This is higher than the value calculated using data published by Gendorf – 3.85 MJ/kg, but that is to be expected as the intermediate products are not accounted for.
- tap water: 4.8717e-5, 0.000404717, 8.05128e-5, 0.00203022, 5.28156e-5, 0.000150233, 0.0232328 kg (7 entries); lognormal variance with pedigree 0.017825, pedigree (2,3,4,2,3)
  (same comment as for tap water)
- electricity, medium voltage: 0.00544575, 0.000990897, 0.0168041, 0.243642, 0.0348698, 0.114248 kWh (6 entries); lognormal variance with pedigree 0.0184, pedigree (2,3,4,4,3)
  (same comment as for electricity, medium voltage)

## Inputs from nature
- Water, river [natural resource, in water]: 0.00086 m3; lognormal variance with pedigree 0.0184, pedigree (2,3,4,4,3)
  Calculated based on literature data published by the industry. This value is a 5-year average of data (2011 - 2015) published by the Gendorf factory (Gendorf, 2016, Umwelterklärung, www.gendorf.de), (Gendorf, 2015, Umwelterklärung, www.gendorf.de), (Gendorf, 2014, Umwelterklärung, www.gendorf.de). The amount of groundwater and surface water (river) extracted per kg of chemical substance produced is calculated using literature data published by the Gendorf factory based in Germany, which produces a wide range of chemical substances. The factory produced 1657400 tonnes of chemical substances in the year 2015 (Gendorf, 2016, Umwelterklärung, www.gendorf.de) and 740000 tonnes of intermediate products. The amount of groundwater and surface water (river) extracted in the year 2015 was 19950000 tonnes and 21488100 tonnes respectively (Gendorf, 2016, Umwelterklärung, www.gendorf.de).
- Water, well, in ground [natural resource, in water]: 0.00083 m3; lognormal variance with pedigree 0.0184, pedigree (2,3,4,4,3)
  (same comment as for Water, river)
- Water, cooling, unspecified natural origin [natural resource, in water]: 0.0164 m3; lognormal variance with pedigree 0.0184, pedigree (2,3,4,4,3)
  Calculated based on literature data published by the industry. This value is a 5-year average of data (2011 - 2015) published by the Gendorf factory (Gendorf, 2016, Umwelterklärung, www.gendorf.de), (Gendorf, 2015, Umwelterklärung, www.gendorf.de), (Gendorf, 2014, Umwelterklärung, www.gendorf.de). The amount of water for cooling extracted per kg of chemical substance produced is calculated using literature data published by the Gendorf factory based in Germany, which produces a wide range of chemical substances. The factory produced 1657400 tonnes of chemical substances in the year 2015 (Gendorf, 2016, Umwelterklärung, www.gendorf.de) and 740000 tonnes of intermediate products. The reported amounts of water extracted as groundwater and surface water (river) are assumed to be used entirely for cooling purposes.

## Emissions to nature
All rows: lognormal variance with pedigree 0.0184, pedigree (2,3,4,4,3)
- Carbon dioxide, fossil [air, unspecified]: 0.0951894 kg
  Calculated value. The values is based on a generic model. The basic principles of the model have been published in literature (Hischier 2005, Establishing Life Cycle Inventories of Chemicals Based on Differing Data Availability). The model has been updated and extended with newly available data from the chemical industry. Find more information in the dedicated report on the ecoinvent website.
  Reference(s):
  Hischier, R. (2005) Establishing Life Cycle Inventories of Chemicals Based on Differing Data Availability (9 pp). The International Journal of Life Cycle Assessment, Volume 10, Issue 1, pp 59–67. 10.1065/lca2004.10.181.7
- COD, Chemical Oxygen Demand [water, unspecified]: 0.00307551 kg
  (same comment as for Carbon dioxide, fossil)
- Ammonia [air, unspecified]: 0.00962484 kg
  (same comment as for Carbon dioxide, fossil)
- BOD5, Biological Oxygen Demand [water, unspecified]: 0.000153775 kg
  (same comment as for Carbon dioxide, fossil)
- Acrolein [air, unspecified]: 0.0208214 kg
  (same comment as for Carbon dioxide, fossil)
- TOC, Total Organic Carbon [water, unspecified]: 0.0013673 kg
  (same comment as for Carbon dioxide, fossil)
- Water [water, unspecified]: 0.0167 m3
  Calculated based on literature data published by the industry (Gendorf, 2016, Umwelterklärung, www.gendorf.de). The amount of water released back to the environment consists of the amount of process water treated in the internal WWTP and then released back to the environment and the amount of cooling water released back to the environment.
- Nitrogen [air, unspecified]: 0.019 kg
  (same comment as for Carbon dioxide, fossil)
- Acrolein [water, unspecified]: 0.0021274 kg
  (same comment as for Carbon dioxide, fossil)
- DOC, Dissolved Organic Carbon [water, unspecified]: 0.0013673 kg
  (same comment as for Carbon dioxide, fossil)
- Water [air, unspecified]: 0.0014 m3
  Calculated to ensure the water balance. In general, in the case of recirculating cooling systems, 77% of the water input evaporates to air. In case of once-through cooling systems, 4% of the water input evaporates to air. The process water has in the chemical industry an average evaporation rate of 20.5%. In the specific case of the Gendorf factory, the calculated evaporation rate based on the data published is 6.3%. This matches the qualitative information, that the majority of the cooling systems in Gendorf are once-through and that the amount of cooling water used is significantly higher than the amount of process water used (Gendorf, 2016, Umwelterklärung, www.gendorf.de).
  This exchanges also includes part of the input of tap water which is considered to be emitted to water.

## Sampling procedure
Literature data and stochiometric calculation.
