# floating collar net cage for aquaculture 25 m construction and maintenance

Dataset: EcoSpold 2, unit process
Geography: GLO
Time period: 2010-01-01 to 2020-12-31
Technology level: current
Classification: ISIC rev.4 ecoinvent: 032:Aquaculture
Scenario: Business-as-Usual
System model: Allocation at the point of substitution
Generated by: Angel Avadí
Published in: Avadí, A 2018
Database: ecoinvent
isCopyrightProtected: true
accessRestrictedTo: 1

## General comment
This activity presents data from the Agrinatura VCA4D project. Floating collar cage for aquaculture, 25 m diameter, Scandinavian design, used worldwide for salmonids, cichlids, etc. Used in lakes and marine environments. This process may be used to model different sizes of floating collar cages (range from 22 to 100 m diameter, http://aqualine.no).

## Included activities start
Construction and maintenance of a floating cage system, expressed either in terms of its diameter (if floating collar) or side length (if hexagonal cage), with their associated lifetimes. The specific fish holding capacity of each system is expressed as well per m of diameter or side length.

## Included activities end
The construction and EOL are related to the production means for cagesThe construction and EOL are related to the production means for cages.

## Geography
Cage systems used worldwide

## Technology
Technology described in Vázques-Olivares A.E., 2003, DESIGN OF A CAGE CULTURE SYSTEM FOR FARMING IN MEXICO. UNU Fisheris Training Programme, Final Project. Confirmed by observations at large cage culture systems in Kariba lake, Zambia (project DGDEVCO/VCA4D, 2017). Lifetime: 10 years (structure) and 2 years (nets)

## Reference product
- floating collar cage: 1 m; CPC 3845: Fishing rods and other line fishing tackle; fish landing nets, butterfly nets and similar nets; decoy "birds" a[…]; By-product classification allocatable product
  Floating collar net cage for lake and marine aquaculture. Diameter: 25 m, weight: 6 000 kg, fish capacity: 70 000 kg
  production volume 1 m
    Unquantifiable
  property price 284.536 EUR2005
    Calculated based on inputs: The price of the product has been calculated as a sum of the values of the material and energy inputs for this product. This value is therefore a rough estimation. It may underestimate the real price since there are additional expenses when producing any product. These expences can include for example labour costs, treatment of waste materials and profit for the producer. Please consider carefully whether this level of data quality is acceptable for your application.
  property true value 7113.4
    allocation property applied in "true value" allocation // value calculated from revenue

## By-products
- heat, for reuse in municipal waste incineration only: 0 MJ; CPC 17300: Steam and hot water; By-product classification allocatable product; pedigree (1,1,1,1,1)
  Net electricity generated from this waste and used in internal MSWI plant energy redistribution.
  Uncertainty: uncertainty is calculated from uncertainties in waste composition and uncertainties in energy efficiency and the uncertainty in internal energy demand
  production volume 128.923 MJ
  property exergy 0.1842 MJ; name E_th_prod_MSWI_exergy
    This exergy property is based on the exergy content of the product.
  property true value relation 0.1842; name E_th_prod_MSWI_true_value_relation
    property to calculate "true value" from
  property price 0.0106 EUR2005; name E_th_prod_MSWI_price_EUR2005
    Average European district heat price from Ecoheatcool and Euroheat 2005-2006, Ecoheat Work package 1: The European heat market. Final report. 10.6 EUR/GJ i s the price of district heat. http://www.solarthermalworld.org/files/Ecoheatcool%20WP1%20Web.pdf?download
  property true value 10.6752
    allocation property applied in "true value" allocation // value calculated from true value relation
- electricity, for reuse in municipal waste incineration only: 0 kWh; CPC 17100: Electrical energy; By-product classification allocatable product; pedigree (1,1,1,1,1)
  (same comment as for heat, for reuse in municipal waste incineration only)
  production volume 18.499 kWh
  property exergy 3.6 MJ; name E_el_prod_MSWI_exergy
    This exergy property is based on the exergy content of the product.
  property true value relation 3.6; name E_el_prod_MSWI_true_value_relation
    property to calculate "true value" from
  property price 0.1 EUR2005; name E_el_prod_MSWI_price_EUR2005
    Estimated to be the same price as in case of electricity, medium voltage.
  property true value 29.9171
    (same comment as for heat, for reuse in municipal waste incineration only)
- zinc concentrate: 0 kg; CPC 14290: Other non-ferrous metal ores and concentrates (other than uranium or thorium ores and concentrates); By-product classification allocatable product
  Calculated value from the knowledge of the properties of both products.
  production volume 0.00129729 kg
  property price 0.38 EUR2005; name ByP_price_EUR2005
    Temporary price data. Calculated as 90% of purchasers price based on: Zinc content in concentrate 53%. Concentrate price per kg Zn 86.5% of refined Zn price (13.5% treatment charges according to CHR Metals Limited 2005: Dynamic cost curves. http://www.minecost.com/dynamic.pdf). 2004 zinc price from USGS (2007) Mineral commodity summaries 2007. <http://minerals.usgs.gov/minerals/pubs/mcs/2007/mcs2007.pdf> [Accessed 25 May 2010]
  property zinc content 0.53; name zinc_C_zinc_concentrate
    Zinc content on a dry matter basis. Value taken from teh "zinc mine operation" /GLO dataset.
  property dry mass 1 kg; name DM_zinc_concentrate
  property carbon content 0
    carbon content on a dry matter basis (reserved; not for manual entry)
  property true value 0.000183406
    allocation property applied in "true value" allocation // value calculated from revenue
  properties: wet mass 1 kg, water content 0, carbon content, non-fossil 0, carbon content, fossil 0, water in wet mass 0 kg, carbon allocation 0 kg
- iron scrap, sorted, pressed: 0 kg; By-product classification Recyclable; CPC 39310: Slag, dross, scalings and other waste from the manufacture of iron or steel; pedigree (1,1,1,1,1)
  Iron scrap recovered from this waste.
  production volume 1.34559 kg
  property price 0.175 EUR2005
    Temporary price data. Calculated as 90% of purchasers price based on: 2005 import and export prices (total trades (USD) divided by total weight (kg) in biggest economies of the world: EU27, USA, Brasil, China, India, Japan and Russia) from UN Commodity Trade Statistics Database (http://data.un.org/Explorer.aspxDatabase [Accessed 2011.06.20]). Commodity: Waste or scrap, of cast iron
  property carbon content 0
    carbon content on a dry matter basis (reserved; not for manual entry)
  property true value 0.0397205
    allocation property applied in "true value" allocation // value calculated from revenue
  properties: water content 0, water in wet mass 0 kg, carbon content, fossil 0, dry mass 1 kg, carbon content, non-fossil 0, wet mass 1 kg, carbon allocation 0 kg

## Inputs from technosphere
- metal working, average for steel product manufacturing: 27.3239 kg; lognormal variance with pedigree 0.0101, pedigree (2,5,2,3,2)
  Brackets, manufacture
- waste polyethylene: 0 kg; pedigree (1,1,1,1,1)
  A 10% of expanded polystyrene is considered to be a waste flow of the system
  production volume 0 kg
    Calculated from production volume of reference product using the relative outputs.
  properties: wet mass 1 kg, dry mass 0.996 kg, carbon content, fossil 0.825301, water content 0.00401606
  note on carbon content, fossil: C content in 1 kg DM was calculated using data in Tab A.1, ecoinvent v2.2 report 13_I
- extrusion, plastic film: 74.574 kg; = (308+67)*10/2; lognormal variance with pedigree 0.0101, pedigree (2,5,2,3,2)
  Net and rope, manufacture, replaced every 2 years
- waste expanded polystyrene: 0 kg; pedigree (1,1,1,1,1)
  A 10% of polyethylene is considered to be a waste flow of the system
  production volume 0 kg
    Calculated from production volume of reference product using the relative outputs.
  properties: carbon content, fossil 0.864875, dry mass 0.95 kg, wet mass 1 kg, water content 0.0526316
- extrusion, plastic pipes: 79.7047 kg; lognormal variance with pedigree 0.0101, pedigree (2,5,2,3,2)
  HDPE pipes, manufacture
- nylon 6-6: 0 kg; pedigree (1,1,1,1,1)
  Net and rope, material, replaced every 2 years
  properties: wet mass 1 kg, carbon content, fossil 0.637168, dry mass 1 kg
- steel, low-alloyed: 120.512 kg; = 687+858+1485; lognormal variance with pedigree 0.0101, pedigree (2,5,2,3,2)
  Brackets, catwalk and wire ropes, material
  properties: dry mass 1 kg, carbon content, fossil 0.005, wet mass 1 kg
- polyethylene, high density, granulate: 79.7047 kg; lognormal variance with pedigree 0.0101, pedigree (2,5,2,3,2)
  HDPE pipes, material
  properties: wet mass 1 kg, dry mass 1 kg, carbon content, fossil 0.857143
  note on carbon content, fossil: Polyethylene is formed out of a huge amount of ethylene monomers (C2H4) (ecoinvent v2.2 report 11_II). MW=28 g/mol
- wire drawing, steel: 59.0626 kg; lognormal variance with pedigree 0.0101, pedigree (2,5,2,3,2)
  Wire ropes, manufacture
- polystyrene, expandable: 21.716 kg; lognormal variance with pedigree 0.0101, pedigree (2,5,2,3,2)
  Pipe filling for flotation
  properties: carbon content, fossil 0.923077, dry mass 1 kg, wet mass 1 kg
- weaving, synthetic fibre: 74.574 kg; = (308+67)*10/2; lognormal variance with pedigree 0.0101, pedigree (2,5,2,3,2)
  Net and rope, manufacture, replaced every 2 years
  properties: dry mass 1 kg, wet mass 1 kg
- scrap steel: 0 kg; pedigree (1,1,1,1,1)
  A 10% of steel is considered to be a waste flow of the system.
  production volume 0 kg
    Calculated from production volume of reference product using the relative outputs.
  properties: dry mass 1 kg, wet mass 1 kg
- sheet rolling, steel: 34.1251 kg; lognormal variance with pedigree 0.0101, pedigree (2,5,2,3,2)
  Catwalk, manufacture
- waste polyethylene: -0.209026, -0.0161147, -0.00665595, -0.00632044, -0.24118, -0.00268893, -0.00121873, -1.68839 kg (8 entries); lognormal variance with pedigree 0.0101, pedigree (2,5,2,3,2)
  A 10% of expanded polystyrene is considered to be a waste flow of the system
  production volume 2.184 kg
- waste expanded polystyrene: -0.118615, -7.85186 kg (2 entries); lognormal variance with pedigree 0.0101, pedigree (2,5,2,3,2)
  A 10% of polyethylene is considered to be a waste flow of the system
  production volume 8.016 kg
- nylon 6-6: 24.6536, 49.9204 kg (2 entries); lognormal variance with pedigree 0.0101, pedigree (2,5,2,3,2)
  Net and rope, material, replaced every 2 years
- scrap steel: -2.9344, -0.00370982, -9.11305 kg (3 entries); lognormal variance with pedigree 0.0101, pedigree (2,5,2,3,2)
  A 10% of steel is considered to be a waste flow of the system.
  production volume 12.12 kg

## Extrapolations
Escandinavian-designed floating collar cages, used across the world (known examples in Nordic seas, African lakes and Chilean coastlines), were asumed to represent the most common type of floating collar cages used worldwide for lake and sea aquaculture.
