# deep well drilling, for deep geothermal power

Dataset: EcoSpold 2, unit process
Geography: CH
Time period: 2015-01-01 to 2019-12-31
Technology level: current
Classification: ISIC rev.4 ecoinvent: 09:Mining support service activities
Synonyms: deep borehole drilling
Tags: geothermal power; Infrastructure
Scenario: Business-as-Usual
System model: Allocation at the point of substitution
Generated by: Karin Treyer
Published in: S Hirchberg, S Wiemer, P Burgherr 2015
Database: ecoinvent
isCopyrightProtected: true
accessRestrictedTo: 1

## General comment
This activity represents the the drilling of 1 meter of a borehole for deep geothermal power generation. The inventory reflects the conditions for a well with a depth of 5000m. This is important to not because exchanges do not scale linearly with depth.
Geothermal drilling profits from the experience gained in onshore oil and natural gas drilling, but not all facts can be carried over for geothermal drillings. The latter are situated in hard rock and operate with larger borehole diameters and deepter boreholes.
Detailed information on this dataset is presented in the book "Energy from the Earth. 2015. Hirschberg, Wiemer, Burgherr (eds.) (see field "Data Generator and Publication").

## Included activities start
This is an onshore (rotatory drilling service station) service starting with the reciept of chemicals, reinforcing materials and energy for the drilling. The energy source is electricity from the grid. Diesel is only used as a stand by and for activities on or related to the drill site.

## Included activities end
Deep onshore borehole ready for use. Borehole casing (steel, cement) remains in the ground after end of life of the geothermal plant (no waste treatment).

## Geography
Represents installation of a deep geothermal power plant in Switzerland. The inventory reflects the conditions for a 5000 m well.

## Technology
Onshore drilling with a rig capacity of 6.75 MWel. The diameter of the borehole at the top is 10 inches.

## Reference product
- deep well, drilled, for geothermal power: 1 m; source S Hirchberg, S Wiemer, P Burgherr 2015; CPC 86219: Support services to other mining; By-product classification allocatable product
  production volume 32000 m
    corresponds to drilling for one plant
  property price 657.604 EUR2005
    Calculated based on inputs: The price of the product has been calculated as a sum of the values of the material and energy inputs for this product. This value is therefore a rough estimation. It may underestimate the real price since there are additional expenses when producing any product. These expences can include for example labour costs, treatment of waste materials and profit for the producer. Please consider carefully whether this level of data quality is acceptable for your application.
  property true value 657.604
    allocation property applied in "true value" allocation // value calculated from revenue

## By-products
- electricity, for reuse in municipal waste incineration only: 0 kWh; CPC 17100: Electrical energy; By-product classification allocatable product; pedigree (1,1,1,1,1)
  Net electricity generated from this waste and used in internal MSWI plant energy redistribution.
  Uncertainty: uncertainty is calculated from uncertainties in waste composition and uncertainties in energy efficiency and the uncertainty in internal energy demand
  production volume 466.229 kWh
  property exergy 3.6 MJ; name E_el_prod_MSWI_exergy
    This exergy property is based on the exergy content of the product.
  property true value relation 3.6; name E_el_prod_MSWI_true_value_relation
    property to calculate "true value" from
  property price 0.1 EUR2005; name E_el_prod_MSWI_price_EUR2005
    Estimated to be the same price as in case of electricity, medium voltage.
  property true value 0.00187195
    allocation property applied in "true value" allocation // value calculated from true value relation
- heat, for reuse in municipal waste incineration only: 0 MJ; CPC 17300: Steam and hot water; By-product classification allocatable product; pedigree (1,1,1,1,1)
  Net useful heat generated from this waste and used in internal MSWI plant energy redistribution.
  Uncertainty: uncertainty is calculated from uncertainties in waste composition and uncertainties in energy efficiency and the uncertainty in internal energy demand
  production volume 3298.51 MJ
  property true value relation 0.1842; name E_th_prod_MSWI_true_value_relation
    property to calculate "true value" from
  property exergy 0.1842 MJ; name E_th_prod_MSWI_exergy
    This exergy property is based on the exergy content of the product.
  property price 0.0106 EUR2005; name E_th_prod_MSWI_price_EUR2005
    Average European district heat price from Ecoheatcool and Euroheat 2005-2006, Ecoheat Work package 1: The European heat market. Final report. 10.6 EUR/GJ i s the price of district heat. http://www.solarthermalworld.org/files/Ecoheatcool%20WP1%20Web.pdf?download
  property true value 0.000677642
    (same comment as for electricity, for reuse in municipal waste incineration only)
- zinc concentrate: 0 kg; CPC 14290: Other non-ferrous metal ores and concentrates (other than uranium or thorium ores and concentrates); By-product classification allocatable product
  Calculated value from the knowledge of the properties of both products.
  production volume 0.0825227 kg
  property price 0.38 EUR2005; name ByP_price_EUR2005
    Temporary price data. Calculated as 90% of purchasers price based on: Zinc content in concentrate 53%. Concentrate price per kg Zn 86.5% of refined Zn price (13.5% treatment charges according to CHR Metals Limited 2005: Dynamic cost curves. http://www.minecost.com/dynamic.pdf). 2004 zinc price from USGS (2007) Mineral commodity summaries 2007. <http://minerals.usgs.gov/minerals/pubs/mcs/2007/mcs2007.pdf> [Accessed 25 May 2010]
  property zinc content 0.53; name zinc_C_zinc_concentrate
    Zinc content on a dry matter basis. Value taken from teh "zinc mine operation" /GLO dataset.
  property dry mass 1 kg; name DM_zinc_concentrate
  property carbon content 0
    carbon content on a dry matter basis (reserved; not for manual entry)
  property true value 9.79957e-7
    allocation property applied in "true value" allocation // value calculated from revenue
  properties: wet mass 1 kg, water content 0, carbon content, non-fossil 0, carbon content, fossil 0, water in wet mass 0 kg, carbon allocation 0 kg

## Inputs from technosphere
- steel, low-alloyed: 0.499998 kg; source S Hirchberg, S Wiemer, P Burgherr 2015; lognormal variance with pedigree 0.103325, pedigree (2,2,3,2,2)
  Estimation for the material use of the drilling rig (could also be made of brass instead of steel).
  This item belongs to the infrastructure category in the LCI.
  properties: wet mass 1 kg, dry mass 1 kg, carbon content, fossil 0.005
- sodium chloride, powder: 5.99998 kg; lognormal variance with pedigree 0.1053, pedigree (2,2,3,5,2)
  Assumption. Amounts for the drilling fluid components are rough estimations. They further represent an average mix over the whole drilling time and not specific drilling fluid compositions for the different stages during the drilling process.
  Source: Kaiser, M., and Fäs, M. (2004). Umweltverträglichkeitsbericht (Hauptuntersuchung) Deep Heat Mining, Basel, Switzerland. Gruner AG Ingenieure und Planer, Geohermal Explorers Ltd./ Sonderegger, M. (2013). Personal Communication with M. Sonderegger, Sankt Galler Stadtwerke, Switzerland.
  This item belongs to the drilling fluid category of the LCI.
  properties: wet mass 1 kg, dry mass 1 kg
- bentonite: 19.9999 kg; source S Hirchberg, S Wiemer, P Burgherr 2015; lognormal variance with pedigree 0.103325, pedigree (2,2,3,2,2)
  (same comment as for sodium chloride, powder)
  properties: dry mass 1 kg, wet mass 1 kg
- barite: 19.9999 kg; source S Hirchberg, S Wiemer, P Burgherr 2015; lognormal variance with pedigree 0.103325, pedigree (2,2,3,2,2)
  (same comment as for sodium chloride, powder)
  properties: dry mass 1 kg, wet mass 1 kg
- reinforcing steel: 308.999 kg; source S Hirchberg, S Wiemer, P Burgherr 2015; lognormal variance with pedigree 0.103325, pedigree (2,2,3,2,2)
  Calculated value. This item belongs to the casing activity during the drilling process. Steel use for the casing calculated for a given well design (length of well sections, borehole and pipe diameters and well depth).
  properties: wet mass 1 kg, dry mass 1 kg, carbon content, fossil 0.004
- diesel, burned in diesel-electric generating set, 10MW: 111 MJ; source S Hirchberg, S Wiemer, P Burgherr 2015; lognormal variance with pedigree 0.103325, pedigree (2,2,3,2,2)
  Assumption. Rather pessimistic assumption of diesel use for
  - different applications at the drilling site (i.e. staplers), based on St. Gallen
  - backup in case of electrical power outage, based on Basel.
  Source: Haering, M. (2003). Deep Heat Mining Basel. Voruntersuchung und Pflichtenheft für die Umweltverträglichkeits-Prüfung. : Geothermal Explorers Ltd., Basel, Schweiz./ Sonderegger, M. (2013). Personal Communication with M. Sonderegger, Sankt Galler Stadtwerke,
  Switzerland.
- cellulose fibre, inclusive blowing in: 17.4999 kg; source S Hirchberg, S Wiemer, P Burgherr 2015; lognormal variance with pedigree 0.103325, pedigree (2,2,3,2,2)
  (same comment as for sodium chloride, powder)
  properties: wet mass 1 kg, carbon content, non-fossil 0.46, dry mass 1 kg
- potassium carbonate: 14.9999 kg; source S Hirchberg, S Wiemer, P Burgherr 2015; lognormal variance with pedigree 0.103325, pedigree (2,2,3,2,2)
  (same comment as for sodium chloride, powder)
  properties: dry mass 1 kg, wet mass 1 kg, carbon content, fossil 0.0869565
- sodium hydroxide, without water, in 50% solution state: 0.999996 kg; source S Hirchberg, S Wiemer, P Burgherr 2015; lognormal variance with pedigree 0.103325, pedigree (2,2,3,2,2)
  (same comment as for sodium chloride, powder)
  properties: dry mass 1 kg, wet mass 1 kg
- cement, Portland: 210.999 kg; source S Hirchberg, S Wiemer, P Burgherr 2015; lognormal variance with pedigree 0.103325, pedigree (2,2,3,2,2)
  Calculated value. This item belongs to the casing activity during the drilling process. Cement use for the casing calculated for a given well design (length of well sections, borehole and pipe diameters and well depth). A loss factor of 1.5 is assumed.
  Geothermal cements should tie well casing to the rock formation, be impermeable, hydraulically isolate the well from geological strata other than those related to production and injection, and resist attack b substances present in geothermal reservoirs. It is normally a cement of low density, mainly Portland cement class G with a density of around 1800 kg/m3.
  No dataset for class G cement exists in ecoinvent, so that this
  dataset is taken as a proxy. No data for special additives were
  available.
  properties: wet mass 1 kg, dry mass 1 kg
- electricity, medium voltage: 3933.98 kWh; source S Hirchberg, S Wiemer, P Burgherr 2015; lognormal variance with pedigree 0.103325, pedigree (2,2,3,2,2)
  Calculated value/estimation. Electricity use for the drilling process (including tripping time) calculated as a function of well depth, well design, well volume and installed rig capacity necessary for the well and geological conditions.
  Energy use for the drilling process does not show a linear behaviour. This exchange value is therefore only correct for the specific conditions as specified in the report "Energy from the Earth" (see source field).
- chemical, organic: 19.9999 kg; source S Hirchberg, S Wiemer, P Burgherr 2015; lognormal variance with pedigree 0.103325, pedigree (2,2,3,2,2)
  (same comment as for sodium chloride, powder)
  properties: carbon content, fossil 0.628, wet mass 1 kg, dry mass 1 kg
  note on carbon content, fossil: This dataset is an unweighted average of 20 organic substances (listed in Tab 88.1, ecoinvent v2.2 report 8, part II), being part of the top100 chemicals included in this database. The C-content has also been calculated as an unweighted average of the C content of the substances composing this dataset.
- drilling waste: -465.998 kg; source S Hirchberg, S Wiemer, P Burgherr 2015; lognormal variance with pedigree 0.103825, pedigree (2,3,3,2,2)
  Calculated from the volume of the borehole.
  This item belongs to the drilling cuttings.
  production volume 1.4912e7 kg; = Ref('f4aa9bf4-5d3d-44c0-8c28-91c4568cba65', 'ProductionVolume') * ((Ref('3b35432b-6af8-45f3-829c-b0bb1de8037c')*-1) / Ref('f4aa9bf4-5d3d-44c0-8c28-91c4568cba65'))
    Calculated from production volume of reference product using the relative outputs.
  properties: dry mass 0.285 kg, water content 2.50877, carbon content, fossil 0.105263, wet mass 1 kg
- wastewater, average: -0.599998 m3; lognormal variance with pedigree 0.103325, pedigree (2,2,3,2,2)
  Assumption. It is assumed that the total volume of water used for the drilling fluid is treated (not considering any losses). An additional amount of meteoric water is estimated. The wastewater from the drilling place is partly first stored at place and used for laboratory testing. All wastewater goes to the public wastewater treatment plant.
  COD is estimated to be 3kg, DOC 0.3kg, Potassium ions in the water 0.9kg, sodium ions in the water 6kg. These values could not be modelled in this inventory.
  production volume 19200 m3; = Ref('f4aa9bf4-5d3d-44c0-8c28-91c4568cba65', 'ProductionVolume') * ((Ref('a3d3bd06-9fac-4013-809e-9d86c1024ce7')*-1) / Ref('f4aa9bf4-5d3d-44c0-8c28-91c4568cba65'))
    Calculated from production volume of reference product using the relative outputs.
  properties: dry mass 0.346837 kg, carbon content, non-fossil 0.194039, wet mass 1000 kg, water content 2882.2
  note on carbon content, non-fossil: 0.0673 kg TOC/m3 (Tab A.17, ecoinvent v2.2 report 13_I). TOC was considered as Total Carbon.

## Inputs from nature
- Water, well, in ground [natural resource, in water]: 0.499998 m3; source S Hirchberg, S Wiemer, P Burgherr 2015; lognormal variance with pedigree 0.103325, pedigree (2,2,3,2,2)
  Assumption. The amount for the use of water per m in the drilling fluid is a rather rough estimation.
  This item belongs to the Drilling fluid category of the LCI.
- Occupation, industrial area [natural resource, land]: 5.99998e-5 m2*year; = (6/12)/(5000)* transformation_land_from; source S Hirchberg, S Wiemer, P Burgherr 2015; lognormal variance with pedigree 0.103825, pedigree (2,3,3,2,2)
  Assumption. It is assumed that the actual drilling time amounts to 6 months for 5000 m, and that the preparation and closing time of the drill site amounts to 4 months.
  This item belongs to the Infrastructure category of the LCI.
- Transformation, from unspecified, natural (non-use) [natural resource, land]: 0.599998 m2; name transformation_land_from; lognormal variance with pedigree 0.103825, pedigree (2,3,3,2,2)
  Assumption. A drill site area of 18’000m2 is assumed, including the actual
  drilling rig area, storage area, etc.
  This item belongs to the Infrastructure category of the LCI.
- Transformation, to industrial area [natural resource, land]: 0.599998 m2; = transformation_land_from; source S Hirchberg, S Wiemer, P Burgherr 2015; lognormal variance with pedigree 0.103825, pedigree (2,3,3,2,2)
  (same comment as for Transformation, from unspecified, natural (non-use))

## Sampling procedure
Literature
