# acrylic dispersion production, product in 65% solution state

Dataset: EcoSpold 2, unit process
Geography: RoW
Time period: 1996-01-01 to 2019-12-31
Technology level: current
Classification: ISIC rev.4 ecoinvent: 2022:Manufacture of paints, varnishes and similar coatings, printing ink and mas
Scenario: Business-as-Usual
System model: Allocation at the point of substitution
Generated by: Maggie Osses
Published in: Althaus H.-J. 2007
Database: ecoinvent
isCopyrightProtected: true
accessRestrictedTo: 1

## General comment
This dataset represents the production of 1 kg of acrylic dispersion (100%). Acrylic dispersions are used as binders for industrial coatings for wood, metal and plastics. This dataset is based on a literature source that contains information provided by SIGMA Coatings BV (SZFF 1996).
References:
Althaus H.-J., Chudacoff M., Hischier R., Jungbluth N., Osses M. and Primas A. (2007) Life Cycle Inventories of Chemicals. ecoinvent report No. 8, v2.0. EMPA Dübendorf, Swiss Centre for Life Cycle Inventories, Dübendorf, CH.
Paint & Coatings Industry. Acrylic Dispersions for Industrial Coatings with Polymer-Bound Stabilizers, http://www.pcimag.com/articles/82901-acrylic-dispersions-for-industrial-coatings-with-polymer-bound-stabilizers (last accessed on 2017-01-06).
Schweizerische Zentralstelle für Fenster- und Fassadenbau (SZFF) and Swiss Federal Laboratories for Materials Testing and Research (EMPA) (1996) Ökologische Bewertung von Fensterkonstruktionen verschiedener Rahmenmaterialen. EMPA-SZFF-Forschungsbericht. Editor: SZFF.

## Included activities start
The activity starts when the raw materials enter the process.

## Included activities end
This activity ends with the production of 1 kg of acrylic dispersion. The manufacturing process takes into account the consumption of raw materials, energy, infrastructure and land use. The generation of solid wastes and emission of heat waste into air are also taken into account. No other emissions into air or into water are included, due to lack of data. No by-product is generated in the process. Consumption of auxiliaries are not included due to the lack of data. Solid wastes are assumed to be sent to hazardous waste incineration.

## Geography
The literature source used is based on information provided by SIGMA Coatings BV. The inventory is assumed to be representative of the global production.

## Technology
This dataset is based on data from a company. See general comment.
References:
Althaus H.-J., Chudacoff M., Hischier R., Jungbluth N., Osses M. and Primas A. (2007) Life Cycle Inventories of Chemicals. ecoinvent report No. 8, v2.0. EMPA Dübendorf, Swiss Centre for Life Cycle Inventories, Dübendorf, CH.
Paint & Coatings Industry. Acrylic Dispersions for Industrial Coatings with Polymer-Bound Stabilizers, http://www.pcimag.com/articles/82901-acrylic-dispersions-for-industrial-coatings-with-polymer-bound-stabilizers (last accessed on 2017-01-06).
Schweizerische Zentralstelle für Fenster- und Fassadenbau (SZFF) and Swiss Federal Laboratories for Materials Testing and Research (EMPA) (1996) Ökologische Bewertung von Fensterkonstruktionen verschiedener Rahmenmaterialen. EMPA-SZFF-Forschungsbericht. Editor: SZFF.

## Parameters
- fraction, process water, to air: 0.15 dimensionless; name fraction_PW_to_air; lognormal variance with pedigree 0.092025, pedigree (4,4,3,2,4)
  Literature value. In case when no industry/process specific data are available, default evaporation fraction value is used. This value is 15% and is based on literature (Statistics Canada, 2007 & Shaffer, K.H., 2008, Consumptive water use in the Great Lakes Basin, USGS & Shiklomanov, 2003, World Water Resources at the Beginning of the 21st Century) and has been approved by an expert.

## Reference product
- acrylic dispersion, without water, in 65% solution state: 1 kg; name RP; By-product classification allocatable product; CPC 35110: Paints and varnishes and related products
  Acrylic dispersions are used as binders for industrial coatings for wood, metal and plastics. For these type of coatings acrylic dispersions are currently the best available technology for VOC-compliant binders.
  production volume 3.304 kg; name RP_PV
    This is a placeholder value that does not reflect real-world production volumes. This dataset does not currently require a real-world production volume to work in the database framework, and no actual data were collected yet. This has no negative effect on the results of the ecoinvent database.
  property price 28.3713 EUR2005
    Calculated based on inputs: The price of the product has been calculated as a sum of the values of the material and energy inputs for this product. This value is therefore a rough estimation. It may underestimate the real price since there are additional expenses when producing any product. These expences can include for example labour costs, treatment of waste materials and profit for the producer. Please consider carefully whether this level of data quality is acceptable for your application.
  property carbon content, fossil 0.549932
    Dispersants ensure that the individual particles in the emulsion paint do not combine to form agglomerates.The poly(acrylic acids) are suitable dispersing agents (Ullmann), and have therefore been used as representative example. Their formula is (C3H4O2)n. The formulation of this specific dispersion includes 50% acrylic binder
  property carbon content 0.549932
    carbon content on a dry matter basis (reserved; not for manual entry)
  property true value 28.3713; name RP_true_value
    allocation property applied in "true value" allocation // value calculated from revenue
  properties: water in wet mass 0 kg, wet mass 1 kg, water content 0, carbon content, non-fossil 0, dry mass 1 kg, carbon allocation 0.549932 kg

## By-products
- electricity, for reuse in municipal waste incineration only: 0 kWh; CPC 17100: Electrical energy; By-product classification allocatable product; pedigree (1,1,1,1,1)
  Net electricity generated from this waste and used in internal MSWI plant energy redistribution.
  Uncertainty: uncertainty is calculated from uncertainties in waste composition and uncertainties in energy efficiency and the uncertainty in internal energy demand
  production volume 0.000347068 kWh
  property true value relation 3.6; name E_el_prod_MSWI_true_value_relation
    property to calculate "true value" from
  property exergy 3.6 MJ; name E_el_prod_MSWI_exergy
    This exergy property is based on the exergy content of the product.
  property price 0.1 EUR2005; name E_el_prod_MSWI_price_EUR2005
    Estimated to be the same price as in case of electricity, medium voltage.
  property true value 1.37566e-5
    allocation property applied in "true value" allocation // value calculated from true value relation
- heat, for reuse in municipal waste incineration only: 0 MJ; CPC 17300: Steam and hot water; By-product classification allocatable product; pedigree (1,1,1,1,1)
  (same comment as for electricity, for reuse in municipal waste incineration only)
  production volume 0.00275562 MJ
  property exergy 0.1842 MJ; name E_th_prod_MSWI_exergy
    This exergy property is based on the exergy content of the product.
  property true value relation 0.1842; name E_th_prod_MSWI_true_value_relation
    property to calculate "true value" from
  property price 0.0106 EUR2005; name E_th_prod_MSWI_price_EUR2005
    Average European district heat price from Ecoheatcool and Euroheat 2005-2006, Ecoheat Work package 1: The European heat market. Final report. 10.6 EUR/GJ i s the price of district heat. http://www.solarthermalworld.org/files/Ecoheatcool%20WP1%20Web.pdf?download
  property true value 5.58859e-6
    (same comment as for electricity, for reuse in municipal waste incineration only)

## Inputs from technosphere
- ethylene glycol: 0.04 kg; lognormal variance with pedigree 0.072, pedigree (3,5,5,5,1)
  Data from survey in literature (SFZZ 1996)
  Uncertainty: d
  properties: dry mass 1 kg, wet mass 1 kg, carbon content, fossil 0.387097
- waste emulsion paint: -0.00163 kg; name BP_waste_emulsion_paint; lognormal variance with pedigree 0.072, pedigree (3,5,5,5,1)
  Data from survey in literature (SFZZ 1996)
  Uncertainty: d
  production volume 0.00538552 kg; = RP_PV*BP_waste_emulsion_paint/ABS(RP)
    Calculated from the production volume of acrylic dispersion, without water, in 65% solution state in proportion to the respective output amounts.
  property price 0 EUR2005; name BP_waste_emulsion_paint_price_EUR2005
  properties: carbon content, fossil 0.27, wet mass 1 kg, dry mass 1 kg
  note on carbon content, fossil: Tab A.4, ecoinvent v2.2 report 13_I. C content has been calculated after data in the tables, and then referred to 1 kg DM
- butyl acrylate: 0.00999999 kg; lognormal variance with pedigree 0.072, pedigree (3,5,5,5,1)
  Data from survey in literature (SFZZ 1996)
  Uncertainty: d
  properties: wet mass 1 kg, carbon content, fossil 0.756757, dry mass 1 kg
- electricity, medium voltage: 0 kWh; pedigree (1,1,1,1,1)
  Data from survey in literature (SFZZ 1996)
  Uncertainty: d
- acrylic binder, without water, in 34% solution state: 0.503 kg; lognormal variance with pedigree 0.072, pedigree (3,5,5,5,1)
  Data from survey in literature (SFZZ 1996)
  Uncertainty: d
  properties: dry mass 1 kg, carbon content, fossil 0.599846, wet mass 1 kg
  note on carbon content, fossil: The acrylic acid ethyl ester (ethyl acrylate) is used for both solvent- and water-based paints, and in textiles as a binder in nonwoven fabrics and flocking (Acrylic acid and derivatives: uses, Ullmann). It was used as a representative example of acrylic binders. Its formula is C5H8O2
- chemical factory, organics: 4e-10 unit; lognormal variance with pedigree 0.3498, pedigree (2,3,5,4,3)
  Calculated based on literature data published by the industry. For this activity, no information was readily available concerning infrastructure and land-use. Therefore, the infrastructure is estimated based on data from two chemical factories, the BASF site of Ludwigshafen and the chemical factory in Gendorf (which are both located in Germany), which produce a wide range of chemical substances. Based on this data, the following assumptions are made: the built area amounts to about 4.2 ha, the plant has an average output of 50'000 t/a and a lifespan of fifty years. The estimated infrastructure amount is therefore 4.00 E-10 units per kg of produced chemical.
  References:
  Althaus H.-J., Chudacoff M., Hischier R., Jungbluth N., Osses M. and Primas A. (2007) Life Cycle Inventories of Chemicals. ecoinvent report No. 8, v2.0. EMPA Dübendorf, Swiss Centre for Life Cycle Inventories, Dübendorf, CH.
  Gendorf (2000) Umwelterklärung 2000, Werk Gendorf. Werk Gendorf, Burgkirchen.
- titanium dioxide: 0.251 kg; lognormal variance with pedigree 0.072, pedigree (3,5,5,5,1)
  Data from survey in literature (SFZZ 1996)
  Uncertainty: d
  properties: wet mass 1 kg, dry mass 1 kg
- 1-butanol: 0.00515 kg; lognormal variance with pedigree 0.072, pedigree (3,5,5,5,1)
  Data from survey in literature (SFZZ 1996)
  Uncertainty: d
  properties: wet mass 1 kg, dry mass 1 kg, carbon content, fossil 0.648649
- chemical, organic: 0.005 kg; lognormal variance with pedigree 0.072, pedigree (3,5,5,5,1)
  Data from survey in literature (SFZZ 1996)
  Uncertainty: d
  properties: carbon content, fossil 0.628, wet mass 1 kg, dry mass 1 kg
  note on carbon content, fossil: This dataset is an unweighted average of 20 organic substances (listed in Tab 88.1, ecoinvent v2.2 report 8, part II), being part of the top100 chemicals included in this database. The C-content has also been calculated as an unweighted average of the C content of the substances composing this dataset.
- electricity, medium voltage: 0.00392722, 0.000714588, 0.0121183, 0.175703, 0.0251465, 0.08239 kWh (6 entries); lognormal variance with pedigree 0.072, pedigree (3,5,5,5,1)
  Data from survey in literature (SFZZ 1996)
  Uncertainty: d

## Inputs from nature
- Water, unspecified natural origin [natural resource, in water]: 0.000184 m3; name water_UNO_input; lognormal variance with pedigree 0.072, pedigree (3,5,5,5,1)
  Data from survey in literature (SFZZ 1996)
  Uncertainty: d

## Emissions to nature
- Water [water, unspecified]: 0.0001564 m3; = water_UNO_input*(1-fraction_PW_to_air); lognormal variance with pedigree 0.0827, pedigree (2,2,5,5,1)
  Calculated as a fraction of the input of water. For more details, refer to the mathematical relation and the parameters.
  property fraction, origin: unspecified 1; name fraction_origin_unspecified_Ww
  property carbon content, fossil 0; name C_content_fossil
  property carbon content, non-fossil 0; name C_content_non_fossil
  property dry mass 0 kg; name DM
  property water in wet mass 1000 kg; name WWM
  property fraction, origin: salt water 0; name fraction_origin_salt_water_Ww
  property wet mass 1000 kg; name WM
  property fraction, origin: fresh water 0; name fraction_origin_fresh_water_Ww
- Water [air, unspecified]: 2.76e-5 m3; = (water_UNO_input*fraction_PW_to_air); lognormal variance with pedigree 0.0827, pedigree (2,2,5,5,1)
  (same comment as for Water)
  property fraction, origin: salt water 0; name fraction_origin_salt_water
  property fraction, origin: fresh water 0; name fraction_origin_fresh_water
  property fraction, origin: unspecified 1; name fraction_origin_unspecified

## Sampling procedure
Literature data based on information provided by SIGMA Coatings BV.

## Extrapolations
This dataset has been copied from an original dataset covering the geography RER. The uncertainty has been adjusted accordingly.

## Review by Emilia Moreno Ruiz 2017-08-09
This dataset was additionally reviewed in a separate review process by Eric Johnson of Atlantic Consulting as well as Emilia Moreno Ruiz and Gregor Wernet of ecoinvent.
