# electricity production, hard coal, at coal mine power plant

Dataset: EcoSpold 2, unit process
Geography: CN
Time period: 1999-01-01 to 2019-12-31
Technology level: current
Classification: EcoSpold01Categories: hard coal/power plants
Classification: ISIC rev.4 ecoinvent: 3510:Electric power generation, transmission and distribution
Scenario: Business-as-Usual
System model: Allocation at the point of substitution
Generated by: Christian Bauer
Published in: Röder, A. 2007
Database: ecoinvent
isCopyrightProtected: false
accessRestrictedTo: 1

## General comment
This activity roughly describes the electricity production of an average 20 MW plant for self-generation and self-use in major coal mines in China. For the main characteristics (LHV, sulphur and ash content of coal, efficiency of the plant) and key criteria emissions (SOx and particles), direct information from individual Shandong and Shanxi major coal mines around 2000 from the CETP project (Dones, Zhou and Tian 2003) has been used. These base data have been integrated for other species as well as trace elements and radionuclides using maximum data from European plants.
[This dataset was already contained in the ecoinvent database version 2. It was not individually updated during the transfer to ecoinvent version 3. Life Cycle Impact Assessment results may still have changed, as they are affected by changes in the supply chain, i.e. in other datasets. This dataset was generated following the ecoinvent quality guidelines for version 2. It may have been subject to central changes described in the ecoinvent version 3 change report (http://www.ecoinvent.org/database/ecoinvent-version-3/reports-of-changes/), and the results of the central updates were reviewed extensively. The changes added e.g. consistent water flows and other information throughout the database. The documentation of this dataset can be found in the ecoinvent reports of version 2, which are still available via the ecoinvent website. The change report linked above covers all central changes that were made during the conversion process.]

## Included activities start
Starts with coal input for electricity generation.

## Included activities end
Energy conversion for electricity production. Use of fuel oil for startup is accounted for. Particle removal is included in this module. DeSOx and DeNOx are not explicitly included (some of these units use Fluidized Bed Combustion technology, but data on SO2 emissions emissions comes from major coal mines in Shandong and Shanxi (China), which cover this case as well).

## Geography
Key country-specific data (Shandong and Shanxi) integrated with data for major European power plants.

## Technology
Average installed technology.

## Parameters
- scaling factor: 28.2 dimensionless; name scaling_factor
- fraction, cooling water, once-through system, to air: 0.004; name fraction_CW_OT_to_air; lognormal variance with pedigree 0.0413, pedigree (2,3,1,3,1)
  Calculated based on literature value (Scown, C.D., 2011, Water Footprint of U.S. Transportation Fuels and supplying information of the article) (Vionnet, S., Quantis Water Database - Technical Report, 2012).
- fraction, process water, to air: 0.15 dimensionless; name fraction_PW_to_air; lognormal variance with pedigree 0.092025, pedigree (4,4,3,2,4)
  Literature value. In case when no industry/process specific data are available, default evaporation fraction value is used. This value is 15% and is based on literature (Statistics Canada, 2007 & Shaffer, K.H., 2008, Consumptive water use in the Great Lakes Basin, USGS & Shiklomanov, 2003, World Water Resources at the Beginning of the 21st Century) and has been approved by an expert.
- fraction, cooling water, to air: 0.025107; name fraction_CW_to_air; lognormal variance with pedigree 0.041425, pedigree (2,3,2,2,1)
  Calculated value based on literature value (Scown, 2011 & Floerke, 2009, Future changes of freshwater needs in the electricity production sector & Stiegel, 2008, Estimating Freshwater Needs to Meet Future Thermoelectric Generation Requirements) (Vionnet, S., Quantis Water Database - Technical Report, 2012).
- fraction, water, completely softened, to air: 0.15; name fraction_WCS_to_air; = fraction_PW_to_air; lognormal variance with pedigree 0.092025, pedigree (4,4,3,2,4)
  Calculated value. See comment in the other parametres present in this dataset. Water, completely softened is considered to be always used as process water, thus process water fractions to air are applied to all water, completely softened input flows to calculate the amount of water consumed in the processes.
- fraction, cooling water, recirculating system, to air: 0.771; name fraction_CW_R_to_air; lognormal variance with pedigree 0.0413, pedigree (2,3,1,3,1)
  (same comment as for fraction, cooling water, once-through system, to air)
- fraction, cooling water, cooling pond system, to air: 0.032; name fraction_CW_CP_to_air; lognormal variance with pedigree 0.0413, pedigree (2,3,1,3,1)
  (same comment as for fraction, cooling water, once-through system, to air)
- fraction, water, decarbonised, to air: 0.025107; name fraction_WDC_to_air; = fraction_CW_to_air; lognormal variance with pedigree 0.041425, pedigree (2,3,2,2,1)
  Calculated value. See comments in the other parametres present in this dataset. Decarbonised water is considered to be always used as cooling water, thus cooling water fractions to air are applied to all carbonised water input flows to calculate the amount of water consumed in the processes.

## Reference product
- electricity, high voltage, for internal use in coal mining: 1 kWh; By-product classification allocatable product; CPC 17100: Electrical energy
  production volume 5.38692e10 kWh; name apv_el
    0.0242 kWh/kg; 2.226E12 kg coal in China according to Coal Facts 2006 http://www.worldcoal.org/resources/coal-statistics/
  property price 0.0977 EUR2005
    Temporary price data. Calculated as 90% of purchasers price based on: 94% of the average price (to account for a 6% loss in transformation and transmission) for electricity for industrial consumersin 2005 (excluded taxes). From IEA.
  property true value 0.0977
    allocation property applied in "true value" allocation // value calculated from revenue

## By-products
- heat, for reuse in municipal waste incineration only: 0 MJ; CPC 17300: Steam and hot water; By-product classification allocatable product; pedigree (1,1,1,1,1)
  Net electricity generated from this waste and used in internal MSWI plant energy redistribution.
  Uncertainty: uncertainty is calculated from uncertainties in waste composition and uncertainties in energy efficiency and the uncertainty in internal energy demand
  production volume 11412.7 MJ
  property exergy 0.1842 MJ; name E_th_prod_MSWI_exergy
    This exergy property is based on the exergy content of the product.
  property price 0.0106 EUR2005; name E_th_prod_MSWI_price_EUR2005
    Average European district heat price from Ecoheatcool and Euroheat 2005-2006, Ecoheat Work package 1: The European heat market. Final report. 10.6 EUR/GJ i s the price of district heat. http://www.solarthermalworld.org/files/Ecoheatcool%20WP1%20Web.pdf?download
  property true value relation 0.1842; name E_th_prod_MSWI_true_value_relation
    property to calculate "true value" from
  property true value 1.39359e-9
    allocation property applied in "true value" allocation // value calculated from true value relation
- electricity, for reuse in municipal waste incineration only: 0 kWh; CPC 17100: Electrical energy; By-product classification allocatable product; pedigree (1,1,1,1,1)
  (same comment as for heat, for reuse in municipal waste incineration only)
  production volume 1607.34 kWh
  property true value relation 3.6; name E_el_prod_MSWI_true_value_relation
    property to calculate "true value" from
  property price 0.1 EUR2005; name E_el_prod_MSWI_price_EUR2005
    Estimated to be the same price as in case of electricity, medium voltage.
  property exergy 3.6 MJ; name E_el_prod_MSWI_exergy
    This exergy property is based on the exergy content of the product.
  property true value 3.83591e-9
    (same comment as for heat, for reuse in municipal waste incineration only)

## Inputs from technosphere
- residue from cooling tower: -0.000141 kg; name residue; = (5E-06 * scaling_factor)*-1; lognormal variance with pedigree 0.072, pedigree (5,1,3,1,1)
  EcoSpold01Location=CH
  Calculated from mass balance
  Amount was scaled to the amount of reference product.
  Uncertainty: calculated from mass balance
  production volume 7.59556e6 kg; = apv_el*residue
    Calculated from the production volume of hard coal, burned in coal mine power plant in proportion to the respective output amounts.
  property price 0 EUR2005; name residue_price_EUR2005
  properties: dry mass 0.7 kg, wet mass 1 kg, water content 0.428571, carbon content, fossil 0.0544233
- hard coal: 1.50306 kg; = 0.0533 * scaling_factor; lognormal variance with pedigree 0.032, pedigree (1,1,3,1,1)
  own assumption
  Amount was scaled to the amount of reference product.
  EcoSpold01Location=CN
  properties: carbon content, fossil 0.845, water content 0.0638298, wet mass 1 kg, dry mass 0.94 kg
  note on carbon content, fossil: C content 75-94% (specified in Tab 1.1, report 6, part VI). A mean content of 0.845 kg C/ kg dry hard coal was considered
- chlorine, liquid: 0.000282 kg; = 1E-05 * scaling_factor; lognormal variance with pedigree 0.108025, pedigree (5,4,4,2,3)
  EcoSpold01Location=RER
  Rough guess
  Amount was scaled to the amount of reference product.
  Uncertainty: rough guess
  properties: dry mass 1 kg, wet mass 1 kg
- water, completely softened: 0.1692 kg; name water_softened_input; = 0.006 * scaling_factor; lognormal variance with pedigree 0.052025, pedigree (4,5,4,2,3)
  Estimate based on literature
  Amount was scaled to the amount of reference product.
  estimate based on literature
  Amount was scaled to the amount of reference product.
  EcoSpold01Location=RER
  Uncertainty: estimate based on literature
  properties: wet mass 1 kg
- hard coal ash: -0.75012 kg; name ash; = (0.0266 * scaling_factor)*-1; lognormal variance with pedigree 0.342, pedigree (5,1,3,5,3)
  Own assumption on the basis of 50% ash content; original dataset 1.58calc. from mass balance
  Amount was scaled to the amount of reference product.
  EcoSpold01Location=PL
  Uncertainty: calc. from mass balance
  production volume 4.04084e10 kg; = apv_el*ash
    (same comment as for residue from cooling tower)
  property price 0 EUR2005; name ash_price_EUR2005
  properties: wet mass 1 kg, dry mass 1 kg
- water, decarbonised: 4.23 kg; name water_decarbonised_input; = 0.15 * scaling_factor; lognormal variance with pedigree 0.052025, pedigree (4,5,4,2,3)
  (same comment as for water, completely softened)
  properties: wet mass 1 kg
- light fuel oil: 0.0004794 kg; = 1.7E-05 * scaling_factor; lognormal variance with pedigree 0.0221, pedigree (3,4,4,3,1)
  Typical value for hard coal plant in DE
  Amount was scaled to the amount of reference product.
  EcoSpold01Location=RER
  Uncertainty: typical value for hard coal plant in DE
  properties: carbon content, fossil 0.862, dry mass 1 kg, wet mass 1 kg
- hard coal power plant: 4.1736e-10 unit; = 1.48E-11 * scaling_factor; lognormal variance with pedigree 0.3147, pedigree (3,3,3,3,1)
  EcoSpold01Location=CN
  Amount was scaled to the amount of reference product.

## Inputs from nature
- Water, cooling, unspecified natural origin [natural resource, in water]: 0.00516147 m3; name water_cooling_UNO_input; = 0.000183031 * scaling_factor; source Scown, C.D., et al. 2011; lognormal variance with pedigree 0.016025, pedigree (3,4,3,2,1)
  Estimate based on literature
  Amount was scaled to the amount of reference product.
  Calculated based on literature (Scown, C.D., et al., 2011, Water Footprint of U.S. Trasportation Fuels;Scown, C.D., et al., 2011, Water Footprint of U.S. Trasportation Fuels (SI); Stiegel, 2008, Estimating Freshwater Needs to Meet Future Thermoelectric Generation Requirements; Floerke, M., 2009, Future changes of freshwater needs in the electricity production sector), (Vionnet, S., Quantis Water Database - Technical Report, 2012). Water use in this process is modelled based on literature (see references). The process boundaries are given by the boundaries of the power plant. The process ends when the energy (MJ) is produced and ready to be used for electricity production (kWh). It is assumed that the rate between different types of cooling system is the same as in Europe.
  estimate based on literature
  Amount was scaled to the amount of reference product.
  Calculated based on literature (Scown, C.D., et al., 2011, Water Footprint of U.S. Trasportation Fuels;Scown, C.D., et al., 2011, Water Footprint of U.S. Trasportation Fuels (SI); Stiegel, 2008, Estimating Freshwater Needs to Meet Future Thermoelectric Generation Requirements; Floerke, M., 2009, Future changes of freshwater needs in the electricity production sector), (Vionnet, S., Quantis Water Database - Technical Report, 2012). Water use in this process is modelled based on literature (see references). The process boundaries are given by the boundaries of the power plant. The process ends when the energy (MJ) is produced and ready to be used for electricity production (kWh). It is assumed that the rate between different types of cooling system is the same as in Europe.
  Uncertainty: estimate based on literature

## Emissions to nature
- Zinc [air, urban air close to ground]: 2.1714e-6 kg; = 7.7E-08 * scaling_factor; lognormal variance with pedigree 0.832, pedigree (5,1,3,1,1)
  Own assumption; extrapol. from previously estimated 5.31calc. from trace element balance, input uncertain
  Amount was scaled to the amount of reference product.
  Uncertainty: calc. from trace element balance, input uncertain
- Vanadium [air, urban air close to ground]: 7.8678e-7 kg; = 2.79E-08 * scaling_factor; lognormal variance with pedigree 0.832, pedigree (5,1,3,1,1)
  (same comment as for Zinc)
- Polonium-210 [air, urban air close to ground]: 0.0062604 kBq; = 0.000222 * scaling_factor; lognormal variance with pedigree 0.682, pedigree (5,1,3,1,1)
  Own assumption; extrapol. from previously estimated 3.27calc. from trace element balance, input uncertain
  Amount was scaled to the amount of reference product.
  Uncertainty: calc. from trace element balance, input uncertain
- Xylene [air, urban air close to ground]: 2.60004e-5 kg; = 9.22E-07 * scaling_factor; lognormal variance with pedigree 0.228025, pedigree (3,5,4,2,1)
  Own assumption; original 1.65based on available literature
  Amount was scaled to the amount of reference product.
  Uncertainty: based on available literature
- Pentane [air, urban air close to ground]: 4.1454e-6 kg; = 1.47E-07 * scaling_factor; lognormal variance with pedigree 0.228025, pedigree (3,5,4,2,1)
  (same comment as for Xylene)
- Uranium-238 [air, urban air close to ground]: 0.00073602 kBq; = 2.61E-05 * scaling_factor; lognormal variance with pedigree 0.682, pedigree (5,1,3,1,1)
  (same comment as for Polonium-210)
- Molybdenum [air, urban air close to ground]: 6.063e-8 kg; = 2.15E-09 * scaling_factor; lognormal variance with pedigree 0.832, pedigree (5,1,3,1,1)
  (same comment as for Zinc)
- Radium-228 [air, urban air close to ground]: 0.000261696 kBq; = 9.28E-06 * scaling_factor; lognormal variance with pedigree 0.682, pedigree (5,1,3,1,1)
  (same comment as for Polonium-210)
- Strontium [air, urban air close to ground]: 3.1302e-6 kg; = 1.11E-07 * scaling_factor; lognormal variance with pedigree 0.832, pedigree (5,1,3,1,1)
  (same comment as for Zinc)
- Thorium-228 [air, urban air close to ground]: 0.000141 kBq; = 5E-06 * scaling_factor; lognormal variance with pedigree 0.682, pedigree (5,1,3,1,1)
  (same comment as for Polonium-210)
- Cadmium [air, urban air close to ground]: 3.2712e-8 kg; = 1.16E-09 * scaling_factor; lognormal variance with pedigree 0.832, pedigree (5,1,3,1,1)
  (same comment as for Zinc)
- Radon-220 [air, urban air close to ground]: 0.01833 kBq; = 0.00065 * scaling_factor; lognormal variance with pedigree 0.682, pedigree (5,1,3,1,1)
  (same comment as for Polonium-210)
- Benzo(a)pyrene [air, urban air close to ground]: 5.64e-12 kg; = 2E-13 * scaling_factor; lognormal variance with pedigree 0.228025, pedigree (3,5,4,2,1)
  (same comment as for Xylene)
- Sulfur dioxide [air, urban air close to ground]: 0.03525 kg; = 0.00125 * scaling_factor; lognormal variance with pedigree 0.124, pedigree (3,1,3,1,1)
  Own assumption; original 1.11see power plant data base for details
  Amount was scaled to the amount of reference product.
  Uncertainty: see power plant data base for details
- Copper [air, urban air close to ground]: 4.3146e-7 kg; = 1.53E-08 * scaling_factor; lognormal variance with pedigree 0.832, pedigree (5,1,3,1,1)
  (same comment as for Zinc)
- Dinitrogen monoxide [air, urban air close to ground]: 1.41e-5 kg; = 5E-07 * scaling_factor; lognormal variance with pedigree 0.132025, pedigree (3,4,4,2,1)
  Own assumption; original 1.61based on available literature
  Amount was scaled to the amount of reference product.
  Uncertainty: based on available literature
- Radium-226 [air, urban air close to ground]: 0.00088548 kBq; = 3.14E-05 * scaling_factor; lognormal variance with pedigree 0.682, pedigree (5,1,3,1,1)
  (same comment as for Polonium-210)
- Radon-222 [air, urban air close to ground]: 0.0103212 kBq; = 0.000366 * scaling_factor; lognormal variance with pedigree 0.682, pedigree (5,1,3,1,1)
  (same comment as for Polonium-210)
- Arsenic [air, urban air close to ground]: 3.4122e-7 kg; = 1.21E-08 * scaling_factor; lognormal variance with pedigree 0.832, pedigree (5,1,3,1,1)
  (same comment as for Zinc)
- Cobalt [air, urban air close to ground]: 1.33104e-7 kg; = 4.72E-09 * scaling_factor; lognormal variance with pedigree 0.832, pedigree (5,1,3,1,1)
  (same comment as for Zinc)
- Mercury [air, urban air close to ground]: 9.024e-8 kg; = 3.2E-09 * scaling_factor; lognormal variance with pedigree 0.832, pedigree (5,1,3,1,1)
  (same comment as for Zinc)
- Hydrocarbons, aliphatic, unsaturated [air, urban air close to ground]: 6.0912e-6 kg; = 2.16E-07 * scaling_factor; lognormal variance with pedigree 0.228025, pedigree (3,5,4,2,1)
  (same comment as for Xylene)
- Nitrogen oxides [air, urban air close to ground]: 0.0115056 kg; = 0.000408 * scaling_factor; lognormal variance with pedigree 0.124, pedigree (3,1,3,1,1)
  Own assumption; original 1.52see power plant data base for details
  Amount was scaled to the amount of reference product.
  Uncertainty: see power plant data base for details
- Hydrogen fluoride [air, urban air close to ground]: 7.6986e-5 kg; = 2.73E-06 * scaling_factor; lognormal variance with pedigree 0.332, pedigree (5,1,3,1,1)
  Own assumption; original 2.28calculated from trace element balance, input uncertain
  Amount was scaled to the amount of reference product.
  Uncertainty: calculated from trace element balance, input uncertain
- Water [water, unspecified]: 0.0092995 m3; name water_to_water_unspecified; = (water_softened_input/1000)*(1-fraction_WCS_to_air)+(water_decarbonised_input/1000)*(1-fraction_WDC_to_air)+water_cooling_UNO_input*(1-fraction_CW_to_air); lognormal variance with pedigree 0.0427, pedigree (2,2,3,1,1)
  Calculated value based on literature values and expert opinion. See comments in the parametres' comment field.
  property dry mass 0 kg; name DM
  property fraction, origin: unspecified 0.541092; name fraction_origin_unspecified_Ww
  property fraction, origin: fresh water 0.458908; name fraction_origin_fresh_water_Ww
  property fraction, origin: salt water 0; name fraction_origin_salt_water_Ww
  property water in wet mass 1000 kg; name WWM
  property carbon content, non-fossil 0; name C_content_non_fossil
  property wet mass 1000 kg; name WM
  property carbon content, fossil 0; name C_content_fossil
- Lead [air, urban air close to ground]: 1.78224e-6 kg; = 6.32E-08 * scaling_factor; lognormal variance with pedigree 0.832, pedigree (5,1,3,1,1)
  (same comment as for Zinc)
- Chromium VI [air, urban air close to ground]: 3.9762e-8 kg; = 1.41E-09 * scaling_factor; lognormal variance with pedigree 0.482, pedigree (1,1,3,1,1)
  based on range of data
  Amount was scaled to the amount of reference product.
- Carbon dioxide, fossil [air, urban air close to ground]: 2.679 kg; = 0.095 * scaling_factor; lognormal variance with pedigree 0.004, pedigree (3,1,3,1,1)
  Based on available literature
  Amount was scaled to the amount of reference product.
  Uncertainty: based on available literature
- Hydrogen chloride [air, urban air close to ground]: 0.0008601 kg; = 3.05E-05 * scaling_factor; lognormal variance with pedigree 0.332, pedigree (5,1,3,1,1)
  (same comment as for Hydrogen fluoride)
- Particulates, > 10 um [air, urban air close to ground]: 0.0070782 kg; = 0.000251 * scaling_factor; lognormal variance with pedigree 0.242, pedigree (5,1,3,1,1)
  Own assumption; original 1.83see power plant data base for details
  Amount was scaled to the amount of reference product.
  Uncertainty: see power plant data base for details
- Carbon monoxide, fossil [air, urban air close to ground]: 0.001128 kg; = 4E-05 * scaling_factor; lognormal variance with pedigree 0.812025, pedigree (3,4,4,2,1)
  Own assumption; original 5.09based on available literature
  Amount was scaled to the amount of reference product.
  Uncertainty: based on available literature
- Hydrocarbons, aliphatic, alkanes, unspecified [air, urban air close to ground]: 6.1758e-6 kg; = 2.19E-07 * scaling_factor; lognormal variance with pedigree 0.228025, pedigree (3,5,4,2,1)
  (same comment as for Xylene)
- Manganese [air, urban air close to ground]: 1.70046e-6 kg; = 6.03E-08 * scaling_factor; lognormal variance with pedigree 0.832, pedigree (5,1,3,1,1)
  (same comment as for Zinc)
- PAH, polycyclic aromatic hydrocarbons [air, urban air close to ground]: 2.82e-8 kg; = 1E-09 * scaling_factor; lognormal variance with pedigree 0.498025, pedigree (3,5,4,2,1)
  Own assumption; original 3.12based on available literature
  Amount was scaled to the amount of reference product.
  Uncertainty: based on available literature
- Antimony [air, urban air close to ground]: 5.5836e-8 kg; = 1.98E-09 * scaling_factor; lognormal variance with pedigree 0.832, pedigree (5,1,3,1,1)
  (same comment as for Zinc)
- Bromine [air, urban air close to ground]: 1.61022e-5 kg; = 5.71E-07 * scaling_factor; lognormal variance with pedigree 0.282, pedigree (5,1,3,1,1)
  (same comment as for Hydrogen fluoride)
- Propane [air, urban air close to ground]: 9.87e-7 kg; = 3.5E-08 * scaling_factor; lognormal variance with pedigree 0.228025, pedigree (3,5,4,2,1)
  (same comment as for Xylene)
- Lead-210 [air, urban air close to ground]: 0.0034122 kBq; = 0.000121 * scaling_factor; lognormal variance with pedigree 0.832, pedigree (5,1,3,1,1)
  (same comment as for Polonium-210)
- Formaldehyde [air, urban air close to ground]: 1.6356e-6 kg; = 5.8E-08 * scaling_factor; lognormal variance with pedigree 0.228025, pedigree (3,5,4,2,1)
  (same comment as for Xylene)
- Methane, fossil [air, urban air close to ground]: 2.82e-5 kg; = 1E-06 * scaling_factor; lognormal variance with pedigree 0.222025, pedigree (3,4,4,2,1)
  (same comment as for Dinitrogen monoxide)
- Benzene [air, urban air close to ground]: 6.1194e-6 kg; = 2.17E-07 * scaling_factor; lognormal variance with pedigree 0.228025, pedigree (3,5,4,2,1)
  (same comment as for Xylene)
- Propene [air, urban air close to ground]: 4.512e-7 kg; = 1.6E-08 * scaling_factor; lognormal variance with pedigree 0.228025, pedigree (3,5,4,2,1)
  (same comment as for Xylene)
- Particulates, > 2.5 um, and < 10um [air, urban air close to ground]: 0.0033276 kg; = 0.000118 * scaling_factor; lognormal variance with pedigree 0.422, pedigree (5,1,3,1,1)
  Own assumption; original 2.28see power plant data base for details
  Amount was scaled to the amount of reference product.
  Uncertainty: see power plant data base for details
- Water [air, unspecified]: 0.000261172 m3; name water_to_air_unspecified; = (water_softened_input/1000)*fraction_WCS_to_air+(water_decarbonised_input/1000)*fraction_WDC_to_air+water_cooling_UNO_input*fraction_CW_to_air; lognormal variance with pedigree 0.0427, pedigree (2,2,3,1,1)
  (same comment as for Water)
  property fraction, origin: unspecified 0.496184; name fraction_origin_unspecified
  property fraction, origin: salt water 0; name fraction_origin_salt_water
  property fraction, origin: fresh water 0.503816; name fraction_origin_fresh_water
- Toluene [air, urban air close to ground]: 3.0738e-6 kg; = 1.09E-07 * scaling_factor; lognormal variance with pedigree 0.228025, pedigree (3,5,4,2,1)
  (same comment as for Xylene)
- Potassium-40 [air, urban air close to ground]: 0.00084318 kBq; = 2.99E-05 * scaling_factor; lognormal variance with pedigree 0.682, pedigree (5,1,3,1,1)
  (same comment as for Polonium-210)
- Barium [air, urban air close to ground]: 3.4404e-6 kg; = 1.22E-07 * scaling_factor; lognormal variance with pedigree 0.832, pedigree (5,1,3,1,1)
  (same comment as for Zinc)
- Particulates, < 2.5 um [air, urban air close to ground]: 0.028482 kg; = 0.00101 * scaling_factor; lognormal variance with pedigree 0.512, pedigree (5,1,3,1,1)
  Own assumption; original 3.27see power plant data base for details
  Amount was scaled to the amount of reference product.
  Uncertainty: see power plant data base for details
- Dioxins, measured as 2,3,7,8-tetrachlorodibenzo-p-dioxin [air, urban air close to ground]: 1.974e-13 kg; = 7E-15 * scaling_factor; lognormal variance with pedigree 0.498025, pedigree (3,5,4,2,1)
  (same comment as for PAH, polycyclic aromatic hydrocarbons)
- Nickel [air, urban air close to ground]: 9.3906e-7 kg; = 3.33E-08 * scaling_factor; lognormal variance with pedigree 0.832, pedigree (5,1,3,1,1)
  (same comment as for Zinc)
- Chromium [air, urban air close to ground]: 3.2148e-7 kg; = 1.14E-08 * scaling_factor; lognormal variance with pedigree 0.832, pedigree (5,1,3,1,1)
  (same comment as for Zinc)
- Iodine [air, urban air close to ground]: 8.2344e-6 kg; = 2.92E-07 * scaling_factor; lognormal variance with pedigree 0.332, pedigree (5,1,3,1,1)
  (same comment as for Hydrogen fluoride)
- Selenium [air, urban air close to ground]: 2.78898e-7 kg; = 9.89E-09 * scaling_factor; lognormal variance with pedigree 0.832, pedigree (5,1,3,1,1)
  (same comment as for Zinc)
- Ethane [air, urban air close to ground]: 1.1562e-6 kg; = 4.1E-08 * scaling_factor; lognormal variance with pedigree 0.228025, pedigree (3,5,4,2,1)
  (same comment as for Xylene)
- Thorium-232 [air, urban air close to ground]: 0.000221652 kBq; = 7.86E-06 * scaling_factor; lognormal variance with pedigree 0.682, pedigree (5,1,3,1,1)
  (same comment as for Polonium-210)
- Boron [air, urban air close to ground]: 1.974e-5 kg; = 7E-07 * scaling_factor; lognormal variance with pedigree 0.832, pedigree (5,1,3,1,1)
  (same comment as for Zinc)
- Butane [air, urban air close to ground]: 5.358e-7 kg; = 1.9E-08 * scaling_factor; lognormal variance with pedigree 0.228025, pedigree (3,5,4,2,1)
  (same comment as for Xylene)

## Sampling procedure
literature and statistics

## Extrapolations
see Geography/Text
