# wooden board factory construction, cement bonded boards

Dataset: EcoSpold 2, unit process
Geography: RoW
Time period: 2002-01-01 to 2019-12-31
Technology level: current
Classification: ISIC rev.4 ecoinvent: 4290:Construction of other civil engineering projects
Classification: EcoSpold01Categories: wooden materials/extraction
Tags: ConvertedDataset
Scenario: Business-as-Usual
System model: Allocation at the point of substitution
Generated by: Hans-Jörg Althaus
Published in: Werner F. 2007
Database: ecoinvent
isCopyrightProtected: true
accessRestrictedTo: 1

## General comment
The service life is assumed to be 50 years. Thus the life time output is 2'500'000 m3 board. This data must only be used to consider the infrastructure needed for wood board production if this is not relevant.
[This dataset was already contained in the ecoinvent database version 2. It was not individually updated during the transfer to ecoinvent version 3. Life Cycle Impact Assessment results may still have changed, as they are affected by changes in the supply chain, i.e. in other datasets. This dataset was generated following the ecoinvent quality guidelines for version 2. It may have been subject to central changes described in the ecoinvent version 3 change report (http://www.ecoinvent.org/database/ecoinvent-version-3/reports-of-changes/), and the results of the central updates were reviewed extensively. The changes added e.g. consistent water flows and other information throughout the database. The documentation of this dataset can be found in the ecoinvent reports of version 2, which are still available via the ecoinvent website. The change report linked above covers all central changes that were made during the conversion process.]

## Included activities end
The land area and the material and their transports needed for for building and disposal of a plant for cement bonded wooden boards with a yearly output of 50'000 m3 is included.

## Geography
Estimate is so rough that the Geograhpy is not relevant.

## Technology
Relates to a medium sized production plant for cement bonded wooden boards using one or several stack-presses.

## Reference product
- wooden board factory, cement bonded boards: 1 unit; CPC 53269: Other constructions for manufacturing; By-product classification allocatable product
  production volume 2.67763 unit
    This is a placeholder value that does not reflect real-world production volumes. This dataset does not currently require a real-world production volume to work in the database framework, and no actual data were collected yet. This has no negative effect on the results of the ecoinvent database.
  property price 3.9291e7 EUR2005
    Convert from EU 27 price to the world by currency exchange rate.
  property true value 3.9291e7
    allocation property applied in "true value" allocation // value calculated from revenue

## By-products
- heat, for reuse in municipal waste incineration only: 0 MJ; CPC 17300: Steam and hot water; By-product classification allocatable product; pedigree (1,1,1,1,1)
  Net electricity generated from this waste and used in internal MSWI plant energy redistribution.
  Uncertainty: uncertainty is calculated from uncertainties in waste composition and uncertainties in energy efficiency and the uncertainty in internal energy demand
  production volume 1.00738 MJ
  property exergy 0.1842 MJ; name E_th_prod_MSWI_exergy
    This exergy property is based on the exergy content of the product.
  property price 0.0106 EUR2005; name E_th_prod_MSWI_price_EUR2005
    Average European district heat price from Ecoheatcool and Euroheat 2005-2006, Ecoheat Work package 1: The European heat market. Final report. 10.6 EUR/GJ i s the price of district heat. http://www.solarthermalworld.org/files/Ecoheatcool%20WP1%20Web.pdf?download
  property true value relation 0.1842; name E_th_prod_MSWI_true_value_relation
    property to calculate "true value" from
  property true value 0.00220885
    allocation property applied in "true value" allocation // value calculated from true value relation
- electricity, for reuse in municipal waste incineration only: 0 kWh; CPC 17100: Electrical energy; By-product classification allocatable product; pedigree (1,1,1,1,1)
  (same comment as for heat, for reuse in municipal waste incineration only)
  production volume 0.141867 kWh
  property true value relation 3.6; name E_el_prod_MSWI_true_value_relation
    property to calculate "true value" from
  property price 0.1 EUR2005; name E_el_prod_MSWI_price_EUR2005
    Estimated to be the same price as in case of electricity, medium voltage.
  property exergy 3.6 MJ; name E_el_prod_MSWI_exergy
    This exergy property is based on the exergy content of the product.
  property true value 0.00607945
    (same comment as for heat, for reuse in municipal waste incineration only)

## Inputs from technosphere
- building, hall: 5000 m2; lognormal variance with pedigree 0.39, pedigree (3,5,5,5,3)
- conveyor belt: 100 m; lognormal variance with pedigree 0.39, pedigree (3,5,5,5,3)
- waste reinforced concrete: -403000 kg; lognormal variance with pedigree 0.39, pedigree (3,5,5,5,3)
  production volume 1.209e6 kg
    Calculated from the production volume of wooden board factory, cement bonded boards in proportion to the respective output amounts.
  properties: wet mass 1 kg, water content 0.00585407, dry mass 0.99418 kg
- sheet rolling, steel: 403000 kg; lognormal variance with pedigree 0.39, pedigree (3,5,5,5,3)
- steel, low-alloyed, hot rolled: 403000 kg; lognormal variance with pedigree 0.39, pedigree (3,5,5,5,3)
  properties: carbon content, fossil 0.005, dry mass 1 kg, wet mass 1 kg
  note on carbon content, fossil: Low alloyed steel composition given in Tab. 3.2 ecoinvent v2.2 report 10_partII. Steel assumed to have a C content of 0.5%
- concrete, normal: 0 m3; pedigree (1,1,1,1,1)
  properties: wet mass 2380 kg, dry mass 2190 kg, water content 0.086758
- concrete, normal: 4.20168, 0.43781, 3.54438, 1.99371, 8.44281, 0.284771, 164.095 m3 (7 entries); lognormal variance with pedigree 0.39, pedigree (3,5,5,5,3)

## Inputs from nature
- Transformation, to industrial area [natural resource, land]: 10000 m2; lognormal variance with pedigree 0.21, pedigree (3,5,5,5,3)
- Transformation, from unspecified [natural resource, land]: 10000 m2; lognormal variance with pedigree 0.21, pedigree (3,5,5,5,3)
- Occupation, industrial area [natural resource, land]: 500000 m2*year; lognormal variance with pedigree 0.12, pedigree (3,5,5,5,3)

## Sampling procedure
estimation

## Extrapolations
none This dataset has been copied from an original dataset covering the geography RER. The uncertainty has been adjusted accordingly.

## Review by Roberto Dones 2003-07-04
Passed
