# treatment of aluminium scrap, post-consumer, by collecting, sorting, cleaning, pressing

Dataset: EcoSpold 2, unit process
Geography: RER
Time period: 2005-01-01 to 2019-12-31
Technology level: current
Classification: EcoSpold01Categories: metals/extraction
Classification: ISIC rev.4 ecoinvent: 3830:Materials recovery
Synonyms: post consumer aluminium
Scenario: Business-as-Usual
System model: Allocation at the point of substitution
Share of production covered: 0 %
Generated by: Pascal Lesage
Published in: European Aluminium Association 2008
Database: ecoinvent
isCopyrightProtected: false
accessRestrictedTo: 1

## General comment
This dataset is based on two sources: the European Aluminium Association 2005 LCI data (EAA, 2008); and (2) the ecoinvent v2.2 dataset for the same activity (Althaus, 2009), itself largely based on EAA data from 2000. Priority was given to data contained in EAA (2008); Althaus (2009) was used only in cases where it was found to be more complete that EAA (2008).
Note that EAA only obtained 2005 input and output data for wrought aluminium shredding and de-laquering. Other activities (cast alloy shredding, sink and float, cutting and baling, drying and deoiling and dismantling) were characterized using 1998 data, thought to be largely representative of activities in 2005. The different activities were scaled using scrap make-up data representative of 2005.
Note that the prepared scrap output has been renamed from "aluminium scrap, post-consumer, prepared for remelting" to "aluminium scrap, post-consumer, prepared for recycling" since the prepared scrap is treated downstream in both refining and remelting activities.

## Included activities start
Scrap preparation begins with the receiving of post-consumer aluminium scrap. This scrap can come from from very diverse sources, e.g. motor block engines, used beverage cans, facade panel, etc. The actual activities associated with scrap preparation will depend on the scap nature and can include shredding, sink and float, cutting and baling, drying and de-oiling, de-laquering, dismantling. Some scap requires no preparation whatsoever. This dataset represents the inputs and outputs for the preparation of averaged scrap and hence may not be representative of inputs and outputs associated with any particular type of scrap. For more information on the shares of scrap types and types of treatment activities included in this dataset, please refer to EAA 2008.

## Included activities end
The activity ends with the supply of post-consumer aluminium scrap ready to be recycled.

## Geography
Dataset mostly based on European data.

## Technology
Average technology for the aluminium recycled in Europe

## Time period
The actual input and output data for some of the scrap preparation activities date from 1998.

## Reference product
- aluminium scrap, post-consumer: 0 kg; name scrapInputAmount; source European Aluminium Association 2008; By-product classification Recyclable; CPC 39363: Waste and scrap of aluminium
  Includes approximately 200 kg contaminants
  production volume 0 kg; name scrapInputVolume; = 8.28e8*(1/23%)*(1/82.75%)
    Calculated from the following data: EAA (2008) states that the data they supply for refining covers 8.20e8 kg of input metal, assumed to represent prepared post-consumer aluminium only; EAA (2008) also states that this represents 23% of total aluminium input to refining, meaning that the total amount of prepared post-consumer aluminium refined in Europe is 8.20e8/0.23=3.57e9 kg; and Welmet (2012) shows that, for 2007, 13.25% of prepared scrap goes to remelting, so that the volume calculated with the above, which considers refiners only, needs to be increased by a factor of 1/86.75%.
  property price 0.685 EUR2005; name scrapInputAmount_price_EUR2005
    Temporary price data. Calculated as 90% of purchasers price based on: estimated at 85% of new scrap
  property carbon content 0
    carbon content on a dry matter basis (reserved; not for manual entry)
  properties: carbon content, fossil 0, wet mass 1 kg, carbon content, non-fossil 0, water in wet mass 0 kg, water content 0, dry mass 1 kg, carbon allocation 0 kg
- iron scrap, unsorted: 1 kg; source European Aluminium Association 2008; CPC 39310: Slag, dross, scalings and other waste from the manufacture of iron or steel; By-product classification Recyclable; pedigree (1,1,1,1,1)
  Reported as "Iron scrap"
  production volume 1.22288e8 kg

## By-products
- iron scrap, unsorted: 0 kg; name ironScrapAmount; source European Aluminium Association 2008; CPC 39310: Slag, dross, scalings and other waste from the manufacture of iron or steel; By-product classification Recyclable; pedigree (1,1,1,1,1)
  Reported as "Iron scrap"
  production volume 0 kg; = ironScrapAmount/abs(scrapInputAmount)*scrapInputVolume
    Calculated from the production volume of aluminium scrap, post-consumer in proportion to the respective output amounts.
  property price 0.149 EUR2005; name ironScrapAmount_price_EUR2005
    Temporary price data. Calculated as 90% of purchasers price based on: estimated at 85% of sorted scrap
  property carbon content 0
    carbon content on a dry matter basis (reserved; not for manual entry)
  properties: water content 0, water in wet mass 0 kg, dry mass 1 kg, carbon content, non-fossil 0, wet mass 1 kg, carbon content, fossil 0, carbon allocation 0 kg
- aluminium oxide, non-metallurgical: 0 kg; source European Aluminium Association 2008; CPC 41432: Alumina (aluminium oxide), except artificial corundum; By-product classification allocatable product; CAS 1344-28-1; pedigree (1,1,1,1,1)
  property carbon content, non-fossil 0; name C_content_non_fossil
  property price 0.28 EUR2005; name Al2O3Amount_price_EUR2005
    From UN trade database. http://data.un.org/ Import data from the largest economies of the world are used (Brazil, India, USA, China, Japan and EU-27).
  property dry mass 1 kg; name DM
  property water content 0; name water_content
  property wet mass 1 kg; name WM
  property water in wet mass 0 kg; name WWM
  property carbon content, fossil 0; name C_content_fossil
  property carbon content 0
    carbon content on a dry matter basis (reserved; not for manual entry)
  properties: carbon allocation 0 kg
- aluminium, cast alloy: 0 kg; source European Aluminium Association 2008; By-product classification allocatable product; CPC 41431: Unwrought aluminium; pedigree (1,1,1,1,1)
  EcoSpold01Location=RER
  property price 1.3 EUR2005; name castAlloyAmount_price_EUR2005
    Temporary price data. Calculated as 90% of purchasers price based on: Source: London Metal Exchange, Aluminium alloy price for 2005
  property carbon content 0
    carbon content on a dry matter basis (reserved; not for manual entry)
  properties: water in wet mass 0 kg, carbon content, non-fossil 0, water content 0, dry mass 1 kg, carbon content, fossil 0, wet mass 1 kg, carbon allocation 0 kg
- heat, for reuse in municipal waste incineration only: 0 MJ; CPC 17300: Steam and hot water; By-product classification allocatable product; pedigree (1,1,1,1,1)
  Net electricity generated from this waste and used in internal MSWI plant energy redistribution.
  Uncertainty: uncertainty is calculated from uncertainties in waste composition and uncertainties in energy efficiency and the uncertainty in internal energy demand
  property exergy 0.1842 MJ; name E_th_prod_MSWI_exergy
    This exergy property is based on the exergy content of the product.
  property true value relation 0.1842; name E_th_prod_MSWI_true_value_relation
    property to calculate "true value" from
  property price 0.0106 EUR2005; name E_th_prod_MSWI_price_EUR2005
    Average European district heat price from Ecoheatcool and Euroheat 2005-2006, Ecoheat Work package 1: The European heat market. Final report. 10.6 EUR/GJ i s the price of district heat. http://www.solarthermalworld.org/files/Ecoheatcool%20WP1%20Web.pdf?download
- electricity, for reuse in municipal waste incineration only: 0 kWh; CPC 17100: Electrical energy; By-product classification allocatable product; pedigree (1,1,1,1,1)
  (same comment as for heat, for reuse in municipal waste incineration only)
  property exergy 3.6 MJ; name E_el_prod_MSWI_exergy
    This exergy property is based on the exergy content of the product.
  property true value relation 3.6; name E_el_prod_MSWI_true_value_relation
    property to calculate "true value" from
  property price 0.1 EUR2005; name E_el_prod_MSWI_price_EUR2005
    Estimated to be the same price as in case of electricity, medium voltage.
- aluminium, wrought alloy: 0 kg; source European Aluminium Association 2008; By-product classification allocatable product; CPC 4153: Semi-finished products of aluminium or aluminium alloys; pedigree (1,1,1,1,1)
  property price 1.44 EUR2005; name secondaryAluminiumOutput_price_EUR2005
    Estimated based on literature values and expert judgement. Aluminium ccast alloys are about 90% of the price of aluminium wrought alloys.
  property carbon content 0
    carbon content on a dry matter basis (reserved; not for manual entry)
  properties: wet mass 1 kg, water content 0, carbon content, fossil 0, water in wet mass 0 kg, carbon content, non-fossil 0, dry mass 1 kg, carbon allocation 0 kg
- copper: 0 kg; source Rentz O. 1999; By-product classification allocatable product; CPC 41413: Refined copper and copper alloys, unwrought; master alloys of copper
  Literature value. Copper uses: Before end-use copper is manufactured into semi fabricated products, such as shapes and ingots (known as 'semis'). These manufacturing processes are subdivided into hot working, cold working and, if necessary, process annealing. Few of the semis are ready for use as such. They more typically travel to first-stage manufacturers, who make metal rods, wire, and casting, and then to component manufacturers who produce such things as motors, valves, and insulated cables The components in turn are incorporated by final-stage manufacturers into a variety of finished products - automobiles, commercial buildings, residential housing, and so forth. These uses account for about 79% of the world-wide consumption of copper.
  properties: dry mass 1 kg, water in wet mass 0 kg, wet mass 1 kg, carbon content, non-fossil 0, water content 0, price 5.52 EUR2005, carbon content, fossil 0, carbon content 0, carbon allocation 0 kg
- zinc concentrate: 0 kg; CPC 14290: Other non-ferrous metal ores and concentrates (other than uranium or thorium ores and concentrates); By-product classification allocatable product
  Calculated value from the knowledge of the properties of both products.
  property price 0.38 EUR2005; name ByP_price_EUR2005
    Temporary price data. Calculated as 90% of purchasers price based on: Zinc content in concentrate 53%. Concentrate price per kg Zn 86.5% of refined Zn price (13.5% treatment charges according to CHR Metals Limited 2005: Dynamic cost curves. http://www.minecost.com/dynamic.pdf). 2004 zinc price from USGS (2007) Mineral commodity summaries 2007. <http://minerals.usgs.gov/minerals/pubs/mcs/2007/mcs2007.pdf> [Accessed 25 May 2010]
  property zinc content 0.53; name zinc_C_zinc_concentrate
    Zinc content on a dry matter basis. Value taken from teh "zinc mine operation" /GLO dataset.
  property dry mass 1 kg; name DM_zinc_concentrate
  property carbon content 0
    carbon content on a dry matter basis (reserved; not for manual entry)
  properties: wet mass 1 kg, water content 0, carbon content, non-fossil 0, carbon content, fossil 0, water in wet mass 0 kg, carbon allocation 0 kg
## Inputs from technosphere
- aluminium scrap, post-consumer, prepared for melting: -0.000135096 kg; name preparedScrapOutput; source European Aluminium Association 2008; lognormal variance with pedigree 0.0492, pedigree (2,5,5,1,1)
  production volume 0 kg; = preparedScrapOutput/abs(scrapInputAmount)*scrapInputVolume
    Calculated as the sum of prepared scrap used in refining and remelting. Those PVs are based on International Aluminium Institute data on the relative share of primary, secondary (new scrap) and aluminium (old scrap) aluminium in cast alloy, the total amount of cast alloy produced globally, the total amount of primary aluminium ingots produced globally and the respective scrap to secondary metal ratios in refining and remelting (see corresponding datasets for more information).
  property price 0.806 EUR2005; name preparedScrapOutput_price_EUR2005
  properties: wet mass 1 kg, dry mass 1 kg
- hazardous waste, for underground deposit: -9.00577e-9 kg; name wasteSedimentAmount; source European Aluminium Association 2008; lognormal variance with pedigree 0.0492, pedigree (2,5,5,1,1)
  Reported as waste sediment. Assumption that this is hazardous waste from Althaus (2009).
  EcoSpold01Location=DE
  production volume 0 kg; = wasteSedimentAmount/abs(scrapInputAmount)*scrapInputVolume
    (same comment as for iron scrap, unsorted)
  property price 0 EUR2005; name wasteSedimentAmount_price_EUR2005
  properties: wet mass 1 kg, dry mass 1 kg, carbon content, fossil 0.554667
  note on carbon content, fossil: Tab A.6, ecoinvent v2.2 report 13_I, average hazardous waste composition was used, and referred to 0% water mass. No waste-specific emission are currently inventoried for underground deposits. Accordingly, no waste composition must be specified. For generic, average waste to underground deposit deposition in a 200 liter steel drum without cement solidification is assumed (ecoinvent v2.2 report 13_I).
- scrap preparation facility: 0 unit; = preparedScrapOutput/(10000000*50); source Hans-Jörg Althaus  2009; pedigree (1,1,1,1,1)
  EcoSpold01Location=RER
  Estimated, based on an assumed 10000000 kg scrap aluminium output per year, over a lifetime of 50 years.
  Uncertainty: rough guess
- scrap copper: 0 kg; name nonFerrousMetalScrapAmount; pedigree (1,1,1,1,1)
  Reported as Byproduct of (Non-Ferrous) Metals. Copper used as a weak proxy. While no specific data found on composition, scrap Zinc would probably constitute a better proxy, but zinc scrap processing not modelled in database yet. Copper considered on recommendation of sector editor.
  production volume 0 kg; = nonFerrousMetalScrapAmount/abs(scrapInputAmount)*scrapInputVolume
    Calculated from production volume of reference product using the relative outputs.
  property price 0 EUR2005; name nonFerrousMetalScrapAmount_price_EUR2005
  properties: wet mass 1 kg, dry mass 1 kg
- scrap preparation facility: 0 unit; source Hans-Jörg Althaus  2009; uniform min 0, max 0, pedigree (1,1,5,1,1)
  Estimated, based on an assumed 10000000 kg scrap aluminium output per year, over a lifetime of 50 years.
  EcoSpold01Location=RER
  Uncertainty: rough guess
- heat, district or industrial, other than natural gas: 0 MJ; = Net_Heat_Value_HFO * kgFuel_Input_HFO / fuel_use_HFO; source European Aluminium Association 2008
  Reported as kg input of fuel oil (for combustion). Assumed heavy fuel oil. Conversion to heat supplied by the combustion of fuel oil based on lower heating value of heavy fuel oil and boiler efficiency (expressed as 1/fuel_use), both taken from ecoinvent reports on energy production.
  property heating value, net 40 MJ; name Net_Heat_Value_HFO
  property fuel input in physical units, kg 0.00168 kg; name kgFuel_Input_HFO
  property Corresponding fuel use 1.053 MJ; name fuel_use_HFO
  note on Corresponding fuel use: Lower heating value of the fuel input related to the heat/electricity output
- waste rubber, unspecified: 0 kg; name wasteRubberAmount; source European Aluminium Association 2008; pedigree (1,1,1,1,1)
  EcoSpold01Location=CH
  production volume 0 kg; = wasteRubberAmount/abs(scrapInputAmount)*scrapInputVolume
    (same comment as for iron scrap, unsorted)
  property price 0 EUR2005; name wasteRubberAmount_price_EUR2005
  properties: wet mass 1 kg, dry mass 1 kg, carbon content, fossil 0.853
- lubricating oil: 5.61903e-8 kg; source European Aluminium Association 2008; lognormal variance with pedigree 0.0546, pedigree (2,5,5,1,1)
  Proxy for hydraulic oil.
  EcoSpold01Location=RER
  properties: wet mass 1 kg, dry mass 1 kg, carbon content, fossil 0.75
  note on carbon content, fossil: Lubricating oil is produced from diesel. C-content/dry mass of fats and oils considered 75%, from: ecoinvent v2.2 report, n 15a, pg 40
- alkylbenzene sulfonate, linear, petrochemical: 0 kg; source European Aluminium Association 2008; pedigree (1,1,1,1,1)
  Reported as detergent. Modelled as "chemical, organic" in Althaus (2009).
  properties: wet mass 1 kg, dry mass 1 kg, carbon content, fossil 0.407018
- municipal solid waste: -8.85028e-11 kg; name solidWasteAmount; source European Aluminium Association 2008; lognormal variance with pedigree 0.0492, pedigree (2,5,5,1,1)
  EcoSpold01Location=CH
  Reported as solid waste - unspecified. Approximated sa municipal solid waste in Althaus (2009)
  production volume 0 kg; = solidWasteAmount/abs(scrapInputAmount)*scrapInputVolume
    (same comment as for iron scrap, unsorted)
  property price 0 EUR2005; name solidWasteAmount_price_EUR2005
  properties: carbon content, non-fossil 0.261655, wet mass 1 kg, water content 0.297017, dry mass 0.771 kg, carbon content, fossil 0.171549
  note on carbon content, non-fossil: MSW composition in tab 4.1, ecoinvent v2.2 report 13_I. C content referred to 1 kg DM
- filter dust from Al electrolysis: 0 kg; name filterDustAmount; source European Aluminium Association 2008; pedigree (1,1,1,1,1)
  Reported as Filter dust, assumption that this can be approximated by filter dust from Al electrolysis made in Althaus 2009.
  EcoSpold01Location=CH
  production volume 0 kg; = filterDustAmount/abs(scrapInputAmount)*scrapInputVolume
    (same comment as for iron scrap, unsorted)
  property price 0 EUR2005; name filterDustAmount_price_EUR2005
  properties: wet mass 1 kg, dry mass 1 kg, carbon content, fossil 0.11586
- lime, hydrated, packed: 2.17415e-11 kg; source European Aluminium Association 2008; lognormal variance with pedigree 0.0492, pedigree (2,5,5,1,1)
  EcoSpold01Location=CH
  Reported as Lime.
  properties: dry mass 0.997 kg, water content 0.00300903, wet mass 1 kg
- silicon, metallurgical grade: 0 kg; source European Aluminium Association 2008; pedigree (1,1,1,1,1)
  EcoSpold01Location=NO
  Reported as Ferro-silicon.
  properties: dry mass 1 kg, wet mass 1 kg
- waste mineral oil: 0 kg; name OilForIncinerationAmount; source European Aluminium Association 2008; pedigree (1,1,1,1,1)
  Reported as byproduct of oil for combustion.
  production volume 0 kg; = oilForIncinerationAmount/abs(scrapInputAmount)*scrapInputVolume
    Calculated from production volume of reference product using the relative outputs.
  property price 0 EUR2005; name OilForIncinerationAmount_price_EUR2005
  properties: water content 0.111111, wet mass 1 kg, dry mass 0.9 kg, carbon content, fossil 0.864444
  note on carbon content, fossil: Tab A.6, ecoinvent v2.2 report 13_I. C content has been calculated after data in the tables, and then referred to 1 kg DM
- inert waste, for final disposal: 0 kg; name totalIntertWasteAmount; = 0.0064+3.2e-5+0.0064; source European Aluminium Association 2008; pedigree (1,1,1,1,1)
  Sum of dirt (6.4e-3 kg/kg scrap aluminium input), refractory waste (3.2e-5 kg/kg scrap aluminium input) and stones (6.4e-3 kg/kg scrap aluminium input). All approximated as "inert waste" in Althaus (2009).
  EcoSpold01Location=CH
  production volume 0 kg; = totalIntertWasteAmount/abs(scrapInputAmount)*scrapInputVolume
    (same comment as for iron scrap, unsorted)
  property price 0 EUR2005; name totalIntertWasteAmount_price_EUR2005
  properties: dry mass 0.995 kg, water content 0.00502513, wet mass 1 kg
- copper: 0.000997609 kg; source European Aluminium Association 2008; lognormal variance with pedigree 0.0546, pedigree (2,5,5,1,1)
  Reported as "additives". Assumed to be copper in Althaus (2009).
  EcoSpold01Location=RER
  properties: wet mass 1 kg, dry mass 1 kg
- light fuel oil: 8.7215e-11 kg; source European Aluminium Association 2008; lognormal variance with pedigree 0.0492, pedigree (2,5,5,1,1)
  EcoSpold01Location=RER
  Reported as light oil
  properties: carbon content, fossil 0.862, wet mass 1 kg, dry mass 1 kg
- electricity, medium voltage: 0.000249937 kWh; source European Aluminium Association 2008; lognormal variance with pedigree 0.0492, pedigree (2,5,5,1,1)
  EcoSpold01Location=UCTE
- heat, district or industrial, natural gas: 1.10368e-6 MJ; = fuel_input_in_kg_ng*Net_Heat_Value_NG_per_kg /fuel_use_ng; source European Aluminium Association 2008
  Reported as kg natural gas. Conversion to heat supplied by the combustion of natural gas based on lower heating value of natural gas and boiler efficiency (expressed as 1/fuel_use), both taken from ecoinvent reports on energy production.
  property kgFuel_Input 0.0108 kg; name fuel_input_in_kg_ng
  property heating value, net 45.4 MJ; name Net_Heat_Value_NG_per_kg
  property Corresponding fuel use 1.04 MJ; name fuel_use_ng
  note on Corresponding fuel use: Lower heating value of the fuel input related to the heat/electricity output, based on an efficiency of 96%
- scrap copper: -0.000197519, -9.26714e-6 kg (2 entries); lognormal variance with pedigree 0.0492, pedigree (2,5,5,1,1)
  (same comment as for scrap copper)
- waste rubber, unspecified: -2.82486e-5, -2.53428e-6 kg (2 entries); source European Aluminium Association 2008; lognormal variance with pedigree 0.0492, pedigree (2,5,5,1,1)
  EcoSpold01Location=CH
- waste mineral oil: -8.60019e-10, -1.99e-11 kg (2 entries); source European Aluminium Association 2008; lognormal variance with pedigree 0.0492, pedigree (2,5,5,1,1)
  Reported as byproduct of oil for combustion.
- copper scrap, sorted, pressed: -0.0005874 kg; source Pierre Fréon 2014
  Waste copper wire
  production volume 0.305 kg
- extrusion, plastic pipes: 5.45998e-5 kg; source Pierre Fréon 2014
  Proxy for manufacture of plastic parts
- aluminium scrap, post-consumer: -0.00375911 kg; source Pierre Fréon 2014
  Weste aluminium
  production volume 0.245 kg
- aluminium alloy, metal matrix composite: 0.000249464 kg; source Pierre Fréon 2014; triangular min 0.000249464, mostLikely 0.000249464, max 0.000249464, pedigree (4,2,1,1,1)
  Al alloy for marine electric motor construction
  Uncertainty: Data from 24 motors
- metal working, average for steel product manufacturing: 0.000658734 kg; source Pierre Fréon 2014
  Marine electric motor construction
- steel, chromium steel 18/8: 0.00155492 kg; source Pierre Fréon 2014; triangular min 0.00155492, mostLikely 0.00155492, max 0.00155492, pedigree (4,2,1,1,1)
  Chromium steel for marine electric motor construction
  Uncertainty: Data from 24 motors
- polyethylene, high density, granulate: 0.0014089 kg; source Pierre Fréon 2014; triangular min 0.0014089, mostLikely 0.0014089, max 0.0014089, pedigree (4,2,1,1,1)
  Plastic for marine electric motor construction
  Uncertainty: Data from 24 motors
- wire drawing, copper: 0.000723805 kg; source Pierre Fréon 2014; triangular min 0.000723805, mostLikely 0.000723805, max 0.000723805, pedigree (4,2,1,1,1)
  Manufacture of copper wire
  Uncertainty: Data from 24 motors
- waste plastic, mixture: -4.72688e-5, -3.34245e-5, -1.38055e-5, -1.31096e-5, -0.000500246, -5.57727e-6, -2.52784e-6, -0.00298507 kg (8 entries); source Pierre Fréon 2014
  Waste plastic
  production volume 0.05 kg
- scrap steel: -0.00507326, -0.00245603, -0.00756162 kg (3 entries); source Pierre Fréon 2014
  Representing waste chromium steel
  production volume 0.4 kg
- cast iron: 7.12886e-6 kg; source Pierre Fréon 2014; triangular min 7.12886e-6, mostLikely 7.12886e-6, max 7.12886e-6, pedigree (3,4,3,5,2)
  Cast iron for marine diesel engine construction
  Uncertainty: Materials data from Reenaas, M. (2005). SOLIDE OXIDE FUEL CELL COMBINED WITH GAS TURBINE VERSUS DIESEL ENGINE AS AUXILIARY POWER PRODUCING UNIT. Masters Dissertation. Industrial Ecology, NTNU. No uncertainty data was available, so a 10% error was assumed.
- chemical factory, organics: 0 unit; source Althaus H.-J. 2004; pedigree (1,1,1,1,1)
  Proxy: "chemical factory, organics" is used as a proxy for leaching infrastructure.
  Estimation from dataset author.
- chemical, inorganic: 1.93416e-10 kg; lognormal variance with pedigree 0.0521, pedigree (1,4,5,3,1)
  EcoSpold01Location=GLO
  Data of 1 European plant - reported in Fisher (2006)
  Uncertainty: data of 1 European plant - reported in Fisher (2006)
- lime, hydrated, packed: 2.56134e-9 kg; lognormal variance with pedigree 0.0521, pedigree (1,4,5,3,1)
  EcoSpold01Location=CH
  Data of 1 European plant - reported in Fisher (2006)
  Uncertainty: data of 1 European plant - reported in Fisher (2006)
- sulfuric acid: 1.54855e-8, 6.43807e-8 kg (2 entries); lognormal variance with pedigree 0.0521, pedigree (1,4,5,3,1)
  Data of 1 European plant - reported in Fisher (2006)
  EcoSpold01Location=RER
  Uncertainty: data of 1 European plant - reported in Fisher (2006)
- light fuel oil: 9.38461e-10 kg; lognormal variance with pedigree 0.0032, pedigree (1,3,3,1,1)
  Amount and activity link based on primary data collected from participating companies. Emissions from fuel combustion included in dataset.
- blasting: 6.6209e-11 kg; lognormal variance with pedigree 0.0032, pedigree (1,3,3,1,1)
  Amount and activity link based on primary data collected from participating companies.
- mine infrastructure, underground, non-ferrous metal: 0 unit; pedigree (1,1,1,1,1)
  Estimation from author of 'zinc mine operation, GLO, 1994-2003' dataset. No primary data on infrastructure included.
- heat, district or industrial, other than natural gas: 2.48578e-10, 5.83854e-9, 1.73351e-9 MJ (3 entries); lognormal variance with pedigree 0.0032, pedigree (1,3,3,1,1)
  Amount and activity link based on primary data collected from participating companies.
- conveyor belt: 0 m; pedigree (1,1,1,1,1)
  Estimation from author of 'zinc mine operation, GLO, 1994-2003' dataset: 2000 m conveyor belts are assumed to have a capacity of 2000 t/h which yields 2*10-5 m conveyor belt required per tonne mined raw ore. No primary data on infrastructure included.
- maize starch: 3.12856e-12 kg; lognormal variance with pedigree 0.0032, pedigree (1,3,3,1,1)
  Amount and activity link based on primary data collected from participating companies.
- electricity, medium voltage: 0.0144446, 2.80041e-7, 0.000428238, 9.21728e-8, 8.32135e-5, 7.33683e-10, 0.000706098, 1.3301e-8, 3.15837e-7, 5.87906e-7 kWh (10 entries); lognormal variance with pedigree 0.0032, pedigree (1,3,3,1,1)
  Amount and activity link based on primary data collected from participating companies.
- zinc slag: -1.67725e-7 kg; lognormal variance with pedigree 0.0032, pedigree (1,3,3,1,1)
  Amount and activity link based on primary data collected from participating companies.
  production volume 2.1567e6 kg
- copper sulfate: 5.29153e-10 kg; lognormal variance with pedigree 0.0032, pedigree (1,3,3,1,1)
  Amount and activity link based on primary data collected from participating companies.
- heavy fuel oil: 2.3288e-11 kg; lognormal variance with pedigree 0.0032, pedigree (1,3,3,1,1)
  (same comment as for light fuel oil)
- electricity, high voltage: 3.56489e-9 kWh; lognormal variance with pedigree 0.0032, pedigree (1,3,3,1,1)
  Amount and activity link based on primary data collected from participating companies.
- diesel: 1.89675e-9, 9.55526e-10, 3.40633e-10 kg (3 entries); lognormal variance with pedigree 0.0032, pedigree (1,3,3,1,1)
  Amount and activity link based on primary data collected from participating companies. Emissions from diesel combustion included in dataset.
- tap water: 0.00401178 kg; lognormal variance with pedigree 0.0032, pedigree (1,3,3,1,1)
  Amount and activity link based on primary data collected from participating companies.
- aluminium chloride: 0 kg; pedigree (1,1,1,1,1)
  Amount and activity link based on primary data collected from participating companies.
- steel, low-alloyed: 0.00385824 kg; lognormal variance with pedigree 0.0032, pedigree (1,3,3,1,1)
  Amount and activity link based on primary data collected from participating companies.
- chemical, organic: 2.33692e-5 kg; lognormal variance with pedigree 0.0032, pedigree (1,3,3,1,1)
  Amount and activity link based on primary data collected from participating companies.
- concrete, normal: 2.26937e-9 m3; lognormal variance with pedigree 0.0032, pedigree (1,3,3,1,1)
  Amount and activity link based on primary data collected from participating companies.
- waste wood, post-consumer: -1.02937e-12 kg; lognormal variance with pedigree 0.0032, pedigree (1,3,3,1,1)
  Amount and activity link based on primary data collected from participating companies.
  production volume 527319 kg
- acetic acid, without water, in 98% solution state: 5.00251e-11 kg; lognormal variance with pedigree 0.0032, pedigree (1,3,3,1,1)
  Amount and activity link based on primary data collected from participating companies.
- transport, freight, sea, bulk carrier for dry goods: 9.18471e-12 metric ton*km; lognormal variance with pedigree 0.1226, pedigree (1,3,3,1,1)
  Inbound transport of materials to sites. Amount and activity link based on primary data collected from participating companies.
- cement, unspecified: 8.87211e-12 kg; lognormal variance with pedigree 0.0032, pedigree (1,3,3,1,1)
  Amount and activity link based on primary data collected from participating companies.
- sodium dichromate: 8.62197e-12 kg; lognormal variance with pedigree 0.0032, pedigree (1,3,3,1,1)
  Amount and activity link based on primary data collected from participating companies.
- polyacrylamide: 6.6243e-10 kg; lognormal variance with pedigree 0.0032, pedigree (1,3,3,1,1)
  Amount and activity link based on primary data collected from participating companies.
- used Li-ion battery: -4.84052e-7 kg; lognormal variance with pedigree 0.0032, pedigree (1,3,3,1,1)
  Amount and activity link based on primary data collected from participating companies.
  production volume 30057 kg
- sodium sulfide: 2.85152e-11 kg; lognormal variance with pedigree 0.0032, pedigree (1,3,3,1,1)
  Amount and activity link based on primary data collected from participating companies.
- sodium hydrogen sulfite: 2.32326e-12 kg; lognormal variance with pedigree 0.0032, pedigree (1,3,3,1,1)
  Amount and activity link based on primary data collected from participating companies.
- soda ash, dense: 3.21102e-9 kg; lognormal variance with pedigree 0.0032, pedigree (1,3,3,1,1)
  Amount and activity link based on primary data collected from participating companies.
- non-sulfidic overburden, off-site: -6.51419e-7 kg; lognormal variance with pedigree 0.0032, pedigree (1,3,3,1,1)
  Amount and activity link based on primary data collected from participating companies.
  production volume 3.33704e11 kg
- propane: 6.66542e-10 kg; lognormal variance with pedigree 0.0032, pedigree (1,3,3,1,1)
  Amount and activity link based on primary data collected from participating companies.
- pig iron: 7.22437e-10 kg; lognormal variance with pedigree 0.0032, pedigree (1,3,3,1,1)
  Amount and activity link based on primary data collected from participating companies.
- natural gas, high pressure: 4.11936e-10, 3.62656e-10, 8.83612e-10, 2.49522e-8 m3 (4 entries); lognormal variance with pedigree 0.0032, pedigree (1,3,3,1,1)
  (same comment as for light fuel oil)
- petrol, unleaded: 1.93979e-11, 4.52407e-13, 1.8697e-12, 4.50937e-13, 1.68695e-12, 9.28894e-14, 5.19234e-11 kg (7 entries); lognormal variance with pedigree 0.0032, pedigree (1,3,3,1,1)
  Amount and activity link based on primary data collected from participating companies.
- inert waste: -3.96553e-10, -3.41539e-12, -0.00190201 kg (3 entries); lognormal variance with pedigree 0.0032, pedigree (1,3,3,1,1)
  Amount and activity link based on primary data collected from participating companies.
  production volume 9.14737e6 kg
- lubricating oil: 2.66553e-7 kg; lognormal variance with pedigree 0.0032, pedigree (1,3,3,1,1)
  Amount and activity link based on primary data collected from participating companies.
- limestone, crushed, washed: 0 kg; pedigree (1,1,1,1,1)
  Amount and activity link based on primary data collected from participating companies.
- limestone, crushed, washed: 4.30299e-14 kg; lognormal variance with pedigree 0.0032, pedigree (1,3,3,1,1)
  Amount and activity link based on primary data collected from participating companies.
- bilge oil: -4.46043e-14, -9.27524e-14 kg (2 entries); lognormal variance with pedigree 0.0032, pedigree (1,3,3,1,1)
  Amount and activity link based on primary data collected from participating companies.
  production volume 70961.3 kg
- bilge oil: 0 kg; pedigree (1,1,1,1,1)
  Amount and activity link based on primary data collected from participating companies.
- lime: 9.47405e-13, 1.09693e-11 kg (2 entries); lognormal variance with pedigree 0.0032, pedigree (1,3,3,1,1)
  Amount and activity link based on primary data collected from participating companies.
- hazardous waste, for incineration: -9.38908e-10, -2.45425e-11, -1.95241e-9 kg (3 entries); lognormal variance with pedigree 0.0032, pedigree (1,3,3,1,1)
  Amount and activity link based on primary data collected from participating companies.
  production volume 6.58402e7 kg
- limestone, unprocessed: 8.07904e-10, 8.36383e-12, 2.04545e-8 kg (3 entries); lognormal variance with pedigree 0.0032, pedigree (1,3,3,1,1)
  Amount and activity link based on primary data collected from participating companies.
- hydrogen cyanide: 5.88374e-13, 1.29442e-12 kg (2 entries); lognormal variance with pedigree 0.0032, pedigree (1,3,3,1,1)
  Amount and activity link based on primary data collected from participating companies.
- sulfidic tailings, from zinc-lead mine operation: -8.31075e-8, -1.16996e-8, -1.02472e-8, -2.17048e-8, -4.24413e-9, -2.81597e-8, -1.49271e-8, -4.77989e-8 kg (8 entries); lognormal variance with pedigree 0.0032, pedigree (1,3,3,1,1)
  Amount and activity link based on primary data collected from participating companies.
  production volume 1.13556e11 kg
- iron sulfate: 1.15676e-10, 2.34229e-10 kg (2 entries); lognormal variance with pedigree 0.0032, pedigree (1,3,3,1,1)
  Amount and activity link based on primary data collected from participating companies.
- nylon 6: 9.04602e-8, 1.8075e-7 kg (2 entries); lognormal variance with pedigree 0.0032, pedigree (1,3,3,1,1)
  Amount and activity link based on primary data collected from participating companies.
- zinc monosulfate: 1.66894e-11, 8.81648e-11 kg (2 entries); lognormal variance with pedigree 0.0032, pedigree (1,3,3,1,1)
  Amount and activity link based on primary data collected from participating companies.
- concrete, 35MPa: 0, 0, 0 m3 (3 entries); pedigree (1,1,1,1,1)
  Amount and activity link based on primary data collected from participating companies.
- concrete, 35MPa: 2.74504e-14 m3; lognormal variance with pedigree 0.0032, pedigree (1,3,3,1,1)
  Amount and activity link based on primary data collected from participating companies.
- transport, freight, lorry 16-32 metric ton, EURO3: 2.50135e-8, 3.25975e-8 metric ton*km (2 entries); lognormal variance with pedigree 0.1226, pedigree (1,3,3,1,1)
  (same comment as for transport, freight, sea, bulk carrier for dry goods)
- acrylic acid: 1.36358e-13, 6.47308e-13 kg (2 entries); lognormal variance with pedigree 0.0032, pedigree (1,3,3,1,1)
  Amount and activity link based on primary data collected from participating companies.
- sulfur dioxide, liquid: 6.60435e-12, 1.64394e-11 kg (2 entries); lognormal variance with pedigree 0.0032, pedigree (1,3,3,1,1)
  Amount and activity link based on primary data collected from participating companies.
- waste paper, unsorted: -5.60501e-12, -1.70834e-13 kg (2 entries); lognormal variance with pedigree 0.0032, pedigree (1,3,3,1,1)
  Amount and activity link based on primary data collected from participating companies.
  production volume 4446.2 kg
- waste paper, unsorted: 0 kg; pedigree (1,1,1,1,1)
  Amount and activity link based on primary data collected from participating companies.
- sodium cyanide: 1.51805e-12, 3.07386e-12 kg (2 entries); lognormal variance with pedigree 0.0032, pedigree (1,3,3,1,1)
  Amount and activity link based on primary data collected from participating companies.
- waste mineral oil: -2.55878e-9 kg; lognormal variance with pedigree 0.0032, pedigree (1,3,3,1,1)
  Amount and activity link based on primary data collected from participating companies.
  production volume 1.91672e6 kg
- calcium chloride: 7.2172e-11, 2.49923e-10 kg (2 entries); lognormal variance with pedigree 0.0032, pedigree (1,3,3,1,1)
  Amount and activity link based on primary data collected from participating companies.
- municipal solid waste: -4.76009e-7, -3.33092e-7, -0.000936, -0.000934919 kg (4 entries); lognormal variance with pedigree 0.0032, pedigree (1,3,3,1,1)
  Amount and activity link based on primary data collected from participating companies.
  production volume 2.68043e7 kg
- quicklime, milled, loose: 4.07312e-9, 5.03535e-12 kg (2 entries); lognormal variance with pedigree 0.0032, pedigree (1,3,3,1,1)
  Amount and activity link based on primary data collected from participating companies.
- waste rubber, unspecified: -2.82479e-5 kg; lognormal variance with pedigree 0.0032, pedigree (1,3,3,1,1)
  Amount and activity link based on primary data collected from participating companies.
  production volume 7904.23 kg
- polyol: 1.00948e-12, 2.04407e-12 kg (2 entries); lognormal variance with pedigree 0.0032, pedigree (1,3,3,1,1)
  Amount and activity link based on primary data collected from participating companies.
- scrap copper: -0.000206472 kg; lognormal variance with pedigree 0.0032, pedigree (1,3,3,1,1)
  Amount and activity link based on primary data collected from participating companies.
  production volume 1.09065e6 kg
- quicklime, in pieces, loose: 9.12202e-14, 5.51212e-9 kg (2 entries); lognormal variance with pedigree 0.0032, pedigree (1,3,3,1,1)
  Amount and activity link based on primary data collected from participating companies.
- oxygen, liquid: 1.16656e-7, 2.49949e-14 kg (2 entries); lognormal variance with pedigree 0.0032, pedigree (1,3,3,1,1)
  Amount and activity link based on primary data collected from participating companies.
- nitrogen, liquid: 4.97348e-9 kg; lognormal variance with pedigree 0.0381, pedigree (4,4,4,3,1)
  EcoSpold01Location=RER
- battery separator: 5.33704e-8 kg; lognormal variance with pedigree 0.0207, pedigree (2,4,4,3,1)
  EcoSpold01Location=CN
- aluminium, wrought alloy: 0.000322888 kg; lognormal variance with pedigree 0.0207, pedigree (2,4,4,3,1)
  EcoSpold01Location=RER
- ethylene carbonate: 1.58724e-7 kg; lognormal variance with pedigree 0.0207, pedigree (2,4,4,3,1)
  EcoSpold01Location=CN
- lithium hexafluorophosphate: 1.8936e-8 kg; lognormal variance with pedigree 0.0207, pedigree (2,4,4,3,1)
  EcoSpold01Location=CN
- extrusion, plastic film: 2.82797e-5 kg; lognormal variance with pedigree 0.0207, pedigree (2,4,4,3,1)
  EcoSpold01Location=RER
- anode, graphite, for lithium-ion battery: 3.98973e-7 kg; lognormal variance with pedigree 0.0207, pedigree (2,4,4,3,1)
  EcoSpold01Location=CN
- polyethylene, low density, granulate: 7.39876e-8 kg; lognormal variance with pedigree 0.0207, pedigree (2,4,4,3,1)
  EcoSpold01Location=RER
- sheet rolling, aluminium: 0.000128279 kg; lognormal variance with pedigree 0.3207, pedigree (2,4,4,3,1)
  EcoSpold01Location=RER
- heat, district or industrial, natural gas: 1.0864e-6 MJ; lognormal variance with pedigree 0.0381, pedigree (4,4,4,3,1)
  EcoSpold01Location=RER
- electricity, medium voltage: 9.04953e-8 kWh; lognormal variance with pedigree 0.048, pedigree (1,1,4,1,1)
  composite
  EcoSpold01Location=CN
- cathode, LiMn2O4, for lithium-ion battery: 3.25126e-7 kg; lognormal variance with pedigree 0.0207, pedigree (2,4,4,3,1)
  EcoSpold01Location=CN
- printed wiring board, surface mounted, unspecified, Pb free: 3.35118e-7 kg; lognormal variance with pedigree 0.0101, pedigree (1,4,4,3,1)
  This original value from production mix has been replaced by 2 flows. Pb-containing has a share of 0.3, Pb-free has a share of 0.7.
- printed wiring board, surface mounted, unspecified, Pb containing: 1.43622e-7 kg; lognormal variance with pedigree 0.0101, pedigree (1,4,4,3,1)
  (same comment as for printed wiring board, surface mounted, unspecified, Pb free)
- metal working factory: 0 unit; pedigree (1,1,1,1,1)
  EcoSpold01Location=RER
- cable, data cable in infrastructure: 4.52175e-8 m; lognormal variance with pedigree 0.0221, pedigree (3,4,4,3,1)
  EcoSpold01Location=GLO
- battery cell, Li-ion: 9.69308e-8 kg; lognormal variance with pedigree 0.0101, pedigree (1,4,4,3,1)
  EcoSpold01Location=CN
- reinforcing steel: 0.0236509 kg; lognormal variance with pedigree 0.0287, pedigree (2,4,4,3,3)
  EcoSpold01Location=RER
- sheet rolling, steel: 0.00381639 kg; lognormal variance with pedigree 0.0287, pedigree (2,4,4,3,3)
  EcoSpold01Location=RER
- electricity, low voltage: 1.30414e-8 kWh; lognormal variance with pedigree 0.096, pedigree (4,5,5,5,3)
  EcoSpold01Location=UCTE
- cable, three-conductor cable: 2.2398e-8 m; lognormal variance with pedigree 0.0221, pedigree (3,4,4,3,1)
  EcoSpold01Location=GLO
- battery, Li-ion, rechargeable, prismatic: 9.12357e-7 kg; source Carrier 2014; lognormal variance with pedigree 0.0186, pedigree (4,5,3,1,1)
  Literature value (Carrier, 2014, Operation and service for 69RG15 generator set units, http://dms.hvacpartners.com//docs/2000/Public/04/T-361.pdf, accessed 20141218).
- zinc coat, pieces: 5.18668e-5 m2; lognormal variance with pedigree 0.0186, pedigree (4,5,3,1,1)
  Calculated value based on estimates.
  The dimentions of the genset are approximatelly 2.4*1*0.7m.
- steel, low-alloyed, hot rolled: 0.00972749 kg; lognormal variance with pedigree 0.0186, pedigree (4,5,3,1,1)
  Calculated value.
- used diesel-electric generating set, 18.5kW: -4.91288e-10 unit
  production volume 50000 unit
- metal working, average for aluminium product manufacturing: 6.95018e-5 kg; lognormal variance with pedigree 0.0186, pedigree (4,5,3,1,1)
  Calculated.
- welding, arc, steel: 1.12133e-5 m; lognormal variance with pedigree 0.0186, pedigree (4,5,3,1,1)
  Estimated.
- electronics, for control units: 2.6282e-5 kg; source Carrier 2014; lognormal variance with pedigree 0.0186, pedigree (4,5,3,1,1)
  Estimated based on literature.
- aluminium alloy, AlMg3: 2.5876e-5 kg; lognormal variance with pedigree 0.0267, pedigree (2,2,4,1,3)
  EcoSpold01Location=RER
  Estimation:5% of aluminium parts replaced
  Uncertainty: Estimation:5% of aluminium parts replaced
- waste plastic, mixture: -5.23548e-5 kg; lognormal variance with pedigree 0.0341, pedigree (4,2,4,1,3)
  Plastics to municipal incineration
  EcoSpold01Location=CH
  Uncertainty: plastics to municipal incineration
  production volume 1.0088 kg
- section bar extrusion, aluminium: 1.20586e-5 kg; lognormal variance with pedigree 0.0961, pedigree (4,2,4,1,4)
  EcoSpold01Location=RER
  Assumption for pipe drawing
  Uncertainty: Assumption for pipe drawing
- tap water: 5.26914e-6 kg; lognormal variance with pedigree 0.0092, pedigree (2,3,4,1,1)
  Assumption based on: Cherry, C.R. 2007, 1488 liters waste water for all production phases (incl. Battery manufacturing --> 50%)
  EcoSpold01Location=RER
  Uncertainty: Assumption based on: Cherry, C.R. 2007, 1488 liters waste water for all production phases (incl. Battery manufacturing --> 50%)
- chromium steel removed by turning, average, conventional: 6.50221e-8 kg; lognormal variance with pedigree 0.0961, pedigree (4,2,4,1,4)
  Assumption
  EcoSpold01Location=RER
  Uncertainty: Assumption
- polyurethane, flexible foam: 8.55273e-10 kg; lognormal variance with pedigree 0.0267, pedigree (2,2,4,1,3)
  Estimation: saddle once replaced, Scooter: no replacement
  EcoSpold01Location=RER
  Uncertainty: Estimation: saddle once replaced, Scooter: no replacement
- synthetic rubber: 6.21621e-5 kg; lognormal variance with pedigree 0.0267, pedigree (2,2,4,1,3)
  EcoSpold01Location=RER
  Estimation: 3.75 (bike)/3 (scooter) tyre-sets use in life-time
  Uncertainty: Estimation: 3.75 (bike)/3 (scooter) tyre-sets use in life-time
- injection moulding: 5.21914e-7 kg; lognormal variance with pedigree 0.0961, pedigree (4,2,4,1,4)
  EcoSpold01Location=RER
  Assumption
  Uncertainty: Assumption
- lead: 8.67761e-7 kg; lognormal variance with pedigree 0.0341, pedigree (4,2,4,1,3)
  Estimation: 2 batteries per 50000km
  EcoSpold01Location=RER
  Uncertainty: Estimation: 2 batteries per 50000km
- used Ni-metal hydride battery: -8.79077e-8 kg; lognormal variance with pedigree 0.0267, pedigree (2,2,4,1,3)
  EcoSpold01Location=GLO
  Amount of S-Pb batteries replaced
  Uncertainty: Amount of S-Pb batteries replaced
  production volume 0.341561 kg
- alkyd paint, white, without solvent, in 60% solution state: 7.88605e-9 kg; lognormal variance with pedigree 0.1287, pedigree (4,3,5,3,4)
  EcoSpold01Location=RER
  Uncertainty: weight ratio scooter:passenger car
- palladium: 1.65395e-11 kg; lognormal variance with pedigree 0.1287, pedigree (4,3,5,3,4)
  EcoSpold01Location=RER
  Uncertainty: weight ratio scooter:passenger car
- aluminium, cast alloy: 0.000244806 kg; lognormal variance with pedigree 0.1287, pedigree (4,3,5,3,4)
  15 kg aluminium, production mix.
  0.32: part of aluminium cast alloy in aluminium, production mix. Based on the aluminium, production mix in ecoinvent v2.2.
  Uncertainty: 15 kg
- chromium: 1.12484e-8 kg; lognormal variance with pedigree 0.1287, pedigree (4,3,5,3,4)
  EcoSpold01Location=RER
  Uncertainty: weight ratio scooter:passenger car
- polyvinylchloride, suspension polymerised: 7.51322e-8 kg; lognormal variance with pedigree 0.0446, pedigree (4,3,4,1,3)
  EcoSpold01Location=RER
  Uncertainty: 15% of passenger car
- tap water: 2.26588e-6 kg; lognormal variance with pedigree 0.1287, pedigree (4,3,5,3,4)
  EcoSpold01Location=RER
  Uncertainty: weight ratio scooter:passenger car
- platinum: 8.82106e-11 kg; lognormal variance with pedigree 0.1287, pedigree (4,3,5,3,4)
  EcoSpold01Location=RER
  Uncertainty: weight ratio scooter:passenger car
- road vehicle factory: 0 unit; pedigree (1,1,1,1,1)
  activityLink introduced to establish a direct link to the corresponding regional supply of this product
  Uncertainty: weight ratio scooter:passenger car
- used motor scooter: -2.07641e-8 unit; lognormal variance with pedigree 0.3086, pedigree (2,1,4,1,1)
  Uncertainty: Estimation: Scooter 50'000km
  production volume 1.32237 unit
- wire drawing, copper: 3.1246e-8 kg; lognormal variance with pedigree 0.1287, pedigree (4,3,5,3,4)
  (same comment as for road vehicle factory)
- section bar rolling, steel: 1.06828e-5 kg; lognormal variance with pedigree 0.1287, pedigree (4,3,5,3,4)
  (same comment as for road vehicle factory)
- polyvinylchloride, emulsion polymerised: 8.96152e-9 kg; lognormal variance with pedigree 0.0446, pedigree (4,3,4,1,3)
  EcoSpold01Location=RER
  Uncertainty: 15% of passenger car
- nickel, 99.5%: 6.56177e-9 kg; lognormal variance with pedigree 0.1287, pedigree (4,3,5,3,4)
  EcoSpold01Location=GLO
  Uncertainty: weight ratio scooter:passenger car
- zinc: 1.20046e-5 kg; lognormal variance with pedigree 0.1287, pedigree (4,3,5,3,4)
  EcoSpold01Location=RER
  Uncertainty: weight ratio scooter:passenger car
- polypropylene, granulate: 4.94122e-5 kg; lognormal variance with pedigree 0.0446, pedigree (4,3,4,1,3)
  EcoSpold01Location=RER
  Uncertainty: 15% of passenger car
- heat, district or industrial, other than natural gas: 3.96491e-8 MJ; lognormal variance with pedigree 0.0346, pedigree (4,3,4,1,3)
  EcoSpold01Location=RER
  Uncertainty: 50% of Environmental report Honda, 2008
- ethylene, average: 3.37535e-8 kg; lognormal variance with pedigree 0.1287, pedigree (4,3,5,3,4)
  EcoSpold01Location=RER
  Uncertainty: weight ratio scooter:passenger car
- sheet rolling, steel: 2.32863e-6 kg; lognormal variance with pedigree 0.0446, pedigree (4,3,4,1,3)
  activityLink introduced to establish a direct link to the corresponding regional supply of this product
  Uncertainty: 5% of passenger car
- section bar rolling, steel: 1.14089e-5 kg; lognormal variance with pedigree 0.1306, pedigree (4,3,5,5,4)
  EcoSpold01Location=RER
  Uncertainty: weight ratio scooter:passenger car
- injection moulding: 4.22051e-6 kg; lognormal variance with pedigree 0.1306, pedigree (4,3,5,5,4)
  EcoSpold01Location=RER
  Uncertainty: All HDPE
- alkyd paint, white, without solvent, in 60% solution state: 2.12525e-8 kg; lognormal variance with pedigree 0.1306, pedigree (4,3,5,5,4)
  EcoSpold01Location=RER
  Uncertainty: weight ratio scooter:passenger car
- road vehicle factory: 0 unit; pedigree (1,1,1,1,1)
  EcoSpold01Location=RER
  Uncertainty: weight ratio scooter:passenger car
- heat, district or industrial, natural gas: 2.00055e-8 MJ; lognormal variance with pedigree 0.0366, pedigree (4,3,4,5,3)
  EcoSpold01Location=RER
  Uncertainty: 50% of Environmental report Honda, 2008
- heat, district or industrial, other than natural gas: 1.77669e-11, 3.96313e-8 MJ (2 entries); lognormal variance with pedigree 0.0366, pedigree (4,3,4,5,3)
  EcoSpold01Location=RER
  Uncertainty: 50% of Environmental report Honda, 2008
- tap water: 4.41566e-6, 0.0905429, 7.29773e-6, 0.00018402, 0.00577383, 1.36172e-5, 0.00210583 kg (7 entries); lognormal variance with pedigree 0.1306, pedigree (4,3,5,5,4)
  EcoSpold01Location=RER
  Uncertainty: weight ratio scooter:passenger car
- electricity, medium voltage: 0.00012841, 0.00217763, 0.0315733, 0.00451875 kWh (4 entries); lognormal variance with pedigree 0.0366, pedigree (4,3,4,5,3)
  EcoSpold01Location=JP
  Uncertainty: 50% of Environmental report Honda, 2008
- ethylene, average: 8.36226e-10, 5.21183e-8 kg (2 entries); lognormal variance with pedigree 0.1306, pedigree (4,3,5,5,4)
  EcoSpold01Location=RER
  Uncertainty: weight ratio scooter:passenger car
- decommissioned road: -6.69601e-9 m*year; lognormal variance with pedigree 0.428, pedigree (4,1,5,1,4)
  Allocation of road use according to gross ton kilometre performance
  EcoSpold01Location=RER
  Uncertainty: allocation of road use according to gross ton kilometre performance
  production volume 1.781e-6 m*year
- road: 3.348e-9 m*year; lognormal variance with pedigree 0.428, pedigree (4,1,5,1,4)
  Allocation of road use according to gross ton kilometre performance
  EcoSpold01Location=CH
  Uncertainty: allocation of road use according to gross ton kilometre performance
- used electric bicycle: -8.43877e-9 unit; lognormal variance with pedigree 0.3086, pedigree (2,1,4,1,1)
  Estimation: eBike 15'000km
  EcoSpold01Location=CH
  Uncertainty: Estimation: eBike 15'000km
  production volume 2.24454e-6 unit
- energy use and operation emissions, electric bicycle, label-certified electricity: 3.16833e-5 km; lognormal variance with pedigree 0.128, pedigree (1,1,4,1,1)
  EcoSpold01Location=CH
  Defined by laws and physics;activityLink introduced to establish a direct link to the corresponding regional supply of this product
  Uncertainty: defined by laws and physics
- maintenance, electric bicycle: 4.21939e-9 unit; lognormal variance with pedigree 0.3086, pedigree (2,1,4,1,1)
  Estimation: eBike 15'000km
  EcoSpold01Location=CH
  Uncertainty: Estimation: eBike 15'000km
- electric bicycle: 8.43877e-9 unit; lognormal variance with pedigree 0.3086, pedigree (2,1,4,1,1)
  Estimation: eBike 15'000km
  EcoSpold01Location=RER
  Uncertainty: Estimation: eBike 15'000km
- energy use and operation emissions, electric bicycle: 3.16072e-5 km; lognormal variance with pedigree 0.128, pedigree (1,1,4,1,1)
  Defined by laws and physics;activityLink introduced to establish a direct link to the corresponding regional supply of this product
  EcoSpold01Location=CH
  Uncertainty: defined by laws and physics
- energy use and operation emissions, electric bicycle, label-certified electricity: 3.16833e-5 km; lognormal variance with pedigree 0.13, pedigree (1,1,4,5,1)
  EcoSpold01Location=CH
  Defined by laws and physics
  Uncertainty: defined by laws and physics
- maintenance, electric bicycle: 4.21939e-9 unit; lognormal variance with pedigree 0.3106, pedigree (2,1,4,5,1)
  EcoSpold01Location=CH
  Estimation: eBike 15'000km
  Uncertainty: Estimation: eBike 15'000km
- road: 0.000472003 m*year; lognormal variance with pedigree 0.43, pedigree (4,1,5,5,4)
  EcoSpold01Location=CH
  Allocation of road use according to gross ton kilometre performance
  Uncertainty: allocation of road use according to gross ton kilometre performance
- energy use and operation emissions, electric bicycle: 3.16072e-5 km; lognormal variance with pedigree 0.13, pedigree (1,1,4,5,1)
  Defined by laws and physics
  EcoSpold01Location=CH
  Uncertainty: defined by laws and physics
- nitrogen, liquid: 4.97348e-9 kg; lognormal variance with pedigree 0.04, pedigree (4,4,4,5,1)
  EcoSpold01Location=RER
- electricity, medium voltage: 0.00296405 kWh; lognormal variance with pedigree 0.05, pedigree (1,1,4,5,1)
  composite
  EcoSpold01Location=CN
- section bar extrusion, aluminium: 1.42941e-5 kg; lognormal variance with pedigree 0.0981, pedigree (4,2,4,5,4)
  Assumption for pipe drawing
  EcoSpold01Location=RER
  Uncertainty: Assumption for pipe drawing
- chromium steel removed by turning, average, conventional: 1.32762e-6 kg; lognormal variance with pedigree 0.0981, pedigree (4,2,4,5,4)
  Assumption
  EcoSpold01Location=RER
  Uncertainty: Assumption
- polyurethane, flexible foam: 2.18504e-9 kg; lognormal variance with pedigree 0.0287, pedigree (2,2,4,5,3)
  EcoSpold01Location=RER
  Estimation: saddle once replaced, Scooter: no replacement
  Uncertainty: Estimation: saddle once replaced, Scooter: no replacement
- waste plastic, mixture: -5.31609e-5 kg; lognormal variance with pedigree 0.0361, pedigree (4,2,4,5,3)
  EcoSpold01Location=CH
  Plastics to municipal incineration
  Uncertainty: plastics to municipal incineration
  production volume 3.0264 kg
- tap water: 0.00229384 kg; lognormal variance with pedigree 0.0112, pedigree (2,3,4,5,1)
  (same comment as for tap water)
- electricity, medium voltage: 3.6477e-5 kWh; lognormal variance with pedigree 0.0767, pedigree (4,3,5,3,3)
  Estimated - from CRT treatment activities
  EcoSpold01Location=UCTE
  Uncertainty: estimated - from CRT treatment activities
- photovoltaic cell factory: 7.34108e-14 unit; lognormal variance with pedigree 0.3701, pedigree (1,4,5,3,3)
  EcoSpold01Location=DE
  Proxy with calculation, to represent computer production photovoltaic cell factory is used. It is based on a annual production of 7.9 mio pieces and life-span of 25 years.
- power adapter, for laptop: 2.41642e-6 unit; source von Geibler J. 2003; lognormal variance with pedigree 0.0701, pedigree (1,4,5,3,3)
  Literature Value.
  EcoSpold01Location=GLO
- hard disk drive, for laptop computer: 2.41642e-6 unit; source von Geibler J. 2003; lognormal variance with pedigree 0.0701, pedigree (1,4,5,3,3)
  Literature Value.
  EcoSpold01Location=GLO
- magnesium-alloy, AZ91, diecast: 6.8433e-7 kg; source von Geibler J. 2003; lognormal variance with pedigree 0.0701, pedigree (1,4,5,3,3)
  EcoSpold01Location=RER
  Literature Value.
- magnesium-alloy, AZ91: 6.8433e-7 kg; source von Geibler J. 2003; lognormal variance with pedigree 0.0707, pedigree (2,4,5,3,3)
  EcoSpold01Location=RER
  Literature Value.
- printed wiring board, mounted mainboard, laptop computer, Pb containing: 1.03519e-7 kg; source von Geibler J. 2003; lognormal variance with pedigree 0.0701, pedigree (1,4,5,3,3)
  Literature Value.
  EcoSpold01Location=GLO
- polystyrene foam slab: 2.15061e-7 kg; source von Geibler J. 2003; lognormal variance with pedigree 0.0701, pedigree (1,4,5,3,3)
  EcoSpold01Location=RER
  Literature Value.
- liquid crystal display, unmounted: 7.92585e-7 kg; source von Geibler J. 2003; lognormal variance with pedigree 0.0701, pedigree (1,4,5,3,3)
  Literature Value.
  EcoSpold01Location=GLO
- packaging film, low density polyethylene: 1.23237e-7 kg; source von Geibler J. 2003; lognormal variance with pedigree 0.0701, pedigree (1,4,5,3,3)
  Literature Value.
  EcoSpold01Location=RER
- disk drive, CD/DVD, ROM, for laptop computer: 2.41642e-6 unit; source von Geibler J. 2003; lognormal variance with pedigree 0.0701, pedigree (1,4,5,3,3)
  EcoSpold01Location=GLO
  Literature Value.
- used laptop computer: -7.53922e-6 kg; lognormal variance with pedigree 0.0701, pedigree (1,4,5,3,3)
  EcoSpold01Location=CH
  Measured Value.
  production volume 3.12 kg
- polystyrene, high impact: 1.02444e-6 kg; source von Geibler J. 2003; lognormal variance with pedigree 0.0701, pedigree (1,4,5,3,3)
  EcoSpold01Location=RER
  Literature Value.
- battery, NiMH, rechargeable, prismatic: 1.93313e-8 kg; source von Geibler J. 2003; lognormal variance with pedigree 0.0701, pedigree (1,4,5,3,3)
  Literature Value.
  EcoSpold01Location=GLO
- cable, network cable, category 5, without plugs: 3.76961e-7 m; source von Geibler J. 2003; lognormal variance with pedigree 0.0521, pedigree (1,4,5,3,1)
  Literature Value.
  EcoSpold01Location=GLO
- plug, inlet and outlet, for network cable: 2.41642e-6 unit; lognormal variance with pedigree 0.0521, pedigree (1,4,5,3,1)
  Measured Value.
  EcoSpold01Location=GLO
- sheet rolling, copper: 3.26216e-8 kg; source von Geibler J. 2003; lognormal variance with pedigree 0.0701, pedigree (1,4,5,3,3)
  Literature Value.
  EcoSpold01Location=RER
- steel, chromium steel 18/8, hot rolled: 1.93341e-6 kg; source von Geibler J. 2003; lognormal variance with pedigree 0.0701, pedigree (1,4,5,3,3)
  Literature Value.
  EcoSpold01Location=RER
- wastewater, unpolluted: -3.13168e-8, -3.88328e-6 m3 (2 entries); source Fujitsu L. 2003; lognormal variance with pedigree 0.0701, pedigree (1,4,5,3,3)
  Literature Value.
  EcoSpold01Location=CH
  production volume 1.62 m3
- waste polystyrene: -2.07006e-8, -1.5959e-9, -6.59163e-10, -6.25937e-10, -2.38849e-8, -2.66294e-10, -1.20695e-10, -1.67208e-7 kg (8 entries); source von Geibler J. 2003; lognormal variance with pedigree 0.0701, pedigree (1,4,5,3,3)
  Literature Value.
  EcoSpold01Location=CH
  production volume 0.089 kg
- waste polyethylene: -0.000291977, -2.25101e-5, -9.29747e-6, -8.82882e-6, -0.000336896, -3.75607e-6, -1.7024e-6, -0.000673311 kg (8 entries); source von Geibler J. 2003; lognormal variance with pedigree 0.0701, pedigree (1,4,5,3,3)
  EcoSpold01Location=CH
  Literature Value.
  production volume 0.051 kg
- corrugated board box: 4.17617e-7, 1.8672e-8, 1.58625e-6 kg (3 entries); source von Geibler J. 2003; lognormal variance with pedigree 0.0701, pedigree (1,4,5,3,3)
  Literature Value.
  EcoSpold01Location=RER
- waste electric and electronic equipment: -0.00111683 kg; lognormal variance with pedigree 0.134, pedigree (3,4,5,1,4)
  Rough estimation
  EcoSpold01Location=GLO
  Uncertainty: rough estimation
  production volume 0.347424 kg
- used printed wiring boards: -5.29544e-5 kg; lognormal variance with pedigree 0.054, pedigree (3,4,5,1,1)
  Calculated - based on composition data
  EcoSpold01Location=GLO
  Uncertainty: calculated - based on composition data
  production volume 0.016478 kg
- electronics scrap: -0.000120583 kg; lognormal variance with pedigree 0.2106, pedigree (5,5,5,5,5)
  replaces the original flow "Cu fraction of used liquid crystal display from mechanical treatment"
  production volume 0.0375221 kg
- used fluorescent lamp: -2.7467e-5 kg; lognormal variance with pedigree 0.054, pedigree (3,4,5,1,1)
  EcoSpold01Location=GLO
  Calculated - based on composition data
  Uncertainty: calculated - based on composition data
  production volume 0.008547 kg
- waste plastic, consumer electronics: -8.6912e-7, -5.75292e-5 kg (2 entries); lognormal variance with pedigree 0.054, pedigree (3,4,5,1,1)
  EcoSpold01Location=CH
  Calculated - based on composition data
  Uncertainty: calculated - based on composition data
  production volume 0.018172 kg
- used liquid crystal display module: -1.62592e-5, -0.00107624 kg (2 entries); lognormal variance with pedigree 0.054, pedigree (3,4,5,1,1)
  Calculated - based on composition data
  EcoSpold01Location=CH
  Uncertainty: calculated - based on composition data
  production volume 0.339955 kg
- residue from mechanical treatment, liquid crystal display: -1.25952e-5, -0.000833711 kg (2 entries); lognormal variance with pedigree 0.054, pedigree (3,4,5,1,1)
  (same comment as for waste plastic, consumer electronics)
  production volume 0.263348 kg
- metal working, average for steel product manufacturing: 5.64491e-8 kg; lognormal variance with pedigree 0.004425, pedigree (2,3,3,2,2)
  Measured value: represent the working of the steel-based auxiliaries
  Uncertainty: Default value from Table 10.3. DQG
- spent solvent mixture: -1.1501e-5 kg; lognormal variance with pedigree 0.004425, pedigree (2,3,3,2,2)
  Measured value, proxy exchange: represents the disposal of the detergent/solvent consumed as an auxilliary during the process
  Uncertainty: Default value taken fromTable 10.3. DQG
  production volume 3571.2 kg
- waste polypropylene: -2.4002e-5 kg; lognormal variance with pedigree 0.004425, pedigree (2,3,3,2,2)
  Measured value, proxy exchange: represents the disposal of the plastic caps consumed as an auxilliary during the process.
  Uncertainty: Default value taken fromTable 10.3. DQG
  production volume 14895.5 kg
- metal working, average for aluminium product manufacturing: 6.70189e-5 kg; lognormal variance with pedigree 0.0032, pedigree (1,3,3,1,1)
  Measured value: represent the working of the aluminium required for the copensation of the deterioration of the moulds
  Uncertainty: Default value from Table 10.3. DQG
- extrusion, plastic pipes: 2.65156e-6 kg; lognormal variance with pedigree 0.004425, pedigree (2,3,3,2,2)
  Measured value: represents the working of the tetrafluorethylene based auxilliaries
  Uncertainty: Default value from Table 10.3. DQG
- waste polyethylene: -4.5044e-8 kg; lognormal variance with pedigree 0.004425, pedigree (2,3,3,2,2)
  Measured value, proxy exchange: represents the disposal of the tetrafluoroethylene consumed as an auxilliary during the process.
  Uncertainty: Default value taken fromTable 10.3. DQG
  production volume 27.99 kg
- waste plastic, mixture: -0.0034497 kg; lognormal variance with pedigree 0.004425, pedigree (2,3,3,2,2)
  Measured value: represents the total amount of mono materials recycled externally.
  Uncertainty: Default value taken fromTable 10.3. DQG
  production volume 886635 kg
- wastewater, average: -3.95207e-6 m3; lognormal variance with pedigree 0.004425, pedigree (2,3,3,2,2)
  Measured value: corresponds to the input of tap water
  Uncertainty: Default value from Table 10.3. DQG
  production volume 1210.59 m3
- electricity, medium voltage: 0.0621009 kWh; lognormal variance with pedigree 0.004425, pedigree (2,3,3,2,2)
  EcoSpold01Location=UCTE
  Measured value: represents the electricity consumption of the entire processing step. Includes the electricity consumption required for internal recycling.
  Uncertainty: Default value taken fromTable 10.3. DQG
- aluminium, primary, ingot: 6.70189e-5, 6.93544e-5 kg (2 entries); lognormal variance with pedigree 0.004425, pedigree (2,3,3,2,2)
  Measured value: represent the aluminium required for the compensation of the deterioration of the moulds
- packaging box factory: 8.44711e-11, 8.72498e-11 unit (2 entries); lognormal variance with pedigree 0.309825, pedigree (2,3,4,2,2)
  Measured value: calculated based on the lifetime (50 years) and annual capacity (14000 tons/year) of the packing box factory.
  Uncertainty: Default value from Table 10.3. DQG
- tetrafluoroethylene: 9.13334e-8 kg; lognormal variance with pedigree 0.004425, pedigree (2,3,3,2,2)
  Measured value: represents tetrafluoroethylene-based auxiliaries
  Uncertainty: Default value from Table 10.3. DQG
- extrusion, plastic film: 2.75144e-5 kg; lognormal variance with pedigree 0.004425, pedigree (2,3,3,2,2)
  Measured value: represents the foaming of the plastic caps
  Uncertainty: Default value from Table 10.3. DQG
- used glider, from electric scooter: -3.94243e-6 kg
  production volume 6.213e7 kg
- heat, district or industrial, natural gas: 4.32287e-5 MJ; source M. Leuenberger 2010; lognormal variance with pedigree 0.0366, pedigree (4,3,4,5,3)
  EcoSpold01Location=RER
  50% of Environmental report Honda, 2008
  Uncertainty: 50% of Environmental report Honda, 2008
- heat, district or industrial, other than natural gas: 1.07408e-6 MJ; source M. Leuenberger 2010; lognormal variance with pedigree 0.0366, pedigree (4,3,4,5,3)
  50% of Environmental report Honda, 2008
  EcoSpold01Location=RER
  Uncertainty: 50% of Environmental report Honda, 2008
- aluminium scrap, new: -2.23472e-7, -1.67164e-6 kg (2 entries); lognormal variance with pedigree 0.0518, pedigree (2,4,5,4,3)
  Production waste. Waste factors taken from F. Habermacher 2011.
  production volume 1.05621e6 kg
- printed wiring board, mounted mainboard, desktop computer, Pb free: 1.47906e-10 kg; source F. Habermacher 2011; lognormal variance with pedigree 0.0424, pedigree (1,3,5,4,2)
  Materialization based on average from literature values.
- light emitting diode: 7.7833e-12 kg; source F. Habermacher 2011; lognormal variance with pedigree 0.0424, pedigree (1,3,5,4,2)
  Materialization based on average from literature values.
- acrylonitrile-butadiene-styrene copolymer: 3.25907e-10 kg; source F. Habermacher 2011; lognormal variance with pedigree 0.0424, pedigree (1,3,5,4,2)
  Materialization based on average from literature values.
- fibre, viscose: 1.28419e-9 kg; source F. Habermacher 2011; lognormal variance with pedigree 0.0424, pedigree (1,3,5,4,2)
  Materialization based on average from literature values.
- tempering, flat glass: 2.33499e-9 kg; source F. Habermacher 2011; lognormal variance with pedigree 0.0424, pedigree (1,3,5,4,2)
  Materialization based on average from literature values.
- polyethylene terephthalate, granulate, amorphous: 1.08636e-10 kg; source F. Habermacher 2011; lognormal variance with pedigree 0.0424, pedigree (1,3,5,4,2)
  Materialization based on average from literature values.
- glass fibre reinforced plastic, polyester resin, hand lay-up: 0.00199058 kg; source F. Habermacher 2011; lognormal variance with pedigree 0.0424, pedigree (1,3,5,4,2)
  Materialization based on average from literature values.
- used glider, passenger car: -5.83455e-8 kg; source F. Habermacher 2011
  Materialization based on average from literature values.
  production volume 4.8e10 kg
- magnesium: 5.47872e-11 kg; source F. Habermacher 2011; lognormal variance with pedigree 0.0424, pedigree (1,3,5,4,2)
  Materialization based on average from literature values.
- flat glass, uncoated: 2.51195e-5, 2.52017e-5 kg (2 entries); source F. Habermacher 2011; lognormal variance with pedigree 0.0424, pedigree (1,3,5,4,2)
  Materialization based on average from literature values.
- waste plastic, industrial electronics: -4.51534e-12, -2.98881e-10 kg (2 entries); source F. Habermacher 2011; lognormal variance with pedigree 0.0424, pedigree (1,3,5,4,2)
  Scrap fraction from production process.Details in F. Habermacher "Modeling material inventories and environmental impacts of electric passenger cars", Matser Thesis, Department of Environmental Sciences, ETH Zurich, 2011.
  production volume 2.496e8 kg
- coating powder: 2.82964e-10, 5.72965e-10 kg (2 entries); source F. Habermacher 2011; lognormal variance with pedigree 0.0424, pedigree (1,3,5,4,2)
  Materialization based on average from literature values.
- epoxy resin, liquid: 0.000129881, 0.000129832 kg (2 entries); source F. Habermacher 2011; lognormal variance with pedigree 0.0424, pedigree (1,3,5,4,2)
  Materialization based on average from literature values.
- ethylene glycol: 3.76201e-7 kg; source H.-J. Althaus 2010; lognormal variance with pedigree 0.0444, pedigree (2,4,5,4,2)
  Based on a Volkswagen Golf A4 materialization.
- used internal combustion engine, from passenger car: -1.47791e-5 kg; source H.-J. Althaus 2010
  production volume 1.65e10 kg
- polyphenylene sulfide: 1.47791e-6 kg; source H.-J. Althaus 2010; lognormal variance with pedigree 0.0444, pedigree (2,4,5,4,2)
  Based on a Volkswagen Golf A4 materialization.
- converter, for electric passenger car: 2.9058e-8 kg; source F. Habermacher 2011; lognormal variance with pedigree 0.0058, pedigree (1,4,3,4,2)
  This electric drivetrain and the data describing each component is based on direct information from the Swiss manufacturer Brusa.
- electric motor, electric passenger car: 3.42239e-7 kg
- power distribution unit, for electric passenger car: 2.51836e-8 kg; source F. Habermacher 2011; lognormal variance with pedigree 0.0058, pedigree (1,4,3,4,2)
  (same comment as for converter, for electric passenger car)
- used powertrain from electric passenger car, manual dismantling: -5.18008e-7 kg; source F. Habermacher 2011
  production volume 721980 kg
- charger, electric passenger car: 4.00355e-8 kg; source F. Habermacher 2011; lognormal variance with pedigree 0.0058, pedigree (1,4,3,4,2)
  (same comment as for converter, for electric passenger car)
- inverter, for electric passenger car: 6.13447e-8 kg; source F. Habermacher 2011; lognormal variance with pedigree 0.0058, pedigree (1,4,3,4,2)
  (same comment as for converter, for electric passenger car)
- used powertrain, from electric scooter: -1.12428e-6 kg
  production volume 7.79228e6 kg
- electric motor, for electric scooter: 6.45629e-7 kg; lognormal variance with pedigree 0.0198, pedigree (2,4,4,4,3)
  Based on current available technology.
- charger, for electric scooter: 3.36729e-7 kg; lognormal variance with pedigree 0.0198, pedigree (2,4,4,4,3)
  Based on current available technology.
- controller, for electric scooter: 1.4137e-7 kg; lognormal variance with pedigree 0.0198, pedigree (2,4,4,4,3)
  Based on current available technology.
- tissue paper: 9.57089e-7 kg; lognormal variance with pedigree 0.004425, pedigree (2,3,3,2,2)
  Measured value: represent the amount of tissue paper based auxiliaries required during processing.
  Uncertainty: Default value from Table 10.3. DQG
- heat, central or small-scale, natural gas: 0.00407722, 4.40862e-10, 0.00422466 MJ (3 entries); lognormal variance with pedigree 0.0044, pedigree (2,3,3,1,2)
  Measured value: represents the amount of heat required for the buildings.
  Uncertainty: Default value from Table 10.3. DQG
- waste graphical paper: -4.70045e-7 kg; lognormal variance with pedigree 0.004425, pedigree (2,3,3,2,2)
  Measured value: represents the treatment of the amount of tissue paper based auxilliaries.
  production volume 427.105 kg
- waste plastic, mixture: -3.91447e-5 kg; lognormal variance with pedigree 0.004425, pedigree (2,3,3,2,2)
  Measured value: represents the amount of waste plastic mixture incinerated. Modeled with a direct link to the GLO municipal solid waste incineration
  Uncertainty: Default value taken fromTable 10.3. DQG
  production volume 17468.5 kg
- concrete, normal: 7.07858e-5 m3; lognormal variance with pedigree 0.008, pedigree (1,1,4,1,1)
  Calculated Value.
  EcoSpold01Location=CH
  Uncertainty: Calculated variable. Uncertainty will be determined from propagation of uncertainty factors of underlying variables.
- waste reinforcement steel: -0.0172904 kg; lognormal variance with pedigree 0.008, pedigree (1,1,4,1,1)
  Estimation. Based on material input.
  EcoSpold01Location=CH
  Uncertainty: Calculated variable. Uncertainty will be determined from propagation of uncertainty factors of underlying variables.
  production volume 976317 kg
- waste polyvinylchloride: -0.000449362 kg; lognormal variance with pedigree 0.008, pedigree (1,1,4,1,1)
  EcoSpold01Location=CH
  Estimation. Based on material input.
  Uncertainty: Calculated variable. Uncertainty will be determined from propagation of uncertainty factors of underlying variables.
  production volume 45060.8 kg
- polyethylene, linear low density, granulate: 4.21816e-5 kg; lognormal variance with pedigree 0.008, pedigree (1,1,4,1,1)
  Calculated Value.
  Uncertainty: Calculated variable. Uncertainty will be determined from propagation of uncertainty factors of underlying variables.
- waste reinforced concrete: -0.00973515 kg; lognormal variance with pedigree 0.008, pedigree (1,1,4,1,1)
  (same comment as for waste reinforcement steel)
  production volume 11540 kg
- charcoal: 2.77699e-5 kg; lognormal variance with pedigree 0.008, pedigree (1,1,4,1,1)
  (same comment as for polyethylene, linear low density, granulate)
- waste glass pane in burnable frame: -0.00166101 kg; lognormal variance with pedigree 0.008, pedigree (1,1,4,1,1)
  (same comment as for waste polyvinylchloride)
  production volume 75101.3 kg
- polyvinylchloride, bulk polymerised: 0.00145311 kg; lognormal variance with pedigree 0.008, pedigree (1,1,4,1,1)
  Calculated Value.
  EcoSpold01Location=RER
  Uncertainty: Calculated variable. Uncertainty will be determined from propagation of uncertainty factors of underlying variables.
- polyurethane, rigid foam: 8.77681e-5, 8.13059e-5 kg (2 entries); lognormal variance with pedigree 0.008, pedigree (1,1,4,1,1)
  (same comment as for polyethylene, linear low density, granulate)
- waste wood, untreated: -6.97342e-6 kg; lognormal variance with pedigree 0.008, pedigree (1,1,4,1,1)
  Estimation. Based on material input.
  Uncertainty: Calculated variable. Uncertainty will be determined from propagation of uncertainty factors of underlying variables.
  production volume 1216.28 kg
- silica sand: 0.0037274 kg; lognormal variance with pedigree 0.008, pedigree (1,1,4,1,1)
  Calculated Value.
  EcoSpold01Location=DE
  Uncertainty: Calculated variable. Uncertainty will be determined from propagation of uncertainty factors of underlying variables.
- municipal solid waste: -0.000919377 kg; lognormal variance with pedigree 0.008, pedigree (1,1,4,1,1)
  (same comment as for waste wood, untreated)
  production volume 29815.9 kg
- waste reinforcement steel: -0.00575099 kg; lognormal variance with pedigree 0.008, pedigree (1,1,4,1,1)
  (same comment as for waste reinforcement steel)
  production volume 178160 kg
- waste glass pane in burnable frame: -0.000607744 kg; lognormal variance with pedigree 0.008, pedigree (1,1,4,1,1)
  (same comment as for waste polyvinylchloride)
  production volume 13704.6 kg
- waste reinforced concrete: -0.00016638 kg; lognormal variance with pedigree 0.008, pedigree (1,1,4,1,1)
  (same comment as for waste polyvinylchloride)
  production volume 2105.83 kg
- waste polyvinylchloride: -0.000253295 kg; lognormal variance with pedigree 0.008, pedigree (1,1,4,1,1)
  (same comment as for waste polyvinylchloride)
  production volume 8222.77 kg
- waste wood, untreated: -6.84959e-6 kg; lognormal variance with pedigree 0.008, pedigree (1,1,4,1,1)
  (same comment as for waste wood, untreated)
  production volume 221.948 kg
- concrete, normal: 6.49811e-5, 7.05847e-5, 2.80741e-6, 2.2728e-5, 1.82606e-6 m3 (5 entries); lognormal variance with pedigree 0.008, pedigree (1,1,4,1,1)
  EcoSpold01Location=CH
  Calculated Value.
  Uncertainty: Calculated variable. Uncertainty will be determined from propagation of uncertainty factors of underlying variables.
- municipal solid waste: -0.000936275 kg; lognormal variance with pedigree 0.008, pedigree (1,1,4,1,1)
  (same comment as for waste wood, untreated)
  production volume 1.9283e7 kg
- waste reinforced concrete: -0.00956931 kg; lognormal variance with pedigree 0.008, pedigree (1,1,4,1,1)
  (same comment as for waste polyvinylchloride)
  production volume 1.36192e6 kg
- waste polyvinylchloride: -0.000449002 kg; lognormal variance with pedigree 0.008, pedigree (1,1,4,1,1)
  (same comment as for waste polyvinylchloride)
  production volume 5.31796e6 kg
- waste wood, untreated: -6.97546e-6 kg; lognormal variance with pedigree 0.008, pedigree (1,1,4,1,1)
  (same comment as for waste wood, untreated)
  production volume 143542 kg
- polyvinylidenchloride, granulate: 0.000289155, 0.000144671 kg (2 entries); lognormal variance with pedigree 0.008, pedigree (1,1,4,1,1)
  (same comment as for polyethylene, linear low density, granulate)
- bronze: 3.25892e-6 kg; lognormal variance with pedigree 0.008, pedigree (1,1,4,1,1)
  (same comment as for polyethylene, linear low density, granulate)
- glass fibre: 0.000278167 kg; lognormal variance with pedigree 0.008, pedigree (1,1,4,1,1)
  (same comment as for polyethylene, linear low density, granulate)
- waste polyethylene/polypropylene product: -0.000129826 kg; lognormal variance with pedigree 0.008, pedigree (1,1,4,1,1)
  Calculated value. Proxy for the treatment of the epoxy resin (polyepoxide, formed from reaction of an epoxide resin with polyamine hardener). When using PrePreg in the manufacturing process, up to 10% of the PrePreg turns into waste due to cutoffs directly. The remaining amount will turn into waste/by-product after 20 years.
  Uncertainty: Calculated variable. Uncertainty will be determined from propagation of uncertainty factors of underlying variables. Uncertainty of actual relation between variables not accounted at this time, although this could be included in a future update.
  production volume 70196 kg
- waste glass: -0.00011678 kg; lognormal variance with pedigree 0.008, pedigree (1,1,4,1,1)
  Estimated value based on 2MW GLO dataset.
  The glass fibre reinforced plastic of the rotor is disposed of as 50% glass and 50% plastic. When using PrePreg in the manufacturing process, up to 10% of the PrePreg turns into waste due to cutoffs directly. The remaining amount will turn into waste/by-product after 20 years.
  Today, it is not possible to recycle the turbine blades. When the turbine’s lifetime expires, the blades will
  be dismantled into smaller pieces, which are deposited at controlled waste deposits.[Elsam. 2004b. Life Cycle Assessment of turbines PSO 1999. Elsam Engineering A/S, Fredericia, Denmark]
  Uncertainty: Calculated variable. Uncertainty will be determined from propagation of uncertainty factors of underlying variables. Uncertainty of actual relation between variables not accounted at this time, although this could be included in a future update.
  production volume 39127.8 kg
- electronics scrap from control units: -2.596e-5 kg; lognormal variance with pedigree 0.008, pedigree (1,1,4,1,1)
  Calculated value
  Uncertainty: Calculated variable. Uncertainty will be determined from propagation of uncertainty factors of underlying variables. Uncertainty of actual relation between variables not accounted at this time, although this could be included in a future update.
  production volume 2425.74 kg
- electricity, medium voltage: 0.00161999, 2.5352e-5, 0.00032123 kWh (3 entries); source Burger, B. 2007; lognormal variance with pedigree 0.008, pedigree (1,1,4,1,1)
  Extrapolated value from 2MW GLO dataset
  Literature value / calculation: Additional to energy requirements for material processing, a factor of 0.5 kWh/kg material (except of concrete for the foundation) after is included.Total wind turbine weight is about 2243554 kg (see Technology comment for details). This should also cover the energy required for mounting and removal of the turbine.
  Uncertainty: Calculated variable. Uncertainty will be determined from propagation of uncertainty factors of underlying variables. Uncertainty of actual relation between variables not accounted at this time, although this could be included in a future update.
- excavation, hydraulic digger: 0.00134115 m3; lognormal variance with pedigree 0.008, pedigree (1,1,4,1,1)
  Estimated value. Same amount than the concrete in foundation
  Uncertainty: Calculated variable. Uncertainty will be determined from propagation of uncertainty factors of underlying variables. Uncertainty of actual relation between variables not accounted at this time, although this could be included in a future update.
- glass fibre reinforced plastic, polyamide, injection moulded: 0.000389523 kg; source ENERCON GmbH 2010, p. p. 25, Tab. 5.3; lognormal variance with pedigree 0.0147, pedigree (2,1,4,3,1)
  Literature value. Used for the rotor blades. The main materials used in the rotor blades are glass fibres and epoxy resin.
  Split between materials is based on prepeg used in the 2MW dataset.
  Prepreg is used as material for the blades in this dataset. It was not possible to get information on the exact composition of Prepreg. From the supplier’s PrePreg safety data sheets it is assumed that Prepreg consists of approx 40% epoxy and 60% glass fibre. Total Prepreg mass is 21507 kg. When using PrePreg in the manufacturing process, up to 10% of the PrePreg turns into waste due to cutoffs.
  Uncertainty: estimated variance
- sheet rolling, chromium steel: 0.00113848 kg; lognormal variance with pedigree 0.008, pedigree (1,1,4,1,1)
  (same comment as for electronics scrap from control units)
- waste glass: -6.05831e-5, -3.1295e-6, -2.91978e-7, -1.30649e-6, -0.00156992, -3.03515e-5, -7.09978e-8 kg (7 entries)
  Estimation. The glass fibre reinforced plastic of the rotor is disposed of as 50% glass and 50% plastic. When using PrePreg in the manufacturing process, up to 10% of the PrePreg turns into waste due to cutoffs directly. The remaining amount will turn into waste/by-product after 20 years.
  Today, it is not possible to recycle the turbine blades. When the turbine’s lifetime expires, the blades will
  be dismantled into smaller pieces, which are deposited at controlled waste deposits.[Elsam. 2004b. Life Cycle Assessment of turbines PSO 1999. Elsam Engineering A/S, Fredericia, Denmark]
  production volume 6.64665e7 kg
- waste polyethylene/polypropylene product: -0.000126102, -3.78401e-6 kg (2 entries)
  Calculated value. Proxy for the treatment of the epoxy resin (polyepoxide, formed from reaction of an epoxide resin with polyamine hardener). When using PrePreg in the manufacturing process, up to 10% of the PrePreg turns into waste due to cutoffs directly. The remaining amount will turn into waste/by-product after 20 years.
  production volume 8.8622e7 kg
- waste paint on wall: -2.03336e-6 kg
  Estimation. Alkyd paint at the concrete tower.
  production volume 1.52834e6 kg
- waste polyvinylchloride: -1.02789e-10, -2.63765e-5, -1.08944e-5, -1.03453e-5, -0.000661545, -2.47311e-5, -1.99481e-6 kg (7 entries)
  Calculated value.
  production volume 2.89636e6 kg
- alkyd paint, white, without water, in 60% solution state: 3.0825e-10, 2.03426e-6 kg (2 entries); source Chataignere A. 2003, p. 46f; lognormal variance with pedigree 0.0567, pedigree (4,4,5,3,2)
  Literature value/calculated value. Used for the tower, the nacelle and the three blades.
  Sum of paint used for the tower (2411kg, directly final value) as well as for the nacelle (654 kg) and in the three blades (3*184 kg) extrapolated with accordant weight factors from a 1.5MW wind turbine.
  Uncertainty: estimated variance. higher basic uncertainty because of the extrapolation and the age of the data.
- waste paint on metal: -1.0168e-11, -1.19788e-9 kg (2 entries)
  Calculated value/estimation. Paint on the nacelle and the blades.
  production volume 3.27653e6 kg
- waste wire plastic: -0.000654843 kg; lognormal variance with pedigree 0.008, pedigree (1,1,4,1,1)
  Calculated value
  production volume 577376 kg
- hot water tank factory: 0 unit; pedigree (1,1,1,1,1)
  Value copied from the dataset "pump production, 40W, CH" (accessed on the 2017-11-14).
- waste polyvinylchloride product: -5.35478e-9, -1.62416e-10, -1.37793e-8 kg (3 entries); lognormal variance with pedigree 0.0192, pedigree (2,5,4,5,1)
  Calculated based on the input of PVC.
  production volume 3.12211e7 kg
- gas motor, 206kW: 7.16657e-14 unit; lognormal variance with pedigree 0.374402, pedigree (5,5,5,5,5)
  Literature data and primary data from French manufacturers (Boulard et al, 2011). Generating set for the heating system.
- blow moulding: 1.82564e-7, 1.83471e-7 kg (2 entries); lognormal variance with pedigree 0.374402, pedigree (5,5,5,5,5)
  Literature data and primary data from French manufacturers (Boulard et al, 2011). Tanks for the fertigation system.
- tractor, 4-wheel, agricultural: 1.75697e-6 kg
  Literature data and primary data from French manufacturers (Boulard et al, 2011). Tractor.
- agricultural machinery, unspecified: 5.88265e-7 kg; lognormal variance with pedigree 0.374402, pedigree (5,5,5,5,5)
  Literature data and primary data from French manufacturers (Boulard et al, 2011). Ramp and cable drum for the soil preparation system.
- concrete block: 6.16816e-6, 4.26638e-6, 1.93242e-6 kg (3 entries); lognormal variance with pedigree 0.374402, pedigree (5,5,5,5,5)
  Literature data and primary data from French manufacturers (Boulard et al, 2011). Mechanical room part of for the storage system.
- zinc coat, coils: 1.09386e-6, 1.09974e-6 m2 (2 entries); lognormal variance with pedigree 0.374402, pedigree (5,5,5,5,5)
  Literature data and primary data from French manufacturers (Boulard et al, 2011). Poles and trellis for the greenhouse structure.
- diesel, burned in building machine: 0.00495413 MJ; lognormal variance with pedigree 0.374402, pedigree (5,5,5,5,5)
  Literature data and primary data from French manufacturers (Boulard et al, 2011). Energy for building the greenhouse and retention pond.
- electricity, low voltage: 3.44296e-6, 1.42746e-9, 1.15175e-8, 3.77035e-8, 2.02718e-9, 1.36496e-8, 5.72938e-9, 5.06162e-9, 8.82155e-9, 9.42164e-9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 kWh (47 entries); lognormal variance with pedigree 0.374402, pedigree (5,5,5,5,5)
  Literature data and primary data from French manufacturers (Boulard et al, 2011). Electricity for manufacturing of the greenhouse structure.
- polyvinylfluoride: 3.51394e-7 kg; lognormal variance with pedigree 0.374402, pedigree (5,5,5,5,5)
  Literature data and primary data from French manufacturers (Boulard et al, 2011). Cables and wires for the greenhouse structure and the CO2 injection system.
- heat and power co-generation unit, 200kW electrical, diesel SCR, components for electricity only: 3.57441e-14, 3.59216e-14 unit (2 entries); lognormal variance with pedigree 0.374402, pedigree (5,5,5,5,5)
  (same comment as for gas motor, 206kW)
- oil boiler, 100kW: 2.15136e-10 unit; lognormal variance with pedigree 0.374402, pedigree (5,5,5,5,5)
  Literature data and primary data from French manufacturers (Boulard et al, 2011). Boiler for the heating system.
- waste concrete: -6.01594e-5 kg
  Concrete components sent to treatment
  production volume 0.196838 kg
- waste glass: -2.51191e-5 kg
  Flat glass sent to treatment
  production volume 0.0897395 kg
- polystyrene, expandable: 5.6639e-7 kg; lognormal variance with pedigree 0.374402, pedigree (5,5,5,5,5)
  Literature data and primary data from French manufacturers (Boulard et al, 2011). Plastic bags part of for the support system.
- drawing of pipe, steel: 1.12509e-5, 1.12961e-5 kg (2 entries); lognormal variance with pedigree 0.374402, pedigree (5,5,5,5,5)
  Literature data and primary data from French manufacturers (Boulard et al, 2011). Tubes and siphons for the heating system.
- polymer foaming: 2.82494e-7, 2.83897e-7 kg (2 entries); lognormal variance with pedigree 0.374402, pedigree (5,5,5,5,5)
  (same comment as for polystyrene, expandable)
- ethylene vinyl acetate copolymer: 6.50263e-7, 6.64713e-7 kg (2 entries); lognormal variance with pedigree 0.374402, pedigree (5,5,5,5,5)
  Literature data and primary data from French manufacturers (Boulard et al, 2011). Plastic covers for the greenhouse structure.
- polyester resin, unsaturated: 7.25503e-9, 7.41625e-9 kg (2 entries); lognormal variance with pedigree 0.374402, pedigree (5,5,5,5,5)
  Literature data and primary data from French manufacturers (Boulard et al, 2011). Roofing membrane.
- polycarbonate: 4.0412e-8 kg; lognormal variance with pedigree 0.374402, pedigree (5,5,5,5,5)
  Literature data and primary data from French manufacturers (Boulard et al, 2011). Cladding materials.
- calendering, rigid sheets: 2.00011e-8, 2.04109e-8 kg (2 entries); lognormal variance with pedigree 0.374402, pedigree (5,5,5,5,5)
  (same comment as for polycarbonate)
- silicone product: 6.38441e-10, 6.52629e-10 kg (2 entries); lognormal variance with pedigree 0.374402, pedigree (5,5,5,5,5)
  Literature data and primary data from French manufacturers (Boulard et al, 2011). Silicone.
- bitumen seal: 1.07589e-9 kg; lognormal variance with pedigree 0.374402, pedigree (5,5,5,5,5)
  Literature data and primary data from French manufacturers (Boulard et al, 2011). Cement sealing in the greenhouse structure.
- waste polyvinylchloride: -6.49082e-7 kg
  Etylene vinyl acetate copolymer (plastic covers) sent to treatment
  production volume 0.0228088 kg
- acrylic varnish, without water, in 87.5% solution state: 5.91149e-9, 6.04285e-9 kg (2 entries); lognormal variance with pedigree 0.374402, pedigree (5,5,5,5,5)
  Literature data and primary data from French manufacturers (Boulard et al, 2011). Paint protection.
- blower and heat exchange unit, decentralized, 180-250 m3/h: 2.87266e-6 unit; lognormal variance with pedigree 0.422225, pedigree (1,4,2,2,5)
  Calculated value. Represents here an air-conditioning unit. The amount of exchange is calculated as: amount of input product * (lifetime of the hotel / lifetime of the product). Assumed service life of the air-conditioning unit is 15 years. Source: ASHRAE 2018. ASHRAE Equipment Life Expectancy chart. Available from: http://www.culluminc.com/wp-content/uploads/2013/02/ASHRAE_Chart_HVAC_Life_Expectancy%201.pdf Accessed 23 March 2018.
- waste concrete: -0.376921 kg; lognormal variance with pedigree 0.122825, pedigree (1,4,2,2,5)
  Calculated value. Amount of output material is set equal to the amount of respective input material, concrete, clay brick, base plaster and foundation. Conversion is made from m3 of concrete to kg of concrete based on the density reported in the properties section for the product "concrete, normal" (see wet mass property).
  production volume 3.44868e8 kg
- door, inner, wood: 4.70478e-6 m2; lognormal variance with pedigree 0.122825, pedigree (1,4,2,2,5)
  Calculated value. The amount of exchange is calculated as: amount of input product * (lifetime of the hotel / lifetime of the product). Dimensions of a standar assumed to be 1,981 x 0,610 m and include wooden door frame. Souce: https://www.jbkind.com/info-centre/standard-door-sizes. Assumed service life of 40 years. Source: Cobut et al. 2015. The environmental footprint of interior wood doors in non-residential buildings - part 1: life cycle assessment. Journal of Cleaner Production, 109, 232-246. In terms of outputs, assumed to have gone to used door, inner, wood.
- clay brick: 0.0116459 kg; lognormal variance with pedigree 0.123425, pedigree (2,4,2,2,5)
  Calculated value. Combined of all instances of use across the building structure and walls. Assumed density of bricks = 1922 kg/m3. Source: The calculator site, 2018. Construction. Available from: https://www.thecalculatorsite.com/conversions/substances/construction.php. Accessed 13 January 2018. Assumed service life of 75 years which is equal to the service life of the hotel building with minor refurbishments throughout. In terms of outputs assumed to have gone to waste concrete.
- glass wool mat: 1.67422e-5 kg; lognormal variance with pedigree 0.123425, pedigree (2,4,2,2,5)
  Calculated value. Used here in place of acustic tile as a more conventional product. The amount of exchange is calculated as: amount of input product * (lifetime of the hotel / lifetime of the product). Combined of all instances of use across the building structure, walls and ceiling. Assumed service life of 75 years which is equal to the service life of the hotel building with minor refurbishments throughout. Assumed thickiness of glass wool 100 mm. Source: Knauf Insulation 2018. Knauf Insulation. Available from: http://www.knaufinsulation.co.uk/products/glass-mineral-wool-rolls/loft-insulation-rolls/earthwool-loft-roll-44 Accessed 16 March 2018. The density of glass wool is assumed to be 40 kg/m3 based on the specifications in ecoinvent dataset "glass wool mat production, CH 2000" accessed 22 Janaury 2018. In terms of outputs, assumed to have gone to waste glass.
- ceramic tile: 0.00167268 kg; lognormal variance with pedigree 0.122825, pedigree (1,4,2,2,5)
  Calculated value. The amount of exchange is calculated as: amount of input product * (lifetime of the hotel / lifetime of the product). Combined of all instances of use across the building floor. Assuming 12.3 kg of tiles is required to cover 1 m2 of floor area. Source: Victoria Plumbing 2018. British ceramic tile. Available from: https://victoriaplum.com/product/british-ceramic-tile-metro-bevel-white-gloss-tile-100mm-x-200mm Accessed 16 March 2018. Assumed service life of 5 years for floor ceramic tile which is equivalent to the period of major refurbishments in hotels. Source: Filimonau et al. 2011. Reviewing the carbon footprint analysis of hotels: Life Cycle Energy Analysis (LCEA) as a holistic method for carbon impact appraisal of tourist accommodation. Journal of Cleaner Production, 19(17-18), 1917-1930. In terms of outputs assumed to have gone to insert waste.
- waste wood, untreated: -0.000233538 kg; lognormal variance with pedigree 0.123425, pedigree (2,4,2,2,5)
  Calculated value. The amount is set equal to the amount of input materials, sawnwood, with conversion made from volume to weight. The conversion is based on the density reported in the property section for the respective products (see the wet mass property).
  production volume 645553 kg
- gypsum plasterboard: 0.00262367 kg; lognormal variance with pedigree 0.123425, pedigree (2,4,2,2,5)
  Calculated value. Combined of all instances of all across the building walls, ceiling and roof. Assumed thickness of roof plasterboard 12.5 mm. Source: Practical DYI 2018. Types of plasterboard. Available from: https://www.practicaldiy.com/general-building/plasterboard/plasterboard.php Accessed 23 March 2018. Assumed density of plasterboard 640 kg/m3. Source: British Gypsum 2018. What is the density of Gyproc plasterboards? Available from: http://www.british-gypsum.com/technical-advice/faqs/114-what-is-the-density-of-gyproc-plasterboards Accessed 23 March 2018. Assumed service life of 75 years with minor refurbishments throughout. In terms of outputs assumed to have gone to waste gypsum plasterboard.
- flat glass, coated: 0.00154913 kg; lognormal variance with pedigree 0.122825, pedigree (1,4,2,2,5)
  Estimated value. For window glass: Assuming each room has two windows. Assumed size of a standard 2020 window of 0.37 m2, https://modernize.com/windows/standard-sizes Assuming 15 kg of window glass is required to cover 1m2 of area (double-glazed windows). For construction glass: Assuming density of glass 2.6 kg/m3. Available from https://www.engineeringtoolbox.com/density-solids-d_1265.html Accessed 16 March 2018. Assumed average service life of 20 years for both types. Source: Howard et al. 2007. Comparative service life assessment of window systems. Available from: http://www.fwpa.com.au/images/marketaccess/PR07.1047%20Final%20Report%20WEB.pdf Accessed 16 March 2018. In terms of outputs assumed to have gone to waste glass.
- sawnwood, beam, softwood, dried (u=10%), planed: 5.4553e-7 m3; lognormal variance with pedigree 0.123425, pedigree (2,4,2,2,5)
  Calculated value. Represents here all wood used in flooring and for wall decoration. Combined of all instances of use across the building. Assumed thickness of wood to be 9.5 mm. Source: APA 2016. Wall construction. An excerpt of the engineering wood construction guide. Available from: https://www.buildgp.com/DocumentViewer.aspx?elementid=10198 Accessed 25 March 2018. Assumed service life of 75 years with minor refurbishments throughout. In terms of outputs assumed to have gone to waste wood, untreated.
- electricity, low voltage: 0.000162911 kWh; lognormal variance with pedigree 0.422225, pedigree (1,4,2,2,5)
  Calculated value. Assuming that 0.30 kWh/m3 of electricity is necessary to construct a building. Source: Zabalza et al. 2013. Use of LCA as a Tool for Building Ecodesign. A Case Study of a Low Energy Building in Spain. Energies, 6 (8), 3901-3921.
- window frame, aluminium, U=1.6 W/m2K: 5.75357e-5 m2; lognormal variance with pedigree 0.2106, pedigree (5,5,5,5,5)
  Calculated value. The amount of exchange is calculated as: amount of input product * (lifetime of the hotel / lifetime of the product). Assumed service life of 35 years. Source: Asif et al. 2002. LIFE CYCLE OF WINDOW MATERIALS - A COMPARATIVE ASSESSMENT. Available from: http://ohp.parks.ca.gov/pages/1054/files/uk%20window%20frame%20lca.pdf Accessed 16 March 2018.
- natural stone plate, cut: 4.93064e-6 kg; lognormal variance with pedigree 0.123425, pedigree (2,4,2,2,5)
  Calculated value. Used here in place of marble. Combined of all instances of use across the building. Assumed thickness of marble is 22 mm. Source: Erdly and Schwartz 2004. Building facade maintenance, repair, and inspection. ASTM International, West Conshohocken, USA. Assumed density of marble is 2.7 kg/m3. Source: The Engineering Toolbox 2018. Densities of common solids. Available from: https://www.engineeringtoolbox.com/density-solids-d_1265.html Accessed 25 March 2018. Assumed service life of 75 years which is equal to the service life of the hotel building with minor refurbishments throughout. In terms of outputs assumed to have gone to inert waste.
- wastewater, average: -9.62753e-5 m3; lognormal variance with pedigree 0.122825, pedigree (1,4,2,2,5)
  Calculated value. The amount is set equal to the amount of input material, tap water with conversion from kg to m3. 1 m3 of water is assumed to be equal to 1000 kg of water.
  production volume 82715.5 m3
- concrete, normal: 0.000156735 m3; lognormal variance with pedigree 0.122825, pedigree (1,4,2,2,5)
  Calculated value.
  Combined of all instances of use across the building structure, walls (m2) and floor (3501.5m3). Assumed thickness of 225 mm, Available at http://kingspaninsulation.co.uk/getattachment/5fdd04b2-e58e-4622-97bb-5861799ab02a/Thermafloor-TF70-pdf.pdf Accessed on 10 Feb 2018 Assumed service life of 75 years which is equal to the service life of the hotel building with minor refurbishments throughout.
  Additionally the concrete for foundations is accounted for (164.27m3). Estimated value based on the hotel area. In terms of outputs assumed to have gone to waste concrete.
- used door, inner, wood: -4.70478e-6 m2; lognormal variance with pedigree 0.122825, pedigree (1,4,2,2,5)
  Calculated value. Amount of output material is set equal to the amount of respectiveinput material, door, inner, wood.
  production volume 10646.8 m2
- sanitary ceramics: 0.000224403 kg; lognormal variance with pedigree 0.422225, pedigree (1,4,2,2,5)
  Calculated value. The amount of exchange is calculated as: amount of input product * (lifetime of the hotel / lifetime of the product). This flow represents ceramic washing basin and ceramic toilet seat. The hotel has 60 washing basins and 60 toilet seats. Washing basins are assumed to weigh 15kg (information taken from IKEA (2018) for the product "TÖRNVIKEN Countertop wash-basin", source retrieved from: http://www.ikea.com/gb/en/products/washstands-taps/wash-basins/t%C3%B6rnviken-countertop-wash-basin-white-art-90291518/, accessed 12 Feb 2018). The assumed lifetime is 15 years. Toilet seats are assumed to weigh 35kg (information taken from B&Q (2018) for the product "COOKE & LEWIS FABIENNE CLOSE-COUPLED TOILET WITH SOFT CLOSE SEAT", source retrieved from: https://www.diy.com/departments/cooke-lewis-fabienne-close-coupled-toilet-with-soft-close-seat/1142804_BQ.prd?B/R_Toilets_C_CT, accessed 12 Feb 2018). In terms of outputs, assumed to have gone to inert waste.
  In terms of outputs, assumed to have gone to inert waste.
- elevator, hydraulic: 8.78413e-8 unit; lognormal variance with pedigree 0.422225, pedigree (1,4,2,2,5)
  Calculated value. The amount of exchange is calculated as: amount of input product * (lifetime of the hotel / lifetime of the product). Assumed service life of elevator unit is 20 years. Source: Miljögiraff 2015. LCA of elevator lifting service in property. Miljögiraff Report 56. Available from: https://www.researchgate.net/profile/Marcus_Wendin/publication/301295772_Elevators_towards_a_circular_economy/links/5717790f08ae2679a8c772db/Elevators-towards-a-circular-economy.pdf Accessed 23 March 2018.
- waste gypsum plasterboard: -0.00262367 kg; lognormal variance with pedigree 0.123425, pedigree (2,4,2,2,5)
  Calculated value. Amount of output material is set equal to the amount of respective input material, gypsum plasterboard.
  production volume 613248 kg
- base plaster: 9.0423e-5 kg; lognormal variance with pedigree 0.122825, pedigree (1,4,2,2,5)
  Estimated value. Combined of all instances of use across the building structure and walls. Assuming that 401 bags of base paster (each bag has a weight of 25 kg) are required to plaster the area of circa 3638,89 m2. Source: British Gypsum 2018. Plaster Coverage Tool. Available from: http://www.british-gypsum.com/technical-advice/plaster-coverage-tool. Accessed 23 March 2018. Assumed service life of 75 years which is equal to the service life of the hotel building with minor refurbishments throughout. In terms of outputs assumed to have gone to waste concrete.
- used window frame, wood-metal: -1.48213e-6 m2; lognormal variance with pedigree 0.123425, pedigree (2,4,2,2,5)
  Calculated value. Amount of output material is set equal to the amount of respective input material, window frame, wood-metal.
  production volume 60194.9 m2
- plywood, for indoor use: 1.40458e-7 m3; lognormal variance with pedigree 0.123425, pedigree (2,4,2,2,5)
  Calculated value. Represents here wood used as ceiling material and for decoration. Assumed average thickness of plywood is 19mm. Source: Plymaster 2018. Interior Plywood. Available from: (http://plymaster.com.au/plywood-products-interior.htm#/1) Accessed 25 March 2018. Assumed service life of 75 years with minor refurbishments throughout. In terms of outputs assumed to have gone to waste wood, untreated.
- window frame, wood-metal, U=1.6 W/m2K: 1.48213e-6 m2; lognormal variance with pedigree 0.123425, pedigree (2,4,2,2,5)
  Calculated value. The amount of exchange is calculated as: amount of input product * (lifetime of the hotel / lifetime of the product). Assumed service life of 35 years. Source: Asif et al. 2002. LIFE CYCLE OF WINDOW MATERIALS - A COMPARATIVE ASSESSMENT. Available from: http://ohp.parks.ca.gov/pages/1054/files/uk%20window%20frame%20lca.pdf Accessed 16 March 2018. In terms of outputs assumed to have gone to used window frame, wood-metal.
- blower and heat exchange unit, central, 600-1200 m3/h: 2.78817e-9 unit; lognormal variance with pedigree 0.422225, pedigree (1,4,2,2,5)
  Calculated value. Represents here 4 central air-conditioning units. The amount of exchange is calculated as: amount of input product * (lifetime of the hotel / lifetime of the product). Assumed service life of the air-conditioning unit is 20 years. Source: ASHRAE 2018. ASHRAE Equipment Life Expectancy chart. Available from: http://www.culluminc.com/wp-content/uploads/2013/02/ASHRAE_Chart_HVAC_Life_Expectancy%201.pdf Accessed 23 March 2018.
- used door, outer, wood-aluminium: -5.21191e-8 m2; lognormal variance with pedigree 0.123425, pedigree (2,4,2,2,5)
  Calculated value. Amount of output material is set equal to the amount of respective input material, door, outer, wood-aluminium.
  production volume 338.709 m2
- door, outer, wood-aluminium: 5.21191e-8 m2; lognormal variance with pedigree 0.123425, pedigree (2,4,2,2,5)
  Calculated value. The amount of exchange is calculated as: amount of input product * (lifetime of the hotel / lifetime of the product). Assumed service life of 40 years. Source: Cobut et al. 2015. The environmental footprint of interior wood doors in non-residential buildings - part 1: life cycle assessment. Journal of Cleaner Production, 109, 232-246. In terms of outputs, assumed to have gone to used door, outer, wood-alunimium.
- waste wood, untreated: -9.11367e-5 kg; lognormal variance with pedigree 0.123425, pedigree (2,4,2,2,5)
  Calculated value. The amount is set equal to the amount of input materials, sawnwood, with conversion made from volume to weight. The amount also includes waste plywood, for indoor use, with convertion from m3 to kg. Density for both material is taken from the properties section, see their respective wet mass.
  production volume 659514 kg
- used door, inner, glass-wood: -1.50379e-7 m2; lognormal variance with pedigree 0.123425, pedigree (2,4,2,2,5)
  Calculated value. Amount of output material is set equal to the amount of respective input material, door, inner, glass-wood.
  production volume 732.038 m2
- door, inner, glass-wood: 1.50379e-7 m2; lognormal variance with pedigree 0.123425, pedigree (2,4,2,2,5)
  Calculated value. The amount of exchange is calculated as: amount of input product * (lifetime of the hotel / lifetime of the product). Assumed service life of 40 years. Source: Cobut et al. 2015. The environmental footprint of interior wood doors in non-residential buildings - part 1: life cycle assessment. Journal of Cleaner Production, 109, 232-246. In terms of outputs, assumed to have gone to used door, inner, glass-wood.
- electricity, low voltage: 0.000131029 kWh; lognormal variance with pedigree 0.422225, pedigree (1,4,2,2,5)
  Calculated value. Assuming that 0.30 kWh/m3 of electricity is necessary to construct a building. Source: Zabalza et al. 2013. Use of LCA as a Tool for Building Ecodesign. A Case Study of a Low Energy Building in Spain. Energies, 6(8), 3901-3921.
- concrete, normal: 3.6406e-5 m3; lognormal variance with pedigree 0.123425, pedigree (2,4,2,2,5)
  Calculated value.
  Combined of all instances of use across the building structure, walls and floor (14450m3). Assumed thickness of concrete of 225 mm, Insulation 2011. Thermafloor TF70. INSULATION FOR SOLID CONCRETE AND SUSPENDED GROUND FLOORS. Available from http://kingspaninsulation.co.uk/getattachment/5fdd04b2-e58e-4622-97bb-5861799ab02a/Thermafloor-TF70-pdf.pdf Accessed 23 March 2018. Assumed service life of 75 years which is equal to the service life of the hotel building with minor refurbishments throughout.
  Additionally the concrete for foundations is accounted for (30840m3). Estimated value based on the hotel area and construction practices in Peru. The case study hotel has 4 floors of underground parking that occupy 2570 m2 of area and have 3 m of height each. Hotel foundation is then calculated as 2570 m2 x 3 m x 4 = 30840 m3. In terms of outputs assumed to have gone to waste concrete.
- waste polyethylene: -7.58826e-11, -2.38179e-11, -5.94716e-11, -3.25177e-11, -2.52271e-11, -6.64038e-11, -8.89962e-12, -7.52051e-10, -9.87336e-11, -1.0277e-11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 kg (35 entries); lognormal variance with pedigree 0.004425, pedigree (2,3,3,2,2)
  (same comment as for waste polyethylene)
  production volume 722.573 kg
- waste plastic, mixture: -1.83287e-6, -4.57653e-6, -2.50234e-6, -1.9413e-6, -5.10998e-6, -6.84854e-7, -5.78728e-5, -7.59787e-6, -7.90845e-7, -4.5464e-5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 kg (34 entries); lognormal variance with pedigree 0.004425, pedigree (2,3,3,2,2)
  (same comment as for waste plastic, mixture)
  production volume 2.28888e7 kg
- electricity, medium voltage: 2.83574e-5, 0.000211895, 3.90077e-5, 0.000245323, 0.000105741, 9.62965e-5, 0.000170816, 0.00148204, 9.94105e-5, 2.39055e-5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 kWh (37 entries); lognormal variance with pedigree 0.004425, pedigree (2,3,3,2,2)
  Measured value: represents the electricity consumption of the entire processing step. Includes the electricity consumption required for internal recycling.
  EcoSpold01Location=UCTE
  Uncertainty: Default value taken fromTable 10.3. DQG
- waste polypropylene: -4.04349e-8, -1.26917e-8, -3.16901e-8, -1.73274e-8, -1.34425e-8, -3.5384e-8, -2.76265e-6, -1.8459e-7, -1.39602e-8, -4.74226e-9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 kg (42 entries); lognormal variance with pedigree 0.004425, pedigree (2,3,3,2,2)
  (same comment as for waste polypropylene)
  production volume 384532 kg
- spent solvent mixture: -8.9377e-8, -1.17786e-5 kg (2 entries); lognormal variance with pedigree 0.004425, pedigree (2,3,3,2,2)
  (same comment as for spent solvent mixture)
  production volume 92192 kg
- waste graphical paper: -9.35311e-10, -1.66859e-10, -8.03627e-10, -3.09775e-10, -6.71513e-10, -6.31559e-10, -2.15729e-8, -3.29428e-9, -2.88055e-10, -3.05485e-10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 kg (42 entries); lognormal variance with pedigree 0.004425, pedigree (2,3,3,2,2)
  Measured value: represents the treatment of the amount of tissue paper based auxilliaries.
  production volume 11025.9 kg
- waste wood, untreated: -5.35004e-7, -3.91148e-8, -1.50267e-6, -3.58894e-7 kg (4 entries); lognormal variance with pedigree 0.008, pedigree (1,1,4,1,1)
  (same comment as for waste wood, untreated)
  production volume 145527 kg
- waste wire plastic: -0.000656595 kg
  Calculated value
  production volume 1.23183e7 kg
- waste glass: -3.89333e-8, -1.96809e-8, -6.19537e-8, -1.58043e-8, -2.3021e-8, -3.65345e-8, -4.81625e-9, -6.54798e-7, -9.03935e-8, -7.25759e-9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 kg (35 entries)
  Flat glass sent to treatment
  production volume 1.83026 kg
- waste concrete: -1.56742e-8 kg
  Concrete components sent to treatment
  production volume 4.01456 kg
- waste polyvinylchloride: -3.41403e-10, -8.52458e-10, -4.66104e-10, -3.61601e-10, -9.51822e-10, -1.27566e-10, -1.07798e-8, -1.41523e-9, -1.47309e-10, -8.46846e-9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 kg (34 entries)
  Etylene vinyl acetate copolymer (plastic covers) sent to treatment
  production volume 0.465191 kg
- hydrogen peroxide, without water, in 50% solution state: 4.5974e-11 kg; lognormal variance with pedigree 0.0032, pedigree (1,3,3,1,1)
  Amount based on primary data collected from participating companies.
- heat, district or industrial, natural gas: 1.04442e-7 MJ; lognormal variance with pedigree 0.0032, pedigree (1,3,3,1,1)
  Amount and activity link based on primary data collected from participating companies.
- hard coal: 8.64579e-9 kg; lognormal variance with pedigree 0.0032, pedigree (1,3,3,1,1)
  Amount and activity link based on primary data collected from participating companies.
- ethoxylated alcohol (AE11): 5.06283e-12 kg; lognormal variance with pedigree 0.0032, pedigree (1,3,3,1,1)
  Amount based on primary data collected from participating companies.
- copper cake: -7.71817e-9 kg; lognormal variance with pedigree 0.0032, pedigree (1,3,3,1,1)
  Amount based on primary data collected from participating companies.
  production volume 1.32394e8 kg
- zinc oxide: 3.43485e-8 kg; lognormal variance with pedigree 0.0032, pedigree (1,3,3,1,1)
  Amount based on primary data collected from participating companies.
- zinc concentrate: 1.33774e-6 kg; lognormal variance with pedigree 0.0032, pedigree (1,3,3,1,1)
  Amount based on primary data collected from participating companies.
- coke: 4.99914e-7 MJ; lognormal variance with pedigree 0.0032, pedigree (1,3,3,1,1)
  Amount and activity link based on primary data collected from participating companies.

- transport, freight, sea, container ship: 2.57313e-8 metric ton*km; lognormal variance with pedigree 0.1226, pedigree (1,3,3,1,1)
  Amount based on primary data collected from participating companies.
- urea, as N: 7.5179e-12 kg; lognormal variance with pedigree 0.0032, pedigree (1,3,3,1,1)
  Amount based on primary data collected from participating companies.
- transport, freight, lorry 3.5-7.5 metric ton, EURO3: 3.23746e-13 metric ton*km; lognormal variance with pedigree 0.1226, pedigree (1,3,3,1,1)
  Inbound transport of zinc concentrate and other materials to sites. Amount and activity link based on primary data collected from participating companies.
- transport, freight, lorry >32 metric ton, EURO3: 2.08539e-9 metric ton*km; lognormal variance with pedigree 0.1226, pedigree (1,3,3,1,1)
  (same comment as for transport, freight, lorry 3.5-7.5 metric ton, EURO3)
- sulfamic acid: 1.90845e-13 kg; lognormal variance with pedigree 0.0032, pedigree (1,3,3,1,1)
  Amount based on primary data collected from participating companies.
- anode, for metal electrolysis: 4.84746e-11 kg; lognormal variance with pedigree 0.0032, pedigree (1,3,3,1,1)
  Amount based on primary data collected from participating companies.
- transport, freight, lorry 16-32 metric ton, EURO4: 2.35525e-10 metric ton*km; lognormal variance with pedigree 0.1226, pedigree (1,3,3,1,1)
  (same comment as for transport, freight, lorry 3.5-7.5 metric ton, EURO3)
- butane: 2.68479e-11 kg; lognormal variance with pedigree 0.0032, pedigree (1,3,3,1,1)
  Amount based on primary data collected from participating companies.
- transport, freight train: 5.65218e-9 metric ton*km; lognormal variance with pedigree 0.1226, pedigree (1,3,3,1,1)
  (same comment as for transport, freight, lorry 3.5-7.5 metric ton, EURO3)
- antimony: 3.33527e-12 kg; lognormal variance with pedigree 0.0032, pedigree (1,3,3,1,1)
  Amount based on primary data collected from participating companies.
- transport, freight, inland waterways, barge: 7.53104e-9 metric ton*km; lognormal variance with pedigree 0.1226, pedigree (1,3,3,1,1)
  (same comment as for transport, freight, lorry 3.5-7.5 metric ton, EURO3)
- sulfite pulp, bleached: 3.89596e-10 kg; lognormal variance with pedigree 0.0032, pedigree (1,3,3,1,1)
  Amount based on primary data collected from participating companies.
- ammonium chloride: 7.06163e-10 kg; lognormal variance with pedigree 0.0032, pedigree (1,3,3,1,1)
  Amount based on primary data collected from participating companies.
- strontium carbonate: 3.02953e-10 kg; lognormal variance with pedigree 0.0032, pedigree (1,3,3,1,1)
  Amount based on primary data collected from participating companies.
- barium carbonate: 8.58802e-11 kg; lognormal variance with pedigree 0.0032, pedigree (1,3,3,1,1)
  Amount based on primary data collected from participating companies.
- sodium silicate, without water, in 37% solution state: 1.39865e-11 kg; lognormal variance with pedigree 0.0032, pedigree (1,3,3,1,1)
  Amount based on primary data collected from participating companies.
- sodium hydroxide, without water, in 50% solution state: 3.08072e-9 kg; lognormal variance with pedigree 0.0032, pedigree (1,3,3,1,1)
  Amount based on primary data collected from participating companies.
- silver: 7.17057e-13 kg; lognormal variance with pedigree 0.0032, pedigree (1,3,3,1,1)
  Amount based on primary data collected from participating companies.
- activated silica: 2.6245e-9 kg; lognormal variance with pedigree 0.0032, pedigree (1,3,3,1,1)
  Amount based on primary data collected from participating companies.
- sodium hydrosulfide: 8.57666e-10 kg; lognormal variance with pedigree 0.0032, pedigree (1,3,3,1,1)
  Amount based on primary data collected from participating companies.
- sodium chloride, powder: 1.9289e-10 kg; lognormal variance with pedigree 0.0032, pedigree (1,3,3,1,1)
  Amount based on primary data collected from participating companies.
- phosphoric acid, industrial grade, without water, in 85% solution state: 1.16123e-11 kg; lognormal variance with pedigree 0.0032, pedigree (1,3,3,1,1)
  Amount based on primary data collected from participating companies.
- potassium permanganate: 1.14544e-11 kg; lognormal variance with pedigree 0.0032, pedigree (1,3,3,1,1)
  Amount based on primary data collected from participating companies.
- waste glass: -5.03262e-12 kg; lognormal variance with pedigree 0.0032, pedigree (1,3,3,1,1)
  Amount and activity link based on primary data collected from participating companies.
  production volume 87894.3 kg
- petroleum coke: 2.88241e-11 kg; lognormal variance with pedigree 0.0032, pedigree (1,3,3,1,1)
  Amount based on primary data collected from participating companies.
- nitrogen, liquid: 4.47612e-9 kg; lognormal variance with pedigree 0.0032, pedigree (1,3,3,1,1)
  Amount and activity link based on primary data collected from participating companies.
- municipal solid waste: -1.07495e-7 kg; lognormal variance with pedigree 0.0032, pedigree (1,3,3,1,1)
  Amount and activity link based on primary data collected from participating companies.
  production volume 1.87739e9 kg
- manganese sulfate: 3.11228e-12 kg; lognormal variance with pedigree 0.0032, pedigree (1,3,3,1,1)
  Amount based on primary data collected from participating companies.
- municipal solid waste: -2.38556e-8 kg; lognormal variance with pedigree 0.0032, pedigree (1,3,3,1,1)
  Amount and activity link based on primary data collected from participating companies.
  production volume 4.16636e8 kg
- manganese dioxide: 1.02992e-9 kg; lognormal variance with pedigree 0.0032, pedigree (1,3,3,1,1)
  Amount based on primary data collected from participating companies.
- lead concentrate: 1.49884e-8 kg; lognormal variance with pedigree 0.0032, pedigree (1,3,3,1,1)
  Amount based on primary data collected from participating companies.
- iron(III) sulfate, without water, in 12.5% iron solution state: 2.09929e-10 kg; lognormal variance with pedigree 0.0032, pedigree (1,3,3,1,1)
  Amount based on primary data collected from participating companies.
- iron(III) chloride, without water, in 14% iron solution state: 5.038e-11 kg; lognormal variance with pedigree 0.0032, pedigree (1,3,3,1,1)
  Amount based on primary data collected from participating companies.
- hydrogen, liquid: 3.75501e-10 kg; lognormal variance with pedigree 0.0032, pedigree (1,3,3,1,1)
  Amount based on primary data collected from participating companies.
- ferrite: 5.79718e-10 kg; lognormal variance with pedigree 0.0032, pedigree (1,3,3,1,1)
  Amount based on primary data collected from participating companies.
- ethanol, without water, in 99.7% solution state, from ethylene: 2.51179e-11, 5.59298e-11 kg (2 entries); lognormal variance with pedigree 0.0032, pedigree (1,3,3,1,1)
  Amount based on primary data collected from participating companies.
- water, deionised: 3.9169e-9, 1.0881e-6, 3.53232e-6 kg (3 entries); lognormal variance with pedigree 0.0032, pedigree (1,3,3,1,1)
  Amount based on primary data collected from participating companies.
- waste wood, untreated: -1.24933e-10 kg; lognormal variance with pedigree 0.0032, pedigree (1,3,3,1,1)
  Amount based on primary data collected from participating companies.
  production volume 4.40738e6 kg
- clinker: 1.30121e-9, 2.93268e-10, 6.80248e-11, 5.21921e-11, 8.72051e-11, 2.12303e-11, 4.13505e-9 kg (7 entries); lognormal variance with pedigree 0.0032, pedigree (1,3,3,1,1)
  Amount based on primary data collected from participating companies.
- chlorine, liquid: 3.09989e-13, 1.54965e-12 kg (2 entries); lognormal variance with pedigree 0.0032, pedigree (1,3,3,1,1)
  Amount based on primary data collected from participating companies.
- diesel: 3.88457e-10, 1.86748e-11, 7.83996e-10, 5.49157e-11, 7.93742e-11, 7.74156e-9 kg (6 entries); lognormal variance with pedigree 0.0032, pedigree (1,3,3,1,1)
  Amount based on primary data collected from participating companies. Emissions from diesel combustion included in dataset.
- cement, unspecified: 1.09437e-10, 9.07171e-12, 2.28467e-11, 5.25959e-10, 5.16686e-10, 1.52076e-11, 1.67024e-10, 2.02081e-11, 2.2571e-9 kg (9 entries); lognormal variance with pedigree 0.0032, pedigree (1,3,3,1,1)
  Amount based on primary data collected from participating companies.
- ammonia, liquid: 1.87969e-9, 1.64574e-8 kg (2 entries); lognormal variance with pedigree 0.0032, pedigree (1,3,3,1,1)
  Amount based on primary data collected from participating companies.
- sodium hypochlorite, without water, in 15% solution state: 2.78738e-12, 1.3232e-11 kg (2 entries); lognormal variance with pedigree 0.0032, pedigree (1,3,3,1,1)
  Amount based on primary data collected from participating companies.
- steam, in chemical industry: 1.14969e-12, 6.52072e-12 kg (2 entries); lognormal variance with pedigree 0.0032, pedigree (1,3,3,1,1)
  Amount based on primary data collected from participating companies.
- aluminium sulfate, powder: 7.65619e-12, 3.63449e-11 kg (2 entries); lognormal variance with pedigree 0.0032, pedigree (1,3,3,1,1)
  Amount based on primary data collected from participating companies.
- waste textile, soiled: -3.92459e-11, -2.62209e-9 kg (2 entries); lognormal variance with pedigree 0.0032, pedigree (1,3,3,1,1)
  Amount based on primary data collected from participating companies.
  production volume 4.64799e7 kg
- wastewater, average: -1.28339e-12, -1.18633e-11 m3 (2 entries); lognormal variance with pedigree 0.0032, pedigree (1,3,3,1,1)
  Amount based on primary data collected from participating companies.
  production volume 663094 m3
- waste paperboard: -2.44593e-13, -3.73505e-14, -1.34963e-13, -2.43606e-14, -6.00688e-13, -4.54372e-12 kg (6 entries); lognormal variance with pedigree 0.0032, pedigree (1,3,3,1,1)
  Amount based on primary data collected from participating companies.
  production volume 97840.1 kg
- waste paperboard: 0, 0 kg (2 entries); pedigree (1,1,1,1,1)
  Amount based on primary data collected from participating companies.
- waste gypsum: -6.4991e-12, -1.37486e-10, -4.47634e-10 kg (3 entries); lognormal variance with pedigree 0.0032, pedigree (1,3,3,1,1)
  Amount based on primary data collected from participating companies.
  production volume 1.03326e7 kg
- sludge, pig iron production: -9.1651e-12, -2.06607e-10, -1.0023e-9 kg (3 entries); lognormal variance with pedigree 0.0032, pedigree (1,3,3,1,1)
  Amount based on primary data collected from participating companies.
  production volume 2.12735e7 kg
- natural gas, high pressure: 2.64798e-12, 3.97422e-11, 6.61595e-11, 3.7293e-10, 1.26667e-9 m3 (5 entries); lognormal variance with pedigree 0.0032, pedigree (1,3,3,1,1)
  Amount based on primary data collected from participating companies. Emissions from fuel combustion included in dataset.
- waste polyethylene terephthalate: -3.68801e-14, -3.19633e-14, -2.58181e-13 kg (3 entries); lognormal variance with pedigree 0.0032, pedigree (1,3,3,1,1)
  Amount based on primary data collected from participating companies.
  production volume 5799.57 kg
- waste polyethylene terephthalate: 0, 0, 0, 0, 0 kg (5 entries); pedigree (1,1,1,1,1)
  Amount based on primary data collected from participating companies.
- meat and bone meal: 0 kg; pedigree (1,1,1,1,1)
  Amount based on primary data collected from participating companies.
- meat and bone meal: 2.45776e-12 kg; lognormal variance with pedigree 0.0032, pedigree (1,3,3,1,1)
  Amount based on primary data collected from participating companies.
- liquefied petroleum gas: 5.86361e-12, 5.10952e-11, 2.08266e-11, 1.84073e-12, 4.09703e-13, 2.5986e-13, 8.77719e-11 kg (7 entries); lognormal variance with pedigree 0.0032, pedigree (1,3,3,1,1)
  Amount based on primary data collected from participating companies.
- light fuel oil: 1.99784e-11, 2.88121e-12, 4.03212e-11, 2.67567e-12, 3.87694e-12, 4.06227e-10 kg (6 entries); lognormal variance with pedigree 0.0032, pedigree (1,3,3,1,1)
  Amount based on primary data collected from participating companies.
- hydrochloric acid, without water, in 30% solution state: 3.38665e-11, 1.51372e-10 kg (2 entries); lognormal variance with pedigree 0.0032, pedigree (1,3,3,1,1)
  Amount based on primary data collected from participating companies.
- heavy fuel oil: 3.42545e-11, 8.92377e-12, 2.64176e-11, 5.19643e-12, 6.66625e-12, 1.2723e-10, 6.17552e-10 kg (7 entries); lognormal variance with pedigree 0.0032, pedigree (1,3,3,1,1)
  Amount based on primary data collected from participating companies.
- hard coal: 6.66513e-10, 1.79356e-9, 1.1012e-9, 1.0791e-9, 2.56063e-10, 8.40176e-10, 4.68297e-10, 2.37984e-9 kg (8 entries); lognormal variance with pedigree 0.0032, pedigree (1,3,3,1,1)
  Amount based on primary data collected from participating companies.
- esterquat: 3.12038e-13, 6.2116e-13 kg (2 entries); lognormal variance with pedigree 0.0032, pedigree (1,3,3,1,1)
  Amount based on primary data collected from participating companies.

## Inputs from nature
- Water, unspecified natural origin [natural resource, in water]: 2.3436e-7 m3; source European Aluminium Association 2008; lognormal variance with pedigree 0.0492, pedigree (2,5,5,1,1)
  Reported as "water - input"
- Water, river [natural resource, in water]: 1.6235e-8 m3; source Althaus H.-J. 2004; lognormal variance with pedigree 0.098, pedigree (4,5,5,5,4)
  Literature value.
- Dolomite, in ground [natural resource, in ground]: 9.54728e-14 kg; lognormal variance with pedigree 0.0032, pedigree (1,3,3,1,1)
  Amount and activity link based on primary data collected from participating companies.
- Water, lake [natural resource, in water]: 3.07461e-11 m3; lognormal variance with pedigree 0.0032, pedigree (1,3,3,1,1)
  Amount and activity link based on primary data collected from participating companies.
- Sulfur, in ground [natural resource, in ground]: 2.96128e-10 kg; lognormal variance with pedigree 0.0032, pedigree (1,3,3,1,1)
  Amount and activity link based on primary data collected from participating companies.
- Water, cooling, unspecified natural origin [natural resource, in water]: 3.70203e-8 m3; lognormal variance with pedigree 0.0032, pedigree (1,3,3,1,1)
  Amount and activity link based on primary data collected from participating companies.
- Strontium, in ground [natural resource, in ground]: 1.21237e-12 kg; lognormal variance with pedigree 0.0032, pedigree (1,3,3,1,1)
  Amount and activity link based on primary data collected from participating companies.
- Copper, in ground [natural resource, in ground]: 6.96095e-10 kg; lognormal variance with pedigree 0.0032, pedigree (1,3,3,1,1)
  Amount and activity link based on primary data collected from participating companies.
- Aluminium, in ground [natural resource, in ground]: 8.9939e-11 kg; lognormal variance with pedigree 0.0032, pedigree (1,3,3,1,1)
  Amount and activity link based on primary data collected from participating companies.
- Gangue, in ground [natural resource, in ground]: 8.41992e-7 kg; lognormal variance with pedigree 0.0032, pedigree (1,3,3,1,1)
  Amount and activity link based on primary data collected from participating companies.
- Gold, in ground [natural resource, in ground]: 5.79004e-11 kg; lognormal variance with pedigree 0.0032, pedigree (1,3,3,1,1)
  Amount and activity link based on primary data collected from participating companies.
- Vanadium, in ground [natural resource, in ground]: 1.15046e-13 kg; lognormal variance with pedigree 0.0032, pedigree (1,3,3,1,1)
  Amount and activity link based on primary data collected from participating companies.
- Zinc, in ground [natural resource, in ground]: 2.51666e-8 kg; lognormal variance with pedigree 0.0032, pedigree (1,3,3,1,1)
  Amount and activity link based on primary data collected from participating companies.
- Titanium, in ground [natural resource, in ground]: 4.24761e-12 kg; lognormal variance with pedigree 0.0032, pedigree (1,3,3,1,1)
  Amount and activity link based on primary data collected from participating companies.
- Sodium, in ground [natural resource, in ground]: 3.43935e-12 kg; lognormal variance with pedigree 0.0032, pedigree (1,3,3,1,1)
  Amount and activity link based on primary data collected from participating companies.
- Nickel, in ground [natural resource, in ground]: 6.7755e-14 kg; lognormal variance with pedigree 0.0032, pedigree (1,3,3,1,1)
  Amount and activity link based on primary data collected from participating companies.
- Silver, in ground [natural resource, in ground]: 9.19056e-12 kg; lognormal variance with pedigree 0.0032, pedigree (1,3,3,1,1)
  Amount and activity link based on primary data collected from participating companies.
- Potassium, in ground [natural resource, in ground]: 1.12639e-10 kg; lognormal variance with pedigree 0.0032, pedigree (1,3,3,1,1)
  Amount and activity link based on primary data collected from participating companies.
- Manganese, in ground [natural resource, in ground]: 6.50603e-12 kg; lognormal variance with pedigree 0.0032, pedigree (1,3,3,1,1)
  Amount and activity link based on primary data collected from participating companies.
- Magnesium, in ground [natural resource, in ground]: 1.78674e-9 kg; lognormal variance with pedigree 0.0032, pedigree (1,3,3,1,1)
  Amount and activity link based on primary data collected from participating companies.
- Phosphorus, in ground [natural resource, in ground]: 7.68697e-13 kg; lognormal variance with pedigree 0.0032, pedigree (1,3,3,1,1)
  Amount and activity link based on primary data collected from participating companies.
- Iron, in ground [natural resource, in ground]: 1.12811e-10 kg; lognormal variance with pedigree 0.0032, pedigree (1,3,3,1,1)
  Amount and activity link based on primary data collected from participating companies.
- Mercury, in ground [natural resource, in ground]: 0 kg; pedigree (1,1,1,1,1)
  Amount and activity link based on primary data collected from participating companies.
- Lead, in ground [natural resource, in ground]: 5.38095e-9 kg; lognormal variance with pedigree 0.0032, pedigree (1,3,3,1,1)
  Amount and activity link based on primary data collected from participating companies.
- Sand, unspecified, in ground [natural resource, in ground]: 4.52196e-12 kg; lognormal variance with pedigree 0.0032, pedigree (1,3,3,1,1)
  Amount and activity link based on primary data collected from participating companies.
- Cadmium, in ground [natural resource, in ground]: 2.95784e-12 kg; lognormal variance with pedigree 0.0032, pedigree (1,3,3,1,1)
  Amount and activity link based on primary data collected from participating companies.
- Calcium, in ground [natural resource, in ground]: 3.12568e-9 kg; lognormal variance with pedigree 0.0032, pedigree (1,3,3,1,1)
  Amount and activity link based on primary data collected from participating companies.
- Barium, in ground [natural resource, in ground]: 4.78071e-13 kg; lognormal variance with pedigree 0.0032, pedigree (1,3,3,1,1)
  Amount and activity link based on primary data collected from participating companies.
- Water, well, in ground [natural resource, in water]: 6.28016e-10 m3; lognormal variance with pedigree 0.0032, pedigree (1,3,3,1,1)
  Amount and activity link based on primary data collected from participating companies.
- Chromium, in ground [natural resource, in ground]: 1.11091e-13 kg; lognormal variance with pedigree 0.0032, pedigree (1,3,3,1,1)
  Amount and activity link based on primary data collected from participating companies.
- Occupation, industrial area [natural resource, land]: 0.0729416 m2*year; lognormal variance with pedigree 0.008, pedigree (1,1,4,1,1)
  (same comment as for polyethylene, linear low density, granulate)
- Transformation, from unspecified [natural resource, land]: 0.000895843 m2; lognormal variance with pedigree 0.008, pedigree (1,1,4,1,1)
  (same comment as for polyethylene, linear low density, granulate)
- Transformation, to industrial area [natural resource, land]: 0.0018554 m2; lognormal variance with pedigree 0.008, pedigree (1,1,4,1,1)
  (same comment as for polyethylene, linear low density, granulate)
- Transformation, from pasture, man made [natural resource, land]: 0.000959552 m2; source ENERCON GmbH 2010; lognormal variance with pedigree 0.0481, pedigree (1,1,4,3,1)
  Literature value
  Uncertainty: Estimated variance.
- Transformation, to urban, continuously built [natural resource, land]: 3.10637e-5 m2; lognormal variance with pedigree 0.242225, pedigree (1,4,2,2,5)
  Calculated value. Based on survey data.
- Occupation, urban, continuously built [natural resource, land]: 0.00232978 m2*year; lognormal variance with pedigree 0.162225, pedigree (1,4,2,2,5)
  Calculated value. Based on survey data, the gross floor area multiplied by the lifetime of the building.
- Transformation, from urban, continuously built [natural resource, land]: 1.70612e-5 m2; lognormal variance with pedigree 0.242225, pedigree (1,4,2,2,5)
  Calculated value. Based on survey data.
- Transformation, from urban, green area [natural resource, land]: 1.40024e-5 m2; lognormal variance with pedigree 0.242225, pedigree (1,4,2,2,5)
  Calculated value. Based on survey data.

## Emissions to nature
- Particulates, < 2.5 um [air, unspecified]: 5.1847e-12 kg; = 8e-5*32%; source European Aluminium Association 2008; lognormal variance with pedigree 0.3886, pedigree (2,5,5,1,4)
  Reported as dust emissions to air. Split between three classes of particulates based on CEPMIEP database: 32% <2.5 um, 48% >2.5<10 um, 20% > 10 um. Assumed process emissions and not combustion emissions.
  Uncertainty: Uncertainty accounts for use of CEPMEIP database to split total particulates among the three particulate classes.
- Particulates, > 2.5 um, and < 10um [air, unspecified]: 1.36634e-11 kg; = 8e-5*48%; source European Aluminium Association 2008; lognormal variance with pedigree 0.2086, pedigree (2,5,5,1,4)
  Reported as dust emissions to air. Split between three classes of particulates based on CEPMIEP database: 32% <2.5 um, 48% >2.5<10 um, 20% > 10 um . Assumed process emissions and not combustion emissions.
  Uncertainty: Uncertainty accounts for use of CEPMEIP database to split total particulates among the three particulate classes.
- Particulates, > 10 um [air, unspecified]: 2.22543e-10 kg; = 8e-5*20%; source European Aluminium Association 2008; lognormal variance with pedigree 0.1286, pedigree (2,5,5,1,4)
  (same comment as for Particulates, > 2.5 um, and < 10um)
- Hydrogen chloride [air, unspecified]: 7.76746e-13 kg; source European Aluminium Association 2008; lognormal variance with pedigree 0.0886, pedigree (2,5,5,1,1)
- Water [air, unspecified]: 9.95962e-7 m3; lognormal variance with pedigree 0.130025, pedigree (4,4,5,2,4)
  Calculated value based on literature values and expert opinion. See comments in the parametres' comment field.
- Water [water, unspecified]: 3.3857e-7 m3; lognormal variance with pedigree 0.130025, pedigree (4,4,5,2,4)
  (same comment as for Water)
- Fluoride [water, surface water]: 4.81769e-12 kg; lognormal variance with pedigree 0.7021, pedigree (1,4,5,3,1)
  Data of 1 European plant - reported in Fisher (2006)
  Uncertainty: data of 1 European plant - reported in Fisher (2006)
- Nickel, ion [water, surface water]: 0 kg; pedigree (1,1,1,1,1)
  (same comment as for Fluoride)
- DOC, Dissolved Organic Carbon [water, surface water]: 3.35612e-10 kg; lognormal variance with pedigree 0.0921, pedigree (1,4,5,3,1)
  Calculated as equal to TOC.
  Uncertainty: data of 1 European plant - reported in Fisher (2006)
- TOC, Total Organic Carbon [water, surface water]: 3.35612e-10 kg; lognormal variance with pedigree 0.0921, pedigree (1,4,5,3,1)
  Calculated by default as TOC (gC) = COD/2.7 (COD measured in g O2). Should more correctly be calculated from the carbon content of the specified emissions to water.
  Uncertainty: data of 1 European plant - reported in Fisher (2006)
- BOD5, Biological Oxygen Demand [water, surface water]: 1.27576e-10 kg; lognormal variance with pedigree 0.0921, pedigree (1,4,5,3,1)
  Calculated as 0.5*COD.
  Uncertainty: data of 1 European plant - reported in Fisher (2006)
- Suspended solids, unspecified [water, surface water]: 2.46863e-11 kg; lognormal variance with pedigree 0.0921, pedigree (1,4,5,3,1)
  (same comment as for Fluoride)
- COD, Chemical Oxygen Demand [water, surface water]: 9.19732e-10 kg; lognormal variance with pedigree 0.0921, pedigree (1,4,5,3,1)
  (same comment as for Fluoride)
- Copper, ion [water, surface water]: 6.46305e-13 kg; lognormal variance with pedigree 0.7021, pedigree (1,4,5,3,1)
  (same comment as for Fluoride)
- Lead [soil, industrial]: 0 kg; pedigree (1,1,1,1,1)
  Amount and activity link based on primary data collected from participating companies.
- Sulfur dioxide [air, unspecified]: 3.1569e-9 kg; lognormal variance with pedigree 0.0032, pedigree (1,3,3,1,1)
  Amount and activity link based on primary data collected from participating companies.
- Ammonia [air, unspecified]: 2.81873e-11 kg; lognormal variance with pedigree 0.0426, pedigree (1,3,3,1,1)
  Amount and activity link based on primary data collected from participating companies.
- Suspended solids, unspecified [water, ocean]: 6.06207e-12 kg; lognormal variance with pedigree 0.0426, pedigree (1,3,3,1,1)
  Amount and activity link based on primary data collected from participating companies.
- Ammonium, ion [water, surface water]: 1.78491e-11 kg; lognormal variance with pedigree 0.0426, pedigree (1,3,3,1,1)
  Amount and activity link based on primary data collected from participating companies.
- Hydrocarbons, unspecified [soil, unspecified]: 2.76475e-14 kg; lognormal variance with pedigree 0.0426, pedigree (1,3,3,1,1)
  Amount and activity link based on primary data collected from participating companies.
- Selenium [air, unspecified]: 0 kg; pedigree (1,1,1,1,1)
  Amount and activity link based on primary data collected from participating companies.
- Antimony [water, surface water]: 6.91595e-13 kg; lognormal variance with pedigree 0.6526, pedigree (1,3,3,1,1)
  Amount and activity link based on primary data collected from participating companies.
- Fluoride [soil, industrial]: 5.55651e-14 kg; lognormal variance with pedigree 0.0426, pedigree (1,3,3,1,1)
  Amount and activity link based on primary data collected from participating companies.
- Sodium [soil, industrial]: 0 kg; pedigree (1,1,1,1,1)
  Amount and activity link based on primary data collected from participating companies.
- Benzene [air, unspecified]: 5.32161e-14 kg; lognormal variance with pedigree 0.0426, pedigree (1,3,3,1,1)
  Amount and activity link based on primary data collected from participating companies.
- Lead [air, unspecified]: 6.28251e-12 kg; lognormal variance with pedigree 0.6526, pedigree (1,3,3,1,1)
  Amount and activity link based on primary data collected from participating companies.
- Sulfate [soil, unspecified]: 0 kg; pedigree (1,1,1,1,1)
  Amount and activity link based on primary data collected from participating companies.
- Aluminium [water, surface water]: 2.84094e-13 kg; lognormal variance with pedigree 0.6526, pedigree (1,3,3,1,1)
  Amount and activity link based on primary data collected from participating companies.
- Fluorine [air, unspecified]: 9.9728e-14 kg; lognormal variance with pedigree 0.0426, pedigree (1,3,3,1,1)
  Amount and activity link based on primary data collected from participating companies.
- Zinc [soil, industrial]: 2.43368e-13 kg; lognormal variance with pedigree 0.0426, pedigree (1,3,3,1,1)
  Amount and activity link based on primary data collected from participating companies.
- Sulfate [water, surface water]: 1.10436e-9 kg; lognormal variance with pedigree 0.0426, pedigree (1,3,3,1,1)
  Amount and activity link based on primary data collected from participating companies.
- Arsenic, ion [water, ocean]: 9.07812e-14 kg; lognormal variance with pedigree 0.6526, pedigree (1,3,3,1,1)
  Amount and activity link based on primary data collected from participating companies.
- Dissolved solids [water, surface water]: 1.94316e-10 kg; lognormal variance with pedigree 0.0426, pedigree (1,3,3,1,1)
  Amount and activity link based on primary data collected from participating companies.
- Zinc, ion [water, ocean]: 2.23886e-12 kg; lognormal variance with pedigree 0.6526, pedigree (1,3,3,1,1)
  Amount and activity link based on primary data collected from participating companies.
- Selenium [water, surface water]: 3.12697e-14 kg; lognormal variance with pedigree 0.6526, pedigree (1,3,3,1,1)
  Amount and activity link based on primary data collected from participating companies.
- Antimony [air, unspecified]: 7.30408e-14 kg; lognormal variance with pedigree 0.6526, pedigree (1,3,3,1,1)
  Amount and activity link based on primary data collected from participating companies.
- Fluoride [water, ocean]: 3.53984e-12 kg; lognormal variance with pedigree 0.0426, pedigree (1,3,3,1,1)
  Amount and activity link based on primary data collected from participating companies.
- Aldehydes, unspecified [air, unspecified]: 0 kg; pedigree (1,1,1,1,1)
  Amount and activity link based on primary data collected from participating companies.
- Formaldehyde [air, unspecified]: 2.29796e-13 kg; lognormal variance with pedigree 0.0426, pedigree (1,3,3,1,1)
  Amount and activity link based on primary data collected from participating companies.
- Zinc, ion [water, surface water]: 2.17035e-11 kg; lognormal variance with pedigree 0.6526, pedigree (1,3,3,1,1)
  Amount and activity link based on primary data collected from participating companies.
- Phosphorus [water, surface water]: 3.26757e-13 kg; lognormal variance with pedigree 0.0426, pedigree (1,3,3,1,1)
  Amount and activity link based on primary data collected from participating companies.
- Sodium, ion [water, surface water]: 1.80979e-10 kg; lognormal variance with pedigree 0.0426, pedigree (1,3,3,1,1)
  Amount and activity link based on primary data collected from participating companies.
- Dioxins, measured as 2,3,7,8-tetrachlorodibenzo-p-dioxin [air, unspecified]: 0 kg; pedigree (1,1,1,1,1)
  Amount and activity link based on primary data collected from participating companies.
- Potassium, ion [water, surface water]: 2.2954e-12 kg; lognormal variance with pedigree 0.0426, pedigree (1,3,3,1,1)
  Amount and activity link based on primary data collected from participating companies.
- Cyanide [water, surface water]: 0 kg; pedigree (1,1,1,1,1)
  Amount and activity link based on primary data collected from participating companies.
- COD, Chemical Oxygen Demand [water, ocean]: 8.6551e-12 kg; source Weidema B P 2013; lognormal variance with pedigree 0.25, pedigree (5,5,5,5,5)
  Calculated value. The amount of COD is assumed to be five times that of BOD5, based on the estimates provided in section 5.9.7 of Weidema et al. (2013).
- Copper, ion [water, ocean]: 2.87694e-14 kg; lognormal variance with pedigree 0.6526, pedigree (1,3,3,1,1)
  Amount and activity link based on primary data collected from participating companies.
- Nitrogen oxides [air, unspecified]: 6.98925e-9 kg; lognormal variance with pedigree 0.0426, pedigree (1,3,3,1,1)
  Amount and activity link based on primary data collected from participating companies.
- Cobalt [air, unspecified]: 3.48865e-14 kg; lognormal variance with pedigree 0.6526, pedigree (1,3,3,1,1)
  Amount and activity link based on primary data collected from participating companies.
- Nitrogen, organic bound [water, surface water]: 8.59255e-13 kg; lognormal variance with pedigree 0.0426, pedigree (1,3,3,1,1)
  Amount and activity link based on primary data collected from participating companies.
- DOC, Dissolved Organic Carbon [water, ocean]: 0 kg; pedigree (1,1,1,1,1)
  Calculated value. The amount of DOC is assumed to be equal to the amount of TOC
- Chromium VI [water, surface water]: 4.76484e-12 kg; lognormal variance with pedigree 0.6526, pedigree (1,3,3,1,1)
  Amount and activity link based on primary data collected from participating companies.
- Nitrogen [water, surface water]: 4.33738e-13 kg; lognormal variance with pedigree 0.0426, pedigree (1,3,3,1,1)
  Amount and activity link based on primary data collected from participating companies.
- TOC, Total Organic Carbon [water, ocean]: 0 kg; source Weidema B P 2013; pedigree (1,1,1,1,1)
  Calculated value. The relation between COD and TOC is assumed to be COD (g O2) = 2.7*TOC (g C), based on the estimates provided in section 5.9.7 of Weidema et al. (2013).
- Chromium [soil, industrial]: 0 kg; pedigree (1,1,1,1,1)
  Amount and activity link based on primary data collected from participating companies.
- Nitric acid [soil, industrial]: 0 kg; pedigree (1,1,1,1,1)
  Amount and activity link based on primary data collected from participating companies.
- NMVOC, non-methane volatile organic compounds, unspecified origin [air, unspecified]: 1.50283e-5 kg; lognormal variance with pedigree 0.0426, pedigree (1,3,3,1,1)
  Amount and activity link based on primary data collected from participating companies.
- Copper [soil, industrial]: 9.42156e-14 kg; lognormal variance with pedigree 0.0426, pedigree (1,3,3,1,1)
  Amount and activity link based on primary data collected from participating companies.
- PAH, polycyclic aromatic hydrocarbons [air, unspecified]: 0 kg; pedigree (1,1,1,1,1)
  Amount and activity link based on primary data collected from participating companies.
- Chromium VI [air, unspecified]: 0 kg; pedigree (1,1,1,1,1)
  Amount and activity link based on primary data collected from participating companies.
- Nickel [soil, industrial]: 0 kg; pedigree (1,1,1,1,1)
  Amount and activity link based on primary data collected from participating companies.
- Chromium [air, unspecified]: 0 kg; pedigree (1,1,1,1,1)
  Amount and activity link based on primary data collected from participating companies.
- Nitrogen [soil, industrial]: 7.04765e-14 kg; lognormal variance with pedigree 0.0426, pedigree (1,3,3,1,1)
  Amount and activity link based on primary data collected from participating companies.
- Copper [air, unspecified]: 3.0105e-12 kg; lognormal variance with pedigree 0.6526, pedigree (1,3,3,1,1)
  Amount and activity link based on primary data collected from participating companies.
- Nickel [air, unspecified]: 3.35988e-14 kg; lognormal variance with pedigree 0.6526, pedigree (1,3,3,1,1)
  Amount and activity link based on primary data collected from participating companies.
- Ammonia [soil, industrial]: 2.29184e-14 kg; lognormal variance with pedigree 0.0426, pedigree (1,3,3,1,1)
  Amount and activity link based on primary data collected from participating companies.
- Carbon dioxide, non-fossil [air, unspecified]: 8.99839e-11 kg; lognormal variance with pedigree 0.0032, pedigree (1,3,3,1,1)
  Amount and activity link based on primary data collected from participating companies.
- Nitrate [water, surface water]: 3.05563e-11 kg; lognormal variance with pedigree 0.0426, pedigree (1,3,3,1,1)
  Amount and activity link based on primary data collected from participating companies.
- Chlorine [water, surface water]: 2.75359e-12 kg; lognormal variance with pedigree 0.0426, pedigree (1,3,3,1,1)
  Amount and activity link based on primary data collected from participating companies.
- Nickel, ion [water, ocean]: 0 kg; pedigree (1,1,1,1,1)
  Amount and activity link based on primary data collected from participating companies.
- Carbon monoxide, fossil [air, unspecified]: 5.33769e-11 kg; lognormal variance with pedigree 0.6526, pedigree (1,3,3,1,1)
  Amount and activity link based on primary data collected from participating companies.
- Methane, fossil [air, unspecified]: 2.87244e-12 kg; lognormal variance with pedigree 0.0426, pedigree (1,3,3,1,1)
  Amount and activity link based on primary data collected from participating companies.
- Calcium, ion [water, surface water]: 1.06487e-10 kg; lognormal variance with pedigree 0.0426, pedigree (1,3,3,1,1)
  Amount and activity link based on primary data collected from participating companies.
- Methanol [air, unspecified]: 1.12595e-12 kg; lognormal variance with pedigree 0.0426, pedigree (1,3,3,1,1)
  Amount and activity link based on primary data collected from participating companies.
- Chloride [water, surface water]: 1.36457e-10 kg; lognormal variance with pedigree 0.0426, pedigree (1,3,3,1,1)
  Amount and activity link based on primary data collected from participating companies.
- Mercury [air, unspecified]: 3.22023e-14 kg; lognormal variance with pedigree 0.6526, pedigree (1,3,3,1,1)
  Amount and activity link based on primary data collected from participating companies.
- Mercury [water, surface water]: 1.65957e-14 kg; lognormal variance with pedigree 0.6526, pedigree (1,3,3,1,1)
  Amount and activity link based on primary data collected from participating companies.
- Calcium [soil, industrial]: 0 kg; pedigree (1,1,1,1,1)
  Amount and activity link based on primary data collected from participating companies.
- Mercury [soil, industrial]: 0 kg; pedigree (1,1,1,1,1)
  Amount and activity link based on primary data collected from participating companies.
- Cadmium, ion [water, surface water]: 1.78905e-13 kg; lognormal variance with pedigree 0.6526, pedigree (1,3,3,1,1)
  Amount and activity link based on primary data collected from participating companies.
- Magnesium [water, surface water]: 1.13976e-10 kg; lognormal variance with pedigree 0.0426, pedigree (1,3,3,1,1)
  Amount and activity link based on primary data collected from participating companies.
- Beryllium [air, unspecified]: 0 kg; pedigree (1,1,1,1,1)
  Amount and activity link based on primary data collected from participating companies.
- Manganese [soil, industrial]: 5.25882e-14 kg; lognormal variance with pedigree 0.0426, pedigree (1,3,3,1,1)
  Amount and activity link based on primary data collected from participating companies.
- Cadmium [air, unspecified]: 4.16725e-12 kg; lognormal variance with pedigree 0.6526, pedigree (1,3,3,1,1)
  Amount and activity link based on primary data collected from participating companies.
- Manganese [water, ocean]: 0 kg; pedigree (1,1,1,1,1)
  Amount and activity link based on primary data collected from participating companies.
- BOD5, Biological Oxygen Demand [water, ocean]: 0 kg; pedigree (1,1,1,1,1)
  Amount and activity link based on primary data collected from participating companies.
- Mercury [water, ocean]: 0 kg; pedigree (1,1,1,1,1)
  Amount and activity link based on primary data collected from participating companies.
- Carbon dioxide, fossil [air, unspecified]: 1.72946e-7 kg; lognormal variance with pedigree 0.0032, pedigree (1,3,3,1,1)
  Amount and activity link based on primary data collected from participating companies. Accounts for on-site combustion of diesel at mine. Some companies provided emissions on the combustion of natural gas, diesel, propane, or other fuels, which are included here. If no emissions were provided for these other fuels then input is reflected as a an input of heat instead of a direct fuel input.
- Lead [water, surface water]: 5.48006e-13 kg; lognormal variance with pedigree 0.6526, pedigree (1,3,3,1,1)
  Amount and activity link based on primary data collected from participating companies.
- Cadmium [soil, industrial]: 0 kg; pedigree (1,1,1,1,1)
  Amount and activity link based on primary data collected from participating companies.
- Manganese [air, unspecified]: 2.07747e-13 kg; lognormal variance with pedigree 0.6526, pedigree (1,3,3,1,1)
  Amount and activity link based on primary data collected from participating companies.
- Water [water, surface water]: 2.68882e-10 m3; lognormal variance with pedigree 0.0426, pedigree (1,3,3,1,1)
  Amount and activity link based on primary data collected from participating companies.
- Arsenic [soil, industrial]: 0 kg; pedigree (1,1,1,1,1)
  Amount and activity link based on primary data collected from participating companies.
- Manganese [water, surface water]: 1.12815e-11 kg; lognormal variance with pedigree 0.6526, pedigree (1,3,3,1,1)
  Amount and activity link based on primary data collected from participating companies.
- VOC, volatile organic compounds, unspecified origin [air, unspecified]: 1.78806e-13 kg; lognormal variance with pedigree 0.0426, pedigree (1,3,3,1,1)
  Amount and activity link based on primary data collected from participating companies.
- Cadmium, ion [water, ocean]: 7.58053e-14 kg; lognormal variance with pedigree 0.6526, pedigree (1,3,3,1,1)
  Amount and activity link based on primary data collected from participating companies.
- Lead [water, ocean]: 9.22867e-14 kg; lognormal variance with pedigree 0.6526, pedigree (1,3,3,1,1)
  Amount and activity link based on primary data collected from participating companies.
- Benzo(a)pyrene [air, unspecified]: 0 kg; pedigree (1,1,1,1,1)
  Amount and activity link based on primary data collected from participating companies.
- Hydrogen fluoride [air, unspecified]: 0 kg; pedigree (1,1,1,1,1)
  Amount and activity link based on primary data collected from participating companies.
- Sulfur oxides [air, unspecified]: 2.03416e-11 kg; lognormal variance with pedigree 0.0426, pedigree (1,3,3,1,1)
  Amount and activity link based on primary data collected from participating companies.
- Arsenic, ion [water, surface water]: 1.16453e-12 kg; lognormal variance with pedigree 0.6526, pedigree (1,3,3,1,1)
  Amount and activity link based on primary data collected from participating companies.
- Iron, ion [water, surface water]: 6.9799e-12 kg; lognormal variance with pedigree 0.6526, pedigree (1,3,3,1,1)
  Amount and activity link based on primary data collected from participating companies.
- Zinc [air, unspecified]: 4.33301e-11 kg; lognormal variance with pedigree 0.6526, pedigree (1,3,3,1,1)
  Amount and activity link based on primary data collected from participating companies.
- Arsenic [air, unspecified]: 2.88305e-13 kg; lognormal variance with pedigree 0.6526, pedigree (1,3,3,1,1)
  Amount and activity link based on primary data collected from participating companies.
- Phosphate [water, surface water]: 4.68696e-12 kg; lognormal variance with pedigree 0.1287, pedigree (4,3,5,3,4)
  Uncertainty: weight ratio scooter:passenger car
- COD, Chemical Oxygen Demand [water, unspecified]: 2.71388e-9 kg; source F. Habermacher 2011; lognormal variance with pedigree 0.0452, pedigree (1,4,3,4,2)
  Extrapolated from ecoinvent v2.2 passenger car.
- BOD5, Biological Oxygen Demand [water, unspecified]: 3.656e-10 kg; source F. Habermacher 2011; lognormal variance with pedigree 0.0832, pedigree (1,4,5,4,2)
  Extrapolated from ecoinvent v2.2 passenger car.
- TOC, Total Organic Carbon [water, unspecified]: 1.00514e-9 kg; lognormal variance with pedigree 0.0452, pedigree (1,4,3,4,2)
  Derived from COD as described in ecoinvent 3 Data Quality Guidelines (p. 49, paragraph 5.9.7). The same Pedigree matrix value as COD has been used.
- DOC, Dissolved Organic Carbon [water, unspecified]: 1.00514e-9 kg; lognormal variance with pedigree 0.0452, pedigree (1,4,3,4,2)
  (same comment as for TOC, Total Organic Carbon)
- Phosphate [water, unspecified]: 1.40615e-11 kg; source F. Habermacher 2011; lognormal variance with pedigree 0.0441, pedigree (1,4,3,3,1)
  Extrapolated from ecoinvent v2.2 passenger car.
- Molybdenum [air, unspecified]: 0 kg; pedigree (1,1,1,1,1)
  Amount based on primary data collected from participating companies.
- Hydrocarbons, unspecified [air, non-urban air or from high stacks]: 2.13969e-12 kg; lognormal variance with pedigree 0.0426, pedigree (1,3,3,1,1)
  Amount based on primary data collected from participating companies.
- Iron, ion [water, ocean]: 3.89324e-13 kg; lognormal variance with pedigree 0.6526, pedigree (1,3,3,1,1)
  Amount based on primary data collected from participating companies.
- Thallium [water, ocean]: 2.32849e-14 kg; lognormal variance with pedigree 0.6526, pedigree (1,3,3,1,1)
  Amount based on primary data collected from participating companies.
- Sulfur [soil, industrial]: 1.34099e-8 kg; lognormal variance with pedigree 0.0426, pedigree (1,3,3,1,1)
  Amount based on primary data collected from participating companies.
- Cyanide [water, ocean]: 0 kg; pedigree (1,1,1,1,1)
  Amount based on primary data collected from participating companies.
- Sulfuric acid [air, unspecified]: 2.51412e-11 kg; lognormal variance with pedigree 0.0426, pedigree (1,3,3,1,1)
  Amount based on primary data collected from participating companies.
- Chlorine [air, unspecified]: 6.85133e-14 kg; lognormal variance with pedigree 0.0426, pedigree (1,3,3,1,1)
  Amount based on primary data collected from participating companies.
- Phenol [water, surface water]: 0 kg; pedigree (1,1,1,1,1)
  Amount based on primary data collected from participating companies.
- Cobalt [water, surface water]: 0 kg; pedigree (1,1,1,1,1)
  Amount based on primary data collected from participating companies.
- Nitrogen [water, ocean]: 9.82527e-12 kg; lognormal variance with pedigree 0.0426, pedigree (1,3,3,1,1)
  Amount based on primary data collected from participating companies.
- Ammonium, ion [water, ocean]: 4.05772e-12 kg; lognormal variance with pedigree 0.0426, pedigree (1,3,3,1,1)
  Amount based on primary data collected from participating companies.
- Nitrate [water, ocean]: 5.05798e-13 kg; lognormal variance with pedigree 0.0426, pedigree (1,3,3,1,1)
  Amount based on primary data collected from participating companies.
- Nitrogen dioxide [water, surface water]: 2.86267e-14 kg; lognormal variance with pedigree 0.0426, pedigree (1,3,3,1,1)
  Amount based on primary data collected from participating companies.
- Acidity, unspecified [water, surface water]: 2.82054e-13 kg; lognormal variance with pedigree 0.0426, pedigree (1,3,3,1,1)
  Amount based on primary data collected from participating companies.
- Sulfuric acid [water, surface water]: 8.02045e-10 kg; lognormal variance with pedigree 0.0426, pedigree (1,3,3,1,1)
  Amount based on primary data collected from participating companies.

## Sampling procedure
Literature / Survey

## Extrapolations
The percent representativeness has been reported as zero for lack of information.
