# sulfur hexafluoride production, liquid

Dataset: EcoSpold 2, unit process
Geography: RER
Time period: 1998-01-01 to 2019-12-31
Technology level: current
Classification: ISIC rev.4 ecoinvent: 2011:Manufacture of basic chemicals
Classification: EcoSpold01Categories: chemicals/inorganics
Tags: ConvertedDataset
Scenario: Business-as-Usual
System model: Allocation at the point of substitution
Generated by: Niels Jungbluth
Published in: Althaus H.-J. 2007
Database: ecoinvent
isCopyrightProtected: true
accessRestrictedTo: 1

## General comment
About 80% of the produced amount is used for SF6 insulated electrical installations and switchgear manufacturers. The magnesium industry uses 5% of the total production.
[This dataset was already contained in the ecoinvent database version 2. It was not individually updated during the transfer to ecoinvent version 3. Life Cycle Impact Assessment results may still have changed, as they are affected by changes in the supply chain, i.e. in other datasets. This dataset was generated following the ecoinvent quality guidelines for version 2. It may have been subject to central changes described in the ecoinvent version 3 change report (http://www.ecoinvent.org/database/ecoinvent-version-3/reports-of-changes/), and the results of the central updates were reviewed extensively. The changes added e.g. consistent water flows and other information throughout the database. The documentation of this dataset can be found in the ecoinvent reports of version 2, which are still available via the ecoinvent website. The change report linked above covers all central changes that were made during the conversion process.]

## Included activities end
Production of SF6 from fluorine and sulphur. Infrastructure estimated with generic data. No data for energy use.

## Geography
Estimation for Europe

## Technology
Burning of sulphur in a stream of fluorine

## Time period
Time of publication

## Reference product
- sulfur hexafluoride, liquid: 1 kg; CPC 342: Basic inorganic chemicals n.e.c.; By-product classification allocatable product; CAS 2551-62-4
  EcoSpold01Location=RER
  production volume 1.32237 kg
    This is a placeholder value that does not reflect real-world production volumes. This dataset does not currently require a real-world production volume to work in the database framework, and no actual data were collected yet. This has no negative effect on the results of the ecoinvent database. The placeholder value of this activity was scaled according to the nominal GDP of 2005 (source: United Nations, http://data.un.org/Glossary.aspx?q=GDP+%28current+US%24%29, accessed 20130726) to reflect an appropriate share of the global production volume, which is also a placeholder value.
  property price 3.38734 EUR2005
    Calculated based on inputs: The price of the product has been calculated as a sum of the values of the material and energy inputs for this product. This value is therefore a rough estimation. It may underestimate the real price since there are additional expenses when producing any product. These expences can include for example labour costs, treatment of waste materials and profit for the producer. Please consider carefully whether this level of data quality is acceptable for your application. Cross-reference: The consumer price for sulfur hexafluoride, liquid is EURO for 5kg. ( , accessed 20160421)
  property carbon content 0
    carbon content on a dry matter basis (reserved; not for manual entry)
  properties: water content 0, dry mass 1 kg, wet mass 1 kg, carbon content, fossil 0, water in wet mass 0 kg, carbon content, non-fossil 0, carbon allocation 0 kg

## Inputs from technosphere
- sulfur: 0.219 kg; lognormal variance with pedigree 0.0641, pedigree (3,4,5,3,1)
  Literature
  EcoSpold01Location=RER
  Uncertainty: Literature
  properties: dry mass 1 kg, wet mass 1 kg
- fluorine, liquid: 0.781 kg; lognormal variance with pedigree 0.0721, pedigree (3,4,5,3,3)
  EcoSpold01Location=RER
  Other energy carriers possible
  Uncertainty: Other energy carriers possible
  properties: dry mass 1 kg, wet mass 1 kg
- chemical factory, organics: 4e-10 unit; lognormal variance with pedigree 0.628, pedigree (5,5,5,1,5)
  Rough estimation
  EcoSpold01Location=RER
  Uncertainty: Rough estimation

## Emissions to nature
- Sulfur hexafluoride [air, unspecified]: 0.005 kg; lognormal variance with pedigree 0.0721, pedigree (3,4,5,3,3)
  Literature
  Uncertainty: Literature

## Sampling procedure
Literature survey

## Extrapolations
This dataset has been extrapolated from year 1998 to the year of the calculation (2019). The uncertainty has been adjusted accordingly.

## Review by Roland Hischier 2003-05-28
Passed.
