# nuclear spent fuel reprocessing facility construction

Dataset: EcoSpold 2, unit process
Geography: RER
Time period: 1980-01-01 to 2019-12-31
Technology level: current
Classification: EcoSpold01Categories: nuclear power/waste treatment
Classification: ISIC rev.4 ecoinvent: 4100:Construction of buildings
Tags: ConvertedDataset
Scenario: Business-as-Usual
System model: Allocation at the point of substitution
Generated by: Roberto Dones
Published in: Dones, R. 2007
Database: ecoinvent
isCopyrightProtected: true
accessRestrictedTo: 1

## General comment
Data on material and energy for construction are relatively poor, sometimes the only available were from non-realised projects (in USA and DE). The THORP plant (BNFL, Sellafield, UK) and its adjoint facilities (for vitrification and conditioning of waste from light water reactors) have been used as main reference for the estimation of the infrastructure, although for the operation most of the data are for UP2 and UP3 plants (Cogema, La Hague, FR). Annual design throughput is 1200 tonne heavy metal. Extrapolations have been made to take into account visual estimations and aerial photos of the facilities. No direct emissions during construction are considered, only indirect through the energy (and material) requirements. Decommissioning is only very roughly described. Only non-radioactive wastes from dismantling are accounded for, because low radioactive wastes are attributed to operation.
[This dataset was already contained in the ecoinvent database version 2. It was not individually updated during the transfer to ecoinvent version 3. Life Cycle Impact Assessment results may still have changed, as they are affected by changes in the supply chain, i.e. in other datasets. This dataset was generated following the ecoinvent quality guidelines for version 2. It may have been subject to central changes described in the ecoinvent version 3 change report (http://www.ecoinvent.org/database/ecoinvent-version-3/reports-of-changes/), and the results of the central updates were reviewed extensively. The changes added e.g. consistent water flows and other information throughout the database. The documentation of this dataset can be found in the ecoinvent reports of version 2, which are still available via the ecoinvent website. The change report linked above covers all central changes that were made during the conversion process.]

## Included activities end
The module includes an estimation of the main material and energy use for the construction and the decommissioning of the facility. Land use, transport requirements, excavation for foundation, and disposal of inerts from decommissioning of the plant are also accounted for.

## Geography
European facilities.

## Technology
Current commercial facilities.

## Reference product
- nuclear spent fuel reprocessing facility: 1 unit; By-product classification allocatable product; CPC 54290: General construction services of other civil engineering works
  EcoSpold01Location=RER
  production volume 1.32237 unit
    This is a placeholder value that does not reflect real-world production volumes. This dataset does not currently require a real-world production volume to work in the database framework, and no actual data were collected yet. This has no negative effect on the results of the ecoinvent database. The placeholder value of this activity was scaled according to the nominal GDP of 2005 (source: United Nations, http://data.un.org/Glossary.aspx?q=GDP+%28current+US%24%29, accessed 20130726) to reflect an appropriate share of the global production volume, which is also a placeholder value.
  property price 2.12666e8 EUR2005
    Calculated based on inputs: The price of the product has been calculated as a sum of the values of the material and energy inputs for this product. This value is therefore a rough estimation. It may underestimate the real price since there are additional expenses when producing any product. These expences can include for example labour costs, treatment of waste materials and profit for the producer. Please consider carefully whether this level of data quality is acceptable for your application.
  property true value 2.12666e8
    allocation property applied in "true value" allocation // value calculated from revenue

## By-products
- iron scrap, sorted, pressed: 0 kg; By-product classification Recyclable; CPC 39310: Slag, dross, scalings and other waste from the manufacture of iron or steel; pedigree (1,1,1,1,1)
  Iron scrap recovered from this waste.
  production volume 349936 kg
  property price 0.175 EUR2005
    Temporary price data. Calculated as 90% of purchasers price based on: 2005 import and export prices (total trades (USD) divided by total weight (kg) in biggest economies of the world: EU27, USA, Brasil, China, India, Japan and Russia) from UN Commodity Trade Statistics Database (http://data.un.org/Explorer.aspxDatabase [Accessed 2011.06.20]). Commodity: Waste or scrap, of cast iron
  property carbon content 0
    carbon content on a dry matter basis (reserved; not for manual entry)
  property true value 5043.37
    allocation property applied in "true value" allocation // value calculated from revenue
  properties: water content 0, water in wet mass 0 kg, carbon content, fossil 0, dry mass 1 kg, carbon content, non-fossil 0, wet mass 1 kg, carbon allocation 0 kg

## Inputs from technosphere
- corrugated board box: 78998.1 kg; lognormal variance with pedigree 0.34, pedigree (1,1,5,1,1)
  old reference
  EcoSpold01Location=RER
  properties: water content 0.0582011, dry mass 0.945 kg, carbon content, non-fossil 0.432275, wet mass 1 kg, carbon content, fossil 0.000656085
  note on carbon content, non-fossil: Biogenic C content was calculated after biogenic C contents of chemicals used in the production of board (Tab 10.15 & 10.16, ecoinvent v2.2 report 11_III, part 10).
  note on carbon content, fossil: Fossil C content was calculated after fossil C contents of chemicals used in the production of board (Tab 10-15 & 10.16 ecoinvent v2.2 report 11_III, part 10)
- concrete, normal: 499988 m3; lognormal variance with pedigree 0.16, pedigree (1,1,5,1,1)
  estimation
  EcoSpold01Location=CH
  properties: dry mass 2190 kg, water content 0.086758, wet mass 2380 kg
- diesel, burned in building machine: 2.74993e8 MJ; lognormal variance with pedigree 0.16, pedigree (1,1,5,1,1)
  EcoSpold01Location=GLO
  old reference
- reinforcing steel: 5.29987e7 kg; lognormal variance with pedigree 0.16, pedigree (1,1,5,1,1)
  EcoSpold01Location=RER
  estimation
  properties: dry mass 1 kg, wet mass 1 kg, carbon content, fossil 0.004
- copper: 359991 kg; lognormal variance with pedigree 0.16, pedigree (1,1,5,1,1)
  extrapolation from one reference
  EcoSpold01Location=RER
  properties: wet mass 1 kg, dry mass 1 kg
- waste reinforced concrete: 0 kg; pedigree (1,1,1,1,1)
  EcoSpold01Location=CH
  estimation
  production volume 0 kg
    Calculated from the production volume of nuclear spent fuel reprocessing facility in proportion to the respective output amounts.
  properties: water content 0.00585407, wet mass 1 kg, dry mass 0.99418 kg
- aluminium, cast alloy: 41599 kg; lognormal variance with pedigree 0.16, pedigree (1,1,5,1,1)
  old reference
  EcoSpold01Location=RER
  properties: dry mass 1 kg, wet mass 1 kg
- excavation, hydraulic digger: 299993 m3; lognormal variance with pedigree 0.08, pedigree (1,1,5,1,1)
  EcoSpold01Location=RER
  estimation
- electricity, medium voltage: 5.40987e6 kWh; lognormal variance with pedigree 0.16, pedigree (1,1,5,1,1)
  EcoSpold01Location=UCTE
  old reference
- zinc: 64998.5 kg; lognormal variance with pedigree 0.34, pedigree (1,1,5,1,1)
  old reference
  EcoSpold01Location=RER
  properties: dry mass 1 kg, wet mass 1 kg
- lead: 39999.1 kg; lognormal variance with pedigree 0.34, pedigree (1,1,5,1,1)
  EcoSpold01Location=RER
  old reference
  properties: dry mass 1 kg, wet mass 1 kg
- steel, chromium steel 18/8, hot rolled: 1.44997e8 kg; lognormal variance with pedigree 0.34, pedigree (1,1,5,1,1)
  own calculation
  EcoSpold01Location=RER
  properties: carbon content, fossil 0.0008, dry mass 1 kg, wet mass 1 kg
  note on carbon content, fossil: Stainless steel model is the grade 304 steel (18/8 stainless, 18% chromium 8% nickel; max. 0.08% C)
- plywood, for outdoor use: 3779.91 m3; lognormal variance with pedigree 0.34, pedigree (1,1,5,1,1)
  old reference
  EcoSpold01Location=RER
  properties: carbon content, non-fossil 0.424285, dry mass 589.555 kg, water content 0.0601214, carbon content, fossil 0.0439893, wet mass 625 kg
  note on carbon content, non-fossil: Plywood is composed of wood and additives. The weight of the wood is assumed to be the DM kg minus 83.2 kg additives. C content of wood is 0.494 kgC/kg dry wood (ecoinvent v2.2 report 9)
- aluminium, wrought alloy: 88397.9 kg; lognormal variance with pedigree 0.16, pedigree (1,1,5,1,1)
  old reference
  EcoSpold01Location=RER
  properties: wet mass 1 kg, dry mass 1 kg
- steel, low-alloyed, hot rolled: 3.12993e7 kg; lognormal variance with pedigree 0.16, pedigree (1,1,5,1,1)
  extrapolation from one reference
  EcoSpold01Location=RER
  properties: carbon content, fossil 0.005, wet mass 1 kg, dry mass 1 kg
  note on carbon content, fossil: Low alloyed steel composition given in Tab. 3.2 ecoinvent v2.2 report 10_partII. Steel assumed to have a C content of 0.5%
- waste reinforced concrete: -9.89492e8, -1.04844e7 kg (2 entries); lognormal variance with pedigree 0.16, pedigree (1,1,5,1,1)
  EcoSpold01Location=CH
  estimation
  production volume 1e9 kg

## Inputs from nature
- Occupation, construction site [natural resource, land]: 4.99988e6 m2*year
- Transformation, to industrial area [natural resource, land]: 499988 m2; lognormal variance with pedigree 0.08, pedigree (1,1,5,1,1)
  estimation
- Transformation, from unspecified [natural resource, land]: 499988 m2; lognormal variance with pedigree 0.08, pedigree (1,1,5,1,1)
  estimation
- Transformation, from industrial area [natural resource, land]: 499988 m2; lognormal variance with pedigree 0.08, pedigree (1,1,5,1,1)
  estimation
- Occupation, industrial area [natural resource, land]: 2.99993e7 m2*year; lognormal variance with pedigree 0.08, pedigree (1,1,5,1,1)
  estimation
- Transformation, to unspecified [natural resource, land]: 499988 m2; lognormal variance with pedigree 0.08, pedigree (1,1,5,1,1)
  estimation

## Sampling procedure
Literature

## Review by Roberto Dones 2003-08-19
passed
for final calculation August 2003
