# treatment of steel in car shredder residue, municipal incineration

Dataset: EcoSpold 2, unit process
Geography: RoW
Time period: 2006-01-01 to 2019-12-31
Technology level: current
Classification: ISIC rev.4 ecoinvent: 3821:Treatment and disposal of non-hazardous waste
Synonyms: municipal waste incineration; Kehrichtverbrennung; Siedlungsabfallverbrennung
Scenario: Business-as-Usual
System model: Allocation at the point of substitution
Share of production covered: 1.8 %
Generated by: Gabor Doka
Published in: Doka G. 2013
Database: ecoinvent
isCopyrightProtected: true
accessRestrictedTo: 1

## General comment
This dataset represents the activity of waste disposal of steel in car shredder residue in a municipal solid waste incinerator (MSWI) // Recommended use of this dataset: For disposal of rather fine or dusty steel, which goes to incineration as part of Automotive Shredder Residue (ASR). Due to fine grain size of the particles, 50% burnability is assumed, therefore not suited for less fine steel parts in waste. Pure, isolated steel fractions will not be disposed in incinerators, but rather go to recycling. // Inventoried waste contains 50% Fe in ASR burnable; 50% Fe in ASR inert; . // Waste composition (wet, in ppm): H2O n.a.; O 121260; H n.a.; C n.a.; S 760; N n.a.; P 800; B n.a.; Cl 750; Br n.a.; F n.a.; I n.a.; Ag n.a.; As n.a.; Ba n.a.; Cd 3; Co n.a.; Cr 1200; Cu 13570; Hg n.a.; Mn 2400; Mo n.a.; Ni 1050; Pb 380; Sb 210; Se n.a.; Sn 670; V 250; Zn 202; Be n.a.; Sc n.a.; Sr n.a.; Ti n.a.; Tl n.a.; W n.a.; Si 30950; Fe 815330; Ca n.a.; Al 10220; K n.a.; Mg n.a.; Na n.a.; // Share of carbon in waste that is biogenic 60.4%. // Share of metals in waste not oxidised and bulk-recyclable (exclude very small or thin parts) Iron: 50%; Alu: 0%; Copper: 0%. // One kg of this waste produces 0.9616 kg of slag and 0.02594 kg of residues, which are landfilled. Additional solidification with 0.01038 kg of cement. // Net energy production: 0MJ/kg electric energy and 0MJ/kg thermal energy. // Recovery of metal scrap to recycling: 232.84g iron scrap, 0g aluminium scrap, 0g copper scrap.

## Included activities start
waste incineration from waste reception gate and delivery into waste bunker at incinerator plant site (without transports to the incinerator)

## Included activities end
Waste-specific short-term emissions to water from leachate. Long-term emissions from landfill to ground water.

## Geography
Specific to the technology mix encountered in Switzerland in 2010. Well applicable to modern incineration practices in Europe, North America or Japan.

## Technology
average Swiss MSWI plants in 2010 (grate incinerators) with electrostatic precipitator for fly ash (ESP), wet flue gas scrubber and 25% SNCR , 42.77% SCR-high dust , 32.68% SCR-low dust -DeNOx facilities and 0% without Denox (weighted according to mass of burnt waste, representing Swiss average). Efficiency of iron scrap separation from slag : 58%. Efficiency of non-ferrous scrap separation from slag : 31%. Gross electric efficiency technology mix 15.84% and Gross thermal efficiency technology mix 28.51%

## Time period
Waste composition as given in literature reference, theoretical data or other source. Transfer coefficients for modern MSWI.

## Reference product
- steel in car shredder residue: 0 kg; By-product classification Waste; CPC 39310: Slag, dross, scalings and other waste from the manufacture of iron or steel; CAS 7439-89-6
  Main reference product of this activity (supply of disposal service).
  production volume 0 kg
    based on estimate on MSW in WTE globally and share of iron metal from shredder residue composition in Swiss MSW
  property price 0 EUR2005
    Waste products are assigned a price of zero as they are assumed to require further treatment.
  property carbon content 0
    carbon content on a dry matter basis (reserved; not for manual entry)
  properties: dry mass 1 kg, water in wet mass 0 kg, water content 0, carbon content, fossil 0, wet mass 1 kg, carbon content, non-fossil 0, carbon allocation 0 kg
- iron scrap, sorted, pressed: 1 kg; By-product classification Recyclable; CPC 39310: Slag, dross, scalings and other waste from the manufacture of iron or steel; pedigree (1,1,1,1,1)
  Iron scrap recovered from this waste.
  Uncertainty: uncertainty calculated from uncertainty in waste composition, uncertainty of share of recyclable metal, uncertainty of transfer coefficient to bottom ash, uncertainty of the efficiency of scrap removal in MSWI plant.
  production volume 9.7651e6 kg

## By-products
- iron scrap, sorted, pressed: 0 kg; By-product classification Recyclable; CPC 39310: Slag, dross, scalings and other waste from the manufacture of iron or steel; pedigree (1,1,1,1,1)
  (same comment as for iron scrap, sorted, pressed)
  production volume 0 kg
    calculated in proportion to reference product waste input to incinerator
  property price 0.175 EUR2005
    Temporary price data. Calculated as 90% of purchasers price based on: 2005 import and export prices (total trades (USD) divided by total weight (kg) in biggest economies of the world: EU27, USA, Brasil, China, India, Japan and Russia) from UN Commodity Trade Statistics Database (http://data.un.org/Explorer.aspxDatabase [Accessed 2011.06.20]). Commodity: Waste or scrap, of cast iron
  property carbon content 0
    carbon content on a dry matter basis (reserved; not for manual entry)
  properties: carbon content, fossil 0, dry mass 1 kg, wet mass 1 kg, water in wet mass 0 kg, carbon content, non-fossil 0, water content 0, carbon allocation 0 kg

## Inputs from technosphere
- quicklime, milled, packed: 0 kg; pedigree (1,1,1,1,1)
  Auxilliary inputs for the flue gas treatment stage of the incinerator plant.
  Uncertainty: uncertainty calculated from uncertainty in average CaO input, of transfer coefficients in the incinerator, and the uncertainty of the waste composition of this waste
  properties: water content 0.010101, wet mass 1 kg, dry mass 0.99 kg
- iron (III) chloride, without water, in 40% solution state: 0 kg; pedigree (1,1,1,1,1)
  Auxilliary inputs for the wastewater treatment stage of the incinerator plant.
  Uncertainty: uncertainty calculated from uncertainty in average FeCl3 input, of transfer coefficients in the incinerator, and the uncertainty of the waste composition of this waste
  properties: dry mass 1 kg, wet mass 1 kg
- residual material landfill: 0 unit; pedigree (1,1,1,1,1)
  Landfill infrastructure required for landfilling of incineration residues.
  Uncertainty: uncertainty is calculated from uncertainties in waste composition and transfer coefficients in incinerator
- process-specific burdens, residual material landfill: 0, 0, 0 kg (3 entries); pedigree (1,1,1,1,1)
  Mass-specific expenditures required for landfilling of incineration residues.
  Uncertainty: uncertainty is calculated from uncertainties in waste composition and transfer coefficients in incinerator
- heat, for reuse in municipal waste incineration only: 0 MJ; name E_th_prod_MSWI; pedigree (1,1,1,1,1)
  Net heat required to incinerate this waste (subsidiesed from high-calorific waste fractions).
  Uncertainty: uncertainty is calculated from uncertainties in waste composition and uncertainties in energy efficiency and the uncertainty in internal energy demand
- process-specific burdens, slag landfill: 0, 0, 0 kg (3 entries); pedigree (1,1,1,1,1)
  Mass-specific expenditures required for landfilling of bottom ash.
  Uncertainty: uncertainty is calculated from uncertainties in waste composition and transfer coefficients in incinerator
- electricity, for reuse in municipal waste incineration only: 0 kWh; name E_el_prod_MSWI; pedigree (1,1,1,1,1)
  Net electricity required to incinerate this waste (subsidiesed from high-calorific waste fractions).
  Uncertainty: uncertainty is calculated from uncertainties in waste composition and uncertainties in energy efficiency and the uncertainty in internal energy demand
- water, decarbonised: 0, 0, 0, 0, 0, 0, 0, 0, 0, 0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 kg (13 entries); pedigree (1,1,1,1,1)
  Incinerator process water used in flue gas scrubber stage.
  Uncertainty: uncertainty calculated from uncertainty in average water input, and the uncertainty of the waste composition of this waste
  properties: wet mass 1 kg
- transport, freight, lorry, unspecified: 0, 0, 0 metric ton*km (3 entries); pedigree (1,1,1,1,1)
  Transport services to transport incineration residues to landfills.
  Uncertainty: uncertainty calculated from uncertainty of the waste composition of this waste, uncertainty of transfer coefficients and the uncertainty in generic transportation distances
- chromium oxide, flakes: 0 kg; pedigree (1,1,1,1,1)
  Input to DeNOx stage.
  Uncertainty: uncertainty calculated from uncertainty in average DeNOx input, uncertainty in the share of thermal NOx, uncertainty of nitrogen content in average municipal waste and the uncertainty in nitrogen content in *this* waste.
  properties: dry mass 1 kg, wet mass 1 kg
- hydrochloric acid, without water, in 30% solution state: 0.000253846 kg; lognormal variance with pedigree 0.085199, pedigree (1,1,3,1,1)
  Auxilliary inputs for the wastewater treatment stage of the incinerator plant.
  Uncertainty: uncertainty calculated from uncertainty in average HCl input, of transfer coefficients in the incinerator, and the uncertainty of the waste composition of this waste
  properties: wet mass 1 kg, dry mass 1 kg
- chemical, inorganic: 1.73323e-8 kg; lognormal variance with pedigree 0.085199, pedigree (1,1,3,1,1)
  Auxilliary inputs for the wastewater treatment stage of the incinerator plant. Proxy for Polyelectrolyte.
  Uncertainty: uncertainty calculated from uncertainty in average Polyelectrolyte input, of transfer coefficients in the incinerator, and the uncertainty of the waste composition of this waste
  properties: carbon content, fossil 0.003, dry mass 1 kg, wet mass 1 kg
- chemical, organic: 0 kg; pedigree (1,1,1,1,1)
  Auxilliary inputs for the wastewater treatment stage of the incinerator plant. Proxy for (pure) Trisodium-trimercapto-s-triazine (CAS 17766-26-6), used as 15% diluted solution, aka TMT15.
  Uncertainty: uncertainty calculated from uncertainty in average TMT15 input, of transfer coefficients in the incinerator, and the uncertainty of the waste composition of this waste
  properties: dry mass 1 kg, carbon content, fossil 0.628, wet mass 1 kg
- municipal waste incineration facility: 0 unit
  Demands per kilogram waste.
- heat, district or industrial, natural gas: 0 MJ; pedigree (1,1,1,1,1)
  Input to DeNOx stage, to heat up flue gas in low-dust SCR.
  Uncertainty: uncertainty calculated from uncertainty in average DeNOx input, uncertainty in the share of thermal NOx, uncertainty of nitrogen content in average municipal waste and the uncertainty in nitrogen content in *this* waste.
- slag landfill: 0 unit; pedigree (1,1,1,1,1)
  Landfill infrastructure required for landfilling of bottom ash.
  Uncertainty: uncertainty is calculated from uncertainties in waste composition and transfer coefficients in incinerator
- titanium dioxide: 0 kg; pedigree (1,1,1,1,1)
  Input to DeNOx stage (TiO2 catalyst carrier)
  Uncertainty: uncertainty calculated from uncertainty in average DeNOx input, uncertainty in the share of thermal NOx, uncertainty of nitrogen content in average municipal waste and the uncertainty in nitrogen content in *this* waste.
  properties: dry mass 1 kg, wet mass 1 kg
- cement, unspecified: 0, 0, 0, 0, 0, 0, 0, 0, 0, 0 kg (10 entries); pedigree (1,1,1,1,1)
  Cement required for solidification of landfilled residual material.
  Uncertainty: Uncertainty calculated from uncertainty of the waste composition of this waste, of transfer coefficients in the incinerator and of the solidification recipe.
  properties: dry mass 1 kg, wet mass 1 kg
- waste cement, hydrated: 0 kg; pedigree (1,1,1,1,1)
  Hydrated cement output for solidification of landfilled residual material.
  Uncertainty: Uncertainty calculated from uncertainty of the waste composition of this waste and transfer coefficients in the incinerator and of the solidification recipe.
  production volume 0 kg
    calculated in proportion to reference product waste input to incinerator
  properties: wet mass 1 kg, dry mass 1 kg
- ammonia, liquid: 0 kg; pedigree (1,1,1,1,1)
  Input to DeNOx stage (100% NH3).
  Uncertainty: uncertainty calculated from uncertainty in average DeNOx input, uncertainty in the share of thermal NOx, uncertainty of nitrogen content in average municipal waste and the uncertainty in nitrogen content in *this* waste.
  properties: dry mass 1 kg, wet mass 1 kg
- sodium hydroxide, without water, in 50% solution state: 0 kg; pedigree (1,1,1,1,1)
  Auxilliary inputs for the flue gas treatment stage of the incinerator plant.
  Uncertainty: uncertainty calculated from uncertainty in average NaOH input, of transfer coefficients in the incinerator, and the uncertainty of the waste composition of this waste
  properties: wet mass 1 kg, dry mass 1 kg
- heat, for reuse in municipal waste incineration only: 0, 0, 0, 0, 0, 0, 0, 0, 0, 0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 MJ (25 entries); pedigree (1,1,1,1,1)
  (same comment as for heat, for reuse in municipal waste incineration only)
- electricity, for reuse in municipal waste incineration only: 0, 0, 0, 0, 0, 0, 0, 0, 0, 0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 kWh (25 entries); pedigree (1,1,1,1,1)
  (same comment as for electricity, for reuse in municipal waste incineration only)
- heat, district or industrial, natural gas: 0.0114042, 0.644735 MJ (2 entries); lognormal variance with pedigree 0.3594, pedigree (1,1,3,1,1)
  (same comment as for heat, district or industrial, natural gas)
- waste cement, hydrated: 0, 0 kg (2 entries); pedigree (1,1,1,1,1)
  (same comment as for waste cement, hydrated)
- rolling mill: 1.88454e-9 unit; lognormal variance with pedigree 0.346, pedigree (3,4,5,5,1)
  EcoSpold01Location=RER
- steel, low-alloyed: 0.00719355 kg; lognormal variance with pedigree 0.042, pedigree (1,1,5,5,1)
  calculated from max value assuming lognormal distribution
  EcoSpold01Location=RER
- sawnwood, softwood, raw, dried (u=20%): 2.1521e-6 m3; lognormal variance with pedigree 0.042, pedigree (1,1,5,5,1)
  EcoSpold01Location=RER
  calculated from max value assuming lognormal distribution
- lime, hydrated, loose weight: 5.94883e-5 kg; lognormal variance with pedigree 0.052, pedigree (1,1,5,5,1)
  EcoSpold01Location=CH
  calculated from max value assuming lognormal distribution
- hydrogen fluoride: 0.00226843 kg; lognormal variance with pedigree 0.112, pedigree (1,1,5,5,1)
  calculated from max value assuming lognormal distribution
  EcoSpold01Location=GLO
- dust, unalloyed electric arc furnace steel: -7.28203e-5 kg; lognormal variance with pedigree 0.062, pedigree (1,1,5,5,1)
  EcoSpold01Location=CH
  calculated from max value assuming lognormal distribution
  production volume 0.000417 kg
- sheet rolling, steel: 0.000123637 kg; lognormal variance with pedigree 0.042, pedigree (1,1,5,5,1)
  calculated from max value assuming lognormal distribution
  EcoSpold01Location=RER
- sludge from steel rolling: -0.0220726 kg; lognormal variance with pedigree 0.1006, pedigree (2,5,5,5,1)
  EcoSpold01Location=CH
  production volume 0.0528 kg
- steel, chromium steel 18/8, hot rolled: 0.0270326 kg; lognormal variance with pedigree 0.068, pedigree (4,5,5,5,1)
  EcoSpold01Location=RER
- waste mineral oil: -0.00108697 kg; lognormal variance with pedigree 0.062, pedigree (1,1,5,5,1)
  calculated from max value assuming lognormal distribution
  EcoSpold01Location=CH
  production volume 0.002973 kg
- nitric acid, without water, in 50% solution state: 0.00401821 kg; lognormal variance with pedigree 0.132, pedigree (1,1,5,5,1)
  calculated from max value assuming lognormal distribution
  EcoSpold01Location=RER
- lubricating oil: 0.00681166 kg; lognormal variance with pedigree 0.162, pedigree (1,1,5,5,1)
  calculated from max value assuming lognormal distribution
  EcoSpold01Location=RER
- water, deionised: 0.175905 kg; lognormal variance with pedigree 0.862, pedigree (1,1,5,5,1)
  EcoSpold01Location=CH
  calculated from max value assuming lognormal distribution
- steel in car shredder residue: -0.0161091 kg; lognormal variance with pedigree 0.162, pedigree (1,1,5,5,1)
  calculated from max value assuming lognormal distribution
  EcoSpold01Location=CH
  production volume 0.0237 kg
- kraft paper, bleached: 1.86128e-6 kg; lognormal variance with pedigree 0.042, pedigree (1,1,5,5,1)
  calculated from max value assuming lognormal distribution
  EcoSpold01Location=RER
- kraft paper, unbleached: 3.11764e-5 kg; lognormal variance with pedigree 0.342, pedigree (1,1,5,5,1)
  EcoSpold01Location=RER
  calculated from max value assuming lognormal distribution
- hydrogen peroxide, without water, in 50% solution state: 0.00200649 kg; lognormal variance with pedigree 0.132, pedigree (1,1,5,5,1)
  calculated from max value assuming lognormal distribution
  EcoSpold01Location=RER
- silicon carbide: 0.00116542 kg; lognormal variance with pedigree 0.072, pedigree (1,1,5,5,1)
  EcoSpold01Location=RER
  calculated from max value assuming lognormal distribution
- wood preservative, inorganic salt, containing Cr: 7.85831e-5 kg; lognormal variance with pedigree 0.042, pedigree (1,1,5,5,1)
  EcoSpold01Location=RER
  calculated from max value assuming lognormal distribution
- packaging film, low density polyethylene: 9.87639e-5 kg; lognormal variance with pedigree 0.042, pedigree (1,1,5,5,1)
  EcoSpold01Location=RER
  calculated from max value assuming lognormal distribution
- electricity, medium voltage: 0.00500106, 0.000909983, 0.0154319, 0.223747, 0.0320224, 0.104918 kWh (6 entries); lognormal variance with pedigree 0.082, pedigree (1,1,5,5,1)
  EcoSpold01Location=UCTE
  calculated from max value assuming lognormal distribution
- heat, district or industrial, other than natural gas: 5.6855e-5, 0.126823 MJ (2 entries); lognormal variance with pedigree 0.042, pedigree (1,1,5,5,1)
- municipal solid waste: -5.87514e-7, -1.48039e-7, -2.11556e-7, -0.000415513 kg (4 entries); lognormal variance with pedigree 0.0606, pedigree (2,5,5,5,1)
  EcoSpold01Location=CH
  production volume 0.001074 kg
- sodium dichromate: 9.59115e-5 kg; lognormal variance with pedigree 0.042, pedigree (1,1,5,5,1)
  EcoSpold01Location=RER
  calculated from max value assuming lognormal distribution
- steel, unalloyed: 0.0546695 kg; lognormal variance with pedigree 0.068, pedigree (4,5,5,5,1)
  EcoSpold01Location=RER
- basic oxygen furnace waste: -0.000123406 kg; lognormal variance with pedigree 0.062, pedigree (1,1,5,5,1)
  EcoSpold01Location=CH
  calculated from max value assuming lognormal distribution
  production volume 7.6042e7 kg
- sulfuric acid: 0.00267273 kg; lognormal variance with pedigree 0.052, pedigree (1,1,5,5,1)
  calculated from max value assuming lognormal distribution
  EcoSpold01Location=RER
- tractor, 4-wheel, agricultural: 0.000945681 kg; lognormal variance with pedigree 1.30352, pedigree (3,3,4,5,3)
  Corresponds to 96.9 kg/ha related to the life time (20 years). Culationsfor were made based on a tractor of 3000 kg, with a useful life of 7000 hours and a repair factor of 0.74.
- diesel, burned in agricultural machinery: 0.49807 MJ; lognormal variance with pedigree 0.0989451, pedigree (3,3,4,5,3)
  Corresponds to 1134 MJ/ha related to the life time (20 years). 45 MJ = 1 kg Diesel
- shed, large, wood, non-insulated, fire-unprotected: 2.94929e-6 m2; lognormal variance with pedigree 0.0989451, pedigree (3,3,4,5,3)
  Storrage of diverse material related to the trellis system. Corresponds to 0.302 m2/ha related to the life time of the trellissystem (20 years).
- waste wood, post-consumer: -0.110863 kg; lognormal variance with pedigree 0.0898491, pedigree (2,3,4,5,2)
  Disposal of wooden poles. Corresponds to 11364.08 kg/ha related to the life time (20 years).
- residual softwood, wet: 1.09828e-5 m3; lognormal variance with pedigree 0.0901383, pedigree (1,3,4,5,2)
  From manuafacturing poles from raw round wood under bark. Corresponds to 1.126 m3/ha related to the life time (20 years)
- wood preservation, pressure vessel, creosote, outdoor use, ground contact: 0.0154026 kg; lognormal variance with pedigree 0.0901383, pedigree (1,3,4,5,2)
  Tar oil used for impragnation of the wooden poles. Corresponds to 1579 kg/ha related to the life time (20 years).
- agricultural trailer: 0.000779603 kg; lognormal variance with pedigree 1.30352, pedigree (3,3,4,5,3)
  Corresponds to 79.9 kg/ha related to the life time (20 years). Calculations base on tyre trailers of 1500 kg weight, 1200 hours useful life and 0.22 repair factor.
- heat, district or industrial, other than natural gas: 0.00188596 MJ; lognormal variance with pedigree 0.0892491, pedigree (1,3,4,5,2)
  Heat used for tar impragnation of wooden poles. Corresponds to 371 MJ/ha related to the life time (20 years)
- sawlog and veneer log, softwood, measured as solid wood under bark: 6.2972e-7, 1.75924e-6, 0.000131547 m3 (3 entries); lognormal variance with pedigree 0.0907383, pedigree (2,3,4,5,2)

## Inputs from nature
- Oxygen [natural resource, in air]: 0 kg; pedigree (1,1,1,1,1)
  Oxygen from ambient air needed to combust and oxidise this waste. Net demand, i.e. without O2 leaving the plant in flue gas uncombusted.
  Uncertainty: uncertainty is calculated from uncertainties in waste composition and transfer coefficients to flue gas and soild residues in incinerator
- Water, cooling, unspecified natural origin [natural resource, in water]: 0.0158016 m3; source Byers, W. 2003; lognormal variance with pedigree 0.0612, pedigree (2,3,5,5,3)
  Calculated based on literature, (Vionnet, S., Quantis Water Database - Technical Report, 2012). Assumed to have same or very similar water use as "sheet rolling, steel". Water is used for chromium conditioning, which basically means it is directly sprayed on the hot metal to cool it down. In this case the water comes into contact with the product, i.e. It is treated as process water, not cooling water. It includes the processes: hot rolling, acid pockling, cold rolling and finishing. The process ends when finished, rolled metal sheets leaves the plant.

## Emissions to nature
- Benzene [air, urban air close to ground]: 0 kg; pedigree (1,1,1,1,1)
  Incomplete combustion product emitted to air.
  Uncertainty: uncertainty calculated from uncertainty in average operation emissions, and the uncertainty of the flue gas volume from this waste.
- Lead [water, ground-, long-term]: 0 kg; pedigree (1,1,1,1,1)
  Long-term emissions from landfilling of incineration residues.
  Uncertainty: uncertainty is calculated from uncertainties in waste composition and transfer coefficients in incinerator and landfills.
- Carbon monoxide, non-fossil [air, urban air close to ground]: 0 kg; pedigree (1,1,1,1,1)
  (same comment as for Benzene)
- Manganese [air, urban air close to ground]: 0 kg; pedigree (1,1,1,1,1)
  Emission to air from waste composition and transfer coefficients.
  Uncertainty: uncertainty is calculated from uncertainties in waste composition and transfer coefficients in incinerator
- Cadmium [air, urban air close to ground]: 0 kg; pedigree (1,1,1,1,1)
  (same comment as for Manganese)
- Manganese [water, ground-, long-term]: 0 kg; pedigree (1,1,1,1,1)
  (same comment as for Lead)
- Zinc, ion [water, ground-, long-term]: 0 kg; pedigree (1,1,1,1,1)
  (same comment as for Lead)
- Chloride [water, ground-, long-term]: 0 kg; pedigree (1,1,1,1,1)
  (same comment as for Lead)
- Chloride [water, surface water]: 0 kg; pedigree (1,1,1,1,1)
  Emissions to water from waste composition and transfer coefficients in incinerator and landfills.
  Uncertainty: uncertainty is calculated from uncertainties in waste composition and transfer coefficients in incinerator and landfills
- Water [water, surface water]: 0 m3; pedigree (1,1,1,1,1)
  Process water released to surface water.
  Uncertainty: uncertainty calculated from uncertainty in process water input and the uncertainty of fraction to surface water.
- Sulfate [water, ground-, long-term]: 0 kg; pedigree (1,1,1,1,1)
  (same comment as for Lead)
- Vanadium [air, urban air close to ground]: 0 kg; pedigree (1,1,1,1,1)
  (same comment as for Manganese)
- Chromium VI [water, surface water]: 0 kg; pedigree (1,1,1,1,1)
  (same comment as for Chloride)
- Iron, ion [water, surface water]: 0 kg; pedigree (1,1,1,1,1)
  (same comment as for Chloride)
- Chromium [air, urban air close to ground]: 0 kg; pedigree (1,1,1,1,1)
  (same comment as for Manganese)
- NMVOC, non-methane volatile organic compounds, unspecified origin [air, urban air close to ground]: 0 kg; pedigree (1,1,1,1,1)
  (same comment as for Benzene)
- Dioxins, measured as 2,3,7,8-tetrachlorodibenzo-p-dioxin [air, urban air close to ground]: 0 kg; pedigree (1,1,1,1,1)
  (same comment as for Benzene)
- Heat, waste [air, urban air close to ground]: 0 MJ; pedigree (1,1,1,1,1)
  Waste heat generated from heating value of this waste plus any electricity required to process it.
  Uncertainty: uncertainty is calculated from uncertainties in waste composition and uncertainties in energy efficiency and the uncertainty in internal energy demand
- Tin, ion [water, surface water]: 0 kg; pedigree (1,1,1,1,1)
  (same comment as for Chloride)
- Toluene [air, urban air close to ground]: 0 kg; pedigree (1,1,1,1,1)
  (same comment as for Benzene)
- Lead [water, surface water]: 0 kg; pedigree (1,1,1,1,1)
  (same comment as for Chloride)
- Iron, ion [water, ground-, long-term]: 0 kg; pedigree (1,1,1,1,1)
  (same comment as for Lead)
- Phosphate [water, surface water]: 0 kg; pedigree (1,1,1,1,1)
  (same comment as for Chloride)
- Nickel, ion [water, ground-, long-term]: 0 kg; pedigree (1,1,1,1,1)
  (same comment as for Lead)
- Aluminium [water, surface water]: 0 kg; pedigree (1,1,1,1,1)
  (same comment as for Chloride)
- Phosphorus [air, urban air close to ground]: 0 kg; pedigree (1,1,1,1,1)
  (same comment as for Manganese)
- Copper, ion [water, ground-, long-term]: 0 kg; pedigree (1,1,1,1,1)
  (same comment as for Lead)
- Sulfur dioxide [air, urban air close to ground]: 0 kg; pedigree (1,1,1,1,1)
  (same comment as for Manganese)
- Benzo(a)pyrene [air, urban air close to ground]: 0 kg; pedigree (1,1,1,1,1)
  (same comment as for Benzene)
- Copper, ion [water, surface water]: 0 kg; pedigree (1,1,1,1,1)
  (same comment as for Chloride)
- Manganese [water, surface water]: 0 kg; pedigree (1,1,1,1,1)
  (same comment as for Chloride)
- Zinc [air, urban air close to ground]: 0 kg; pedigree (1,1,1,1,1)
  (same comment as for Manganese)
- Aluminium [water, ground-, long-term]: 0 kg; pedigree (1,1,1,1,1)
  (same comment as for Lead)
- Sulfate [water, surface water]: 0 kg; pedigree (1,1,1,1,1)
  (same comment as for Chloride)
- Vanadium, ion [water, surface water]: 0 kg; pedigree (1,1,1,1,1)
  (same comment as for Chloride)
- Phenol, pentachloro- [air, urban air close to ground]: 0 kg; pedigree (1,1,1,1,1)
  (same comment as for Benzene)
- Chromium, ion [water, surface water]: 0 kg; pedigree (1,1,1,1,1)
  (same comment as for Chloride)
- Antimony [water, surface water]: 0 kg; pedigree (1,1,1,1,1)
  (same comment as for Chloride)
- Vanadium, ion [water, ground-, long-term]: 0 kg; pedigree (1,1,1,1,1)
  (same comment as for Lead)
- Silicon [air, urban air close to ground]: 0 kg; pedigree (1,1,1,1,1)
  (same comment as for Manganese)
- Zinc, ion [water, surface water]: 0 kg; pedigree (1,1,1,1,1)
  (same comment as for Chloride)
- Carbon monoxide, fossil [air, urban air close to ground]: 0 kg; pedigree (1,1,1,1,1)
  (same comment as for Benzene)
- Silicon [water, surface water]: 0 kg; pedigree (1,1,1,1,1)
  (same comment as for Chloride)
- Hydrogen chloride [air, urban air close to ground]: 0 kg; pedigree (1,1,1,1,1)
  (same comment as for Manganese)
- Ammonia [air, urban air close to ground]: 0 kg; pedigree (1,1,1,1,1)
  Nitrogen species emitted to air after DeNOx stage.
  Uncertainty: uncertainty calculated from uncertainty in average N-emissions and uncertainty in the share of thermal NOx and the uncertainty in nitrogen content in *this* waste.
- Benzene, pentachloro- [air, urban air close to ground]: 0 kg; pedigree (1,1,1,1,1)
  (same comment as for Benzene)
- Cadmium, ion [water, ground-, long-term]: 0 kg; pedigree (1,1,1,1,1)
  (same comment as for Lead)
- Nitrogen oxides [air, urban air close to ground]: 0 kg; pedigree (1,1,1,1,1)
  Sum of fuel-Nox and thermal-NOx emitted to air after DeNOx stage.
  Uncertainty: uncertainty calculated from uncertainty in average N-emissions and uncertainty in the share of thermal NOx and the uncertainty in nitrogen content in *this* waste.
- Lead [air, urban air close to ground]: 0 kg; pedigree (1,1,1,1,1)
  (same comment as for Manganese)
- Benzene, hexachloro- [air, urban air close to ground]: 0 kg; pedigree (1,1,1,1,1)
  (same comment as for Benzene)
- Particulates, > 2.5 um, and < 10um [air, urban air close to ground]: 0 kg; pedigree (1,1,1,1,1)
  (same comment as for Benzene)
- Silicon [water, ground-, long-term]: 0 kg; pedigree (1,1,1,1,1)
  (same comment as for Lead)
- Nickel [air, urban air close to ground]: 0 kg; pedigree (1,1,1,1,1)
  (same comment as for Manganese)
- Chromium VI [water, ground-, long-term]: 0 kg; pedigree (1,1,1,1,1)
  (same comment as for Lead)
- Methane, non-fossil [air, urban air close to ground]: 0 kg; pedigree (1,1,1,1,1)
  (same comment as for Benzene)
- Heat, waste [water, surface water]: 0 MJ; pedigree (1,1,1,1,1)
  (same comment as for Heat, waste)
- Antimony [water, ground-, long-term]: 0 kg; pedigree (1,1,1,1,1)
  (same comment as for Lead)
- Cadmium, ion [water, surface water]: 0 kg; pedigree (1,1,1,1,1)
  (same comment as for Chloride)
- Antimony [air, urban air close to ground]: 0 kg; pedigree (1,1,1,1,1)
  (same comment as for Manganese)
- Aluminium [air, urban air close to ground]: 0 kg; pedigree (1,1,1,1,1)
  (same comment as for Manganese)
- Particulates, < 2.5 um [air, urban air close to ground]: 0 kg; pedigree (1,1,1,1,1)
  (same comment as for Benzene)
- Nickel, ion [water, surface water]: 0 kg; pedigree (1,1,1,1,1)
  (same comment as for Chloride)
- Tin, ion [water, ground-, long-term]: 0 kg; pedigree (1,1,1,1,1)
  (same comment as for Lead)
- Methane, fossil [air, urban air close to ground]: 0 kg; pedigree (1,1,1,1,1)
  (same comment as for Benzene)
- Tin [air, urban air close to ground]: 0 kg; pedigree (1,1,1,1,1)
  (same comment as for Manganese)
- Water [air, urban air close to ground]: 0 m3; pedigree (1,1,1,1,1)
  Water vapour from waste humidity, hydrogen oxidation and part of the process water.
  Uncertainty: Uncertainty calculated from uncertainty in waste composition, process water input and the uncertainty of fraction to air.
- Iron [air, urban air close to ground]: 0 kg; pedigree (1,1,1,1,1)
  (same comment as for Manganese)
- Phosphate [water, ground-, long-term]: 0 kg; pedigree (1,1,1,1,1)
  (same comment as for Lead)
- Copper [air, urban air close to ground]: 0 kg; pedigree (1,1,1,1,1)
  (same comment as for Manganese)
- Oils, unspecified [soil, industrial]: 2.01697e-5 kg; lognormal variance with pedigree 0.042, pedigree (1,1,5,5,1)
  calculated from max value assuming lognormal distribution
- Nitrogen oxides [air, unspecified]: 0.000128495 kg; lognormal variance with pedigree 3.282, pedigree (1,1,5,5,1)
  calculated from max value assuming lognormal distribution
- NMVOC, non-methane volatile organic compounds, unspecified origin [air, unspecified]: 5.483e-5 kg; lognormal variance with pedigree 0.052, pedigree (1,1,5,5,1)
  calculated from max value assuming lognormal distribution
- Hydrogen fluoride [air, unspecified]: 4.32207e-7 kg; lognormal variance with pedigree 0.542, pedigree (1,1,5,5,1)
  calculated from max value assuming lognormal distribution
- Mercury [water, unspecified]: 3.29605e-8 kg; lognormal variance with pedigree 0.1506, pedigree (2,5,5,5,1)
- Chromium, ion [water, unspecified]: 5.92556e-7 kg; lognormal variance with pedigree 0.1506, pedigree (2,5,5,5,1)
- Iron [soil, unspecified]: 0.0028998 kg; lognormal variance with pedigree 0.292, pedigree (1,1,5,5,1)
  calculated from max value assuming lognormal distribution
- TOC, Total Organic Carbon [water, unspecified]: 8.60683e-6 kg; lognormal variance with pedigree 0.42, pedigree (5,5,5,5,5)
- Chloride [water, unspecified]: 1.46976e-6 kg; lognormal variance with pedigree 0.1006, pedigree (2,5,5,5,1)
- Iron, ion [water, unspecified]: 5.10548e-6 kg; lognormal variance with pedigree 0.1506, pedigree (2,5,5,5,1)
- Particulates, > 10 um [air, unspecified]: 4.51233e-5 kg; lognormal variance with pedigree 0.072, pedigree (1,1,5,5,1)
  calculated from max value assuming lognormal distribution
- Zinc, ion [water, unspecified]: 2.4591e-7 kg; lognormal variance with pedigree 0.1506, pedigree (2,5,5,5,1)
- COD, Chemical Oxygen Demand [water, unspecified]: 4.532e-5 kg; lognormal variance with pedigree 0.1006, pedigree (2,5,5,5,1)
- DOC, Dissolved Organic Carbon [water, unspecified]: 8.63722e-6 kg; lognormal variance with pedigree 0.28, pedigree (5,5,5,5,5)
- Copper, ion [water, unspecified]: 3.18496e-7 kg; lognormal variance with pedigree 0.1506, pedigree (2,5,5,5,1)
- Aluminium [water, unspecified]: 1.55758e-6 kg; lognormal variance with pedigree 0.1506, pedigree (2,5,5,5,1)
- Nickel, ion [water, unspecified]: 9.31583e-7 kg; lognormal variance with pedigree 0.1506, pedigree (2,5,5,5,1)
- BOD5, Biological Oxygen Demand [water, unspecified]: 2.7272e-5 kg; lognormal variance with pedigree 0.25, pedigree (5,5,5,5,5)
- Manganese [water, unspecified]: 6.71598e-7 kg; lognormal variance with pedigree 0.1506, pedigree (2,5,5,5,1)
- Water [air, unspecified]: 0.00615829 m3; lognormal variance with pedigree 0.130025, pedigree (4,4,5,2,4)
  Calculated value based on literature values and expert opinion. See comments in the parametres' comment field.
- Chromium VI [water, unspecified]: 3.29605e-8 kg; lognormal variance with pedigree 0.1506, pedigree (2,5,5,5,1)
- Water [water, unspecified]: 0.00981918 m3; lognormal variance with pedigree 0.130025, pedigree (4,4,5,2,4)
  (same comment as for Water)
- Hydrocarbons, unspecified [water, unspecified]: 2.0729e-6 kg; lognormal variance with pedigree 0.3706, pedigree (2,5,5,5,1)
- Suspended solids, unspecified [water, unspecified]: 0.000174486 kg; lognormal variance with pedigree 0.1006, pedigree (2,5,5,5,1)
- Lead [water, unspecified]: 3.29605e-7 kg; lognormal variance with pedigree 0.1506, pedigree (2,5,5,5,1)
- Particulates, > 2.5 um, and < 10um [air, unspecified]: 4.5443e-5 kg; lognormal variance with pedigree 0.072, pedigree (1,1,5,5,1)
  calculated from max value assuming lognormal distribution
- Cadmium, ion [water, unspecified]: 1.64541e-7 kg; lognormal variance with pedigree 0.1506, pedigree (2,5,5,5,1)
- Chromium [air, unspecified]: 4.86258e-9 kg; lognormal variance with pedigree 0.71, pedigree (1,5,5,5,1)
- Sulfur dioxide [air, unspecified]: 2.23213e-5 kg; lognormal variance with pedigree 0.1006, pedigree (2,5,5,5,1)
- Hydrogen chloride [air, unspecified]: 8.24839e-8 kg; lognormal variance with pedigree 0.18, pedigree (1,5,5,5,1)
- Hydrogen [air, unspecified]: 4.64851e-10 kg; lognormal variance with pedigree 0.072, pedigree (1,1,5,5,1)
  calculated from max value assuming lognormal distribution
- Sulfate [air, unspecified]: 2.21236e-8 kg; lognormal variance with pedigree 0.072, pedigree (1,1,5,5,1)
  calculated from max value assuming lognormal distribution
- Oils, unspecified [soil, unspecified]: 2.46173e-5 kg; lognormal variance with pedigree 0.042, pedigree (1,1,5,5,1)
  calculated from max value assuming lognormal distribution
- Heat, waste [air, non-urban air or from high stacks]: 0.002083 MJ; lognormal variance with pedigree 0.0892491, pedigree (1,3,4,5,2)
  Heat used from tar impragnation of wooden poles. Corresponds to 213 MJ/ha related to the life time (20 years)
