# fibreboard production, soft, from wet & dry processes

Dataset: EcoSpold 2, unit process
Geography: Europe without Switzerland
Time period: 2012-01-01 to 2019-12-31
Technology level: current
Classification: EcoSpold01Categories: wooden materials/processing
Classification: ISIC rev.4 ecoinvent: 1621:Manufacture of veneer sheets and wood-based panels
Synonyms: wood insulation board; softboard
Scenario: Business-as-Usual
System model: Allocation at the point of substitution
Generated by: Frank Werner
Database: ecoinvent
isCopyrightProtected: true
accessRestrictedTo: 1

## General comment
This dataset represents soft wood fibreboard production as the weighted average of soft wood fibreboards produced by the members of the European Panel Federation (EPF).
Soft fibreboard, also called softboard or wood insulation board is an engineered wood product in conformity with the standard EN 13171.
Soft fibreboard consists of up to 85% of wood fibres which have been produced in either the dry or the wet process from wood residues from sawmills (e.g. sidings) and from wood chips. When pro-duced in the dry process, it is also called low density fibre board.
Softwood is preferred due to its higher fibre quality.
Typical thickness is in a range 4 - 32 mm.
The composition of the inventoried softboard is as follows:
The dataset covers both products produced in the wet process (roughly 69% of the covered production volume) and in the dry process (roughly 31% of the covered production volume); due to the limited number of data sources, no distinction of the different production technologies could be made for the reason of data confidentiality.
Softboard is applied for building shell like roofs, walls and floors, acting as thermal and acoustic insu-lating material. Softboard regulates moisture balance permitting fully vapour permeable construction which avoids the risk of interstitial condensation or rot without the use of membranes or vented cavities.

## Included activities start
From the reception at the factory gate of all materials and fuels used.

## Included activities end
Activity ends with the soft wood fibreboard at the factory gate.

## Geography
Representation of the production of the member companies of the European Panel Federation (EPF).

## Technology
In the wet process, the raw material is grinded and then mixed into a mash with up to 98% water. This mash is then formed into a so-called fibre cake. After pressing most water out of the mat, the fibre cake is the cut and dried in the drying channel with temperatures between 160 to 220 °C. The addition of binders is usually not required, as the heating of the liquid lignin as part of the wood bonds the fibres during cooling. For special purposes (higher strength, hydrophobic properties), resins or bitumen-containing agents can be added. Thicker board are produced from gluing together several standard boards.
In the dry process, the fibres are dried directly after grinding and mixed with up to 4% resin, (e.g. PUR resin). For the production of flexible insulation boards, synthetic textile fibres or fibres from corn starch are added to the wood fibres. Subsequently, the fibres are sprinkled in desired thickness, pressed, hardened with a mixture of vapour and air and then cut, stacked and packed.
Production is subject to the regulations of the Industrial Emissions Directive (EU-IED, 2011) if the production capacity exceeds 600 m3 per day where one or more of the following wood-based panels are produced: fibreboard, particleboard or oriented strand board.

## Parameters
- input wood fuel: 575.612 MJ; name wood_fuel; = 30.2*19.06
  input of wood fuel used in production, i.e. wood fuel from forestry, internal wood residues, post-consumer wood used for energy purposes, etc; expressed in MJ of absolutely dry mass (lower heating value at humidity u=0%)

## Reference product
- fibreboard, soft: 0 m3; CPC 31449: Other fibreboard; By-product classification allocatable product
  production volume 0 m3; name p_board
    FaoStat 2011 for Europe, excl. Switzerland
  property wet mass 159 kg; name WM_FB
  property water content 0.0556367; = WiWM_FB/DM_FB
  property price 148 EUR2005
    Temporary price data. Calculated as 90% of purchasers price based on: ecoinvent v2 report 'Bioenergy', chapter 'Biogas', page 188
  property carbon content, non-fossil 0.461793; = 140.8*0.494/DM_FB
    wood content converted to carbon, divided by dry mass
  property dry mass 150.62 kg; name DM_FB; = WM_FB - WiWM_FB
  property water in wet mass 8.38 kg; name WiWM_FB
  property carbon content 0.475101
    carbon content on a dry matter basis (reserved; not for manual entry)
  properties: carbon content, fossil 0.0133086, carbon allocation 71.5597 kg
- waste paper, sorted: 0 kg; By-product classification Recyclable; CPC 39240: Waste and scrap of paper or paperboard; pedigree (1,1,1,1,1)
  fibre input
  properties: water content 0.111111, carbon content, non-fossil 0.448889, water in wet mass 0.1 kg, dry mass 0.9 kg, wet mass 1 kg, carbon content, fossil 0, carbon content 0.448889, carbon allocation 0.404 kg
- bark chips, wet, measured as dry mass: 1 kg; By-product classification allocatable product; CPC 31230: Wood in chips or particles; pedigree (1,1,1,1,1)
  bark from debarking of logs, not used energetically
  production volume 4.37073e6 kg
    Calculated from production volume of reference product using the relative outputs.

## By-products
- residual wood, dry: 0 m3; name w_chips; CPC 39283: Non-agglomerated wood waste and scrap; By-product classification allocatable product; pedigree (1,1,1,1,1)
  Emission factor from DS on heat generation from industrial residual wood mulitplied by the input of wood fuel (direct wood fuel plus production residues)
  production volume 0 m3; = p_board * (Ref('687f2f2a-036e-4157-8ff3-42a4c2ef8429') / Ref('140e47d2-713b-4b25-bab8-857684c1d74c'))
    Calculated from production volume of reference product using the relative outputs.
  property price 26.9 EUR2005; name w_chips_price_EUR2005
    Calculated based on inputs: The price of the product has been calculated as a sum of the values of the material and energy inputs for this product. This value is therefore a rough estimation. It may underestimate the real price since there are additional expenses when producing any product. These expences can include for example labour costs, treatment of waste materials and profit for the producer. Please consider carefully whether this level of data quality is acceptable for your application.
  property carbon content 0.494
    carbon content on a dry matter basis (reserved; not for manual entry)
  properties: carbon content, non-fossil 0.494, carbon content, fossil 0, dry mass 550 kg, water in wet mass 82.5 kg, wet mass 632.5 kg, water content 0.15, carbon allocation 271.7 kg
- bark chips, wet, measured as dry mass: 0 kg; name w_bark; By-product classification allocatable product; CPC 31230: Wood in chips or particles; pedigree (1,1,1,1,1)
  bark from debarking of logs, not used energetically
  production volume 0 kg; = w_bark*p_board
    Calculated from production volume of reference product using the relative outputs.
  property price 0.034 EUR2005; name w_bark_price_EUR2005
    Data on Import/Export (USD/kg) from UN data has been used. (http://data.un.org/Data.aspx?d=ComTrade&f=_l1Code%3a45, [accessed 10th June 2010]) Commodity: 'Sawdust, wood waste or scrap'. A density of 250 kg/m3 was used to convert from M3 to kg (data on density: http://wiki.answers.com/Q/What_is_the_density_of_sawdust, [Accessed 13 June 2010]).
  property carbon content 0.494
    carbon content on a dry matter basis (reserved; not for manual entry)
  properties: carbon content, fossil 0, carbon content, non-fossil 0.494, water content 1.4, wet mass 2.4 kg, dry mass 1 kg, water in wet mass 1.4 kg, carbon allocation 0.494 kg
- fibreboard, soft: 0 m3; CPC 31449: Other fibreboard; By-product classification allocatable product
  production volume 0 m3
    FaoStat 2011 for Europe, excl. Switzerland
  properties: price 148 EUR2005, carbon content, fossil 0.0133086, carbon content 0.475101, carbon allocation 71.5597 kg
- heat, for reuse in municipal waste incineration only: 0 MJ; CPC 17300: Steam and hot water; By-product classification allocatable product; pedigree (1,1,1,1,1)
  Net electricity generated from this waste and used in internal MSWI plant energy redistribution.
  Uncertainty: uncertainty is calculated from uncertainties in waste composition and uncertainties in energy efficiency and the uncertainty in internal energy demand
  property exergy 0.1842 MJ; name E_th_prod_MSWI_exergy
    This exergy property is based on the exergy content of the product.
  property price 0.0106 EUR2005; name E_th_prod_MSWI_price_EUR2005
    Average European district heat price from Ecoheatcool and Euroheat 2005-2006, Ecoheat Work package 1: The European heat market. Final report. 10.6 EUR/GJ i s the price of district heat. http://www.solarthermalworld.org/files/Ecoheatcool%20WP1%20Web.pdf?download
  property true value relation 0.1842; name E_th_prod_MSWI_true_value_relation
    property to calculate "true value" from
- electricity, for reuse in municipal waste incineration only: 0 kWh; CPC 17100: Electrical energy; By-product classification allocatable product; pedigree (1,1,1,1,1)
  (same comment as for heat, for reuse in municipal waste incineration only)
  property price 0.1 EUR2005; name E_el_prod_MSWI_price_EUR2005
    Estimated to be the same price as in case of electricity, medium voltage.
  property exergy 3.6 MJ; name E_el_prod_MSWI_exergy
    This exergy property is based on the exergy content of the product.
  property true value relation 3.6; name E_el_prod_MSWI_true_value_relation
    property to calculate "true value" from
- biogas: 0 m3; source Raboni, Massimo 2014; By-product classification allocatable product; CPC 17200: Coal gas, water gas, producer gas and similar gases, other than petroleum gases and other gaseous hydrocarbons; pedigree (1,1,1,1,1)
  An average yield of 100 litres of biogas per kg biowaste is assumed
  property price 0.109 EUR2005; name biogas_yield_price_EUR2005
    Temporary price data. Calculated as 90% of purchasers price based on: Same prices per energy output as natural gas, based on the proportional lower heating value (2/3 that of natural gas)
  property carbon content, non-fossil 0.449939
    Total C content in kg/Nm3 (Tab 12.8, ecoinvent v2.2 report n17), referred to 1kg DM
  property carbon content 0.449939
    carbon content on a dry matter basis (reserved; not for manual entry)
  properties: water in wet mass 0 kg, wet mass 1.15 kg, carbon content, fossil 0, lower heating value 0 MJ/Nm3, water content 0, dry mass 1.15 kg, carbon allocation 0.51743 kg
- zinc concentrate: 0 kg; CPC 14290: Other non-ferrous metal ores and concentrates (other than uranium or thorium ores and concentrates); By-product classification allocatable product
  Calculated value from the knowledge of the properties of both products.
  property price 0.38 EUR2005; name ByP_price_EUR2005
    Temporary price data. Calculated as 90% of purchasers price based on: Zinc content in concentrate 53%. Concentrate price per kg Zn 86.5% of refined Zn price (13.5% treatment charges according to CHR Metals Limited 2005: Dynamic cost curves. http://www.minecost.com/dynamic.pdf). 2004 zinc price from USGS (2007) Mineral commodity summaries 2007. <http://minerals.usgs.gov/minerals/pubs/mcs/2007/mcs2007.pdf> [Accessed 25 May 2010]
  property zinc content 0.53; name zinc_C_zinc_concentrate
    Zinc content on a dry matter basis. Value taken from teh "zinc mine operation" /GLO dataset.
  property dry mass 1 kg; name DM_zinc_concentrate
  property carbon content 0
    carbon content on a dry matter basis (reserved; not for manual entry)
  properties: wet mass 1 kg, water content 0, carbon content, non-fossil 0, carbon content, fossil 0, water in wet mass 0 kg, carbon allocation 0 kg
- compost: 0 kg; CPC 391: Wastes from food and tobacco industry; By-product classification allocatable product; pedigree (1,1,1,1,1)
  EcoSpold01Location=CH
  Biowaste is reduced in mass by a factor of 2 during composting
  property water in wet mass 0.472 kg; name Water_in_wet_mass_compost; = 1- DM_compost
  property price 0.03 EUR2005
    Temporary price data. Calculated as 90% of purchasers price based on: Estimation done using the following sources: <http://www.wmaa.asn.au/uploads/documents/MarkWinser_1May2007.pdf>; <http://www.swlf.ait.ac.th/UpdData/International/Composting%20and%20anaerobic%20digestion_%20comparions%20for%20Europe%20and%20Asia.pdf>; <http://www.epa.gov/osw/conserve/rrr/composting/basic.htm>, accessed 2011.06.16
  property carbon content, non-fossil 0.1165
    calculation: dry matter 50%, organic matter 40% of dry matter, C content calculated from organic matter divided by 1.72. Relative to dry matter; relative to fresh matter: divided by 2 => 0.1156
  property dry mass 0.528 kg; name DM_compost
  property water content 0.893939; name Water_content_compost; = Water_in_wet_mass_compost/DM_compost
  property concentration, cadmium 0 kg/kg; name Mass_compost_concentration_Cd; = Mass_biowaste_concentration_Cd*2
    Biowaste mass is reduced by a factor of two during composting, therefore concentration is doubled
  property humus equivalent 0.061 kg
    Humus building fraction expressed in kg per kg product on a FM basis. Humus denotes the converted, primary biomass from plants or animals in the ground. More information can be found in the documentation of the composting itself: "treatment of biowaste, industrial composting".
  property concentration, copper 0 kg/kg; name Mass_compost_concentration_Cu; = Mass_biowaste_concentration_Cu*2
    (same comment as for compost)
  property concentration, calcium 0 kg/kg; name Mass_compost_Ca_concentration; = Mass_biowaste_concentration_Ca*2
    (same comment as for compost)
  property concentration, magnesium 0 kg/kg; name Mass_compost_Mg_concentration; = Mass_biowaste_concentration_Mg*2
    (same comment as for compost)
  property concentration, mercury 0 kg/kg; name Mass_compost_Hg_concentration; = Mass_biowaste_concentration_Hg*2
    (same comment as for compost)
  property concentration, lead 0 kg/kg; name Mass_compost_concentration_Pb; = Mass_biowaste_concentration_Pb*2
    (same comment as for compost)
  property concentration, nickel 0 kg/kg; name Mass_compost_Ni_concentration; = Mass_biowaste_concentration_Ni*2
    (same comment as for compost)
  property concentration, phosphorus 0 kg/kg; name Mass_compost_P_concentration; = Mass_biowaste_concentration_P*2
    (same comment as for compost)
  property concentration, sulfur 0 kg/kg; name Mass_compost_concentration_S; = Mass_biowaste_concentration_S*2
    (same comment as for compost)
  property concentration, potassium 0 kg/kg; name Mass_compost_K_concentration; = Mass_biowaste_concentration_K*2
    (same comment as for compost)
  property nickel content 1.60606e-5; name Mass_compost_Ni_content; = Mass_biowaste_Ni_content/0.5*( DM_biowaste / DM_compost)
    nickel content on a dry matter basis
  property concentration, nitrogen 0 kg/kg; = Mass_biowaste_concentration_N*2
    (same comment as for compost)
  property concentration, zinc 0 kg/kg; name Mass_compost_concentration_Zn; = Mass_biowaste_concentration_Zn*2
    (same comment as for compost)
  property lead content 2.66667e-5; name Mass_compost_Pb_content; = Mass_biowaste_Pb_content/0.5*( DM_biowaste / DM_compost)
    lead content on a dry matter basis
  property copper content 3.81818e-5; name Mass_compost_Cu_content; = Mass_biowaste_Cu_content/0.5*( DM_biowaste / DM_compost)
    copper content on a dry matter basis
  property cadmium content 2.89394e-7; name Mass_compost_Cd_content; = Mass_biowaste_Cd_content/0.5*( DM_biowaste / DM_compost)
    cadmium content on a dry matter basis
  property nitrogen content 0.0136364; name Mass_compost_N_content; = Mass_biowaste_N_content/0.5*( DM_biowaste / DM_compost)
    nitrogen content on a dry matter basis
  property magnesium content 0.00525758; name Mass_compost_Mg_content; = Mass_biowaste_Mg_content/0.5*( DM_biowaste / DM_compost)
    magnesium content on a dry matter basis
  property zinc content 0.000120303; name Mass_compost_Zn_content; = Mass_biowaste_Zn_content/0.5*( DM_biowaste / DM_compost)
    zinc content on a dry matter basis
  property potassium content 0.0099697; name Mass_compost_K_content; = Mass_biowaste_K_content/0.5*( DM_biowaste / DM_compost)
    potassium content on a dry matter basis
  property sulfur content 0.00190909; name Mass_compost_S_content; = Mass_biowaste_S_content/0.5*( DM_biowaste / DM_compost)
    sulfur content on a dry matter basis
  property calcium content 0.0504545; name Mass_compost_Ca_content; = Mass_biowaste_Ca_content/0.5*( DM_biowaste / DM_compost)
    calcium content on a dry matter basis
  property mercury content 1e-7; name Mass_compost_Hg_content; = Mass_biowaste_Hg_content/0.5*( DM_biowaste / DM_compost)
    mercury content on a dry matter basis
  property phosphorus content 0.00275758; name Mass_compost_P_content; = Mass_biowaste_P_content/0.5*( DM_biowaste / DM_compost)
    phosphorus content on a dry matter basis
  property carbon content 0.1165
    carbon content on a dry matter basis (reserved; not for manual entry)
  properties: carbon content, fossil 0, wet mass 1 kg, carbon allocation 0.061512 kg
- iron scrap, sorted, pressed: 0 kg; By-product classification Recyclable; CPC 39310: Slag, dross, scalings and other waste from the manufacture of iron or steel; pedigree (1,1,1,1,1)
  metallic iron scrap removed from ash reamains and recycled.
  Uncertainty: uncertainty is calculated from uncertainties in waste composition and transfer coefficients to soild residues
  property price 0.175 EUR2005
    Temporary price data. Calculated as 90% of purchasers price based on: 2005 import and export prices (total trades (USD) divided by total weight (kg) in biggest economies of the world: EU27, USA, Brasil, China, India, Japan and Russia) from UN Commodity Trade Statistics Database (http://data.un.org/Explorer.aspxDatabase [Accessed 2011.06.20]). Commodity: Waste or scrap, of cast iron
  property carbon content 0
    carbon content on a dry matter basis (reserved; not for manual entry)
  properties: carbon content, non-fossil 0, wet mass 1 kg, dry mass 1 kg, water content 0, carbon content, fossil 0, water in wet mass 0 kg, carbon allocation 0 kg
- copper: 0 kg; source Rentz O. 1999; By-product classification allocatable product; CPC 41413: Refined copper and copper alloys, unwrought; master alloys of copper
  Literature value. Copper uses: Before end-use copper is manufactured into semi fabricated products, such as shapes and ingots (known as 'semis'). These manufacturing processes are subdivided into hot working, cold working and, if necessary, process annealing. Few of the semis are ready for use as such. They more typically travel to first-stage manufacturers, who make metal rods, wire, and casting, and then to component manufacturers who produce such things as motors, valves, and insulated cables The components in turn are incorporated by final-stage manufacturers into a variety of finished products - automobiles, commercial buildings, residential housing, and so forth. These uses account for about 79% of the world-wide consumption of copper.
  property price 5.52 EUR2005
    Literature value (http://www.economist.com/news/business/21576714-mining-industry-has-enriched-chile-its-future-precarious-copper-solution). Average price between 20015 and 2013.
  property carbon content 0
    carbon content on a dry matter basis (reserved; not for manual entry)
  properties: dry mass 1 kg, water in wet mass 0 kg, wet mass 1 kg, carbon content, non-fossil 0, water content 0, carbon content, fossil 0, carbon allocation 0 kg
- iron scrap, unsorted: 0 kg; source European Aluminium Association 2008; CPC 39310: Slag, dross, scalings and other waste from the manufacture of iron or steel; By-product classification Recyclable; pedigree (1,1,1,1,1)
  property price 0.149 EUR2005; name ironScrapAmount_price_EUR2005
    Temporary price data. Calculated as 90% of purchasers price based on: estimated at 85% of sorted scrap
  property carbon content 0
    carbon content on a dry matter basis (reserved; not for manual entry)
  properties: water in wet mass 0 kg, water content 0, carbon content, fossil 0, carbon content, non-fossil 0, dry mass 1 kg, wet mass 1 kg, carbon allocation 0 kg
- aluminium oxide, non-metallurgical: 0 kg; source European Aluminium Association 2008; CPC 41432: Alumina (aluminium oxide), except artificial corundum; By-product classification allocatable product; CAS 1344-28-1; pedigree (1,1,1,1,1)
  property carbon content, non-fossil 0; name C_content_non_fossil
  property price 0.28 EUR2005; name Al2O3Amount_price_EUR2005
    From UN trade database. http://data.un.org/ Import data from the largest economies of the world are used (Brazil, India, USA, China, Japan and EU-27).
  property dry mass 1 kg; name DM
  property water content 0; name water_content
  property wet mass 1 kg; name WM
  property water in wet mass 0 kg; name WWM
  property carbon content, fossil 0; name C_content_fossil
  property carbon content 0
    carbon content on a dry matter basis (reserved; not for manual entry)
  properties: carbon allocation 0 kg
- aluminium, cast alloy: 0 kg; source European Aluminium Association 2008; By-product classification allocatable product; CPC 41431: Unwrought aluminium; pedigree (1,1,1,1,1)
  EcoSpold01Location=RER
  property price 1.3 EUR2005; name castAlloyAmount_price_EUR2005
    Temporary price data. Calculated as 90% of purchasers price based on: Source: London Metal Exchange, Aluminium alloy price for 2005
  property carbon content 0
    carbon content on a dry matter basis (reserved; not for manual entry)
  properties: water in wet mass 0 kg, carbon content, non-fossil 0, water content 0, dry mass 1 kg, carbon content, fossil 0, wet mass 1 kg, carbon allocation 0 kg
- aluminium, wrought alloy: 0 kg; source European Aluminium Association 2008; By-product classification allocatable product; CPC 4153: Semi-finished products of aluminium or aluminium alloys; pedigree (1,1,1,1,1)
  property price 1.44 EUR2005; name secondaryAluminiumOutput_price_EUR2005
    Estimated based on literature values and expert judgement. Aluminium ccast alloys are about 90% of the price of aluminium wrought alloys.
  property carbon content 0
    carbon content on a dry matter basis (reserved; not for manual entry)
  properties: wet mass 1 kg, water content 0, carbon content, fossil 0, water in wet mass 0 kg, carbon content, non-fossil 0, dry mass 1 kg, carbon allocation 0 kg
## Inputs from technosphere
- sodium hydroxide, without water, in 50% solution state: 0.000230984 kg; = 0.0545*0.5; lognormal variance with pedigree 0.027, pedigree (1,1,3,1,1)
  50% concentration
  properties: dry mass 1 kg, wet mass 1 kg
- electricity, medium voltage: 0.000588959 kWh; = 78.9*0.0613; lognormal variance with pedigree 0.027, pedigree (1,1,3,1,1)
  electricity input from grid times share of total production in specific country
- dust collector, electrostatic precipitator, for industrial use: 0 unit; = 1.3889E-09*wood_fuel/1.05; pedigree (1,1,1,1,1)
  Infrastructure factor from DS on heat generation from industrial residual wood mulitplied by the input of wood fuel (direct wood fuel plus production residues); correction for assumed efficiency as original value refers to heat output
- latex: 0 kg; pedigree (1,1,1,1,1)
  additive
  properties: wet mass 1 kg, dry mass 1 kg, carbon content, fossil 0.872983
  note on carbon content, fossil: The Styrene-butadiene dispersion is based on styrene and 1,3-butadiene plus co-monomers like i.e. ac-rylonitrile or (meth-)acrylic acid (ecoinvent v2.2 report 11_III). Following specifications in US Patent 3,875,101 (1971), the dispersion was considered as: 52.5% 1.3-butadiene (0.8571 kg C/kg dry mass); 43% styrene (0.9231 kg C/kg dry mass); 2% acrylic acid (0.5 kg C/kg dry mass); 2.5% acrolein (C3H4O, MW=56; 0.6429 kg C/kg dry mass)
- paraffin: 0 kg; pedigree (1,1,1,1,1)
  hydrophobing agent
  properties: wet mass 1 kg, carbon content, fossil 0.847059, dry mass 1 kg
- furnace, wood chips, with silo, 5000kW: 0 unit; = 2.9333E-08*wood_fuel/1.05; pedigree (1,1,1,1,1)
  (same comment as for dust collector, electrostatic precipitator, for industrial use)
- glass wool mat: 0 kg; pedigree (1,1,1,1,1)
  glass fibres used as reinforcement
  properties: wet mass 1 kg, dry mass 1 kg, carbon content, fossil 0.0107327
  note on carbon content, fossil: A share of 16 w-% for the binders is taken into account. The binder used in this study is a mixture of phenol, formaldehyde and urea resins (ecoinvent v2.2 report 16_part XIV), and the C content was calculated as a weigthed average of phenol, formaldehyde and urea C content.
- electricity, medium voltage: 0 kWh; = 78.9*0.0348; pedigree (1,1,1,1,1)
  electricity input from grid times share of total production not covered via specific country mixes; it covers the electricity input of Switzerland and in countries where < 3% of the total production are produced .
- slab and siding, softwood, wet, measured as dry mass: 0 kg; pedigree (1,1,1,1,1)
  input of industrial residual wood
- phenolic resin: 0 kg; pedigree (1,1,1,1,1)
  part of glueing system (inventoried as averaged production average in Europe)
  properties: dry mass 1 kg, wet mass 1 kg, carbon content, fossil 0.772277
- wastewater from soft fibreboard production: 0 m3; name w_WW; pedigree (1,1,1,1,1)
  production volume 0 m3; = w_WW*p_board
    Calculated from production volume of reference product using the relative outputs.
  properties: carbon content, non-fossil 0.999914, wet mass 1000 kg, water content 22.098, dry mass 43.2938 kg
- wooden board factory, organic bonded boards: 0 unit; = 1/(525000*50); pedigree (1,1,1,1,1)
  estimated based on an assumed yearly production volume o 525,000 m3/year and a life time of infrastructure of 50 years
- nylon 6: 1.13695e-8 kg; lognormal variance with pedigree 0.029, pedigree (1,1,3,5,1)
  reinforcement
  properties: wet mass 1 kg, carbon content, fossil 0.637168, dry mass 1 kg
  note on carbon content, fossil: It is a chain of caprolactam molecules, originating from aminocarboxylic acids - here caproic acid or caprolactam. The structure of nylon 6 is -(NH-(CH2)5-CO)n-, C6H11NO (ecoinvent v2.2 report 11_II). MW=113 g/mol
- wood ash mixture, pure: -1.27172e-11 kg; name w_wood_ash; = 0.000476*wood_fuel; lognormal variance with pedigree 0.0276, pedigree (1,3,3,1,1)
  EcoSpold01Location=CH
  Emission factor from DS on heat generation from industrial residual wood mulitplied by the input of wood fuel (direct wood fuel plus production residues)
  production volume 0 kg; = w_wood_ash*p_board
    Calculated from production volume of reference product using the relative outputs.
  properties: wet mass 1 kg, dry mass 1 kg, carbon content, non-fossil 0.012
- tap water: 0.000275558 kg; lognormal variance with pedigree 0.0276, pedigree (1,3,3,1,1)
  properties: wet mass 1 kg, water content 2962.17, dry mass 0.000337476 kg, carbon content, fossil 0.00178991
  note on carbon content, fossil: Bicarbonate content is 2.93 mol/m3. CO2 content is 0.1 mol/m3 (ecoinvent v2.2 report 8, Tab 93.1).
- waste paper, sorted: 0 kg; pedigree (1,1,1,1,1)
  fibre input
  properties: water content 0.111111, carbon content, non-fossil 0.448889, dry mass 0.9 kg, wet mass 1 kg
- pulpwood, softwood, measured as solid wood under bark: 7.69094e-14 m3; = 85.9/378; lognormal variance with pedigree 0.0276, pedigree (1,3,3,1,1)
  input in kg divided by the basic wood density of 378 kg/m3
  properties: wet mass 1080 kg, water content 1.4, carbon content, non-fossil 0.494, dry mass 450 kg
- heat, district or industrial, other than natural gas: 0 MJ; = 20/1.05; pedigree (1,1,1,1,1)
  Fuel input, converted to heat output; proxy for animal grease
- methylene diphenyl diisocyanate: 0 kg; pedigree (1,1,1,1,1)
  part of glueing system (inventoried as averaged production average in Europe)
  properties: wet mass 1 kg, dry mass 1 kg, carbon content, fossil 0.72
- wood chips, dry, measured as dry mass: 0.000411484 kg; lognormal variance with pedigree 0.0276, pedigree (1,3,3,1,1)
  input of chips from sawmills
  properties: carbon content, non-fossil 0.494, dry mass 1 kg, water content 0.4, wet mass 1.4 kg
  note on carbon content, non-fossil: C content of dry mass is 0.494 kgC/kg dry wood (ecoinvent v2.2 report 9).
- aluminium sulfate, powder: 1.63835e-7 kg; = 0.709+0.0569; lognormal variance with pedigree 0.0276, pedigree (1,3,3,1,1)
  aluminium sulfate plus input of unspecified hardeners
  properties: wet mass 1 kg, dry mass 1 kg
- wood chips, wet, measured as dry mass: 0 kg; pedigree (1,1,1,1,1)
  input of wood chips from forestry
  properties: water content 1.1, dry mass 1 kg, wet mass 2.1 kg, carbon content, non-fossil 0.494
- chemical, organic: 2.47716e-5 kg; lognormal variance with pedigree 0.0276, pedigree (1,3,3,1,1)
  input of unspecified additives, dyes, flame redardants, etc.
  properties: carbon content, fossil 0.628, dry mass 1 kg, wet mass 1 kg
  note on carbon content, fossil: This dataset is an unweighted average of 20 organic substances (listed in Tab 88.1, ecoinvent v2.2 report 8, part II), being part of the top100 chemicals included in this database. The C-content has also been calculated as an unweighted average of the C content of the substances composing this dataset.
- furnace, wood chips, softwood storage area, 1000kW: 0 unit; = 6.61E-09*wood_fuel; pedigree (1,1,1,1,1)
  Factor from DS on heat generation from industrial residual wood mulitplied by the input of wood fuel (direct wood fuel plus production residues)
  EcoSpold01Location=CH
- heat, district or industrial, other than natural gas: 0 MJ; = 26.7/1.05; pedigree (1,1,1,1,1)
  Fuel input, converted to heat output
- diesel, burned in building machine: 0.000128238 MJ; lognormal variance with pedigree 0.0276, pedigree (1,3,3,1,1)
  for internal transport
- heat, district or industrial, other than natural gas: 0 MJ; = 417/1.05; pedigree (1,1,1,1,1)
  Fuel input, converted to heat output
- lubricating oil: 3.89222e-7 kg; = 0.00278+0.0659; lognormal variance with pedigree 0.0276, pedigree (1,3,3,1,1)
  input of lubricating oils plus mineral oils, incl. thermooil
  properties: carbon content, fossil 0.75, dry mass 1 kg, wet mass 1 kg
  note on carbon content, fossil: Lubricating oil is produced from diesel. C-content/dry mass of fats and oils considered 75%, from: ecoinvent v2.2 report, n 15a, pg 40
- hazardous waste, for incineration: -4.20068e-6 kg; name w_HW; lognormal variance with pedigree 0.0276, pedigree (1,3,3,1,1)
  Output of minor quantities of waste resins, oily filters and rags
  production volume 0 kg; = w_HW*p_board
    Calculated from production volume of reference product using the relative outputs.
  properties: wet mass 1 kg, water content 0.333333, carbon content, fossil 0.554667, dry mass 0.75 kg
  note on carbon content, fossil: Tab A.6, ecoinvent v2.2 report 13_I. C content has been calculated after data in the tables, and then referred to 1 kg DM
- heat, district or industrial, natural gas: 0 MJ; = 151/1.05; pedigree (1,1,1,1,1)
  Input of natural gas plus liquified petrolium gas, converted to heat output
- biowaste: 0 kg; name w_biowaste; pedigree (1,1,1,1,1)
  sludges from chip washing etc.
  production volume 0 kg; = w_biowaste*p_board
    Calculated from production volume of reference product using the relative outputs.
  property price 0 EUR2005; name w_biowaste_price_EUR2005
  properties: wet mass 1 kg, water content 1.5, dry mass 0.4 kg, carbon content, non-fossil 0.1624
- potato starch: 0 kg; pedigree (1,1,1,1,1)
  additive
  properties: carbon content, non-fossil 0.46, water content 0.25, wet mass 1 kg, dry mass 0.8 kg
  note on carbon content, non-fossil: C-content of starch is considered 46% on dry mass basis (from "Evolutionary and Biochemical Aspects", A.D. Kay and T. Vrede (in Global Ecology, 2010, Elsevier B.V., S.E. Jørgensen Ed.)).
- electricity, medium voltage: 0 kWh; = 78.9*0.04; pedigree (1,1,1,1,1)
  electricity input from grid times share of total production in specific country
- electricity, medium voltage: 0.000144975 kWh; = 78.9*0.0491; lognormal variance with pedigree 0.027, pedigree (1,1,3,1,1)
  electricity input from grid times share of total production in specific country
- vinyl acetate: 0 kg; pedigree (1,1,1,1,1)
  for the glueing of several layers of mats
  properties: dry mass 1 kg, carbon content, fossil 0.55814, wet mass 1 kg
- pulpwood, hardwood, measured as solid wood under bark: 0 m3; = 0.404/572; pedigree (1,1,1,1,1)
  input in kg divided by the basic wood density of 572 kg/m3
  properties: wet mass 1170 kg, carbon content, non-fossil 0.494, dry mass 650 kg, water content 0.8
- electricity, medium voltage: 0.000169891 kWh; = 78.9*0.4309; lognormal variance with pedigree 0.027, pedigree (1,1,3,1,1)
  electricity input from grid times share of total production in specific country
- ammonia, liquid: 2.93695e-6 kg; = 0.119*0.2; lognormal variance with pedigree 0.027, pedigree (1,1,3,1,1)
  20% concentration
  properties: wet mass 1 kg, dry mass 1 kg
- electricity, medium voltage: 0 kWh; = 78.9*0.2349; pedigree (1,1,1,1,1)
  electricity input from grid times share of total production in specific country
- electricity, medium voltage: 0 kWh; = 78.9*(1-0.851); pedigree (1,1,1,1,1)
  (same comment as for electricity, medium voltage)
- lubricating oil: 1.71266e-6 kg; lognormal variance with pedigree 0.066, pedigree (3,4,5,5,1)
  Based on data from 1 Swiss plant
  EcoSpold01Location=RER
  Uncertainty: based on data from 1 Swiss plant
- waste textile, soiled: -4.10649e-6 kg; lognormal variance with pedigree 0.0386, pedigree (4,3,4,5,1)
  EcoSpold01Location=CH
  Personal communication of industry
  Uncertainty: personal communication of industry
- waste wood, untreated: -2.792e-6, -3.46669e-7, -2.53454e-8, -9.73687e-7, -1.47101e-7, -2.32554e-7, -3.54582e-5 kg (7 entries); lognormal variance with pedigree 0.0386, pedigree (4,3,4,5,1)
  (same comment as for waste textile, soiled)
- waste plastic, mixture: -1.51024e-8 kg; lognormal variance with pedigree 0.0386, pedigree (4,3,4,5,1)
  Personal communication of industry
  EcoSpold01Location=CH
  Uncertainty: personal communication of industry
- scrap steel: -4.86163e-7 kg; lognormal variance with pedigree 0.0386, pedigree (4,3,4,5,1)
  (same comment as for waste plastic, mixture)
- electricity, medium voltage: 0.000987635, 8.71048e-8, 1.47716e-6, 2.14173e-5, 3.06523e-6, 0.000393953 kWh (6 entries); lognormal variance with pedigree 0.0386, pedigree (4,3,4,5,1)
  EcoSpold01Location=UCTE
  Personal communication of industry
  Uncertainty: personal communication of industry
- hazardous waste, for incineration: -9.16164e-6 kg; lognormal variance with pedigree 0.0041, pedigree (2,4,2,3,2)
  Estimated value. This figure have been taken from the CA (Quebec) dataset
  production volume 12427.7 kg
- heavy water: 1.34634e-7 kg; lognormal variance with pedigree 0.0041, pedigree (2,4,2,3,2)
  Estimated value. This figure have been taken from the CA (Quebec) dataset
- chlorine, liquid: 5.75461e-7 kg; lognormal variance with pedigree 0.0041, pedigree (2,4,2,3,2)
  Estimated value. This figure have been taken from the CA (Quebec) dataset
- spent nuclear fuel: -5.46839e-6 kg; lognormal variance with pedigree 0.0041, pedigree (2,4,2,3,2)
  Estimated value. This figure have been taken from the CA (Quebec) dataset.Amount of spent fuel produced per year plus concrete of storage modules
  production volume 118772 kg
- helium: 1.18478e-7 kg; lognormal variance with pedigree 0.0041, pedigree (2,4,2,3,2)
  Estimated value. This figure have been taken from the CA (Quebec) dataset
- hydrogen, liquid: 6.37693e-6 kg; lognormal variance with pedigree 0.0041, pedigree (2,4,2,3,2)
  Estimated value. This figure have been taken from the CA (Quebec) dataset
- nuclear power plant, pressure water reactor, 650MW: 1.75926e-12 unit; lognormal variance with pedigree 0.0041, pedigree (2,4,2,3,2)
  Calculated value. The life time of Atucha I and Embalse have recently been prolonged for another 30 years, and so the total lifetime have been estimated in 60 years. An average load factor for nuclear power plants of 73% was applied (PRIS database, 2018).
  Reference(s): International Atomic Energy Agency. 2018. Power Reactor Information System (PRIS), World Statistics, Load Factor, accessible online athttps://pris.iaea.org/PRIS/WorldStatistics/WorldTrendinAverageLoadFactor.aspx, last accessed February 2018
- carbon dioxide, liquid: 1.02869e-7 kg; lognormal variance with pedigree 0.0035, pedigree (2,4,2,3,1)
  Estimated value. This figure have been taken from the CA (Quebec) dataset
- reinforcing steel: 1.68293e-7 kg; lognormal variance with pedigree 0.0041, pedigree (2,4,2,3,2)
  Estimated value. This figure have been taken from the CA (Quebec) dataset
- cast iron: 1.68293e-7 kg; lognormal variance with pedigree 0.0041, pedigree (2,4,2,3,2)
  Estimated value. This figure have been taken from the CA (Quebec) dataset
- waste reinforced concrete: -0.00300995 kg; lognormal variance with pedigree 0.21, pedigree (5,5,5,5,5)
  Estimated value. This figure have been taken from the CA (Quebec) dataset. Same amount entering the dataset is estimated as by-product.
  production volume 7.47135e7 kg
- nitrogen, liquid: 1.28113e-7 kg; lognormal variance with pedigree 0.0041, pedigree (2,4,2,3,2)
  Estimated value. This figure have been taken from the CA (Quebec) dataset
- transport, freight, light commercial vehicle: 1.07361e-5 metric ton*km; lognormal variance with pedigree 0.0041, pedigree (2,4,2,3,2)
  Estimated value. This figure have been taken from the CA (Quebec) dataset. This vehicle use corresponds to maintenance and operation services related to the operation of the whole company. Transports have been distributed among different activities (electricity production, transport and distribution) according to their respective use of these transports and, when the exact distribution was not available, according to the relative expenses of each activity.
- anionic resin: 2.29746e-10 kg; lognormal variance with pedigree 0.0041, pedigree (2,4,2,3,2)
  Estimated value. This figure have been taken from the CA (Quebec) dataset
- tap water: 0.00226323 kg; lognormal variance with pedigree 0.0041, pedigree (2,4,2,3,2)
  Estimated value. This figure have been taken from the CA (Quebec) dataset
- cationic resin: 9.16106e-11 kg; lognormal variance with pedigree 0.0041, pedigree (2,4,2,3,2)
  Estimated value. This figure have been taken from the CA (Quebec) dataset
- uranium hexafluoride: 5.00673e-6 kg; lognormal variance with pedigree 0.0041, pedigree (2,4,2,3,2)
  Estimated value.This figure have been taken from the CA (Quebec) dataset As CANDU reactors use natural uranium (unenriched UO2) but no data were collected for UO2 production (impurities removal from yellowcake, refining to UO3 and conversion to UO2) uranium hexafluoride is used as proxy (UO3 is used to produce both UO2 and UF6).
- transport, freight, lorry, unspecified: 2.02471e-5 metric ton*km; lognormal variance with pedigree 0.1235, pedigree (2,4,2,3,2)
  Estimated value. This figure have been taken from the CA (Quebec) dataset
  This vehicle use corresponds to maintenance and operation services related to the operation of the whole company. Transports have been distributed among different activities (electricity production, transport and distribution) according to their respective use of these transports and, when the exact distribution was not available, according to the relative expenses of each activity.
- diesel, burned in diesel-electric generating set, 10MW: 1.87604e-5 MJ; lognormal variance with pedigree 0.0041, pedigree (2,4,2,3,2)
  Estimated value. This figure have been taken from the CA (Quebec) dataset
- sodium hypochlorite, without water, in 15% solution state: 2.04577e-7 kg; lognormal variance with pedigree 0.0041, pedigree (2,4,2,3,2)
  Estimated value. This figure have been taken from the CA (Quebec) dataset
- hydrazine: 8.57178e-8 kg; lognormal variance with pedigree 0.0041, pedigree (2,4,2,3,2)
  Estimated value. This figure have been taken from the CA (Quebec) dataset
- transport, passenger car: 9.70073e-6 km; lognormal variance with pedigree 0.0041, pedigree (2,4,2,3,2)
  Estimated value. This figure have been taken from the CA (Quebec) dataset
  This vehicle use corresponds to maintenance and operation services related to the operation of the whole company. Transports have been distributed among different activities (electricity production, transport and distribution) according to their respective use of these transports and, when the exact distribution was not available, according to the relative expenses of each activity
- chlorodifluoromethane: 6.56345e-9 kg; lognormal variance with pedigree 0.0041, pedigree (2,4,2,3,2)
  Estimated value. This figure have been taken from the CA (Quebec) dataset
- fly ash and scrubber sludge: -5.12457e-6 kg; lognormal variance with pedigree 0.0041, pedigree (2,4,2,3,2)
  Estimated value. This figure have been taken from the CA (Quebec) dataset
  production volume 127203 kg
- steel, low-alloyed, hot rolled: 3.87315e-7 kg; lognormal variance with pedigree 0.0041, pedigree (2,4,2,3,2)
  Estimated value. This figure have been taken from the CA (Quebec) dataset
- municipal solid waste: -7.52787e-6 kg; lognormal variance with pedigree 0.0041, pedigree (2,4,2,3,2)
  Estimated value. This figure have been taken from the CA (Quebec) dataset
  production volume 98845.3 kg
- low level radioactive waste: -4.62468e-10 m3; lognormal variance with pedigree 0.0041, pedigree (2,4,2,3,2)
  Estimated value. This figure have been taken from the CA (Quebec) dataset
  production volume 10.0449 m3
- sulfuric acid: 0.000144388 kg; lognormal variance with pedigree 0.0041, pedigree (2,4,2,3,2)
  Estimated value. This figure have been taken from the CA (Quebec) dataset
- waste paper, unsorted: -4.17739e-5 kg; lognormal variance with pedigree 0.0041, pedigree (2,4,2,3,2)
  Estimated value. This figure have been taken from the CA (Quebec) dataset
  production volume 61408.4 kg
- low level radioactive waste for final repository: -2.16761e-9 m3; lognormal variance with pedigree 0.0041, pedigree (2,4,2,3,2)
  Estimated value. This figure have been taken from the CA (Quebec) dataset
  production volume 47.0798 m3
- paper, woodfree, coated: 0.000159173 kg; lognormal variance with pedigree 0.0002, pedigree (1,1,2,1,1)
  Estimated value. This figure have been taken from the CA (Quebec) dataset
  Uncertainty: Calculated variable. Uncertainty will be determined from propagation of uncertainty factors of underlying variables. Uncertainty of actual relation between variables not accounted at this time, although this could be included in a future update.
- sodium percarbonate, powder: 3.66038e-7 kg; lognormal variance with pedigree 0.0041, pedigree (2,4,2,3,2)
  Estimated value. This figure have been taken from the CA (Quebec) dataset
- waste mineral oil: -4.92146e-6 kg; lognormal variance with pedigree 0.0041, pedigree (2,4,2,3,2)
  Estimated value. This figure have been taken from the CA (Quebec) dataset
  production volume 13890 kg
- concrete, normal: 5.89022e-7 m3; lognormal variance with pedigree 0.0041, pedigree (2,4,2,3,2)
  Estimated value. This figure have been taken from the CA (Quebec) dataset
- aluminium sulfate, powder: 3.25617e-6 kg; lognormal variance with pedigree 0.0041, pedigree (2,4,2,3,2)
  Estimated value. This figure have been taken from the CA (Quebec) dataset
- hazardous waste, for underground deposit: -1.99399e-5 kg; lognormal variance with pedigree 0.0032, pedigree (1,3,3,1,1)
  Amount and activity link based on primary data collected from participating companies.
  production volume 1.75109e6 kg
- light fuel oil: 5.34989e-6 kg; lognormal variance with pedigree 0.0032, pedigree (1,3,3,1,1)
  Amount and activity link based on primary data collected from participating companies. Emissions from fuel combustion included in dataset.
- copper: 3.88809e-7 kg; lognormal variance with pedigree 0.0032, pedigree (1,3,3,1,1)
  Amount and activity link based on primary data collected from participating companies.
- blasting: 4.41962e-6 kg; lognormal variance with pedigree 0.0032, pedigree (1,3,3,1,1)
  Amount and activity link based on primary data collected from participating companies.
- mine infrastructure, underground, non-ferrous metal: 6.12981e-13 unit; lognormal variance with pedigree 0.0887, pedigree (5,5,5,3,1)
  Estimation from author of 'zinc mine operation, GLO, 1994-2003' dataset. No primary data on infrastructure included.
- heat, district or industrial, other than natural gas: 5.49872e-6, 1.1772e-5, 0.000115716 MJ (3 entries); lognormal variance with pedigree 0.0032, pedigree (1,3,3,1,1)
  Amount and activity link based on primary data collected from participating companies.
- conveyor belt: 4.17476e-10 m; lognormal variance with pedigree 0.0587, pedigree (4,4,5,3,3)
  Estimation from author of 'zinc mine operation, GLO, 1994-2003' dataset: 2000 m conveyor belts are assumed to have a capacity of 2000 t/h which yields 2*10-5 m conveyor belt required per tonne mined raw ore. No primary data on infrastructure included.
- maize starch: 2.47207e-7 kg; lognormal variance with pedigree 0.0032, pedigree (1,3,3,1,1)
  Amount and activity link based on primary data collected from participating companies.
- electricity, medium voltage: 0.000930356, 0.000162079, 0.00014404, 6.1783e-5, 4.89752e-5, 5.93353e-5, 2.07824e-5, 0.000364326, 0.000277098, 0.000493486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 kWh (12 entries); lognormal variance with pedigree 0.0032, pedigree (1,3,3,1,1)
  Amount and activity link based on primary data collected from participating companies.
- zinc slag: -0.000262339 kg; lognormal variance with pedigree 0.0032, pedigree (1,3,3,1,1)
  Amount and activity link based on primary data collected from participating companies.
  production volume 2.1567e6 kg
- copper sulfate: 3.0804e-5 kg; lognormal variance with pedigree 0.0032, pedigree (1,3,3,1,1)
  Amount and activity link based on primary data collected from participating companies.
- heavy fuel oil: 1.55453e-6 kg; lognormal variance with pedigree 0.0032, pedigree (1,3,3,1,1)
  (same comment as for light fuel oil)
- electricity, high voltage: 0.000237965 kWh; lognormal variance with pedigree 0.0032, pedigree (1,3,3,1,1)
  Amount and activity link based on primary data collected from participating companies.
- diesel: 1.98162e-5, 6.37838e-5, 5.32229e-7 kg (3 entries); lognormal variance with pedigree 0.0032, pedigree (1,3,3,1,1)
  Amount and activity link based on primary data collected from participating companies. Emissions from diesel combustion included in dataset.
- tap water: 0.0151719 kg; lognormal variance with pedigree 0.0032, pedigree (1,3,3,1,1)
  Amount and activity link based on primary data collected from participating companies.
- aluminium chloride: 3.41827e-10 kg; lognormal variance with pedigree 0.0032, pedigree (1,3,3,1,1)
  Amount and activity link based on primary data collected from participating companies.
- steel, low-alloyed: 6.43105e-6 kg; lognormal variance with pedigree 0.0032, pedigree (1,3,3,1,1)
  Amount and activity link based on primary data collected from participating companies.
- concrete, normal: 9.78476e-9 m3; lognormal variance with pedigree 0.0032, pedigree (1,3,3,1,1)
  Amount and activity link based on primary data collected from participating companies.
- chemical, inorganic: 7.07326e-7 kg; lognormal variance with pedigree 0.0032, pedigree (1,3,3,1,1)
  Amount and activity link based on primary data collected from participating companies.
- waste wood, post-consumer: -6.87131e-8 kg; lognormal variance with pedigree 0.0032, pedigree (1,3,3,1,1)
  Amount and activity link based on primary data collected from participating companies.
  production volume 527319 kg
- acetic acid, without water, in 98% solution state: 1.35106e-7 kg; lognormal variance with pedigree 0.0032, pedigree (1,3,3,1,1)
  Amount and activity link based on primary data collected from participating companies.
- transport, freight, sea, bulk carrier for dry goods: 5.00098e-5 metric ton*km; lognormal variance with pedigree 0.1226, pedigree (1,3,3,1,1)
  Inbound transport of materials to sites. Amount and activity link based on primary data collected from participating companies.
- cement, unspecified: 5.92235e-7 kg; lognormal variance with pedigree 0.0032, pedigree (1,3,3,1,1)
  Amount and activity link based on primary data collected from participating companies.
- sodium dichromate: 2.8126e-8 kg; lognormal variance with pedigree 0.0032, pedigree (1,3,3,1,1)
  Amount and activity link based on primary data collected from participating companies.
- polyacrylamide: 1.1774e-6 kg; lognormal variance with pedigree 0.0032, pedigree (1,3,3,1,1)
  Amount and activity link based on primary data collected from participating companies.
- used Li-ion battery: -3.91662e-9 kg; lognormal variance with pedigree 0.0032, pedigree (1,3,3,1,1)
  Amount and activity link based on primary data collected from participating companies.
  production volume 30057 kg
- sodium sulfide: 7.91934e-7 kg; lognormal variance with pedigree 0.0032, pedigree (1,3,3,1,1)
  Amount and activity link based on primary data collected from participating companies.
- sodium hydrogen sulfite: 1.06862e-7 kg; lognormal variance with pedigree 0.0032, pedigree (1,3,3,1,1)
  Amount and activity link based on primary data collected from participating companies.
- soda ash, dense: 6.21933e-5 kg; lognormal variance with pedigree 0.0032, pedigree (1,3,3,1,1)
  Amount and activity link based on primary data collected from participating companies.
- non-sulfidic overburden, off-site: -0.0434839 kg; lognormal variance with pedigree 0.0032, pedigree (1,3,3,1,1)
  Amount and activity link based on primary data collected from participating companies.
  production volume 3.33704e11 kg
- propane: 4.49442e-6 kg; lognormal variance with pedigree 0.0032, pedigree (1,3,3,1,1)
  Amount and activity link based on primary data collected from participating companies.
- pig iron: 2.18645e-6 kg; lognormal variance with pedigree 0.0032, pedigree (1,3,3,1,1)
  Amount and activity link based on primary data collected from participating companies.
- natural gas, high pressure: 6.77871e-5, 5.66638e-7, 1.38062e-6 m3 (3 entries); lognormal variance with pedigree 0.0032, pedigree (1,3,3,1,1)
  (same comment as for light fuel oil)
- petrol, unleaded: 5.06486e-8, 1.60976e-9, 6.65277e-9, 1.60453e-9, 6.00253e-9, 3.3052e-10, 1.84754e-7 kg (7 entries); lognormal variance with pedigree 0.0032, pedigree (1,3,3,1,1)
  Amount and activity link based on primary data collected from participating companies.
- inert waste: -2.14918e-6, -1.85102e-8, -4.09738e-6 kg (3 entries); lognormal variance with pedigree 0.0032, pedigree (1,3,3,1,1)
  Amount and activity link based on primary data collected from participating companies.
  production volume 9.14737e6 kg
- lime, hydrated, packed: 3.555e-8, 4.18811e-6 kg (2 entries); lognormal variance with pedigree 0.0032, pedigree (1,3,3,1,1)
  Amount and activity link based on primary data collected from participating companies.
- limestone, crushed, washed: 2.44914e-11, 2.87235e-9 kg (2 entries); lognormal variance with pedigree 0.0032, pedigree (1,3,3,1,1)
  Amount and activity link based on primary data collected from participating companies.
- bilge oil: -2.97745e-9, -7.78286e-11, -6.19145e-9 kg (3 entries); lognormal variance with pedigree 0.0032, pedigree (1,3,3,1,1)
  Amount and activity link based on primary data collected from participating companies.
  production volume 70961.3 kg
- lime: 6.32416e-8, 7.19555e-6 kg (2 entries); lognormal variance with pedigree 0.0032, pedigree (1,3,3,1,1)
  Amount and activity link based on primary data collected from participating companies.
- hazardous waste, for incineration: -1.44627e-7 kg; lognormal variance with pedigree 0.0032, pedigree (1,3,3,1,1)
  Amount and activity link based on primary data collected from participating companies.
  production volume 6.58402e7 kg
- limestone, unprocessed: 1.52893e-6, 1.58282e-8, 3.87093e-5 kg (3 entries); lognormal variance with pedigree 0.0032, pedigree (1,3,3,1,1)
  Amount and activity link based on primary data collected from participating companies.
- hydrogen cyanide: 3.92754e-8, 8.64059e-8 kg (2 entries); lognormal variance with pedigree 0.0032, pedigree (1,3,3,1,1)
  Amount and activity link based on primary data collected from participating companies.
- sulfidic tailings, from zinc-lead mine operation: -0.00554233, -0.000780231, -0.000683375, -0.00144746, -0.000283036, -0.00187794, -0.000995467, -0.00318765 kg (8 entries); lognormal variance with pedigree 0.0032, pedigree (1,3,3,1,1)
  Amount and activity link based on primary data collected from participating companies.
  production volume 1.13556e11 kg
- iron sulfate: 2.26007e-7, 4.57635e-7 kg (2 entries); lognormal variance with pedigree 0.0032, pedigree (1,3,3,1,1)
  Amount and activity link based on primary data collected from participating companies.
- nylon 6: 2.30217e-8 kg; lognormal variance with pedigree 0.0032, pedigree (1,3,3,1,1)
  Amount and activity link based on primary data collected from participating companies.
- zinc monosulfate: 1.11406e-6, 5.88522e-6 kg (2 entries); lognormal variance with pedigree 0.0032, pedigree (1,3,3,1,1)
  Amount and activity link based on primary data collected from participating companies.
- concrete, 35MPa: 2.22058e-10, 1.38857e-12, 8.87542e-12, 1.83238e-9 m3 (4 entries); lognormal variance with pedigree 0.0032, pedigree (1,3,3,1,1)
  Amount and activity link based on primary data collected from participating companies.
- transport, freight, lorry 16-32 metric ton, EURO3: 4.06085e-5, 5.46858e-5 metric ton*km (2 entries); lognormal variance with pedigree 0.1226, pedigree (1,3,3,1,1)
  (same comment as for transport, freight, sea, bulk carrier for dry goods)
- acrylic acid: 9.10223e-9, 4.32094e-8 kg (2 entries); lognormal variance with pedigree 0.0032, pedigree (1,3,3,1,1)
  Amount and activity link based on primary data collected from participating companies.
- sulfuric acid: 0.000101142 kg; lognormal variance with pedigree 0.0032, pedigree (1,3,3,1,1)
  Amount and activity link based on primary data collected from participating companies.
- sulfur dioxide, liquid: 6.60863e-7, 1.27016e-6 kg (2 entries); lognormal variance with pedigree 0.0032, pedigree (1,3,3,1,1)
  Amount and activity link based on primary data collected from participating companies.
- waste paper, unsorted: -7.06225e-6, -4.32943e-5 kg (2 entries); lognormal variance with pedigree 0.0032, pedigree (1,3,3,1,1)
  Amount and activity link based on primary data collected from participating companies.
  production volume 4446.2 kg
- sodium cyanide: 1.01334e-7, 2.05188e-7 kg (2 entries); lognormal variance with pedigree 0.0032, pedigree (1,3,3,1,1)
  Amount and activity link based on primary data collected from participating companies.
- waste mineral oil: -1.64955e-6, -7.721e-8 kg (2 entries); lognormal variance with pedigree 0.0032, pedigree (1,3,3,1,1)
  Amount and activity link based on primary data collected from participating companies.
  production volume 1.91672e6 kg
- calcium chloride: 1.31403e-7, 4.55033e-7 kg (2 entries); lognormal variance with pedigree 0.0032, pedigree (1,3,3,1,1)
  Amount and activity link based on primary data collected from participating companies.
- municipal solid waste: -1.24506e-6, -1.70933e-6, -3.23195e-9, -2.88968e-7 kg (4 entries); lognormal variance with pedigree 0.0032, pedigree (1,3,3,1,1)
  Amount and activity link based on primary data collected from participating companies.
  production volume 2.68043e7 kg
- quicklime, milled, loose: 4.86077e-5, 0.00010473 kg (2 entries); lognormal variance with pedigree 0.0032, pedigree (1,3,3,1,1)
  Amount and activity link based on primary data collected from participating companies.
- waste rubber, unspecified: -5.04399e-10, -2.11746e-11, -5.04399e-10 kg (3 entries); lognormal variance with pedigree 0.0032, pedigree (1,3,3,1,1)
  Amount and activity link based on primary data collected from participating companies.
  production volume 7904.23 kg
- polyol: 6.73852e-8, 1.36446e-7 kg (2 entries); lognormal variance with pedigree 0.0032, pedigree (1,3,3,1,1)
  Amount and activity link based on primary data collected from participating companies.
- scrap copper: -4.50813e-8, -2.11512e-9, -9.49228e-8 kg (3 entries); lognormal variance with pedigree 0.0032, pedigree (1,3,3,1,1)
  Amount and activity link based on primary data collected from participating companies.
  production volume 1.09065e6 kg
- quicklime, in pieces, loose: 3.61439e-10, 2.18405e-5 kg (2 entries); lognormal variance with pedigree 0.0032, pedigree (1,3,3,1,1)
  Amount and activity link based on primary data collected from participating companies.
- oxygen, liquid: 0.000268612, 8.7766e-5 kg (2 entries); lognormal variance with pedigree 0.0032, pedigree (1,3,3,1,1)
  Amount and activity link based on primary data collected from participating companies.
- concrete, normal: 2.94516e-7, 5.89032e-7, 1.76388e-9, 5.85478e-8, 6.10061e-9, 2.77811e-8, 3.96811e-9 m3 (7 entries); lognormal variance with pedigree 0.0059, pedigree (2,4,3,3,2)
  Estimated value. Measured/calculated value for Quebec is extrapolated for GLO.
- transport, helicopter: 5.71064e-8 hour; lognormal variance with pedigree 0.1253, pedigree (2,4,3,3,2)
  Estimated value. Measured/calculated value for Quebec is extrapolated for GLO. This vehicle use corresponds to maintenance and operation services related to the operation of the whole company. Transports have been distributed among different activities (electricity production, transport and distribution) according to their respective use of these transports and, when the exact distribution was not available, according to the relative expenses of each activity.
- nuclear power plant, pressure water reactor, 650MW: 1.2133e-13 unit; lognormal variance with pedigree 0.0059, pedigree (2,4,3,3,2)
  Calculated generic value, not country specific.The amount of infrastructure input is calculated based on the assumption of an average lifetime of 30 years for this type of power plant. An average load factor for nuclear power plants of 73% was applied (PRIS database, 2018).
  Reference(s): International Atomic Energy Agency. 2018. Power Reactor Information System (PRIS), World Statistics, Load Factor, accessible online athttps://pris.iaea.org/PRIS/WorldStatistics/WorldTrendinAverageLoadFactor.aspx, last accessed February 2018
  ;activityLink introduced to establish a direct link to the corresponding regional supply of this product
- tap water: 0.000275583, 0.0016827, 1.3771e-5 kg (3 entries); lognormal variance with pedigree 0.0059, pedigree (2,4,3,3,2)
  Estimated value. Measured/calculated value for Quebec is extrapolated for GLO.
- uranium hexafluoride: 3.57626e-7, 3.57589e-7 kg (2 entries); lognormal variance with pedigree 0.0059, pedigree (2,4,3,3,2)
  Estimated value. Measured/calculated value for Quebec is extrapolated for GLO.
  As CANDU reactors use natural uranium (unenriched UO2) but no data were collected for UO2 production (impurities removal from yellowcake, refining to UO3 and conversion to UO2) uranium hexafluoride is used as proxy (UO3 is used to produce both UO2 and UF6).
- foaming agent: 3.87635e-8 kg; lognormal variance with pedigree 0.002, pedigree (1,1,3,1,1)
  Measured value. Reported in litres as foaming agent (saponin).
  Uncertainty: Calculated variable. Uncertainty will be determined from propagation of uncertainty factors of underlying variables. Uncertainty of actual relation between variables not accounted for at this time, although this could be included in a future update.
- strontium carbonate: 1.99686e-6 kg; lognormal variance with pedigree 0.0026, pedigree (1,1,3,1,1)
  Measured value.
- copper cake: -2.4152e-5 kg; lognormal variance with pedigree 0.0026, pedigree (1,1,3,1,1)
  Measured Value. Proxy created to estimate the treatment of the copper cake.
  production volume 2.40305e6 kg
- ammonium chloride: 1.93711e-6 kg; lognormal variance with pedigree 0.0026, pedigree (1,1,3,1,1)
  Measured value.
- sodium silicate, without water, in 37% solution state: 3.34157e-8 kg; lognormal variance with pedigree 0.002, pedigree (1,1,3,1,1)
  Measured value. Reported as 38% solution. Amount as been multiplied by concentration in order to have the active ingredient only.
  Uncertainty: Calculated variable. Uncertainty will be determined from propagation of uncertainty factors of underlying variables. Uncertainty of actual relation between variables not accounted for at this time, although this could be included in a future update.
- aluminium scrap, new: -2.85342e-6 kg; lognormal variance with pedigree 0.0026, pedigree (1,1,3,1,1)
  Measured value. Reported as scrap aluminium to recycling.
  production volume 567035 kg
- urea, as N: 1.18841e-7 kg; lognormal variance with pedigree 0.002, pedigree (1,1,3,1,1)
  Measured value.
  Uncertainty: Calculated variable. Uncertainty will be determined from propagation of uncertainty factors of underlying variables. Uncertainty of actual relation between variables not accounted for at this time, although this could be included in a future update.
- aluminium, wrought alloy: 9.63491e-6 kg; lognormal variance with pedigree 0.0026, pedigree (1,1,3,1,1)
  Measured value. Reported as secondary aluminium and used for alloy production.
- perlite: 1.19374e-7 kg; lognormal variance with pedigree 0.0026, pedigree (1,1,3,1,1)
  Measured value.
- lead: 4.05069e-6 kg; lognormal variance with pedigree 0.0032, pedigree (2,1,3,1,1)
  Calculated value. Lead for anode production, excluding the amount recovered from restored anodes.
- zinc concentrate: 0.0047341 kg; lognormal variance with pedigree 0.008, pedigree (1,1,3,1,1)
  EcoSpold01Location=GLO
  Measured value.
- electricity, high voltage: 0.00619345 kWh; lognormal variance with pedigree 0.0026, pedigree (1,1,3,1,1)
  Measured value. Reported in kWh at 120 kV. According to following document, high voltage is between 44 kV and 315 kV in Quebec region: http://www.hydroquebec.com/transenergie/fr/commerce/pdf/characteristics-and-target-values-of-voltage.pdf
- retention aid, for paper production: 9.10265e-7 kg; lognormal variance with pedigree 0.0026, pedigree (1,1,3,1,1)
  Proxy, reported as "flocculants (polyacrilamide)". Measured value.
- copper scrap, sorted, pressed: -3.17598e-7 kg; lognormal variance with pedigree 0.0026, pedigree (1,1,3,1,1)
  Measured value. Reported as scrap copper to recycling.
  production volume 59997.1 kg
- heat, district or industrial, natural gas: 0.00192481 MJ; lognormal variance with pedigree 0.002, pedigree (1,1,3,1,1)
  EcoSpold01Location=RER
  Calculated value based on reported fuel input (in m³), the Net Heating Value of the fuel and assumed efficiency (1/Fuel_use).
  Uncertainty: Calculated variable. Uncertainty will be determined from propagation of uncertainty factors of underlying variables. Uncertainty of actual relation between variables not accounted for at this time, although this could be included in a future update.
- heat, central or small-scale, other than natural gas: 6.94166e-6 MJ; lognormal variance with pedigree 0.002, pedigree (1,1,3,1,1)
  Calculated value based on reported fuel input (in m³), the Net Heating Value of the fuel and assumed efficiency (1/Fuel_use).
  Uncertainty: Calculated variable. Uncertainty will be determined from propagation of uncertainty factors of underlying variables. Uncertainty of actual relation between variables not accounted for at this time, although this could be included in a future update.
- transport, passenger car, large size, petrol, EURO 3: 1.26097e-6 km; lognormal variance with pedigree 0.2906, pedigree (2,5,5,5,5)
  Calculated value. Reported as liters of petrol used in pickup trucks (1.031E-4 liter/kg). Conversion using : 0,081237 kg/km (taken directly from ecoinvent v3.0 dataset "transport, passenger car, large size, petrol, EURO 3, GLO") and 0.75 kg/l (taken from Table 5.1 of the data quality guideline).
- heat, district or industrial, other than natural gas: 1.05759e-5 MJ; lognormal variance with pedigree 0.002, pedigree (1,1,3,1,1)
  (same comment as for heat, central or small-scale, other than natural gas)
- precious metal refinery: 1.00643e-13 unit; lognormal variance with pedigree 0.002, pedigree (1,1,3,1,1)
  Proxy. Estimated value. The service life, surface area covered and annual production volume of the actual plant, 50 years, 30 ha and more than 250 000 t respectively, are very different than the values assumed for the precious metal refinery modeled by the dataset, 25 years, 0,5 ha and 243 t respectively.
  Uncertainty: Calculated variable. Uncertainty will be determined from propagation of uncertainty factors of underlying variables. Uncertainty of actual relation between variables not accounted for at this time, although this could be included in a future update.
- heat, district or industrial, other than natural gas: 0.000302704 MJ; lognormal variance with pedigree 0.002, pedigree (1,1,3,1,1)
  (same comment as for heat, district or industrial, natural gas)
- municipal solid waste: -4.66995e-6 kg; lognormal variance with pedigree 0.0026, pedigree (1,1,3,1,1)
  Measured value. Reported as household waste.
  production volume 928019 kg
- silver: 1.64084e-8 kg; lognormal variance with pedigree 0.0032, pedigree (2,1,3,1,1)
  Calculated value. Silver for anode production, excluding the amount recovered from restored anodes.
- waste mineral oil: -8.55495e-8 kg; lognormal variance with pedigree 0.0026, pedigree (1,1,3,1,1)
  Measured value. Reported as used oil and grease and sent to an external company. Assumed to be incinerated (expert jugement).
  production volume 17000.5 kg
- aluminium, primary, ingot: 2.95949e-6 kg; lognormal variance with pedigree 0.0026, pedigree (1,1,3,1,1)
  Measured value. Reported as primary aluminium for the cathode sheets.
- sodium hydroxide, without water, in 50% solution state: 7.52469e-7 kg; lognormal variance with pedigree 0.002, pedigree (1,1,3,1,1)
  Measured value. Reported as 50% solution. Amount as been divided in half in order to have the active ingredient only.
  Uncertainty: Calculated variable. Uncertainty will be determined from propagation of uncertainty factors of underlying variables. Uncertainty of actual relation between variables not accounted for at this time, although this could be included in a future update.
- section bar extrusion, aluminium: 1.60969e-7 kg; lognormal variance with pedigree 0.002, pedigree (1,1,3,1,1)
  Measured value. Proxy for the production of the copper bars (anodes and equipotentials).
  Uncertainty: Calculated variable. Uncertainty will be determined from propagation of uncertainty factors of underlying variables. Uncertainty of actual relation between variables not accounted for at this time, although this could be included in a future update.
- hydrogen peroxide, without water, in 50% solution state: 2.45446e-5 kg; lognormal variance with pedigree 0.002, pedigree (1,1,3,1,1)
  Measured value. Reported as 50% solution. Amount as been multiplied by concentration in order to have the active ingredient only.
  Uncertainty: Calculated variable. Uncertainty will be determined from propagation of uncertainty factors of underlying variables. Uncertainty of actual relation between variables not accounted for at this time, although this could be included in a future update.
- potassium permanganate: 7.77765e-8 kg; lognormal variance with pedigree 0.0026, pedigree (1,1,3,1,1)
  Measured value.
- pyridine: 3.44744e-7 kg; lognormal variance with pedigree 0.0026, pedigree (1,1,3,1,1)
  Measured value. Reported as cyclic amine (confidential).
- sodium dithionite, anhydrous: 1.36306e-6 kg; lognormal variance with pedigree 0.0026, pedigree (1,1,3,1,1)
  Measured value.
- hot rolling, steel: 8.54902e-6 kg; lognormal variance with pedigree 0.002, pedigree (1,1,3,1,1)
  Measured value. Proxy for anodes production. Includes the amount of new metal and metal in the recycled anodes.
  Uncertainty: Calculated variable. Uncertainty will be determined from propagation of uncertainty factors of underlying variables. Uncertainty of actual relation between variables not accounted for at this time, although this could be included in a future update.
- cement, Portland: 9.71912e-5 kg; lognormal variance with pedigree 0.0026, pedigree (1,1,3,1,1)
  Measured value. Reported as Portland cement type10.
- waste glass: -2.54182e-9 kg; lognormal variance with pedigree 0.0026, pedigree (1,1,3,1,1)
  Measured value. Reported as glass to recycling.
  production volume 505.114 kg
- sheet rolling, aluminium: 5.76339e-6 kg; lognormal variance with pedigree 0.0026, pedigree (1,1,3,1,1)
  Measured value. Proxy for the production of aluminium cathode sheets.
- manganese dioxide: 5.04074e-6 kg; lognormal variance with pedigree 0.0026, pedigree (1,1,3,1,1)
  Measured value.
- dithiocarbamate-compound: 6.48459e-8 kg; lognormal variance with pedigree 0.0032, pedigree (2,1,1,5,1)
  Calculated as the production-volume weighted average of the exchange amounts of the corresponding regional datasets.
- triazine-compound, unspecified: 6.48459e-8 kg; lognormal variance with pedigree 0.0032, pedigree (2,1,1,5,1)
  (same comment as for dithiocarbamate-compound)
- wood chips, dry, measured as dry mass: 0.000323182 kg; lognormal variance with pedigree 0.0027, pedigree (1,2,1,5,1)
  (same comment as for dithiocarbamate-compound)
- ethylene glycol: 8.85647e-9 kg; lognormal variance with pedigree 0.0032, pedigree (2,1,1,5,1)
  (same comment as for dithiocarbamate-compound)
- methanol, from biomass: 2.46083e-6 kg; lognormal variance with pedigree 0.0027, pedigree (1,2,1,5,1)
  (same comment as for dithiocarbamate-compound)
- digester sludge: -6.33389e-7 kg; lognormal variance with pedigree 0.0027, pedigree (1,2,1,5,1)
  (same comment as for dithiocarbamate-compound)
  production volume 390647 kg
- phosphoric acid, industrial grade, without water, in 85% solution state: 2.52756e-7 kg; lognormal variance with pedigree 0.0026, pedigree (1,1,1,5,1)
  (same comment as for dithiocarbamate-compound)
- fatty alcohol: 7.25278e-7 kg; lognormal variance with pedigree 0.0032, pedigree (2,1,1,5,1)
  (same comment as for dithiocarbamate-compound)
- green liquor dregs: -7.17415e-5 kg; lognormal variance with pedigree 0.0027, pedigree (1,2,1,5,1)
  (same comment as for dithiocarbamate-compound)
  production volume 4.42471e7 kg
- hydrochloric acid, without water, in 30% solution state: 2.55013e-7 kg; lognormal variance with pedigree 0.0032, pedigree (2,1,1,5,1)
  (same comment as for dithiocarbamate-compound)
- limestone residue: -1.17477e-5 kg; lognormal variance with pedigree 0.0027, pedigree (1,2,1,5,1)
  (same comment as for dithiocarbamate-compound)
  production volume 1.64706e7 kg
- propane, burned in building machine: 6.56284e-6 MJ; lognormal variance with pedigree 0.002, pedigree (1,1,1,5,1)
  (same comment as for dithiocarbamate-compound)
- manganese: 1.19853e-8 kg; lognormal variance with pedigree 0.0032, pedigree (2,1,1,5,1)
  (same comment as for dithiocarbamate-compound)
- methanol: 6.26786e-6 kg; lognormal variance with pedigree 0.0032, pedigree (2,1,1,5,1)
  (same comment as for dithiocarbamate-compound)
- sludge from pulp and paper production: -2.56618e-5 kg; lognormal variance with pedigree 0.0027, pedigree (1,2,1,5,1)
  (same comment as for dithiocarbamate-compound)
  production volume 3.59786e7 kg
- spent solvent mixture: -1.25676e-7 kg; lognormal variance with pedigree 0.0026, pedigree (1,1,1,5,1)
  (same comment as for dithiocarbamate-compound)
  production volume 387.777 kg
- wood ash mixture, pure: -1.25073e-5 kg; lognormal variance with pedigree 0.0026, pedigree (1,1,1,5,1)
  (same comment as for dithiocarbamate-compound)
  production volume 1.75356e7 kg
- residual softwood, wet: 2.73703e-7 m3; lognormal variance with pedigree 0.0027, pedigree (1,2,1,5,1)
  (same comment as for dithiocarbamate-compound)
- calcium carbonate, precipitated: 1.28165e-5 kg; lognormal variance with pedigree 0.0027, pedigree (1,2,1,5,1)
  (same comment as for dithiocarbamate-compound)
- sodium formate: 5.303e-7 kg; lognormal variance with pedigree 0.0027, pedigree (1,2,1,5,1)
  (same comment as for dithiocarbamate-compound)
- EDTA, ethylenediaminetetraacetic acid: 1.73224e-6 kg; lognormal variance with pedigree 0.0027, pedigree (1,2,1,5,1)
  (same comment as for dithiocarbamate-compound)
- adipic acid: 5.48939e-10 kg; lognormal variance with pedigree 0.0032, pedigree (2,1,1,5,1)
  (same comment as for dithiocarbamate-compound)
- bark chips, wet, measured as dry mass: 0.000244426 kg; lognormal variance with pedigree 0.0052, pedigree (1,3,3,5,1)
  (same comment as for dithiocarbamate-compound)
- sodium sulfate, anhydrite: 2.22547e-6 kg; lognormal variance with pedigree 0.0027, pedigree (1,2,1,5,1)
  (same comment as for dithiocarbamate-compound)
- magnesium sulfate: 6.06808e-6 kg; lognormal variance with pedigree 0.0027, pedigree (1,2,1,5,1)
  (same comment as for dithiocarbamate-compound)
- malusil: 1.34901e-5 kg; lognormal variance with pedigree 0.0087, pedigree (2,2,1,5,1)
  (same comment as for dithiocarbamate-compound)
- sodium chlorate, powder: 8.43484e-5 kg; lognormal variance with pedigree 0.0027, pedigree (1,2,1,5,1)
  (same comment as for dithiocarbamate-compound)
- pulpwood, hardwood, measured as solid wood under bark: 1.05529e-5 m3; lognormal variance with pedigree 0.0052, pedigree (1,3,3,5,1)
  (same comment as for dithiocarbamate-compound)
- sawlog and veneer log, softwood, measured as solid wood under bark: 1.22767e-8 m3; lognormal variance with pedigree 0.0026, pedigree (1,1,1,5,1)
  (same comment as for dithiocarbamate-compound)
- sodium chloride, powder: 1.71666e-6 kg; lognormal variance with pedigree 0.0032, pedigree (2,1,1,5,1)
  (same comment as for dithiocarbamate-compound)
- spent antifreezer liquid: -3.77989e-10 kg; lognormal variance with pedigree 0.0026, pedigree (1,1,1,5,1)
  (same comment as for dithiocarbamate-compound)
  production volume 529.951 kg
- sugar, from sugar beet: 5.73929e-8 kg; lognormal variance with pedigree 0.0026, pedigree (1,1,1,5,1)
  (same comment as for dithiocarbamate-compound)
- pulp factory: 1.87392e-13 unit; lognormal variance with pedigree 0.478, pedigree (4,5,5,5,5)
  (same comment as for dithiocarbamate-compound)
- solvent, organic: 6.33828e-10 kg; lognormal variance with pedigree 0.0032, pedigree (2,1,1,5,1)
  (same comment as for dithiocarbamate-compound)
- wood chips, wet, measured as dry mass: 0.00168703 kg; lognormal variance with pedigree 0.0052, pedigree (1,3,3,5,1)
  (same comment as for dithiocarbamate-compound)
- electricity, medium voltage: 7.05968e-7, 0.000156 kWh (2 entries); lognormal variance with pedigree 0.0026, pedigree (1,1,1,5,1)
  (same comment as for dithiocarbamate-compound)
- light fuel oil: 9.62543e-8, 1.38814e-8, 1.94264e-7, 1.28911e-8, 1.86788e-8 kg (5 entries); lognormal variance with pedigree 0.0027, pedigree (1,2,1,5,1)
  (same comment as for dithiocarbamate-compound)
- heavy fuel oil: 3.46656e-5, 9.03085e-6, 2.67346e-5, 5.25878e-6, 6.74624e-6 kg (5 entries); lognormal variance with pedigree 0.0027, pedigree (1,2,1,5,1)
  (same comment as for dithiocarbamate-compound)
- natural gas, high pressure: 2.70627e-6, 1.3038e-6, 2.17046e-6, 5.58645e-5, 4.15551e-5 m3 (5 entries); lognormal variance with pedigree 0.0027, pedigree (1,2,1,5,1)
  (same comment as for dithiocarbamate-compound)
- electricity, high voltage: 9.90585e-7, 1.8039e-7, 3.08123e-6, 4.43591e-5, 7.14452e-6 kWh (5 entries); lognormal variance with pedigree 0.0027, pedigree (1,2,1,5,1)
  (same comment as for dithiocarbamate-compound)
- sand: 7.02167e-11, 1.35252e-8, 8.80165e-7 kg (3 entries); lognormal variance with pedigree 0.0027, pedigree (1,2,1,5,1)
  (same comment as for dithiocarbamate-compound)
- waste packaging paper: -1.52731e-8, -2.33227e-9, -2.03936e-10, -8.42748e-9, -8.21749e-10, -1.52114e-9, -2.83722e-7 kg (7 entries); lognormal variance with pedigree 0.0027, pedigree (1,2,1,5,1)
  (same comment as for dithiocarbamate-compound)
  production volume 437854 kg
- tap water: 0.000159753, 3.17806e-5, 2.08477e-5, 5.9301e-5 kg (4 entries); lognormal variance with pedigree 0.0026, pedigree (1,1,1,5,1)
  (same comment as for dithiocarbamate-compound)
- bark: -1.70237e-10 kg; lognormal variance with pedigree 0.0027, pedigree (1,2,1,5,1)
  Data provided by industry (EPIS) 2017
  production volume 3.62438e8 kg
- wood pellet, measured as dry mass: 1.7554e-11 kg; lognormal variance with pedigree 0.0027, pedigree (1,2,1,5,1)
  Data provided by industry (EPIS) 2017, indicated in energy content. Calculation into mass/volume was done by using the following conversion factor: Wood pallets: MJ/kg 16.75. Source: http://www.fao.org/docrep/T0269e/t0269e0c.htm
- sulfur: 6.30147e-13 kg; lognormal variance with pedigree 0.0027, pedigree (1,2,1,5,1)
  Data provided by industry (EPIS) 2017
- sodium sulfite: 7.41971e-14 kg; lognormal variance with pedigree 0.0027, pedigree (1,2,1,5,1)
  Data provided by industry (EPIS) 2017
- ozone, liquid: 6.67774e-14 kg; lognormal variance with pedigree 0.0027, pedigree (1,2,1,5,1)
  Data provided by industry (EPIS) 2017
  Uncertainty: average from KCL EcoData
- heavy fuel oil: 9.64917e-7 kg; lognormal variance with pedigree 0.0027, pedigree (1,2,1,5,1)
  Data provided by industry (EPIS) 2017, indicated in energy content. Calculation into mass/volume was done by using the following conversion factor: Heavy fuel oil: MJ/kg 42.6. Source: http://www.fao.org/docrep/T0269e/t0269e0c.htm
  EcoSpold01Location=RER
- electricity, high voltage: 4.18317e-12, 2.07342e-11 kWh (2 entries); lognormal variance with pedigree 0.0027, pedigree (1,2,1,5,1)
  Data provided by industry (EPIS) 2017
- light fuel oil: 6.34724e-7 kg; lognormal variance with pedigree 0.0027, pedigree (1,2,1,5,1)
  Data provided by industry (EPIS) 2017, indicated in energy content. Calculation into mass/volume was done by using the following conversion factor: Light fuel oil: MJ/kg 43.5. Source: http://www.fao.org/docrep/T0269e/t0269e0c.htm
- natural gas, high pressure: 5.82694e-7, 6.835e-13 m3 (2 entries); lognormal variance with pedigree 0.0027, pedigree (1,2,1,5,1)
  Data provided by industry (EPIS) 2017, indicated in energy content. Calculation into mass/volume was done by using the following conversion factor: Natural gas: MJ/m3 39. Source: Ecoinvent, during technical review.
  EcoSpold01Location=RER
- pulpwood, softwood, measured as solid wood under bark: 0 m3; pedigree (1,1,1,1,1)
  EcoSpold01Location=RER
  Data provided by industry (EPIS) 2017; Represents wood sources explicitly: pine wood certified (major part) and pinus contorta certified
- pulpwood, softwood, measured as solid wood under bark: 7.79102e-12 m3; lognormal variance with pedigree 0.0027, pedigree (1,2,1,5,1)
  (same comment as for pulpwood, softwood, measured as solid wood under bark)
- printing ink, offset, without solvent, in 47.5% solution state: 1.04386e-6 kg; lognormal variance with pedigree 0.0099, pedigree (2,3,4,3,1)
  Calculated value: average ink consumption of three companies
- industrial machine, heavy, unspecified: 2.45482e-8 kg; lognormal variance with pedigree 0.0493, pedigree (5,3,4,3,1)
  Estimate value: Weight of offset printing equipment given by one of the companies indicating main material steal and furhter materials aluminium, rubber and electronics. Assumption comparable equipment weight in other companies and similar production as for industrial machines.
- thermoforming, with calendering: 4.48173e-8, 4.3965e-8 kg (2 entries); lognormal variance with pedigree 0.0967, pedigree (5,5,4,3,4)
  Estimate value: Assumed processing for rubber blankets.
- acrylic dispersion, without water, in 65% solution state: 1.34002e-7 kg; lognormal variance with pedigree 0.0099, pedigree (2,3,4,3,1)
  Calculated value: average consumption of three companies
- isopropanol: 2.45482e-7 kg; lognormal variance with pedigree 0.0099, pedigree (2,3,4,3,1)
  Calculated value: average Ispopropanol use of three companies (with low VOC consumption)
- white spirit: 6.80367e-7 kg; lognormal variance with pedigree 0.0113, pedigree (3,3,4,3,1)
  Calculate value: Average value for different petrol based cleaners of three companies. Only a portion is relied to the use of white spirit itself, the data set ist used also as estimate for the production of other petrol based mixtures. Except for mixtures containing VOCs with high boiling point all VOCs are assumed to be emitted to air. The less volatil content with high boiling VOCs is assumed to be delivered to a professional treatment. Heptan emissions represent emissions from white spirit. Methanol and Propylene oxide emissions represent the Methoxypropanol content and Toluol, Xylene and Ethylbenzol the content of solvent naphtha in furhter used mixtures.
- waste paperboard, unsorted: -1.96749e-5 kg
  production volume 3.1681e9 kg
- acrylic varnish, without water, in 87.5% solution state: 4.40291e-8 kg; lognormal variance with pedigree 0.0099, pedigree (2,3,4,3,1)
  Calculated value: average consumption of three companies
- textile, woven cotton: 6.29061e-8 kg; lognormal variance with pedigree 0.0573, pedigree (4,3,4,3,4)
  Calculated value: average consumption of textiles in printing process of three companies (including the portion of textile within rubber blankets)
- ethylene glycol monoethyl ether: 5.90057e-8 kg; lognormal variance with pedigree 0.0099, pedigree (2,3,4,3,1)
  Calculated value: Average consumption of three companies
- synthetic rubber: 3.99297e-8 kg; lognormal variance with pedigree 0.0513, pedigree (3,3,4,3,4)
  Calculated value: average consumption of rubber blankets of three companies. Assumptions on the portion of rubber and textile content derived from product declarations
- electricity, low voltage: 8.65168e-7, 1.5174e-7, 3.44146e-6, 1.23385e-5, 2.49521e-6, 3.77348e-5, 6.21991e-6, 1.77172e-5 kWh (8 entries); lognormal variance with pedigree 0.0099, pedigree (2,3,4,3,1)
  EcoSpold01Location=CH
  Calculated values: Average consumption of three companies
- corrugated board box: 1.15549e-7, 9.81633e-6 kg (2 entries); lognormal variance with pedigree 0.0099, pedigree (2,3,4,3,1)
  The
- heat, district or industrial, natural gas: 0.00021366, 0.000125231 MJ (2 entries); lognormal variance with pedigree 0.0099, pedigree (2,3,4,3,1)
  Calculated value: Average consumption of three companies
- spent solvent mixture: -4.35104e-8 kg; lognormal variance with pedigree 0.0113, pedigree (3,3,4,3,1)
  Estimate value: recovered solvent given declared only by one of tree companies. Recovery and professional waste treatment of 'non-voc wash' products assumed for the other companies.
  production volume 5.38792e7 kg
- waste emulsion paint: -2.60671e-9, -2.91483e-8 kg (2 entries); lognormal variance with pedigree 0.0099, pedigree (2,3,4,3,1)
  Calculated value: average value for disposal of paints of three companies
  production volume 1.01293e7 kg
- scrap steel: -3.47228e-8 kg; lognormal variance with pedigree 0.0367, pedigree (4,3,4,3,1)
  (same comment as for waste plastic, mixture)
- waste packaging paper: -3.97631e-7 kg; lognormal variance with pedigree 0.0007, pedigree (1,2,1,1,1)
  Data provided by industry (EPIS) 2017. Represents waste packaging such as corrugated containers, cartonboard etc. Can be also plastic or anything that is recyclable is separated and recycled, glass, metal, paper. Is produced in small side tasks of the overall pulp process in order to "keep the pulp site funktioning".
  production volume 146758 kg
- electricity, high voltage: 7.09896e-5 kWh; lognormal variance with pedigree 0.0007, pedigree (1,2,1,1,1)
  Data provided by industry (EPIS) 2017
- sodium sulfate, anhydrite: 2.8335e-6 kg; lognormal variance with pedigree 0.0007, pedigree (1,2,1,1,1)
  Data provided by industry (EPIS) 2017
- transport, freight train: 0.00121889 metric ton*km; lognormal variance with pedigree 0.0061, pedigree (1,2,1,1,1)
  Data provided by industry (EPIS) 2017
- hydrogen peroxide, without water, in 50% solution state: 2.95145e-5 kg; lognormal variance with pedigree 0.0007, pedigree (1,2,1,1,1)
  Data provided by industry (EPIS) 2017
  EcoSpold01Location=RER
- transport, freight, lorry >32 metric ton, EURO5: 0.00119229 metric ton*km; lognormal variance with pedigree 0.0061, pedigree (1,2,1,1,1)
  Data provided by industry (EPIS) 2017
- transport, freight, inland waterways, barge: 0.000423744 metric ton*km; lognormal variance with pedigree 0.0007, pedigree (1,2,1,1,1)
  Data provided by industry (EPIS) 2017
- light fuel oil: 2.8044e-7 kg; lognormal variance with pedigree 0.0007, pedigree (1,2,1,1,1)
  (same comment as for light fuel oil)
- sand: 1.13795e-6 kg; lognormal variance with pedigree 0.0007, pedigree (1,2,1,1,1)
  Data provided by industry (EPIS) 2017
- sodium formate: 6.75191e-7 kg; lognormal variance with pedigree 0.0007, pedigree (1,2,1,1,1)
  Data provided by industry (EPIS) 2017
- waste wood, untreated: -5.07644e-5 kg; lognormal variance with pedigree 0.0007, pedigree (1,2,1,1,1)
  Data provided by industry (EPIS) 2017. Represents bark and wood wastes
  production volume 1.86642e7 kg
- pulp factory: 1.81693e-13 unit; lognormal variance with pedigree 0.3021, pedigree (3,2,1,1,1)
  EcoSpold01Location=RER
  Own estimation with yearly production volume and a lifetime of a factory of 50 years;activityLink introduced to establish a direct link to the corresponding regional supply of this product
- limestone residue: -1.49575e-5 kg; lognormal variance with pedigree 0.0007, pedigree (1,2,1,1,1)
  EcoSpold01Location=CH
  Data provided by industry (EPIS) 2017; including lime kiln ash, lime mud and lime sludge
  production volume 5.52053e6 kg
- calcium carbonate, precipitated: 1.63183e-5 kg; lognormal variance with pedigree 0.0007, pedigree (1,2,1,1,1)
  Data provided by industry (EPIS) 2017
- heavy fuel oil: 3.99096e-5 kg; lognormal variance with pedigree 0.0007, pedigree (1,2,1,1,1)
  (same comment as for heavy fuel oil)
- sodium chlorate, powder: 4.25557e-5 kg; lognormal variance with pedigree 0.0007, pedigree (1,2,1,1,1)
  Data provided by industry (EPIS) 2017
  EcoSpold01Location=RER
- methanol, from biomass: 3.13318e-6 kg; lognormal variance with pedigree 0.0007, pedigree (1,2,1,1,1)
  Data provided by industry (EPIS) 2017. Represents biofuel from bark and tall oil pitch. Calculated from energetic value with conversion factor 23 MJ/kg
- pulpwood, hardwood, measured as solid wood under bark: 1.3094e-5 m3; lognormal variance with pedigree 0.0061, pedigree (1,2,1,1,1)
  Data provided by industry (EPIS) 2017; Represents birch wood
- natural gas, high pressure: 4.36891e-7 m3; lognormal variance with pedigree 0.0007, pedigree (1,2,1,1,1)
  (same comment as for natural gas, high pressure)
- sludge from pulp and paper production: -6.57842e-6, -4.86484e-9 kg (2 entries); lognormal variance with pedigree 0.0007, pedigree (1,2,1,1,1)
  Data provided by industry (EPIS) 2017
  production volume 2.42978e6 kg
- sodium sulfite: 2.48955e-13 kg; lognormal variance with pedigree 0.0007, pedigree (1,2,1,1,1)
  Data provided by industry (EPIS) 2017
- ozone, liquid: 2.24059e-13 kg; lognormal variance with pedigree 0.0007, pedigree (1,2,1,1,1)
  Data provided by industry (EPIS) 2017
  Uncertainty: average from KCL EcoData
- wood pellet, measured as dry mass: 5.88992e-11 kg; lognormal variance with pedigree 0.0007, pedigree (1,2,1,1,1)
  (same comment as for wood pellet, measured as dry mass)
- sodium hypochlorite, without water, in 15% solution state: 5.19814e-9 kg; lognormal variance with pedigree 0.0007, pedigree (1,2,1,1,1)
  Data provided by industry (EPIS) 2017
- pulpwood, softwood, measured as solid wood under bark: 1.68543e-11 m3; lognormal variance with pedigree 0.0007, pedigree (1,2,1,1,1)
  Data provided by industry (EPIS) 2017; Represents wood sources explicitly: pine wood certified (major part) and pinus contorta certified
  EcoSpold01Location=RER
- pulpwood, softwood, measured as solid wood under bark: 9.54742e-12 m3; lognormal variance with pedigree 0.0007, pedigree (1,2,1,1,1)
  Data provided by industry (EPIS) 2017; Source explicitly spruce wood certified
- wood ash mixture, pure: -2.59624e-13 kg; lognormal variance with pedigree 0.0007, pedigree (1,2,1,1,1)
  Data provided by industry (EPIS) 2017; Represents 0.002058kg "fiber reject".
  EcoSpold01Location=CH
  production volume 1.6263e7 kg
- hydrogen, liquid: 6.06188e-7 kg; lognormal variance with pedigree 0.0059, pedigree (2,4,3,3,2)
  Estimated value. Measured/calculated value for Quebec is extrapolated for GLO.
- paper, woodfree, coated: 0.000153723 kg; lognormal variance with pedigree 0.002, pedigree (1,1,3,1,1)
  Estimated value. Measured/calculated value for Quebec is extrapolated for GLO.
  Uncertainty: Calculated variable. Uncertainty will be determined from propagation of uncertainty factors of underlying variables. Uncertainty of actual relation between variables not accounted at this time, although this could be included in a future update.
- waste reinforced concrete: -0.000214977 kg; lognormal variance with pedigree 0.21, pedigree (5,5,5,5,5)
  Estimated value. Same amount entering the dataset is estimated as by-product
  production volume 1.53158e8 kg
- carbon dioxide, liquid: 6.85739e-9 kg; lognormal variance with pedigree 0.0053, pedigree (2,4,3,3,1)
  Estimated value. Measured/calculated value for Quebec is extrapolated for GLO.
- transport, freight, light commercial vehicle: 7.66799e-7, 3.14644e-8, 7.35323e-7 metric ton*km (3 entries); lognormal variance with pedigree 0.0059, pedigree (2,4,3,3,2)
  (same comment as for transport, helicopter)
- anionic resin: 1.53151e-11 kg; lognormal variance with pedigree 0.0059, pedigree (2,4,3,3,2)
  Estimated value. Measured/calculated value for Quebec is extrapolated for GLO.
- cationic resin: 6.10687e-12 kg; lognormal variance with pedigree 0.0059, pedigree (2,4,3,3,2)
  Estimated value. Measured/calculated value for Quebec is extrapolated for GLO.
- nitrogen, liquid: 8.54019e-9 kg; lognormal variance with pedigree 0.0059, pedigree (2,4,3,3,2)
  Estimated value. Measured/calculated value for Quebec is extrapolated for GLO.
- transport, freight, lorry, unspecified: 1.44609e-6, 1.44607e-6 metric ton*km (2 entries); lognormal variance with pedigree 0.1253, pedigree (2,4,3,3,2)
  (same comment as for transport, helicopter)
- transport, passenger car: 6.46662e-7 km; lognormal variance with pedigree 0.0059, pedigree (2,4,3,3,2)
  (same comment as for transport, helicopter)
- hydrazine: 5.1746e-9 kg; lognormal variance with pedigree 0.0059, pedigree (2,4,3,3,2)
  Estimated value. Measured/calculated value for Quebec is extrapolated for GLO.
- fly ash and scrubber sludge: -3.66008e-7 kg; lognormal variance with pedigree 0.0059, pedigree (2,4,3,3,2)
  Estimated value. Measured/calculated value for Quebec is extrapolated for GLO.
  production volume 260758 kg
- chlorodifluoromethane: 4.37527e-10 kg; lognormal variance with pedigree 0.0059, pedigree (2,4,3,3,2)
  Estimated value. Measured/calculated value for Quebec is extrapolated for GLO.
- municipal solid waste: -2.84392e-7 kg; lognormal variance with pedigree 0.0059, pedigree (2,4,3,3,2)
  Estimated value. Measured/calculated value for Quebec is extrapolated for GLO.
  production volume 202612 kg
- sodium percarbonate, powder: 2.44005e-8 kg; lognormal variance with pedigree 0.0059, pedigree (2,4,3,3,2)
  Estimated value. Measured/calculated value for Quebec is extrapolated for GLO.
- chlorine, liquid: 3.86838e-8 kg; lognormal variance with pedigree 0.0059, pedigree (2,4,3,3,2)
  Estimated value. Measured/calculated value for Quebec is extrapolated for GLO.
- hard coal: 1.35088e-5 kg; lognormal variance with pedigree 0.0032, pedigree (1,3,3,1,1)
  Amount and activity link based on primary data collected from participating companies.
- ethoxylated alcohol (AE11): 7.91052e-9 kg; lognormal variance with pedigree 0.0032, pedigree (1,3,3,1,1)
  Amount based on primary data collected from participating companies.
- aluminium scrap, post-consumer: -7.8346e-9 kg; lognormal variance with pedigree 0.0032, pedigree (1,3,3,1,1)
  Amount based on primary data collected from participating companies.
  production volume 87573.2 kg
- aluminium scrap, new: -5.07289e-8 kg; lognormal variance with pedigree 0.2106, pedigree (5,5,5,5,5)
  Estimated value. This flow was added to the GLO dataset to make it consistent with the Peru (PE) regional one. As it is assumed not to be representative of the processes for which data was collected for this dataset, the amount was scaled down based on the ratio between the zinc production volumes of the PE and GLO datasets.
- zinc oxide: 5.36685e-5 kg; lognormal variance with pedigree 0.0032, pedigree (1,3,3,1,1)
  Amount based on primary data collected from participating companies.
- coke: 0.000781101 MJ; lognormal variance with pedigree 0.0032, pedigree (1,3,3,1,1)
  Amount and activity link based on primary data collected from participating companies.
- transport, freight, sea, container ship: 4.02043e-5 metric ton*km; lognormal variance with pedigree 0.1226, pedigree (1,3,3,1,1)
  Amount based on primary data collected from participating companies.
- zinc: 3.25503e-6 kg; lognormal variance with pedigree 0.0032, pedigree (1,3,3,1,1)
  Amount based on primary data collected from participating companies.
- transport, freight, lorry 3.5-7.5 metric ton, EURO3: 5.05843e-10 metric ton*km; lognormal variance with pedigree 0.1226, pedigree (1,3,3,1,1)
  Inbound transport of zinc concentrate and other materials to sites. Amount and activity link based on primary data collected from participating companies.
- transport, freight, lorry >32 metric ton, EURO3: 3.25836e-6 metric ton*km; lognormal variance with pedigree 0.1226, pedigree (1,3,3,1,1)
  (same comment as for transport, freight, lorry 3.5-7.5 metric ton, EURO3)
- sulfamic acid: 2.98189e-10 kg; lognormal variance with pedigree 0.0032, pedigree (1,3,3,1,1)
  Amount based on primary data collected from participating companies.
- anode, for metal electrolysis: 7.57401e-8 kg; lognormal variance with pedigree 0.0032, pedigree (1,3,3,1,1)
  Amount based on primary data collected from participating companies.
- transport, freight, lorry 16-32 metric ton, EURO4: 3.68001e-7 metric ton*km; lognormal variance with pedigree 0.1226, pedigree (1,3,3,1,1)
  (same comment as for transport, freight, lorry 3.5-7.5 metric ton, EURO3)
- butane: 4.19491e-8 kg; lognormal variance with pedigree 0.0032, pedigree (1,3,3,1,1)
  Amount based on primary data collected from participating companies.
- transport, freight train: 8.83135e-6 metric ton*km; lognormal variance with pedigree 0.1226, pedigree (1,3,3,1,1)
  (same comment as for transport, freight, lorry 3.5-7.5 metric ton, EURO3)
- antimony: 5.21125e-9 kg; lognormal variance with pedigree 0.0032, pedigree (1,3,3,1,1)
  Amount based on primary data collected from participating companies.
- sulfite pulp, bleached: 6.08732e-7 kg; lognormal variance with pedigree 0.0032, pedigree (1,3,3,1,1)
  Amount based on primary data collected from participating companies.
- barium carbonate: 1.34185e-7 kg; lognormal variance with pedigree 0.0032, pedigree (1,3,3,1,1)
  Amount based on primary data collected from participating companies.
- sodium silicate, without water, in 37% solution state: 2.18535e-8 kg; lognormal variance with pedigree 0.0032, pedigree (1,3,3,1,1)
  Amount based on primary data collected from participating companies.
- aluminium, cast alloy: 1.84705e-7 kg; lognormal variance with pedigree 0.0032, pedigree (1,3,3,1,1)
  Amount based on primary data collected from participating companies.
- activated silica: 4.1007e-6 kg; lognormal variance with pedigree 0.0032, pedigree (1,3,3,1,1)
  Amount based on primary data collected from participating companies.
- sodium hydrosulfide: 1.34008e-6 kg; lognormal variance with pedigree 0.0032, pedigree (1,3,3,1,1)
  Amount based on primary data collected from participating companies.
- silica sand: 2.5624e-5 kg; lognormal variance with pedigree 0.0032, pedigree (1,3,3,1,1)
  Amount based on primary data collected from participating companies.
- waste plastic, mixture: -1.26609e-8 kg; lognormal variance with pedigree 0.0032, pedigree (1,3,3,1,1)
  Amount and activity link based on primary data collected from participating companies.
  production volume 141520 kg
- waste glass: -7.86332e-9 kg; lognormal variance with pedigree 0.0032, pedigree (1,3,3,1,1)
  Amount and activity link based on primary data collected from participating companies.
  production volume 87894.3 kg
- petroleum coke: 4.50367e-8 kg; lognormal variance with pedigree 0.0032, pedigree (1,3,3,1,1)
  Amount based on primary data collected from participating companies.
- nitrogen, liquid: 6.99379e-6 kg; lognormal variance with pedigree 0.0032, pedigree (1,3,3,1,1)
  Amount and activity link based on primary data collected from participating companies.
- municipal solid waste: -0.000167958 kg; lognormal variance with pedigree 0.0032, pedigree (1,3,3,1,1)
  Amount and activity link based on primary data collected from participating companies.
  production volume 1.87739e9 kg
- manganese sulfate: 4.86284e-9 kg; lognormal variance with pedigree 0.0032, pedigree (1,3,3,1,1)
  Amount based on primary data collected from participating companies.
- municipal solid waste: -3.72737e-5 kg; lognormal variance with pedigree 0.0032, pedigree (1,3,3,1,1)
  Amount and activity link based on primary data collected from participating companies.
  production volume 4.16636e8 kg
- lead concentrate: 2.3419e-5 kg; lognormal variance with pedigree 0.0032, pedigree (1,3,3,1,1)
  Amount based on primary data collected from participating companies.
- iron(III) sulfate, without water, in 12.5% iron solution state: 3.28008e-7 kg; lognormal variance with pedigree 0.0032, pedigree (1,3,3,1,1)
  Amount based on primary data collected from participating companies.
- magnesium: 8.03262e-9 kg; lognormal variance with pedigree 0.0032, pedigree (1,3,3,1,1)
  Amount based on primary data collected from participating companies.
- iron(III) chloride, without water, in 14% iron solution state: 7.87172e-8 kg; lognormal variance with pedigree 0.0032, pedigree (1,3,3,1,1)
  Amount based on primary data collected from participating companies.
- ferrite: 9.05792e-7 kg; lognormal variance with pedigree 0.0032, pedigree (1,3,3,1,1)
  Amount based on primary data collected from participating companies.
- ethanol, without water, in 99.7% solution state, from ethylene: 3.92459e-8, 8.73886e-8 kg (2 entries); lognormal variance with pedigree 0.0032, pedigree (1,3,3,1,1)
  Amount based on primary data collected from participating companies.
- water, deionised: 6.12003e-6, 0.00170013, 0.00551915 kg (3 entries); lognormal variance with pedigree 0.0032, pedigree (1,3,3,1,1)
  Amount based on primary data collected from participating companies.
- clinker: 2.03311e-6, 4.58223e-7, 1.06287e-7, 8.15486e-8, 1.36255e-7, 3.31717e-8, 6.46089e-6 kg (7 entries); lognormal variance with pedigree 0.0032, pedigree (1,3,3,1,1)
  Amount based on primary data collected from participating companies.
- diesel: 6.06953e-7, 2.91787e-8, 1.22497e-6, 8.58041e-8, 1.2402e-7, 1.2096e-5 kg (6 entries); lognormal variance with pedigree 0.0032, pedigree (1,3,3,1,1)
  Amount based on primary data collected from participating companies. Emissions from diesel combustion included in dataset.
- tap water: 4.52484e-5 kg; lognormal variance with pedigree 0.0032, pedigree (1,3,3,1,1)
  Amount based on primary data collected from participating companies.
- cement, unspecified: 1.70991e-7, 1.41743e-8, 3.56973e-8, 8.21795e-7, 8.07306e-7, 2.37614e-8, 2.6097e-7, 3.15745e-8, 3.52665e-6 kg (9 entries); lognormal variance with pedigree 0.0032, pedigree (1,3,3,1,1)
  Amount based on primary data collected from participating companies.
- ammonia, liquid: 2.57141e-5 kg; lognormal variance with pedigree 0.0032, pedigree (1,3,3,1,1)
  Amount based on primary data collected from participating companies.
- steam, in chemical industry: 1.79635e-9, 1.01884e-8 kg (2 entries); lognormal variance with pedigree 0.0032, pedigree (1,3,3,1,1)
  Amount based on primary data collected from participating companies.
- waste textile, soiled: -6.13205e-8 kg; lognormal variance with pedigree 0.0032, pedigree (1,3,3,1,1)
  Amount based on primary data collected from participating companies.
  production volume 4.64799e7 kg
- wastewater, average: -2.00525e-9, -1.8536e-8, -3.87814e-8 m3 (3 entries); lognormal variance with pedigree 0.0032, pedigree (1,3,3,1,1)
  Amount based on primary data collected from participating companies.
  production volume 663094 m3
- waste paperboard: -3.8217e-10, -5.8359e-11, -5.10297e-12, -2.10876e-10, -2.05621e-11, -3.80627e-11, -9.38557e-10, -7.09942e-9 kg (8 entries); lognormal variance with pedigree 0.0032, pedigree (1,3,3,1,1)
  Amount based on primary data collected from participating companies.
  production volume 97840.1 kg
- waste gypsum: -1.01546e-8, -2.14818e-7, -6.99414e-7 kg (3 entries); lognormal variance with pedigree 0.0032, pedigree (1,3,3,1,1)
  Amount based on primary data collected from participating companies.
  production volume 1.03326e7 kg
- waste glass: -6.50565e-9, -5.99611e-10, -1.36032e-11, -5.59429e-11, -8.49524e-11, -2.50324e-10, -1.23577e-8 kg (7 entries); lognormal variance with pedigree 0.0032, pedigree (1,3,3,1,1)
  Amount based on primary data collected from participating companies.
  production volume 221572 kg
- sludge, pig iron production: -1.43202e-8, -3.22817e-7, -1.56606e-6 kg (3 entries); lognormal variance with pedigree 0.0032, pedigree (1,3,3,1,1)
  Amount based on primary data collected from participating companies.
  production volume 2.12735e7 kg
- waste polyethylene terephthalate: -5.76239e-11, -3.85021e-12, -2.91185e-13, -1.59027e-12, -6.42453e-13, -1.51011e-12, -4.99417e-11, -4.03399e-10 kg (8 entries); lognormal variance with pedigree 0.0032, pedigree (1,3,3,1,1)
  Amount based on primary data collected from participating companies.
  production volume 5799.57 kg
- meat and bone meal: 6.47469e-12, 3.84017e-9 kg (2 entries); lognormal variance with pedigree 0.0032, pedigree (1,3,3,1,1)
  Amount based on primary data collected from participating companies.
- liquefied petroleum gas: 9.16171e-9, 7.98347e-8, 3.25409e-8, 2.87608e-9, 6.40149e-10, 4.06023e-10, 1.37141e-7 kg (7 entries); lognormal variance with pedigree 0.0032, pedigree (1,3,3,1,1)
  Amount based on primary data collected from participating companies.
- hydrochloric acid, without water, in 30% solution state: 5.29153e-8 kg; lognormal variance with pedigree 0.0032, pedigree (1,3,3,1,1)
  Amount based on primary data collected from participating companies.
- hard coal: 1.04141e-6, 2.80238e-6, 1.72059e-6, 1.68607e-6, 4.00091e-7, 1.31275e-6, 7.31699e-7, 3.71843e-6 kg (8 entries); lognormal variance with pedigree 0.0032, pedigree (1,3,3,1,1)
  Amount based on primary data collected from participating companies.
- esterquat: 4.8755e-10, 9.70543e-10 kg (2 entries); lognormal variance with pedigree 0.0032, pedigree (1,3,3,1,1)
  Amount based on primary data collected from participating companies.
- acrylic dispersion, without water, in 65% solution state: 1.31453e-7 kg; lognormal variance with pedigree 0.0098, pedigree (2,3,4,1,1)
  Calculated value: average consumption of three companies
- ethylene glycol monoethyl ether: 5.78836e-8 kg; lognormal variance with pedigree 0.0098, pedigree (2,3,4,1,1)
  Calculated value: Average consumption of three companies
- electricity, low voltage: 7.94242e-5 kWh; lognormal variance with pedigree 0.0098, pedigree (2,3,4,1,1)
  EcoSpold01Location=CH
  Calculated values: Average consumption of three companies
- heat, district or industrial, natural gas: 0.000174534 MJ; lognormal variance with pedigree 0.0098, pedigree (2,3,4,1,1)
  Calculated value: Average consumption of three companies
- sheet rolling, aluminium: 2.75057e-6 kg; lognormal variance with pedigree 0.1767, pedigree (5,5,4,3,5)
  Estimate value: assumed processing for the production of printing plates
- spent solvent mixture: -1.65697e-7 kg; lognormal variance with pedigree 0.0113, pedigree (3,3,4,3,1)
  (same comment as for spent solvent mixture)
  production volume 830.76 kg
- acrylic varnish, without water, in 87.5% solution state: 4.31917e-8 kg; lognormal variance with pedigree 0.0098, pedigree (2,3,4,1,1)
  Calculated value: average consumption of three companies
- isopropanol: 2.40813e-7 kg; lognormal variance with pedigree 0.0098, pedigree (2,3,4,1,1)
  Calculated value: average Ispopropanol use of three companies (with low VOC consumption)
- waste emulsion paint: -3.11511e-8 kg; lognormal variance with pedigree 0.0099, pedigree (2,3,4,3,1)
  Calculated value: average value for disposal of paints of three companies
  production volume 156.183 kg
- printing ink, offset, without solvent, in 47.5% solution state: 1.02401e-6 kg; lognormal variance with pedigree 0.0098, pedigree (2,3,4,1,1)
  Calculated value: average ink consumption of three companies
- industrial machine, heavy, unspecified: 2.40813e-8 kg; lognormal variance with pedigree 0.0086, pedigree (1,1,4,1,1)
  (same comment as for industrial machine, heavy, unspecified)
- corrugated board box: 9.743e-6 kg; lognormal variance with pedigree 0.0098, pedigree (2,3,4,1,1)
  The
- scrap steel: -3.47223e-8 kg; lognormal variance with pedigree 0.21, pedigree (5,5,5,5,5)
  Estimated value. Same amount entering the dataset is estimated as by-product
  production volume 17009.5 kg
- waste reinforced concrete: -0.000214974 kg; lognormal variance with pedigree 0.21, pedigree (5,5,5,5,5)
  Estimated value. Same amount entering the dataset is estimated as by-product
  production volume 1.0531e8 kg
- fly ash and scrubber sludge: -3.66002e-7 kg; lognormal variance with pedigree 0.0059, pedigree (2,4,3,3,2)
  Estimated value. Measured/calculated value for Quebec is extrapolated for GLO.
  production volume 179295 kg
- municipal solid waste: -1.48064e-9, -4.34347e-9, -2.6733e-9, -4.69689e-9, -4.74237e-9, -4.54051e-9, -3.48818e-8, -4.43927e-9, -5.66806e-10, -2.97086e-8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 kg (35 entries); lognormal variance with pedigree 0.0059, pedigree (2,4,3,3,2)
  Estimated value. Measured/calculated value for Quebec is extrapolated for GLO.
  production volume 139307 kg

## Inputs from nature
- Water, cooling, unspecified natural origin [natural resource, in water]: 0.0402373 m3; lognormal variance with pedigree 0.0266, pedigree (1,3,3,1,1)
- Water, river [natural resource, in water]: 0.00477154 m3; lognormal variance with pedigree 0.027, pedigree (1,1,3,1,1)
- Dolomite, in ground [natural resource, in ground]: 6.37304e-9 kg; lognormal variance with pedigree 0.0032, pedigree (1,3,3,1,1)
  Amount and activity link based on primary data collected from participating companies.
- Water, lake [natural resource, in water]: 2.05238e-6 m3; lognormal variance with pedigree 0.0032, pedigree (1,3,3,1,1)
  Amount and activity link based on primary data collected from participating companies.
- Sulfur, in ground [natural resource, in ground]: 1.97673e-5 kg; lognormal variance with pedigree 0.0032, pedigree (1,3,3,1,1)
  Amount and activity link based on primary data collected from participating companies.
- Water, unspecified natural origin [natural resource, in water]: 0.00105557 m3; lognormal variance with pedigree 0.0032, pedigree (1,3,3,1,1)
  Amount and activity link based on primary data collected from participating companies.
- Strontium, in ground [natural resource, in ground]: 8.09289e-8 kg; lognormal variance with pedigree 0.0032, pedigree (1,3,3,1,1)
  Amount and activity link based on primary data collected from participating companies.
- Copper, in ground [natural resource, in ground]: 4.64661e-5 kg; lognormal variance with pedigree 0.0032, pedigree (1,3,3,1,1)
  Amount and activity link based on primary data collected from participating companies.
- Aluminium, in ground [natural resource, in ground]: 6.00365e-6 kg; lognormal variance with pedigree 0.0032, pedigree (1,3,3,1,1)
  Amount and activity link based on primary data collected from participating companies.
- Gangue, in ground [natural resource, in ground]: 0.056205 kg; lognormal variance with pedigree 0.0032, pedigree (1,3,3,1,1)
  Amount and activity link based on primary data collected from participating companies.
- Gold, in ground [natural resource, in ground]: 3.865e-6 kg; lognormal variance with pedigree 0.0032, pedigree (1,3,3,1,1)
  Amount and activity link based on primary data collected from participating companies.
- Vanadium, in ground [natural resource, in ground]: 7.67961e-9 kg; lognormal variance with pedigree 0.0032, pedigree (1,3,3,1,1)
  Amount and activity link based on primary data collected from participating companies.
- Zinc, in ground [natural resource, in ground]: 0.00167993 kg; lognormal variance with pedigree 0.0032, pedigree (1,3,3,1,1)
  Amount and activity link based on primary data collected from participating companies.
- Titanium, in ground [natural resource, in ground]: 2.83539e-7 kg; lognormal variance with pedigree 0.0032, pedigree (1,3,3,1,1)
  Amount and activity link based on primary data collected from participating companies.
- Sodium, in ground [natural resource, in ground]: 2.29585e-7 kg; lognormal variance with pedigree 0.0032, pedigree (1,3,3,1,1)
  Amount and activity link based on primary data collected from participating companies.
- Nickel, in ground [natural resource, in ground]: 4.52282e-9 kg; lognormal variance with pedigree 0.0032, pedigree (1,3,3,1,1)
  Amount and activity link based on primary data collected from participating companies.
- Silver, in ground [natural resource, in ground]: 6.13493e-7 kg; lognormal variance with pedigree 0.0032, pedigree (1,3,3,1,1)
  Amount and activity link based on primary data collected from participating companies.
- Potassium, in ground [natural resource, in ground]: 7.51892e-6 kg; lognormal variance with pedigree 0.0032, pedigree (1,3,3,1,1)
  Amount and activity link based on primary data collected from participating companies.
- Manganese, in ground [natural resource, in ground]: 4.34293e-7 kg; lognormal variance with pedigree 0.0032, pedigree (1,3,3,1,1)
  Amount and activity link based on primary data collected from participating companies.
- Magnesium, in ground [natural resource, in ground]: 0.00011927 kg; lognormal variance with pedigree 0.0032, pedigree (1,3,3,1,1)
  Amount and activity link based on primary data collected from participating companies.
- Phosphorus, in ground [natural resource, in ground]: 5.13124e-8 kg; lognormal variance with pedigree 0.0032, pedigree (1,3,3,1,1)
  Amount and activity link based on primary data collected from participating companies.
- Iron, in ground [natural resource, in ground]: 7.5304e-6 kg; lognormal variance with pedigree 0.0032, pedigree (1,3,3,1,1)
  Amount and activity link based on primary data collected from participating companies.
- Mercury, in ground [natural resource, in ground]: 6.11844e-11 kg; lognormal variance with pedigree 0.0032, pedigree (1,3,3,1,1)
  Amount and activity link based on primary data collected from participating companies.
- Lead, in ground [natural resource, in ground]: 0.000359192 kg; lognormal variance with pedigree 0.0032, pedigree (1,3,3,1,1)
  Amount and activity link based on primary data collected from participating companies.
- Sand, unspecified, in ground [natural resource, in ground]: 3.01852e-7 kg; lognormal variance with pedigree 0.0032, pedigree (1,3,3,1,1)
  Amount and activity link based on primary data collected from participating companies.
- Cadmium, in ground [natural resource, in ground]: 1.97443e-7 kg; lognormal variance with pedigree 0.0032, pedigree (1,3,3,1,1)
  Amount and activity link based on primary data collected from participating companies.
- Calcium, in ground [natural resource, in ground]: 0.000208647 kg; lognormal variance with pedigree 0.0032, pedigree (1,3,3,1,1)
  Amount and activity link based on primary data collected from participating companies.
- Barium, in ground [natural resource, in ground]: 3.19124e-8 kg; lognormal variance with pedigree 0.0032, pedigree (1,3,3,1,1)
  Amount and activity link based on primary data collected from participating companies.
- Water, well, in ground [natural resource, in water]: 6.46276e-6 m3; lognormal variance with pedigree 0.0032, pedigree (1,3,3,1,1)
  Amount and activity link based on primary data collected from participating companies.
- Chromium, in ground [natural resource, in ground]: 7.41559e-9 kg; lognormal variance with pedigree 0.0032, pedigree (1,3,3,1,1)
  Amount and activity link based on primary data collected from participating companies.
- Occupation, inland waterbody, unspecified [natural resource, land]: 5.28378e-6 m2*year; lognormal variance with pedigree 0.002, pedigree (1,1,3,1,1)
  Calculated Value. Land use of the different ponds : tailings pond, wastewater treatment sludge pond and Jarofix disposal site.
  Uncertainty: Calculated variable. Uncertainty will be determined from propagation of uncertainty factors of underlying variables. Uncertainty of actual relation between variables not accounted for at this time, although this could be included in a future update.
- Transformation, to inland waterbody, unspecified [natural resource, land]: 5.28378e-8 m2; lognormal variance with pedigree 0.002, pedigree (1,1,3,1,1)
  (same comment as for Occupation, inland waterbody, unspecified)
- Transformation, from unspecified [natural resource, land]: 5.28378e-8 m2; lognormal variance with pedigree 0.002, pedigree (1,1,3,1,1)
  (same comment as for Occupation, inland waterbody, unspecified)
## Emissions to nature
- Ammonia [air, urban air close to ground]: 6.55853e-9 kg; = 1.73E-06*wood_fuel; lognormal variance with pedigree 0.4712, pedigree (2,3,5,1,1)
  (same comment as for residual wood, dry)
- Potassium [air, urban air close to ground]: 8.82993e-8 kg; = 2.34E-05*wood_fuel; lognormal variance with pedigree 0.4712, pedigree (2,3,5,1,1)
  (same comment as for residual wood, dry)
- Chlorine [air, urban air close to ground]: 6.79225e-10 kg; = 1.8E-07*wood_fuel; lognormal variance with pedigree 0.4712, pedigree (2,3,5,1,1)
  (same comment as for residual wood, dry)
- Phosphorus [air, urban air close to ground]: 1.13204e-9 kg; = 3E-07*wood_fuel; lognormal variance with pedigree 0.4712, pedigree (2,3,5,1,1)
  (same comment as for residual wood, dry)
- Nitrogen oxides [air, urban air close to ground]: 1.10187e-5 kg; = 0.00012*wood_fuel; lognormal variance with pedigree 0.1112, pedigree (2,3,5,1,1)
  (same comment as for residual wood, dry)
- Mercury [air, urban air close to ground]: 1.83158e-12 kg; = 3E-10*wood_fuel; lognormal variance with pedigree 0.4712, pedigree (2,3,5,1,1)
  (same comment as for residual wood, dry)
- Chromium [air, urban air close to ground]: 2.91915e-11 kg; = 3.96E-09*wood_fuel; lognormal variance with pedigree 0.4712, pedigree (2,3,5,1,1)
  (same comment as for residual wood, dry)
- m-Xylene [air, urban air close to ground]: 4.52817e-10 kg; = 1.2E-07*wood_fuel; lognormal variance with pedigree 0.4712, pedigree (2,3,5,1,1)
  (same comment as for residual wood, dry)
- Benzo(a)pyrene [air, urban air close to ground]: 2.05508e-12 kg; = 5E-10*wood_fuel; lognormal variance with pedigree 0.4712, pedigree (2,3,5,1,1)
  (same comment as for residual wood, dry)
- Zinc [air, urban air close to ground]: 1.29797e-9 kg; = 3E-07*wood_fuel; lognormal variance with pedigree 0.4712, pedigree (2,3,5,1,1)
  (same comment as for residual wood, dry)
- Sulfur dioxide [air, urban air close to ground]: 2.8444e-6 kg; = 2.5E-06*wood_fuel; lognormal variance with pedigree 0.4712, pedigree (2,3,5,1,1)
  (same comment as for residual wood, dry)
- Cadmium [air, urban air close to ground]: 2.64143e-12 kg; = 7E-10*wood_fuel; lognormal variance with pedigree 0.4712, pedigree (2,3,5,1,1)
  (same comment as for residual wood, dry)
- Benzene [air, urban air close to ground]: 6.93161e-9 kg; = 9.1E-07*wood_fuel; lognormal variance with pedigree 0.4712, pedigree (2,3,5,1,1)
  (same comment as for residual wood, dry)
- Hydrocarbons, aliphatic, alkanes, unspecified [air, urban air close to ground]: 5.16618e-9 kg; = 9.1E-07*wood_fuel; lognormal variance with pedigree 0.4712, pedigree (2,3,5,1,1)
  (same comment as for residual wood, dry)
- Manganese [air, urban air close to ground]: 6.41491e-10 kg; = 1.7E-07*wood_fuel; lognormal variance with pedigree 0.4712, pedigree (2,3,5,1,1)
  (same comment as for residual wood, dry)
- Phenol, pentachloro- [air, urban air close to ground]: 3.05651e-14 kg; = 8.1E-12*wood_fuel; lognormal variance with pedigree 0.4712, pedigree (2,3,5,1,1)
  (same comment as for residual wood, dry)
- Dioxins, measured as 2,3,7,8-tetrachlorodibenzo-p-dioxin [air, urban air close to ground]: 0 kg; = 3E-14*wood_fuel; pedigree (1,1,1,1,1)
  (same comment as for residual wood, dry)
- Toluene [air, urban air close to ground]: 2.20624e-8 kg; = 3E-07*wood_fuel; lognormal variance with pedigree 0.4712, pedigree (2,3,5,1,1)
  (same comment as for residual wood, dry)
- Hydrocarbons, aliphatic, unsaturated [air, urban air close to ground]: 1.17841e-8 kg; = 3.1E-06*wood_fuel; lognormal variance with pedigree 0.4712, pedigree (2,3,5,1,1)
  (same comment as for residual wood, dry)
- Particulates, < 2.5 um [air, urban air close to ground]: 0 kg; = 2.5E-06*wood_fuel; pedigree (1,1,1,1,1)
  (same comment as for residual wood, dry)
- Calcium [air, urban air close to ground]: 2.23915e-8 kg; = 5.85E-06*wood_fuel; lognormal variance with pedigree 0.4712, pedigree (2,3,5,1,1)
  (same comment as for residual wood, dry)
- Chromium VI [air, urban air close to ground]: 2.94863e-13 kg; = 4E-11*wood_fuel; lognormal variance with pedigree 0.5212, pedigree (2,3,5,1,1)
  (same comment as for residual wood, dry)
- Bromine [air, urban air close to ground]: 2.26409e-10 kg; = 6E-08*wood_fuel; lognormal variance with pedigree 0.4712, pedigree (2,3,5,1,1)
  (same comment as for residual wood, dry)
- Copper [air, urban air close to ground]: 1.39086e-10 kg; = 2.2E-08*wood_fuel; lognormal variance with pedigree 0.4712, pedigree (2,3,5,1,1)
  (same comment as for residual wood, dry)
- Benzene, ethyl- [air, urban air close to ground]: 2.17288e-8 kg; = 3E-08*wood_fuel; lognormal variance with pedigree 0.4712, pedigree (2,3,5,1,1)
  (same comment as for residual wood, dry)
- Carbon dioxide, non-fossil [air, urban air close to ground]: 0.0155958 kg; = 0.102*wood_fuel; lognormal variance with pedigree 0.0412, pedigree (2,3,5,1,1)
  (same comment as for residual wood, dry)
- Methanol [air, non-urban air or from high stacks]: 1.96753e-7 kg; lognormal variance with pedigree 0.4726, pedigree (3,3,5,1,1)
  Estimated emissions from wood and glue drying processes
- NMVOC, non-methane volatile organic compounds, unspecified origin [air, urban air close to ground]: 3.96215e-8 kg; = 3.6E-06*wood_fuel + 0.134 - (0.00368+0.0000887+0.00465+0.00465); lognormal variance with pedigree 0.2012, pedigree (2,3,5,1,1)
  Emission factor from DS on heat generation from industrial residual wood mulitplied by the input of wood fuel (direct wood fuel plus production residues) plus estimated emissions from wood and glue drying processes (based on Albrecht et al. 2009) minus emissions that have been inventoried specifically
- Lead [air, urban air close to ground]: 5.11718e-10 kg; = 2.5E-08*wood_fuel; lognormal variance with pedigree 0.4712, pedigree (2,3,5,1,1)
  (same comment as for residual wood, dry)
- Nickel [air, urban air close to ground]: 1.4331e-9 kg; = 6E-09*wood_fuel; lognormal variance with pedigree 0.4712, pedigree (2,3,5,1,1)
  (same comment as for residual wood, dry)
- Formaldehyde [air, urban air close to ground]: 2.67005e-9 kg; = 1.3E-07*wood_fuel+0.00368; lognormal variance with pedigree 0.4712, pedigree (2,3,5,1,1)
  Emission factor from DS on heat generation from industrial residual wood mulitplied by the input of wood fuel (direct wood fuel plus production residues) plus estimated emissions from wood and glue drying processes
- Particulates, > 10 um [air, unspecified]: 3.28483e-6 kg; lognormal variance with pedigree 0.4346, pedigree (3,3,3,1,1)
  dust emissions
- Arsenic [air, urban air close to ground]: 4.11939e-11 kg; = 1E-09*wood_fuel; lognormal variance with pedigree 0.4712, pedigree (2,3,5,1,1)
  (same comment as for residual wood, dry)
- Dinitrogen monoxide [air, urban air close to ground]: 1.26174e-8 kg; = 2.3E-06*wood_fuel; lognormal variance with pedigree 0.4712, pedigree (2,3,5,1,1)
  (same comment as for residual wood, dry)
- PAH, polycyclic aromatic hydrocarbons [air, urban air close to ground]: 1.31001e-10 kg; = 1.11E-08*wood_fuel; lognormal variance with pedigree 0.4712, pedigree (2,3,5,1,1)
  (same comment as for residual wood, dry)
- Benzene, hexachloro- [air, urban air close to ground]: 0 kg; = 7.2E-15*wood_fuel; pedigree (1,1,1,1,1)
  (same comment as for residual wood, dry)
- Methane, non-fossil [air, urban air close to ground]: 1.82427e-8 kg; = 1.5E-06*wood_fuel; lognormal variance with pedigree 0.4712, pedigree (2,3,5,1,1)
  (same comment as for residual wood, dry)
- Fluorine [air, urban air close to ground]: 1.88674e-10 kg; = 5E-08*wood_fuel; lognormal variance with pedigree 0.4712, pedigree (2,3,5,1,1)
  (same comment as for residual wood, dry)
- Magnesium [air, urban air close to ground]: 1.35845e-9 kg; = 3.6E-07*wood_fuel; lognormal variance with pedigree 0.4712, pedigree (2,3,5,1,1)
  (same comment as for residual wood, dry)
- Acetaldehyde [air, urban air close to ground]: 6.707e-10 kg; = 6.1E-08*wood_fuel+0.0000887; lognormal variance with pedigree 0.4712, pedigree (2,3,5,1,1)
  Emission factor from DS on heat generation from industrial residual wood mulitplied by the input of wood fuel (direct wood fuel plus production residues ) plus estimated emissions from wood and glue drying processes (based on Albrecht et al. 2009).
- Sodium [air, urban air close to ground]: 7.06436e-9 kg; = 1.3E-06*wood_fuel; lognormal variance with pedigree 0.4712, pedigree (2,3,5,1,1)
  (same comment as for residual wood, dry)
- Carbon monoxide, non-fossil [air, urban air close to ground]: 6.31187e-6 kg; = 2E-04*wood_fuel; lognormal variance with pedigree 0.0612, pedigree (2,3,5,1,1)
  (same comment as for residual wood, dry)
- Carbon-14 [water, surface water]: 0.000693366 kBq; lognormal variance with pedigree 0.0041, pedigree (2,4,2,3,2)
  Estimated value. This figure have been taken from the CA (Quebec) dataset. Measured/calculated value for Quebec is extrapolated for AR.
- Ruthenium-103 [water, surface water]: 6.89906e-8 kBq; lognormal variance with pedigree 0.4706, pedigree (2,5,5,5,5)
  Estimated value. This figure have been taken from the CA (Quebec) dataset. Value extrapolated from a different PWR technology.
- Sodium-24 [water, surface water]: 2.41588e-6 kBq; lognormal variance with pedigree 0.4706, pedigree (2,5,5,5,5)
  (same comment as for Ruthenium-103)
- Carbon-14 [air, non-urban air or from high stacks]: 5.95083e-6 kBq; lognormal variance with pedigree 0.3035, pedigree (2,4,2,3,2)
  Estimated value. This figure have been taken from the CA (Quebec) dataset
- Silver-110 [water, surface water]: 1.07238e-6 kBq; lognormal variance with pedigree 0.4706, pedigree (2,5,5,5,5)
  (same comment as for Ruthenium-103)
- Cerium-141 [water, surface water]: 4.26047e-8 kBq; lognormal variance with pedigree 0.4706, pedigree (2,5,5,5,5)
  (same comment as for Ruthenium-103)
- Cesium-136 [water, surface water]: 6.80223e-8 kBq; lognormal variance with pedigree 0.4706, pedigree (2,5,5,5,5)
  (same comment as for Ruthenium-103)
- Cobalt-57 [water, surface water]: 2.15928e-6 kBq; lognormal variance with pedigree 0.4706, pedigree (2,5,5,5,5)
  (same comment as for Ruthenium-103)
- Cesium-137 [air, non-urban air or from high stacks]: 1.76228e-9 kBq; lognormal variance with pedigree 0.4706, pedigree (2,5,5,5,5)
  (same comment as for Ruthenium-103)
- Antimony-122 [water, surface water]: 2.18833e-7 kBq; lognormal variance with pedigree 0.4706, pedigree (2,5,5,5,5)
  (same comment as for Ruthenium-103)
- Manganese-54 [water, surface water]: 3.17114e-6 kBq; lognormal variance with pedigree 0.4706, pedigree (2,5,5,5,5)
  (same comment as for Ruthenium-103)
- Antimony-125 [water, surface water]: 1.00944e-5 kBq; lognormal variance with pedigree 0.4706, pedigree (2,5,5,5,5)
  (same comment as for Ruthenium-103)
- Niobium-95 [air, non-urban air or from high stacks]: 0.00693366 kBq; lognormal variance with pedigree 0.0041, pedigree (2,4,2,3,2)
  Estimated value. This figure have been taken from the CA (Quebec) dataset
- Silver-110 [air, non-urban air or from high stacks]: 7.57686e-10 kBq; lognormal variance with pedigree 0.4706, pedigree (2,5,5,5,5)
  (same comment as for Ruthenium-103)
- Cobalt-60 [water, surface water]: 0.000169639 kBq; lognormal variance with pedigree 0.0041, pedigree (2,4,2,3,2)
  (same comment as for Carbon-14)
- Zirconium-95 [water, surface water]: 0.00282732 kBq; lognormal variance with pedigree 0.3035, pedigree (2,4,2,3,2)
  Estimated value. This figure have been taken from the CA (Quebec) dataset
- Barium-140 [air, non-urban air or from high stacks]: 7.67369e-11 kBq; lognormal variance with pedigree 0.4706, pedigree (2,5,5,5,5)
  (same comment as for Ruthenium-103)
- Xenon-135 [air, non-urban air or from high stacks]: 0.040184 kBq; lognormal variance with pedigree 0.4706, pedigree (2,5,5,5,5)
  (same comment as for Ruthenium-103)
- Strontium-90 [water, surface water]: 3.14694e-7 kBq; lognormal variance with pedigree 0.4706, pedigree (2,5,5,5,5)
  (same comment as for Ruthenium-103)
- Antimony-125 [air, non-urban air or from high stacks]: 5.66449e-9 kBq; lognormal variance with pedigree 0.4706, pedigree (2,5,5,5,5)
  (same comment as for Ruthenium-103)
- Chromium-51 [water, surface water]: 1.83007e-6 kBq; lognormal variance with pedigree 0.4706, pedigree (2,5,5,5,5)
  (same comment as for Ruthenium-103)
- Zinc-65 [water, surface water]: 0.000444293 kBq; lognormal variance with pedigree 0.0041, pedigree (2,4,2,3,2)
  Estimated value. This figure have been taken from the CA (Quebec) dataset
- Niobium-95 [water, surface water]: 7.43161e-7 kBq; lognormal variance with pedigree 0.4706, pedigree (2,5,5,5,5)
  (same comment as for Ruthenium-103)
- Iodine-133 [water, surface water]: 1.00702e-7 kBq; lognormal variance with pedigree 0.4706, pedigree (2,5,5,5,5)
  (same comment as for Ruthenium-103)
- Aerosols, radioactive, unspecified [air, non-urban air or from high stacks]: 3.23795e-7 kBq; lognormal variance with pedigree 0.0041, pedigree (2,4,2,3,2)
  Estimated value. This figure have been taken from the CA (Quebec) dataset
- Strontium-89 [water, surface water]: 8.83563e-7 kBq; lognormal variance with pedigree 0.4706, pedigree (2,5,5,5,5)
  (same comment as for Ruthenium-103)
- Lanthanum-140 [water, surface water]: 1.19826e-7 kBq; lognormal variance with pedigree 0.4706, pedigree (2,5,5,5,5)
  (same comment as for Ruthenium-103)
- Iron-59 [water, surface water]: 0.00565463 kBq; lognormal variance with pedigree 0.0041, pedigree (2,4,2,3,2)
  Estimated value. This figure have been taken from the CA (Quebec) dataset
- Cerium-144 [water, surface water]: 1.16679e-7 kBq; lognormal variance with pedigree 0.4706, pedigree (2,5,5,5,5)
  (same comment as for Ruthenium-103)
- Water [air, non-urban air or from high stacks]: 0.00893249 m3; lognormal variance with pedigree 0.0055, pedigree (3,4,2,3,2)
  Estimated value. This figure have been taken from the CA (Quebec) dataset, based on input of water. It is assumed that 20% of cooling water is evaporated and 80% is rejected to the river
- Cesium-134 [water, surface water]: 3.55434e-5 kBq; lognormal variance with pedigree 0.0041, pedigree (2,4,2,3,2)
  Estimated value. This figure have been taken from the CA (Quebec) dataset
- Technetium-99m [water, surface water]: 6.80223e-7 kBq; lognormal variance with pedigree 0.4706, pedigree (2,5,5,5,5)
  (same comment as for Ruthenium-103)
- Antimony-124 [air, non-urban air or from high stacks]: 1.14984e-10 kBq; lognormal variance with pedigree 0.4706, pedigree (2,5,5,5,5)
  (same comment as for Ruthenium-103)
- Cesium-137 [water, surface water]: 5.00839e-5 kBq; lognormal variance with pedigree 0.0041, pedigree (2,4,2,3,2)
  Estimated value. This figure have been taken from the CA (Quebec) dataset
- Tellurium-132 [water, surface water]: 2.03825e-8 kBq; lognormal variance with pedigree 0.4706, pedigree (2,5,5,5,5)
  Estimated value. This figure have been taken from the CA (Quebec) dataset Value extrapolated from a different PWR technology.
- Antimony-124 [water, surface water]: 0.0062201 kBq; lognormal variance with pedigree 0.3035, pedigree (2,4,2,3,2)
  (same comment as for Carbon-14)
- Iodine-131 [water, surface water]: 0.00121171 kBq; lognormal variance with pedigree 0.0041, pedigree (2,4,2,3,2)
  Estimated value. This figure have been taken from the CA (Quebec) dataset
- Radioactive species, alpha emitters [water, surface water]: 7.31058e-9 kBq; lognormal variance with pedigree 0.4706, pedigree (2,5,5,5,5)
  (same comment as for Ruthenium-103)
- Noble gases, radioactive, unspecified [air, non-urban air or from high stacks]: 0.0626967 kBq; lognormal variance with pedigree 0.4706, pedigree (2,5,5,5,5)
  (same comment as for Ruthenium-103)
- Water [water, surface water]: 0.0360498 m3; lognormal variance with pedigree 0.0115, pedigree (4,4,2,3,2)
  (same comment as for Water)
- Iodine-131 [air, non-urban air or from high stacks]: 8.75122e-8 kBq; lognormal variance with pedigree 0.0041, pedigree (2,4,2,3,2)
  Estimated value. This figure have been taken from the CA (Quebec) dataset
- Radioactive species, other beta emitters [air, non-urban air or from high stacks]: 2.09877e-8 kBq; lognormal variance with pedigree 0.4706, pedigree (2,5,5,5,5)
  (same comment as for Ruthenium-103)
- Suspended solids, unspecified [water, surface water]: 1.1971e-5 kg; lognormal variance with pedigree 0.0041, pedigree (2,4,2,3,2)
  Estimated value. This figure have been taken from the CA (Quebec) dataset
- Hydrogen-3, Tritium [water, surface water]: 32.3122 kBq; lognormal variance with pedigree 0.0041, pedigree (2,4,2,3,2)
  Estimated value. This figure have been taken from the CA (Quebec) dataset
- Tellurium-123m [water, surface water]: 3.80053e-7 kBq; lognormal variance with pedigree 0.4706, pedigree (2,5,5,5,5)
  (same comment as for Ruthenium-103)
- Hydrocarbons, unspecified [water, surface water]: 2.98888e-7 kg; lognormal variance with pedigree 0.0041, pedigree (2,4,2,3,2)
  Estimated value. This figure have been taken from the CA (Quebec) dataset
- Molybdenum-99 [water, surface water]: 1.45243e-9 kBq; lognormal variance with pedigree 0.3433, pedigree (2,2,5,5,2)
  (same comment as for Ruthenium-103)
- Cobalt-58 [air, non-urban air or from high stacks]: 3.96998e-9 kBq; lognormal variance with pedigree 0.4706, pedigree (2,5,5,5,5)
  (same comment as for Ruthenium-103)
- Cobalt-60 [air, non-urban air or from high stacks]: 1.83249e-8 kBq; lognormal variance with pedigree 0.4706, pedigree (2,5,5,5,5)
  (same comment as for Ruthenium-103)
- Xenon-133 [air, non-urban air or from high stacks]: 0.146212 kBq; lognormal variance with pedigree 0.4706, pedigree (2,5,5,5,5)
  (same comment as for Ruthenium-103)
- Zirconium-95 [air, non-urban air or from high stacks]: 1.39918e-8 kBq; lognormal variance with pedigree 0.4706, pedigree (2,5,5,5,5)
  (same comment as for Ruthenium-103)
- Iodine-133 [air, non-urban air or from high stacks]: 4.40571e-7 kBq; lognormal variance with pedigree 0.4706, pedigree (2,5,5,5,5)
  (same comment as for Ruthenium-103)
- Cobalt-58 [water, surface water]: 0.000275962 kBq; lognormal variance with pedigree 0.4706, pedigree (2,5,5,5,5)
  (same comment as for Ruthenium-103)
- Krypton-85m [air, non-urban air or from high stacks]: 0.00238925 kBq; lognormal variance with pedigree 0.4706, pedigree (2,5,5,5,5)
  (same comment as for Ruthenium-103)
- Lead [soil, industrial]: 5.66042e-11 kg; lognormal variance with pedigree 0.0426, pedigree (1,3,3,1,1)
  Amount and activity link based on primary data collected from participating companies.
- Sulfur dioxide [air, unspecified]: 5.15339e-6 kg; lognormal variance with pedigree 0.0032, pedigree (1,3,3,1,1)
  Amount and activity link based on primary data collected from participating companies.
- Ammonia [air, unspecified]: 4.7509e-8 kg; lognormal variance with pedigree 0.0426, pedigree (1,3,3,1,1)
  Amount and activity link based on primary data collected from participating companies.
- Hydrogen chloride [air, unspecified]: 1.77868e-9 kg; lognormal variance with pedigree 0.0426, pedigree (1,3,3,1,1)
  Amount and activity link based on primary data collected from participating companies.
- Suspended solids, unspecified [water, ocean]: 4.04658e-7 kg; lognormal variance with pedigree 0.0426, pedigree (1,3,3,1,1)
  Amount and activity link based on primary data collected from participating companies.
- Ammonium, ion [water, surface water]: 3.66557e-8 kg; lognormal variance with pedigree 0.0426, pedigree (1,3,3,1,1)
  Amount and activity link based on primary data collected from participating companies.
- Hydrocarbons, unspecified [soil, unspecified]: 1.84554e-9 kg; lognormal variance with pedigree 0.0426, pedigree (1,3,3,1,1)
  Amount and activity link based on primary data collected from participating companies.
- Selenium [air, unspecified]: 8.95414e-11 kg; lognormal variance with pedigree 0.6526, pedigree (1,3,3,1,1)
  Amount and activity link based on primary data collected from participating companies.
- Antimony [water, surface water]: 1.32106e-9 kg; lognormal variance with pedigree 0.6526, pedigree (1,3,3,1,1)
  Amount and activity link based on primary data collected from participating companies.
- Fluoride [soil, industrial]: 3.70911e-9 kg; lognormal variance with pedigree 0.0426, pedigree (1,3,3,1,1)
  Amount and activity link based on primary data collected from participating companies.
- Sodium [soil, industrial]: 2.32221e-12 kg; lognormal variance with pedigree 0.0426, pedigree (1,3,3,1,1)
  Amount and activity link based on primary data collected from participating companies.
- Benzene [air, unspecified]: 2.90835e-9 kg; lognormal variance with pedigree 0.0426, pedigree (1,3,3,1,1)
  Amount and activity link based on primary data collected from participating companies.
- Lead [air, unspecified]: 1.70479e-7 kg; lognormal variance with pedigree 0.6526, pedigree (1,3,3,1,1)
  Amount and activity link based on primary data collected from participating companies.
- Sulfate [soil, unspecified]: 3.95444e-11 kg; lognormal variance with pedigree 0.0426, pedigree (1,3,3,1,1)
  Amount and activity link based on primary data collected from participating companies.
- Aluminium [water, surface water]: 5.83118e-10 kg; lognormal variance with pedigree 0.6526, pedigree (1,3,3,1,1)
  Amount and activity link based on primary data collected from participating companies.
- Fluorine [air, unspecified]: 6.65709e-9 kg; lognormal variance with pedigree 0.0426, pedigree (1,3,3,1,1)
  Amount and activity link based on primary data collected from participating companies.
- Zinc [soil, industrial]: 1.62454e-8 kg; lognormal variance with pedigree 0.0426, pedigree (1,3,3,1,1)
  Amount and activity link based on primary data collected from participating companies.
- Sulfate [water, surface water]: 1.32158e-5 kg; lognormal variance with pedigree 0.0426, pedigree (1,3,3,1,1)
  Amount and activity link based on primary data collected from participating companies.
- Arsenic, ion [water, ocean]: 1.42259e-10 kg; lognormal variance with pedigree 0.6526, pedigree (1,3,3,1,1)
  Amount and activity link based on primary data collected from participating companies.
- Dissolved solids [water, surface water]: 1.27897e-5 kg; lognormal variance with pedigree 0.0426, pedigree (1,3,3,1,1)
  Amount and activity link based on primary data collected from participating companies.
- Zinc, ion [water, ocean]: 1.80989e-8 kg; lognormal variance with pedigree 0.6526, pedigree (1,3,3,1,1)
  Amount and activity link based on primary data collected from participating companies.
- Selenium [water, surface water]: 1.99216e-9 kg; lognormal variance with pedigree 0.6526, pedigree (1,3,3,1,1)
  Amount and activity link based on primary data collected from participating companies.
- Antimony [air, unspecified]: 1.11891e-9 kg; lognormal variance with pedigree 0.6526, pedigree (1,3,3,1,1)
  Amount and activity link based on primary data collected from participating companies.
- Fluoride [water, ocean]: 5.78572e-9 kg; lognormal variance with pedigree 0.0426, pedigree (1,3,3,1,1)
  Amount and activity link based on primary data collected from participating companies.
- Particulates, < 2.5 um [air, unspecified]: 2.1232e-6 kg; lognormal variance with pedigree 0.3026, pedigree (1,3,3,1,1)
  Amount and activity link based on primary data collected from participating companies.
- Fluoride [water, surface water]: 5.21886e-8 kg; lognormal variance with pedigree 0.0426, pedigree (1,3,3,1,1)
  Amount and activity link based on primary data collected from participating companies.
- TOC, Total Organic Carbon [water, surface water]: 4.57132e-5 kg; lognormal variance with pedigree 0.0426, pedigree (1,3,3,1,1)
  Amount and activity link based on primary data collected from participating companies.
- Particulates, > 2.5 um, and < 10um [air, unspecified]: 8.49285e-7 kg; lognormal variance with pedigree 0.1226, pedigree (1,3,3,1,1)
  Amount and activity link based on primary data collected from participating companies.
- Aldehydes, unspecified [air, unspecified]: 1.65768e-10 kg; lognormal variance with pedigree 0.0426, pedigree (1,3,3,1,1)
  Amount and activity link based on primary data collected from participating companies.
- Formaldehyde [air, unspecified]: 1.25588e-8 kg; lognormal variance with pedigree 0.0426, pedigree (1,3,3,1,1)
  Amount and activity link based on primary data collected from participating companies.
- Zinc, ion [water, surface water]: 1.22394e-6 kg; lognormal variance with pedigree 0.6526, pedigree (1,3,3,1,1)
  Amount and activity link based on primary data collected from participating companies.
- Phosphorus [water, surface water]: 1.79624e-7 kg; lognormal variance with pedigree 0.0426, pedigree (1,3,3,1,1)
  Amount and activity link based on primary data collected from participating companies.
- Water [water, unspecified]: 0.000772294 m3; lognormal variance with pedigree 0.0433, pedigree (3,3,5,3,1)
  Calculated value based on 'zinc mine operation, GLO, 1994-2003' evaporation factor, which in turn is based on literature values and expert opinion. See comments in the parameter's comment field.
- Copper, ion [water, surface water]: 2.6812e-8 kg; lognormal variance with pedigree 0.6526, pedigree (1,3,3,1,1)
  Amount and activity link based on primary data collected from participating companies.
- Sodium, ion [water, surface water]: 6.45423e-7 kg; lognormal variance with pedigree 0.0426, pedigree (1,3,3,1,1)
  Amount and activity link based on primary data collected from participating companies.
- Dioxins, measured as 2,3,7,8-tetrachlorodibenzo-p-dioxin [air, unspecified]: 0 kg; pedigree (1,1,1,1,1)
  Amount and activity link based on primary data collected from participating companies.
- Potassium, ion [water, surface water]: 1.53223e-7 kg; lognormal variance with pedigree 0.0426, pedigree (1,3,3,1,1)
  Amount and activity link based on primary data collected from participating companies.
- Cyanide [water, surface water]: 1.1322e-10 kg; lognormal variance with pedigree 0.0426, pedigree (1,3,3,1,1)
  Amount and activity link based on primary data collected from participating companies.
- COD, Chemical Oxygen Demand [water, ocean]: 1.35441e-8 kg; source Weidema B P 2013; lognormal variance with pedigree 0.25, pedigree (5,5,5,5,5)
  Calculated value. The amount of COD is assumed to be five times that of BOD5, based on the estimates provided in section 5.9.7 of Weidema et al. (2013).
- Copper, ion [water, ocean]: 4.52579e-11 kg; lognormal variance with pedigree 0.6526, pedigree (1,3,3,1,1)
  Amount and activity link based on primary data collected from participating companies.
- Nitrogen oxides [air, unspecified]: 1.44154e-5 kg; lognormal variance with pedigree 0.0426, pedigree (1,3,3,1,1)
  Amount and activity link based on primary data collected from participating companies.
- DOC, Dissolved Organic Carbon [water, surface water]: 4.57132e-5 kg; lognormal variance with pedigree 0.25, pedigree (5,5,5,5,5)
  Calculated value. The amount of DOC is assumed to be equal to the amount of TOC
- Cobalt [air, unspecified]: 2.21007e-9 kg; lognormal variance with pedigree 0.6526, pedigree (1,3,3,1,1)
  Amount and activity link based on primary data collected from participating companies.
- Nitrogen, organic bound [water, surface water]: 5.73574e-8 kg; lognormal variance with pedigree 0.0426, pedigree (1,3,3,1,1)
  Amount and activity link based on primary data collected from participating companies.
- DOC, Dissolved Organic Carbon [water, ocean]: 7.87822e-12 kg; lognormal variance with pedigree 0.25, pedigree (5,5,5,5,5)
  Calculated value. The amount of DOC is assumed to be equal to the amount of TOC
- Chromium VI [water, surface water]: 3.18045e-7 kg; lognormal variance with pedigree 0.6526, pedigree (1,3,3,1,1)
  Amount and activity link based on primary data collected from participating companies.
- Nitrogen [water, surface water]: 8.85424e-7 kg; lognormal variance with pedigree 0.0426, pedigree (1,3,3,1,1)
  Amount and activity link based on primary data collected from participating companies.
- TOC, Total Organic Carbon [water, ocean]: 7.87822e-12 kg; source Weidema B P 2013; lognormal variance with pedigree 0.25, pedigree (5,5,5,5,5)
  Calculated value. The relation between COD and TOC is assumed to be COD (g O2) = 2.7*TOC (g C), based on the estimates provided in section 5.9.7 of Weidema et al. (2013).
- Chromium [soil, industrial]: 1.04286e-13 kg; lognormal variance with pedigree 0.0426, pedigree (1,3,3,1,1)
  Amount and activity link based on primary data collected from participating companies.
- Nickel, ion [water, surface water]: 7.71036e-10 kg; lognormal variance with pedigree 0.6526, pedigree (1,3,3,1,1)
  Amount and activity link based on primary data collected from participating companies.
- Nitric acid [soil, industrial]: 1.23746e-10 kg; lognormal variance with pedigree 0.0426, pedigree (1,3,3,1,1)
  Amount and activity link based on primary data collected from participating companies.
- COD, Chemical Oxygen Demand [water, surface water]: 0.0001178 kg; lognormal variance with pedigree 0.0426, pedigree (1,3,3,1,1)
  Amount and activity link based on primary data collected from participating companies.
- NMVOC, non-methane volatile organic compounds, unspecified origin [air, unspecified]: 1.75714e-7 kg; lognormal variance with pedigree 0.0426, pedigree (1,3,3,1,1)
  Amount and activity link based on primary data collected from participating companies.
- Water [air, unspecified]: 0.000346581 m3; lognormal variance with pedigree 0.0433, pedigree (3,3,5,3,1)
  (same comment as for Water)
- Copper [soil, industrial]: 6.28913e-9 kg; lognormal variance with pedigree 0.0426, pedigree (1,3,3,1,1)
  Amount and activity link based on primary data collected from participating companies.
- PAH, polycyclic aromatic hydrocarbons [air, unspecified]: 2.79846e-12 kg; lognormal variance with pedigree 0.3026, pedigree (1,3,3,1,1)
  Amount and activity link based on primary data collected from participating companies.
- Chromium VI [air, unspecified]: 2.54922e-11 kg; lognormal variance with pedigree 0.6526, pedigree (1,3,3,1,1)
  Amount and activity link based on primary data collected from participating companies.
- Nickel [soil, industrial]: 2.42639e-11 kg; lognormal variance with pedigree 0.0426, pedigree (1,3,3,1,1)
  Amount and activity link based on primary data collected from participating companies.
- Chromium [air, unspecified]: 3.15627e-10 kg; lognormal variance with pedigree 0.6526, pedigree (1,3,3,1,1)
  Amount and activity link based on primary data collected from participating companies.
- Nitrogen [soil, industrial]: 4.70448e-9 kg; lognormal variance with pedigree 0.0426, pedigree (1,3,3,1,1)
  Amount and activity link based on primary data collected from participating companies.
- Copper [air, unspecified]: 1.75083e-7 kg; lognormal variance with pedigree 0.6526, pedigree (1,3,3,1,1)
  Amount and activity link based on primary data collected from participating companies.
- Nickel [air, unspecified]: 1.75744e-9 kg; lognormal variance with pedigree 0.6526, pedigree (1,3,3,1,1)
  Amount and activity link based on primary data collected from participating companies.
- Ammonia [soil, industrial]: 1.52986e-9 kg; lognormal variance with pedigree 0.0426, pedigree (1,3,3,1,1)
  Amount and activity link based on primary data collected from participating companies.
- Carbon dioxide, non-fossil [air, unspecified]: 4.91777e-6 kg; lognormal variance with pedigree 0.0032, pedigree (1,3,3,1,1)
  Amount and activity link based on primary data collected from participating companies.
- Nitrate [water, surface water]: 4.02004e-7 kg; lognormal variance with pedigree 0.0426, pedigree (1,3,3,1,1)
  Amount and activity link based on primary data collected from participating companies.
- Chlorine [water, surface water]: 1.83809e-7 kg; lognormal variance with pedigree 0.0426, pedigree (1,3,3,1,1)
  Amount and activity link based on primary data collected from participating companies.
- Nickel, ion [water, ocean]: 1.18536e-11 kg; lognormal variance with pedigree 0.6526, pedigree (1,3,3,1,1)
  Amount and activity link based on primary data collected from participating companies.
- Carbon monoxide, fossil [air, unspecified]: 7.32093e-7 kg; lognormal variance with pedigree 0.6526, pedigree (1,3,3,1,1)
  Amount and activity link based on primary data collected from participating companies.
- Methane, fossil [air, unspecified]: 2.33426e-8 kg; lognormal variance with pedigree 0.0426, pedigree (1,3,3,1,1)
  Amount and activity link based on primary data collected from participating companies.
- Calcium, ion [water, surface water]: 4.19679e-6 kg; lognormal variance with pedigree 0.0426, pedigree (1,3,3,1,1)
  Amount and activity link based on primary data collected from participating companies.
- Methanol [air, unspecified]: 7.51597e-8 kg; lognormal variance with pedigree 0.0426, pedigree (1,3,3,1,1)
  Amount and activity link based on primary data collected from participating companies.
- Chloride [water, surface water]: 2.69225e-7 kg; lognormal variance with pedigree 0.0426, pedigree (1,3,3,1,1)
  Amount and activity link based on primary data collected from participating companies.
- Mercury [air, unspecified]: 1.45357e-10 kg; lognormal variance with pedigree 0.6526, pedigree (1,3,3,1,1)
  Amount and activity link based on primary data collected from participating companies.
- BOD5, Biological Oxygen Demand [water, surface water]: 4.05088e-6 kg; lognormal variance with pedigree 0.0426, pedigree (1,3,3,1,1)
  Amount and activity link based on primary data collected from participating companies.
- Mercury [water, surface water]: 4.22173e-10 kg; lognormal variance with pedigree 0.6526, pedigree (1,3,3,1,1)
  Amount and activity link based on primary data collected from participating companies.
- Calcium [soil, industrial]: 6.97757e-11 kg; lognormal variance with pedigree 0.0426, pedigree (1,3,3,1,1)
  Amount and activity link based on primary data collected from participating companies.
- Mercury [soil, industrial]: 9.84927e-13 kg; lognormal variance with pedigree 0.0426, pedigree (1,3,3,1,1)
  Amount and activity link based on primary data collected from participating companies.
- Cadmium, ion [water, surface water]: 6.41761e-9 kg; lognormal variance with pedigree 0.6526, pedigree (1,3,3,1,1)
  Amount and activity link based on primary data collected from participating companies.
- Magnesium [water, surface water]: 4.8493e-7 kg; lognormal variance with pedigree 0.0426, pedigree (1,3,3,1,1)
  Amount and activity link based on primary data collected from participating companies.
- Beryllium [air, unspecified]: 6.81771e-11 kg; lognormal variance with pedigree 0.0426, pedigree (1,3,3,1,1)
  Amount and activity link based on primary data collected from participating companies.
- Manganese [soil, industrial]: 3.51039e-9 kg; lognormal variance with pedigree 0.0426, pedigree (1,3,3,1,1)
  Amount and activity link based on primary data collected from participating companies.
- Cadmium [air, unspecified]: 8.17617e-9 kg; lognormal variance with pedigree 0.6526, pedigree (1,3,3,1,1)
  Amount and activity link based on primary data collected from participating companies.
- Manganese [water, ocean]: 2.81573e-11 kg; lognormal variance with pedigree 0.6526, pedigree (1,3,3,1,1)
  Amount and activity link based on primary data collected from participating companies.
- BOD5, Biological Oxygen Demand [water, ocean]: 4.25424e-12 kg; lognormal variance with pedigree 0.0426, pedigree (1,3,3,1,1)
  Amount and activity link based on primary data collected from participating companies.
- Mercury [water, ocean]: 1.27539e-11 kg; lognormal variance with pedigree 0.6526, pedigree (1,3,3,1,1)
  Amount and activity link based on primary data collected from participating companies.
- Carbon dioxide, fossil [air, unspecified]: 0.000598392 kg; lognormal variance with pedigree 0.0032, pedigree (1,3,3,1,1)
  Amount and activity link based on primary data collected from participating companies. Accounts for on-site combustion of diesel at mine. Some companies provided emissions on the combustion of natural gas, diesel, propane, or other fuels, which are included here. If no emissions were provided for these other fuels then input is reflected as a an input of heat instead of a direct fuel input.
- Lead [water, surface water]: 9.61986e-9 kg; lognormal variance with pedigree 0.6526, pedigree (1,3,3,1,1)
  Amount and activity link based on primary data collected from participating companies.
- Cadmium [soil, industrial]: 2.42929e-11 kg; lognormal variance with pedigree 0.0426, pedigree (1,3,3,1,1)
  Amount and activity link based on primary data collected from participating companies.
- Manganese [air, unspecified]: 1.1901e-8 kg; lognormal variance with pedigree 0.6526, pedigree (1,3,3,1,1)
  Amount and activity link based on primary data collected from participating companies.
- Arsenic [soil, industrial]: 6.74384e-12 kg; lognormal variance with pedigree 0.0426, pedigree (1,3,3,1,1)
  Amount and activity link based on primary data collected from participating companies.
- Manganese [water, surface water]: 5.8454e-8 kg; lognormal variance with pedigree 0.6526, pedigree (1,3,3,1,1)
  Amount and activity link based on primary data collected from participating companies.
- VOC, volatile organic compounds, unspecified origin [air, unspecified]: 8.07895e-9 kg; lognormal variance with pedigree 0.0426, pedigree (1,3,3,1,1)
  Amount and activity link based on primary data collected from participating companies.
- Cadmium, ion [water, ocean]: 2.47708e-10 kg; lognormal variance with pedigree 0.6526, pedigree (1,3,3,1,1)
  Amount and activity link based on primary data collected from participating companies.
- Lead [water, ocean]: 2.78725e-9 kg; lognormal variance with pedigree 0.6526, pedigree (1,3,3,1,1)
  Amount and activity link based on primary data collected from participating companies.
- Benzo(a)pyrene [air, unspecified]: 1.86398e-13 kg; lognormal variance with pedigree 0.3026, pedigree (1,3,3,1,1)
  Amount and activity link based on primary data collected from participating companies.
- Hydrogen fluoride [air, unspecified]: 4.44956e-10 kg; lognormal variance with pedigree 0.0426, pedigree (1,3,3,1,1)
  Amount and activity link based on primary data collected from participating companies.
- Sulfur oxides [air, unspecified]: 3.71039e-8 kg; lognormal variance with pedigree 0.0426, pedigree (1,3,3,1,1)
  Amount and activity link based on primary data collected from participating companies.
- Arsenic, ion [water, surface water]: 7.0529e-8 kg; lognormal variance with pedigree 0.6526, pedigree (1,3,3,1,1)
  Amount and activity link based on primary data collected from participating companies.
- Iron, ion [water, surface water]: 3.52436e-7 kg; lognormal variance with pedigree 0.6526, pedigree (1,3,3,1,1)
  Amount and activity link based on primary data collected from participating companies.
- Zinc [air, unspecified]: 2.2668e-7 kg; lognormal variance with pedigree 0.6526, pedigree (1,3,3,1,1)
  Amount and activity link based on primary data collected from participating companies.
- Arsenic [air, unspecified]: 9.28426e-9 kg; lognormal variance with pedigree 0.6526, pedigree (1,3,3,1,1)
  Amount and activity link based on primary data collected from participating companies.
- Cadmium [air, non-urban air or from high stacks]: 6.24986e-10 kg; lognormal variance with pedigree 0.652, pedigree (1,1,3,1,1)
  Measured value.
- Dioxins, measured as 2,3,7,8-tetrachlorodibenzo-p-dioxin [air, non-urban air or from high stacks]: 0 kg; pedigree (1,1,1,1,1)
  Measured value. Reported as Dioxins.
- Nitrogen oxides [air, non-urban air or from high stacks]: 2.52534e-6 kg; lognormal variance with pedigree 0.042, pedigree (1,1,3,1,1)
  Measured value. Reported as NO2.
- Copper [air, non-urban air or from high stacks]: 1.0215e-9 kg; lognormal variance with pedigree 0.652, pedigree (1,1,3,1,1)
  Measured value.
- Sulfur dioxide [air, non-urban air or from high stacks]: 2.70534e-5 kg; lognormal variance with pedigree 0.0026, pedigree (1,1,3,1,1)
  Measured value.
- Carbon dioxide, fossil [air, non-urban air or from high stacks]: 0.000205297 kg; lognormal variance with pedigree 0.0026, pedigree (1,1,3,1,1)
  Measured value. Emissions from carbonates and concentrate.
- Carbon monoxide, fossil [air, non-urban air or from high stacks]: 1.07993e-6 kg; lognormal variance with pedigree 0.652, pedigree (1,1,3,1,1)
  Measured value.
- Sulfuric acid [air, non-urban air or from high stacks]: 2.91562e-7 kg; lognormal variance with pedigree 0.042, pedigree (1,1,3,1,1)
  Measured value.
- Particulates, < 2.5 um [air, non-urban air or from high stacks]: 1.12574e-6 kg; lognormal variance with pedigree 0.302, pedigree (1,1,3,1,1)
  Measured value.
- Particulates, > 2.5 um, and < 10um [air, non-urban air or from high stacks]: 5.65454e-8 kg; lognormal variance with pedigree 0.122, pedigree (1,1,3,1,1)
  Measured value.
- Zinc [air, non-urban air or from high stacks]: 1.10833e-7 kg; lognormal variance with pedigree 0.652, pedigree (1,1,3,1,1)
  Measured value.
- Mercury [air, non-urban air or from high stacks]: 1.1887e-10 kg; lognormal variance with pedigree 0.652, pedigree (1,1,3,1,1)
  Measured value.
- Particulates, > 10 um [air, non-urban air or from high stacks]: 6.50393e-8 kg; lognormal variance with pedigree 0.042, pedigree (1,1,3,1,1)
  Measured value.
- Lead [air, non-urban air or from high stacks]: 1.01728e-9 kg; lognormal variance with pedigree 0.652, pedigree (1,1,3,1,1)
  Measured value.
- Arsenic [air, non-urban air or from high stacks]: 1.51327e-10 kg; lognormal variance with pedigree 0.652, pedigree (1,1,3,1,1)
  Measured value.
- Formaldehyde [water, surface water]: 3.13907e-9 kg; lognormal variance with pedigree 0.3026, pedigree (2,1,1,5,1)
  (same comment as for dithiocarbamate-compound)
- Propane [air, urban air close to ground]: 1.83536e-9 kg; lognormal variance with pedigree 0.1408, pedigree (2,5,2,5,4)
  (same comment as for dithiocarbamate-compound)
- Hydrocarbons, aliphatic, alkanes, unspecified [air, non-urban air or from high stacks]: 8.2361e-9 kg; lognormal variance with pedigree 0.1306, pedigree (2,5,5,5,4)
  (same comment as for dithiocarbamate-compound)
- Selenium [air, urban air close to ground]: 3.45419e-11 kg; lognormal variance with pedigree 0.7408, pedigree (2,5,2,5,4)
  (same comment as for dithiocarbamate-compound)
- Selenium [air, non-urban air or from high stacks]: 1.06322e-11 kg; lognormal variance with pedigree 0.6526, pedigree (2,1,1,5,1)
  (same comment as for dithiocarbamate-compound)
- Hydrocarbons, aromatic [air, urban air close to ground]: 4.321e-10 kg; lognormal variance with pedigree 0.1408, pedigree (2,5,2,5,4)
  (same comment as for dithiocarbamate-compound)
- Hydrocarbons, aliphatic, unsaturated [air, non-urban air or from high stacks]: 2.39957e-8 kg; lognormal variance with pedigree 0.1306, pedigree (2,5,5,5,4)
  (same comment as for dithiocarbamate-compound)
- Hydrogen chloride [air, non-urban air or from high stacks]: 9.9708e-9 kg; lognormal variance with pedigree 0.0426, pedigree (2,1,1,5,1)
  (same comment as for dithiocarbamate-compound)
- Hydrogen sulfide [water, surface water]: 1.48901e-8 kg; lognormal variance with pedigree 0.0426, pedigree (2,1,1,5,1)
  (same comment as for dithiocarbamate-compound)
- Hydrocarbons, aromatic [air, non-urban air or from high stacks]: 3.021e-10 kg; lognormal variance with pedigree 0.1306, pedigree (2,5,5,5,4)
  (same comment as for dithiocarbamate-compound)
- Toluene [water, surface water]: 9.99046e-13 kg; lognormal variance with pedigree 0.3026, pedigree (2,1,1,5,1)
  (same comment as for dithiocarbamate-compound)
- Hydrogen chloride [air, urban air close to ground]: 4.14605e-9 kg; lognormal variance with pedigree 0.1408, pedigree (2,5,2,5,4)
  (same comment as for dithiocarbamate-compound)
- Hydrogen fluoride [air, non-urban air or from high stacks]: 9.66781e-11 kg; lognormal variance with pedigree 0.1306, pedigree (2,5,5,5,4)
  (same comment as for dithiocarbamate-compound)
- Vanadium [air, urban air close to ground]: 2.87849e-9 kg; lognormal variance with pedigree 0.7408, pedigree (2,5,2,5,4)
  (same comment as for dithiocarbamate-compound)
- Hydrogen fluoride [air, urban air close to ground]: 1.38265e-10 kg; lognormal variance with pedigree 0.1408, pedigree (2,5,2,5,4)
  (same comment as for dithiocarbamate-compound)
- Toluene [air, non-urban air or from high stacks]: 1.50688e-9 kg; lognormal variance with pedigree 0.1306, pedigree (2,5,5,5,4)
  (same comment as for dithiocarbamate-compound)
- Hydrogen sulfide [air, urban air close to ground]: 3.92798e-7 kg; lognormal variance with pedigree 0.0421, pedigree (1,2,1,5,1)
  (same comment as for dithiocarbamate-compound)
- Iron [air, non-urban air or from high stacks]: 1.65087e-9 kg; lognormal variance with pedigree 0.6526, pedigree (2,1,1,5,1)
  (same comment as for dithiocarbamate-compound)
- Hydrogen sulfide [air, non-urban air or from high stacks]: 1.19103e-9 kg; lognormal variance with pedigree 0.0426, pedigree (2,1,1,5,1)
  (same comment as for dithiocarbamate-compound)
- Iron [air, urban air close to ground]: 2.36036e-9 kg; lognormal variance with pedigree 0.7408, pedigree (2,5,2,5,4)
  (same comment as for dithiocarbamate-compound)
- Vanadium [air, non-urban air or from high stacks]: 2.0132e-9 kg; lognormal variance with pedigree 0.6526, pedigree (2,1,1,5,1)
  (same comment as for dithiocarbamate-compound)
- Magnesium [air, non-urban air or from high stacks]: 1.29506e-9 kg; lognormal variance with pedigree 0.1306, pedigree (2,5,5,5,4)
  (same comment as for dithiocarbamate-compound)
- m-Xylene [air, non-urban air or from high stacks]: 2.05029e-9 kg; lognormal variance with pedigree 0.1306, pedigree (2,5,5,5,4)
  (same comment as for dithiocarbamate-compound)
- 2-Propanol [air, non-urban air or from high stacks]: 6.97241e-9 kg; lognormal variance with pedigree 0.0426, pedigree (2,1,1,5,1)
  (same comment as for dithiocarbamate-compound)
- Manganese [air, non-urban air or from high stacks]: 1.31258e-9 kg; lognormal variance with pedigree 0.1306, pedigree (2,5,5,5,4)
  (same comment as for dithiocarbamate-compound)
- 4-Methyl-2-pentanone [air, non-urban air or from high stacks]: 1.52377e-10 kg; lognormal variance with pedigree 0.0426, pedigree (2,1,1,5,1)
  (same comment as for dithiocarbamate-compound)
- Methane, fossil [air, urban air close to ground]: 2.48722e-8 kg; lognormal variance with pedigree 0.1408, pedigree (2,5,2,5,4)
  (same comment as for dithiocarbamate-compound)
- 4-Methyl-2-pentanol [water, surface water]: 2.12563e-14 kg; lognormal variance with pedigree 0.3026, pedigree (2,1,1,5,1)
  (same comment as for dithiocarbamate-compound)
- Acetaldehyde [air, non-urban air or from high stacks]: 3.91271e-9 kg; lognormal variance with pedigree 0.0426, pedigree (2,1,1,5,1)
  (same comment as for dithiocarbamate-compound)
- Methane, non-fossil [air, non-urban air or from high stacks]: 4.56283e-7 kg; lognormal variance with pedigree 0.0426, pedigree (2,1,1,5,1)
  (same comment as for dithiocarbamate-compound)
- AOX, Adsorbable Organic Halogen as Cl [water, surface water]: 9.20956e-7 kg; lognormal variance with pedigree 0.0421, pedigree (1,2,1,5,1)
  (same comment as for dithiocarbamate-compound)
- Methane, fossil [air, non-urban air or from high stacks]: 7.14598e-9 kg; lognormal variance with pedigree 0.0426, pedigree (2,1,1,5,1)
  (same comment as for dithiocarbamate-compound)
- Molybdenum [air, non-urban air or from high stacks]: 1.61065e-11 kg; lognormal variance with pedigree 0.6526, pedigree (2,1,1,5,1)
  (same comment as for dithiocarbamate-compound)
- Acetic acid [air, non-urban air or from high stacks]: 1.26342e-9 kg; lognormal variance with pedigree 0.1306, pedigree (2,5,5,5,4)
  (same comment as for dithiocarbamate-compound)
- Methyl ethyl ketone [air, non-urban air or from high stacks]: 1.82604e-9 kg; lognormal variance with pedigree 0.0426, pedigree (2,1,1,5,1)
  (same comment as for dithiocarbamate-compound)
- Acetic acid [air, urban air close to ground]: 3.03868e-9 kg; lognormal variance with pedigree 0.1408, pedigree (2,5,2,5,4)
  (same comment as for dithiocarbamate-compound)
- Methanol [air, urban air close to ground]: 2.37751e-8 kg; lognormal variance with pedigree 0.1408, pedigree (2,5,2,5,4)
  (same comment as for dithiocarbamate-compound)
- Acrolein [air, non-urban air or from high stacks]: 1.69636e-9 kg; lognormal variance with pedigree 0.0426, pedigree (2,1,1,5,1)
  (same comment as for dithiocarbamate-compound)
- Acetone [air, urban air close to ground]: 4.31773e-10 kg; lognormal variance with pedigree 0.1408, pedigree (2,5,2,5,4)
  (same comment as for dithiocarbamate-compound)
- Acetone [air, non-urban air or from high stacks]: 3.01975e-10 kg; lognormal variance with pedigree 0.0426, pedigree (2,1,1,5,1)
  (same comment as for dithiocarbamate-compound)
- Methanol [water, surface water]: 9.16284e-9 kg; lognormal variance with pedigree 0.3026, pedigree (2,1,1,5,1)
  (same comment as for dithiocarbamate-compound)
- Ammonia [air, non-urban air or from high stacks]: 1.2972e-7 kg; lognormal variance with pedigree 0.0426, pedigree (2,1,1,5,1)
  (same comment as for dithiocarbamate-compound)
- PAH, polycyclic aromatic hydrocarbons [air, non-urban air or from high stacks]: 6.30307e-10 kg; lognormal variance with pedigree 0.3906, pedigree (2,5,5,5,4)
  (same comment as for dithiocarbamate-compound)
- Molybdenum [air, urban air close to ground]: 2.30279e-11 kg; lognormal variance with pedigree 0.7408, pedigree (2,5,2,5,4)
  (same comment as for dithiocarbamate-compound)
- NMVOC, non-methane volatile organic compounds, unspecified origin [air, non-urban air or from high stacks]: 8.28668e-8 kg; lognormal variance with pedigree 0.0426, pedigree (2,1,1,5,1)
  (same comment as for dithiocarbamate-compound)
- Benzene [air, non-urban air or from high stacks]: 4.93758e-9 kg; lognormal variance with pedigree 0.1306, pedigree (2,5,5,5,4)
  (same comment as for dithiocarbamate-compound)
- Benzene, ethyl- [air, non-urban air or from high stacks]: 2.31627e-10 kg; lognormal variance with pedigree 0.1306, pedigree (2,5,5,5,4)
  (same comment as for dithiocarbamate-compound)
- Benzene, hexachloro- [air, non-urban air or from high stacks]: 0 kg; pedigree (1,1,1,1,1)
  (same comment as for dithiocarbamate-compound)
- Benzene [water, surface water]: 1.80683e-12 kg; lognormal variance with pedigree 0.3026, pedigree (2,1,1,5,1)
  (same comment as for dithiocarbamate-compound)
- Benzo(a)pyrene [air, non-urban air or from high stacks]: 1.56542e-12 kg; lognormal variance with pedigree 0.1306, pedigree (2,5,5,5,4)
  (same comment as for dithiocarbamate-compound)
- Bromine [air, non-urban air or from high stacks]: 4.63263e-10 kg; lognormal variance with pedigree 0.1306, pedigree (2,5,5,5,4)
  (same comment as for dithiocarbamate-compound)
- Butane [air, non-urban air or from high stacks]: 2.60335e-10 kg; lognormal variance with pedigree 0.1306, pedigree (2,5,5,5,4)
  (same comment as for dithiocarbamate-compound)
- Calcium [air, non-urban air or from high stacks]: 4.53896e-8 kg; lognormal variance with pedigree 0.1306, pedigree (2,5,5,5,4)
  (same comment as for dithiocarbamate-compound)
- Butane [air, urban air close to ground]: 6.12418e-9 kg; lognormal variance with pedigree 0.4008, pedigree (2,5,2,5,4)
  (same comment as for dithiocarbamate-compound)
- Nickel [air, non-urban air or from high stacks]: 1.10728e-10 kg; lognormal variance with pedigree 0.6526, pedigree (2,1,1,5,1)
  (same comment as for dithiocarbamate-compound)
- Carbon monoxide, fossil [air, urban air close to ground]: 3.723e-8 kg; lognormal variance with pedigree 0.7408, pedigree (2,5,2,5,4)
  (same comment as for dithiocarbamate-compound)
- Carbon dioxide, non-fossil [air, non-urban air or from high stacks]: 0.00256232 kg; lognormal variance with pedigree 0.0032, pedigree (2,1,1,5,1)
  (same comment as for dithiocarbamate-compound)
- Carbon dioxide, fossil [air, urban air close to ground]: 0.000549193 kg; lognormal variance with pedigree 0.0027, pedigree (1,2,1,5,1)
  (same comment as for dithiocarbamate-compound)
- Carbon monoxide, non-fossil [air, non-urban air or from high stacks]: 4.66543e-5 kg; lognormal variance with pedigree 0.7406, pedigree (2,5,5,5,4)
  (same comment as for dithiocarbamate-compound)
- Particulates, > 10 um [air, urban air close to ground]: 6.90837e-9 kg; lognormal variance with pedigree 0.0526, pedigree (1,3,1,5,1)
  (same comment as for dithiocarbamate-compound)
- Chromium VI [air, non-urban air or from high stacks]: 2.78335e-12 kg; lognormal variance with pedigree 0.6526, pedigree (2,1,1,5,1)
  (same comment as for dithiocarbamate-compound)
- Chlorine [air, non-urban air or from high stacks]: 1.3898e-9 kg; lognormal variance with pedigree 0.1306, pedigree (2,5,5,5,4)
  (same comment as for dithiocarbamate-compound)
- Pentane [air, non-urban air or from high stacks]: 4.44887e-10 kg; lognormal variance with pedigree 0.1306, pedigree (2,5,5,5,4)
  (same comment as for dithiocarbamate-compound)
- Chromium [air, non-urban air or from high stacks]: 7.38255e-11 kg; lognormal variance with pedigree 0.6526, pedigree (2,1,1,5,1)
  (same comment as for dithiocarbamate-compound)
- Phenol, pentachloro- [air, non-urban air or from high stacks]: 6.25409e-14 kg; lognormal variance with pedigree 0.1306, pedigree (2,5,5,5,4)
  (same comment as for dithiocarbamate-compound)
- Cobalt [air, non-urban air or from high stacks]: 6.64377e-11 kg; lognormal variance with pedigree 0.6526, pedigree (2,1,1,5,1)
  (same comment as for dithiocarbamate-compound)
- Pentane [air, urban air close to ground]: 1.0495e-8 kg; lognormal variance with pedigree 0.1408, pedigree (2,5,2,5,4)
  (same comment as for dithiocarbamate-compound)
- Phosphorus [air, non-urban air or from high stacks]: 1.41304e-9 kg; lognormal variance with pedigree 0.1306, pedigree (2,5,5,5,4)
  (same comment as for dithiocarbamate-compound)
- Dinitrogen monoxide [air, non-urban air or from high stacks]: 1.08002e-8 kg; lognormal variance with pedigree 0.0426, pedigree (2,1,1,5,1)
  (same comment as for dithiocarbamate-compound)
- Phenol [air, non-urban air or from high stacks]: 2.90714e-9 kg; lognormal variance with pedigree 0.0426, pedigree (2,1,1,5,1)
  (same comment as for dithiocarbamate-compound)
- Cobalt [air, urban air close to ground]: 9.49901e-11 kg; lognormal variance with pedigree 0.7408, pedigree (2,5,2,5,4)
  (same comment as for dithiocarbamate-compound)
- Potassium [air, non-urban air or from high stacks]: 1.80674e-7 kg; lognormal variance with pedigree 0.1306, pedigree (2,5,5,5,4)
  (same comment as for dithiocarbamate-compound)
- Ethanol [air, urban air close to ground]: 8.63547e-10 kg; lognormal variance with pedigree 0.1408, pedigree (2,5,2,5,4)
  (same comment as for dithiocarbamate-compound)
- Fluorine [air, non-urban air or from high stacks]: 3.86051e-10 kg; lognormal variance with pedigree 0.1306, pedigree (2,5,5,5,4)
  (same comment as for dithiocarbamate-compound)
- Propanal [air, non-urban air or from high stacks]: 1.85e-9 kg; lognormal variance with pedigree 0.1786, pedigree (2,5,4,5,5)
  (same comment as for dithiocarbamate-compound)
- Ethanol [air, non-urban air or from high stacks]: 6.03986e-10 kg; lognormal variance with pedigree 0.0426, pedigree (2,1,1,5,1)
  (same comment as for dithiocarbamate-compound)
- Propionic acid [air, urban air close to ground]: 1.74879e-10 kg; lognormal variance with pedigree 0.1408, pedigree (2,5,2,5,4)
  (same comment as for dithiocarbamate-compound)
- Formaldehyde [air, non-urban air or from high stacks]: 1.71066e-8 kg; lognormal variance with pedigree 0.0426, pedigree (2,1,1,5,1)
  (same comment as for dithiocarbamate-compound)
- Propanol [air, non-urban air or from high stacks]: 4.40007e-13 kg; lognormal variance with pedigree 0.0426, pedigree (2,1,1,5,1)
  (same comment as for dithiocarbamate-compound)
- Propane [air, non-urban air or from high stacks]: 1.34484e-10 kg; lognormal variance with pedigree 0.1306, pedigree (2,5,5,5,4)
  (same comment as for dithiocarbamate-compound)
- Sodium [air, non-urban air or from high stacks]: 1.15474e-8 kg; lognormal variance with pedigree 0.1306, pedigree (2,5,5,5,4)
  (same comment as for dithiocarbamate-compound)
- Propionic acid [air, non-urban air or from high stacks]: 7.39963e-12 kg; lognormal variance with pedigree 0.1306, pedigree (2,5,5,5,4)
  (same comment as for dithiocarbamate-compound)
- Xylene [air, urban air close to ground]: 1.90949e-8 kg; lognormal variance with pedigree 0.0127, pedigree (3,4,4,3,1)
  Calculated value: Emissions from the use of solvent Naphtha, white spirit and other petrol based derivates. Average of three companies calculated from the mass balance of product use and recovery for recycling/disposal. Toluene and Xylene assumed main components of cyclic hydrocarbons, related content of cylcic hydrocarbons from product specifications expressed by 50% Xylene and 50% Toluene.
- 2-Propanol [air, urban air close to ground]: 4.86295e-7 kg; lognormal variance with pedigree 0.0113, pedigree (3,3,4,3,1)
  Calculated value: average from three companies calculated from the mass balance of solvent consumption and solvent recovery for recycling.
- Heptane [air, urban air close to ground]: 2.11471e-7 kg; lognormal variance with pedigree 0.0113, pedigree (3,3,4,3,1)
  Calculated value: Emissions from the use of solvent Naphtha, white spirit and other petrol based derivates. Average of three companies calculated from the mass balance of product use and recovery for recycling. Heptane used for the portion of aliphatic hydrocarbons C7-C12 given in product specifications.
- Propylene oxide [air, urban air close to ground]: 4.0599e-8 kg; lognormal variance with pedigree 0.0173, pedigree (4,3,4,3,1)
  Calculated, stochiometric value: Emissions from the use of ink solvent. Average of three companies calculated from the mass balance of product use and recovery for recycling/disposal. Portion of Methoxypropanol derived from product specifications and related emissions expressed by the portion of methanol and propylene oxide used for the production of Methoxypropanol.
- Molybdenum [air, unspecified]: 3.38108e-13 kg; lognormal variance with pedigree 0.6526, pedigree (1,3,3,1,1)
  Amount based on primary data collected from participating companies.
- Hydrocarbons, unspecified [air, non-urban air or from high stacks]: 3.3432e-9 kg; lognormal variance with pedigree 0.0426, pedigree (1,3,3,1,1)
  Amount based on primary data collected from participating companies.
- Iron, ion [water, ocean]: 6.08306e-10 kg; lognormal variance with pedigree 0.6526, pedigree (1,3,3,1,1)
  Amount based on primary data collected from participating companies.
- Thallium [water, ocean]: 3.63819e-11 kg; lognormal variance with pedigree 0.6526, pedigree (1,3,3,1,1)
  Amount based on primary data collected from participating companies.
- Sulfur [soil, industrial]: 2.09526e-5 kg; lognormal variance with pedigree 0.0426, pedigree (1,3,3,1,1)
  Amount based on primary data collected from participating companies.
- Cyanide [water, ocean]: 3.51242e-12 kg; lognormal variance with pedigree 0.0426, pedigree (1,3,3,1,1)
  Amount based on primary data collected from participating companies.
- Sulfuric acid [air, unspecified]: 3.92823e-8 kg; lognormal variance with pedigree 0.0426, pedigree (1,3,3,1,1)
  Amount based on primary data collected from participating companies.
- Chlorine [air, unspecified]: 1.0705e-10 kg; lognormal variance with pedigree 0.0426, pedigree (1,3,3,1,1)
  Amount based on primary data collected from participating companies.
- Phenol [water, surface water]: 2.6837e-12 kg; lognormal variance with pedigree 0.0426, pedigree (1,3,3,1,1)
  Amount based on primary data collected from participating companies.
- Cobalt [water, surface water]: 3.03927e-13 kg; lognormal variance with pedigree 0.6526, pedigree (1,3,3,1,1)
  Amount based on primary data collected from participating companies.
- Nitrogen [water, ocean]: 1.53517e-8 kg; lognormal variance with pedigree 0.0426, pedigree (1,3,3,1,1)
  Amount based on primary data collected from participating companies.
- Ammonium, ion [water, ocean]: 6.34006e-9 kg; lognormal variance with pedigree 0.0426, pedigree (1,3,3,1,1)
  Amount based on primary data collected from participating companies.
- Nitrate [water, ocean]: 7.90294e-10 kg; lognormal variance with pedigree 0.0426, pedigree (1,3,3,1,1)
  Amount based on primary data collected from participating companies.
- Nitrogen dioxide [water, surface water]: 4.47284e-11 kg; lognormal variance with pedigree 0.0426, pedigree (1,3,3,1,1)
  Amount based on primary data collected from participating companies.
- Acidity, unspecified [water, surface water]: 4.40701e-10 kg; lognormal variance with pedigree 0.0426, pedigree (1,3,3,1,1)
  Amount based on primary data collected from participating companies.
- Sulfuric acid [water, surface water]: 1.25317e-6 kg; lognormal variance with pedigree 0.0426, pedigree (1,3,3,1,1)
  Amount based on primary data collected from participating companies.

## Sampling procedure
Survey among member companies of the European Panel Federation; emissions profile per MJ wood input from PSI (2014)

## Review by Emilia Moreno Ruiz 2014-06-12
AL in heat input corrected to the most recent activity

## Review by Emilia Moreno Ruiz 2015-02-04
Activity link in heat input corrected (from CH to GLO)
