# technical wood drying facility construction

Dataset: EcoSpold 2, unit process
Geography: RoW
Time period: 2002-01-01 to 2019-12-31
Technology level: current
Classification: EcoSpold01Categories: wooden materials/extraction
Classification: ISIC rev.4 ecoinvent: 4290:Construction of other civil engineering projects
Synonyms: Trocknungskammer; kiln
Tags: ConvertedDataset
Scenario: Business-as-Usual
System model: Allocation at the point of substitution
Generated by: Hans-Jörg Althaus
Published in: Werner F. 2007
Database: ecoinvent
isCopyrightProtected: true
accessRestrictedTo: 1

## General comment
The service life is assumed to be 50 years. The kiln has a capacity of 30 m3 wood per charge. Drying time depends on wood type and in- and output moisture content. This data must only be used to consider the infrastructure needed for kiln drying wood if this is not relevant.
[This dataset was already contained in the ecoinvent database version 2. It was not individually updated during the transfer to ecoinvent version 3. Life Cycle Impact Assessment results may still have changed, as they are affected by changes in the supply chain, i.e. in other datasets. This dataset was generated following the ecoinvent quality guidelines for version 2. It may have been subject to central changes described in the ecoinvent version 3 change report (http://www.ecoinvent.org/database/ecoinvent-version-3/reports-of-changes/), and the results of the central updates were reviewed extensively. The changes added e.g. consistent water flows and other information throughout the database. The documentation of this dataset can be found in the ecoinvent reports of version 2, which are still available via the ecoinvent website. The change report linked above covers all central changes that were made during the conversion process.]

## Included activities end
The land area and the materials and their transports needed for building and disposal of a kiln with a per charge loading capacity of 30 m3 wood (under bark) are included. Not included is the land used for storage etc.

## Geography
Estimate is so rough that the Geograhpy is not relevant.

## Technology
Medium sized kiln of polystyren foam insulated aluminium panels, located with sawmill

## Reference product
- technical wood drying facility: 1 unit; By-product classification allocatable product; CPC 53269: Other constructions for manufacturing
  production volume 2.67763 unit
    This is a placeholder value that does not reflect real-world production volumes. This dataset does not currently require a real-world production volume to work in the database framework, and no actual data were collected yet. This has no negative effect on the results of the ecoinvent database.
  property price 48006 EUR2005
    Convert from EU 27 price to the world by currency exchange rate.
  property true value 48006
    allocation property applied in "true value" allocation // value calculated from revenue

## By-products
- heat, for reuse in municipal waste incineration only: 0 MJ; CPC 17300: Steam and hot water; By-product classification allocatable product; pedigree (1,1,1,1,1)
  Net electricity generated from this waste and used in internal MSWI plant energy redistribution.
  Uncertainty: uncertainty is calculated from uncertainties in waste composition and uncertainties in energy efficiency and the uncertainty in internal energy demand
  production volume 10656.7 MJ
  property exergy 0.1842 MJ; name E_th_prod_MSWI_exergy
    This exergy property is based on the exergy content of the product.
  property price 0.0106 EUR2005; name E_th_prod_MSWI_price_EUR2005
    Average European district heat price from Ecoheatcool and Euroheat 2005-2006, Ecoheat Work package 1: The European heat market. Final report. 10.6 EUR/GJ i s the price of district heat. http://www.solarthermalworld.org/files/Ecoheatcool%20WP1%20Web.pdf?download
  property true value relation 0.1842; name E_th_prod_MSWI_true_value_relation
    property to calculate "true value" from
  property true value 23.2987
    allocation property applied in "true value" allocation // value calculated from true value relation
- electricity, for reuse in municipal waste incineration only: 0 kWh; CPC 17100: Electrical energy; By-product classification allocatable product; pedigree (1,1,1,1,1)
  (same comment as for heat, for reuse in municipal waste incineration only)
  production volume 1527.81 kWh
  property true value relation 3.6; name E_el_prod_MSWI_true_value_relation
    property to calculate "true value" from
  property price 0.1 EUR2005; name E_el_prod_MSWI_price_EUR2005
    Estimated to be the same price as in case of electricity, medium voltage.
  property exergy 3.6 MJ; name E_el_prod_MSWI_exergy
    This exergy property is based on the exergy content of the product.
  property true value 65.2819
    (same comment as for heat, for reuse in municipal waste incineration only)

## Inputs from technosphere
- aluminium, wrought alloy: 638.821 kg; lognormal variance with pedigree 0.39, pedigree (3,5,5,5,3)
  properties: wet mass 1 kg, dry mass 1 kg
- waste reinforced concrete: -9881.77 kg; lognormal variance with pedigree 0.39, pedigree (3,5,5,5,3)
  production volume 29700 kg
    Calculated from the production volume of technical wood drying facility in proportion to the respective output amounts.
  properties: dry mass 0.99418 kg, wet mass 1 kg, water content 0.00585407
- polystyrene foam slab: 450.169 kg; lognormal variance with pedigree 0.39, pedigree (3,5,5,5,3)
  properties: dry mass 1 kg, wet mass 1 kg, carbon content, fossil 0.859091
  note on carbon content, fossil: XPS consists in 91% of polystyrene, 7% of blowing agent and the re-maining 2% are flame retardants (bromine compounds) and other additives (ecoinvent v2.2 report 7, part XIV, pg69). The chemical formula of polystyrene is (C8H8)n. Here, the blowing agent is CO2.
- waste polystyrene isolation, flame-retardant: -450.169 kg; lognormal variance with pedigree 0.39, pedigree (3,5,5,5,3)
  production volume 1353 kg
    (same comment as for waste reinforced concrete)
  properties: dry mass 0.998012 kg, water content 0.00199232, wet mass 1 kg, carbon content, fossil 0.918145
  note on carbon content, fossil: Polystyrene isolation (EPS) is flame-retarded with hexa-bromo-cyclo-dodecan (C12H18Br6) and contains 0.67 w% bromine (ecoinvent v2.2 report 13_I, pg 39). The rest is polystyrene: (C8H8)n.
- sheet rolling, aluminium: 638.821 kg; lognormal variance with pedigree 0.39, pedigree (3,5,5,5,3)
- concrete, normal: 0 m3; pedigree (1,1,1,1,1)
  properties: water content 0.086758, wet mass 2380 kg, dry mass 2190 kg
- concrete, normal: 0.10313, 0.010746, 0.0869963, 0.0489354, 0.207228, 0.00698967, 4.02769 m3 (7 entries); lognormal variance with pedigree 0.39, pedigree (3,5,5,5,3)

## Inputs from nature
- Occupation, industrial area [natural resource, land]: 748.619 m2*year; lognormal variance with pedigree 0.12, pedigree (3,5,5,5,3)
- Transformation, from unspecified [natural resource, land]: 14.9724 m2; lognormal variance with pedigree 0.21, pedigree (3,5,5,5,3)
- Transformation, to industrial area [natural resource, land]: 14.9724 m2; lognormal variance with pedigree 0.21, pedigree (3,5,5,5,3)

## Sampling procedure
estimation

## Extrapolations
none This dataset has been copied from an original dataset covering the geography RER. The uncertainty has been adjusted accordingly.

## Review by Roberto Dones 2003-07-04
Passed
