# treatment of used industrial electronic device, mechanical treatment

Dataset: EcoSpold 2, unit process
Geography: GLO
Time period: 2005-01-01 to 2019-12-31
Technology level: current
Classification: ISIC rev.4 ecoinvent: 3830:Materials recovery
Classification: EcoSpold01Categories: waste management/recycling
Tags: ConvertedDataset; Treatment
Scenario: Business-as-Usual
System model: Allocation at the point of substitution
Generated by: Roland Hischier
Published in: Hischier R. 2007
Database: ecoinvent
isCopyrightProtected: true
accessRestrictedTo: 1

## General comment
manual dismantling plus subsequent shredding/separation procedure, based on common transfer coefficients for both steps. Data from literature and from own experiences in Switzerland.
[This dataset was already contained in the ecoinvent database version 2. It was not individually updated during the transfer to ecoinvent version 3. Life Cycle Impact Assessment results may still have changed, as they are affected by changes in the supply chain, i.e. in other datasets. This dataset was generated following the ecoinvent quality guidelines for version 2. It may have been subject to central changes described in the ecoinvent version 3 change report (http://www.ecoinvent.org/database/ecoinvent-version-3/reports-of-changes/), and the results of the central updates were reviewed extensively. The changes added e.g. consistent water flows and other information throughout the database. The documentation of this dataset can be found in the ecoinvent reports of version 2, which are still available via the ecoinvent website. The change report linked above covers all central changes that were made during the conversion process.]

## Included activities end
This dataset represents the mechanical treatment of a WEEE devices in Switzerland. Two process steps are included: manual depollution and the mechanical treatment (shredder) of the remaining part.

## Geography
European data, used as average for global situation

## Technology
4-step-procedure (shredder - separation - shredder - separation) as used currently often in Europe

## Reference product
- used industrial electronic device: 0 kg; By-product classification Waste; CPC 39990: Other wastes n.e.c.
  EcoSpold01Location=GLO
  production volume 0 kg
    Unkonwn
    proportion; source: Hischier 2005
  property price 0 EUR2005
    Waste products are assigned a price of zero as they are assumed to require further treatment.
  property carbon content, fossil 0.0818694
    The composition of an average industrial device was extracted from Tab 4.38 (ecoinvent v2.2 report 18_V). 88% steel, that was considered to have a C content of 0.012 (C content was calculated out of emission factors published in Commission Decision of 18 July 2007 establishing guidelines for the monitoring and reporting of greenhouse gas emissions pursuant to Directive 2003/87/EC of the European Parliament and of the Council (notified under document number C(2007) 3416)); 8% plastics (plastics C content was calculated using data in Tab A.2, ecoinvent v2.2 report 13_I); 3.2% PWB & plugs (C content calculated using PWB composition)
  property carbon content, non-fossil 3.07246e-5
    (same comment as for used industrial electronic device)
  property carbon content 0.0819002
    carbon content on a dry matter basis (reserved; not for manual entry)
  properties: dry mass 1 kg, water content 0, water in wet mass 0 kg, wet mass 1 kg, carbon allocation 0.0819002 kg
- iron scrap, sorted, pressed: 1 kg; By-product classification Recyclable; CPC 39310: Slag, dross, scalings and other waste from the manufacture of iron or steel; pedigree (1,1,1,1,1)
  replaces the original flow "Fe fraction of used industrial electronic device, from mechanical treatment"
  production volume 0.63056 kg

## By-products
- iron scrap, sorted, pressed: 0 kg; By-product classification Recyclable; CPC 39310: Slag, dross, scalings and other waste from the manufacture of iron or steel; pedigree (1,1,1,1,1)
  (same comment as for iron scrap, sorted, pressed)
  production volume 0 kg
    Unkonwn
    Calculated from the production volume of used industrial electronic device in proportion to the respective output amounts.
  property price 0.175 EUR2005
    Temporary price data. Calculated as 90% of purchasers price based on: 2005 import and export prices (total trades (USD) divided by total weight (kg) in biggest economies of the world: EU27, USA, Brasil, China, India, Japan and Russia) from UN Commodity Trade Statistics Database (http://data.un.org/Explorer.aspxDatabase [Accessed 2011.06.20]). Commodity: Waste or scrap, of cast iron
  property carbon content 0
    carbon content on a dry matter basis (reserved; not for manual entry)
  properties: carbon content, non-fossil 0, dry mass 1 kg, water content 0, wet mass 1 kg, carbon content, fossil 0, water in wet mass 0 kg, carbon allocation 0 kg
- lead: 0 kg; CPC 41441: Lead, unwrought; By-product classification allocatable product
  EcoSpold01Location=SE
  property price 0.744 EUR2005
    Temporary price data. Calculated as 90% of purchasers price based on: Source: ecoinvent v2 report 10-part IX, Tab 5.10 & 2.5
  property carbon content 0
    carbon content on a dry matter basis (reserved; not for manual entry)
  properties: wet mass 1 kg, water content 0, carbon content, non-fossil 0, carbon content, fossil 0, dry mass 1 kg, water in wet mass 0 kg, carbon allocation 0 kg
- copper: 0 kg; By-product classification allocatable product; CPC 41413: Refined copper and copper alloys, unwrought; master alloys of copper
  EcoSpold01Location=SE
  property price 5.52 EUR2005
    Literature value (http://www.economist.com/news/business/21576714-mining-industry-has-enriched-chile-its-future-precarious-copper-solution). Average price between 20015 and 2013.
  property carbon content 0
    carbon content on a dry matter basis (reserved; not for manual entry)
  properties: water content 0, water in wet mass 0 kg, carbon content, fossil 0, carbon content, non-fossil 0, dry mass 1 kg, wet mass 1 kg, carbon allocation 0 kg
- nickel, 99.5%: 0 kg; CPC 41422: Unwrought nickel; By-product classification allocatable product
  EcoSpold01Location=SE
  property price 10.4 EUR2005
    Temporary price data. Calculated as 90% of purchasers price based on: 2004 nickel price from USGS (2007) Mineral commodity summaries 2007. <http://minerals.usgs.gov/minerals/pubs/mcs/2007/mcs2007.pdf> [Accessed 25 May 2010]
  property carbon content 0
    carbon content on a dry matter basis (reserved; not for manual entry)
  properties: water in wet mass 0 kg, wet mass 1 kg, carbon content, non-fossil 0, dry mass 1 kg, water content 0, carbon content, fossil 0, carbon allocation 0 kg
- silver: 0 kg; CPC 41310: Silver (including silver plated with gold or platinum), unwrought or in semi-manufactured forms, or in powder […]; By-product classification allocatable product; CAS 7440-22-4
  EcoSpold01Location=SE
  property price 178 EUR2005
    (same comment as for lead)
  property carbon content 0
    carbon content on a dry matter basis (reserved; not for manual entry)
  properties: wet mass 1 kg, carbon content, non-fossil 0, dry mass 1 kg, water content 0, carbon content, fossil 0, water in wet mass 0 kg, carbon allocation 0 kg
- palladium: 0 kg; CPC 4160: Other non-ferrous metals and articles thereof (including waste and scrap of some metals); cermets and articles […]; By-product classification allocatable product
  EcoSpold01Location=SE
  property price 5640 EUR2005
    Temporary price data. Calculated as 90% of purchasers price based on: 2004 price from USGS (2007) Mineral commodity summaries 2007. <http://minerals.usgs.gov/minerals/pubs/mcs/2007/mcs2007.pdf> [Accessed 25 May 2010]
  property carbon content 0
    carbon content on a dry matter basis (reserved; not for manual entry)
  properties: wet mass 1 kg, carbon content, fossil 0, water in wet mass 0 kg, water content 0, carbon content, non-fossil 0, dry mass 1 kg, carbon allocation 0 kg
- gold: 0 kg; CPC 41320: Gold (including gold plated with platinum), unwrought or in semi-manufactured forms, or in powder form; By-product classification allocatable product; CAS 7440-57-5
  EcoSpold01Location=SE
  property price 10600 EUR2005
    Temporary price data. Calculated as 90% of purchasers price based on: Source: ecoinvent v2 report 10-part IX, Tab 2.5
  property carbon content 0
    carbon content on a dry matter basis (reserved; not for manual entry)
  properties: wet mass 1 kg, carbon content, fossil 0, dry mass 1 kg, carbon content, non-fossil 0, water content 0, water in wet mass 0 kg, carbon allocation 0 kg
- iron scrap, unsorted: 0 kg; source European Aluminium Association 2008; CPC 39310: Slag, dross, scalings and other waste from the manufacture of iron or steel; By-product classification Recyclable; pedigree (1,1,1,1,1)
  property price 0.149 EUR2005; name ironScrapAmount_price_EUR2005
    Temporary price data. Calculated as 90% of purchasers price based on: estimated at 85% of sorted scrap
  property carbon content 0
    carbon content on a dry matter basis (reserved; not for manual entry)
  properties: water in wet mass 0 kg, water content 0, carbon content, fossil 0, carbon content, non-fossil 0, dry mass 1 kg, wet mass 1 kg, carbon allocation 0 kg
- aluminium oxide, non-metallurgical: 0 kg; source European Aluminium Association 2008; CPC 41432: Alumina (aluminium oxide), except artificial corundum; By-product classification allocatable product; CAS 1344-28-1; pedigree (1,1,1,1,1)
  property carbon content, non-fossil 0; name C_content_non_fossil
  property price 0.28 EUR2005; name Al2O3Amount_price_EUR2005
    From UN trade database. http://data.un.org/ Import data from the largest economies of the world are used (Brazil, India, USA, China, Japan and EU-27).
  property dry mass 1 kg; name DM
  property water content 0; name water_content
  property wet mass 1 kg; name WM
  property water in wet mass 0 kg; name WWM
  property carbon content, fossil 0; name C_content_fossil
  property carbon content 0
    carbon content on a dry matter basis (reserved; not for manual entry)
  properties: carbon allocation 0 kg
- aluminium, cast alloy: 0 kg; source European Aluminium Association 2008; By-product classification allocatable product; CPC 41431: Unwrought aluminium; pedigree (1,1,1,1,1)
  EcoSpold01Location=RER
  property price 1.3 EUR2005; name castAlloyAmount_price_EUR2005
    Temporary price data. Calculated as 90% of purchasers price based on: Source: London Metal Exchange, Aluminium alloy price for 2005
  property carbon content 0
    carbon content on a dry matter basis (reserved; not for manual entry)
  properties: water in wet mass 0 kg, carbon content, non-fossil 0, water content 0, dry mass 1 kg, carbon content, fossil 0, wet mass 1 kg, carbon allocation 0 kg
- heat, for reuse in municipal waste incineration only: 0 MJ; CPC 17300: Steam and hot water; By-product classification allocatable product; pedigree (1,1,1,1,1)
  Net electricity generated from this waste and used in internal MSWI plant energy redistribution.
  Uncertainty: uncertainty is calculated from uncertainties in waste composition and uncertainties in energy efficiency and the uncertainty in internal energy demand
  property exergy 0.1842 MJ; name E_th_prod_MSWI_exergy
    This exergy property is based on the exergy content of the product.
  property true value relation 0.1842; name E_th_prod_MSWI_true_value_relation
    property to calculate "true value" from
  property price 0.0106 EUR2005; name E_th_prod_MSWI_price_EUR2005
    Average European district heat price from Ecoheatcool and Euroheat 2005-2006, Ecoheat Work package 1: The European heat market. Final report. 10.6 EUR/GJ i s the price of district heat. http://www.solarthermalworld.org/files/Ecoheatcool%20WP1%20Web.pdf?download
- electricity, for reuse in municipal waste incineration only: 0 kWh; CPC 17100: Electrical energy; By-product classification allocatable product; pedigree (1,1,1,1,1)
  (same comment as for heat, for reuse in municipal waste incineration only)
  property exergy 3.6 MJ; name E_el_prod_MSWI_exergy
    This exergy property is based on the exergy content of the product.
  property true value relation 3.6; name E_el_prod_MSWI_true_value_relation
    property to calculate "true value" from
  property price 0.1 EUR2005; name E_el_prod_MSWI_price_EUR2005
    Estimated to be the same price as in case of electricity, medium voltage.
- aluminium, wrought alloy: 0 kg; source European Aluminium Association 2008; By-product classification allocatable product; CPC 4153: Semi-finished products of aluminium or aluminium alloys; pedigree (1,1,1,1,1)
  property price 1.44 EUR2005; name secondaryAluminiumOutput_price_EUR2005
    Estimated based on literature values and expert judgement. Aluminium ccast alloys are about 90% of the price of aluminium wrought alloys.
  property carbon content 0
    carbon content on a dry matter basis (reserved; not for manual entry)
  properties: wet mass 1 kg, water content 0, carbon content, fossil 0, water in wet mass 0 kg, carbon content, non-fossil 0, dry mass 1 kg, carbon allocation 0 kg
- zinc concentrate: 0 kg; CPC 14290: Other non-ferrous metal ores and concentrates (other than uranium or thorium ores and concentrates); By-product classification allocatable product
  Calculated value from the knowledge of the properties of both products.
  property price 0.38 EUR2005; name ByP_price_EUR2005
    Temporary price data. Calculated as 90% of purchasers price based on: Zinc content in concentrate 53%. Concentrate price per kg Zn 86.5% of refined Zn price (13.5% treatment charges according to CHR Metals Limited 2005: Dynamic cost curves. http://www.minecost.com/dynamic.pdf). 2004 zinc price from USGS (2007) Mineral commodity summaries 2007. <http://minerals.usgs.gov/minerals/pubs/mcs/2007/mcs2007.pdf> [Accessed 25 May 2010]
  property zinc content 0.53; name zinc_C_zinc_concentrate
    Zinc content on a dry matter basis. Value taken from teh "zinc mine operation" /GLO dataset.
  property dry mass 1 kg; name DM_zinc_concentrate
  property carbon content 0
    carbon content on a dry matter basis (reserved; not for manual entry)
  properties: wet mass 1 kg, water content 0, carbon content, non-fossil 0, carbon content, fossil 0, water in wet mass 0 kg, carbon allocation 0 kg

## Inputs from technosphere
- electronics scrap: 0 kg; pedigree (1,1,1,1,1)
  replaces the original flow "Cu fraction of used industrial electronic device, from mechanical treatment"
  production volume 0 kg
    (same comment as for iron scrap, sorted, pressed)
  properties: price 16.1 EUR2005, dry mass 1 kg, wet mass 1 kg
- aluminium scrap, post-consumer, prepared for melting: 0 kg; pedigree (1,1,1,1,1)
  replaces the original flow "Al fraction of used industrial electronic device, from mechanical treatment"
  production volume 0 kg
    (same comment as for iron scrap, sorted, pressed)
  property water content 0; name water_content
  property carbon content, fossil 0; name C_content_fossil
  property water in wet mass 0 kg; name WWM
  property carbon content, non-fossil 0; name C_content_non_fossil
  property wet mass 1 kg; name WM
  property dry mass 1 kg; name DM
  properties: price 0.806 EUR2005
- residue from mechanical treatment, industrial device: 0 kg; pedigree (1,1,1,1,1)
  Calculated - based on composition data
  EcoSpold01Location=CH
  Uncertainty: calculated - based on composition data
  production volume 0 kg
    Calculated from the production volume of used industrial electronic device in proportion to the respective output amounts.
  properties: carbon content, fossil 0.640502, wet mass 1 kg, dry mass 1 kg
  note on carbon content, fossil: Tab 4.39, ecoinvent v2.2 report 18_V, for details in fraction composition. Carbon content in plastic was calculated using data in Tab A.2, ecoinvent v2.2 report 13_I. Others was also considered plastic, and calculated the same way (from pg 70, ecoinvent v2.2 report 18_V). Ferro was assumed to have a C content of 0.012 kg C/ kg (C content of steel, calculated out of emission factors published in Commission Decision of 18 July 2007 establishing guidelines for the monitoring and reporting of greenhouse gas emissions pursuant to Directive 2003/87/EC of the European Parliament and of the Council (notified under document number C(2007) 3416)). The other component of the fraction were considered to content no C.
- waste electric and electronic equipment: 0 kg; pedigree (1,1,1,1,1)
  EcoSpold01Location=GLO
  Rough estimation
  Uncertainty: rough estimation
  production volume 0 kg
    (same comment as for residue from mechanical treatment, industrial device)
  properties: carbon content, fossil 0.0877555, carbon content, non-fossil 0.000485011, dry mass 1 kg, wet mass 1 kg
- used printed wiring boards: 0 kg; pedigree (1,1,1,1,1)
  Calculated - based on composition data
  EcoSpold01Location=GLO
  Uncertainty: calculated - based on composition data
  production volume 0 kg
    (same comment as for residue from mechanical treatment, industrial device)
  properties: dry mass 1 kg, wet mass 1 kg, carbon content, fossil 0.193742, carbon content, non-fossil 0.000960142
  note on carbon content, fossil: Composition of printed wiring boards used to calculate C content
- residue from mechanical treatment, industrial device: 0, 0 kg (2 entries); pedigree (1,1,1,1,1)
  (same comment as for residue from mechanical treatment, industrial device)
- used perfluoropentane: -0.000324509 kg; lognormal variance with pedigree 0.0186, pedigree (1,5,4,5,1)
  calculated value
  production volume 2.52e6 kg
- perfluoropentane: 0.000324509 kg; source Turboden srl 2011; lognormal variance with pedigree 0.0358, pedigree (2,5,4,5,1)
  literature value (organic fluid for the cycle turbine)
- electricity, medium voltage: 0.00218323 kWh; source Turboden srl 2011; lognormal variance with pedigree 0.164, pedigree (3,5,5,5,3)
  estimated from personal communication technician ORC turbine company (annual consumption/production)
- polyethylene, high density, granulate: 7.13096e-6 kg; source Turboden srl 2011; lognormal variance with pedigree 0.0432, pedigree (4,5,4,5,1)
  EcoSpold01Location=RER
  estimation
- electronics, for control units: 1.18849e-5 kg; source Turboden srl 2011; lognormal variance with pedigree 0.0432, pedigree (4,5,4,5,1)
  estimation
  EcoSpold01Location=RER
- stone wool: 0.000113389 kg; source Turboden srl 2011; lognormal variance with pedigree 0.0432, pedigree (4,5,4,5,1)
  EcoSpold01Location=CH
  estimation
- steel, chromium steel 18/8, hot rolled: 0.00222685 kg; source Turboden srl 2011; lognormal variance with pedigree 0.0358, pedigree (2,5,4,5,1)
  literature value
  EcoSpold01Location=RER
- copper: 1.59808e-5 kg; source Turboden srl 2011; lognormal variance with pedigree 0.0432, pedigree (4,5,4,5,1)
  estimation
  EcoSpold01Location=RER
- heat, central or small-scale, other than natural gas: 0.00353314 MJ; source Turboden srl 2011; lognormal variance with pedigree 0.156, pedigree (3,5,5,5,1)
  estimated from personal communication technician ORC turbine company (annual heating value/production)
  EcoSpold01Location=CH
- steel, low-alloyed, hot rolled: 0.0118983 kg; source Turboden srl 2011; lognormal variance with pedigree 0.0358, pedigree (2,5,4,5,1)
  literature value
  EcoSpold01Location=RER
- scrap copper: -5.06924e-6, -2.37838e-7, -1.06737e-5 kg (3 entries); lognormal variance with pedigree 0.0186, pedigree (1,5,4,5,1)
  EcoSpold01Location=CH
  calculated value
  production volume 140700 kg
- scrap steel: -0.00308881, -3.90502e-6, -0.00959257 kg (3 entries); lognormal variance with pedigree 0.0186, pedigree (1,5,4,5,1)
  EcoSpold01Location=CH
  calculated value
  production volume 1.113e8 kg
- waste mineral wool: -3.28663e-5, -3.75029e-7, -8.01474e-5 kg (3 entries); lognormal variance with pedigree 0.0186, pedigree (1,5,4,5,1)
  calculated value
  production volume 861000 kg
- used industrial electronic device: -0.000613258, -0.00205308 kg (2 entries); lognormal variance with pedigree 0.0186, pedigree (1,5,4,5,1)
  EcoSpold01Location=CH
  calculated value
  production volume 63000 kg
- waste polyethylene: -6.86389e-7, -5.29165e-8, -2.18564e-8, -2.07547e-8, -7.91972e-7, -8.82974e-9, -4.00199e-9, -5.54424e-6 kg (8 entries); lognormal variance with pedigree 0.0186, pedigree (1,5,4,5,1)
  EcoSpold01Location=CH
  calculated value
  production volume 37800 kg
- building, hall: 0.000142618 m2; lognormal variance with pedigree 0.3701, pedigree (3,5,5,3,1)
  EcoSpold01Location=CH
  Own estimation, based on proper knowledge of Swiss recycling sites
  Uncertainty: own estimation, based on proper knowledge of Swiss recycling sites
- road, company, internal: 0.000809171 m2*year; lognormal variance with pedigree 0.3701, pedigree (3,5,5,3,1)
  Own estimation, based on proper knowledge of Swiss recycling sites
  EcoSpold01Location=CH
  Uncertainty: own estimation, based on proper knowledge of Swiss recycling sites
- building, multi-storey: 0.00023911 m3; lognormal variance with pedigree 0.3701, pedigree (3,5,5,3,1)
  Own estimation, based on proper knowledge of Swiss recycling sites
  EcoSpold01Location=RER
  Uncertainty: own estimation, based on proper knowledge of Swiss recycling sites
- machine, for treatment of waste electric and electronic equipment: 6.16755e-8 unit; lognormal variance with pedigree 0.3701, pedigree (3,5,5,3,1)
  EcoSpold01Location=GLO
  Own estimation, based on proper knowledge of Swiss recycling sites
  Uncertainty: own estimation, based on proper knowledge of Swiss recycling sites
- printed wiring board mounting facility, surface mounting line: 1.36007e-8 unit; lognormal variance with pedigree 0.3761, pedigree (4,5,5,3,1)
  EcoSpold01Location=GLO
  Estimation, based on the description of several PC motherboard mounting facilities in China, assuming a life-span of 10 years, 2.5 times are taken into account here.
  Uncertainty: estimation, based on Locascio (2000) and own plant visit
- printed wiring board mounting facility, through-hole mounting line: 1.13339e-8 unit; lognormal variance with pedigree 0.3761, pedigree (4,5,5,3,1)
  (same comment as for printed wiring board mounting facility, surface mounting line)
- clay brick: 0.000117059 kg; source AMD 2007; lognormal variance with pedigree 0.3507, pedigree (1,3,5,3,1)
  Estimation, based on literature.
  Uncertainty: d
- cable, data cable in infrastructure: 0.00150627 m; source AMD 2007; lognormal variance with pedigree 0.8607, pedigree (1,3,5,3,1)
  Estimation, based on literature. Life-span of 10 years is considered - i.e. 2.5 times the amounts is needed.
  Uncertainty: d
- drawing of pipe, steel: 0.00143982 kg; source AMD 2007; lognormal variance with pedigree 0.3507, pedigree (1,3,5,3,1)
  (same comment as for cable, data cable in infrastructure)
- cable, three-conductor cable: 0.000258218 m; source AMD 2007; lognormal variance with pedigree 0.3507, pedigree (1,3,5,3,1)
  (same comment as for cable, data cable in infrastructure)
- wastewater treatment facility, capacity 1.6E8l/year: 1.72145e-10 unit; source Doka G. 2007; lognormal variance with pedigree 0.448, pedigree (4,5,5,5,5)
  Literature Value.
  Uncertainty: r
- reinforcing steel: 0.00447578 kg; source AMD 2007; lognormal variance with pedigree 0.3507, pedigree (1,3,5,3,1)
  Estimation, based on literature.
  Uncertainty: d
- concrete, normal: 2.80597e-5 m3; source AMD 2007; lognormal variance with pedigree 0.3507, pedigree (1,3,5,3,1)
  Estimation, based on literature.
  Uncertainty: d
- electronic component machinery, unspecified: 8.60726e-8 unit; source Csatary P. 2002; lognormal variance with pedigree 0.3701, pedigree (4,4,5,3,1)
  Estimation, conservative estimation based on literature. For the process steps in the production chain of semiconductors and other electronic components100 units are requested with a life-span of 10 years - i.e. 2.5 times the amount estimated is needed. Hence, an input of 250 times is taken into account per Fab.
  Uncertainty: e
- concrete, medium strength: 3.49111e-5 m3; source AMD 2007; lognormal variance with pedigree 0.8607, pedigree (1,3,5,3,1)
  Estimation, based on literature.
  Uncertainty: d
- cable, unspecified: 0.00033892 kg; lognormal variance with pedigree 0.2106, pedigree (5,5,5,5,5)
  This product represents average, unspecified cable.

## Inputs from nature
- Transformation, to industrial area [natural resource, land]: 0.00023623 m2; lognormal variance with pedigree 0.1901, pedigree (3,5,5,3,1)
  Own estimation, based on proper knowledge of Swiss recycling sites
  Uncertainty: own estimation, based on proper knowledge of Swiss recycling sites
- Occupation, industrial area [natural resource, land]: 0.00590568 m2*year; lognormal variance with pedigree 0.1101, pedigree (3,5,5,3,1)
  (same comment as for Transformation, to industrial area)
- Occupation, construction site [natural resource, land]: 0.000535148 m2*year; lognormal variance with pedigree 0.1101, pedigree (3,5,5,3,1)
  (same comment as for Transformation, to industrial area)
- Transformation, from unspecified [natural resource, land]: 0.000236231 m2; lognormal variance with pedigree 0.1901, pedigree (3,5,5,3,1)
  (same comment as for Transformation, to industrial area)

## Sampling procedure
literature and own experiences

## Review by Bo Weidema 2012-05-31
Passed. This dataset is based on an earlier ecoinvent dataset. The outputs are now specified in terms of materials that can be treated by existing treatment activities.

## Review by Jürgen Sutter 2007-08-31
passed.
