# marine engine construction

Dataset: EcoSpold 2, unit process
Geography: GLO
Time period: 2010-01-01 to 2020-12-31
Technology level: current
Classification: ISIC rev.4 ecoinvent: 2811:Manufacture of engines and turbines, except aircraft, vehicle and cycle eng
Scenario: Business-as-Usual
System model: Allocation at the point of substitution
Generated by: Angel Avadi
Published in: Avadí, A. 2018
Database: ecoinvent
isCopyrightProtected: true
accessRestrictedTo: 1

## General comment
This dataset represents the construction of marine diesel engines used in fisheries and other marine applications, per 1000 kg of engine, based on an average marine engine composition.

## Included activities start
Provision of materials, construction of marine diesel engines.

## Included activities end
Metal works as proxy for the construction and assembly of all engine parts. End of life treatment. The Use phase of engines is modelled in the vessel's Use phase, by means of the activity "diesel, burned in fishing vessel".

## Geography
Data based on literature on marine engine composition, as well as data from marine engine providers, contractors for vessel maintenance and refurbishing work, shipyard operators. Primary data on engines weight from 143 vessels
Reenaas, M. (2005). SOLIDE OXIDE FUEL CELL COMBINED WITH GAS TURBINE VERSUS DIESEL ENGINE AS AUXILIARY POWER PRODUCING UNIT. Master Dissertation.

## Technology
Peru features various shipyards and relevant ship-building and ship-retrofitting expertise.

## Reference product
- marine engine: 0 unit; name product; = (chromium+Al_MMC+iron)/1000; source Pierre Fréon 2014; CPC 4312: Internal combustion engines of a kind used for motor vehicles; By-product classification allocatable product
  Marine diesel engine, per 1000 kg of product
  production volume 1 unit; name prod_vol
    Unquantifiable
  property price 1232.34 EUR2005; name product_price_EUR2005
    Calculated based on inputs: The price of the product has been calculated as a sum of the values of the material and energy inputs for this product. This value is therefore a rough estimation. It may underestimate the real price since there are additional expenses when producing any product. These expences can include for example labour costs, treatment of waste materials and profit for the producer. Please consider carefully whether this level of data quality is acceptable for your application.
  property lifetime capacity [h] 8000 hour; name product_lifetime_capacity_PMH
    http://www.boatsafe.com/nauticalknowhow/enginelife.htm
  property lifetime 15 year; name product_lifetime
  property true value 1232.34; name product_true_value
    allocation property applied in "true value" allocation // value calculated from revenue
- iron scrap, unsorted: 1 kg; name iron_s; = iron; source Pierre Fréon 2014; CPC 39310: Slag, dross, scalings and other waste from the manufacture of iron or steel; By-product classification Recyclable
  Waste cast iron
  production volume 0.650281 kg; = prod_vol * iron_s / (product*1000)
    Calculated from production volume of reference product using the relative outputs.
  property price 0.149 EUR2005; name iron_s_price_EUR2005
    Temporary price data. Calculated as 90% of purchasers price based on: estimated at 85% of sorted scrap
  property carbon content, fossil 0.0133333; = iron_CCF
  property carbon content 0.0133333
    carbon content on a dry matter basis (reserved; not for manual entry)
  property true value 96.8919; name iron_s_true_value
    allocation property applied in "true value" allocation // value calculated from revenue
  properties: carbon content, non-fossil 0, water content 0, water in wet mass 0 kg, wet mass 1 kg, dry mass 1 kg, carbon allocation 0.0133333 kg

## By-products
- aluminium oxide, non-metallurgical: 0 kg; source European Aluminium Association 2008; CPC 41432: Alumina (aluminium oxide), except artificial corundum; By-product classification allocatable product; CAS 1344-28-1; pedigree (1,1,1,1,1)
  production volume 0.000572195 kg
  property carbon content, non-fossil 0; name C_content_non_fossil
  property price 0.28 EUR2005; name Al2O3Amount_price_EUR2005
    From UN trade database. http://data.un.org/ Import data from the largest economies of the world are used (Brazil, India, USA, China, Japan and EU-27).
  property dry mass 1 kg; name DM
  property water content 0; name water_content
  property wet mass 1 kg; name WM
  property water in wet mass 0 kg; name WWM
  property carbon content, fossil 0; name C_content_fossil
  property carbon content 0
    carbon content on a dry matter basis (reserved; not for manual entry)
  property true value 0.160215
    allocation property applied in "true value" allocation // value calculated from revenue
  properties: carbon allocation 0 kg
- aluminium, cast alloy: 0 kg; source European Aluminium Association 2008; By-product classification allocatable product; CPC 41431: Unwrought aluminium; pedigree (1,1,1,1,1)
  EcoSpold01Location=RER
  production volume 0.00534876 kg
  property price 1.3 EUR2005; name castAlloyAmount_price_EUR2005
    Temporary price data. Calculated as 90% of purchasers price based on: Source: London Metal Exchange, Aluminium alloy price for 2005
  property carbon content 0
    carbon content on a dry matter basis (reserved; not for manual entry)
  property true value 6.95338
    allocation property applied in "true value" allocation // value calculated from revenue
  properties: water in wet mass 0 kg, carbon content, non-fossil 0, water content 0, dry mass 1 kg, carbon content, fossil 0, wet mass 1 kg, carbon allocation 0 kg
- heat, for reuse in municipal waste incineration only: 0 MJ; CPC 17300: Steam and hot water; By-product classification allocatable product; pedigree (1,1,1,1,1)
  Net electricity generated from this waste and used in internal MSWI plant energy redistribution.
  Uncertainty: uncertainty is calculated from uncertainties in waste composition and uncertainties in energy efficiency and the uncertainty in internal energy demand
  production volume 0.00381278 MJ
  property exergy 0.1842 MJ; name E_th_prod_MSWI_exergy
    This exergy property is based on the exergy content of the product.
  property true value relation 0.1842; name E_th_prod_MSWI_true_value_relation
    property to calculate "true value" from
  property price 0.0106 EUR2005; name E_th_prod_MSWI_price_EUR2005
    Average European district heat price from Ecoheatcool and Euroheat 2005-2006, Ecoheat Work package 1: The European heat market. Final report. 10.6 EUR/GJ i s the price of district heat. http://www.solarthermalworld.org/files/Ecoheatcool%20WP1%20Web.pdf?download
  property true value 0.0250286
    allocation property applied in "true value" allocation // value calculated from true value relation
- electricity, for reuse in municipal waste incineration only: 0 kWh; CPC 17100: Electrical energy; By-product classification allocatable product; pedigree (1,1,1,1,1)
  (same comment as for heat, for reuse in municipal waste incineration only)
  production volume 0.000543812 kWh
  property exergy 3.6 MJ; name E_el_prod_MSWI_exergy
    This exergy property is based on the exergy content of the product.
  property true value relation 3.6; name E_el_prod_MSWI_true_value_relation
    property to calculate "true value" from
  property price 0.1 EUR2005; name E_el_prod_MSWI_price_EUR2005
    Estimated to be the same price as in case of electricity, medium voltage.
  property true value 0.069768
    (same comment as for heat, for reuse in municipal waste incineration only)
- aluminium, wrought alloy: 0 kg; source European Aluminium Association 2008; By-product classification allocatable product; CPC 4153: Semi-finished products of aluminium or aluminium alloys; pedigree (1,1,1,1,1)
  production volume 0.00234158 kg
  property price 1.44 EUR2005; name secondaryAluminiumOutput_price_EUR2005
    Estimated based on literature values and expert judgement. Aluminium ccast alloys are about 90% of the price of aluminium wrought alloys.
  property carbon content 0
    carbon content on a dry matter basis (reserved; not for manual entry)
  property true value 3.37188
    allocation property applied in "true value" allocation // value calculated from revenue
  properties: wet mass 1 kg, water content 0, carbon content, fossil 0, water in wet mass 0 kg, carbon content, non-fossil 0, dry mass 1 kg, carbon allocation 0 kg
- copper: 0 kg; source Rentz O. 1999; By-product classification allocatable product; CPC 41413: Refined copper and copper alloys, unwrought; master alloys of copper
  Literature value. Copper uses: Before end-use copper is manufactured into semi fabricated products, such as shapes and ingots (known as 'semis'). These manufacturing processes are subdivided into hot working, cold working and, if necessary, process annealing. Few of the semis are ready for use as such. They more typically travel to first-stage manufacturers, who make metal rods, wire, and casting, and then to component manufacturers who produce such things as motors, valves, and insulated cables The components in turn are incorporated by final-stage manufacturers into a variety of finished products - automobiles, commercial buildings, residential housing, and so forth. These uses account for about 79% of the world-wide consumption of copper.
  production volume 0.000217711 kg
  property price 5.52 EUR2005
    Literature value (http://www.economist.com/news/business/21576714-mining-industry-has-enriched-chile-its-future-precarious-copper-solution). Average price between 20015 and 2013.
  property carbon content 0
    carbon content on a dry matter basis (reserved; not for manual entry)
  property true value 1.20176
    allocation property applied in "true value" allocation // value calculated from revenue
  properties: dry mass 1 kg, water in wet mass 0 kg, wet mass 1 kg, carbon content, non-fossil 0, water content 0, carbon content, fossil 0, carbon allocation 0 kg
- zinc concentrate: 0 kg; CPC 14290: Other non-ferrous metal ores and concentrates (other than uranium or thorium ores and concentrates); By-product classification allocatable product
  Calculated value from the knowledge of the properties of both products.
  production volume 4.79161e-9 kg
  property price 0.38 EUR2005; name ByP_price_EUR2005
    Temporary price data. Calculated as 90% of purchasers price based on: Zinc content in concentrate 53%. Concentrate price per kg Zn 86.5% of refined Zn price (13.5% treatment charges according to CHR Metals Limited 2005: Dynamic cost curves. http://www.minecost.com/dynamic.pdf). 2004 zinc price from USGS (2007) Mineral commodity summaries 2007. <http://minerals.usgs.gov/minerals/pubs/mcs/2007/mcs2007.pdf> [Accessed 25 May 2010]
  property zinc content 0.53; name zinc_C_zinc_concentrate
    Zinc content on a dry matter basis. Value taken from teh "zinc mine operation" /GLO dataset.
  property dry mass 1 kg; name DM_zinc_concentrate
  property carbon content 0
    carbon content on a dry matter basis (reserved; not for manual entry)
  property true value 1.82081e-6
    allocation property applied in "true value" allocation // value calculated from revenue
  properties: wet mass 1 kg, water content 0, carbon content, non-fossil 0, carbon content, fossil 0, water in wet mass 0 kg, carbon allocation 0 kg
- iron scrap, sorted, pressed: 0 kg; By-product classification Recyclable; CPC 39310: Slag, dross, scalings and other waste from the manufacture of iron or steel; pedigree (1,1,1,1,1)
  metallic iron scrap removed from ash reamains and recycled.
  Uncertainty: uncertainty is calculated from uncertainties in waste composition and transfer coefficients to soild residues
  production volume 0.0377476 kg
  property price 0.175 EUR2005
    Temporary price data. Calculated as 90% of purchasers price based on: 2005 import and export prices (total trades (USD) divided by total weight (kg) in biggest economies of the world: EU27, USA, Brasil, China, India, Japan and Russia) from UN Commodity Trade Statistics Database (http://data.un.org/Explorer.aspxDatabase [Accessed 2011.06.20]). Commodity: Waste or scrap, of cast iron
  property carbon content 0
    carbon content on a dry matter basis (reserved; not for manual entry)
  property true value 0.044576
    allocation property applied in "true value" allocation // value calculated from revenue
  properties: carbon content, non-fossil 0, wet mass 1 kg, dry mass 1 kg, water content 0, carbon content, fossil 0, water in wet mass 0 kg, carbon allocation 0 kg

## Inputs from technosphere
All rows: source Pierre Fréon 2014
- steel, chromium steel 18/8: 0.0377599 kg; name chromium; triangular min 0.0377599, mostLikely 0.0377599, max 0.0377599, pedigree (3,4,3,5,2)
  Chromium steel for marine diesel engine construction
  Uncertainty: Materials data from Reenaas, M. (2005). SOLIDE OXIDE FUEL CELL COMBINED WITH GAS TURBINE VERSUS DIESEL ENGINE AS AUXILIARY POWER PRODUCING UNIT. Masters Dissertation. Industrial Ecology, NTNU. No uncertainty data was available, so a 10% error was assumed.
  properties: wet mass 1 kg, dry mass 1 kg, carbon content, fossil 0.0008
  note on carbon content, fossil: Stainless steel model is the grade 304 steel (18/8 stainless, 18% chromium 8% nickel; max. 0.08% C)
- aluminium scrap, post-consumer: -0.00111059 kg; name Al_s; = (Al_MMC)*-1
  Weste aluminium
  production volume 0.01 kg; = prod_vol * Al_s / (product*1000)
    Calculated from production volume of reference product using the relative outputs.
  property price 0.685 EUR2005; name Al_s_price_EUR2005
  properties: dry mass 1 kg, carbon content, fossil 0.0475, wet mass 1 kg
- scrap steel: 0 kg; name Cr_s
  Representing waste chromium steel
  production volume 0 kg
    Calculated from production volume of reference product using the relative outputs.
  property price 0 EUR2005; name Cr_s_price_EUR2005
  properties: wet mass 1 kg, dry mass 1 kg
- cast iron: 0.0721881 kg; name iron; triangular min 0.0721881, mostLikely 0.0721881, max 0.0721881, pedigree (3,4,3,5,2)
  Cast iron for marine diesel engine construction
  Uncertainty: Materials data from Reenaas, M. (2005). SOLIDE OXIDE FUEL CELL COMBINED WITH GAS TURBINE VERSUS DIESEL ENGINE AS AUXILIARY POWER PRODUCING UNIT. Masters Dissertation. Industrial Ecology, NTNU. No uncertainty data was available, so a 10% error was assumed.
  property carbon content, fossil 0.04; name iron_CCF
  properties: wet mass 1 kg, dry mass 1 kg
  note on carbon content, fossil: Cast iron is made by remelting pig iron in small furnaces (e.g. cupola furnaces or electric arc furnaces) and poured into moulds to make castings. It usually contains 2% to 6% carbon (ecoinvent v2.2 report 10_partII). An average content of 4% was considered
- metal working, average for steel product manufacturing: 0.111059 kg; = chromium+Al_MMC+iron
  Marine diesel engine construction
- aluminium alloy, metal matrix composite: 0.00111059 kg; name Al_MMC; triangular min 0.00111059, mostLikely 0.00111059, max 0.00111059, pedigree (3,4,3,5,2)
  Al alloy for marine diesel engine construction
  Uncertainty: Materials data from Reenaas, M. (2005). SOLIDE OXIDE FUEL CELL COMBINED WITH GAS TURBINE VERSUS DIESEL ENGINE AS AUXILIARY POWER PRODUCING UNIT. Masters Dissertation. Industrial Ecology, NTNU. No uncertainty data was available, so a 10% error was assumed.
  property carbon content, non-fossil 0; name Al_MMC_C_content_non_fossil
  property wet mass 1 kg; name Al_MMC_WM
  property carbon content, fossil 0.0475; name Al_MMC_C_content_fossil
  property water content 0; name Al_MMC_water_content
  property dry mass 1 kg; name Al_MMC_DM
  property water in wet mass 0 kg; name Al_MMC_WWM
- scrap steel: -0.00919437, -1.1624e-5, -0.0285539 kg (3 entries)
  Representing waste chromium steel
  production volume 0.34 kg
