# construction work, heat and power co-generation unit, 160kW electrical

Dataset: EcoSpold 2, unit process
Geography: RER
Time period: 1987-01-01 to 2019-12-31
Technology level: current
Classification: ISIC rev.4 ecoinvent: 2811:Manufacture of engines and turbines, except aircraft, vehicle and cycle eng
Classification: EcoSpold01Categories: natural gas/cogeneration
Tags: ConvertedDataset
Scenario: Business-as-Usual
System model: Allocation at the point of substitution
Generated by: Thomas Heck
Published in: Heck, T. 2007
Database: ecoinvent
isCopyrightProtected: true
accessRestrictedTo: 1

## General comment
Inventory refers to infrastructure of an existing natural gas cogeneration plant (lambda=1 motor, 160kWe, operation start 1987) at Jakobsberg, Basel, Switzerland.
[This dataset was already contained in the ecoinvent database version 2. It was not individually updated during the transfer to ecoinvent version 3. Life Cycle Impact Assessment results may still have changed, as they are affected by changes in the supply chain, i.e. in other datasets. This dataset was generated following the ecoinvent quality guidelines for version 2. It may have been subject to central changes described in the ecoinvent version 3 change report (http://www.ecoinvent.org/database/ecoinvent-version-3/reports-of-changes/), and the results of the central updates were reviewed extensively. The changes added e.g. consistent water flows and other information throughout the database. The documentation of this dataset can be found in the ecoinvent reports of version 2, which are still available via the ecoinvent website. The change report linked above covers all central changes that were made during the conversion process.]

## Included activities end
The module includes the most important materials used for production. It includes also the transport of these materials and the energy and water needed for production.

## Geography
Data refers to a plant in Switzerland, assumed valid for Europe (RER)

## Technology
Component of a specific cogeneration unit installed in Switzerland. Technology at end of 1980s.

## Parameters
- fraction, process water, to air: 0.15 dimensionless; name fraction_PW_to_air; lognormal variance with pedigree 0.092025, pedigree (4,4,3,2,4)
  Literature value. In case when no industry/process specific data are available, default evaporation fraction value is used. This value is 15% and is based on literature (Statistics Canada, 2007 & Shaffer, K.H., 2008, Consumptive water use in the Great Lakes Basin, USGS & Shiklomanov, 2003, World Water Resources at the Beginning of the 21st Century) and has been approved by an expert.

## Reference product
- construction work, heat and power co-generation unit, 160kW electrical: 1 unit; CPC 53262: Power plants; By-product classification allocatable product
  production volume 1.32237 unit
    This is a placeholder value that does not reflect real-world production volumes. This dataset does not currently require a real-world production volume to work in the database framework, and no actual data were collected yet. This has no negative effect on the results of the ecoinvent database. The placeholder value of this activity was scaled according to the nominal GDP of 2005 (source: United Nations, http://data.un.org/Glossary.aspx?q=GDP+%28current+US%24%29, accessed 20130726) to reflect an appropriate share of the global production volume, which is also a placeholder value.
  property price 7576 EUR2005
    EU27 I/O database(in the 'EU & DK Input Output Database' (available in SimaPro)); -79 Building, non-residential EU 27 (calculated to be 38.169 EUR2003/kg). Based on consumption of (_53 Iron basic, virgin, EU27;7.25517782294095E-3 kg/EUR building; 0.45 EUR2003 per kg DS), (_61 Iron, after first processing, EU27;5.8766830719783E-3kg/EUR building; 0.62 EUR2003 per kg DS), (_65 Fabricated metal products, except machinery, EU27; 8.9167022775554E-3 kg/EUR building; 3.63 EUR2003 per kg DS) and (_66 Machinery and equipment n.e.c., EU27;4.15071881936446E-3 kg/EUR building; 5.71 EUR2003 per kg DS) -200 kg
  property true value 7576
    allocation property applied in "true value" allocation // value calculated from revenue

## By-products
- iron scrap, sorted, pressed: 0 kg; By-product classification Recyclable; CPC 39310: Slag, dross, scalings and other waste from the manufacture of iron or steel; pedigree (1,1,1,1,1)
  Iron scrap recovered from this waste.
  production volume 22.2044 kg
  property price 0.175 EUR2005
    Temporary price data. Calculated as 90% of purchasers price based on: 2005 import and export prices (total trades (USD) divided by total weight (kg) in biggest economies of the world: EU27, USA, Brasil, China, India, Japan and Russia) from UN Commodity Trade Statistics Database (http://data.un.org/Explorer.aspxDatabase [Accessed 2011.06.20]). Commodity: Waste or scrap, of cast iron
  property carbon content 0
    carbon content on a dry matter basis (reserved; not for manual entry)
  property true value 0.107538
    allocation property applied in "true value" allocation // value calculated from revenue
  properties: water content 0, water in wet mass 0 kg, carbon content, fossil 0, dry mass 1 kg, carbon content, non-fossil 0, wet mass 1 kg, carbon allocation 0 kg
- heat, for reuse in municipal waste incineration only: 0 MJ; CPC 17300: Steam and hot water; By-product classification allocatable product; pedigree (1,1,1,1,1)
  Net electricity generated from this waste and used in internal MSWI plant energy redistribution.
  Uncertainty: uncertainty is calculated from uncertainties in waste composition and uncertainties in energy efficiency and the uncertainty in internal energy demand
  production volume 0.0542272 MJ
  property exergy 0.1842 MJ; name E_th_prod_MSWI_exergy
    This exergy property is based on the exergy content of the product.
  property price 0.0106 EUR2005; name E_th_prod_MSWI_price_EUR2005
    Average European district heat price from Ecoheatcool and Euroheat 2005-2006, Ecoheat Work package 1: The European heat market. Final report. 10.6 EUR/GJ i s the price of district heat. http://www.solarthermalworld.org/files/Ecoheatcool%20WP1%20Web.pdf?download
  property true value relation 0.1842; name E_th_prod_MSWI_true_value_relation
    property to calculate "true value" from
  property true value 0.000128417
    allocation property applied in "true value" allocation // value calculated from true value relation
- electricity, for reuse in municipal waste incineration only: 0 kWh; CPC 17100: Electrical energy; By-product classification allocatable product; pedigree (1,1,1,1,1)
  (same comment as for heat, for reuse in municipal waste incineration only)
  production volume 0.00762474 kWh
  property true value relation 3.6; name E_el_prod_MSWI_true_value_relation
    property to calculate "true value" from
  property price 0.1 EUR2005; name E_el_prod_MSWI_price_EUR2005
    Estimated to be the same price as in case of electricity, medium voltage.
  property exergy 3.6 MJ; name E_el_prod_MSWI_exergy
    This exergy property is based on the exergy content of the product.
  property true value 0.000350779
    (same comment as for heat, for reuse in municipal waste incineration only)
- zinc concentrate: 0 kg; CPC 14290: Other non-ferrous metal ores and concentrates (other than uranium or thorium ores and concentrates); By-product classification allocatable product
  Calculated value from the knowledge of the properties of both products.
  production volume 1.03153e-6 kg
  property price 0.38 EUR2005; name ByP_price_EUR2005
    Temporary price data. Calculated as 90% of purchasers price based on: Zinc content in concentrate 53%. Concentrate price per kg Zn 86.5% of refined Zn price (13.5% treatment charges according to CHR Metals Limited 2005: Dynamic cost curves. http://www.minecost.com/dynamic.pdf). 2004 zinc price from USGS (2007) Mineral commodity summaries 2007. <http://minerals.usgs.gov/minerals/pubs/mcs/2007/mcs2007.pdf> [Accessed 25 May 2010]
  property zinc content 0.53; name zinc_C_zinc_concentrate
    Zinc content on a dry matter basis. Value taken from teh "zinc mine operation" /GLO dataset.
  property dry mass 1 kg; name DM_zinc_concentrate
  property carbon content 0
    carbon content on a dry matter basis (reserved; not for manual entry)
  property true value 9.02687e-8
    allocation property applied in "true value" allocation // value calculated from revenue
  properties: wet mass 1 kg, water content 0, carbon content, non-fossil 0, carbon content, fossil 0, water in wet mass 0 kg, carbon allocation 0 kg

## Inputs from technosphere
- heat, district or industrial, other than natural gas: 9879.86 MJ; lognormal variance with pedigree 0.1227, pedigree (3,3,5,3,4)
- waste wood, untreated: -3.79995 kg; lognormal variance with pedigree 0.1227, pedigree (3,3,5,3,4)
  production volume 3.8 kg
    Calculated from the production volume of construction work, cogen unit 160kWe in proportion to the respective output amounts.
  properties: carbon content, non-fossil 0.48632, water content 0.25, dry mass 0.8 kg, wet mass 1 kg
  note on carbon content, non-fossil: Tab A.4, ecoinvent v2.2 report 13_I. C content has been referred to 1 kg DM,
- plywood, for indoor use: 0.00839988 m3; lognormal variance with pedigree 0.186, pedigree (4,5,5,1,1)
  Basic uncertainty:2
  properties: carbon content, non-fossil 0.424285, dry mass 589.555 kg, water content 0.0601214, wet mass 625 kg, carbon content, fossil 0.0577135
  note on carbon content, non-fossil: Plywood is composed of wood and additives. The weight of the wood is assumed to be the DM kg minus 83.2 kg additives. C content of wood is 0.494 kgC/kg dry wood (ecoinvent v2.2 report 9)
- waste plastic, mixture: -9.99986 kg; lognormal variance with pedigree 0.1227, pedigree (3,3,5,3,4)
  production volume 10 kg
    (same comment as for waste wood, untreated)
  properties: dry mass 0.847 kg, wet mass 1 kg, water content 0.180638, carbon content, fossil 0.747344
  note on carbon content, fossil: C content in 1 kg DM was calculated using data in Tab A.2, ecoinvent v2.2 report 13_I
- synthetic rubber: 9.99986 kg; lognormal variance with pedigree 0.186, pedigree (4,5,5,1,1)
  Basic uncertainty:2
  properties: carbon content, fossil 0.871949, wet mass 1 kg, dry mass 1 kg
  note on carbon content, fossil: EPDM (Ethylene-propene-diene terpolymer) rubber is a terpolymer of ethylene, propene, and a diene with the residual unsaturated portion of the diene in the side chain (ecoinvent v2.2 report 7-part XX & Ullmann). Chemical formula (deduced from Evidences of Solvent-Induced Miscibility in Polychloroprene-co-Ethylene-Propene Diene Terpolymer Blends, Dubey et al., Journal of Applied Polymer Science, 2009, 111:1884–1891): C20H35
- reinforcing steel: 199.997 kg; lognormal variance with pedigree 0.186, pedigree (4,5,5,1,1)
  Basic uncertainty:2
  properties: dry mass 1 kg, wet mass 1 kg, carbon content, fossil 0.004
- transport, passenger car: 1499.98 km; lognormal variance with pedigree 0.25, pedigree (1,1,5,1,1)
  uncertainty of person kilometres
- scrap steel: 0 kg; pedigree (1,1,1,1,1)
  production volume 0 kg
    (same comment as for waste wood, untreated)
  properties: dry mass 1 kg, wet mass 1 kg
- electricity, low voltage: 1909.97 kWh; lognormal variance with pedigree 0.1227, pedigree (3,3,5,3,4)
- waste concrete: 0 kg; pedigree (1,1,1,1,1)
  production volume 0 kg
    (same comment as for waste wood, untreated)
  properties: water content 1, wet mass 1 kg, dry mass 0.5 kg
- concrete, normal: 2.49996 m3; lognormal variance with pedigree 0.186, pedigree (4,5,5,1,1)
  Basic uncertainty:2
  properties: dry mass 2190 kg, water content 0.086758, wet mass 2380 kg
- wastewater from pig iron production: 0 m3; name wastewater_output; pedigree (1,1,1,1,1)
  rough estimate, uncertainty refers to amount of water only; not quantified here: composition of waste water unkown, therefore high uncertainty of applicability of modul.
  production volume 0 m3
    (same comment as for waste wood, untreated)
  property price 0 EUR2005; name wastewater_output_price_EUR2005
  properties: carbon content, fossil 1.2149e-5, water content 2962.17, dry mass 0.337476 kg, wet mass 1000 kg
  note on carbon content, fossil: TOC = 0.0000041 kg/m3 (Tab A.19, ecoinvent v2.2 report 13_I). TOC was considered as Total Carbon.
- scrap steel: -199.745, -0.252527 kg (2 entries); lognormal variance with pedigree 0.1227, pedigree (3,3,5,3,4)
  production volume 200 kg
- waste concrete: -5480.54, -19.3771 kg (2 entries); lognormal variance with pedigree 0.1227, pedigree (3,3,5,3,4)
  production volume 5500 kg
- wastewater from pig iron production: -0.184728, -0.0552682 m3 (2 entries); lognormal variance with pedigree 0.34, pedigree (1,1,5,1,1)
  (same comment as for wastewater from pig iron production)
  production volume 0.24 m3

## Inputs from nature
- Water, unspecified natural origin [natural resource, in water]: 0.299996 m3; name water_UNO_input; lognormal variance with pedigree 0.34, pedigree (1,1,5,1,1)
  rough estimate

## Emissions to nature
- Water [air, unspecified]: 0.0449994 m3; name water_to_air_unspecified; = (water_UNO_input*fraction_PW_to_air); lognormal variance with pedigree 0.0807, pedigree (2,2,5,1,1)
  Calculated value based on literature values and expert opinion. See comments in the parametres' comment field.
  property fraction, origin: salt water 0; name fraction_origin_salt_water
  property fraction, origin: fresh water 0; name fraction_origin_fresh_water
  property fraction, origin: unspecified 1; name fraction_origin_unspecified
- Water [water, unspecified]: 0.0149998 m3; name water_to_water_unspecified; = water_UNO_input*(1-fraction_PW_to_air)-(wastewater_output*-1); lognormal variance with pedigree 0.0807, pedigree (2,2,5,1,1)
  (same comment as for Water)
  property water in wet mass 1000 kg; name WWM
  property carbon content, non-fossil 0; name C_content_non_fossil
  property carbon content, fossil 0; name C_content_fossil
  property fraction, origin: unspecified 1; name fraction_origin_unspecified_Ww
  property fraction, origin: salt water 0; name fraction_origin_salt_water_Ww
  property fraction, origin: fresh water 0; name fraction_origin_fresh_water_Ww
  property dry mass 0 kg; name DM
  property wet mass 1000 kg; name WM

## Sampling procedure
Operator and manufacturer information

## Extrapolations
see Geography/Text

## Review by Gerald Rebitzer (obsolete) 2003-08-27
had passed
