# bauxite mine operation

Dataset: EcoSpold 2, unit process
Geography: GLO
Time period: 2015-01-01 to 2019-12-31
Technology level: current
Classification: EcoSpold01Categories: metals/extraction
Classification: ISIC rev.4 ecoinvent: 0729:Mining of other non-ferrous metal ores
Synonyms: Aluminiumerz; aluminium ore
Scenario: Business-as-Usual
System model: Allocation at the point of substitution
Share of production covered: 50 %
Generated by: Linlin Wu
Published in: International Aluminium Institute 2015
Database: ecoinvent
isCopyrightProtected: false
accessRestrictedTo: 1

## General comment
Average moisture content of bauxite is approximately 12% (wet mass basis). The reference flow in this dataset is therefore expressed as 0.88 kg bauxite, without water.
The aluminium content is based on the reported yield of aluminium oxide production (0.39 kg Al2O3/kg wet bauxite). The aluminium hydroxide is also calculated from the subsequent aluminium oxide production yield and makes the simplifying assumption that all aluminium is bound in alumina trihydrates (Al(OH)3) since the split between alumina trihydrates and monohydrates is unknown. The maximum error from this assumption is 23%.
The bauxite represents 50% (w/w) of the extracted ore, wet mass basis.

## Included activities start
The activity starts with the removal of overburden from a bauxite rich mining site. Reusable topsoil is normally stored for later mine restoration.

## Included activities end
The operations associated with this unit process include:
- the extraction of bauxite rich minerals from the site;
- beneficiation activities such as washing, screening, or drying;
- treatment of mining site residues and waste; and
- site restoration activities such as grading, dressing and replanting.
The output of this unit process is the bauxite to be transported to an alumina refinery.

## Geography
Data collected from 14 world-wide bauxite mines producing 143.1million metric tons of bauxite, representing about 50% of world-wide aluminium bauxite mining operations.

## Technology
Average bauxite mining technology world-wide (open mining)

## Parameters
- molar mass, aluminion oxyde: 102 kg; name M_Al2O3
- Bauxite in bauxite ore: 40 % (obsolete); name bauxiteInOre; lognormal variance with pedigree 0.0027, pedigree (3,2,1,1,1)
  Bauxite content of bauxite in bauxite ore, expressed as bauxite (wet mass)/kg ore
- molar mass, aluminium: 27 kg; name M_Al
- molar mass of aluminium hydroxide: 78 kg; name M_Al_OH_3

## Reference product
- bauxite: 1 kg; name bauxiteAmount; source International Aluminium Insitute 2015; By-product classification allocatable product; CPC 14290: Other non-ferrous metal ores and concentrates (other than uranium or thorium ores and concentrates)
  12% average water content of bauxite, wet mass basis, specified by IAI.
  production volume 2.85483e8 kg; name bauxiteProductionVolume
    Total production in 2015. Provided byWorld Bureau of Metal Statistics
  property dry mass 0.88 kg; name bauxiteAmount_DM
  property water in wet mass 0.12 kg; name bauxiteAmount_WWM
  property water content 0.136364; name bauxiteAmount_water_content; = bauxiteAmount_WWM /( bauxiteAmount_WM-bauxiteAmount_WWM)
  property carbon content, non-fossil 0; name bauxiteAmount_C_content_non_fossil
    biogene carbon content on a dry matter basis
  property carbon content, fossil 0; name bauxiteAmount_C_content_fossil
    fossil carbon content on a dry matter basis
  property aluminium content 0.241608; name bauxiteAmount_Al_content; = (1/2.739) * (2*M_Al/M_Al2O3)*(1/0.8)
    Aluminium content on a dry matter basis. Based on a reported yield of 0.306 kg alumina/kg bauxite wet mass basis and a hypothetical 100% extraction efficiency.
  property wet mass 1 kg; name bauxiteAmount_WM
  property gallium content 7.5e-5; name bauxiteAmount_Ga_content
    Gallium content on a dry matter basis
  property aluminium hydroxide content 0.697979; name bauxiteAmount_AlOH3_content_1; = bauxiteAmount_Al_content*( M_Al_OH_3/ M_Al)
    Based on the simplifying assumption that all aluminium is in Al(OH)3, since split between bauxite rich in Al(OH)3 and Al(OH)O is not known.
  property price 0.033 EUR2005; name bauxiteAmount_price_EUR2005_1
    From UN data http://data.un.org/Data.aspx?q=aluminium&d=ComTrade&f=_l1Code%3a27%3bcmdCode%3a260600; assumed the same price as "aluminium ores and concentrates" based on http://data.un.org/Search.aspx?q=bauxite.
  property carbon content 0
    carbon content on a dry matter basis (reserved; not for manual entry)
  property true value 0.033; name bauxiteAmount_true_value
    allocation property applied in "true value" allocation // value calculated from revenue
  properties: carbon allocation 0 kg

## By-products
- heat, for reuse in municipal waste incineration only: 0 MJ; CPC 17300: Steam and hot water; By-product classification allocatable product; pedigree (1,1,1,1,1)
  Net electricity generated from this waste and used in internal MSWI plant energy redistribution.
  Uncertainty: uncertainty is calculated from uncertainties in waste composition and uncertainties in energy efficiency and the uncertainty in internal energy demand
  production volume 0.316166 MJ
  property exergy 0.1842 MJ; name E_th_prod_MSWI_exergy
    This exergy property is based on the exergy content of the product.
  property price 0.0106 EUR2005; name E_th_prod_MSWI_price_EUR2005
    Average European district heat price from Ecoheatcool and Euroheat 2005-2006, Ecoheat Work package 1: The European heat market. Final report. 10.6 EUR/GJ i s the price of district heat. http://www.solarthermalworld.org/files/Ecoheatcool%20WP1%20Web.pdf?download
  property true value relation 0.1842; name E_th_prod_MSWI_true_value_relation
    property to calculate "true value" from
  property true value 5.6642e-12
    allocation property applied in "true value" allocation // value calculated from true value relation
- electricity, for reuse in municipal waste incineration only: 0 kWh; CPC 17100: Electrical energy; By-product classification allocatable product; pedigree (1,1,1,1,1)
  (same comment as for heat, for reuse in municipal waste incineration only)
  production volume 0.0445247 kWh
  property true value relation 3.6; name E_el_prod_MSWI_true_value_relation
    property to calculate "true value" from
  property price 0.1 EUR2005; name E_el_prod_MSWI_price_EUR2005
    Estimated to be the same price as in case of electricity, medium voltage.
  property exergy 3.6 MJ; name E_el_prod_MSWI_exergy
    This exergy property is based on the exergy content of the product.
  property true value 1.55897e-11
    (same comment as for heat, for reuse in municipal waste incineration only)

## Inputs from technosphere
- mine infrastructure, bauxite: 5e-11 unit; = 1/lifetime_capacity_kg; lognormal variance with pedigree 0.0492, pedigree (4,1,5,4,1)
  Not reported by IAI
  property lifetime capacity [kg] 2e10 kg; name lifetime_capacity_kg; = 1E9*20
  note on lifetime capacity [kg]: 1E9 kg&year: 20 years lifetime. Source: ecoinvent v2 report 10-part I, Tab 5.1
- inert waste: 0 kg; name miningWasteAmount; source International Aluminium Insitute 2015; pedigree (1,1,1,1,1)
  Reported as "Solid Industrial Waste Disposal" in IAI 2015 Survey. Response rate = 86% of surveyed sites.
  production volume 0 kg
    Calculated from production volume of reference product using the relative outputs.
  property price 0 EUR2005; name miningWasteAmount_price_EUR2005
  properties: dry mass 1 kg, wet mass 1 kg
- electricity, medium voltage: 0.0015 kWh; source International Aluminium Institute 2015; lognormal variance with pedigree 0.0027, pedigree (1,2,3,1,1)
  EcoSpold01Location=UCTE
  Response rate = 88% of surveyed sites.
- heat, district or industrial, other than natural gas: 0.0189934 MJ; = kgFuel_Input_HFO* Net_Heat_Value_HFO/ fuel_use_HFO; source International Aluminium Insitute 2015; lognormal variance with pedigree 0.0052, pedigree (2,4,3,1,1)
  Heavy fuel oil combustion. Response rate = 100% of surveyed sites.
  Uncertainty: No uncertainty added - uncertainty should be based on propagation of the uncertainty of the underlying parameters.
  property Corresponding fuel use 1.053 MJ; name fuel_use_HFO
  property heating value, net 40 MJ; name Net_Heat_Value_HFO
  property fuel input in physical units, kg 0.0005 kg; name kgFuel_Input_HFO
- recultivation, bauxite mine: 0.000193 m2; source International Aluminium Institute 2015; lognormal variance with pedigree 0.1221, pedigree (1,2,3,1,1)
  Area rehabilitaed in 2015
  EcoSpold01Location=GLO
- heat, district or industrial, other than natural gas: 0.0648813 MJ; = kgFuel_Input_LFO* Net_Heat_Value_LFO/ fuel_use_LFO; source International Aluminium Insitute 2015; lognormal variance with pedigree 0.0038, pedigree (2,3,3,1,1)
  Diesel combustion. Response rate = 100% of surveyed sites.
  Uncertainty: No uncertainty added - uncertainty should be based on propagation of the uncertainty of the underlying parameters.
  property fuel input in physical units, kg 0.0016 kg; name kgFuel_Input_LFO
  property heating value, net 42.7 MJ; name Net_Heat_Value_LFO
  property Corresponding fuel use 1.053 MJ; name fuel_use_LFO
  note on Corresponding fuel use: Lower heating value of the fuel input related to the heat/electricity output
- blasting: 0.000195 kg; source Althaus H.-J. 2000; lognormal variance with pedigree 0.0401, pedigree (1,2,5,1,1)
  EcoSpold01Location=RER
  Not reported in IAI 2015.
- inert waste: -1.78671e-5, -1.53883e-7, -6.29791e-5 kg (3 entries); source International Aluminium Insitute 2015; lognormal variance with pedigree 0.0032, pedigree (1,3,3,1,1)
  (same comment as for inert waste)
  production volume 23124.1 kg

## Inputs from nature
- Transformation, from forest, unspecified [natural resource, land]: 1.6e-7 m2; source International Aluminium Insitute 2015; lognormal variance with pedigree 0.1612, pedigree (1,3,5,1,2)
  Reported as "Land occupation" in IAI 2015 Survey. Response rate = 88% of surveyed sites.
- Transformation, from annual crop [natural resource, land]: 0.000134 m2; source Althaus H.-J. 2000; lognormal variance with pedigree 0.1601, pedigree (1,2,5,1,1)
  Not reported in IAI 2015.
- Aluminium, in ground [natural resource, in ground]: 0.212615 kg; = bauxiteAmount_Al_content* bauxiteAmount_DM; lognormal variance with pedigree 0.0033, pedigree (2,2,3,1,1)
  Represents the amount of aluminium extracted per 1 kg wet bauxite.
- Transformation, to mineral extraction site [natural resource, land]: 0.00021 m2; source Althaus H.-J. 2000; lognormal variance with pedigree 0.1601, pedigree (1,2,5,1,1)
  Not reported in IAI 2010.
- Occupation, mineral extraction site [natural resource, land]: 3.656e-7 m2*year; source International Aluminium Institute 2015; lognormal variance with pedigree 0.0421, pedigree (1,2,3,1,1)
  Average occupation time of 1m2. Reported as "Regenration Period" in IAI 2015 Survey. Response rate = 88% of surveyed sites.
- Transformation, from cropland fallow (non-use) [natural resource, land]: 4.26e-5 m2; source Althaus H.-J. 2000; lognormal variance with pedigree 0.1601, pedigree (1,2,5,1,1)
  Not reported in IAI 2015.
- Gangue, bauxite, in ground [natural resource, in ground]: 2.25832 kg; = (1/(bauxiteInOre/100))* bauxiteAmount_WM- bauxiteAmount_Al_content- bauxiteAmount_Ga_content; lognormal variance with pedigree 0.0033, pedigree (2,2,3,1,1)
  Gangue material extracted during bauxite extraction. Represents total ore extracted minus aluminium and gallium content of the ore, considered the two valuable resources contained in the ore.
- Gallium, in ground [natural resource, in ground]: 6.6e-5 kg; = bauxiteAmount_Ga_content* bauxiteAmount_DM; lognormal variance with pedigree 0.0033, pedigree (2,2,3,1,1)
  Represents the amount of gallium extracted per 1 kg wet bauxite
- Transformation, from forest, extensive [natural resource, land]: 3.34e-5 m2; source Althaus H.-J. 2000; lognormal variance with pedigree 0.1601, pedigree (1,2,5,1,1)
  Not reported in IAI 2015.
- Water, unspecified natural origin [natural resource, in water]: 0.0005 m3; source International Aluminium Insitute 2015; lognormal variance with pedigree 0.0032, pedigree (1,3,3,1,1)
  Total fresh water input.No further breakdown into specific types of water is possible. Response rate = 87% of surveyed sites. IAI 2015 Survey.

## Emissions to nature
- Water [water, surface water]: 3e-5 m3; source International Aluminium Insitute 2015; lognormal variance with pedigree 0.0032, pedigree (1,3,3,1,1)
  Response rate = 81% of surveyed sites.
- Water [air, non-urban air or from high stacks]: 0.000447 m3; source International Aluminium Insitute 2015; lognormal variance with pedigree 0.0038, pedigree (2,3,3,1,1)
  Fresh water consumption reported in IAI survey
- Particulates, < 2.5 um [air, unspecified]: 4.91545e-6 kg; = PM_total_1* PM2_5; lognormal variance with pedigree 0.0032, pedigree (2,3,3,1,1)
  IAI data (2015) provided total PM which were split in the three diameter classes as per CEPMEIP Database. See formula and comments for individual parameters for additional information. Response rate = 98% of surveyed sites.
  Uncertainty: No uncertainty added - uncertainty should be based on propagation of the uncertainty of the underlying parameters.
  property ratio of total particulates less than 2.5 microns 0.0491545; name PM2_5; = 5/101.72
  property total particulates 0.0001 kg; name PM_total_1
- Particulates, > 2.5 um, and < 10um [air, unspecified]: 4.42391e-5 kg; = PM_total_3 * PM_btw_2_5_and_10um; lognormal variance with pedigree 0.0032, pedigree (2,3,3,1,1)
  IAI data (2015) provided total PM which were split in the three diameter classes as per CEPMEIP Database. See formula and comments for individual parameters for additional information. Response rate = 98% of surveyed sites.
  property total particulates 0.0001 kg; name PM_total_3
  property ratio of particulates between 2.5 and 10 microns 0.442391; name PM_btw_2_5_and_10um; = (50-5)/101.72
- Particulates, > 10 um [air, unspecified]: 5.08455e-5 kg; = PM_total_2 *PM_greater_10um; lognormal variance with pedigree 0.0032, pedigree (2,3,3,1,1)
  (same comment as for Particulates, < 2.5 um)
  property ratio pf particulates greater than 10 microns 0.508455; name PM_greater_10um; = (101.72-50)/101.72
  property total particulates 0.0001 kg; name PM_total_2

## Sampling procedure
Mixture of survey and literature. Survey data collected by IAI from member and non member companies during Feb - July 2016, with analysis and data verification taking place Aug - Dec 2016. Most values from literature were extracted from previous dataset version (Althaus, 2007, in Classen et al., 2007). The 50% representativeness cited in "Percent" refers to flows covered by the IAI survey as a percentage of total world production.

## Review by Louis Brimacombe 2018-04-27
Data are now reasonable, but I had a query about the diesel use of vehicles which initially was missing. Then after my request it appeared as 2 seperate exchanges ( heat other than natural gas ) one for light fuel oil and one for heavy fuel oil. It would have been better for the vehicle fuel use to be in a more relevant exchange heading. Also the data shown appear as functions(x) does this mean the data has been estimated not measured ? If so may be worth a comment in general descripttion.
