# bark chips production, hardwood, at sawmill

Dataset: EcoSpold 2, unit process
Geography: CA-QC
Time period: 2011-01-01 to 2019-12-31
Technology level: current
Classification: ISIC rev.4 ecoinvent: 1610:Sawmilling and planing of wood
Tags: recontextualization
Scenario: Business-as-Usual
System model: Allocation at the point of substitution
Generated by: Hugues Imbeault-Tétreault
Database: ecoinvent
isCopyrightProtected: true
accessRestrictedTo: 1

## General comment
This dataset represents the service of the handling of bark from hardwood at sawmill with an output of one kg of bark, measured in oven-dry mass of bark. The exchanges of this child dataset are identical to the GLO dataset. This dataset was created to enable linking to regional markets (e.g. for electricity). Data quality indicators were adjusted accordingly.
The process chain in a sawmill is a net of interlinked processes; the process structure depends on the individual design and technologies in place for each sawmill. The structuring of the sawmilling processes is based on the identification of the core processes in a sawmill that are attributable to several co-products (such as upstream processes like forestry and transport of logs to the sawmill) sorting, storing and the sawing of the (debarked) log. Other processes are attributable directly to one of the co-products such as the chipping of residual wood (either after sawing or as part of the profile chipping), the chipping of the bark (the "debarking") or the suction of saw dust as collection and internal transport.
The following figure illustrates the general structure of the sawmilling processes before eventual drying and planing:
The data was provided by and approved by the Swiss forest industry (Holzindustrie Schweiz HIS).

## Included activities start
Bark chips production starts with the bark taken off the stem as part of the over-all sawing process (see respective dataset) and includes all the handling of the bark in the sawmill.

## Included activities end
This activity ends with the bark chips stored in a silo at the saw mill. The dataset does not include dust emissions due to a high water content in the wood.

## Geography
Extrapolated from average Swiss conditions. Child dataset exchanges identical to GLO dataset. Dataset created to enable linking to regional markets (e.g. for electricity). Data quality indicators adjusted accordingly.

## Reference product
- bark: 0 kg; By-product classification allocatable product; CPC 31230: Wood in chips or particles
  the bark is produced in the over-all sawing process and treated in this DS as the handling of bark within the sawmill.
  production volume 0 kg; = p_barkchips
    see comment on the by-product
  property price 0.034 EUR2005
    Data on Import/Export (USD/kg) from UN data has been used. (http://data.un.org/Data.aspx?d=ComTrade&f=_l1Code%3a45, [accessed 10th June 2010]) Commodity: 'Sawdust, wood waste or scrap'. A density of 250 kg/m3 was used to convert from M3 to kg (data on density: http://wiki.answers.com/Q/What_is_the_density_of_sawdust, [Accessed 13 June 2010]).
  property carbon content 0.494
    carbon content on a dry matter basis (reserved; not for manual entry)
  properties: carbon content, non-fossil 0.494, carbon content, fossil 0, wet mass 2.4 kg, water content 1.4, water in wet mass 1.4 kg, dry mass 1 kg, carbon allocation 0.494 kg
- bark chips, wet, measured as dry mass: 1 kg; By-product classification allocatable product; CPC 31230: Wood in chips or particles; pedigree (1,1,1,1,1)
  bark chips stored in the silo resulting from the treatment of the reference product
  production volume 2.00359e8 kg

## By-products
- bark chips, wet, measured as dry mass: 0 kg; name barkchip_wet; By-product classification allocatable product; CPC 31230: Wood in chips or particles; pedigree (1,1,1,1,1)
  bark chips stored in the silo resulting from the treatment of the reference product
  production volume 0 kg; name p_barkchips; = (55858*1.64/(1-0.10)*0.1*560)/24340*8.5557E+05
    Calculated from production volume of sawnwood x conversion efficiency of sawmilling process (to estimate log input under bark), extrapolated to log over bark via (1-bark ratio) and estimation of bark via bark ratio (of log over bark, multiplied with average basic bark density for Swiss conditions), extrapolated to CA-QC values via the ratio of sawnwood (NC) production according to FAOStat and Statistics Canada.
  property price 0.034 EUR2005; name barkchip_wet_price_EUR2005
    Expert judgement (Urs Luginbühl, Swiss Sawmilling industry, personal communication in June 2014). Cross-reference; FAOSTAT database; http://faostat.fao.org/site/626/DesktopDefault.aspx?PageID=626#ancor; Average import/export prices of EU for 'chips and particles'. Price: 48.76 Euro/m3. The density of the wood chips is 650 kg/m3. The price is calculated to be 0.075 EUR/kg.
  property carbon content 0.494
    carbon content on a dry matter basis (reserved; not for manual entry)
  properties: carbon content, fossil 0, dry mass 1 kg, water in wet mass 1.4 kg, wet mass 2.4 kg, carbon content, non-fossil 0.494, water content 1.4, carbon allocation 0.494 kg

## Inputs from technosphere
- electricity, medium voltage: 0.00034632 kWh; name elec_midvol; lognormal variance with pedigree 0.0052, pedigree (2,1,3,5,1)
  data from Swiss industry
- sodium sulfite: 4.65353e-7 kg; lognormal variance with pedigree 0.0007, pedigree (1,2,1,1,1)
  Data provided by industry (EPIS) 2017
- transport, freight, sea, bulk carrier for dry goods: 0.00359136 metric ton*km; lognormal variance with pedigree 0.0007, pedigree (1,2,1,1,1)
  Data provided by industry (EPIS) 2017
- sodium chlorate, powder: 0.00016577 kg; lognormal variance with pedigree 0.0007, pedigree (1,2,1,1,1)
  Data provided by industry (EPIS) 2017
  EcoSpold01Location=RER
- sulfur: 1.81454e-6 kg; lognormal variance with pedigree 0.0007, pedigree (1,2,1,1,1)
  Data provided by industry (EPIS) 2017
- waste wood, untreated: -0.000263255 kg; lognormal variance with pedigree 0.0007, pedigree (1,2,1,1,1)
  Data provided by industry (EPIS) 2017. Represents bark and wood wastes
  production volume 1.76155e8 kg
- sulfuric acid: 0.000447619 kg; lognormal variance with pedigree 0.0007, pedigree (1,2,1,1,1)
  EcoSpold01Location=RER
  Data provided by industry (EPIS) 2017
- ozone, liquid: 4.18818e-7 kg; lognormal variance with pedigree 0.0007, pedigree (1,2,1,1,1)
  Data provided by industry (EPIS) 2017
  Uncertainty: average from KCL EcoData
- malusil: 1.10966e-5 kg; lognormal variance with pedigree 0.0007, pedigree (1,2,1,1,1)
  Data provided by industry (EPIS) 2017. Represents Talc or talcum (H2Mg3(SiO3)4 or Mg3Si4O10(OH)2)
- sulfur dioxide, liquid: 5.29339e-6 kg; lognormal variance with pedigree 0.0007, pedigree (1,2,1,1,1)
  EcoSpold01Location=RER
  Data provided by industry (EPIS) 2017
- sodium formate: 1.05053e-5 kg; lognormal variance with pedigree 0.0007, pedigree (1,2,1,1,1)
  Data provided by industry (EPIS) 2017
- municipal solid waste: -1.06423e-6 kg; lognormal variance with pedigree 0.0007, pedigree (1,2,1,1,1)
  EcoSpold01Location=CH
  Data provided by industry (EPIS) 2017. Represents genaral trash
  production volume 226200 kg
- sodium sulfate, anhydrite: 4.15327e-6 kg; lognormal variance with pedigree 0.0007, pedigree (1,2,1,1,1)
  Data provided by industry (EPIS) 2017
- transport, freight train: 0.00568432 metric ton*km; lognormal variance with pedigree 0.0007, pedigree (1,2,1,1,1)
  Data provided by industry (EPIS) 2017
- hydrogen peroxide, without water, in 50% solution state: 0.000152647 kg; lognormal variance with pedigree 0.0007, pedigree (1,2,1,1,1)
  EcoSpold01Location=RER
  Data provided by industry (EPIS) 2017
- calcium carbonate, precipitated: 2.2209e-5 kg; lognormal variance with pedigree 0.0007, pedigree (1,2,1,1,1)
  Data provided by industry (EPIS) 2017
- oxygen, liquid: 0.000331808 kg; lognormal variance with pedigree 0.0007, pedigree (1,2,1,1,1)
  Data provided by industry (EPIS) 2017
  EcoSpold01Location=RER
- EDTA, ethylenediaminetetraacetic acid: 1.27483e-5 kg; lognormal variance with pedigree 0.0007, pedigree (1,2,1,1,1)
  Data provided by industry (EPIS) 2017
- residual softwood, wet: 3.50899e-7 m3; lognormal variance with pedigree 0.0007, pedigree (1,2,1,1,1)
  EcoSpold01Location=RER
  Data provided by industry (EPIS) 2017. Represents saw mill residsues. Conversion factor 765 kg/m3 (ecoinvent exchange properties) used.
- bark: -0.00696075 kg; lognormal variance with pedigree 0.0007, pedigree (1,2,1,1,1)
  Data provided by industry (EPIS) 2017
  production volume 1.64362e8 kg
- waste packaging paper: -7.10826e-6 kg; lognormal variance with pedigree 0.0007, pedigree (1,2,1,1,1)
  Data provided by industry (EPIS) 2017. Represents waste packaging such as corrugated containers, cartonboard etc. Can be also plastic or anything that is recyclable is separated and recycled, glass, metal, paper. Is produced in small side tasks of the overall pulp process in order to "keep the pulp site funktioning".
  production volume 4.7658e6 kg
- limestone residue: -0.0002873 kg; lognormal variance with pedigree 0.0007, pedigree (1,2,1,1,1)
  Data provided by industry (EPIS) 2017; including lime kiln ash, lime mud and lime sludge
  EcoSpold01Location=CH
  production volume 1.10035e8 kg
- chemical, organic: 5.45524e-5 kg; lognormal variance with pedigree 0.0061, pedigree (1,2,1,1,1)
  Data provided by industry (EPIS) 2017. Represents Peracetic acid (C2H4O3), Defoamer, Dispersant and Antifoam.
- methanol: 2.58655e-6 kg; lognormal variance with pedigree 0.0007, pedigree (1,2,1,1,1)
  Data provided by industry (EPIS) 2017
  EcoSpold01Location=GLO
- digester sludge: -6.25783e-6 kg; lognormal variance with pedigree 0.0007, pedigree (1,2,1,1,1)
  Data provided by industry (EPIS) 2017. Represents here sedimentation substance matter from the on side water treatment plant.
  production volume 2.0982e6 kg
- magnesium sulfate: 7.13253e-5 kg; lognormal variance with pedigree 0.0007, pedigree (1,2,1,1,1)
  Data provided by industry (EPIS) 2017
  EcoSpold01Location=RER
- light fuel oil: 5.34431e-5 kg; lognormal variance with pedigree 0.0007, pedigree (1,2,1,1,1)
  Data provided by industry (EPIS) 2017, indicated in energy content. Calculation into mass/volume was done by using the following conversion factor: Light fuel oil: MJ/kg 43.5. Source: http://www.fao.org/docrep/T0269e/t0269e0c.htm
- pulp factory: 8.89548e-13 unit; lognormal variance with pedigree 0.3021, pedigree (3,2,1,1,1)
  EcoSpold01Location=RER
  Own estimation with yearly production volume and a lifetime of a factory of 50 years;activityLink introduced to establish a direct link to the corresponding regional supply of this product
- methanol, from biomass: 0.000107941 kg; lognormal variance with pedigree 0.0007, pedigree (1,2,1,1,1)
  Data provided by industry (EPIS) 2017. Represents biofuel from bark and tall oil pitch. Calculated from energetic value with conversion factor 23 MJ/kg
- quicklime, milled, loose: 0.000245268 kg; lognormal variance with pedigree 0.0007, pedigree (1,2,1,1,1)
  EcoSpold01Location=CH
  Data provided by industry (EPIS) 2017. Calcium oxide (CaO)
- electricity, high voltage: 0.000905099 kWh; lognormal variance with pedigree 0.0007, pedigree (1,2,1,1,1)
  Data provided by industry (EPIS) 2017
- wood pellet, measured as dry mass: 0.000110096 kg; lognormal variance with pedigree 0.0007, pedigree (1,2,1,1,1)
  Data provided by industry (EPIS) 2017, indicated in energy content. Calculation into mass/volume was done by using the following conversion factor: Wood pallets: MJ/kg 16.75. Source: http://www.fao.org/docrep/T0269e/t0269e0c.htm
- chemical, inorganic: 1.60517e-6 kg; lognormal variance with pedigree 0.0007, pedigree (1,2,1,1,1)
  Data provided by industry (EPIS) 2017. Represents Sodium Bisulfite (NaHSO3)
- sodium hydroxide, without water, in 50% solution state: 0.000831683 kg; lognormal variance with pedigree 0.0007, pedigree (1,2,1,1,1)
  EcoSpold01Location=RER
  Data provided by industry (EPIS) 2017
- sodium hypochlorite, without water, in 15% solution state: 2.89682e-6 kg; lognormal variance with pedigree 0.0007, pedigree (1,2,1,1,1)
  Data provided by industry (EPIS) 2017
- green liquor dregs: -0.000306413 kg; lognormal variance with pedigree 0.0007, pedigree (1,2,1,1,1)
  EcoSpold01Location=CH
  Data provided by industry (EPIS) 2017
  production volume 7.93962e7 kg
- wood chips, dry, measured as dry mass: 0.00859381 kg; lognormal variance with pedigree 0.0007, pedigree (1,2,1,1,1)
  Data provided by industry (EPIS) 2017. Representing wood chips and lignin powder (scaled with heating value ratio)
- transport, freight, lorry >32 metric ton, EURO5: 0.00622143 metric ton*km; lognormal variance with pedigree 0.0007, pedigree (1,2,1,1,1)
  Data provided by industry (EPIS) 2017
- heavy fuel oil: 0.000152051 kg; lognormal variance with pedigree 0.0007, pedigree (1,2,1,1,1)
  EcoSpold01Location=RER
  Data provided by industry (EPIS) 2017, indicated in energy content. Calculation into mass/volume was done by using the following conversion factor: Heavy fuel oil: MJ/kg 42.6. Source: http://www.fao.org/docrep/T0269e/t0269e0c.htm
- pulpwood, softwood, measured as solid wood under bark: 5.92386e-5 m3; lognormal variance with pedigree 0.0007, pedigree (1,2,1,1,1)
  Data provided by industry (EPIS) 2017; Represents wood sources explicitly: pine wood certified (major part) and pinus contorta certified
  EcoSpold01Location=RER
- pulpwood, softwood, measured as solid wood under bark: 2.20822e-5 m3; lognormal variance with pedigree 0.0007, pedigree (1,2,1,1,1)
  Data provided by industry (EPIS) 2017; Source explicitly spruce wood certified
- waste paper, unsorted: -3.49981e-7, -1.0667e-8 kg (2 suppliers, which the file names only by identifier); sum of these -3.60648e-7 kg; lognormal variance with pedigree 0.0007, pedigree (1,2,1,1,1)
  Data provided by industry (EPIS) 2017. Come from office recycling programs
  production volume 241800 kg
- waste mineral oil: -1.03875e-6, -8.03223e-9 kg (2 suppliers, which the file names only by identifier); sum of these -1.04678e-6 kg; lognormal variance with pedigree 0.0007, pedigree (1,2,1,1,1)
  Data provided by industry (EPIS) 2017. Represents lubricants residues, oil, fats and lubricants wastes: The running of the equipment and conveyors and their maintenance require lubrication. lubricants are oils and greases
  production volume 132600 kg
- sludge from pulp and paper production: -1.92645e-5, -1.42464e-8 kg (2 suppliers, which the file names only by identifier); sum of these -1.92787e-5 kg; lognormal variance with pedigree 0.0007, pedigree (1,2,1,1,1)
  Data provided by industry (EPIS) 2017
  production volume 6.6144e6 kg
- wood ash mixture, pure: -3.24196e-5, -6.61853e-7 kg (2 suppliers, which the file names only by identifier); sum of these -3.30814e-5 kg; lognormal variance with pedigree 0.0007, pedigree (1,2,1,1,1)
  Data provided by industry (EPIS) 2017; Represents 0.002058kg "fiber reject".
  EcoSpold01Location=CH
  production volume 1.6263e7 kg
- inert waste: -4.16834e-6, -3.59006e-8 kg (2 suppliers, which the file names only by identifier); sum of these -4.20424e-6 kg; lognormal variance with pedigree 0.0007, pedigree (1,2,1,1,1)
  Data provided by industry (EPIS) 2017. Represents "sand from debarking"(sand from the forest) and construction and demolition waste
  production volume 2.184e6 kg
- hazardous waste, for incineration: -1.68206e-7, -4.39681e-9 kg (2 suppliers, which the file names only by identifier); sum of these -1.72603e-7 kg; lognormal variance with pedigree 0.0007, pedigree (1,2,1,1,1)
  Data provided by industry (EPIS) 2017. e.g. laboratory chemicals, solvents that must be disposed of in a controlled manner in a spezialized external facility.
  production volume 39000 kg
- natural gas, high pressure: 0.000111023, 7.16829e-7 m3 (2 suppliers, which the file names only by identifier); sum of these 0.00011174 m3; lognormal variance with pedigree 0.0007, pedigree (1,2,1,1,1)
  Data provided by industry (EPIS) 2017, indicated in energy content. Calculation into mass/volume was done by using the following conversion factor: Natural gas: MJ/m3 39. Source: Ecoinvent, during technical review.
  EcoSpold01Location=RER
- tap water: 9.04664e-8 kg; lognormal variance with pedigree 0.0007, pedigree (1,2,1,1,1)
  Data provided by industry (EPIS) 2017. Municipal water supply
- wastewater, from residence: -7.77752e-8 m3; lognormal variance with pedigree 0.0007, pedigree (1,2,1,1,1)
  Data provided by industry (EPIS) 2017. Sanitary water
  production volume 4477.08 m3
- saw dust, loose, wet, measured as dry mass: -0.00565581 kg; source BFS 2013; lognormal variance with pedigree 0.46, pedigree (5,5,5,5,5)
  calculated by the share and basic density as the moisture content is over 30%
  production volume 9.47915e7 kg
- waste mineral oil: -6.15112e-7 kg; source Rüter, S. 2012; lognormal variance with pedigree 0.1101, pedigree (1,5,3,3,1)
  waste motor oil; the lubricating oil is used in a dissipative way
  production volume 13689.1 kg
- sawmill: 1.30257e-11 unit; source BFS 2013; lognormal variance with pedigree 0.46, pedigree (5,5,5,5,5)
  value taken from econvent 2.2
- lubricating oil: 6.36413e-6 kg; source Rüter, S. 2012; lognormal variance with pedigree 0.1101, pedigree (1,5,3,3,1)
  Lubricating oil plus motor oil
- sawlog and veneer log, hardwood, measured as solid wood under bark: 2.66525e-5, 2.66525e-5 m3 (2 suppliers, which the file names only by identifier); sum of these 5.3305e-5 m3; source BFS 2013; lognormal variance with pedigree 0.46, pedigree (5,5,5,5,5)
  input of the log, from which 1 m3 of sawnwood is produced
- diesel, burned in building machine: 0.00174951 MJ; source Rüter, S. 2012; lognormal variance with pedigree 0.1027, pedigree (1,3,3,3,1)
  Diesel for internal transport
- wood chips, dry, measured as dry mass: 0.00859131 kg; lognormal variance with pedigree 0.0027, pedigree (1,2,1,5,1)
  (same comment as for wood chips, dry, measured as dry mass)
- sodium hypochlorite, without water, in 15% solution state: 2.89574e-6 kg; lognormal variance with pedigree 0.0027, pedigree (1,2,1,5,1)
  Data provided by industry (EPIS) 2017
- hazardous waste, for incineration: -1.72581e-7 kg; lognormal variance with pedigree 0.0027, pedigree (1,2,1,5,1)
  (same comment as for hazardous waste, for incineration)
  production volume 86000 kg
- sodium sulfate, anhydrite: 4.15172e-6 kg; lognormal variance with pedigree 0.0027, pedigree (1,2,1,5,1)
  Data provided by industry (EPIS) 2017
- wood pellet, measured as dry mass: 0.000110055 kg; lognormal variance with pedigree 0.0027, pedigree (1,2,1,5,1)
  (same comment as for wood pellet, measured as dry mass)
- methanol, from biomass: 0.000107931 kg; lognormal variance with pedigree 0.0027, pedigree (1,2,1,5,1)
  (same comment as for methanol, from biomass)
- waste paper, unsorted: -3.60514e-7 kg; lognormal variance with pedigree 0.0027, pedigree (1,2,1,5,1)
  Data provided by industry (EPIS) 2017. Come from office recycling programs
  production volume 533200 kg
- inert waste: -4.20302e-6 kg; lognormal variance with pedigree 0.0027, pedigree (1,2,1,5,1)
  (same comment as for inert waste)
  production volume 4.816e6 kg
- oxygen, liquid: 0.000331684 kg; lognormal variance with pedigree 0.0027, pedigree (1,2,1,5,1)
  Data provided by industry (EPIS) 2017
  EcoSpold01Location=RER
- limestone residue: -0.000287238 kg; lognormal variance with pedigree 0.0027, pedigree (1,2,1,5,1)
  (same comment as for limestone residue)
  production volume 2.4264e8 kg
- quicklime, milled, loose: 0.000245228 kg; lognormal variance with pedigree 0.0027, pedigree (1,2,1,5,1)
  EcoSpold01Location=CH
  Data provided by industry (EPIS) 2017. Calcium oxide (CaO)
- sulfur dioxide, liquid: 5.29141e-6 kg; lognormal variance with pedigree 0.0027, pedigree (1,2,1,5,1)
  Data provided by industry (EPIS) 2017
  EcoSpold01Location=RER
- pulp factory: 8.89339e-13 unit; lognormal variance with pedigree 0.3041, pedigree (3,2,1,5,1)
  Own estimation with yearly production volume and a lifetime of a factory of 50 years
  EcoSpold01Location=RER
- sludge from pulp and paper production: -1.9275e-5 kg; lognormal variance with pedigree 0.0027, pedigree (1,2,1,5,1)
  Data provided by industry (EPIS) 2017
  production volume 1.45856e7 kg
- sodium formate: 1.05014e-5 kg; lognormal variance with pedigree 0.0027, pedigree (1,2,1,5,1)
  Data provided by industry (EPIS) 2017
- hydrogen peroxide, without water, in 50% solution state: 0.00015259 kg; lognormal variance with pedigree 0.0027, pedigree (1,2,1,5,1)
  Data provided by industry (EPIS) 2017
  EcoSpold01Location=RER
- wood ash mixture, pure: -3.30724e-5 kg; lognormal variance with pedigree 0.0027, pedigree (1,2,1,5,1)
  (same comment as for wood ash mixture, pure)
  production volume 3.5862e7 kg
- calcium carbonate, precipitated: 2.22007e-5 kg; lognormal variance with pedigree 0.0027, pedigree (1,2,1,5,1)
  Data provided by industry (EPIS) 2017
- sodium chlorate, powder: 0.000165708 kg; lognormal variance with pedigree 0.0027, pedigree (1,2,1,5,1)
  Data provided by industry (EPIS) 2017
  EcoSpold01Location=RER
- sodium sulfite: 4.65179e-7 kg; lognormal variance with pedigree 0.0027, pedigree (1,2,1,5,1)
  Data provided by industry (EPIS) 2017
- sulfuric acid: 0.000447481 kg; lognormal variance with pedigree 0.0027, pedigree (1,2,1,5,1)
  Data provided by industry (EPIS) 2017
  EcoSpold01Location=RER
- ozone, liquid: 4.18661e-7 kg; lognormal variance with pedigree 0.0027, pedigree (1,2,1,5,1)
  Data provided by industry (EPIS) 2017
  Uncertainty: average from KCL EcoData
- heavy fuel oil: 7.44962e-6, 1.94073e-6, 5.74527e-6, 1.13011e-6, 1.44977e-6, 0.000134304 kg (6 suppliers, which the file names only by identifier); sum of these 0.00015202 kg; lognormal variance with pedigree 0.0027, pedigree (1,2,1,5,1)
  Data provided by industry (EPIS) 2017, indicated in energy content. Calculation into mass/volume was done by using the following conversion factor: Heavy fuel oil: MJ/kg 42.6. Source: http://www.fao.org/docrep/T0269e/t0269e0c.htm
  EcoSpold01Location=RER
- electricity, high voltage: 1.1383e-5, 2.07289e-6, 2.62264e-5, 3.54069e-5, 0.000509737, 8.20986e-5, 0.000237985 kWh (7 suppliers, which the file names only by identifier); sum of these 0.000904909 kWh; lognormal variance with pedigree 0.0027, pedigree (1,2,1,5,1)
  Data provided by industry (EPIS) 2017
- light fuel oil: 2.24244e-6, 3.23395e-7, 4.52577e-6, 3.00325e-7, 4.35159e-7, 4.5596e-5 kg (6 suppliers, which the file names only by identifier); sum of these 5.34231e-5 kg; lognormal variance with pedigree 0.0027, pedigree (1,2,1,5,1)
  (same comment as for light fuel oil)
- natural gas, high pressure: 1.86763e-6, 3.10908e-6, 1.75254e-5, 2.53852e-5, 4.2852e-6, 5.95257e-5 m3 (6 suppliers, which the file names only by identifier); sum of these 0.000111698 m3; lognormal variance with pedigree 0.0027, pedigree (1,2,1,5,1)
  (same comment as for natural gas, high pressure)
- waste packaging paper: -3.47499e-7, -5.30647e-8, -4.64002e-9, -1.91745e-7, -1.86967e-8, -3.46096e-8, -6.45535e-6 kg (7 suppliers, which the file names only by identifier); sum of these -7.10561e-6 kg; lognormal variance with pedigree 0.0027, pedigree (1,2,1,5,1)
  (same comment as for waste packaging paper)
  production volume 1.05092e7 kg
- pulpwood, softwood, measured as solid wood under bark: 4.24213e-9, 4.82183e-7, 8.08159e-5 m3 (3 suppliers, which the file names only by identifier); sum of these 8.13023e-5 m3; lognormal variance with pedigree 0.0027, pedigree (1,2,1,5,1)
  EcoSpold01Location=RER
  Data provided by industry (EPIS) 2017; Represents wood sources explicitly: pine wood certified (major part) and pinus contorta certified
- municipal solid waste: -1.50117e-9, -3.78257e-10, -5.40552e-10, -1.06169e-6 kg (4 suppliers, which the file names only by identifier); sum of these -1.06411e-6 kg; lognormal variance with pedigree 0.0027, pedigree (1,2,1,5,1)
  EcoSpold01Location=CH
  Data provided by industry (EPIS) 2017. Represents genaral trash
  production volume 498800 kg
- waste wood, untreated: -1.76794e-5, -2.19517e-6, -1.60492e-7, -6.16556e-6, -9.31469e-7, -1.47257e-6, -0.000234552 kg (7 suppliers, which the file names only by identifier); sum of these -0.000263157 kg; lognormal variance with pedigree 0.0027, pedigree (1,2,1,5,1)
  Data provided by industry (EPIS) 2017. Represents bark and wood wastes
  production volume 3.88445e8 kg
- wastewater, from residence: -7.77751e-8 m3; lognormal variance with pedigree 0.0027, pedigree (1,2,1,5,1)
  Data provided by industry (EPIS) 2017. Sanitary water
  production volume 21657.9 m3
- tap water: 1.69509e-10, 1.4082e-9, 2.80142e-10, 7.06408e-9, 1.8377e-10, 5.22731e-10, 8.08379e-8 kg (7 suppliers, which the file names only by identifier); sum of these 9.04663e-8 kg; lognormal variance with pedigree 0.0027, pedigree (1,2,1,5,1)
  Data provided by industry (EPIS) 2017. Municipal water supply
- electricity, medium voltage: 9.32283e-6, 1.69636e-6, 3.9157e-5, 1.37487e-5, 0.000133269, 2.87677e-5, 0.000417102, 5.96952e-5, 0.000174156 kWh (9 suppliers, which the file names only by identifier); sum of these 0.000876915 kWh; source BFS 2013; lognormal variance with pedigree 0.46, pedigree (5,5,5,5,5)
  data from industry, i.e. consumption of over-all electricity of the sawmill including the first sawing step, minus electricty consumed for the chipping of residual wood, the bark handling as well as for the suction of sawdust (i.e. processes that are covered in separate datasets).
- sawlog and veneer log, softwood, measured as solid wood under bark: 5.83818e-7, 4.36549e-5 m3 (2 suppliers, which the file names only by identifier); sum of these 4.42387e-5 m3; source BFS 2013; lognormal variance with pedigree 0.46, pedigree (5,5,5,5,5)
  input of the log, from which 1 m3 of sawnwood is produced

## Inputs from nature
- Water, unspecified natural origin [natural resource, in water]: 0.00265035 m3; lognormal variance with pedigree 0.0007, pedigree (1,2,1,1,1)
  Data provided by industry (EPIS) 2017. Represents mainly surface water.

## Emissions to nature
- Benzene, hexachloro- [air, urban air close to ground]: 0 kg; pedigree (1,1,1,1,1)
  Estimation based on fuel input data and emission factors from corresponding ecoinvent fuel combustion datasets (see "Extrapolations" comment). Apart from external fuel inputs, internal fuels such as bark, black liquor, sludge, tall oil pitch, wood pellets are generated during the process and supply considerable amounts of process energy. Emissions from some internal biofuels (bark, wood pellets) are approximated with the combustion of wood chips. black liquor, sludge and tall oil pitch were not included in the emissions calculations because no specific emission profiles, e.g. for the black liquor recovery process, were available. Emissions from these internal energy generation processes are therefore only reflected in the key emission factors provided by the industry, other emissions constitute a data gap. Biogas and methanol are approximated with the combustion of natural gas, whereby CO2, CO and CH4 emissions stemming from biogas were modeled as non-fossil.
  Uncertainty: estimation, based on industrial heating modules of energy carriers used
- Carbon monoxide, non-fossil [air, urban air close to ground]: 3.26225e-5 kg; lognormal variance with pedigree 0.6501, pedigree (1,2,1,1,1)
  Key emission provided by industry (EPIS) 2017
- Zinc [air, urban air close to ground]: 1.62646e-8 kg; lognormal variance with pedigree 0.7388, pedigree (2,5,2,1,4)
  (same comment as for Benzene, hexachloro-)
- NMVOC, non-methane volatile organic compounds, unspecified origin [air, urban air close to ground]: 4.337e-7 kg; lognormal variance with pedigree 0.1388, pedigree (2,5,2,1,4)
  (same comment as for Benzene, hexachloro-)
- Hydrocarbons, aromatic [air, urban air close to ground]: 1.98872e-9 kg; lognormal variance with pedigree 0.1388, pedigree (2,5,2,1,4)
  (same comment as for Benzene, hexachloro-)
- Molybdenum [air, urban air close to ground]: 9.87642e-11 kg; lognormal variance with pedigree 0.7388, pedigree (2,5,2,1,4)
  (same comment as for Benzene, hexachloro-)
- Butane [air, urban air close to ground]: 1.83082e-8 kg; lognormal variance with pedigree 0.3988, pedigree (2,5,2,1,4)
  (same comment as for Benzene, hexachloro-)
- Particulates, > 10 um [air, urban air close to ground]: 2.96293e-8 kg; lognormal variance with pedigree 0.0507, pedigree (1,3,1,3,1)
  Estimation based on fuel input data and emission factors from corresponding ecoinvent fuel combustion datasets (see "Extrapolations" comment). Apart from external fuel inputs, internal fuels such as bark, black liquor, sludge, tall oil pitch, wood pellets are generated during the process and supply considerable amounts of process energy. Emissions from some internal biofuels (bark, wood pellets) are approximated with the combustion of wood chips. black liquor, sludge and tall oil pitch were not included in the emissions calculations because no specific emission profiles, e.g. for the black liquor recovery process, were available. Emissions from these internal energy generation processes are therefore only reflected in the key emission factors provided by the industry, other emissions constitute a data gap. Biogas and methanol are approximated with the combustion of natural gas, whereby CO2, CO and CH4 emissions stemming from biogas were modeled as non-fossil.
  Uncertainty: average from CER of European producers
- Dinitrogen monoxide [air, urban air close to ground]: 1.18286e-7 kg; lognormal variance with pedigree 0.1388, pedigree (2,5,2,1,4)
  (same comment as for Benzene, hexachloro-)
- Methane, non-fossil [air, urban air close to ground]: 1.89645e-7 kg; lognormal variance with pedigree 0.1388, pedigree (2,5,2,1,4)
  (same comment as for Benzene, hexachloro-)
- Benzene [air, urban air close to ground]: 4.72963e-8 kg; lognormal variance with pedigree 0.1388, pedigree (2,5,2,1,4)
  (same comment as for Benzene, hexachloro-)
- Phosphorus [air, urban air close to ground]: 1.23914e-8 kg; lognormal variance with pedigree 0.1388, pedigree (2,5,2,1,4)
  (same comment as for Benzene, hexachloro-)
- m-Xylene [air, urban air close to ground]: 4.95657e-9 kg; lognormal variance with pedigree 0.1388, pedigree (2,5,2,1,4)
  (same comment as for Benzene, hexachloro-)
- Cadmium [air, urban air close to ground]: 2.89133e-11 kg; lognormal variance with pedigree 0.7388, pedigree (2,5,2,1,4)
  (same comment as for Benzene, hexachloro-)
- AOX, Adsorbable Organic Halogen as Cl [water, surface water]: 1.72148e-6 kg; lognormal variance with pedigree 0.0401, pedigree (1,2,1,1,1)
  Data provided by industry (EPIS) 2017
- Manganese [air, urban air close to ground]: 7.02182e-9 kg; lognormal variance with pedigree 0.7388, pedigree (2,5,2,1,4)
  (same comment as for Benzene, hexachloro-)
- Particulates, < 2.5 um [air, unspecified]: 1.18466e-5 kg; lognormal variance with pedigree 0.3201, pedigree (3,5,3,3,3)
  Key emission provided by industry (EPIS) 2017: Represents dust (unspecified)
- Carbon monoxide, fossil [air, urban air close to ground]: 1.51321e-7 kg; lognormal variance with pedigree 0.7388, pedigree (2,5,2,1,4)
  (same comment as for Benzene, hexachloro-)
- Lead [air, urban air close to ground]: 2.82272e-9 kg; lognormal variance with pedigree 0.7388, pedigree (2,5,2,1,4)
  (same comment as for Benzene, hexachloro-)
- Calcium [air, urban air close to ground]: 2.42991e-7 kg; lognormal variance with pedigree 0.3988, pedigree (2,5,2,1,4)
  (same comment as for Benzene, hexachloro-)
- Carbon dioxide, non-fossil [air, urban air close to ground]: 0.0903109 kg; lognormal variance with pedigree 0.0007, pedigree (1,2,1,1,1)
  Key emission provided by industry (EPIS) 2017
- Formaldehyde [air, urban air close to ground]: 1.7442e-8 kg; lognormal variance with pedigree 0.1388, pedigree (2,5,2,1,4)
  (same comment as for Benzene, hexachloro-)
- Particulates, > 2.5 um, and < 10um [air, unspecified]: 2.21339e-7 kg; lognormal variance with pedigree 0.1401, pedigree (3,5,3,3,3)
  Estimation based on fuel input data and emission factors from corresponding ecoinvent fuel combustion datasets (see "Extrapolations" comment). Apart from external fuel inputs, internal fuels such as bark, black liquor, sludge, tall oil pitch, wood pellets are generated during the process and supply considerable amounts of process energy. Emissions from some internal biofuels (bark, wood pellets) are approximated with the combustion of wood chips. black liquor, sludge and tall oil pitch were not included in the emissions calculations because no specific emission profiles, e.g. for the black liquor recovery process, were available. Emissions from these internal energy generation processes are therefore only reflected in the key emission factors provided by the industry, other emissions constitute a data gap. Biogas and methanol are approximated with the combustion of natural gas, whereby CO2, CO and CH4 emissions stemming from biogas were modeled as non-fossil.
- Ammonia [air, urban air close to ground]: 7.22652e-8 kg; lognormal variance with pedigree 0.1388, pedigree (2,5,2,1,4)
  (same comment as for Benzene, hexachloro-)
- BOD5, Biological Oxygen Demand [water, surface water]: 1.02862e-5 kg; lognormal variance with pedigree 0.0401, pedigree (1,2,1,1,1)
  Data provided by industry (EPIS) 2017
- Acetaldehyde [air, urban air close to ground]: 4.39552e-9 kg; lognormal variance with pedigree 0.1388, pedigree (2,5,2,1,4)
  (same comment as for Benzene, hexachloro-)
- Chromium VI [air, urban air close to ground]: 2.26947e-12 kg; lognormal variance with pedigree 0.7388, pedigree (2,5,2,1,4)
  (same comment as for Benzene, hexachloro-)
- Hydrocarbons, aliphatic, unsaturated [air, urban air close to ground]: 1.28415e-7 kg; lognormal variance with pedigree 0.1388, pedigree (2,5,2,1,4)
  (same comment as for Benzene, hexachloro-)
- Toluene [air, urban air close to ground]: 1.77189e-8 kg; lognormal variance with pedigree 0.1388, pedigree (2,5,2,1,4)
  (same comment as for Benzene, hexachloro-)
- Dioxins, measured as 2,3,7,8-tetrachlorodibenzo-p-dioxin [air, urban air close to ground]: 1.28878e-15 kg; lognormal variance with pedigree 0.1388, pedigree (2,5,2,1,4)
  (same comment as for Benzene, hexachloro-)
- Water [water, unspecified]: 0.0011521 m3; lognormal variance with pedigree 0.0401, pedigree (1,2,1,1,1)
  Data provided by industry (EPIS) 2017
- Hydrocarbons, aliphatic, alkanes, unspecified [air, urban air close to ground]: 4.71848e-8 kg; lognormal variance with pedigree 0.1388, pedigree (2,5,2,1,4)
  (same comment as for Benzene, hexachloro-)
- Water [air, unspecified]: 0.00149984 m3; lognormal variance with pedigree 0.0401, pedigree (1,2,1,1,1)
  Data provided by industry (EPIS) 2017. Mainly cooling water and assumed to evaporate
- Cobalt [air, urban air close to ground]: 4.07403e-10 kg; lognormal variance with pedigree 0.7388, pedigree (2,5,2,1,4)
  (same comment as for Benzene, hexachloro-)
- Iron [air, urban air close to ground]: 1.01233e-8 kg; lognormal variance with pedigree 0.7388, pedigree (2,5,2,1,4)
  (same comment as for Benzene, hexachloro-)
- Vanadium [air, urban air close to ground]: 1.23455e-8 kg; lognormal variance with pedigree 0.7388, pedigree (2,5,2,1,4)
  (same comment as for Benzene, hexachloro-)
- COD, Chemical Oxygen Demand [water, surface water]: 0.000418428 kg; lognormal variance with pedigree 0.0401, pedigree (1,2,1,1,1)
  Data provided by industry (EPIS) 2017
- Propane [air, urban air close to ground]: 5.28232e-9 kg; lognormal variance with pedigree 0.1388, pedigree (2,5,2,1,4)
  (same comment as for Benzene, hexachloro-)
- Suspended solids, unspecified [water, surface water]: 2.96918e-5 kg; lognormal variance with pedigree 0.0401, pedigree (1,2,1,1,1)
  Data provided by industry (EPIS) 2017
- Pentane [air, urban air close to ground]: 2.98797e-8 kg; lognormal variance with pedigree 0.1388, pedigree (2,5,2,1,4)
  (same comment as for Benzene, hexachloro-)
- Potassium [air, urban air close to ground]: 9.66532e-7 kg; lognormal variance with pedigree 0.7388, pedigree (2,5,2,1,4)
  (same comment as for Benzene, hexachloro-)
- Bromine [air, urban air close to ground]: 2.47829e-9 kg; lognormal variance with pedigree 0.1388, pedigree (2,5,2,1,4)
  (same comment as for Benzene, hexachloro-)
- Hydrogen fluoride [air, urban air close to ground]: 6.33653e-10 kg; lognormal variance with pedigree 0.1388, pedigree (2,5,2,1,4)
  (same comment as for Benzene, hexachloro-)
- Benzene, ethyl- [air, urban air close to ground]: 1.23914e-9 kg; lognormal variance with pedigree 0.1388, pedigree (2,5,2,1,4)
  (same comment as for Benzene, hexachloro-)
- Sodium [air, urban air close to ground]: 6.29554e-8 kg; lognormal variance with pedigree 0.7388, pedigree (2,5,2,1,4)
  (same comment as for Benzene, hexachloro-)
- Methane, fossil [air, urban air close to ground]: 8.60285e-8 kg; lognormal variance with pedigree 0.1388, pedigree (2,5,2,1,4)
  (same comment as for Benzene, hexachloro-)
- Carbon dioxide, fossil [air, urban air close to ground]: 0.00256297 kg; lognormal variance with pedigree 0.0007, pedigree (1,2,1,1,1)
  Key emission provided by industry (EPIS) 2017
- TOC, Total Organic Carbon [water, surface water]: 0.000146973 kg; lognormal variance with pedigree 0.0401, pedigree (1,2,1,1,1)
  Data provided by industry (EPIS) 2017
- Hydrogen chloride [air, urban air close to ground]: 1.82065e-8 kg; lognormal variance with pedigree 0.1388, pedigree (2,5,2,1,4)
  (same comment as for Benzene, hexachloro-)
- Mercury [air, urban air close to ground]: 1.72478e-11 kg; lognormal variance with pedigree 0.7388, pedigree (2,5,2,1,4)
  (same comment as for Benzene, hexachloro-)
- Fluorine [air, urban air close to ground]: 2.06524e-9 kg; lognormal variance with pedigree 0.1388, pedigree (2,5,2,1,4)
  (same comment as for Benzene, hexachloro-)
- PAH, polycyclic aromatic hydrocarbons [air, urban air close to ground]: 7.09302e-10 kg; lognormal variance with pedigree 0.1388, pedigree (2,5,2,1,4)
  (same comment as for Benzene, hexachloro-)
- Sulfur dioxide [air, urban air close to ground]: 9.28155e-6 kg; lognormal variance with pedigree 0.0007, pedigree (1,2,1,1,1)
  Key emission provided by industry (EPIS) 2017
- Acetone [air, urban air close to ground]: 1.85183e-9 kg; lognormal variance with pedigree 0.1388, pedigree (2,5,2,1,4)
  (same comment as for Benzene, hexachloro-)
- Acetic acid [air, urban air close to ground]: 1.10225e-8 kg; lognormal variance with pedigree 0.1388, pedigree (2,5,2,1,4)
  (same comment as for Benzene, hexachloro-)
- Copper [air, urban air close to ground]: 4.30037e-9 kg; lognormal variance with pedigree 0.7388, pedigree (2,5,2,1,4)
  (same comment as for Benzene, hexachloro-)
- Magnesium [air, urban air close to ground]: 1.48697e-8 kg; lognormal variance with pedigree 0.7388, pedigree (2,5,2,1,4)
  (same comment as for Benzene, hexachloro-)
- Propionic acid [air, urban air close to ground]: 4.82025e-10 kg; lognormal variance with pedigree 0.1388, pedigree (2,5,2,1,4)
  (same comment as for Benzene, hexachloro-)
- Arsenic [air, urban air close to ground]: 2.01797e-10 kg; lognormal variance with pedigree 0.1388, pedigree (2,5,2,1,4)
  (same comment as for Benzene, hexachloro-)
- Methanol [air, urban air close to ground]: 6.29622e-9 kg; lognormal variance with pedigree 0.1388, pedigree (2,5,2,1,4)
  (same comment as for Benzene, hexachloro-)
- Selenium [air, urban air close to ground]: 1.48146e-10 kg; lognormal variance with pedigree 0.7388, pedigree (2,5,2,1,4)
  (same comment as for Benzene, hexachloro-)
- Hydrogen sulfide [air, urban air close to ground]: 2.29494e-6 kg; lognormal variance with pedigree 0.0401, pedigree (1,2,1,1,1)
  Key emission provided by industry (EPIS) 2017. Hydrogen sulfide is expressing the total of theTRS (Total Reduced Sulphur Compounds), namely H2S, CS2, COS, C2H6S, CH4S, C2H6S2,
- Nickel [air, urban air close to ground]: 6.29715e-9 kg; lognormal variance with pedigree 0.7388, pedigree (2,5,2,1,4)
  (same comment as for Benzene, hexachloro-)
- Nitrogen [water, surface water]: 5.10341e-6 kg; lognormal variance with pedigree 0.0401, pedigree (1,2,1,1,1)
  Data provided by industry (EPIS) 2017
- Chlorine [air, urban air close to ground]: 7.43486e-9 kg; lognormal variance with pedigree 0.3988, pedigree (2,5,2,1,4)
  (same comment as for Benzene, hexachloro-)
- Nitrogen oxides [air, urban air close to ground]: 6.03119e-5 kg; lognormal variance with pedigree 0.0401, pedigree (1,2,1,1,1)
  Key emission provided by industry (EPIS) 2017
- Phenol, pentachloro- [air, urban air close to ground]: 3.34568e-13 kg; lognormal variance with pedigree 0.1388, pedigree (2,5,2,1,4)
  (same comment as for Benzene, hexachloro-)
- Benzo(a)pyrene [air, urban air close to ground]: 2.13668e-11 kg; lognormal variance with pedigree 0.1388, pedigree (2,5,2,1,4)
  (same comment as for Benzene, hexachloro-)
- Chromium [air, urban air close to ground]: 2.24677e-10 kg; lognormal variance with pedigree 0.7388, pedigree (2,5,2,1,4)
  (same comment as for Benzene, hexachloro-)
- Ethanol [air, urban air close to ground]: 3.70367e-9 kg; lognormal variance with pedigree 0.1388, pedigree (2,5,2,1,4)
  (same comment as for Benzene, hexachloro-)
- DOC, Dissolved Organic Carbon [water, surface water]: 0.000147017 kg; lognormal variance with pedigree 0.0401, pedigree (1,2,1,1,1)
  Calculated as equal to TOC.
- Phosphorus [water, surface water]: 5.20404e-7 kg; lognormal variance with pedigree 0.0401, pedigree (1,2,1,1,1)
  Data provided by industry (EPIS) 2017

## Sampling procedure
complementary literature and sampling from sawmills
