# hydropower plant construction, reservoir

Dataset: EcoSpold 2, unit process
Geography: RoW
Time period: 1945-01-01 to 2019-12-31
Technology level: current
Classification: ISIC rev.4 ecoinvent: 4220a: Construction of utility projects for electricity production, except for liquid fuels
Classification: EcoSpold01Categories: hydro power/production of components
Tags: ConvertedDataset
Scenario: Business-as-Usual
System model: Allocation at the point of substitution
Generated by: Pablo Tirado
Published in: Bolliger, R. 2007
Database: ecoinvent
isCopyrightProtected: true
accessRestrictedTo: 1

## General comment
Considering the difficulty to clearly seperate within the Swiss dams system for some of the dams function for normal electricity generation from pumping storage, only one infrastructure module has been defined. A representative sample of various types of dams in Switzerland with a height of more than 30 metres is taken into account. Lifetime is assumed to be 150 years for the dam and 80 years rest of materials. The data refers to plant construction of a mix of types of dams built between 1945 and 1970, therefore they might not be representative for more modern construction, nor for an individual type.
[This dataset was already contained in the ecoinvent database version 2. It was not individually updated during the transfer to ecoinvent version 3. Life Cycle Impact Assessment results may still have changed, as they are affected by changes in the supply chain, i.e. in other datasets. This dataset was generated following the ecoinvent quality guidelines for version 2. It may have been subject to central changes described in the ecoinvent version 3 change report (http://www.ecoinvent.org/database/ecoinvent-version-3/reports-of-changes/), and the results of the central updates were reviewed extensively. The changes added e.g. consistent water flows and other information throughout the database. The documentation of this dataset can be found in the ecoinvent reports of version 2, which are still available via the ecoinvent website. The change report linked above covers all central changes that were made during the conversion process.]

## Included activities end
Includes the most important materials used for the construction: cement, gravel, water, steel, explosives. Also includes transports and energy used for the construction. Inluded direct burdens to the environment are particle emissions caused by the construction and the disposal of the dam.

## Geography
Data represent the average of a characteristic sample of Swiss reservoir hydropower plants.

## Technology
Construction technology refers to a mix of types of dams built between 1945 and 1970, therefore they might not be representative for more modern construction, nor for an individual type.

## Parameters
- fraction, process water, to air: 0.15 dimensionless; name fraction_PW_to_air; lognormal variance with pedigree 0.092025, pedigree (4,4,3,2,4)
- fraction, tap water, to air: 0.15; name fraction_TW_to_air; lognormal variance with pedigree 0.092025, pedigree (4,4,3,2,4)

## Reference product
- hydropower plant, reservoir: 1 unit; name amountRP; CPC 53262: Power plants; By-product classification allocatable product
  EcoSpold01Location=CH
  production volume 3.95633 unit; name apv_RP
    This is a placeholder value that does not reflect real-world production volumes. This dataset does not currently require a real-world production volume to work in the database framework, and no actual data were collected yet. This has no negative effect on the results of the ecoinvent database.
  property price 4.28411e10 EUR2005
    EU27 I/O database(in the 'EU & DK Input Output Database' (available in SimaPro)); -79 Building, non-residential EU 27 (calculated to be 38.169 EUR2003/kg). Based on consumption of (_53 Iron basic, virgin, EU27;7.25517782294095E-3 kg/EUR building; 0.45 EUR2003 per kg DS), (_61 Iron, after first processing, EU27;5.8766830719783E-3kg/EUR building; 0.62 EUR2003 per kg DS), (_65 Fabricated metal products, except machinery, EU27; 8.9167022775554E-3 kg/EUR building; 3.63 EUR2003 per kg DS) and (_66 Machinery and equipment n.e.c., EU27;4.15071881936446E-3 kg/EUR building; 5.71 EUR2003 per kg DS) -1131000000 kg
  property true value 4.28411e10; name amountRP_true_value
    allocation property applied in "true value" allocation // value calculated from revenue

## By-products
- copper: 0 kg; source Rentz O. 1999; By-product classification allocatable product; CPC 41413: Refined copper and copper alloys, unwrought; master alloys of copper
  Literature value. Copper uses: Before end-use copper is manufactured into semi fabricated products, such as shapes and ingots (known as 'semis'). These manufacturing processes are subdivided into hot working, cold working and, if necessary, process annealing. Few of the semis are ready for use as such. They more typically travel to first-stage manufacturers, who make metal rods, wire, and casting, and then to component manufacturers who produce such things as motors, valves, and insulated cables The components in turn are incorporated by final-stage manufacturers into a variety of finished products - automobiles, commercial buildings, residential housing, and so forth. These uses account for about 79% of the world-wide consumption of copper.
  production volume 58450.4 kg
  properties: dry mass 1 kg, water in wet mass 0 kg, wet mass 1 kg, carbon content, non-fossil 0, water content 0, price 5.52 EUR2005, carbon content, fossil 0, carbon content 0, carbon allocation 0 kg, true value 161323
- electricity, for reuse in municipal waste incineration only: 0 kWh; CPC 17100: Electrical energy; By-product classification allocatable product; pedigree (1,1,1,1,1)
  Net electricity generated from this waste and used in internal MSWI plant energy redistribution.
  Uncertainty: uncertainty is calculated from uncertainties in waste composition and uncertainties in energy efficiency and the uncertainty in internal energy demand
  production volume 32422.3 kWh
  property exergy 3.6 MJ; name E_el_prod_MSWI_exergy
    This exergy property is based on the exergy content of the product.
  property true value relation 3.6; name E_el_prod_MSWI_true_value_relation
    property to calculate "true value" from
  property price 0.1 EUR2005; name E_el_prod_MSWI_price_EUR2005
    Estimated to be the same price as in case of electricity, medium voltage.
  property true value 1298.44
    allocation property applied in "true value" allocation // value calculated from true value relation
- heat, for reuse in municipal waste incineration only: 0 MJ; CPC 17300: Steam and hot water; By-product classification allocatable product; pedigree (1,1,1,1,1)
  Net useful heat generated from this waste and used in internal MSWI plant energy redistribution.
  Uncertainty: uncertainty is calculated from uncertainties in waste composition and uncertainties in energy efficiency and the uncertainty in internal energy demand
  production volume 230228 MJ
  property true value relation 0.1842; name E_th_prod_MSWI_true_value_relation
    property to calculate "true value" from
  property exergy 0.1842 MJ; name E_th_prod_MSWI_exergy
    This exergy property is based on the exergy content of the product.
  property price 0.0106 EUR2005; name E_th_prod_MSWI_price_EUR2005
    Average European district heat price from Ecoheatcool and Euroheat 2005-2006, Ecoheat Work package 1: The European heat market. Final report. 10.6 EUR/GJ i s the price of district heat. http://www.solarthermalworld.org/files/Ecoheatcool%20WP1%20Web.pdf?download
  property true value 471.763
    (same comment as for electricity, for reuse in municipal waste incineration only)
- zinc concentrate: 0 kg; CPC 14290: Other non-ferrous metal ores and concentrates (other than uranium or thorium ores and concentrates); By-product classification allocatable product
  Calculated value from the knowledge of the properties of both products.
  production volume 4.63937e-5 kg
  property price 0.38 EUR2005; name ByP_price_EUR2005
    Temporary price data. Calculated as 90% of purchasers price based on: Zinc content in concentrate 53%. Concentrate price per kg Zn 86.5% of refined Zn price (13.5% treatment charges according to CHR Metals Limited 2005: Dynamic cost curves. http://www.minecost.com/dynamic.pdf). 2004 zinc price from USGS (2007) Mineral commodity summaries 2007. <http://minerals.usgs.gov/minerals/pubs/mcs/2007/mcs2007.pdf> [Accessed 25 May 2010]
  property zinc content 0.53; name zinc_C_zinc_concentrate
    Zinc content on a dry matter basis. Value taken from teh "zinc mine operation" /GLO dataset.
  property dry mass 1 kg; name DM_zinc_concentrate
  property carbon content 0
    carbon content on a dry matter basis (reserved; not for manual entry)
  property true value 8.8148e-6
    allocation property applied in "true value" allocation // value calculated from revenue
  properties: wet mass 1 kg, water content 0, carbon content, non-fossil 0, carbon content, fossil 0, water in wet mass 0 kg, carbon allocation 0 kg
- iron scrap, sorted, pressed: 0 kg; By-product classification Recyclable; CPC 39310: Slag, dross, scalings and other waste from the manufacture of iron or steel; pedigree (1,1,1,1,1)
  Iron scrap recovered from this waste.
  production volume 7.13502e6 kg
  property price 0.175 EUR2005
    Temporary price data. Calculated as 90% of purchasers price based on: 2005 import and export prices (total trades (USD) divided by total weight (kg) in biggest economies of the world: EU27, USA, Brasil, China, India, Japan and Russia) from UN Commodity Trade Statistics Database (http://data.un.org/Explorer.aspxDatabase [Accessed 2011.06.20]). Commodity: Waste or scrap, of cast iron
  property carbon content 0
    carbon content on a dry matter basis (reserved; not for manual entry)
  property true value 30363
    allocation property applied in "true value" allocation // value calculated from revenue
  properties: water content 0, water in wet mass 0 kg, carbon content, fossil 0, dry mass 1 kg, carbon content, non-fossil 0, wet mass 1 kg, carbon allocation 0 kg

## Inputs from technosphere
- waste reinforced concrete: 0 kg; name wasteConcrete; pedigree (1,1,1,1,1)
  EcoSpold01Location=CH
  own assumption, includes lifetime
  production volume 0 kg
    Calculated from the production volume of hydropower plant, reservoir in proportion to the respective output amounts.
  property price 0 EUR2005; name wasteConcrete_price_EUR2005
  properties: wet mass 1 kg, dry mass 0.99418 kg, water content 0.00585407
- steel, low-alloyed, hot rolled: 7.67997e8 kg; lognormal variance with pedigree 0.182, pedigree (1,1,5,5,1)
  EcoSpold01Location=RER
  own assumption, includes lifetime
  properties: dry mass 1 kg, wet mass 1 kg, carbon content, fossil 0.005
  note on carbon content, fossil: Low alloyed steel composition given in Tab. 3.2 ecoinvent v2.2 report 10_partII. Steel assumed to have a C content of 0.5%
- cement, Portland: 0 kg; pedigree (1,1,1,1,1)
  EcoSpold01Location=CH
  own assumption, includes lifetime
  properties: dry mass 1 kg, wet mass 1 kg
- reinforcing steel: 1.70999e8 kg; lognormal variance with pedigree 0.182, pedigree (1,1,5,5,1)
  EcoSpold01Location=RER
  own assumption, includes lifetime
  properties: dry mass 1 kg, wet mass 1 kg, carbon content, fossil 0.004
- steel, chromium steel 18/8, hot rolled: 1.91999e8 kg; lognormal variance with pedigree 0.112, pedigree (1,1,5,5,1)
  own assumption, includes lifetime
  EcoSpold01Location=RER
  properties: carbon content, fossil 0.0008, dry mass 1 kg, wet mass 1 kg
  note on carbon content, fossil: Stainless steel model is the grade 304 steel (18/8 stainless, 18% chromium 8% nickel; max. 0.08% C)
- excavation, hydraulic digger: 374998 m3; = 1.50E+08*0.01/ apv_rp; lognormal variance with pedigree 0.1712, pedigree (3,5,5,4,5)
  This flow is considered as a regional specificity of Quebec. The flow is scaled using the production volumes (Quebec and GLO) to avoid its accounting of this specificity in the other regions."
- sawnwood, softwood, raw, dried (u=10%): 9349.96 m3; = 3.74E+06*0.01/ apv_rp; lognormal variance with pedigree 0.1712, pedigree (3,5,5,4,5)
  (same comment as for excavation, hydraulic digger)
  properties: water content 0.2, carbon content, non-fossil 0.494, wet mass 540 kg, dry mass 450 kg
- diesel, burned in building machine: 5.14998e9 MJ; lognormal variance with pedigree 0.112, pedigree (1,1,5,5,1)
  own assumption, includes lifetime
  EcoSpold01Location=GLO
- sand: 0 kg; pedigree (1,1,1,1,1)
  (same comment as for excavation, hydraulic digger)
  properties: dry mass 1 kg, wet mass 1 kg
- explosive, tovex: 4.86998e7 kg; lognormal variance with pedigree 0.212, pedigree (1,1,5,5,1)
  EcoSpold01Location=CH
  own assumption, includes lifetime
  properties: carbon content, fossil 0.0483756, dry mass 0.92 kg, wet mass 1 kg, water content 0.0869565
  note on carbon content, fossil: Composition in Tab 4.1, ecoinvent v2.2 report n 7-part XVIII. 23% of wet mass consists of CH6N2O3
- copper: 123499 kg; = 4.94E+07 *0.01/ apv_rp; lognormal variance with pedigree 0.1712, pedigree (3,5,5,4,5)
  (same comment as for excavation, hydraulic digger)
  properties: dry mass 1 kg, wet mass 1 kg
- gravel, round: 7.79996e10 kg; lognormal variance with pedigree 0.142, pedigree (1,1,5,5,1)
  EcoSpold01Location=CH
  own assumption, includes lifetime
  properties: dry mass 1 kg, wet mass 1 kg
- scrap copper: -123499 kg; name scrapCopper; = (4.94E+07 *0.01/ apv_rp )*-1; lognormal variance with pedigree 0.1712, pedigree (3,5,5,4,5)
  (same comment as for excavation, hydraulic digger)
  production volume 247000 kg; = scrapCopper*apv_RP/amountRP
    Calculated from production volume of reference product using the relative outputs.
  property price 0 EUR2005; name scrapCopper_price_EUR2005
  properties: wet mass 1 kg, dry mass 1 kg
- tap water: 0 kg; name tap_water_input; pedigree (1,1,1,1,1)
  Estimation. For 1 m3 of concrete 0.8 m3 of gravel, 0.127 m3 of water and 0.073 m3 of cement are mixed. This corresponds to 127 kg of water or 1.63 g water per kWh. The total water consumption for one hydro power plant unit (i.e. to represent the Swiss generation system) is 4.95. 10^9 kg/unit.
  Estimation. For 1 m3 of concrete 0.8 m3 of gravel, 0.127 m3 of water and 0.073 m3 of cement are mixed. This corresponds to 127 kg of water or 1.63 g water per kWh. The total water consumption for one hydro power plant unit (i.e. to represent the Swiss generation system) is 4.95. 10^9 kg/unit.
  EcoSpold01Location=RER
  properties: dry mass 0.000337476 kg, water content 2962.17, carbon content, fossil 0.00178991, wet mass 1 kg
  note on carbon content, fossil: Bicarbonate content is 2.93 mol/m3. CO2 content is 0.1 mol/m3 (ecoinvent v2.2 report 8, Tab 93.1).
- electricity, medium voltage: 0 kWh; pedigree (1,1,1,1,1)
  own assumption, includes lifetime
  EcoSpold01Location=CH
- scrap steel: -6.31997e6 kg; name scrapSteel; = (2.528E+09 *0.01/ apv_rp )*-1; lognormal variance with pedigree 0.1712, pedigree (3,5,5,4,5)
  (same comment as for excavation, hydraulic digger)
  production volume 1.264e7 kg; = scrapSteel*apv_RP/amountRP
    Calculated from production volume of reference product using the relative outputs.
  property price 0 EUR2005; name scrapSteel_price_EUR2005
  properties: wet mass 1 kg, dry mass 1 kg
- waste reinforced concrete: -6.03072e9, -8.60689e10 kg (2 entries); lognormal variance with pedigree 0.142, pedigree (1,1,5,5,1)
  EcoSpold01Location=CH
  own assumption, includes lifetime
  production volume 2.763e11 kg
- cement, Portland: 9.1538e8, 2.9517e7, 5.11563e7, 4.19631e7, 8.84424e8, 1.02416e9, 6.02336e9 kg (7 entries); lognormal variance with pedigree 0.142, pedigree (1,1,5,5,1)
  EcoSpold01Location=CH
  own assumption, includes lifetime
- sand: 721767, 1.39028e8 kg (2 entries); lognormal variance with pedigree 0.1712, pedigree (3,5,5,4,5)
  (same comment as for excavation, hydraulic digger)
- tap water: 4.63054e7, 9.21183e6, 1.98078e9, 2.32286e8, 6.04286e6, 1.71888e7, 2.65817e9 kg (7 entries); lognormal variance with pedigree 0.142, pedigree (1,1,5,5,1)
  (same comment as for tap water)
- electricity, medium voltage: 3.81566e7, 6.94289e6, 1.60262e8, 5.45444e8, 1.17741e8, 1.70712e9, 2.44321e8 kWh (7 entries); lognormal variance with pedigree 0.182, pedigree (1,1,5,5,1)
  own assumption, includes lifetime
  EcoSpold01Location=CH

## Emissions to nature
- Water [air, unspecified]: 742497 m3; name water_to_air_unspecified; lognormal variance with pedigree 0.0827, pedigree (2,2,5,5,1)
  Calculated value based on literature values and expert opinion. See comments in the parametres' comment field.
  property fraction, origin: salt water 0; name fraction_origin_salt_water
  property fraction, origin: fresh water 1; name fraction_origin_fresh_water
  property fraction, origin: unspecified 0; name fraction_origin_unspecified
- Particulates, < 2.5 um [air, non-urban air or from high stacks]: 2.46999e6 kg; lognormal variance with pedigree 0.572, pedigree (1,1,5,5,1)
  own assumption, includes lifetime
- Particulates, > 10 um [air, non-urban air or from high stacks]: 2.56999e7 kg; lognormal variance with pedigree 0.402, pedigree (1,1,5,5,1)
  own assumption, includes lifetime
- Water [water, unspecified]: 4.20748e6 m3; name water_to_water_unspecified; lognormal variance with pedigree 0.0827, pedigree (2,2,5,5,1)
  (same comment as for Water)
  property wet mass 1000 kg; name WM
  property carbon content, non-fossil 0; name C_content_non_fossil
  property carbon content, fossil 0; name C_content_fossil
  property water in wet mass 1000 kg; name WWM
  property dry mass 0 kg; name DM
  property fraction, origin: unspecified 0; name fraction_origin_unspecified_Ww
  property fraction, origin: salt water 0; name fraction_origin_salt_water_Ww
  property fraction, origin: fresh water 1; name fraction_origin_fresh_water_Ww
- Particulates, > 2.5 um, and < 10um [air, non-urban air or from high stacks]: 1.01e7 kg; lognormal variance with pedigree 0.342, pedigree (1,1,5,5,1)
  own assumption, includes lifetime

## Sampling procedure
literature

## Extrapolations
none This dataset has been copied from an original dataset covering the geography CH. The uncertainty has been adjusted accordingly.

## Review by Christian Bauer 2014-01-05
This dataset was thoroughfully reviewed and complies with the Data Quality Guidelines.

## Review by Christian Bauer 2009-02-24
Passed.
