# sulfuric acid production

Dataset: EcoSpold 2, unit process
Geography: RER
Time period: 2001-01-01 to 2019-12-31
Technology level: current
Classification: ISIC rev.4 ecoinvent: 2011:Manufacture of basic chemicals
Synonyms: Oil of vitriol; Battery acid; Sulphuric acid; Dipping acid; Dihydrogen sulfate
Scenario: Business-as-Usual
System model: Allocation at the point of substitution
Generated by: Maggie Osses
Published in: Althaus H.-J. 2007
Database: ecoinvent
isCopyrightProtected: true
accessRestrictedTo: 1

## General comment
This dataset represents the production of 1 kg of sulfuric acid. Sulfuric acid is a colorless to yellow, oily, dense liquid with a sharp, acrid odor.
Sulfuric acid is used in nearly all industrial sectors and is a vital commodity in any national economy. Most of its uses are actually indirect, in that the sulfuric acid is used as a reagent rather than an ingredient. The largest single sulfuric acid consumer by far is the fertilizer industry. There, sulfuric acid is used with phosphate rock in the manufacture of phosphate fertilizers and smaller amounts are also used in the production of ammonium and potassium sulfate. Substantial quantities are used as an acidic dehydrating agent in organical chemical and petrochemical processes, as well as in oil refining. In the metal processing industry, sulfuric acid is used for pickling and descaling steel; for the extraction of copper, uranium and vanadium from ores; and in non-ferrous metal purification and plating. In the inorganic chemical industry, it is used most notably in the production of titanium dioxide.
Certain wood pulping processes for paper also require sulfuric acid, as do some textile and fiber processes (such as rayon and cellulose manufacture) and leather tanning. Other end uses for sulfuric acid include effluent/water treatment, plasticisers, dyestuffs, explosives, silicate for toothpaste, adhesives, rubbers, edible oils, lubricants and the manufacture of food acids such as citric acid and lactic acid. Probably the largest use of sulfuric acid in which this chemical becomes incorporated into the final product is in organic sulphonation processes, particularly for the production of detergents. Many pharmaceuticals are also made by sulphonation processes.
In Western Europe sulfuric acid is exclusively produced by the contact process and therefore this is the production process that is considered in this dataset. The most relevant contact processes are the elemental sulfur burning and the smelter gas burning with production shares of 50% and 35% respectively. Pyrites roasting and spent acid regeneration are of less importance, representing 8.5% and 5.5% respectively of the total production. Since sulfuric acid obtained from smelter gas burning can be considered a byproduct from the processing of sulfide ores (other than pyrites), for this study it is considered that the sulfuric acid produced by this process is obtained without any environmental burdens. Consequently, in order to subtract the contribution of the smelter gas burning process to the overall average, all the values for the inputs and outputs of the other processes were multiplied by 0.65 before being entered into the dataset.
This dataset is based on literature containing information from the industry.
References:
Althaus H.-J., Chudacoff M., Hischier R., Jungbluth N., Osses M. and Primas A. (2007) Life Cycle Inventories of Chemicals. ecoinvent report No. 8, v2.0. EMPA Dübendorf, Swiss Centre for Life Cycle Inventories, Dübendorf, CH.

## Included activities start
The activity starts when the raw materials enter the process.

## Included activities end
This activity ends with the production of sulfuric acid. The dataset includes the obtention of SO2-containing gas (by means of oxidation of the sulfur-containing raw materials: elemental sulfur, pyrites, other sulfide ores or spent acids). It includes also the conversion of SO2 to SO3 and the absorption of SO3 into solution (sulfuric acid in water) to yield sulfuric acid. The dataset also includes the consumption of auxiliaries, energy, infrastructure and land use. The generation of solid wastes and emissions into air and water and wastes are included as well. No byproducts or coproducts are considered.

## Geography
European average values.

## Technology
Part of the data sources consider the average technology used in European sulfuric acid production plants. The others consider the state-of-the-art technology in Europe.

## Time period
Values based on literature using data from unknown date, and reports with data from 1990 to 2000 approximately.

## Parameters
- fraction, process water, to air: 0.205 dimensionless; name fraction_PW_to_air; lognormal variance with pedigree 0.092025, pedigree (4,4,3,2,4)
  Literature value (Statistics Canada, 2007 & Shaffer, K.H., 2008, Consumptive water use in the Great Lakes Basin, USGS) (Vionnet, S., Quantis Water Database - Technical Report, 2012).
- fraction, cooling water, once-through system, to air: 0.004; name fraction_CW_OT_to_air; lognormal variance with pedigree 0.0413, pedigree (2,3,1,3,1)
  Calculated based on literature value (Scown, C.D., 2011, Water Footprint of U.S. Transportation Fuels and supplying information of the article) (Vionnet, S., Quantis Water Database - Technical Report, 2012).
- fraction, cooling water, cooling pond system, to air: 0.032; name fraction_CW_CP_to_air; lognormal variance with pedigree 0.0413, pedigree (2,3,1,3,1)
  (same comment as for fraction, cooling water, once-through system, to air)
- fraction, cooling water, to air: 0.3875; name fraction_CW_to_air; = (0.5*fraction_CW_OT_to_air)+(0.5*fraction_CW_R_to_air); lognormal variance with pedigree 0.092025, pedigree (4,4,3,2,4)
  Calculated value based on literature value (see comments of the other parametres present in this dataset) and expert opinion. In the case when no industry/literature data are available about the type of cooling or directly fraction, cooling water, to air specific for the process a default assumption is applied. It is assumed that the once-through cooling system is used in 50% of all cases and recirculating system is used in another 50% of all cases.
- fraction, cooling water, recirculating system, to air: 0.771; name fraction_CW_R_to_air; lognormal variance with pedigree 0.0413, pedigree (2,3,1,3,1)
  (same comment as for fraction, cooling water, once-through system, to air)

## Reference product
- sulfuric acid: 1 kg; name RP; CPC 34231: Chemical elements n.e.c.; inorganic acids except phosphoric, nitric and sulphonitric; inorganic oxygen compoun[…]; By-product classification allocatable product
  Sulfuric acid is a colorless to yellow, oily, dense liquid with a sharp, acrid odor.
  Sulfuric acid is used in nearly all industrial sectors and is a vital commodity in any national economy. Most of its uses are actually indirect, in that the sulfuric acid is used as a reagent rather than an ingredient. The largest single sulfuric acid consumer by far is the fertilizer industry. There, sulfuric acid is used with phosphate rock in the manufacture of phosphate fertilizers and smaller amounts are also used in the production of ammonium and potassium sulfate. Substantial quantities are used as an acidic dehydrating agent in organical chemical and petrochemical processes, as well as in oil refining. In the metal processing industry, sulfuric acid is used for pickling and descaling steel; for the extraction of copper, uranium and vanadium from ores; and in non-ferrous metal purification and plating. In the inorganic chemical industry, it is used most notably in the production of titanium dioxide.
  Certain wood pulping processes for paper also require sulfuric acid, as do some textile and fiber processes (such as rayon and cellulose manufacture) and leather tanning. Other end uses for sulfuric acid include effluent/water treatment, plasticisers, dyestuffs, explosives, silicate for toothpaste, adhesives, rubbers, edible oils, lubricants and the manufacture of food acids such as citric acid and lactic acid. Probably the largest use of sulfuric acid in which this chemical becomes incorporated into the final product is in organic sulphonation processes, particularly for the production of detergents. Many pharmaceuticals are also made by sulphonation processes.
  production volume 2.33044e10 kg; name RP_PV
    Unknown
    Source: http://pubs.acs.org/cen/coverstory/84/8428factsandfigures.html (Chemical & Engineering News, 2006 vol 84). Original data as SO3, therefore multiplied by 1.225
  property price 0.031 EUR2005
    Temporary price data. Calculated as 90% of purchasers price based on: 2004 Import/Export data (total trades (USD) divided by total weight (kg) in EU27, USA, China, Japan and India) from UN Commodity Trade Statistics Database (http://data.un.org/Explorer.aspxDatabase [Accessed 2 July 2010]). Commodity: 'Sulphuric acid, oleum'
  property carbon content 0
    carbon content on a dry matter basis (reserved; not for manual entry)
  properties: wet mass 1 kg, dry mass 1 kg, carbon content, non-fossil 0, water content 0, water in wet mass 0 kg, carbon content, fossil 0, carbon allocation 0 kg

## Inputs from technosphere
- chemical factory, organics: 2.6e-10 unit; lognormal variance with pedigree 0.349225, pedigree (2,3,5,2,3)
  Calculated based on literature data published by the industry. For this activity, no information was readily available concerning infrastructure and land-use. Therefore, the infrastructure is estimated based on data from two chemical factories, the BASF site of Ludwigshafen and the chemical factory in Gendorf (which are both located in Germany), which produce a wide range of chemical substances. Based on this data, the following assumptions are made: the built area amounts to about 4.2 ha, the plant has an average output of 50'000 t/a and a lifespan of fifty years. The estimated infrastructure amount is therefore 4.00 E-10 units per kg of produced chemical. Additional assumptions were made in the case of this dataset.
  References:
  Althaus H.-J., Chudacoff M., Hischier R., Jungbluth N., Osses M. and Primas A. (2007) Life Cycle Inventories of Chemicals. ecoinvent report No. 8, v2.0. EMPA Dübendorf, Swiss Centre for Life Cycle Inventories, Dübendorf, CH.
  Gendorf (2000) Umwelterklärung 2000, Werk Gendorf. Werk Gendorf, Burgkirchen.
- sulfur: 0.214 kg; lognormal variance with pedigree 0.07, pedigree (3,1,5,1,3)
  Data from survey in literature (ESA-EFMA 2000)
  Uncertainty: D
  properties: wet mass 1 kg, dry mass 1 kg
- municipal solid waste: -0.000995 kg; name BP_municipal_solid_waste; lognormal variance with pedigree 0.07, pedigree (3,1,5,1,3)
  Data from survey in literature (ESA-EFMA 2000)
  Uncertainty: D
  production volume 2.31879e7 kg; = RP_PV*BP_municipal_solid_waste/ABS(RP)
    Calculated from the production volume of sulfuric acid in proportion to the respective output amounts.
  properties: wet mass 1 kg, water content 0.297017, carbon content, fossil 0.171549, carbon content, non-fossil 0.261655, dry mass 0.771 kg
  note on carbon content, fossil: MSW composition in tab 4.1, ecoinvent v2.2 report 13_I. C content referred to 1 kg DM
- electricity, medium voltage: 0.0175 kWh; lognormal variance with pedigree 0.0702, pedigree (3,2,5,3,3)
  Data from survey in literature (Patyk 1997)
  Uncertainty: D
- diesel: 7.44e-5 kg; lognormal variance with pedigree 0.0702, pedigree (3,2,5,3,3)
  Data from survey in literature (Patyk 1997)
  Uncertainty: D
  properties: wet mass 1 kg, dry mass 1 kg, carbon content, fossil 0.865
  note on carbon content, fossil: C-content of diesel is 86.5% (ecoinvent v2.2 report 6_IV, Tab 3.14)

## Inputs from nature
- Water, cooling, unspecified natural origin [natural resource, in water]: 0.066 m3; name water_cooling_UNO_input; source Byers, W. 2003; lognormal variance with pedigree 0.0513, pedigree (2,3,5,3,1)
  Calculated based on literature, (Vionnet, S., Quantis Water Database - Technical Report, 2012).
  property water content 9081.65; name water_content
  property water in wet mass 999.89 kg; name WWM
  property wet mass 1000 kg; name WM
  property dry mass 0.1101 kg; name DM
  property carbon content, non-fossil 0; name C_content_non_fossil
  property carbon content, fossil 0.0104329; name C_content_fossil
- Water, unspecified natural origin [natural resource, in water]: 0.0004 m3; name water_UNO_input; source Byers, W. 2003; lognormal variance with pedigree 0.052625, pedigree (3,3,5,2,1)
  Data from survey in literature (KCL 2002)
  Calculated based on literature, (Vionnet, S., Quantis Water Database - Technical Report, 2012).
  Uncertainty: D

## Emissions to nature
- Particulates, < 2.5 um [air, urban air close to ground]: 2.27e-7 kg; lognormal variance with pedigree 0.3702, pedigree (3,2,5,3,3)
  Data from survey in literature (Patyk 1997)
  Uncertainty: D
- Nitrogen oxides [air, urban air close to ground]: 0.000487 kg; lognormal variance with pedigree 0.0927, pedigree (2,4,5,3,1)
  Data from survey in literature (Habersatter 1998)
  Uncertainty: D
- Water [water, unspecified]: 0.040743 m3; = water_cooling_UNO_input*(1-fraction_CW_to_air)+water_UNO_input*(1-fraction_PW_to_air); lognormal variance with pedigree 0.0807, pedigree (2,2,5,1,1)
  Calculated as a fraction of the input of water. For more details, refer to the mathematical relation and the parameters.
  property fraction, origin: salt water 0; name fraction_origin_salt_water_Ww
  property fraction, origin: unspecified 1; name fraction_origin_unspecified_Ww
  property fraction, origin: fresh water 0; name fraction_origin_fresh_water_Ww
- Hydrogen chloride [air, urban air close to ground]: 1.3e-9 kg; lognormal variance with pedigree 0.1102, pedigree (3,2,5,3,3)
  Data from survey in literature (Patyk 1997)
  Uncertainty: D
- Water [air, unspecified]: 0.025657 m3; = (water_cooling_UNO_input*fraction_CW_to_air)+(water_UNO_input*fraction_PW_to_air); lognormal variance with pedigree 0.0807, pedigree (2,2,5,1,1)
  (same comment as for Water)
  property fraction, origin: fresh water 0; name fraction_origin_fresh_water
  property fraction, origin: salt water 0; name fraction_origin_salt_water
  property fraction, origin: unspecified 1; name fraction_origin_unspecified
- Dissolved solids [water, surface water]: 0.000975 kg; lognormal variance with pedigree 0.0927, pedigree (2,4,5,3,1)
  Data from survey in literature (Habersatter 1998)
  Uncertainty: D
- Suspended solids, unspecified [water, surface water]: 0.000975 kg; lognormal variance with pedigree 0.0927, pedigree (2,4,5,3,1)
  Data from survey in literature (Habersatter 1998)
  Uncertainty: D
- Ammonia [air, urban air close to ground]: 8.45e-9 kg; lognormal variance with pedigree 0.1102, pedigree (3,2,5,3,3)
  Data from survey in literature (Patyk 1997)
  Uncertainty: D
- Sulfur dioxide [air, urban air close to ground]: 0.0059 kg; lognormal variance with pedigree 0.0622, pedigree (3,2,5,3,1)
  Data from survey in literature (EMEP CORINAIR 2001)
  Uncertainty: D
- Sulfate [water, surface water]: 0.000385 kg; lognormal variance with pedigree 0.0913, pedigree (2,3,5,3,1)
  Data from survey in literature (KCL 2002)
  Uncertainty: D
- Sulfate [air, urban air close to ground]: 0.00421 kg; lognormal variance with pedigree 0.11, pedigree (3,1,5,1,3)
  Data from survey in literature (ESA-EFMA 2000)
  Uncertainty: D

## Sampling procedure
Literature data.

## Extrapolations
This dataset has been extrapolated from year 2001 to the year of the calculation (2019). The uncertainty has been adjusted accordingly.

## Review by Gregor Wernet 2017-08-04
This dataset was additionally reviewed in a separate review process by Eric Johnson of Atlantic Consulting as well as Emilia Moreno Ruiz and Gregor Wernet of ecoinvent.
