# water production, ultrapure

Dataset: EcoSpold 2, unit process
Geography: RER
Time period: 2009-01-01 to 2019-12-31
Technology level: current
Classification: ISIC rev.4 ecoinvent: 3600:Water collection, treatment and supply
Classification: EcoSpold01Categories: water supply/production
Synonyms: UPW
Scenario: Business-as-Usual
System model: Allocation at the point of substitution
Generated by: Laura Rubio
Published in: Gmünder S. 2017
Database: ecoinvent
isCopyrightProtected: false
accessRestrictedTo: 1

## General comment
This dataset represents the production of ultrapure water (UPW) by electrodeionization.

This dataset is a copy of the GLO ultrapure water production dataset.

Typical UPW systems contain three main processes: a pre-treatment stage, primary stage and polishing stage.This technology is mostly used in the semiconductor industry, pharmaceuticals and power generations, highlighting the fact that water is treated to the highest level of purify for all contaminant. Data concerning raw materials, energy consumption and infrastructure are based on an LCA study. Emissions are calculated from the input properties.

## Included activities start
From the consumption of tap water at the factory as a starting material.

## Included activities end
This activity ends with the production of ultrapure water. The system includes the process with consumption of raw materials, energy, and infrastructure, as well as the generation of emissions to air and water. Storage and transportation of the final product are not included. The emissions into water are assumed to be emitted into rivers.

## Geography
This dataset is a copy of the GLO ultrapure water production dataset.
The inventory is modelled from a LCA study in Singapore to the rest of the world.

## Technology
Ultrapurification of water can be carried out by different processes: ion exchange resins, mixed bed ion exchangers, homogeneous beds, membranes (reverse osmosis, ultrafiltration and nanofiltration) and electrodeionization. In this dataset, the technology used is electrodeionization combined with some pre and post treatments as described below. Tap water is pressurized through a semi-permeable membrane by high capacity pumps where only clean water is passed through, leaving impurities to be flushed away. High Efficiency Reverse Osmosis (HERO) system has high rejection of TOC and Boron that makes it 95% efficient. This is the stage where most of the electrical power is utilized. Then water is passed through UV light to remove TOC further. Thereafter, water is passed through a membrane to virtually remove CO2 and O2. The N2 is used as a sweeping gas to mix with other gases before going to exhaust. Subsequently water passes through a membrane electrically to separate the anion and cation, leaving product water to pass through and rejecting NaCl. This process is enhanced by a mixed bed to further remove the TDS and silica. The resistivity of the water is monitored to change the exhausted resins. Finally, water is filtered by a 0.2-micron cartridge filter and then 0.04-micron cartridge filter before being sent to the point of use.
Supandy, M. (2009). Life cycle assessment of ultra pure water plant in semiconductor industry. Retrieved from https://eprints.usq.edu.au/8438/1/Supandy_2009.pdf
Electrodeionization (EDI) is a relatively new separation technology that has found commercial application since the mid 1980s. EDI combines mixed-bed ion exchange with electrochemistry to split a feed stream into a product and concentrate stream.
The EDI unit works by placing a mixed-bed ion exchange resin between two special membranes that allow the migration of only cations or anions. Several mixed bed resin/membrane layers are placed between an anode and cathode, a direct current is applied between both electrodes. The influent is then passed through the mixed bed, where the cations migrate to the cathode through the cation membrane into the cation concentrate stream, while the anions migrate to the anode through the anion membrane into the anion concentrate stream. The concentrates are collected and led to the discharge effluent. Water is also electrolytically spit into H+ and OH– ions, thus providing a simultaneous regeneration mechanism for the cation and anion resin that does not require chemicals.
Electrodeionization units have several advantages; such as continuous operation without regeneration, no regeneration chemicals, and relatively small power requirements. Disadvantages of EDI units were initially high capital costs, mechanical/electrical complications, low flow rates, and susceptibility to fouling. Current EDI technology has equalized the capital costs to that of a mixed-bed, and flow capacity has been increased to be comparable to mixed-bed ion exchange columns for some applications.
Hussey, D., Foutch, G., Ward, M.: Water, ultrapure. Published online: 2002. In: Ullmann's Encyclopedia of Industrial Chemistry, Seventh Edition, 2004 Electronic Release (ed. Fiedler E., Grossmann G., Kersebohm D., Weiss G. and Witte C.). 7 th Electronic Release Edition. Wiley InterScience, New York, Online-Version under: http://www.mrw.interscience.wiley.com/emrw/9783527306732/home

## Time period
The time period is set from 2009 to the year 2017 as it is considered to be a period in which ultrapure treatment plants have not passed through drastic electrodeionization (EDI) technological changes.

## Reference product
- water, ultrapure: 1 kg; name UPW_output; CPC 34: Basic chemicals; By-product classification allocatable product; CAS 7732-18-5
  Water is an integral part of several "high-tech" manufacturing and processing industries. With severe processing requirements come stringent demands on all the raw materials and manufacturing components, included process water. Ultrapure water (UPW) is essentially a "high-tech" material as well. Consequently, significant technological efforts and expense are devoted to purifying water to severe standards.
  Ultrapure water is produced in a series of separation units, the final step processing being primarily mixed-bed ion exchange (MBIE). MBIE is preceded by a range of stages where salts, biological contaminants, organic chemicals (usually collectively referred to as total organic carbon, or TOC), and dissolved gases are removed. These technologies include membrane processes (ultrafiltration, reverse osmosis RO, and pervaporation), adsorption typically on activated carbon for TOC and chlorine removal), disinfection e.g., by UV-light, degasification, or - most usually - a combination of these.
  Standards for ultrapure water vary among industries, but UPW is typically defined as having electrolytic conductivity less than 0.1 µS/cm. For comparison, the theoretical conductivity of pure water is 0.054 µS/cm at 25 °C. To be classified as ultrapure water, the ionic concentration must be less than 20 µg/L (industry often uses parts per billion, ppb NaCl or CaCO3 equivalent). The NaCl/CaCO3 equivalent of a specific ion is calculated by multiplying the actual concentration by the ratio of the ion equivalent weight and NaCl or CaCO3 equivalent weights.
  Industries that require ultrapure water include:
  Power generation
  Steam cycle water chemistry is critical to sustained operation of nuclear and coal-fired power plants. Ultrapure water processing occurs in three major areas of the plant production of make-up water, condensate polishing, and reactor water clean-up. Each of these applications has specific requirements for water quality and uses a range of different processes to achieve these requirements, including deep-bed ion exchange, powdered resin ion exchange, degasification and reverse osmosis.
  Specialty materials processing
  As the technology in the area of advanced materials becomes more and more complex, the purity of chemicals involved with their production and processing must also increase. Requirements for ultrapure water in the microchip and microelectronics industry are even more severe than for electrical power companies since contaminants, both ionic and particulate materials can effectively destroy microchip surfaces.
  Biomedical and life science applications
  The primary pharmaceutical applications for ultrapure water processing are: water for injection (WFI) and manufacturing of medicines. The separation requirements for pharmaceuticals are aimed at eliminating pyrogens (low molecular mass organic molecules - typical of membrane decay due to microbial decay that can cause fever. In addition, ultrapure water is used extensively as a diluent for dialysis. Another life science application of ion exchange includes water reuse on space missions.
  Boiler feed water purification
  Ultrapure water is also required as boiler feed water in chemical plants, such as ethylene and ammonia production. High purity water is also needed by the pulp and paper plants.
  EcoSpold01Location=GLO
  production volume 1.78539e12 kg; name UPW_PV; = 1.78539E+14*0.01
    Estimated value based on the total industrial water withdrawal according to AQUASTAT and assuming that 1% of the industrial water withdrawal is used for ultrapure water production.
    Source for industrial water withdrawals: Table 7.1 in World Water Assessment Programme. 2009. The United Nations World Water Development Report 3: Water in a Changing World. Paris: UNESCO, and London: Earthscan.
    Industrial water withdrawals value was taken from the AQUASTAT (FAO's global water information system, developed by the Land and Water Division and the most quoted source on global water statistics). This value comprises industrial water withdrawal which can include water from primary renewable and secondary freshwater resources, as well as water from over-abstraction of renewable groundwater or withdrawal from fossil groundwater, direct use of agricultural drainage water, direct use of (treated) wastewater, and desalinated water. This sector refers to self-supplied industries not connected to the public distribution network. The ratio between net consumption and withdrawal is estimated at less than 5%. It includes water for the cooling of thermoelectric and nuclear power plants, but it does not include hydropower. Water withdrawn by industries that are connected to the public supply network is generally included in municipal water withdrawal.
  property price 0.47 EUR2005
    Value retrieved from http://www.chemicals.co.uk/ultrapure-water, accessed 20160126. Reported purchaser's price of 333 pounds for 1000L
  property carbon content 0
    carbon content on a dry matter basis (reserved; not for manual entry)
  property true value 0.47; name UPW_output_true_value
    allocation property applied in "true value" allocation // value calculated from revenue
  properties: dry mass 0 kg, carbon content, fossil 0, carbon content, non-fossil 0, water in wet mass 1 kg, wet mass 1 kg, carbon allocation 0 kg

## By-products
- electricity, for reuse in municipal waste incineration only: 0 kWh; CPC 17100: Electrical energy; By-product classification allocatable product; pedigree (1,1,1,1,1)
  Net electricity generated from this waste and used in internal MSWI plant energy redistribution.
  Uncertainty: uncertainty is calculated from uncertainties in waste composition and uncertainties in energy efficiency and the uncertainty in internal energy demand
  production volume 1.84255e7 kWh
  property exergy 3.6 MJ; name E_el_prod_MSWI_exergy
    This exergy property is based on the exergy content of the product.
  property true value relation 3.6; name E_el_prod_MSWI_true_value_relation
    property to calculate "true value" from
  property price 0.1 EUR2005; name E_el_prod_MSWI_price_EUR2005
    Estimated to be the same price as in case of electricity, medium voltage.
  property true value 1.32597e-6
    allocation property applied in "true value" allocation // value calculated from true value relation
- heat, for reuse in municipal waste incineration only: 0 MJ; CPC 17300: Steam and hot water; By-product classification allocatable product; pedigree (1,1,1,1,1)
  Net useful heat generated from this waste and used in internal MSWI plant energy redistribution.
  Uncertainty: uncertainty is calculated from uncertainties in waste composition and uncertainties in energy efficiency and the uncertainty in internal energy demand
  production volume 1.30358e8 MJ
  property true value relation 0.1842; name E_th_prod_MSWI_true_value_relation
    property to calculate "true value" from
  property exergy 0.1842 MJ; name E_th_prod_MSWI_exergy
    This exergy property is based on the exergy content of the product.
  property price 0.0106 EUR2005; name E_th_prod_MSWI_price_EUR2005
    Average European district heat price from Ecoheatcool and Euroheat 2005-2006, Ecoheat Work package 1: The European heat market. Final report. 10.6 EUR/GJ i s the price of district heat. http://www.solarthermalworld.org/files/Ecoheatcool%20WP1%20Web.pdf?download
  property true value 4.79997e-7
    (same comment as for electricity, for reuse in municipal waste incineration only)
- zinc concentrate: 0 kg; CPC 14290: Other non-ferrous metal ores and concentrates (other than uranium or thorium ores and concentrates); By-product classification allocatable product
  Calculated value from the knowledge of the properties of both products.
  production volume 3261.33 kg
  property price 0.38 EUR2005; name ByP_price_EUR2005
    Temporary price data. Calculated as 90% of purchasers price based on: Zinc content in concentrate 53%. Concentrate price per kg Zn 86.5% of refined Zn price (13.5% treatment charges according to CHR Metals Limited 2005: Dynamic cost curves. http://www.minecost.com/dynamic.pdf). 2004 zinc price from USGS (2007) Mineral commodity summaries 2007. <http://minerals.usgs.gov/minerals/pubs/mcs/2007/mcs2007.pdf> [Accessed 25 May 2010]
  property zinc content 0.53; name zinc_C_zinc_concentrate
    Zinc content on a dry matter basis. Value taken from teh "zinc mine operation" /GLO dataset.
  property dry mass 1 kg; name DM_zinc_concentrate
  property carbon content 0
    carbon content on a dry matter basis (reserved; not for manual entry)
  property true value 6.94136e-10
    allocation property applied in "true value" allocation // value calculated from revenue
  properties: wet mass 1 kg, water content 0, carbon content, non-fossil 0, carbon content, fossil 0, water in wet mass 0 kg, carbon allocation 0 kg
- iron scrap, sorted, pressed: 0 kg; By-product classification Recyclable; CPC 39310: Slag, dross, scalings and other waste from the manufacture of iron or steel; pedigree (1,1,1,1,1)
  Iron scrap recovered from this waste.
  production volume 62240.4 kg
  property price 0.175 EUR2005
    Temporary price data. Calculated as 90% of purchasers price based on: 2005 import and export prices (total trades (USD) divided by total weight (kg) in biggest economies of the world: EU27, USA, Brasil, China, India, Japan and Russia) from UN Commodity Trade Statistics Database (http://data.un.org/Explorer.aspxDatabase [Accessed 2011.06.20]). Commodity: Waste or scrap, of cast iron
  property carbon content 0
    carbon content on a dry matter basis (reserved; not for manual entry)
  property true value 1.68835e-10
    allocation property applied in "true value" allocation // value calculated from revenue
  properties: water content 0, water in wet mass 0 kg, carbon content, fossil 0, dry mass 1 kg, carbon content, non-fossil 0, wet mass 1 kg, carbon allocation 0 kg
- copper: 0 kg; source Rentz O. 1999; By-product classification allocatable product; CPC 41413: Refined copper and copper alloys, unwrought; master alloys of copper
  Literature value. Copper uses: Before end-use copper is manufactured into semi fabricated products, such as shapes and ingots (known as 'semis'). These manufacturing processes are subdivided into hot working, cold working and, if necessary, process annealing. Few of the semis are ready for use as such. They more typically travel to first-stage manufacturers, who make metal rods, wire, and casting, and then to component manufacturers who produce such things as motors, valves, and insulated cables The components in turn are incorporated by final-stage manufacturers into a variety of finished products - automobiles, commercial buildings, residential housing, and so forth. These uses account for about 79% of the world-wide consumption of copper.
  production volume 10224.4 kg
  properties: dry mass 1 kg, water in wet mass 0 kg, wet mass 1 kg, carbon content, non-fossil 0, water content 0, price 5.52 EUR2005, carbon content, fossil 0, carbon content 0, carbon allocation 0 kg, true value 1.58057e-8

## Inputs from technosphere
- scrap steel: 0 kg; name scrap_steel; pedigree (1,1,1,1,1)
  Literature value based on Life cycle assessment of ultrapure water plant in semiconductor industry repor t- Supandy, M. (2009). The assesed UPW plant is located at STMicroelectronics Pte Ltd and its plant consisted of primary and polish loop.The lifespan for the infrastructure is assumed to be 10 years. The UPW system is functional during 24h per day and 7 days per week (Supandy, 2009). Retrieved from: https://eprints.usq.edu.au/8438/1/Supandy_2009.pdf.
  production volume 0 kg
    Calculated from production volume of reference product using the relative outputs.
  property price 0 EUR2005; name scrap_steel_price_EUR2005
  properties: dry mass 1 kg, wet mass 1 kg
- metal working, average for steel product manufacturing: 3.13999e-7 kg; = steel; lognormal variance with pedigree 0.312, pedigree (1,4,4,5,1)
  Literature value based on Life cycle assessment of ultrapure water plant in semiconductor industry repor t- Supandy, M. (2009). The assesed UPW plant is located at STMicroelectronics Pte Ltd and its plant consisted of primary and polish loop.The lifespan for the infrastructure is assumed to be 10 years. The UPW system is functional during 24h per day and 7 days per week (Supandy, 2009). Retrieved from: https://eprints.usq.edu.au/8438/1/Supandy_2009.pdf. ;activityLink introduced to establish a direct link to the corresponding regional supply of this product
- scrap copper: 0 kg; name scrap_copper; pedigree (1,1,1,1,1)
  (same comment as for scrap steel)
  production volume 0 kg
    Calculated from production volume of reference product using the relative outputs.
  property price 0 EUR2005; name scrap_copper_price_EUR2005
  properties: dry mass 1 kg, wet mass 1 kg
- ultraviolet lamp: 3.35999e-7 unit; lognormal variance with pedigree 0.0126, pedigree (1,4,4,5,1)
  Literature value based on Life cycle assessment of ultrapure water plant in semiconductor industry repor t- Supandy, M. (2009). The assesed UPW plant is located at STMicroelectronics Pte Ltd and its plant consisted of primary and polish loop. Retrieved from: https://eprints.usq.edu.au/8438/1/Supandy_2009.pdf.
  properties: dry mass 0.382 kg, wet mass 0.382 kg
- tap water: 1.49999 kg; name tap_water_input; lognormal variance with pedigree 0.0362, pedigree (4,5,2,1,1)
  Literature value based on Life cycle assessment of ultrapure water plant in semiconductor industry repor t- Supandy, M. (2009). The assesed UPW plant is located at STMicroelectronics Pte Ltd and its plant consisted of primary and polish loop. Retrieved from: https://eprints.usq.edu.au/8438/1/Supandy_2009.pdf.
  EcoSpold01Location=RER
  Uncertainty: Stoechiometric calculation
  properties: dry mass 0.000337476 kg, carbon content, fossil 0.00178991, wet mass 1 kg, water content 2962.17
  note on carbon content, fossil: Bicarbonate content is 2.93 mol/m3. CO2 content is 0.1 mol/m3 (ecoinvent v2.2 report 8, Tab 93.1).
- ultrafiltration module: 7.77997e-10 unit; lognormal variance with pedigree 0.0126, pedigree (1,4,4,5,1)
  (same comment as for ultraviolet lamp)
  properties: carbon content, fossil 0.58, dry mass 19.83 kg, wet mass 19.83 kg
- seawater reverse osmosis module: 1.82999e-7 m2; lognormal variance with pedigree 0.0126, pedigree (1,4,4,5,1)
  Estimated value based on Life cycle assessment of ultrapure water plant in semiconductor industry repor t- Supandy, M. (2009). The assesed UPW plant is located at STMicroelectronics Pte Ltd and its plant consists of primary and polish loop. This exchange was used as proxy of the original inventory which includes cellulose acetate and polypropylene membranes (2,25E-04 kg and 1,77E-04 kg respectively). Original amounts were added and divided by a wet mass value of 0,4601 kg/m2 to allign them with the required units. This unit process refers to the unit of active membrane surface for reverse osmosis of seawater. Retrieved from: https://eprints.usq.edu.au/8438/1/Supandy_2009.pdf.
  properties: wet mass 0.4601 kg, carbon content, fossil 0.67, dry mass 0.4601 kg
- metal working, average for metal product manufacturing: 4.34998e-8 kg; = cast_iron; lognormal variance with pedigree 0.312, pedigree (1,4,4,5,1)
  (same comment as for metal working, average for steel product manufacturing)
- cast iron: 4.34998e-8 kg; name cast_iron; lognormal variance with pedigree 0.312, pedigree (1,4,4,5,1)
  Literature value based on Life cycle assessment of ultrapure water plant in semiconductor industry repor t- Supandy, M. (2009). The assesed UPW plant is located at STMicroelectronics Pte Ltd and its plant consisted of primary and polish loop. The lifespan for the infrastructure is assumed to be 10 years. The UPW system is functional during 24h per day and 7 days per week (Supandy, 2009). Retrieved from: https://eprints.usq.edu.au/8438/1/Supandy_2009.pdf.
  properties: dry mass 1 kg, wet mass 1 kg, carbon content, fossil 0.04
  note on carbon content, fossil: Cast iron is made by remelting pig iron in small furnaces (e.g. cupola furnaces or electric arc furnaces) and poured into moulds to make castings. It usually contains 2% to 6% carbon (ecoinvent v2.2 report 10_partII). An average content of 4% was considered
- steel, low-alloyed: 3.13999e-7 kg; name steel; lognormal variance with pedigree 0.312, pedigree (1,4,4,5,1)
  (same comment as for scrap steel)
  properties: wet mass 1 kg, carbon content, fossil 0.005, dry mass 1 kg
- copper: 1.21e-8 kg; lognormal variance with pedigree 0.312, pedigree (1,4,4,5,1)
  (same comment as for scrap steel)
  properties: wet mass 1 kg, dry mass 1 kg
- nitrogen, liquid: 6.62529e-6 kg; lognormal variance with pedigree 0.0126, pedigree (1,4,4,5,1)
  Literature value based on the report "Life cycle assessment of ultrapure water plant in semiconductor industry", Supandy, M. (2009). The amount of nitrogen was converted from m3 to kg using the density of N2 at normal pressure and temperature conditions (1.165 kg/m3).
  The assessed UPW plant is located at STMicroelectronics Pte Ltd and its plant consisted of primary and polish loop. Retrieved from: https://eprints.usq.edu.au/8438/1/Supandy_2009.pdf.
  properties: dry mass 1 kg, wet mass 1 kg
- wire drawing, copper: 1.21e-8 kg; = copper; lognormal variance with pedigree 0.312, pedigree (1,4,4,5,1)
  (same comment as for metal working, average for steel product manufacturing)
- electricity, medium voltage: 0.00545998 kWh; lognormal variance with pedigree 0.0126, pedigree (1,4,4,5,1)
  Literature value based on Life cycle assessment of ultrapure water plant in semiconductor industry repor t- Supandy, M. (2009). The assesed UPW plant is located at STMicroelectronics Pte Ltd and its plant consisted of primary and polish loop. Retrieved from: https://eprints.usq.edu.au/8438/1/Supandy_2009.pdf.
  EcoSpold01Location=UCTE
- ion-exchanger for water treatment: 8.88997e-11 unit; lognormal variance with pedigree 0.018, pedigree (1,4,4,5,1)
  EcoSpold01Location=CH
  Literature value based on Life cycle assessment of ultrapure water plant in semiconductor industry repor t- Supandy, M. (2009). The assesed UPW plant is located at STMicroelectronics Pte Ltd and its plant consisted of primary and polish loop. Retrieved from: https://eprints.usq.edu.au/8438/1/Supandy_2009.pdf.
  Uncertainty: Estimation
- waste bulk iron, excluding reinforcement: 0 kg; name scrap_iron; pedigree (1,1,1,1,1)
  (same comment as for scrap steel)
  production volume 0 kg
    Calculated from production volume of reference product using the relative outputs.
  property price 0 EUR2005; name scrap_iron_price_EUR2005
  properties: wet mass 1 kg, dry mass 1 kg
- wastewater, unpolluted: -0.000424998 m3; name water_to_water_unspecified_1; = ((tap_water_input-UPW_output)*0.85/1000)*-1; lognormal variance with pedigree 0.0526, pedigree (2,4,4,5,1)
  Calculated value based on literature values and expert opinion, taken from the pre-existing dataset "water production, ultrapure" (GLO) (accessed on the 2017-11-20) as it was considered adequate also for this dataset. 15% of water lost during production of ultrapure water is considered to be lost to air. The rest (1-0.15=85%) is considered to be released as wastewater, unpolluted.
  production volume 7.58791e8 m3; = UPW_PV* water_to_water_unspecified_1 / UPW_output
    Calculated from production volume of reference product using the relative outputs.
  property price 0 EUR2005; name water_to_water_unspecified_price_EUR2005
  properties: water content 2962.17, wet mass 1000 kg, carbon content, non-fossil 0.00178991, dry mass 0.337476 kg, carbon content, fossil 0.00178991
  note on carbon content, fossil: Assumed to be like in tap water. Bicarbonate content is 2.93 mol/m3. CO2 content is 0.1 mol/m3 (ecoinvent v2.2 report 8, Tab 93.1).
- scrap steel: -3.13602e-7, -3.96471e-10 kg (2 entries); lognormal variance with pedigree 0.312, pedigree (1,4,4,5,1)
  (same comment as for scrap steel)
  production volume 560612 kg
- scrap copper: -1.15577e-8, -5.42262e-10 kg (2 entries); lognormal variance with pedigree 0.312, pedigree (1,4,4,5,1)
  (same comment as for scrap steel)
  production volume 21603.2 kg
- waste bulk iron, excluding reinforcement: -4.23917e-8, -1.10809e-9 kg (2 entries); lognormal variance with pedigree 0.312, pedigree (1,4,4,5,1)
  (same comment as for scrap steel)
  production volume 77664.5 kg

## Emissions to nature
- Nitrate [water, surface water]: 9.29396e-5 kg; lognormal variance with pedigree 0.218, pedigree (4,5,5,5,5)
  The removed ions are calculated based on the difference between the ion concentrations in tap water and ultrapure water, which are given in Table 34.1 in Sutter (2007). The removed ions are calculated as emissions to water.
  Reference:
  Sutter, J. (2007) Life Cycle Inventories of Highly Pure Chemicals. ecoinvent report No. 19. Swiss Centre for Life Cycle Inventories, Dübendorf, 2007
  Uncertainty: Calculated from the removed NO3
- Magnesium [water, surface water]: 3.59999e-5 kg; lognormal variance with pedigree 0.218, pedigree (4,5,5,5,5)
  The removed ions are calculated based on the difference between the ion concentrations in tap water and ultrapure water, which are given in Table 34.1 in Sutter (2007). The removed ions are calculated as emissions to water.
  Reference:
  Sutter, J. (2007) Life Cycle Inventories of Highly Pure Chemicals. ecoinvent report No. 19. Swiss Centre for Life Cycle Inventories, Dübendorf, 2007
  Uncertainty: Calculated from the removed Mg
- Silicon [water, surface water]: 4.05998e-5 kg; lognormal variance with pedigree 0.218, pedigree (4,5,5,5,5)
  The removed ions are calculated based on the difference between the ion concentrations in tap water and ultrapure water, which are given in Table 34.1 in Sutter (2007). The removed ions are calculated as emissions to water.
  Reference:
  Sutter, J. (2007) Life Cycle Inventories of Highly Pure Chemicals. ecoinvent report No. 19. Swiss Centre for Life Cycle Inventories, Dübendorf, 2007
  Uncertainty: Calculated from the removed Si2
- Sulfate [water, surface water]: 1.43899e-5 kg; lognormal variance with pedigree 0.218, pedigree (4,5,5,5,5)
  The removed ions are calculated based on the difference between the ion concentrations in tap water and ultrapure water, which are given in Table 34.1 in Sutter (2007). The removed ions are calculated as emissions to water.
  Reference:
  Sutter, J. (2007) Life Cycle Inventories of Highly Pure Chemicals. ecoinvent report No. 19. Swiss Centre for Life Cycle Inventories, Dübendorf, 2007
  Uncertainty: Calculated from the removed SO4
- Carbon dioxide, fossil [air, urban air close to ground]: 0.0001254 kg; lognormal variance with pedigree 0.019, pedigree (2,2,2,3,3)
  Calculated value from removed carbon, as CO2 emission to air.
  Uncertainty: Calculated from removed carbon
- Chloride [water, surface water]: 4.12498e-5 kg; lognormal variance with pedigree 0.218, pedigree (4,5,5,5,5)
  The removed ions are calculated based on the difference between the ion concentrations in tap water and ultrapure water, which are given in Table 34.1 in Sutter (2007). The removed ions are calculated as emissions to water.
  Reference:
  Sutter, J. (2007) Life Cycle Inventories of Highly Pure Chemicals. ecoinvent report No. 19. Swiss Centre for Life Cycle Inventories, Dübendorf, 2007
  Uncertainty: Calculated from the removed Cl
- Potassium, ion [water, surface water]: 5.84898e-5 kg; lognormal variance with pedigree 0.828, pedigree (4,5,5,5,5)
  The removed ions are calculated based on the difference between the ion concentrations in tap water and ultrapure water, which are given in Table 34.1 in Sutter (2007). The removed ions are calculated as emissions to water.
  Reference:
  Sutter, J. (2007) Life Cycle Inventories of Highly Pure Chemicals. ecoinvent report No. 19. Swiss Centre for Life Cycle Inventories, Dübendorf, 2007
  Uncertainty: Calculated from the removed K
- Phosphate [water, surface water]: 0.000135399 kg; lognormal variance with pedigree 0.218, pedigree (4,5,5,5,5)
  The removed ions are calculated based on the difference between the ion concentrations in tap water and ultrapure water, which are given in Table 34.1 in Sutter (2007). The removed ions are calculated as emissions to water.
  Reference:
  Sutter, J. (2007) Life Cycle Inventories of Highly Pure Chemicals. ecoinvent report No. 19. Swiss Centre for Life Cycle Inventories, Dübendorf, 2007
  Uncertainty: Calculated from the removed PO4
- Sodium, ion [water, surface water]: 3.36599e-5 kg; lognormal variance with pedigree 0.828, pedigree (4,5,5,5,5)
  The removed ions are calculated based on the difference between the ion concentrations in tap water and ultrapure water, which are given in Table 34.1 in Sutter (2007). The removed ions are calculated as emissions to water.
  Reference:
  Sutter, J. (2007) Life Cycle Inventories of Highly Pure Chemicals. ecoinvent report No. 19. Swiss Centre for Life Cycle Inventories, Dübendorf, 2007
  Uncertainty: Calculated from the removed Na
- Calcium, ion [water, surface water]: 5.99298e-5 kg; lognormal variance with pedigree 0.828, pedigree (4,5,5,5,5)
  The removed ions are calculated based on the difference between the ion concentrations in tap water and ultrapure water, which are given in Table 34.1 in Sutter (2007). The removed ions are calculated as emissions to water.
  Reference:
  Sutter, J. (2007) Life Cycle Inventories of Highly Pure Chemicals. ecoinvent report No. 19. Swiss Centre for Life Cycle Inventories, Dübendorf, 2007
  Uncertainty: Calculated from the removed Ca
- Water [air, unspecified]: 7.49997e-5 m3; name water_to_air_unspecified; = (tap_water_input-UPW_output)*0.15/1000; lognormal variance with pedigree 0.0409, pedigree (2,2,2,1,1)
  (same comment as for wastewater, unpolluted)

## Sampling procedure
Literature and estimated values.
Reference: Life cycle assessment of ultrapure water plant in semiconductor industry (Supandy, 2009)

## Extrapolations
This dataset is a copy of the GLO ultrapure water production dataset.

From 1 ultrapure water treatment plant in Singapore to all UPW plants in the World. Data was used for updating chemicals, infrastructure and energy exchanges; while emissions were calculated. The uncertainty has been changed accordingly.
