# treatment of waste polyethylene terephthalate, for recycling, unsorted, sorting

Dataset: EcoSpold 2, unit process
Geography: US
Time period: 2010-01-01 to 2019-12-31
Technology level: current
Classification: ISIC rev.4 ecoinvent: 3811:Collection of non-hazardous waste
Scenario: Business-as-Usual
System model: Allocation at the point of substitution
Generated by: Thomas Kägi
Published in: Franklin Associates 2011
Database: ecoinvent
isCopyrightProtected: true
accessRestrictedTo: 1

## General comment
The functional unit represents the treatment of unsorted waste polyethylene terephthalate, for recycling, yielding 1 kg of sorted waste polyethylene terephthalate, for recycling.
Once the postconsumer PET has been collected, they must be separated from other co-collected materials and plastics. Although some recovered plastic is separated by curbside sorting and the use of separate bins at drop-off recycling centers, sorting and separation of plastics most commonly takes place at material recovery facilities (MRFs). Sorting operations at MRFs range from manual sorting of items on a conveyor to highly automated systems using magnets, air classifiers, optical sorters, and other technologies to sort and separate mixed incoming materials. Postconsumer plastics may be separated and baled as mixed plastics, or the facility may have the capability to further sort down to individual resin bales.

## Included activities start
Service is starting with the receipt of unsorted waste PET

## Included activities end
This module includes all processes of the sorting of waste PET up to the factory gate. Machinery infrastructure is excluded

## Allocation
no allocation involved

## Reference product
- iron scrap, unsorted: 0 kg; name BP_scrap_steel; CPC 39310: Slag, dross, scalings and other waste from the manufacture of iron or steel; By-product classification Recyclable; pedigree (1,1,1,1,1)
  Not included in the original report. Added based on the CH inventory in order to have better consistency.
  The amount and annual production volume for the recyclable by-product output 'iron scrap, sorted' was set to 0 during the review of the database for the release of v3.4. This is a temporary solution to ensure the appropriate point of cut-off for this product within the database. Original amount: 0.00866818950276243
  production volume 7.82391 kg; = ABS(BP_scrap_steel/RP_amount*RP_PV)
    Assumption according to Association of Plastic Recyclers (APR; www.plasticsrecycling.org): 1.5 Mio t of plastic recycling, half of it PET; waste input material (for treatment) and by-product/waste generated scaled accordingly
  property price 0.149 EUR2005
    Temporary price data. Calculated as 90% of purchasers price based on: estimated at 85% of sorted scrap
  property carbon content 0
    carbon content on a dry matter basis (reserved; not for manual entry)
  property true value 1.24348e-9; name BP_scrap_steel_true_value
    allocation property applied in "true value" allocation // value calculated from revenue
  properties: water in wet mass 0 kg, water content 0, dry mass 1 kg, carbon content, fossil 0, carbon content, non-fossil 0, wet mass 1 kg, carbon allocation 0 kg
- waste polyethylene terephthalate, for recycling, unsorted: 0 kg; name RP_amount; CPC 39270: Waste, parings and scrap of plastics; By-product classification Recyclable
  production volume 1.02683e9 kg; name RP_PV
    Assumption according to Association of Plastic Recyclers (APR; www.plasticsrecycling.org): 1.5 Mio t of plastic recycling, half of it PET; ; waste input material (for treatment) and by-product/waste generated scaled accordingly
  property price 0.0315 EUR2005
    Convert from EU 27 price to the world by currency exchange rate.
  property carbon content 0.601
    carbon content on a dry matter basis (reserved; not for manual entry)
  property true value -0.0345016; name RP_amount_true_value
    allocation property applied in "true value" allocation // value calculated from revenue
  properties: dry mass 0.968 kg, wet mass 1 kg, carbon content, fossil 0.601, carbon content, non-fossil 0, water content 0.0330579, water in wet mass 0.032 kg, carbon allocation 0.581768 kg
- waste polyethylene terephthalate, for recycling, sorted: 1 kg; name BP_waste_PET; CPC 39270: Waste, parings and scrap of plastics; By-product classification Recyclable; pedigree (1,1,1,1,1)
  Not included in the original report. Added based on the CH inventory in order to have better consistency.
  production volume 9.375e8 kg; = ABS(BP_waste_PET/RP_amount*RP_PV)
    (same comment as for iron scrap, unsorted)
  property price 0.035 EUR2005
    Convert from EU 27 price to the world by currency exchange rate.
  property carbon content 0.624
    carbon content on a dry matter basis (reserved; not for manual entry)
  property true value 0.035; name BP_waste_PET_true_value
    allocation property applied in "true value" allocation // value calculated from revenue
  properties: carbon content, non-fossil 0, water in wet mass 0.014 kg, carbon content, fossil 0.624, wet mass 1 kg, dry mass 0.986 kg, water content 0.0141988, carbon allocation 0.615264 kg
- electricity, for reuse in municipal waste incineration only: 0 kWh; CPC 17100: Electrical energy; By-product classification allocatable product; pedigree (1,1,1,1,1)
  Net electricity generated from this waste and used in internal MSWI plant energy redistribution.
  Uncertainty: uncertainty is calculated from uncertainties in waste composition and uncertainties in energy efficiency and the uncertainty in internal energy demand
  production volume 2.1841e6 kWh
  property exergy 3.6 MJ; name E_el_prod_MSWI_exergy
    This exergy property is based on the exergy content of the product.
  property true value relation 3.6; name E_el_prod_MSWI_true_value_relation
    property to calculate "true value" from
  property price 0.1 EUR2005; name E_el_prod_MSWI_price_EUR2005
    Estimated to be the same price as in case of electricity, medium voltage.
  property true value 0.000301452
    allocation property applied in "true value" allocation // value calculated from true value relation
- iron scrap, sorted, pressed: 0 kg; By-product classification Recyclable; CPC 39310: Slag, dross, scalings and other waste from the manufacture of iron or steel; pedigree (1,1,1,1,1)
  Iron scrap recovered from this waste.
  Uncertainty: uncertainty calculated from uncertainty in waste composition, uncertainty of share of recyclable metal, uncertainty of transfer coefficient to bottom ash, uncertainty of the efficiency of scrap removal in MSWI plant.
  production volume 274995 kg
  property price 0.175 EUR2005
    Temporary price data. Calculated as 90% of purchasers price based on: 2005 import and export prices (total trades (USD) divided by total weight (kg) in biggest economies of the world: EU27, USA, Brasil, China, India, Japan and Russia) from UN Commodity Trade Statistics Database (http://data.un.org/Explorer.aspxDatabase [Accessed 2011.06.20]). Commodity: Waste or scrap, of cast iron
  property carbon content 0
    carbon content on a dry matter basis (reserved; not for manual entry)
  property true value 5.13325e-5
    allocation property applied in "true value" allocation // value calculated from revenue
  properties: dry mass 1 kg, water content 0, carbon content, non-fossil 0, water in wet mass 0 kg, carbon content, fossil 0, wet mass 1 kg, carbon allocation 0 kg
- heat, for reuse in municipal waste incineration only: 0 MJ; CPC 17300: Steam and hot water; By-product classification allocatable product; pedigree (1,1,1,1,1)
  (same comment as for electricity, for reuse in municipal waste incineration only)
  production volume 1.61338e7 MJ
  property exergy 0.1842 MJ; name E_th_prod_MSWI_exergy
    This exergy property is based on the exergy content of the product.
  property true value relation 0.1842; name E_th_prod_MSWI_true_value_relation
    property to calculate "true value" from
  property price 0.0106 EUR2005; name E_th_prod_MSWI_price_EUR2005
    Average European district heat price from Ecoheatcool and Euroheat 2005-2006, Ecoheat Work package 1: The European heat market. Final report. 10.6 EUR/GJ i s the price of district heat. http://www.solarthermalworld.org/files/Ecoheatcool%20WP1%20Web.pdf?download
  property true value 0.000113938
    (same comment as for electricity, for reuse in municipal waste incineration only)
- aluminium oxide, non-metallurgical: 0 kg; source European Aluminium Association 2008; CPC 41432: Alumina (aluminium oxide), except artificial corundum; By-product classification allocatable product; CAS 1344-28-1; pedigree (1,1,1,1,1)
  production volume 492.329 kg
  property carbon content, non-fossil 0; name C_content_non_fossil
  property price 0.28 EUR2005; name Al2O3Amount_price_EUR2005
    From UN trade database. http://data.un.org/ Import data from the largest economies of the world are used (Brazil, India, USA, China, Japan and EU-27).
  property dry mass 1 kg; name DM
  property water content 0; name water_content
  property wet mass 1 kg; name WM
  property water in wet mass 0 kg; name WWM
  property carbon content, fossil 0; name C_content_fossil
  property carbon content 0
    carbon content on a dry matter basis (reserved; not for manual entry)
  property true value 1.47042e-7
    allocation property applied in "true value" allocation // value calculated from revenue
  properties: carbon allocation 0 kg
- aluminium, cast alloy: 0 kg; source European Aluminium Association 2008; By-product classification allocatable product; CPC 41431: Unwrought aluminium; pedigree (1,1,1,1,1)
  EcoSpold01Location=RER
  production volume 4602.19 kg
  property price 1.3 EUR2005; name castAlloyAmount_price_EUR2005
    Temporary price data. Calculated as 90% of purchasers price based on: Source: London Metal Exchange, Aluminium alloy price for 2005
  property carbon content 0
    carbon content on a dry matter basis (reserved; not for manual entry)
  property true value 6.3817e-6
    allocation property applied in "true value" allocation // value calculated from revenue
  properties: water in wet mass 0 kg, carbon content, non-fossil 0, water content 0, dry mass 1 kg, carbon content, fossil 0, wet mass 1 kg, carbon allocation 0 kg
- aluminium, wrought alloy: 0 kg; source European Aluminium Association 2008; By-product classification allocatable product; CPC 4153: Semi-finished products of aluminium or aluminium alloys; pedigree (1,1,1,1,1)
  production volume 2014.75 kg
  property price 1.44 EUR2005; name secondaryAluminiumOutput_price_EUR2005
    Estimated based on literature values and expert judgement. Aluminium ccast alloys are about 90% of the price of aluminium wrought alloys.
  property carbon content 0
    carbon content on a dry matter basis (reserved; not for manual entry)
  property true value 3.09465e-6
    allocation property applied in "true value" allocation // value calculated from revenue
  properties: wet mass 1 kg, water content 0, carbon content, fossil 0, water in wet mass 0 kg, carbon content, non-fossil 0, dry mass 1 kg, carbon allocation 0 kg
- copper: 0 kg; source Rentz O. 1999; By-product classification allocatable product; CPC 41413: Refined copper and copper alloys, unwrought; master alloys of copper
  Literature value. Copper uses: Before end-use copper is manufactured into semi fabricated products, such as shapes and ingots (known as 'semis'). These manufacturing processes are subdivided into hot working, cold working and, if necessary, process annealing. Few of the semis are ready for use as such. They more typically travel to first-stage manufacturers, who make metal rods, wire, and casting, and then to component manufacturers who produce such things as motors, valves, and insulated cables The components in turn are incorporated by final-stage manufacturers into a variety of finished products - automobiles, commercial buildings, residential housing, and so forth. These uses account for about 79% of the world-wide consumption of copper.
  production volume 8753.11 kg
  property price 5.52 EUR2005
    Literature value (http://www.economist.com/news/business/21576714-mining-industry-has-enriched-chile-its-future-precarious-copper-solution). Average price between 20015 and 2013.
  property carbon content 0
    carbon content on a dry matter basis (reserved; not for manual entry)
  property true value 5.15383e-5
    allocation property applied in "true value" allocation // value calculated from revenue
  properties: dry mass 1 kg, water in wet mass 0 kg, wet mass 1 kg, carbon content, non-fossil 0, water content 0, carbon content, fossil 0, carbon allocation 0 kg
- zinc concentrate: 0 kg; CPC 14290: Other non-ferrous metal ores and concentrates (other than uranium or thorium ores and concentrates); By-product classification allocatable product
  Calculated value from the knowledge of the properties of both products.
  production volume 6.94758e-6 kg
  property price 0.38 EUR2005; name ByP_price_EUR2005
    Temporary price data. Calculated as 90% of purchasers price based on: Zinc content in concentrate 53%. Concentrate price per kg Zn 86.5% of refined Zn price (13.5% treatment charges according to CHR Metals Limited 2005: Dynamic cost curves. http://www.minecost.com/dynamic.pdf). 2004 zinc price from USGS (2007) Mineral commodity summaries 2007. <http://minerals.usgs.gov/minerals/pubs/mcs/2007/mcs2007.pdf> [Accessed 25 May 2010]
  property zinc content 0.53; name zinc_C_zinc_concentrate
    Zinc content on a dry matter basis. Value taken from teh "zinc mine operation" /GLO dataset.
  property dry mass 1 kg; name DM_zinc_concentrate
  property carbon content 0
    carbon content on a dry matter basis (reserved; not for manual entry)
  property true value 2.81609e-15
    allocation property applied in "true value" allocation // value calculated from revenue
  properties: wet mass 1 kg, water content 0, carbon content, non-fossil 0, carbon content, fossil 0, water in wet mass 0 kg, carbon allocation 0 kg

## Inputs from technosphere
- steel, low-alloyed: 0.00853939 kg; lognormal variance with pedigree 0.0647, pedigree (4,5,4,3,4)
  (same comment as for waste polyethylene terephthalate, for recycling, sorted)
  properties: wet mass 1 kg, carbon content, fossil 0.005, dry mass 1 kg
- heat, district or industrial, natural gas: 6.61742e-8 MJ; lognormal variance with pedigree 0.0412, pedigree (2,1,5,1,1)
- wire drawing, steel: 0.00853939 kg; lognormal variance with pedigree 0.0647, pedigree (4,5,4,3,4)
- municipal solid waste: -0.0938741 kg; name BP_MSW; lognormal variance with pedigree 0.0092, pedigree (2,1,4,1,1)
  production volume 8.93344e7 kg; = ABS(BP_MSW/RP_amount*RP_PV)
    (same comment as for iron scrap, unsorted)
  property price 0 EUR2005; name BP_MSW_price_EUR2005
  properties: wet mass 1 kg, carbon content, fossil 0.171549, water content 0.297017, carbon content, non-fossil 0.261655, dry mass 0.771 kg
  note on carbon content, fossil: MSW composition in tab 4.1, ecoinvent v2.2 report 13_I. C content referred to 1 kg DM
- waste preparation facility: 2.13465e-9 unit; lognormal variance with pedigree 0.2006, pedigree (5,1,5,1,5)
  properties: lifetime 50 year, lifetime capacity [kg] 5e8 kg
- electricity, low voltage: 0.0174593 kWh; lognormal variance with pedigree 0.0412, pedigree (2,1,5,1,1)
- propane, burned in building machine: 0.000248687 MJ; lognormal variance with pedigree 0.0412, pedigree (2,1,5,1,1)
- diesel, burned in building machine: 0.0703442 MJ; lognormal variance with pedigree 0.0486, pedigree (1,1,4,1,4)

## Sampling procedure
Uncertainty estimation according to the pedigree matrix
