# bulk carrier production, for dry goods

Dataset: EcoSpold 2, unit process
Geography: GLO
Time period: 2007-01-01 to 2019-12-31
Technology level: current
Classification: EcoSpold01Categories: transport systems/ship
Classification: ISIC rev.4 ecoinvent: 3011:Building of ships and floating structures
Scenario: Business-as-Usual
System model: Allocation at the point of substitution
Generated by: Philippa Notten
Published in: Notten, P.J. 2018
Database: ecoinvent
isCopyrightProtected: true
accessRestrictedTo: 1

## General comment
The dataset represents the manufacturing and disposal of one bulk carrier for dry goods with a load capacity (DWT) of 51,000 tonnes. End of life is not accounted for other than by the inclusion of materials disposed or recovered for recycling (energy and other requirements for ship dismantling are not included).
The material breakdown of a freight ship is from Jain et al., (2016), which together with the estimated lightweight mass of an average tanker, was used to calculate the tonnage of steel, copper, brass, zinc, machinery, electronics, insulation material, plastics and wood required for ship construction.
The mass of paint used per lightweight tonne was determined from literature (Kameyama et al., n.d, Harish and Sunil, 2015, Nicolae et al., 2014). Emission of paint and volatiles (NMVOCs) are calculated applying emisison factors from OECD (2009).
Estimates of electricity, fuels and other consumables (welding wire, carbon dioxide gas etc) required for construction were determined from LCA studies (Kameyama et al., n.d, Nicolae et al., 2014) and an energy efficiency study on shipbuilding (Harish and Sunil, 2015). Welding and cutting demand is estimated by back-calculating from the amount of welding gas consumed, as reported in Harish and Sunil (2015) .
The materials produced at ship end-of-life are included but no energy for dismantling the ship is included.
The dataset does not include the chemicals, liquids and oils (e.g. lubricants, refigerants etc.) making up a portion of the ship's weight. Outputs and emissions of liquid materials are thus also not included at end-of-life dismantling of the ship.
References:
Jain, K., Pruyn, J. and Hopman, J. (2016) Quantitative assessment of material composition of end-of-life ships using onboard documentation, Resources, Conservation and Recycling, 107, pp. 1-9.
Harish, R. and Sunil, S. (2015) Energy Consumption and Conservation in Shipbuilding, International Journal of Innovative Research and Development, 4(7), pp. 26-31
Kameyama, M., Hiraoka, K. and Tauchi, H. (n.d) Study on Life Cycle Impact Assessment for Ships, Energy and Environment Department: Tokyo, Japan.
Nicolae, F., Popa, C. and Beizadae, H. (2014) Applications of Life Cycle Assessment (LCA) in Shipping Industry, 14th International Multidisciplinary Scientific GeoConference.
OECD (2009) OECD Series on Emission Scenario Documents Number 22: Emission Scenario Documents on Coating Industry, OECD: Paris, France

## Included activities start
Ship production, starting with receiving/obtaining the material inputs required for construction.

## Included activities end
The activity ends with the production of one ship. The dataset includes material consumption (steel, copper, plastic, paint etc.), energy consumption (electricity and LPG), welding and cutting, and emissions of the solvent of painting as NMVOC. The dataset does not include the consumption of liquids and oils (e.g. lubricants, refigerants etc.) or energy required for dismantling the ship at end-of-life.

## Geography
Manufacturing data represents global conditions.

## Technology
The data represents one bulk carrier with load capacity of 51,000 tonnes. The deadweight as percent of total displacement of an average bulk liquid carrier is estimated to be 82% (from the range given in Papanikolaou (2014)) (needed to calculate the ship lightweight mass).
Reference:
Papanikolaou, A. (2014) Ship Design: Methodologies for Preliminary Design Springer: Athens, Greeces

## Reference product
- iron scrap, unsorted: 1 kg; name waste_iron; CPC 39310: Slag, dross, scalings and other waste from the manufacture of iron or steel; By-product classification Recyclable; pedigree (1,1,1,1,1)
  Machinery, estimated to make up 6.2% of the lightweight (Jain et al., 2016), is approximated by cast iron. Ship lightweight mass calculated from IHSF data, Papanikolaou (2014) and Anink & Krikke (2011).
  production volume 2.90069e8 kg; = Ref('bc551dda-c7a0-4123-8f28-2b5731d53e9f', 'ProductionVolume') * (waste_iron / Ref('bc551dda-c7a0-4123-8f28-2b5731d53e9f'))
    Calculated from production volume of reference product using the relative outputs.
  property price 0.149 EUR2005; name waste_iron_price_EUR2005
    Temporary price data. Calculated as 90% of purchasers price based on: estimated at 85% of sorted scrap
  property carbon content 0
    carbon content on a dry matter basis (reserved; not for manual entry)
  property true value 103894; name waste_iron_true_value
    allocation property applied in "true value" allocation // value calculated from revenue
  properties: water in wet mass 0 kg, dry mass 1 kg, carbon content, non-fossil 0, carbon content, fossil 0, water content 0, wet mass 1 kg, carbon allocation 0 kg
- bulk carrier, for dry goods: 0 unit; By-product classification allocatable product; CPC 49314: Other vessels for the transport of goods and other vessels for the transport of both persons and goods
  production volume 416 unit; name PV
    Estimated value based on annual total tonne.kms of bulk carriers (calculated from IMO, 2015) and the tonne.km performance (lifetime tonne.kms) of an average bulk carrier. Lifetime tonne-kilometres derived from annual transport tonne.kms per ship type (calculated from IMO (2015)) and a ship lifetime of 25 years (Demirel et al., 2013; Hayman et al., n.d.). Reference: IMO (2015) Third IMO Greenhouse Gas Study 2014. International Maritime Organization, London; Demirel, Y., Khorasanchi, M., Turan, O. and Incecik, A. (2013) On the importance of antifouling coatings regarding ship resistance and powering, Low Carbon Shipping Conference, London, UK.; Hayman, B., Dogliani, M., Kvale, I. and Fet, A. (n.d.) Technologies for reduced environmental impact from ships - Ship building, maintenance and dismantling aspects, TRESHIP Thematic Network: Brussels, Belgium.
  property price 1.15757e7 EUR2005
    Calculated based on inputs: The price of the product has been calculated as a sum of the values of the material and energy inputs for this product. This value is therefore a rough estimation. It may underestimate the real price since there are additional expenses when producing any product. These expences can include for example labour costs, treatment of waste materials and profit for the producer. Please consider carefully whether this level of data quality is acceptable for your application.
  property lifetime capacity [metric ton*km] 1.27143e11 metric ton*km
    Lifetime tonne-kilometres derived from annual transport tonne.kms (calculated from IMO (2015)) and a ship lifetime of 25 years (Demirel et al., 2013; Hayman et al., n.d.). Reference: IMO (2015) Third IMO Greenhouse Gas Study 2014. International Maritime Organization, London; Demirel, Y., Khorasanchi, M., Turan, O. and Incecik, A. (2013) On the importance of antifouling coatings regarding ship resistance and powering, Low Carbon Shipping Conference, London, UK.; Hayman, B., Dogliani, M., Kvale, I. and Fet, A. (n.d.) Technologies for reduced environmental impact from ships - Ship building, maintenance and dismantling aspects, TRESHIP Thematic Network: Brussels, Belgium.
  property lifetime 25 year
    Ship lifetime assumed from Demirel et al. (2013) and Hayman et al. (n.d.). Reference: Demirel, Y., Khorasanchi, M., Turan, O. and Incecik, A. (2013) On the importance of antifouling coatings regarding ship resistance and powering, Low Carbon Shipping Conference, London, UK.; Hayman, B., Dogliani, M., Kvale, I. and Fet, A. (n.d.) Technologies for reduced environmental impact from ships - Ship building, maintenance and dismantling aspects, TRESHIP Thematic Network: Brussels, Belgium.
  property true value 1.15757e7
    allocation property applied in "true value" allocation // value calculated from revenue

## By-products
- zinc: 0 kg; CPC 41442: Zinc, unwrought; By-product classification allocatable product; CAS 7440-66-6
  production volume 3.19492e7 kg
  properties: water in wet mass 0 kg, water content 0, dry mass 1 kg, carbon content, non-fossil 0, carbon content, fossil 0, wet mass 1 kg, price 1.04 EUR2005, carbon content 0, carbon allocation 0 kg, true value 79873
- aluminium oxide, non-metallurgical: 0 kg; source European Aluminium Association 2008; CPC 41432: Alumina (aluminium oxide), except artificial corundum; By-product classification allocatable product; CAS 1344-28-1; pedigree (1,1,1,1,1)
  production volume 166949 kg
  property carbon content, non-fossil 0; name C_content_non_fossil
  property price 0.28 EUR2005; name Al2O3Amount_price_EUR2005
    From UN trade database. http://data.un.org/ Import data from the largest economies of the world are used (Brazil, India, USA, China, Japan and EU-27).
  property dry mass 1 kg; name DM
  property water content 0; name water_content
  property wet mass 1 kg; name WM
  property water in wet mass 0 kg; name WWM
  property carbon content, fossil 0; name C_content_fossil
  property carbon content 0
    carbon content on a dry matter basis (reserved; not for manual entry)
  property true value 37.4565
    allocation property applied in "true value" allocation // value calculated from revenue
  properties: carbon allocation 0 kg
- aluminium, cast alloy: 0 kg; source European Aluminium Association 2008; By-product classification allocatable product; CPC 41431: Unwrought aluminium; pedigree (1,1,1,1,1)
  EcoSpold01Location=RER
  production volume 1.5606e6 kg
  property price 1.3 EUR2005; name castAlloyAmount_price_EUR2005
    Temporary price data. Calculated as 90% of purchasers price based on: Source: London Metal Exchange, Aluminium alloy price for 2005
  property carbon content 0
    carbon content on a dry matter basis (reserved; not for manual entry)
  property true value 1625.63
    allocation property applied in "true value" allocation // value calculated from revenue
  properties: water in wet mass 0 kg, carbon content, non-fossil 0, water content 0, dry mass 1 kg, carbon content, fossil 0, wet mass 1 kg, carbon allocation 0 kg
- heat, for reuse in municipal waste incineration only: 0 MJ; CPC 17300: Steam and hot water; By-product classification allocatable product; pedigree (1,1,1,1,1)
  Net electricity generated from this waste and used in internal MSWI plant energy redistribution.
  Uncertainty: uncertainty is calculated from uncertainties in waste composition and uncertainties in energy efficiency and the uncertainty in internal energy demand
  production volume 1.75342e8 MJ
  property exergy 0.1842 MJ; name E_th_prod_MSWI_exergy
    This exergy property is based on the exergy content of the product.
  property true value relation 0.1842; name E_th_prod_MSWI_true_value_relation
    property to calculate "true value" from
  property price 0.0106 EUR2005; name E_th_prod_MSWI_price_EUR2005
    Average European district heat price from Ecoheatcool and Euroheat 2005-2006, Ecoheat Work package 1: The European heat market. Final report. 10.6 EUR/GJ i s the price of district heat. http://www.solarthermalworld.org/files/Ecoheatcool%20WP1%20Web.pdf?download
  property true value 855.449
    allocation property applied in "true value" allocation // value calculated from true value relation
- electricity, for reuse in municipal waste incineration only: 0 kWh; CPC 17100: Electrical energy; By-product classification allocatable product; pedigree (1,1,1,1,1)
  (same comment as for heat, for reuse in municipal waste incineration only)
  production volume 2.32364e7 kWh
  property exergy 3.6 MJ; name E_el_prod_MSWI_exergy
    This exergy property is based on the exergy content of the product.
  property true value relation 3.6; name E_el_prod_MSWI_true_value_relation
    property to calculate "true value" from
  property price 0.1 EUR2005; name E_el_prod_MSWI_price_EUR2005
    Estimated to be the same price as in case of electricity, medium voltage.
  property true value 2288.61
    (same comment as for heat, for reuse in municipal waste incineration only)
- aluminium, wrought alloy: 0 kg; source European Aluminium Association 2008; By-product classification allocatable product; CPC 4153: Semi-finished products of aluminium or aluminium alloys; pedigree (1,1,1,1,1)
  production volume 683201 kg
  property price 1.44 EUR2005; name secondaryAluminiumOutput_price_EUR2005
  properties: wet mass 1 kg, water content 0, carbon content, fossil 0, water in wet mass 0 kg, carbon content, non-fossil 0, dry mass 1 kg, carbon content 0, carbon allocation 0 kg, true value 788.309
- iron scrap, sorted, pressed: 0 kg; By-product classification Recyclable; CPC 39310: Slag, dross, scalings and other waste from the manufacture of iron or steel; pedigree (1,1,1,1,1)
  Iron scrap recovered from this waste.
  production volume 5.11085e8 kg
  property price 0.175 EUR2005
    Temporary price data. Calculated as 90% of purchasers price based on: 2005 import and export prices (total trades (USD) divided by total weight (kg) in biggest economies of the world: EU27, USA, Brasil, China, India, Japan and Russia) from UN Commodity Trade Statistics Database (http://data.un.org/Explorer.aspxDatabase [Accessed 2011.06.20]). Commodity: Waste or scrap, of cast iron
  property carbon content 0
    carbon content on a dry matter basis (reserved; not for manual entry)
  property true value 1450.65
    allocation property applied in "true value" allocation // value calculated from revenue
  properties: water content 0, water in wet mass 0 kg, carbon content, fossil 0, dry mass 1 kg, carbon content, non-fossil 0, wet mass 1 kg, carbon allocation 0 kg
- copper: 0 kg; source Rentz O. 1999; By-product classification allocatable product; CPC 41413: Refined copper and copper alloys, unwrought; master alloys of copper
  Literature value. Copper uses: Before end-use copper is manufactured into semi fabricated products, such as shapes and ingots (known as 'semis'). These manufacturing processes are subdivided into hot working, cold working and, if necessary, process annealing. Few of the semis are ready for use as such. They more typically travel to first-stage manufacturers, who make metal rods, wire, and casting, and then to component manufacturers who produce such things as motors, valves, and insulated cables The components in turn are incorporated by final-stage manufacturers into a variety of finished products - automobiles, commercial buildings, residential housing, and so forth. These uses account for about 79% of the world-wide consumption of copper.
  production volume 5.22288e6 kg
  properties: dry mass 1 kg, water in wet mass 0 kg, wet mass 1 kg, carbon content, non-fossil 0, water content 0, price 5.52 EUR2005, carbon content, fossil 0, carbon content 0, carbon allocation 0 kg, true value 23101.2
- zinc concentrate: 0 kg; CPC 14290: Other non-ferrous metal ores and concentrates (other than uranium or thorium ores and concentrates); By-product classification allocatable product
  Calculated value from the knowledge of the properties of both products.
  production volume 37605.4 kg
  property price 0.38 EUR2005; name ByP_price_EUR2005
    Temporary price data. Calculated as 90% of purchasers price based on: Zinc content in concentrate 53%. Concentrate price per kg Zn 86.5% of refined Zn price (13.5% treatment charges according to CHR Metals Limited 2005: Dynamic cost curves. http://www.minecost.com/dynamic.pdf). 2004 zinc price from USGS (2007) Mineral commodity summaries 2007. <http://minerals.usgs.gov/minerals/pubs/mcs/2007/mcs2007.pdf> [Accessed 25 May 2010]
  property zinc content 0.53; name zinc_C_zinc_concentrate
    Zinc content on a dry matter basis. Value taken from teh "zinc mine operation" /GLO dataset.
  property dry mass 1 kg; name DM_zinc_concentrate
  property carbon content 0
    carbon content on a dry matter basis (reserved; not for manual entry)
  property true value 0.000957433
    allocation property applied in "true value" allocation // value calculated from revenue
  properties: wet mass 1 kg, water content 0, carbon content, non-fossil 0, carbon content, fossil 0, water in wet mass 0 kg, carbon allocation 0 kg

## Inputs from technosphere
- polystyrene, expandable: 0.000338443 kg; lognormal variance with pedigree 0.0912, pedigree (4,4,5,4,4)
  Plastics estimated to account for 1.2% of total material mass (Jain et al., 2016). This is split equally over the polymers most used in building & construction (PlasticsEurope, 2018). Ship lightweight mass calculated from IHSF data, Papanikolaou (2014) and Anink & Krikke (2011).
  properties: carbon content, fossil 0.923077, dry mass 1 kg, wet mass 1 kg
- waste electric and electronic equipment: -0.00176118 kg; name waste_elec; lognormal variance with pedigree 0.0912, pedigree (4,4,5,4,4)
  Electronics are estimated to make up 1.2% of the lightweight mass (Jain et al., 2016). Ship lightweight mass calculated from IHSF data, Papanikolaou (2014) and Anink & Krikke (2011).
  production volume 5.79713e7 kg; = Ref('bc551dda-c7a0-4123-8f28-2b5731d53e9f', 'ProductionVolume') * (waste_elec / Ref('bc551dda-c7a0-4123-8f28-2b5731d53e9f'))
    Calculated from production volume of reference product using the relative outputs.
  property price 0 EUR2005; name waste_elec_price_EUR2005
  properties: wet mass 1 kg, carbon content, non-fossil 0.000485011, carbon content, fossil 0.0877555, dry mass 1 kg
- welding, arc, steel: 0.0907092 m; lognormal variance with pedigree 0.0912, pedigree (4,4,5,4,4)
  Welding gas usage from Harish & Sunil (2014) per tonne steel, ratioed with "welding, arc, steel" dataset consumption of 0.028 kg gas per m (equating CO2 with total blanket gas). Ship lightweight mass calculated from IHSF data, Papanikolaou (2014) data and Anink & Krikke (2011).
- scrap aluminium: 0 kg; name waste_al; pedigree (1,1,1,1,1)
  Other non-ferrous metal making up 0.05% of total lightweight mass is assumed to be aluminium (Jain et al., 2016). Ship lightweight mass calculated from IHSF data, Papanikolaou (2014) and Anink & Krikke (2011).
  production volume 0 kg
    Calculated from production volume of reference product using the relative outputs.
  property price 0 EUR2005; name waste_al_price_EUR2005
  properties: wet mass 1 kg, dry mass 1 kg
- welding, gas, steel: 0.68793 m; lognormal variance with pedigree 0.0912, pedigree (4,4,5,4,4)
  (same comment as for welding, arc, steel)
- waste mineral wool: 0 kg; name waste_wool; pedigree (1,1,1,1,1)
  Minerals estimated to account for 2.5% of total lightweight mass (Jain et al., 2016). This is split equally over glass wool, asbestos and ceramics (assumption). Ship lightweight mass calculated from IHSF data, Papanikolaou (2014) and Anink & Krikke (2011). Waste mineral wool includes waste mineral wool and waste asbestos.
  production volume 0 kg
    Calculated from production volume of reference product using the relative outputs.
  property price 0 EUR2005; name waste_wool_price_EUR2005
  properties: dry mass 1 kg, wet mass 1 kg
- glued laminated timber, for indoor use: 4.25906e-6 m3; lognormal variance with pedigree 0.0912, pedigree (4,4,5,4,4)
  "Joinery" (timber, bulkhead and deckhead panels, accommodation doors and frames, furniture and furnishings, composite timber products, etc.) is estimated to make up 1.3% of the lightweight mass (Jain et al., 2016). Joinery items are approximated by laminated timber. Ship lightweight mass calculated from IHSF data, Papanikolaou (2014) and Anink & Krikke (2011).
  properties: dry mass 380.531 kg, carbon content, fossil 0.0128964, water content 0.13, carbon content, non-fossil 0.478422, wet mass 430 kg
- marine engine: 8.81229e-6 unit; lognormal variance with pedigree 0.0912, pedigree (4,4,5,4,4)
  Machinery, estimated to make up 6.2% of the lightweight (Jain et al., 2016). Ship lightweight mass calculated from IHSF data, Papanikolaou (2014) and Anink & Krikke (2011). One unit of "marine engine" is equivalent to 1 tonne of machinery.
  properties: lifetime capacity [h] 8000 hour, lifetime 15 year
- zinc scrap, post-consumer: -0.000970624 kg; name waste_zinc; lognormal variance with pedigree 0.0912, pedigree (4,4,5,4,4)
  Zinc is estimated to make up 0.7% of total lightweight mass (Jain et al., 2016). Ship lightweight mass calculated from IHSF data, Papanikolaou (2014) and Anink & Krikke (2011).
  production volume 3.19492e7 kg; = Ref('bc551dda-c7a0-4123-8f28-2b5731d53e9f', 'ProductionVolume') * (waste_zinc / Ref('bc551dda-c7a0-4123-8f28-2b5731d53e9f'))
    Calculated from production volume of reference product using the relative outputs.
  property price 0.55 EUR2005; name waste_zinc_price_EUR2005
  properties: dry mass 1 kg, wet mass 1 kg, zinc content 1
- glass wool mat: 0.00119668 kg; lognormal variance with pedigree 0.0912, pedigree (4,4,5,4,4)
  Minerals estimated to account for 2.5% of total lightweight mass (Jain et al., 2016). This is split equally over glass wool, asbestos and ceramics (assumption). Ship lightweight mass calculated from IHSF data, Papanikolaou (2014) and Anink & Krikke (2011).
  properties: carbon content, fossil 0.0107327, wet mass 1 kg, dry mass 1 kg
  note on carbon content, fossil: A share of 16 w-% for the binders is taken into account. The binder used in this study is a mixture of phenol, formaldehyde and urea resins (ecoinvent v2.2 report 16_part XIV), and the C content was calculated as a weigthed average of phenol, formaldehyde and urea C content.
- scrap steel: 0 kg; name waste_steel; pedigree (1,1,1,1,1)
  Steel is estimated to make up 85% of total lightweight mass (Jain et al. (2016)). Ship lightweight mass calculated from IHSF data, Papanikolaou (2014) and Anink & Krikke (2011). Steel wastage percentage estimated by Papanikolaou (2014).
  production volume 0 kg
    Calculated from production volume of reference product using the relative outputs.
  property price 0 EUR2005; name waste_steel_price_EUR2005
  properties: dry mass 1 kg, wet mass 1 kg
- sanitary ceramics: 0.00119668 kg; lognormal variance with pedigree 0.0912, pedigree (4,4,5,4,4)
  (same comment as for glass wool mat)
  properties: dry mass 1 kg, wet mass 1 kg
- scrap copper: 0 kg; name waste_copper; pedigree (1,1,1,1,1)
  Copper is estimated to make up 0.16% of total lightweight mass (Jain et al. (2016)). Ship lightweight mass calculated from IHSF data, Papanikolaou (2014) and Anink & Krikke (2011).
  production volume 0 kg
    Calculated from production volume of reference product using the relative outputs.
  property price 0 EUR2005; name waste_copper_price_EUR2005
  properties: wet mass 1 kg, dry mass 1 kg
- electronic component machinery, unspecified: 7.04477e-7 unit; lognormal variance with pedigree 0.0912, pedigree (4,4,5,4,4)
  (same comment as for waste electric and electronic equipment)
- waste emulsion paint: 0 kg; name waste_paint; pedigree (1,1,1,1,1)
  EcoSpold01Location=CH
  Calculated from input quantity less emissions. Paint quantity based on: Ship lightweight mass calculated from IHSF data, Papanikolaou (2014) and Anink & Krikke (2011). Paint usage data estimated from Kameyama et al. (n.d.), Harish & Sunil (2014) and Nicolae et al. (2014). Paint emission data from OECD (2009).
  production volume 0 kg
    Calculated from production volume of reference product using the relative outputs.
  property price 0 EUR2005; name waste_paint_price_EUR2005
  properties: carbon content, fossil 0.27, wet mass 1 kg, dry mass 1 kg
  note on carbon content, fossil: Tab A.4, ecoinvent v2.2 report 13_I. C content has been calculated after data in the tables, and then referred to 1 kg DM
- asbestos, crysotile type: 0.00119668 kg; lognormal variance with pedigree 0.0912, pedigree (4,4,5,4,4)
  (same comment as for glass wool mat)
  properties: wet mass 1 kg, dry mass 1 kg
- bronze scrap, post-consumer: 0 kg; name waste_bronze; pedigree (1,1,1,1,1)
  Bronze is estimated to make up 0.15% of total lightweight mass (Jain et al., 2016). Ship lightweight mass calculated from IHSF data, Papanikolaou (2014) and Anink & Krikke (2011). M
  production volume 7.14646e6 kg; = Ref('bc551dda-c7a0-4123-8f28-2b5731d53e9f', 'ProductionVolume') * (waste_bronze / Ref('bc551dda-c7a0-4123-8f28-2b5731d53e9f'))
    Calculated from production volume of reference product using the relative outputs.
  property price 0 EUR2005; name waste_bronze_price_EUR2005
  properties: dry mass 1 kg, wet mass 1 kg
- bronze: 0.000217111 kg; lognormal variance with pedigree 0.0912, pedigree (4,4,5,4,4)
  Bronze is estimated to make up 0.15% of total lightweight mass (Jain et al., 2016). Ship lightweight mass calculated from IHSF data, Papanikolaou (2014) and Anink & Krikke (2011).
  properties: wet mass 1 kg, dry mass 1 kg
- waste plastic, mixture: 0 kg; name waste_plastic; pedigree (1,1,1,1,1)
  EcoSpold01Location=CH
  Plastics estimated to account for 1.2% of total material mass (Jain et al., 2016). Ship lightweight mass calculated from IHSF data, Papanikolaou (2014) and Anink & Krikke (2011).
  production volume 0 kg
    Calculated from production volume of reference product using the relative outputs.
  property price 0 EUR2005; name waste_plastic_price_EUR2005
  properties: dry mass 0.847 kg, wet mass 1 kg, water content 0.180638, carbon content, fossil 0.747344
  note on carbon content, fossil: C content in 1 kg DM was calculated using data in Tab A.2, ecoinvent v2.2 report 13_I
- zinc: 0.000970624 kg; lognormal variance with pedigree 0.0912, pedigree (4,4,5,4,4)
  (same comment as for zinc scrap, post-consumer)
  properties: wet mass 1 kg, dry mass 1 kg
- alkyd paint, white, without solvent, in 60% solution state: 0 kg; pedigree (1,1,1,1,1)
  EcoSpold01Location=RER
  Paint usage data average of Kameyama et al. (n.d.), Harish & Sunil (2014) and Nicolae et al. (2014). Ship lightweight mass calculated from IHSF data, Papanikolaou (2014) and Anink & Krikke (2011).
  properties: carbon content, fossil 0.140367, wet mass 1 kg, carbon content, non-fossil 0.199629, dry mass 1 kg
  note on carbon content, fossil: C content was calculated as an addition of C content in the raw materials.
- aluminium, wrought alloy: 7.66252e-5 kg; lognormal variance with pedigree 0.0912, pedigree (4,4,5,4,4)
  (same comment as for scrap aluminium)
  properties: wet mass 1 kg, dry mass 1 kg
- heat, district or industrial, other than natural gas: 0.0552181 MJ; lognormal variance with pedigree 0.0912, pedigree (4,4,5,4,4)
  EcoSpold01Location=RER
  Fuel use at shipyard (LPG) from Harish & Sunil (2015). Ship lightweight mass calculated from IHSF data, Papanikolaou (2014) and Anink & Krikke (2011).
- polyurethane, flexible foam: 0 kg; pedigree (1,1,1,1,1)
  (same comment as for polystyrene, expandable)
  properties: wet mass 1 kg, dry mass 1 kg, carbon content, fossil 0.633827
- electricity, medium voltage: 0.0455726 kWh; lognormal variance with pedigree 0.0926, pedigree (4,4,5,5,4)
  EcoSpold01Location=UCTE
  Average across various sources (LCA studies and shipyard data). A very wide range evident in the data (80 - 960 kWh/tonne) (Kameyama et al. (n.d.), Harish & Sunil (2014) and Nicolae et al. (2014), DSME (2014). Ship lightweight mass calculated from IHSF data, Papanikolaou (2014) and Anink & Krikke (2011). The electricity input is a global mix and thus does not necessarily represent the major shipbuilding locations. The uncertainty has been adjusted accordingly.
- polyvinylidenchloride, granulate: 0 kg; pedigree (1,1,1,1,1)
  (same comment as for polystyrene, expandable)
  properties: dry mass 1 kg, wet mass 1 kg, carbon content, fossil 0.387097
- copper: 0.0002235 kg; lognormal variance with pedigree 0.0912, pedigree (4,4,5,4,4)
  EcoSpold01Location=RER
  Copper is estimated to make up 0.16% of total lightweight mass (Jain et al. (2016)). Ship lightweight mass calculated from IHSF data, Papanikolaou (2014) and Anink & Krikke (2011).
  properties: wet mass 1 kg, dry mass 1 kg
- polyethylene, high density, granulate: 0.000338443 kg; lognormal variance with pedigree 0.0912, pedigree (4,4,5,4,4)
  (same comment as for polystyrene, expandable)
  properties: dry mass 1 kg, carbon content, fossil 0.857143, wet mass 1 kg
  note on carbon content, fossil: Polyethylene is formed out of a huge amount of ethylene monomers (C2H4) (ecoinvent v2.2 report 11_II). MW=28 g/mol
- reinforcing steel: 0.139854 kg; lognormal variance with pedigree 0.0912, pedigree (4,4,5,4,4)
  EcoSpold01Location=RER
  Steel is estimated to make up 85% of total lightweight mass (Jain et al. (2016)). Ship lightweight mass calculated from IHSF data, Papanikolaou (2014) and Anink & Krikke (2011). Steel wastage percentage estimated by Papanikolaou (2014).
  properties: carbon content, fossil 0.004, wet mass 1 kg, dry mass 1 kg
- inert waste, for final disposal: 0 kg; name waste_inert; pedigree (1,1,1,1,1)
  Minerals estimated to account for 2.5% of total lightweight mass (Jain et al., 2016). This is split equally over glass wool, asbestos and ceramics (assumption). Ship lightweight mass calculated from IHSF data, Papanikolaou (2014) and Anink & Krikke (2011). Inert waste used as proxy for waste ceramic material.
  production volume 0 kg
    Calculated from production volume of reference product using the relative outputs.
  property price 0 EUR2005; name waste_inert_price_EUR2005
  properties: water content 0.00502513, dry mass 0.995 kg, wet mass 1 kg
- polypropylene, granulate: 0.000338443 kg; lognormal variance with pedigree 0.0912, pedigree (4,4,5,4,4)
  (same comment as for polystyrene, expandable)
  properties: wet mass 1 kg, dry mass 1 kg, carbon content, fossil 0.857143
- scrap aluminium: -2.43061e-5, -1.14039e-6, -5.11787e-5 kg (3 entries); lognormal variance with pedigree 0.0912, pedigree (4,4,5,4,4)
  (same comment as for scrap aluminium)
  production volume 2.52221e6 kg
- waste mineral wool: -0.000693729, -7.91597e-6, -0.00169172 kg (3 entries); lognormal variance with pedigree 0.0912, pedigree (4,4,5,4,4)
  (same comment as for waste mineral wool)
  production volume 7.87804e7 kg
- scrap steel: -0.0340537, -4.30524e-5, -0.105757 kg (3 entries); lognormal variance with pedigree 0.0912, pedigree (4,4,5,4,4)
  (same comment as for scrap steel)
  production volume 4.60345e9 kg
- scrap copper: -7.08979e-5, -3.32637e-6, -0.000149282 kg (3 entries); lognormal variance with pedigree 0.0912, pedigree (4,4,5,4,4)
  (same comment as for scrap copper)
  production volume 7.35696e6 kg
- waste emulsion paint: -8.14351e-5, -2.76145e-8, -0.000910608 kg (3 entries); lognormal variance with pedigree 0.0912, pedigree (4,4,5,4,4)
  (same comment as for waste emulsion paint)
  production volume 3.26552e7 kg
- waste plastic, mixture: -0.000162883, -1.25574e-5, -5.18664e-6, -4.9252e-6, -0.000187939, -2.09534e-6, -9.49692e-7, -0.00131568 kg (8 entries); lognormal variance with pedigree 0.0912, pedigree (4,4,5,4,4)
  (same comment as for waste plastic, mixture)
  production volume 5.57012e7 kg
- alkyd paint, white, without solvent, in 60% solution state: 0.000179067, 0.000850056 kg (2 entries); lognormal variance with pedigree 0.0912, pedigree (4,4,5,4,4)
  (same comment as for alkyd paint, white, without solvent, in 60% solution state)
- polyurethane, flexible foam: 5.88891e-5, 0.000279554 kg (2 entries); lognormal variance with pedigree 0.0912, pedigree (4,4,5,4,4)
  (same comment as for polystyrene, expandable)
- polyvinylidenchloride, granulate: 0.000111887, 0.000226556 kg (2 entries); lognormal variance with pedigree 0.0912, pedigree (4,4,5,4,4)
  (same comment as for polystyrene, expandable)
- inert waste, for final disposal: -7.74033e-6, -0.00118894 kg (2 entries); lognormal variance with pedigree 0.0912, pedigree (4,4,5,4,4)
  (same comment as for inert waste, for final disposal)
  production volume 3.93902e7 kg

## Emissions to nature
- NMVOC, non-methane volatile organic compounds, unspecified origin [air, unspecified]: 0.000842005 kg; lognormal variance with pedigree 0.1306, pedigree (4,4,5,4,4)
  VOC percentage of 45% from OECD (2009). Paint usage data average of Kameyama et al. (n.d.), Harish & Sunil (2014) and Nicolae et al. (2014). Ship lightweight mass calculated from IHSF data, Papanikolaou (2014) and Anink & Krikke (2011).
- Hydrocarbons, unspecified [soil, unspecified]: 1.85276e-5 kg; lognormal variance with pedigree 0.1306, pedigree (4,4,5,4,4)
  Based on: Ship lightweight mass calculated from IHSF data, Papanikolaou (2014) and Anink & Krikke (2011). Paint usage data estimated from Kameyama et al. (n.d.), Harish & Sunil (2014) and Nicolae et al. (2014). Paint emission data from OECD (2009). Unspecified hydrocarbons to land used as a proxy for paint emissions to land.
- Hydrocarbons, unspecified [water, unspecified]: 1.85276e-5 kg; lognormal variance with pedigree 0.2106, pedigree (4,4,5,4,4)
  Based on: Ship lightweight mass calculated from IHSF data, Papanikolaou (2014) and Anink & Krikke (2011). Paint usage data estimated from Kameyama et al. (n.d.), Harish & Sunil (2014) and Nicolae et al. (2014). Paint emission data from OECD (2009). Unspecified hydrocarbons to land used as a proxy for paint emissions to water.

## Sampling procedure
Literature studies.
