# cerium oxide to generic market for polishing powder

Dataset: EcoSpold 2, unit process
Geography: GLO
Time period: 2005-01-01 to 2019-12-31
Technology level: current
Classification: ISIC rev.4 ecoinvent: 2011:Manufacture of basic chemicals
Scenario: Business-as-Usual
System model: Allocation at the point of substitution
Generated by: Sofia Parada Tur
Database: ecoinvent
isCopyrightProtected: true
accessRestrictedTo: 1

## General comment
This activity links cerium oxide to the generic market for polishing powder. Cerium oxide is used to polish stone.

## Included activities start
Activity starting with the input of cerium oxide

## Included activities end
Activity ends with the provision of a generic polishing powder

## Geography
dataset represents the global situation

## Time period
based on reference year of production volume

## Reference product
- polishing powder: 1 kg; By-product classification allocatable product; CPC 34: Basic chemicals
  production volume 5.5917e6 kg; = 5.5917E+07*0.1
    Calculated from total production volume of cerium concentrate, as follows:
    Total rare earth produced in the world in 2005 was 122 000 ton REO eq (Table 6 in http://minerals.usgs.gov/minerals/pubs/commodity/rare_earths/myb1-2007-raree.xls). Rare-earth production in China accounts then for 98% of the world’s production, so the same assumptions have been applied for calculating global production volumes as for calculating chinese production volumes
    It is assumed that 10% of total cerium produced is used in polishing applications for glass and stone.
  property price 2.23 EUR2005
    Temporary price data. Calculated as 90% of purchasers price based on: ecoinvent v2 report 'Bioenergy', chapter 'Biogas', page 188
  property carbon content, fossil 0; name C_content_fossil
    fossil carbon content on a dry matter basis
  property carbon content, non-fossil 0; name C_content_non_fossil
    biogene carbon content on a dry matter basis
  property dry mass 1 kg; name DM
  property wet mass 1 kg; name WM
  property water content 0; name water_content
  property water in wet mass 0 kg; name WWM
  property carbon content 0
    carbon content on a dry matter basis (reserved; not for manual entry)
  properties: carbon allocation 0 kg

## Inputs from technosphere
- cerium concentrate, 60% cerium oxide: 1 kg
  properties: wet mass 1 kg, dry mass 1 kg

## Extrapolations
This dataset has been extrapolated from year 2005 to the year of the calculation (2019). The uncertainty has been adjusted accordingly.

## Review by Bo Weidema 2012-08-28
passed
