# refrigerator production

Dataset: EcoSpold 2, unit process
Geography: GLO
Time period: 2015-01-01 to 2019-12-31
Technology level: current
Classification: ISIC rev.4 ecoinvent: 2750:Manufacture of domestic appliances
Scenario: Business-as-Usual
System model: Allocation at the point of substitution
Generated by: Viachaslau Filimonau
Published in: Xiao, R. 2015
Database: ecoinvent
isCopyrightProtected: true
accessRestrictedTo: 1

## General comment
This activity represents the production and disposal of an average refrigerator which is approximately 60 kg in mass. It has the envisaged lifetime of 10 years and is manufactured in China.The figures on material inputs from technosphere and electricity required to produce an average refrigerator are taken from Xiao et al. 2015. The figure on the annual production volume is taken from German International Cooperation 2011.

## Included activities start
This activity starts with the reception of materials at the factory.

## Included activities end
The activity includes the processes of material and energy use in manufacturing an average refrigerator. The inventory additionally accounts for disposal of all materials. Packaging is not included.

## Geography
Geography GLO was chosen because the dataset aims to represent the production of an average refrigerator. The literature sources used refer to manufacturing in China.

## Time period
The literature sources used refer to primary data from 2015. This represents current technology.

## Reference product
- refrigerator: 1 unit; CPC 4481: Domestic electric appliances; non-electric refrigerators and clothes drying machines; By-product classification allocatable product
  production volume 1e8 unit
    Estimate from German International Cooperation 2011. Production conversion of domestic refrigerators from halogenated to hydrocarbon refrigerants. A guideline. GIZ, Eschborn, Germany.
  property price 700 EUR2005
    Estimated value. The price is taken from MediaWorld, a shop for electronics, website (retrieved from: https://www.mediaworld.it/mw/SearchDisplay?searchTerm=frigorifero&categoryId=&search=WCS&storeId=20000&catalogId=20000&langId=-4&pageSize=25&beginIndex=0&sType=SimpleSearch&resultCatEntryType=2&showResultsPage=true&searchSource=Q&pageView=, accessed 13Feb2018). The range of prices varies greatly from 300 to over 2000 euros. A representative price of 700 was chosen. The choice is based on the most common price for an average appliance, and accounting for profit margins. According to an article from Blokhin "What profit margin is average for a company in the electronics sector?" (Source: Investopedia, retrieved from: https://www.investopedia.com/ask/answers/051215/what-profit-margin-average-company-electronics-sector.asp, 13Feb2018) the average profit margin made in the electronics sector in 2015 was of 9%.
  property lifetime capacity [h] 87600 hour; = 24*365*10
    Estimated value. It is assumed that a refrigerator works 24 hours a day for the lifetime of 10 years. Source: Xiao, R. et al. 2015, 2015, Xiao, R., Zhang, Y., Liu, X., and Yuan, Z., A life-cycle assessment of household refrigerators in China, Journal of Cleaner Production, 95, 301-310, 1 - Article
  property lifetime 10 year
    Source: Xiao, R. et al. 2015, 2015, Xiao, R., Zhang, Y., Liu, X., and Yuan, Z., A life-cycle assessment of household refrigerators in China, Journal of Cleaner Production, 95, 301-310, 1 - Article
  property weight 60 kg; name weight
    (same comment as for refrigerator)
  property true value 700
    allocation property applied in "true value" allocation // value calculated from revenue

## By-products
- electricity, for reuse in municipal waste incineration only: 0 kWh; CPC 17100: Electrical energy; By-product classification allocatable product; pedigree (1,1,1,1,1)
  Net electricity generated from this waste and used in internal MSWI plant energy redistribution.
  Uncertainty: uncertainty is calculated from uncertainties in waste composition and uncertainties in energy efficiency and the uncertainty in internal energy demand
  production volume 1.71431e8 kWh
  property true value relation 3.6; name E_el_prod_MSWI_true_value_relation
    property to calculate "true value" from
  property exergy 3.6 MJ; name E_el_prod_MSWI_exergy
    This exergy property is based on the exergy content of the product.
  property price 0.1 EUR2005; name E_el_prod_MSWI_price_EUR2005
    Estimated to be the same price as in case of electricity, medium voltage.
  property true value 0.16075
    allocation property applied in "true value" allocation // value calculated from true value relation
- heat, for reuse in municipal waste incineration only: 0 MJ; CPC 17300: Steam and hot water; By-product classification allocatable product; pedigree (1,1,1,1,1)
  (same comment as for electricity, for reuse in municipal waste incineration only)
  production volume 1.19751e9 MJ
  property exergy 0.1842 MJ; name E_th_prod_MSWI_exergy
    This exergy property is based on the exergy content of the product.
  property true value relation 0.1842; name E_th_prod_MSWI_true_value_relation
    property to calculate "true value" from
  property price 0.0106 EUR2005; name E_th_prod_MSWI_price_EUR2005
    Average European district heat price from Ecoheatcool and Euroheat 2005-2006, Ecoheat Work package 1: The European heat market. Final report. 10.6 EUR/GJ i s the price of district heat. http://www.solarthermalworld.org/files/Ecoheatcool%20WP1%20Web.pdf?download
  property true value 0.0574605
    (same comment as for electricity, for reuse in municipal waste incineration only)
- copper: 0 kg; source Rentz O. 1999; By-product classification allocatable product; CPC 41413: Refined copper and copper alloys, unwrought; master alloys of copper
  Literature value. Copper uses: Before end-use copper is manufactured into semi fabricated products, such as shapes and ingots (known as 'semis'). These manufacturing processes are subdivided into hot working, cold working and, if necessary, process annealing. Few of the semis are ready for use as such. They more typically travel to first-stage manufacturers, who make metal rods, wire, and casting, and then to component manufacturers who produce such things as motors, valves, and insulated cables The components in turn are incorporated by final-stage manufacturers into a variety of finished products - automobiles, commercial buildings, residential housing, and so forth. These uses account for about 79% of the world-wide consumption of copper.
  production volume 9.2858e7 kg
  properties: dry mass 1 kg, water in wet mass 0 kg, wet mass 1 kg, carbon content, non-fossil 0, water content 0, price 5.52 EUR2005, carbon content, fossil 0, carbon content 0, carbon allocation 0 kg, true value 1.70859
- zinc concentrate: 0 kg; CPC 14290: Other non-ferrous metal ores and concentrates (other than uranium or thorium ores and concentrates); By-product classification allocatable product
  Calculated value from the knowledge of the properties of both products.
  production volume 23.713 kg
  property price 0.38 EUR2005; name ByP_price_EUR2005
    Temporary price data. Calculated as 90% of purchasers price based on: Zinc content in concentrate 53%. Concentrate price per kg Zn 86.5% of refined Zn price (13.5% treatment charges according to CHR Metals Limited 2005: Dynamic cost curves. http://www.minecost.com/dynamic.pdf). 2004 zinc price from USGS (2007) Mineral commodity summaries 2007. <http://minerals.usgs.gov/minerals/pubs/mcs/2007/mcs2007.pdf> [Accessed 25 May 2010]
  property zinc content 0.53; name zinc_C_zinc_concentrate
    Zinc content on a dry matter basis. Value taken from teh "zinc mine operation" /GLO dataset.
  property dry mass 1 kg; name DM_zinc_concentrate
  property carbon content 0
    carbon content on a dry matter basis (reserved; not for manual entry)
  property true value 3.12981e-9
    allocation property applied in "true value" allocation // value calculated from revenue
  properties: wet mass 1 kg, water content 0, carbon content, non-fossil 0, carbon content, fossil 0, water in wet mass 0 kg, carbon allocation 0 kg
- iron scrap, unsorted: 0 kg; source European Aluminium Association 2008; CPC 39310: Slag, dross, scalings and other waste from the manufacture of iron or steel; By-product classification Recyclable; pedigree (1,1,1,1,1)
  production volume 230293 kg
  property price 0.149 EUR2005; name ironScrapAmount_price_EUR2005
    Temporary price data. Calculated as 90% of purchasers price based on: estimated at 85% of sorted scrap
  property carbon content 0
    carbon content on a dry matter basis (reserved; not for manual entry)
  property true value 0.000114379
    allocation property applied in "true value" allocation // value calculated from revenue
  properties: water in wet mass 0 kg, water content 0, carbon content, fossil 0, carbon content, non-fossil 0, dry mass 1 kg, wet mass 1 kg, carbon allocation 0 kg
- aluminium oxide, non-metallurgical: 0 kg; source European Aluminium Association 2008; CPC 41432: Alumina (aluminium oxide), except artificial corundum; By-product classification allocatable product; CAS 1344-28-1; pedigree (1,1,1,1,1)
  production volume 1.44915e7 kg
  property carbon content, non-fossil 0; name C_content_non_fossil
  property price 0.28 EUR2005; name Al2O3Amount_price_EUR2005
    From UN trade database. http://data.un.org/ Import data from the largest economies of the world are used (Brazil, India, USA, China, Japan and EU-27).
  property dry mass 1 kg; name DM
  property water content 0; name water_content
  property wet mass 1 kg; name WM
  property water in wet mass 0 kg; name WWM
  property carbon content, fossil 0; name C_content_fossil
  property carbon content 0
    carbon content on a dry matter basis (reserved; not for manual entry)
  property true value 0.0135254
    allocation property applied in "true value" allocation // value calculated from revenue
  properties: carbon allocation 0 kg
- aluminium, cast alloy: 0 kg; source European Aluminium Association 2008; By-product classification allocatable product; CPC 41431: Unwrought aluminium; pedigree (1,1,1,1,1)
  EcoSpold01Location=RER
  production volume 1.35463e8 kg
  property price 1.3 EUR2005; name castAlloyAmount_price_EUR2005
    Temporary price data. Calculated as 90% of purchasers price based on: Source: London Metal Exchange, Aluminium alloy price for 2005
  property carbon content 0
    carbon content on a dry matter basis (reserved; not for manual entry)
  property true value 0.587007
    allocation property applied in "true value" allocation // value calculated from revenue
  properties: water in wet mass 0 kg, carbon content, non-fossil 0, water content 0, dry mass 1 kg, carbon content, fossil 0, wet mass 1 kg, carbon allocation 0 kg
- aluminium, wrought alloy: 0 kg; source European Aluminium Association 2008; By-product classification allocatable product; CPC 4153: Semi-finished products of aluminium or aluminium alloys; pedigree (1,1,1,1,1)
  production volume 5.93031e7 kg
  property price 1.44 EUR2005; name secondaryAluminiumOutput_price_EUR2005
    Estimated based on literature values and expert judgement. Aluminium ccast alloys are about 90% of the price of aluminium wrought alloys.
  property carbon content 0
    carbon content on a dry matter basis (reserved; not for manual entry)
  property true value 0.284655
    allocation property applied in "true value" allocation // value calculated from revenue
  properties: wet mass 1 kg, water content 0, carbon content, fossil 0, water in wet mass 0 kg, carbon content, non-fossil 0, dry mass 1 kg, carbon allocation 0 kg
- iron scrap, sorted, pressed: 0 kg; By-product classification Recyclable; CPC 39310: Slag, dross, scalings and other waste from the manufacture of iron or steel; pedigree (1,1,1,1,1)
  Iron scrap recovered from this waste.
  production volume 3.56303e8 kg
  property price 0.175 EUR2005
    Temporary price data. Calculated as 90% of purchasers price based on: 2005 import and export prices (total trades (USD) divided by total weight (kg) in biggest economies of the world: EU27, USA, Brasil, China, India, Japan and Russia) from UN Commodity Trade Statistics Database (http://data.un.org/Explorer.aspxDatabase [Accessed 2011.06.20]). Commodity: Waste or scrap, of cast iron
  property carbon content 0
    carbon content on a dry matter basis (reserved; not for manual entry)
  property true value 0.0042071
    allocation property applied in "true value" allocation // value calculated from revenue
  properties: water content 0, water in wet mass 0 kg, carbon content, fossil 0, dry mass 1 kg, carbon content, non-fossil 0, wet mass 1 kg, carbon allocation 0 kg

## Inputs from technosphere
- steel, low-alloyed: 31.9644 kg; name steel; lognormal variance with pedigree 0.0035, pedigree (1,4,2,3,2)
  Data from Xiao et al. 2015.
  properties: carbon content, fossil 0.005, wet mass 1 kg, dry mass 1 kg
- waste polyvinylchloride: 0 kg; pedigree (1,1,1,1,1)
  The amount is set equal to the input amount for the respective material.
  production volume 0 kg
    Calculated from production volume of reference product using the relative outputs.
  properties: wet mass 1 kg, carbon content, fossil 0.440882, dry mass 1 kg
- compressed air, 800 kPa gauge: 0 m3; pedigree (1,1,1,1,1)
  Data from Xiao et al. 2015.
- heat, district or industrial, natural gas: 10.4878 MJ; lognormal variance with pedigree 0.0035, pedigree (1,4,2,3,2)
  Data from Xiao et al. 2015. 0.27 cubic meters of natural gas were converted into 10.53 MJ using 'heat production, natural gas, at industrial furnace >1000kW, GLO' [accessed 20.01.2018].
- electricity, high voltage: 10.9041 kWh; lognormal variance with pedigree 0.0035, pedigree (1,4,2,3,2)
  Data from Xiao et al. 2015.
- scrap copper: 0 kg; pedigree (1,1,1,1,1)
  The amount is set equal to the input amount for the respective material.
  production volume 0 kg
    Calculated from production volume of reference product using the relative outputs.
  properties: wet mass 1 kg, dry mass 1 kg
- sodium silicate, solid: 0 kg; name silicate; pedigree (1,1,1,1,1)
  Data from Xiao et al. 2015. In terms of outputs, assumed to have gone to waste water.
  properties: dry mass 1 kg, wet mass 1 kg
- aluminium, primary, ingot: 0 kg; name aluminium; pedigree (1,1,1,1,1)
  Data from Xiao et al. 2015.
  properties: dry mass 1 kg, wet mass 1 kg
- scrap aluminium: 0 kg; pedigree (1,1,1,1,1)
  The amount is set equal to the input amount for the respective material.
  production volume 0 kg
    Calculated from production volume of reference product using the relative outputs.
  properties: dry mass 1 kg, wet mass 1 kg
- scrap steel: 0 kg; pedigree (1,1,1,1,1)
  The amount is set equal to the input amount for the respective material.
  production volume 0 kg
    Calculated from production volume of reference product using the relative outputs.
  properties: wet mass 1 kg, dry mass 1 kg
- sodium hydroxide, without water, in 50% solution state: 0.00110555 kg; name hydroxide; lognormal variance with pedigree 0.0035, pedigree (1,4,2,3,2)
  Data from Xiao et al. 2015. In terms of outputs, assumed to have gone to waste water.
  properties: dry mass 1 kg, wet mass 1 kg
- lithium fluoride: 0.00331865 kg; name lithium_fluo; lognormal variance with pedigree 0.0035, pedigree (1,4,2,3,2)
  Used here in place of fluorozirconate. In terms of output, assumed to have gone to wastewater. Data from Xiao et al. 2015.
  properties: wet mass 1 kg, dry mass 1 kg
- dimethyldichlorosilane: 0.00331865 kg; name dymethyl; lognormal variance with pedigree 0.0035, pedigree (1,4,2,3,2)
  Data from Xiao et al. 2015. In terms of outputs, assumed to have gone to waste water.
- steam, in chemical industry: 0 kg; pedigree (1,1,1,1,1)
  Data from Xiao et al. 2015.
  properties: wet mass 1 kg, dry mass 1 kg
- sodium percarbonate, powder: 0 kg; name percarbonate; pedigree (1,1,1,1,1)
  Data from Xiao et al. 2015. In terms of outputs, assumed to have gone to waste water.
  properties: wet mass 1 kg, carbon content, fossil 0.0902256, dry mass 1 kg
- epoxy resin, liquid: 0 kg; name resin; pedigree (1,1,1,1,1)
  Data from Xiao et al. 2015. In terms of outputs, assumed to have gone to waste PVC.
  properties: wet mass 1 kg, dry mass 1 kg, carbon content, fossil 0.42325
- phenyl isocyanate: 6.45403 kg; name phenyl; lognormal variance with pedigree 0.0035, pedigree (1,4,2,3,2)
  Data from Xiao et al. 2015. In terms of outputs, assumed to have gone to waste water.
  properties: carbon content, fossil 0.705801, dry mass 1 kg, wet mass 1 kg
- 1,1-difluoroethane, HFC-152a: 0.239037 kg; name HFC; lognormal variance with pedigree 0.0035, pedigree (1,4,2,3,2)
  Used here in place of pentafluoropropane. Data from Xiao et al. 2015.
  properties: carbon content, fossil 0.363636, wet mass 1 kg, dry mass 1 kg
- polystyrene, high impact: 10.1813 kg; name PS; lognormal variance with pedigree 0.0035, pedigree (1,4,2,3,2)
  Data from Xiao et al. 2015.
  properties: wet mass 1 kg, carbon content, fossil 0.923077, dry mass 1 kg
- wastewater, average: 0 m3; pedigree (1,1,1,1,1)
  The amount is set equal to the input amount for the respective material.
  production volume 0 m3
    Calculated from production volume of reference product using the relative outputs.
  properties: water content 2882.2, dry mass 0.346837 kg, wet mass 1000 kg, carbon content, non-fossil 0.194039
  note on carbon content, non-fossil: 0.0673 kg TOC/m3 (Tab A.17, ecoinvent v2.2 report 13_I). TOC was considered as Total Carbon.
- waste polystyrene: 0 kg; pedigree (1,1,1,1,1)
  The amount is set equal to the input amount for the respective material. Includes waste from all types of polystyrene.
  production volume 0 kg
    Calculated from production volume of reference product using the relative outputs.
  properties: dry mass 1 kg, carbon content, fossil 0.922579, wet mass 1 kg
- copper: 1.30276 kg; lognormal variance with pedigree 0.0035, pedigree (1,4,2,3,2)
  Data from Xiao et al. 2015.
  properties: dry mass 1 kg, wet mass 1 kg
- methylcyclopentane: 0.478076 kg; name methyl; lognormal variance with pedigree 0.0035, pedigree (1,4,2,3,2)
  Data from Xiao et al. 2015. In terms of outputs, assumed to have gone to waste water.
  properties: wet mass 1 kg, carbon content, fossil 0.857143, dry mass 1 kg
- energy and auxilliary inputs, metal working factory: 0 kg; pedigree (1,1,1,1,1)
  Estimated value.The input of infrastructure is approximated with the exchange 'metal working factory', this was chosen as metal is the main material constituting the final product. The general comment for the activity 'metal working faculty, GLO' [accessed 19.01.2018] specifies: '4.58E-10 units of this process are needed to produce 1 kg of final product. Additionally, the dataset for 'metal working factory' needs to be used together with the 'energy and auxilliary inputs, metal working factory', 1 kg of this exchange is required per 1 kg of final product.
- polyol: 0 kg; pedigree (1,1,1,1,1)
  Data from Xiao et al. 2015. In terms of outputs, assumed to have gone to waste water.
  properties: dry mass 1 kg, carbon content, fossil 0.640856, wet mass 1 kg
- metal working factory: 2.73699e-8 unit; = 4.58E-10*60; lognormal variance with pedigree 0.3029, pedigree (1,4,2,3,2)
  (same comment as for energy and auxilliary inputs, metal working factory)
- polyvinylchloride, suspension polymerised: 0.464796 kg; name PVC; lognormal variance with pedigree 0.0114, pedigree (1,4,2,4,3)
  Data from Xiao et al. 2015.
  properties: wet mass 1 kg, dry mass 1 kg, carbon content, fossil 0.387097
- waste polyvinylchloride: -0.0553908, -0.0042703, -0.00176379, -0.00167488, -0.0639113, -0.00071255, -0.000322956, -0.447414 kg (8 entries); lognormal variance with pedigree 0.0035, pedigree (1,4,2,3,2)
  The amount is set equal to the input amount for the respective material.
  production volume 5.77776e7 kg
- compressed air, 800 kPa gauge: 5.47849, 13.4633 m3 (2 entries); lognormal variance with pedigree 0.0035, pedigree (1,4,2,3,2)
  Data from Xiao et al. 2015.
- scrap copper: -0.413245, -0.0193886, -0.870125 kg (3 entries); lognormal variance with pedigree 0.0035, pedigree (1,4,2,3,2)
  The amount is set equal to the input amount for the respective material.
  production volume 1.308e8 kg
- sodium silicate, solid: 0.00146327, 0.00296293 kg (2 entries); lognormal variance with pedigree 0.0035, pedigree (1,4,2,3,2)
  Data from Xiao et al. 2015. In terms of outputs, assumed to have gone to waste water.
- aluminium, primary, ingot: 1.90608, 0.274473 kg (2 entries); lognormal variance with pedigree 0.0035, pedigree (1,4,2,3,2)
  Data from Xiao et al. 2015.
- scrap aluminium: -0.691687, -0.0324524, -1.45641 kg (3 entries); lognormal variance with pedigree 0.0035, pedigree (1,4,2,3,2)
  The amount is set equal to the input amount for the respective material.
  production volume 2.18932e8 kg
- scrap steel: -7.78318, -0.00983988, -24.1714 kg (3 entries); lognormal variance with pedigree 0.0035, pedigree (1,4,2,3,2)
  The amount is set equal to the input amount for the respective material.
  production volume 3.2093e9 kg
- steam, in chemical industry: 1.16099, 6.58485 kg (2 entries); lognormal variance with pedigree 0.0035, pedigree (1,4,2,3,2)
  Data from Xiao et al. 2015.
- sodium percarbonate, powder: 0.00109712, 0.00222153 kg (2 entries); lognormal variance with pedigree 0.0035, pedigree (1,4,2,3,2)
  Data from Xiao et al. 2015. In terms of outputs, assumed to have gone to waste water.
- epoxy resin, liquid: 0.0192557, 0.0914091 kg (2 entries); lognormal variance with pedigree 0.0035, pedigree (1,4,2,3,2)
  Data from Xiao et al. 2015. In terms of outputs, assumed to have gone to waste PVC.
- wastewater, average: -0.0171165, -0.00185169, -0.0358114 m3 (3 entries); lognormal variance with pedigree 0.0035, pedigree (1,4,2,3,2)
  The amount is set equal to the input amount for the respective material.
  production volume 5.5e6 m3
- waste polystyrene: -0.979994, -0.0755518, -0.0312056, -0.0296326, -1.13074, -0.0126067, -0.00571386, -7.91581 kg (8 entries); lognormal variance with pedigree 0.0035, pedigree (1,4,2,3,2)
  (same comment as for waste polystyrene)
  production volume 1.02222e9 kg
- energy and auxilliary inputs, metal working factory: 4.99054e-9, 2.23793e-8 kg (2 entries); lognormal variance with pedigree 0.0035, pedigree (1,4,2,3,2)
  (same comment as for energy and auxilliary inputs, metal working factory)
- polyol: 1.58048, 3.20028 kg (2 entries); lognormal variance with pedigree 0.0035, pedigree (1,4,2,3,2)
  Data from Xiao et al. 2015. In terms of outputs, assumed to have gone to waste water.

## Inputs from nature
- Water, unspecified natural origin [natural resource, in water]: 0.0547796 m3; name water; lognormal variance with pedigree 0.0035, pedigree (1,4,2,3,2)
  Data from Xiao et al. 2015.

## Emissions to nature
- Ethane, 1,1-difluoro-, HFC-152a [air, urban air close to ground]: 0.239037 kg; = HFC; lognormal variance with pedigree 0.122825, pedigree (1,4,2,2,2)
  Used here in place of pentafluoropropane released to the atmosphere. The output amount is set equal to the amount of input material, 1,1-difluoroethane. Data from Xiao et al. 2015.

## Sampling procedure
Manufacturing data are taken from Xiao et al. 2015. Data on the annual production volume are taken from German International Cooperation 2011. Sources: Xiao, R., Zhang, Y., Liu, X., and Yuan, Z., 2015. A life-cycle assessment of household refrigerators in China. Journal of Cleaner Production, 95, 301-310. German International Cooperation 2011. Production conversion of domestic refrigerators from halogenated to hydrocarbon refrigerants. A guideline. GIZ, Eschborn, Germany. Available from: https://www.giz.de/expertise/downloads/giz2011-en-production-conversion-domestic-refrigerators.pdf (Accessed 20 January 2018).
