# photovoltaic panel production, ribbon-Si

Dataset: EcoSpold 2, unit process
Geography: RER
Time period: 2005-01-01 to 2019-12-31
Technology level: current
Classification: ISIC rev.4 ecoinvent: 2610:Manufacture of electronic components and boards
Classification: EcoSpold01Categories: photovoltaic/production of components
Synonyms: Solarmodul; polycrystalline; silicon; multi-crystalline; PV-module
Tags: ConvertedDataset
Scenario: Business-as-Usual
System model: Allocation at the point of substitution
Share of production covered: 5 %
Generated by: Mariska J. de Wild-Scholten
Published in: Jungbluth, N. 2007
Database: ecoinvent
isCopyrightProtected: true
accessRestrictedTo: 1

## General comment
Unit process raw data for 1 m2 of PV panel. Investigated for the production of solar panels and laminates with 60 solar cells a 156*156cm2 with a capacity of 192 Wp. Cell size and amount and capacity might differ between different producers.
[This dataset was already contained in the ecoinvent database version 2. It was not individually updated during the transfer to ecoinvent version 3. Life Cycle Impact Assessment results may still have changed, as they are affected by changes in the supply chain, i.e. in other datasets. This dataset was generated following the ecoinvent quality guidelines for version 2. It may have been subject to central changes described in the ecoinvent version 3 change report (http://www.ecoinvent.org/database/ecoinvent-version-3/reports-of-changes/), and the results of the central updates were reviewed extensively. The changes added e.g. consistent water flows and other information throughout the database. The documentation of this dataset can be found in the ecoinvent reports of version 2, which are still available via the ecoinvent website. The change report linked above covers all central changes that were made during the conversion process.]

## Included activities end
Production of the cell matrix, cutting of foils and washing of glass, production of laminate, isolation. Aluminium frame of the panel. Disposal after end of life. Data for direct air and water emissions were not available. It can be expected that small amount of NMVOC will be emitted from the lamination process.

## Geography
Production plants in Western Europe.

## Technology
Modern production plant.

## Time period
Date of data investigation. Some older data from 2001.

## Parameters
- fraction, tap water, to air: 0.15; name fraction_TW_to_air; = fraction_PW_to_air; lognormal variance with pedigree 0.092025, pedigree (4,4,3,2,4)
  Calculated value. See comment in the other parametres present in this dataset. Tap water is considered to be always used as process water, thus process water fractions to air are applied to all tap water input flows to calculate the amount of water consumed in the processes.
- fraction, process water, to air: 0.15 dimensionless; name fraction_PW_to_air; lognormal variance with pedigree 0.092025, pedigree (4,4,3,2,4)
  Literature value. In case when no industry/process specific data are available, default evaporation fraction value is used. This value is 15% and is based on literature (Statistics Canada, 2007 & Shaffer, K.H., 2008, Consumptive water use in the Great Lakes Basin, USGS & Shiklomanov, 2003, World Water Resources at the Beginning of the 21st Century) and has been approved by an expert.

## Reference product
- photovoltaic panel, ribbon-Si: 1 m2; CPC 47150: Diodes, transistors and similar semi-conductor devices; photosensitive semi-conductor devices; light emitting […]; By-product classification allocatable product
  EcoSpold01Location=RER
  production volume 205335 m2
    Worldwide module production in 2005, 1500MWp (60%mc-Si, 40% sc-Si).
    Calculated from GLO production volumes, assuming that Europe produces 36% of panels (info obtained from Fig 8.1, ecoinvent v2 report 6_XII). From information in ecoinvent v2 report 6_XII, laminate were treated as panels.
  property price 242 EUR2005
    The production volume of this product is small compared to other products supplied by the activities within the same ISIC 3 category. Therefore, an average price of products supplied by the activities in the same ISIC 3 code has been applied.This price is obtained as '_69 Radio, television and communication equipment, EU27' in the 'EU & DK Input Output Database' (available in SimaPro, 19.28 EUR2003 per kg DS). The price is assumed to be valid for both RER2005, world 2005. Weight of product according to Ecoinvent: approx 12.6 kg per m2.
  property true value 242
    allocation property applied in "true value" allocation // value calculated from revenue

## By-products
- heat, for reuse in municipal waste incineration only: 0 MJ; CPC 17300: Steam and hot water; By-product classification allocatable product; pedigree (1,1,1,1,1)
  Net useful heat generated from this waste and used in internal MSWI plant energy redistribution.
  Uncertainty: uncertainty is calculated from uncertainties in waste composition and uncertainties in energy efficiency and the uncertainty in internal energy demand
  production volume 157083 MJ
  property true value relation 0.1842; name E_th_prod_MSWI_true_value_relation
    property to calculate "true value" from
  property exergy 0.1842 MJ; name E_th_prod_MSWI_exergy
    This exergy property is based on the exergy content of the product.
  property price 0.0106 EUR2005; name E_th_prod_MSWI_price_EUR2005
    Average European district heat price from Ecoheatcool and Euroheat 2005-2006, Ecoheat Work package 1: The European heat market. Final report. 10.6 EUR/GJ i s the price of district heat. http://www.solarthermalworld.org/files/Ecoheatcool%20WP1%20Web.pdf?download
  property true value 0.00502545
    allocation property applied in "true value" allocation // value calculated from true value relation
- electricity, for reuse in municipal waste incineration only: 0 kWh; CPC 17100: Electrical energy; By-product classification allocatable product; pedigree (1,1,1,1,1)
  Net electricity generated from this waste and used in internal MSWI plant energy redistribution.
  Uncertainty: uncertainty is calculated from uncertainties in waste composition and uncertainties in energy efficiency and the uncertainty in internal energy demand
  production volume 22305.2 kWh
  property exergy 3.6 MJ; name E_el_prod_MSWI_exergy
    This exergy property is based on the exergy content of the product.
  property price 0.1 EUR2005; name E_el_prod_MSWI_price_EUR2005
    Estimated to be the same price as in case of electricity, medium voltage.
  property true value relation 3.6; name E_el_prod_MSWI_true_value_relation
    property to calculate "true value" from
  property true value 0.0139465
    (same comment as for heat, for reuse in municipal waste incineration only)
- zinc concentrate: 0 kg; CPC 14290: Other non-ferrous metal ores and concentrates (other than uranium or thorium ores and concentrates); By-product classification allocatable product
  Calculated value from the knowledge of the properties of both products.
  production volume 51.6713 kg
  property price 0.38 EUR2005; name ByP_price_EUR2005
    Temporary price data. Calculated as 90% of purchasers price based on: Zinc content in concentrate 53%. Concentrate price per kg Zn 86.5% of refined Zn price (13.5% treatment charges according to CHR Metals Limited 2005: Dynamic cost curves. http://www.minecost.com/dynamic.pdf). 2004 zinc price from USGS (2007) Mineral commodity summaries 2007. <http://minerals.usgs.gov/minerals/pubs/mcs/2007/mcs2007.pdf> [Accessed 25 May 2010]
  property zinc content 0.53; name zinc_C_zinc_concentrate
    Zinc content on a dry matter basis. Value taken from teh "zinc mine operation" /GLO dataset.
  property dry mass 1 kg; name DM_zinc_concentrate
  property carbon content 0
    carbon content on a dry matter basis (reserved; not for manual entry)
  property true value 9.56248e-5
    allocation property applied in "true value" allocation // value calculated from revenue
  properties: wet mass 1 kg, water content 0, carbon content, non-fossil 0, carbon content, fossil 0, water in wet mass 0 kg, carbon allocation 0 kg

## Inputs from technosphere
- acetone, liquid: 0.012958 kg; lognormal variance with pedigree 0.0421, pedigree (1,4,5,3,1)
  De Wild 2007, cleaning fluid
  EcoSpold01Location=RER
  Uncertainty: de Wild 2007, cleaning fluid
  properties: carbon content, fossil 0.62069, dry mass 1 kg, wet mass 1 kg
- glass fibre reinforced plastic, polyamide, injection moulded: 0.187795 kg; lognormal variance with pedigree 0.0421, pedigree (1,4,5,3,1)
  EcoSpold01Location=RER
  De Wild 2007, polyphenylenoxid for junction box
  Uncertainty: de Wild 2007, polyphenylenoxid for junction box
  properties: carbon content, fossil 0.446018, wet mass 1 kg, dry mass 1 kg
  note on carbon content, fossil: Polyamide resin assimilate to Nylon 66 (ecoinvent v2.2 report 7_XIII). Nylon 66 is derived from hexamethylene diamine and adipic acid and has the following structure: -(HN-(CH2)6-NH-CO-(CH2)4-CO)n- (ecoinvent v2.2 report 11_II), C12H22N2O2. MW=226 g/mol. Here Nylon 66 is – mainly for improved stiffness and stability – modified with glass fibres. The glass fibre content in the product is assumed of 30%. (ecoinvent v2.2 report 11_II)
- methanol: 0.00215543 kg; lognormal variance with pedigree 0.0421, pedigree (1,4,5,3,1)
  EcoSpold01Location=CH
  GSS 2001, auxiliary material
  Uncertainty: GSS 2001, auxiliary material
  properties: carbon content, fossil 0.375, dry mass 1 kg, wet mass 1 kg
- electricity, medium voltage: 4.71033 kWh; lognormal variance with pedigree 0.0426, pedigree (3,3,5,1,1)
  Calculated mean figure of 3 companies
  EcoSpold01Location=UCTE
  Uncertainty: calculated mean figure of 3 companies
- waste polyvinylfluoride: -0.110391 kg; lognormal variance with pedigree 0.0421, pedigree (1,4,5,3,1)
  EcoSpold01Location=CH
  Calculation, including disposal of the panel after life time
  Uncertainty: Calculation, including disposal of the panel after life time
  production volume 22669 kg
    Calculated from the production volume of photovoltaic panel, ribbon-Si in proportion to the respective output amounts.
  properties: water content 0.00200401, dry mass 0.998 kg, carbon content, fossil 0.571142, wet mass 1 kg
  note on carbon content, fossil: C content in 1 kg DM was calculated using data in Tab A.2, ecoinvent v2.2 report 13_I
- wire drawing, copper: 0.112681 kg; lognormal variance with pedigree 0.0421, pedigree (1,4,5,3,1)
  EcoSpold01Location=RER
  Estimation for use of copper wires
  Uncertainty: estimation for use of copper wires
- photovoltaic panel factory: 3.99968e-6 unit; lognormal variance with pedigree 0.3421, pedigree (1,4,5,3,1)
  Literature
  EcoSpold01Location=GLO
  Uncertainty: Literature
- wastewater, from residence: -0.0212843 m3; lognormal variance with pedigree 0.0421, pedigree (1,4,5,3,1)
  Calculation, water use
  EcoSpold01Location=CH
  Uncertainty: Calculation, water use
  production volume 4370.76 m3
    (same comment as for waste polyvinylfluoride)
  properties: water content 2962.17, carbon content, non-fossil 0.199421, dry mass 0.337476 kg, wet mass 1000 kg
  note on carbon content, non-fossil: 0.0673 kg TOC/m3 (Tab A.17, ecoinvent v2.2 report 13_I). TOC was considered as Total Carbon.
- aluminium alloy, AlMg3: 2.62919 kg; lognormal variance with pedigree 0.0421, pedigree (1,4,5,3,1)
  De Wild 2007, profile for frame
  EcoSpold01Location=RER
  Uncertainty: de Wild 2007, profile for frame
  properties: dry mass 1 kg, wet mass 1 kg
- tempering, flat glass: 10.0782 kg; lognormal variance with pedigree 0.0421, pedigree (1,4,5,3,1)
  EcoSpold01Location=RER
  De Wild 2007
  Uncertainty: de Wild 2007
- nickel, 99.5%: 0.000162757 kg; lognormal variance with pedigree 0.0421, pedigree (1,4,5,3,1)
  EcoSpold01Location=GLO
  De Wild 2007, plating on interconnect ribbons
  Uncertainty: de Wild 2007, plating on interconnect ribbons
  properties: wet mass 1 kg, dry mass 1 kg
- tap water: 21.2843 kg; name tap_water_input; lognormal variance with pedigree 0.0421, pedigree (1,4,5,3,1)
  De Wild 2007, glass rinsing and general use
  EcoSpold01Location=RER
  Uncertainty: de Wild 2007, glass rinsing and general use
  properties: water content 2962.17, wet mass 1 kg, dry mass 0.000337476 kg, carbon content, fossil 0.00178991
  note on carbon content, fossil: Bicarbonate content is 2.93 mol/m3. CO2 content is 0.1 mol/m3 (ecoinvent v2.2 report 8, Tab 93.1).
- 1-propanol: 0.00813796 kg; lognormal variance with pedigree 0.0421, pedigree (1,4,5,3,1)
  De Wild 2007, soldering flux, 95% propanol
  EcoSpold01Location=RER
  Uncertainty: de Wild 2007, soldering flux, 95% propanol
  properties: dry mass 1 kg, carbon content, fossil 0.6, wet mass 1 kg
- lubricating oil: 0.00160677 kg; lognormal variance with pedigree 0.0421, pedigree (1,4,5,3,1)
  GSS 2001, auxiliary material
  EcoSpold01Location=RER
  Uncertainty: GSS 2001, auxiliary material
  properties: wet mass 1 kg, carbon content, fossil 0.75, dry mass 1 kg
  note on carbon content, fossil: Lubricating oil is produced from diesel. C-content/dry mass of fats and oils considered 75%, from: ecoinvent v2.2 report, n 15a, pg 40
- brazing solder, cadmium free: 0.00876401 kg; lognormal variance with pedigree 0.0421, pedigree (1,4,5,3,1)
  De Wild 2007, Sn60Pb40 plating on tabbing material, Sn plating on interconnect/terminal ribbons
  EcoSpold01Location=RER
  Uncertainty: de Wild 2007, Sn60Pb40 plating on tabbing material, Sn plating on interconnect/terminal ribbons
  properties: dry mass 1 kg, wet mass 1 kg
- silicone product: 0.12194 kg; lognormal variance with pedigree 0.0421, pedigree (1,4,5,3,1)
  De Wild 2007, kit to attach frame and junction box and for diaphragm of laminator
  EcoSpold01Location=RER
  Uncertainty: de Wild 2007, kit to attach frame and junction box and for diaphragm of laminator
  properties: carbon content, fossil 0.324324, wet mass 1 kg, dry mass 1 kg
  note on carbon content, fossil: The term silicones is used for compounds in which silicon atoms are linked via oxygen atoms, each silicon atom bearing one or several organic groups. In industrially important silicones, these groups are usually methyl or phenyl (ecoinvent v2.2 report 8_part71 & Ullmann). The chemical formula was considered to be [Si(CH3)2O]n (Ullmann).
- heat, district or industrial, natural gas: 4.86601 MJ; lognormal variance with pedigree 0.0426, pedigree (3,3,5,1,1)
  EcoSpold01Location=RER
  Calculated mean figure of 3 companies
  Uncertainty: calculated mean figure of 3 companies
- municipal solid waste: -0.0299976 kg; lognormal variance with pedigree 0.0421, pedigree (1,4,5,3,1)
  Alsema (personal communication) 2007, production waste
  EcoSpold01Location=CH
  Uncertainty: Alsema (personal communication) 2007, production waste
  production volume 6160.05 kg
    (same comment as for waste polyvinylfluoride)
  properties: wet mass 1 kg, dry mass 0.771 kg, carbon content, non-fossil 0.261655, water content 0.297017, carbon content, fossil 0.171549
  note on carbon content, non-fossil: MSW composition in tab 4.1, ecoinvent v2.2 report 13_I. C content referred to 1 kg DM
- waste mineral oil: 0 kg; pedigree (1,1,1,1,1)
  EcoSpold01Location=CH
  Calculation, oil used during production
  Uncertainty: Calculation, oil used during production
  production volume 0 kg
    (same comment as for waste polyvinylfluoride)
  properties: water content 0.111111, dry mass 0.9 kg, wet mass 1 kg, carbon content, fossil 0.864444
  note on carbon content, fossil: Tab A.6, ecoinvent v2.2 report 13_I. C content has been calculated after data in the tables, and then referred to 1 kg DM
- vinyl acetate: 0.00164327 kg; lognormal variance with pedigree 0.0421, pedigree (1,4,5,3,1)
  EcoSpold01Location=RER
  GSS 2001, ethylacetat, auxiliary material
  Uncertainty: GSS 2001, ethylacetat, auxiliary material
  properties: carbon content, fossil 0.55814, wet mass 1 kg, dry mass 1 kg
  note on carbon content, fossil: Vinyl acetate (CH3CO2CH=CH2) (ecoinvent v2.2 report 11_II), C4H6O2. MW=86 g/mol
- photovoltaic cell, ribbon-Si: 0.932337 m2; lognormal variance with pedigree 0.0421, pedigree (1,4,5,3,1)
  EcoSpold01Location=RER
  De Wild 2007, Estimation 60 cells a 1.56dm2 +2% cell loss
  Uncertainty: de Wild 2007, Estimation 60 cells a 1.56dm2 +2% cell loss
  properties: carbon content, fossil 0.0139333, dry mass 0.68 kg, wet mass 0.68 kg
  note on carbon content, fossil: C content was calculated as the addition of C content in the components
- polyvinylfluoride, film: 0.110391 kg; lognormal variance with pedigree 0.0421, pedigree (1,4,5,3,1)
  De Wild 2007, back foil, for solar cell module, 350 micron thickness: 2x37 micron polyvinyl fluoride, 250 micron polyethylene terephthalate; 0.488 g/m2, 7% cutting loss
  EcoSpold01Location=US
  Uncertainty: de Wild 2007, back foil, for solar cell module, 350 micron thickness: 2x37 micron polyvinyl fluoride, 250 micron polyethylene terephthalate; 0.488 g/m2, 7% cutting loss
  properties: dry mass 1 kg, carbon content, fossil 0.521739, wet mass 1 kg
- waste plastic, mixture: -1.68597 kg; lognormal variance with pedigree 0.0421, pedigree (1,4,5,3,1)
  Calculation, including disposal of the panel after life time
  EcoSpold01Location=CH
  Uncertainty: Calculation, including disposal of the panel after life time
  production volume 346215 kg
    (same comment as for waste polyvinylfluoride)
  properties: carbon content, fossil 0.747344, water content 0.180638, wet mass 1 kg, dry mass 0.847 kg
- solar glass, low-iron: 10.0782 kg; lognormal variance with pedigree 0.0601, pedigree (1,4,5,3,3)
  De Wild 2007, 4mm thickness (3.2-4 mm for different producers), 1% losses, density 2.5 g/cm3
  EcoSpold01Location=RER
  Uncertainty: de Wild 2007, 4mm thickness (3.2-4 mm for different producers), 1% losses, density 2.5 g/cm3
  properties: dry mass 1 kg, wet mass 1 kg
- copper: 0.112681 kg; lognormal variance with pedigree 0.0421, pedigree (1,4,5,3,1)
  De Wild 2007, copper ribbons for cell interconnection
  EcoSpold01Location=RER
  Uncertainty: de Wild 2007, copper ribbons for cell interconnection
  properties: dry mass 1 kg, wet mass 1 kg
- ethylvinylacetate, foil: 1.00162 kg; lognormal variance with pedigree 0.0421, pedigree (1,4,5,3,1)
  De Wild 2007, EVA consumption 0.96 kg/m2, 6% more than glass area
  EcoSpold01Location=RER
  Uncertainty: de Wild 2007, EVA consumption 0.96 kg/m2, 6% more than glass area
  properties: dry mass 1 kg, wet mass 1 kg, carbon content, fossil 0.79734
  note on carbon content, fossil: Ethylene vinyl acetate copolymer contains 20% of vinyl acetate (ecoinvent v2.2 report 11_II)
- polyethylene terephthalate, granulate, amorphous: 0.372941 kg; lognormal variance with pedigree 0.0421, pedigree (1,4,5,3,1)
  EcoSpold01Location=RER
  De Wild 2007, back foil, for solar cell module, 350 micron thickness: 2x37 micron polyvinyl fluoride, 250 micron polyethylene terephthalate; 0.488 g/m2, 7% cutting loss
  Uncertainty: de Wild 2007, back foil, for solar cell module, 350 micron thickness: 2x37 micron polyvinyl fluoride, 250 micron polyethylene terephthalate; 0.488 g/m2, 7% cutting loss
  properties: carbon content, fossil 0.625, wet mass 1 kg, dry mass 1 kg
  note on carbon content, fossil: Polymer of the ethylen terephtalate monomer (C10H8O4)n (ecoinvent v2.2 report 11_II), MW=192 g/mol
- corrugated board box: 1.09551 kg; lognormal variance with pedigree 0.0421, pedigree (1,4,5,3,1)
  De Wild 2007, packaging estimation
  EcoSpold01Location=RER
  Uncertainty: de Wild 2007, packaging estimation
  properties: water content 0.0582011, carbon content, fossil 0.000656085, carbon content, non-fossil 0.432275, wet mass 1 kg, dry mass 0.945 kg
  note on carbon content, fossil: Fossil C content was calculated after fossil C contents of chemicals used in the production of board (Tab 10-15 & 10.16 ecoinvent v2.2 report 11_III, part 10)
  note on carbon content, non-fossil: Biogenic C content was calculated after biogenic C contents of chemicals used in the production of board (Tab 10.15 & 10.16, ecoinvent v2.2 report 11_III, part 10).
- waste mineral oil: -0.00157044, -3.63383e-5 kg (2 entries); lognormal variance with pedigree 0.0421, pedigree (1,4,5,3,1)
  (same comment as for waste mineral oil)
  production volume 329.953 kg

## Emissions to nature
- Water [air, unspecified]: 0.00319265 m3; name water_to_air_unspecified; = (tap_water_input/1000*fraction_TW_to_air); lognormal variance with pedigree 0.0807, pedigree (2,2,5,1,1)
  Calculated value based on literature values and expert opinion. See comments in the parametres' comment field.
  property fraction, origin: unspecified 0; name fraction_origin_unspecified
  property fraction, origin: salt water 0; name fraction_origin_salt_water
  property fraction, origin: fresh water 1; name fraction_origin_fresh_water

## Sampling procedure
Environmental reports, direct contacts with factory representatives and publication of plant data.

## Extrapolations
Rough assumption for the use of heat in the process.

## Review by Roberto Dones 2007-08-23
Passed.
none
