# treatment of hard coal ash, residual material landfill

Dataset: EcoSpold 2, unit process
Geography: HR
Time period: 1994-01-01 to 2019-12-31
Technology level: current
Classification: EcoSpold01Categories: waste management/residual material landfill
Classification: ISIC rev.4 ecoinvent: 3822:Treatment and disposal of hazardous waste
Tags: Treatment; ConvertedDataset
Scenario: Business-as-Usual
System model: Allocation at the point of substitution
Generated by: Gabor Doka (obsolete)
Published in: Doka G. 2009
Database: ecoinvent
isCopyrightProtected: true
accessRestrictedTo: 1

## General comment
Inventoried waste contains 100% HR hard coal ash; .
waste composition (wet, in ppm): H2O n.a.; O 536270; H n.a.; C n.a.; S 2916.7; N n.a.; P 747.76; B 263.28; Cl 75; Br 60; F 37.5; I 3.75; Ag n.a.; As 73.615; Ba 1500; Cd 3.6828; Co 37.388; Cr 150; Cu 112.06; Hg 0.075224; Mn 525; Mo 22.433; Ni 148.97; Pb 295.52; Sb 7.4328; Se 6.226; Sn 15; V 299.1; Zn 368.28; Be 15; Sc 30.018; Sr 1497.8; Ti 4500; Tl 7.4552; W 7.5; Si 187500; Fe 52500; Ca 15000; Al 127500; K 15000; Mg 45000; Na 7500;
Share of carbon in waste that is biogenic 60.4%.
[This dataset was already contained in the ecoinvent database version 2. It was not individually updated during the transfer to ecoinvent version 3. Life Cycle Impact Assessment results may still have changed, as they are affected by changes in the supply chain, i.e. in other datasets. This dataset was generated following the ecoinvent quality guidelines for version 2. It may have been subject to central changes described in the ecoinvent version 3 change report (http://www.ecoinvent.org/database/ecoinvent-version-3/reports-of-changes/), and the results of the central updates were reviewed extensively. The changes added e.g. consistent water flows and other information throughout the database. The documentation of this dataset can be found in the ecoinvent reports of version 2, which are still available via the ecoinvent website. The change report linked above covers all central changes that were made during the conversion process.]

## Included activities end
Waste-specific short-term emissions to water from leachate. Long-term emissions from landfill to ground water.

## Geography
Technology encountered in Switzerland in 2000. Landfill includes base seal and leachate collection system.

## Technology
Swiss residual material landfill for polluted, inorganic waste. With base seal and leachate collection system. Recultivation after closure.

## Time period
Waste composition as given in literature reference, theoretical data or other source. Transfer coefficients from prospective model.

## Reference product
- hard coal ash: -1 kg; CPC 39: Wastes or scraps; By-product classification Waste
  EcoSpold01Location=HR
  production volume 6.99412e7 kg
    Estimated. Energy prodcution in mainly responsible for hard coal ashes. The production volume is calculated as the sum of hard coal ashes resulting from electricity and heat and power co-generation production from hard coal in the respective country.
  property price 0 EUR2005
    Waste products are assigned a price of zero as they are assumed to require further treatment.
  property carbon content 0
    carbon content on a dry matter basis (reserved; not for manual entry)
  properties: water in wet mass 0 kg, water content 0, carbon content, fossil 0, dry mass 1 kg, wet mass 1 kg, carbon content, non-fossil 0, carbon allocation 0 kg

## Inputs from technosphere
- process-specific burdens, residual material landfill: 1 kg; lognormal variance with pedigree 0.04, pedigree (1,1,5,1,1)
  EcoSpold01Location=CH
  demands per kilogram waste. uncertainty is heeded in the module;activityLink introduced to establish a direct link to the corresponding regional supply of this product
- residual material landfill: 2.0833e-9 unit; lognormal variance with pedigree 0.04, pedigree (1,1,5,1,1)
  EcoSpold01Location=CH
  demands per kilogram waste. uncertainty is heeded in the module

## Emissions to nature
- Antimony [water, ground-, long-term]: 4.8115e-6 kg; lognormal variance with pedigree 1.35, pedigree (1,1,5,1,1)
  uncertainty is calculated from uncertainties in waste composition and transfer coefficients in incinerator and landfills.
- Magnesium [water, ground-, long-term]: 0.005113 kg; lognormal variance with pedigree 1.42, pedigree (1,1,5,1,1)
  (same comment as for Antimony)
- Copper, ion [water, ground-, long-term]: 4.3138e-6 kg; lognormal variance with pedigree 3.64, pedigree (1,1,5,1,1)
  (same comment as for Antimony)
- Manganese [water, ground-, long-term]: 4.3367e-6 kg; lognormal variance with pedigree 6.53, pedigree (1,1,5,1,1)
  (same comment as for Antimony)
- Thallium [water, ground-, long-term]: 2.6991e-6 kg; lognormal variance with pedigree 1.6, pedigree (1,1,5,1,1)
  (same comment as for Antimony)
- Selenium [water, surface water]: 2.1956e-6 kg; lognormal variance with pedigree 1.4, pedigree (1,1,5,1,1)
  uncertainty is calculated from uncertainties in waste composition and transfer coefficients in residual landfill
- Lead [water, ground-, long-term]: 1.5329e-6 kg; lognormal variance with pedigree 7.78, pedigree (1,1,5,1,1)
  (same comment as for Antimony)
- Sodium, ion [water, surface water]: 0.0028146 kg; lognormal variance with pedigree 0.47, pedigree (1,1,5,1,1)
  (same comment as for Selenium)
- Molybdenum [water, ground-, long-term]: 1.0299e-7 kg; lognormal variance with pedigree 1.22, pedigree (1,1,5,1,1)
  (same comment as for Antimony)
- Copper, ion [water, surface water]: 7.2017e-9 kg; lognormal variance with pedigree 2, pedigree (1,1,5,1,1)
  (same comment as for Selenium)
- Cadmium, ion [water, surface water]: 4.1739e-11 kg; lognormal variance with pedigree 2.68, pedigree (1,1,5,1,1)
  (same comment as for Selenium)
- Sodium, ion [water, ground-, long-term]: 0.0046854 kg; lognormal variance with pedigree 0.45, pedigree (1,1,5,1,1)
  (same comment as for Antimony)
- Arsenic, ion [water, ground-, long-term]: 7.3615e-14 kg; lognormal variance with pedigree 1.07, pedigree (1,1,5,1,1)
  (same comment as for Antimony)
- Strontium [water, surface water]: 9.0525e-7 kg; lognormal variance with pedigree 1.36, pedigree (1,1,5,1,1)
  (same comment as for Selenium)
- Barium [water, surface water]: 2.0685e-8 kg; lognormal variance with pedigree 1.86, pedigree (1,1,5,1,1)
  (same comment as for Selenium)
- Chromium VI [water, surface water]: 9.0169e-6 kg; lognormal variance with pedigree 1.12, pedigree (1,1,5,1,1)
  (same comment as for Selenium)
- Titanium, ion [water, ground-, long-term]: 0.0013358 kg; lognormal variance with pedigree 0.87, pedigree (1,1,5,1,1)
  (same comment as for Antimony)
- Cadmium, ion [water, ground-, long-term]: 2.5002e-8 kg; lognormal variance with pedigree 7.67, pedigree (1,1,5,1,1)
  (same comment as for Antimony)
- Zinc, ion [water, surface water]: 7.5352e-9 kg; lognormal variance with pedigree 1.99, pedigree (1,1,5,1,1)
  (same comment as for Selenium)
- Lead [water, surface water]: 2.5591e-9 kg; lognormal variance with pedigree 2.14, pedigree (1,1,5,1,1)
  (same comment as for Selenium)
- Cobalt [water, ground-, long-term]: 6.392e-6 kg; lognormal variance with pedigree 1.91, pedigree (1,1,5,1,1)
  (same comment as for Antimony)
- Iron, ion [water, ground-, long-term]: 0.00026313 kg; lognormal variance with pedigree 7.23, pedigree (1,1,5,1,1)
  (same comment as for Antimony)
- Strontium [water, ground-, long-term]: 0.00054224 kg; lognormal variance with pedigree 0.9, pedigree (1,1,5,1,1)
  (same comment as for Antimony)
- Cobalt [water, surface water]: 1.0671e-8 kg; lognormal variance with pedigree 1.95, pedigree (1,1,5,1,1)
  (same comment as for Selenium)
- Vanadium, ion [water, ground-, long-term]: 0.0002299 kg; lognormal variance with pedigree 0.87, pedigree (1,1,5,1,1)
  (same comment as for Antimony)
- Nickel, ion [water, ground-, long-term]: 5.3932e-5 kg; lognormal variance with pedigree 1.21, pedigree (1,1,5,1,1)
  (same comment as for Antimony)
- Silicon [water, surface water]: 0.00042168 kg; lognormal variance with pedigree 0.66, pedigree (1,1,5,1,1)
  (same comment as for Selenium)
- Tin, ion [water, surface water]: 4.7452e-10 kg; lognormal variance with pedigree 2.36, pedigree (1,1,5,1,1)
  (same comment as for Selenium)
- Chromium VI [water, ground-, long-term]: 2.8483e-5 kg; lognormal variance with pedigree 0.95, pedigree (1,1,5,1,1)
  (same comment as for Antimony)
- Sulfate [water, surface water]: 0.00093877 kg; lognormal variance with pedigree 0.67, pedigree (1,1,5,1,1)
  (same comment as for Selenium)
- Mercury [water, surface water]: 5.9277e-12 kg; lognormal variance with pedigree 2.95, pedigree (1,1,5,1,1)
  (same comment as for Selenium)
- Aluminium [water, surface water]: 6.3186e-5 kg; lognormal variance with pedigree 0.89, pedigree (1,1,5,1,1)
  (same comment as for Selenium)
- Fluoride [water, ground-, long-term]: 3.5468e-5 kg; lognormal variance with pedigree 1.13, pedigree (1,1,5,1,1)
  (same comment as for Antimony)
- Barium [water, ground-, long-term]: 1.239e-5 kg; lognormal variance with pedigree 6.4, pedigree (1,1,5,1,1)
  (same comment as for Antimony)
- Tin, ion [water, ground-, long-term]: 2.8424e-7 kg; lognormal variance with pedigree 5.19, pedigree (1,1,5,1,1)
  (same comment as for Antimony)
- Bromine [water, ground-, long-term]: 1.1802e-5 kg; lognormal variance with pedigree 1.09, pedigree (1,1,5,1,1)
  (same comment as for Antimony)
- Silicon [water, ground-, long-term]: 0.18708 kg; lognormal variance with pedigree 0.11, pedigree (1,1,5,1,1)
  (same comment as for Antimony)
- Calcium, ion [water, ground-, long-term]: 0.0013554 kg; lognormal variance with pedigree 1.8, pedigree (1,1,5,1,1)
  (same comment as for Antimony)
- Zinc, ion [water, ground-, long-term]: 4.5136e-6 kg; lognormal variance with pedigree 5.67, pedigree (1,1,5,1,1)
  (same comment as for Antimony)
- Boron [water, ground-, long-term]: 0.00025887 kg; lognormal variance with pedigree 0.87, pedigree (1,1,5,1,1)
  (same comment as for Antimony)
- Beryllium [water, surface water]: 9.066e-9 kg; lognormal variance with pedigree 1.97, pedigree (1,1,5,1,1)
  (same comment as for Selenium)
- Chloride [water, ground-, long-term]: 5.3549e-5 kg; lognormal variance with pedigree 1.04, pedigree (1,1,5,1,1)
  (same comment as for Antimony)
- Bromine [water, surface water]: 4.8198e-5 kg; lognormal variance with pedigree 1.07, pedigree (1,1,5,1,1)
  (same comment as for Selenium)
- Iodide [water, surface water]: 3.75e-6 kg; lognormal variance with pedigree 1.44, pedigree (1,1,5,1,1)
  (same comment as for Selenium)
- Thallium [water, surface water]: 4.5059e-9 kg; lognormal variance with pedigree 2.07, pedigree (1,1,5,1,1)
  (same comment as for Selenium)
- Manganese [water, surface water]: 7.2398e-9 kg; lognormal variance with pedigree 2, pedigree (1,1,5,1,1)
  (same comment as for Selenium)
- Arsenic, ion [water, surface water]: 7.3615e-5 kg; lognormal variance with pedigree 1.04, pedigree (1,1,5,1,1)
  (same comment as for Selenium)
- Titanium, ion [water, surface water]: 2.2301e-6 kg; lognormal variance with pedigree 1.25, pedigree (1,1,5,1,1)
  (same comment as for Selenium)
- Iron, ion [water, surface water]: 4.3928e-7 kg; lognormal variance with pedigree 1.51, pedigree (1,1,5,1,1)
  (same comment as for Selenium)
- Selenium [water, ground-, long-term]: 4.0303e-6 kg; lognormal variance with pedigree 1.38, pedigree (1,1,5,1,1)
  (same comment as for Antimony)
- Tungsten [water, ground-, long-term]: 4.8551e-6 kg; lognormal variance with pedigree 1.35, pedigree (1,1,5,1,1)
  (same comment as for Antimony)
- Beryllium [water, ground-, long-term]: 5.4306e-6 kg; lognormal variance with pedigree 1.51, pedigree (1,1,5,1,1)
  (same comment as for Antimony)
- Antimony [water, surface water]: 2.6212e-6 kg; lognormal variance with pedigree 1.38, pedigree (1,1,5,1,1)
  (same comment as for Selenium)
- Scandium [water, surface water]: 4.2364e-6 kg; lognormal variance with pedigree 1.25, pedigree (1,1,5,1,1)
  (same comment as for Selenium)
- Magnesium [water, surface water]: 8.5359e-6 kg; lognormal variance with pedigree 1.11, pedigree (1,1,5,1,1)
  (same comment as for Selenium)
- Boron [water, surface water]: 2.0629e-6 kg; lognormal variance with pedigree 1.27, pedigree (1,1,5,1,1)
  (same comment as for Selenium)
- Scandium [water, ground-, long-term]: 2.5782e-5 kg; lognormal variance with pedigree 1.16, pedigree (1,1,5,1,1)
  (same comment as for Antimony)
- Sulfate [water, ground-, long-term]: 0.0078112 kg; lognormal variance with pedigree 0.56, pedigree (1,1,5,1,1)
  (same comment as for Antimony)
- Phosphate [water, surface water]: 8.5513e-7 kg; lognormal variance with pedigree 1.52, pedigree (1,1,5,1,1)
  (same comment as for Selenium)
- Fluoride [water, surface water]: 2.0322e-6 kg; lognormal variance with pedigree 1.31, pedigree (1,1,5,1,1)
  (same comment as for Selenium)
- Vanadium, ion [water, surface water]: 7.3406e-7 kg; lognormal variance with pedigree 1.39, pedigree (1,1,5,1,1)
  (same comment as for Selenium)
- Iodide [water, ground-, long-term]: 3.75e-13 kg; lognormal variance with pedigree 1.46, pedigree (1,1,5,1,1)
  (same comment as for Antimony)
- Molybdenum [water, surface water]: 2.233e-5 kg; lognormal variance with pedigree 1.2, pedigree (1,1,5,1,1)
  (same comment as for Selenium)
- Mercury [water, ground-, long-term]: 3.5507e-9 kg; lognormal variance with pedigree 4.29, pedigree (1,1,5,1,1)
  (same comment as for Antimony)
- Potassium, ion [water, ground-, long-term]: 0.010772 kg; lognormal variance with pedigree 0.36, pedigree (1,1,5,1,1)
  (same comment as for Antimony)
- Aluminium [water, ground-, long-term]: 0.037849 kg; lognormal variance with pedigree 0.51, pedigree (1,1,5,1,1)
  (same comment as for Antimony)
- Nickel, ion [water, surface water]: 9.0037e-8 kg; lognormal variance with pedigree 1.67, pedigree (1,1,5,1,1)
  (same comment as for Selenium)
- Potassium, ion [water, surface water]: 0.0042283 kg; lognormal variance with pedigree 0.4, pedigree (1,1,5,1,1)
  (same comment as for Selenium)
- Calcium, ion [water, surface water]: 2.2627e-6 kg; lognormal variance with pedigree 1.26, pedigree (1,1,5,1,1)
  (same comment as for Selenium)
- Tungsten [water, surface water]: 2.6449e-6 kg; lognormal variance with pedigree 1.38, pedigree (1,1,5,1,1)
  (same comment as for Selenium)
- Phosphate [water, ground-, long-term]: 0.00051223 kg; lognormal variance with pedigree 1.3, pedigree (1,1,5,1,1)
  (same comment as for Antimony)
- Chloride [water, surface water]: 2.1451e-5 kg; lognormal variance with pedigree 1.08, pedigree (1,1,5,1,1)
  (same comment as for Selenium)

## Sampling procedure
Landfill model based on observed leachate concentrations in literature. Extrapolated to 60'000 years heeding chemical characteristics. Initial waste composition from various literature sources.

## Extrapolations
This dataset has been extrapolated from year 2000 to the year of the calculation (2019). The uncertainty has been adjusted accordingly.

## Review by Niels Jungbluth 2009-02-15
passed.
