# tram production

Dataset: EcoSpold 2, unit process
Geography: RoW
Time period: 1991-01-01 to 2019-12-31
Technology level: current
Classification: ISIC rev.4 ecoinvent: 3020:Manufacture of railway locomotives and rolling stock
Classification: EcoSpold01Categories: transport systems/road
Scenario: Business-as-Usual
System model: Allocation at the point of substitution
Generated by: Michael Spielmann (obsolete)
Published in: Spielmann M. 2004
Database: ecoinvent
isCopyrightProtected: true
accessRestrictedTo: 1

## General comment
Based on "tram production, RER 1991". Material consumption values refer to the production of one average tram (1 railcar and 0.55 trailer). Disposal of tram is included. Energy consumption is estimated from the energy content of the materials (50% energy of materials; allocation: 1/3 electricity and 2/3 light fuel oil). Total kilometric performance: 27'333 vkm and a average load of 28 passengers.

## Included activities start
The activity starts with the material (steel, aluminium, copper, polyethylene, rubber, glass and paint) for the production of the tram.

## Included activities end
The inventory includes processes of material and energy consumption in vehicle manufacturing. Rail and road transport of materials is accounted for. Disposal of tram is included.

## Geography
Extrapolated from "tram production, RER 1991". Vehicle manufacturing data are taken from one production site in Switzerland.

## Technology
Material composition represents a tram produced in the early 90ties.
References:
Maibach M., Peter D. and Seiler B. (1999) Ökoinventar Transporte: Grundlagen für den ökologischen Vergleich von Transportsystemen und den Einbezug von Transportsystemen in Ökobilanzen. Technischer Schlussbericht. In: Schweizerischer Nationalfonds zur Förderung der wissenschaftlichen Forschung (ed. SPP Umwelt M.). 2nd Edition. INFRAS, Zürich

## Reference product
- tram: 1 unit; CPC 49520: Self-propelled railway or tramway coaches, vans and trucks (except maintenance or service vehicles); By-product classification allocatable product
  EcoSpold01Location=RER
  production volume 2.67763 unit
    This is a placeholder value that does not reflect real-world production volumes. This dataset does not currently require a real-world production volume to work in the database framework, and no actual data were collected yet. This has no negative effect on the results of the ecoinvent database.
  property price 29889 EUR2005
    UNData (Average Import/Export prices of EU27; 1.479EUR/kg) Railway cars nes, (http://data.un.org/Data.aspx?q=railway+cars&d=ComTrade&f=_l1Code%3a86%3bcmdCode%3a860699). Total weight of Tram was 21 t (Source: Existing ecoinvent documentation from ecoinvent v.2.2. From information in the dataset tram production.)
  property true value 29889
    allocation property applied in "true value" allocation // value calculated from revenue

## By-products
- electricity, for reuse in municipal waste incineration only: 0 kWh; CPC 17100: Electrical energy; By-product classification allocatable product; pedigree (1,1,1,1,1)
  Net electricity generated from this waste and used in internal MSWI plant energy redistribution.
  Uncertainty: uncertainty is calculated from uncertainties in waste composition and uncertainties in energy efficiency and the uncertainty in internal energy demand
  production volume 256.337 kWh
  property exergy 3.6 MJ; name E_el_prod_MSWI_exergy
    This exergy property is based on the exergy content of the product.
  property true value relation 3.6; name E_el_prod_MSWI_true_value_relation
    property to calculate "true value" from
  property price 0.1 EUR2005; name E_el_prod_MSWI_price_EUR2005
    Estimated to be the same price as in case of electricity, medium voltage.
  property true value 12.3176
    allocation property applied in "true value" allocation // value calculated from true value relation
- heat, for reuse in municipal waste incineration only: 0 MJ; CPC 17300: Steam and hot water; By-product classification allocatable product; pedigree (1,1,1,1,1)
  Net useful heat generated from this waste and used in internal MSWI plant energy redistribution.
  Uncertainty: uncertainty is calculated from uncertainties in waste composition and uncertainties in energy efficiency and the uncertainty in internal energy demand
  production volume 1829.46 MJ
  property true value relation 0.1842; name E_th_prod_MSWI_true_value_relation
    property to calculate "true value" from
  property exergy 0.1842 MJ; name E_th_prod_MSWI_exergy
    This exergy property is based on the exergy content of the product.
  property price 0.0106 EUR2005; name E_th_prod_MSWI_price_EUR2005
    Average European district heat price from Ecoheatcool and Euroheat 2005-2006, Ecoheat Work package 1: The European heat market. Final report. 10.6 EUR/GJ i s the price of district heat. http://www.solarthermalworld.org/files/Ecoheatcool%20WP1%20Web.pdf?download
  property true value 4.49803
    (same comment as for electricity, for reuse in municipal waste incineration only)
- zinc concentrate: 0 kg; CPC 14290: Other non-ferrous metal ores and concentrates (other than uranium or thorium ores and concentrates); By-product classification allocatable product
  Calculated value from the knowledge of the properties of both products.
  production volume 0.0091532 kg
  property price 0.38 EUR2005; name ByP_price_EUR2005
    Temporary price data. Calculated as 90% of purchasers price based on: Zinc content in concentrate 53%. Concentrate price per kg Zn 86.5% of refined Zn price (13.5% treatment charges according to CHR Metals Limited 2005: Dynamic cost curves. http://www.minecost.com/dynamic.pdf). 2004 zinc price from USGS (2007) Mineral commodity summaries 2007. <http://minerals.usgs.gov/minerals/pubs/mcs/2007/mcs2007.pdf> [Accessed 25 May 2010]
  property zinc content 0.53; name zinc_C_zinc_concentrate
    Zinc content on a dry matter basis. Value taken from teh "zinc mine operation" /GLO dataset.
  property dry mass 1 kg; name DM_zinc_concentrate
  property carbon content 0
    carbon content on a dry matter basis (reserved; not for manual entry)
  property true value 0.00129899
    allocation property applied in "true value" allocation // value calculated from revenue
  properties: wet mass 1 kg, water content 0, carbon content, non-fossil 0, carbon content, fossil 0, water in wet mass 0 kg, carbon allocation 0 kg

## Inputs from technosphere
- electricity, medium voltage: 0 kWh; source Maibach M. 1999; pedigree (1,1,1,1,1)
  EcoSpold01Location=UCTE
  Literature value. Manufacturing expenditures and interventions for a tram are obtained from Maibach et al. (1999). However, we assume that 50% of the heating energy is based on natural gas and 50% is based on light fuel oil.
- heat, district or industrial, other than natural gas: 0 MJ; source Maibach M. 1999; pedigree (1,1,1,1,1)
  Literature value. Manufacturing expenditures and interventions for a tram are obtained from Maibach et al. (1999). However, we assume that 50% of the heating energy is based on natural gas and 50% is based on light fuel oil.
  EcoSpold01Location=RER
- used tram: -0.999438 unit; lognormal variance with pedigree 0.044, pedigree (3,1,5,5,1)
  production volume 2.67763 unit; = Ref('8059503a-f209-4b2d-8409-55a6a7b18267', 'ProductionVolume') * ((Ref('08d2e70f-1aa3-41fa-826e-4d2c38f0aa23')*-1) / Ref('8059503a-f209-4b2d-8409-55a6a7b18267'))
    Calculated from production volume of reference product using the relative outputs.
  property water in wet mass 0 kg; name WWM
  property carbon content, non-fossil 0.00352812; name C_content_non_fossil
  property wet mass 20992 kg; name WM
  property dry mass 20992 kg; name DM
  property water content 0; name water_content
  property carbon content, fossil 0.0485113; name C_content_fossil
- polyethylene, high density, granulate: 849.522 kg; source Maibach M. 1999; lognormal variance with pedigree 0.162, pedigree (1,1,5,5,1)
  Literature value. The material composition of a tram is obtained from Maibach et al. (1999).
  EcoSpold01Location=RER
  properties: carbon content, fossil 0.857143, dry mass 1 kg, wet mass 1 kg
  note on carbon content, fossil: Polyethylene is formed out of a huge amount of ethylene monomers (C2H4) (ecoinvent v2.2 report 11_II). MW=28 g/mol
- reinforcing steel: 16690.6 kg; source Maibach M. 1999; lognormal variance with pedigree 0.082, pedigree (1,1,5,5,1)
  EcoSpold01Location=RER
  Literature value. The material composition of a tram is obtained from Maibach et al. (1999).
  properties: carbon content, fossil 0.004, wet mass 1 kg, dry mass 1 kg
- lead: 64.064 kg; source Maibach M. 1999; lognormal variance with pedigree 0.162, pedigree (1,1,5,5,1)
  (same comment as for reinforcing steel)
  properties: wet mass 1 kg, dry mass 1 kg
- alkyd paint, white, without solvent, in 60% solution state: 370.791 kg; source Maibach M. 1999; lognormal variance with pedigree 0.162, pedigree (1,1,5,5,1)
  (same comment as for polyethylene, high density, granulate)
  properties: carbon content, fossil 0.140367, dry mass 1 kg, carbon content, non-fossil 0.199629, wet mass 1 kg
  note on carbon content, fossil: C content was calculated as an addition of C content in the raw materials.
- synthetic rubber: 195.89 kg; source Maibach M. 1999; lognormal variance with pedigree 0.162, pedigree (1,1,5,5,1)
  (same comment as for reinforcing steel)
  properties: dry mass 1 kg, carbon content, fossil 0.871949, wet mass 1 kg
  note on carbon content, fossil: EPDM (Ethylene-propene-diene terpolymer) rubber is a terpolymer of ethylene, propene, and a diene with the residual unsaturated portion of the diene in the side chain (ecoinvent v2.2 report 7-part XX & Ullmann). Chemical formula (deduced from Evidences of Solvent-Induced Miscibility in Polychloroprene-co-Ethylene-Propene Diene Terpolymer Blends, Dubey et al., Journal of Applied Polymer Science, 2009, 111:1884–1891): C20H35
- copper: 1459.18 kg; source Maibach M. 1999; lognormal variance with pedigree 0.162, pedigree (1,1,5,5,1)
  (same comment as for reinforcing steel)
  properties: wet mass 1 kg, dry mass 1 kg
- aluminium, cast alloy: 587.669 kg; source Maibach M. 1999; lognormal variance with pedigree 0.162, pedigree (1,1,5,5,1)
  Literature value. The material composition of a tram is obtained from Maibach et al. (1999).
  properties: wet mass 1 kg, dry mass 1 kg
- flat glass, uncoated: 762.571 kg; source Maibach M. 1999; lognormal variance with pedigree 0.082, pedigree (1,1,5,5,1)
  (same comment as for polyethylene, high density, granulate)
  properties: wet mass 1 kg, dry mass 1 kg
- electricity, medium voltage: 316.618, 57.6111, 976.997, 14165.4, 2027.34, 6642.39 kWh (6 entries); source Maibach M. 1999; lognormal variance with pedigree 0.342, pedigree (1,1,5,5,1)
  (same comment as for electricity, medium voltage)
- heat, district or industrial, other than natural gas: 74.0298, 165133 MJ (2 entries); source Maibach M. 1999; lognormal variance with pedigree 0.342, pedigree (1,1,5,5,1)
  (same comment as for heat, district or industrial, other than natural gas)

## Sampling procedure
Literature studies.

## Extrapolations
Data from one production site in Switzerland is used as an first estimate for Europe This dataset has been copied from an original dataset covering the geography RER. The uncertainty has been adjusted accordingly.

## Review by Rolf Frischknecht 2004-04-02
Passed.

## Review by Carl Vadenbo 2012-06-29
In preparation for the release of ecoinvent v3.0, exchange for disposal of used tram was moved and extrapolated from the dataset 'transport, tram, CH' to 'tram production, GLO 1991-1991'. The amounts and the uncertainty information of the exchanges were reviewed and were found to correspond to the disaggregated datasets, and the dataset was accepted for inclusion into the ecoinvent database on 2012.07.04.
