# anode factory construction

Dataset: EcoSpold 2, unit process
Geography: RER
Time period: 2002-01-01 to 2019-12-31
Technology level: current
Classification: ISIC rev.4 ecoinvent: 4100a: Construction of factory buildings for the metal industry
Classification: EcoSpold01Categories: metals/extraction
Tags: ConvertedDataset
Scenario: Business-as-Usual
System model: Allocation at the point of substitution
Generated by: Hans-Jörg Althaus
Published in: Althaus H.-J. 2000
Database: ecoinvent
isCopyrightProtected: true
accessRestrictedTo: 1

## General comment
Medium sized plant. Output: 80'000 t/a, life time: 50 years. Assumption is based on data for casting plant.
[This dataset was already contained in the ecoinvent database version 2. It was not individually updated during the transfer to ecoinvent version 3. Life Cycle Impact Assessment results may still have changed, as they are affected by changes in the supply chain, i.e. in other datasets. This dataset was generated following the ecoinvent quality guidelines for version 2. It may have been subject to central changes described in the ecoinvent version 3 change report (http://www.ecoinvent.org/database/ecoinvent-version-3/reports-of-changes/), and the results of the central updates were reviewed extensively. The changes added e.g. consistent water flows and other information throughout the database. The documentation of this dataset can be found in the ecoinvent reports of version 2, which are still available via the ecoinvent website. The change report linked above covers all central changes that were made during the conversion process.]

## Included activities end
Production hall, machinery and administrative buildings (including disposal)

## Geography
Some Swiss datasets are used for European processes.

## Technology
Assumed technology

## Reference product
- anode factory: 1 unit; CPC 53269: Other constructions for manufacturing; By-product classification allocatable product
  production volume 1.32237 unit
    This is a placeholder value that does not reflect real-world production volumes. This dataset does not currently require a real-world production volume to work in the database framework, and no actual data were collected yet. This has no negative effect on the results of the ecoinvent database. The placeholder value of this activity was scaled according to the nominal GDP of 2005 (source: United Nations, http://data.un.org/Glossary.aspx?q=GDP+%28current+US%24%29, accessed 20130726) to reflect an appropriate share of the global production volume, which is also a placeholder value.
  property price 5.27648e7 EUR2005
    Upscale from EU 27 to the world by PPP (0.8458 in 2003 and 0,8426 in 2004)

## Inputs from technosphere
- concrete, normal: 559 m3; lognormal variance with pedigree 0.5, pedigree (5,5,5,5,5)
  properties: wet mass 2380 kg, dry mass 2190 kg, water content 0.086758
- industrial machine, heavy, unspecified: 1.23e6 kg; lognormal variance with pedigree 0.5, pedigree (5,5,5,5,5)
  activityLink introduced to establish a direct link to the corresponding regional supply of this product
- waste concrete, not reinforced: 0 kg; pedigree (1,1,1,1,1)
  production volume 0 kg
    Calculated from the production volume of anode factory in proportion to the respective output amounts.
  properties: dry mass 1 kg, wet mass 1 kg
- building, multi-storey: 10000 m3; lognormal variance with pedigree 0.5, pedigree (5,5,5,5,5)
  (same comment as for industrial machine, heavy, unspecified)
- building, hall: 13400 m2; lognormal variance with pedigree 0.5, pedigree (5,5,5,5,5)
- waste concrete, not reinforced: -1.2171e6, -12896.1 kg (2 entries); lognormal variance with pedigree 0.5, pedigree (5,5,5,5,5)
  production volume 1.23e6 kg

## Inputs from nature
- Occupation, industrial area [natural resource, land]: 1.5e7 m2*year; lognormal variance with pedigree 0.24, pedigree (5,5,5,5,5)
- Transformation, from unspecified [natural resource, land]: 300000 m2; lognormal variance with pedigree 0.32, pedigree (5,5,5,5,5)
- Transformation, to industrial area [natural resource, land]: 300100 m2; lognormal variance with pedigree 0.32, pedigree (5,5,5,5,5)

## Sampling procedure
Internet search

## Extrapolations
This dataset has been extrapolated from year 2002 to the year of the calculation (2019). The uncertainty has been adjusted accordingly.

## Review by Roland Hischier 2003-08-20
Passed.
