# intermodal shipping container production, 40-foot, high-cube

Dataset: EcoSpold 2, unit process
Geography: GLO
Time period: 2010-01-01 to 2019-12-31
Technology level: current
Classification: ISIC rev.4 ecoinvent: 2920:Manufacture of bodies (coachwork) for motor vehicles; manufacture of traile
Synonyms: freight container; ISO container; sea can; conex box
Scenario: Business-as-Usual
System model: Allocation at the point of substitution
Generated by: Tereza Levova
Database: ecoinvent
isCopyrightProtected: true
accessRestrictedTo: 1

## General comment
This dataset represents production of 40-foot, high-cube ISO standard container.
The intermodal shipping containers are basically metal boxes which are used for storage and transport of goods. The advantage of using these containers is, that they can be easily transferred from one type of transport to another without the necessity of unloading the goods.
There are several types and sizes of the containers mainly related to the historical development of intermodal container transport in the given region. There is a continuous effort in the standardization of the container sizes. Below see the table of the different sizes of the intermodal shipping containers as defined by the ISO standard (ISO 6346:1995, ISO 1161:1984, ISO 1496-1:2013).
The container is designed and constructed for the transportation of general cargo on sea (above and under deck) and on land (road or rail) throughout the world, and will be suitable for the environmental conditions imposed by those modes of transport. All materials used in the construction are able to withstand extreme temperature ranging from -40°C to 70°C without effect on container’s strength and water tightness.
Typical intermodal shipping container. Source: (http://speedlinkltd.com/wp-content/uploads/2011/11/container.jpg, accessed 20141015).
Data for the life cycle inventory of this container were taken from different sources, primarily from the documentation of different container producers. The main source of information is the technical documentation from Steinecker Containerhandel (Technical Specification for typical 40'x8'x9'6'' ISO Type Steel Dry Cargo Container, "High Cube", 2012).
Comparison of different container sizes

## Included activities start
The activity starts when all the individual parts needed for the production of a container enter the assembly site.

## Included activities end
The activity ends when the container is ready to be used.

## Technology
The container side rails are welded to create a frame. The walls of the container are made from corrugated steel. In order to protect the container againt different weather conditions zinc coating is needed.
Technical sketch of the differnt parts of the shipping container. Source: (http://shippingandfreightresource.com/how-strong-is-your-container-floorboard/, accessed 20141015).
The container has door on one side which can be locked using four locking bars. The doors have rubber seal gasket to ensure the water resistence of the container.

## Parameters
- density: 7800 kg/m3; name density_corrugated_steel_wall; lognormal variance with pedigree 0.0032, pedigree (3,3,1,1,1)
  Estimated. The density of steel, low-alloyed used for the corrugated steel walls of the container.
- weight of steel container's walls: 1574.5 kg; name weight_walls; = (area_corrugated_steel_walls*( thickness_walls/1000)* density_corrugated_steel_wall); lognormal variance with pedigree 0.0006, pedigree (1,1,1,1,1)
  Calculated value.
- area: 144.185 m2; name area_corrugated_steel_walls; = (container_length_ex* container_height_ex*2)+( container_length_ex* container_width_ex*2)+( container_width_ex* container_height_ex*2); lognormal variance with pedigree 0.0006, pedigree (1,1,1,1,1)
  Calculated value. Area of the corrugated steel walls.
- thickness of wooden floor: 28 mm; name thickness_wooden_floor; lognormal variance with pedigree 0.0026, pedigree (1,4,1,1,1)
  Industrial data (Steinecker Containerhandel, 2012, Technical Specification for a typical 40'x8'x9'6'' ISO type Steel Dry Cargo Container "High Cube").
- thickness of metal sheet_01: 1.4 mm; name thickness_walls; lognormal variance with pedigree 0.0026, pedigree (1,4,1,1,1)
  Industrial data.
- number of days_cargo present in the container: 10 day; name number_days_cargo_in; lognormal variance with pedigree 0.0166, pedigree (4,5,1,1,1)
  Estimated value based on literature.
- weight of a steel frame: 1752.79 kg; name weight_steel_frame; = weight_container-weight_walls- rubber_in- steel_pipe_input-( plywood_in* plywood_WM); lognormal variance with pedigree 0.0566, pedigree (4,5,1,1,4)
  Calculated value.
  The weight of the frame is calculated as a difference between the weight of the whole container minus the other materials (walls, floor, etc.).
  Cross-reference; steel I-beam (HE140A) weight 24.7kg/m. The length of all the side rails creating the frame is (length*4+width*4+height*4=) 70.104 m. The calculated weight is thus (70.104*24.7=) 1624kg. So the calculated 1753 kg looks as an adequate value.
- distance of travel of average 1 tone of persihable goods: 10000 km; name distance_ave_1ton; lognormal variance with pedigree 0.0186, pedigree (4,5,1,5,1)
  Estimated value.
  The distance taken by 1 ton of parishable food tansported in reefer.
  The distance is estimated by looking at the main reefer transport rouds around the world. For example the bananas (representing 20% of reefer transport) are transported mainly from South America to Europe.
  Dekker, N., 2014, Global reefer trades - 2014, Dewry Meritime Research (http://www.joc.com/sites/default/files/u221106/SpeakerPresentations/March3/Dekker_Neil_Cool_Cargoes_Presentation.pdf, accessed 20141030)
  Hamburh Süd, 2013, Reefer services company information (http://www.hamburg-sued.com/group/media/sharedmedia/dokumente/brochures/Reefer_guide.pdf, accessed 20141030)

## Reference product
- intermodal shipping container, 40-foot, high-cube: 1 unit; name container_RP; CPC 49221: Containers specially designed and equipped for carriage by one or more modes of transport; By-product classification allocatable product
  Standard 40-food, high-cube intermodal shipping container.
  External dimensions; length - 12.192 m, width - 2.438 m and height - 2.896 m.
  Interior dimensions: length - 12.000 m, width - 2.311 m and height - 2.2.650 m.
  Internal volume: 75.3 m3
  Maximum gross weight: 30.848 tons
  Empty weight: 3.9 tons
  Net load: 26.58 tons
  production volume 264000 unit; = (1.6*1000000*0.33)/ container_RP_capacity_cargo
    Calculated value.
    1.6 million TEU (Twenty-foot Equivalent unit) is newly added to the total capacity of shipping containers in the world (World Shipping Council, http://www.worldshipping.org/about-the-industry/containers/global-container-fleet, accessed 20141014).
    Out of that 33% is 40-food, high-cube containers (Containerization International Market Analysis, World Container Census 2008, http://people.hofstra.edu/geotrans/eng/ch3en/conc3en/containerfleet.html, accessed 20141014).
  property weight 3840 kg; name weight_container
    Industrial data. Tare weight of a dry container.
  property maximum gross weight 30480 kg
    Industrial data. The maxiumum gross weight of a dry container.
  property price 3401.7 EUR2005; name container_RP_price_EUR2005
    Calculated based on inputs: The price of the product has been calculated as a sum of the values of the material and energy inputs for this product. This value is therefore a rough estimation. It may underestimate the real price since there are additional expenses when producing any product. These expences can include for example labour costs, treatment of waste materials and profit for the producer. Please consider carefully whether this level of data quality is acceptable for your application.
  property volume 76.4 m3; name container_volume
    The maximum inside cubic capacity of the container.
  property height, internal 2.698 m; name container_height_in
    Industrial data. Standard 40-foot, high-cube intermodal shipping container.
  property length, internal 12.032 m; name container_length_in
    Industrial data. Standard 40-foot, high-cube intermodal shipping container.
  property width, internal 2.352 m; name container_width_in
    Industrial data. Standard 40-foot, high-cube intermodal shipping container.
  property lifetime capacity [kg*day] 7.24611e8 kg*day; name lifetime_capacity_kg_day; = (1.524E+12*0.33)/(32.9E6*0.33/container_RP_capacity_cargo)* lifetime*365*(1/0.7)
    Calculated value based on literature data.
    1.52E+12 kg of cargo have been transported by different type of containers in the year 2012 (www.statista.com, accessed 20141110).
    32.9 million TEU is the global capacity of all containers in operation (World Shipping Council, www.worldshipping.org, 20150203). Out of that;
    27% are 20' containers
    24% are 40' containers
    33% are 40'HC containers
    5% are 45'HC containers
    70% is the utilization rate - weight, the container carry 70% (in kg) of what they could be able to carry
  property height, external 2.896 m; name container_height_ex
    Industrial data. Standard 40-foot, high-cube intermodal shipping container.
  property capacity, cargo 2 TEU; name container_RP_capacity_cargo
    Literature value.
  property length, external 12.192 m; name container_length_ex
    Industrial data. Standard 40-foot, high-cube intermodal shipping container.
  property maximum payload 26640 kg; name max_payload
    Industrial data. The maxiumum payload of a dry container.
  property width, external 2.438 m; name container_width_ex
    Industrial data. Standard 40-foot, high-cube intermodal shipping container.
  property lifetime 15 year; name lifetime
    Industrial data.
  property true value 3401.7; name container_RP_true_value
    allocation property applied in "true value" allocation // value calculated from revenue

## By-products
- wood chips, from post-consumer wood, measured as dry mass: 0 kg; By-product classification allocatable product; CPC 3928: Sawdust and wood waste and scrap
  EcoSpold01Location=CH
  production volume 1.23212e8 kg
    Production of waste urban and demolition wood in CH in 2003 is 0.2 million m3.
    year 2003 values
    Calculated from the production volume of waste wood, 40% water on dry mass basis in proportion to the respective output amounts.
  property price 0.107 EUR2005
    Expert judgement (Urs Luginbühl, Swiss Sawmilling industry, personal communication in June 2014). Wood chips from softwood should have a price of 0.101 EUR/kg. Woodchips from hardwood should have a price of 0.112 EUR/kg. Average of these two values is used. Cross-reference; FAOSTAT database; http://faostat.fao.org/site/626/DesktopDefault.aspx?PageID=626#ancor; Average import/export prices of EU for 'chips and particles'. Price: 48.76 Euro/m3. The density of the wood chips is 650 kg/m3. The price is recalculated accordingly.
  property carbon content, non-fossil 0.494
    C content of dry mass is 0.494 kgC/kg dry wood (ecoinvent v2.2 report 6_IX & ecoinvent v2.2 report 9).
  property carbon content 0.494
    carbon content on a dry matter basis (reserved; not for manual entry)
  property true value 49.9382
    allocation property applied in "true value" allocation // value calculated from revenue
  properties: carbon content, fossil 0, water in wet mass 0.4 kg, dry mass 1 kg, wet mass 1.4 kg, water content 0.4, carbon allocation 0.494 kg
- heat, for reuse in municipal waste incineration only: 0 MJ; CPC 17300: Steam and hot water; By-product classification allocatable product; pedigree (1,1,1,1,1)
  Net electricity generated from this waste and used in internal MSWI plant energy redistribution.
  Uncertainty: uncertainty is calculated from uncertainties in waste composition and uncertainties in energy efficiency and the uncertainty in internal energy demand
  production volume 1.04928e7 MJ
  property exergy 0.1842 MJ; name E_th_prod_MSWI_exergy
    This exergy property is based on the exergy content of the product.
  property price 0.0106 EUR2005; name E_th_prod_MSWI_price_EUR2005
    Average European district heat price from Ecoheatcool and Euroheat 2005-2006, Ecoheat Work package 1: The European heat market. Final report. 10.6 EUR/GJ i s the price of district heat. http://www.solarthermalworld.org/files/Ecoheatcool%20WP1%20Web.pdf?download
  property true value relation 0.1842; name E_th_prod_MSWI_true_value_relation
    property to calculate "true value" from
  property true value 0.261237
    allocation property applied in "true value" allocation // value calculated from true value relation
- electricity, for reuse in municipal waste incineration only: 0 kWh; CPC 17100: Electrical energy; By-product classification allocatable product; pedigree (1,1,1,1,1)
  (same comment as for heat, for reuse in municipal waste incineration only)
  production volume 1.48487e6 kWh
  property true value relation 3.6; name E_el_prod_MSWI_true_value_relation
    property to calculate "true value" from
  property price 0.1 EUR2005; name E_el_prod_MSWI_price_EUR2005
    Estimated to be the same price as in case of electricity, medium voltage.
  property exergy 3.6 MJ; name E_el_prod_MSWI_exergy
    This exergy property is based on the exergy content of the product.
  property true value 0.722514
    (same comment as for heat, for reuse in municipal waste incineration only)
- zinc concentrate: 0 kg; CPC 14290: Other non-ferrous metal ores and concentrates (other than uranium or thorium ores and concentrates); By-product classification allocatable product
  Calculated value from the knowledge of the properties of both products.
  production volume 39.1899 kg
  property price 0.38 EUR2005; name ByP_price_EUR2005
    Temporary price data. Calculated as 90% of purchasers price based on: Zinc content in concentrate 53%. Concentrate price per kg Zn 86.5% of refined Zn price (13.5% treatment charges according to CHR Metals Limited 2005: Dynamic cost curves. http://www.minecost.com/dynamic.pdf). 2004 zinc price from USGS (2007) Mineral commodity summaries 2007. <http://minerals.usgs.gov/minerals/pubs/mcs/2007/mcs2007.pdf> [Accessed 25 May 2010]
  property zinc content 0.53; name zinc_C_zinc_concentrate
    Zinc content on a dry matter basis. Value taken from teh "zinc mine operation" /GLO dataset.
  property dry mass 1 kg; name DM_zinc_concentrate
  property carbon content 0
    carbon content on a dry matter basis (reserved; not for manual entry)
  property true value 5.64097e-5
    allocation property applied in "true value" allocation // value calculated from revenue
  properties: wet mass 1 kg, water content 0, carbon content, non-fossil 0, carbon content, fossil 0, water in wet mass 0 kg, carbon allocation 0 kg
- iron scrap, sorted, pressed: 0 kg; By-product classification Recyclable; CPC 39310: Slag, dross, scalings and other waste from the manufacture of iron or steel; pedigree (1,1,1,1,1)
  Iron scrap recovered from this waste.
  production volume 660301 kg
  property price 0.175 EUR2005
    Temporary price data. Calculated as 90% of purchasers price based on: 2005 import and export prices (total trades (USD) divided by total weight (kg) in biggest economies of the world: EU27, USA, Brasil, China, India, Japan and Russia) from UN Commodity Trade Statistics Database (http://data.un.org/Explorer.aspxDatabase [Accessed 2011.06.20]). Commodity: Waste or scrap, of cast iron
  property carbon content 0
    carbon content on a dry matter basis (reserved; not for manual entry)
  property true value 0.437699
    allocation property applied in "true value" allocation // value calculated from revenue
  properties: water content 0, water in wet mass 0 kg, carbon content, fossil 0, dry mass 1 kg, carbon content, non-fossil 0, wet mass 1 kg, carbon allocation 0 kg

## Inputs from technosphere
- metal working, average for steel product manufacturing: 3277.8 kg; = steel_input; lognormal variance with pedigree 0.0038, pedigree (2,3,3,1,1)
  Calculated value.
  This exchange represent general metal working of the steel to form it into all the individual components needed for the assemby of the container.
- welding, arc, steel: 69.5342 m; = 0.48+ container_length_ex*4+ container_height_ex*4+ container_width_ex*4; lognormal variance with pedigree 0.0038, pedigree (2,3,3,1,1)
  Calculated value based on estimates.
- building, hall: 0.0160449 m2; = 1/(( lifetime_building*365)/(container_length_ex* container_width_ex*10)); lognormal variance with pedigree 0.318, pedigree (4,5,3,1,1)
  Calculated value based on estimates.
  1m2 of hall is available every day for 50 years
  1 container occupies the area of its base for the period of 10 days
  Resulting lifetime capacity of m2 of hall is 61 containers. Thus one container is responsible of construction of 0.016m2 of a hall.
  property lifetime 50 year; name lifetime_building
- chromium steel pipe: 11.4117 kg; name steel_pipe_input; = 4* container_height_ex; lognormal variance with pedigree 0.0038, pedigree (2,3,3,1,1)
  Industrial value (Jost, Products for Container Equipment and Intermodal transports, http://www.jost-world.com/workflow/pdfanleitungen/kataloge/JOST_CT_ZDE180000039E_0910.pdf, accessed 20141014).
  There are 4 locking bars on the container.
  properties: carbon content, fossil 0.0008, wet mass 1 kg, dry mass 1 kg
- zinc coat, pieces: 426.122 m2; = area_corrugated_steel_walls*3; lognormal variance with pedigree 0.0038, pedigree (2,3,3,1,1)
  Calculated value.
  The "zinc coating, pieces" dataset is created for the thickess of the coat of 65mm. While the interior coating of the container should be approximatelly 65mm the exterior should be at least double (Steinecker, 2012). So the additional amount of coating is added to assure the correct thickness of the exterior coat.
- plywood, for outdoor use: 0 m3; name plywood_in; pedigree (1,1,1,1,1)
  Calculated value.
  This exchange represent the amount of wood needed for the wooden floor of the container.
  property wet mass 625 kg; name plywood_WM
  property dry mass 589.555 kg; name plywood_DM
  properties: carbon content, fossil 0.0439893, water content 0.0601214, carbon content, non-fossil 0.424285
- steel, low-alloyed, hot rolled: 3277.8 kg; name steel_input; = weight_walls+ weight_steel_frame; lognormal variance with pedigree 0.0038, pedigree (2,3,3,1,1)
  Calculated value based on dimentions, thickness and density of the material.
  This exchange represent the amount of steel needed both for the frame and the sides of the container.
  properties: dry mass 1 kg, carbon content, fossil 0.005, wet mass 1 kg
  note on carbon content, fossil: Low alloyed steel composition given in Tab. 3.2 ecoinvent v2.2 report 10_partII. Steel assumed to have a C content of 0.5%
- metal working, average for chromium steel product manufacturing: 11.4117 kg; = steel_pipe_input; lognormal variance with pedigree 0.0038, pedigree (2,3,3,1,1)
  Calculated value.
- synthetic rubber: 5.79922 kg; name rubber_in; = (container_width_ex*2+ container_height_ex*3)* rubber_kg_per_m; lognormal variance with pedigree 0.0038, pedigree (2,3,3,1,1)
  Calculated value. The seal gasket is made of EPDM synthetic rubber. It cover all the edges of the container door.
  property weight per length 0.434 kg/m; name rubber_kg_per_m
  properties: dry mass 1 kg, wet mass 1 kg, carbon content, fossil 0.871949
  note on carbon content, fossil: EPDM (Ethylene-propene-diene terpolymer) rubber is a terpolymer of ethylene, propene, and a diene with the residual unsaturated portion of the diene in the side chain (ecoinvent v2.2 report 7-part XX & Ullmann). Chemical formula (deduced from Evidences of Solvent-Induced Miscibility in Polychloroprene-co-Ethylene-Propene Diene Terpolymer Blends, Dubey et al., Journal of Applied Polymer Science, 2009, 111:1884–1891): C20H35
  note on weight per length: Industrial data (http://hxtruck.en.made-in-china.com/product/OMqJuparbeRw/China-Container-Door-Seal-Rubber-Door-Seal-Door-Gasket-072006-.html, accessed 20141015). Container door seal (seal gasket) from synthetic rubber (EPDM).
- used intermodal shipping container, 40-foot, high-cube: -0.985126 unit; = (container_RP)*-1; lognormal variance with pedigree 0.0026, pedigree (1,1,3,1,1)
  Calculated value.
  production volume 264000 unit; = Ref('2673f852-191f-4659-8329-4ee4c473bfb9', 'ProductionVolume') * ((Ref('b2e2683b-9db7-44ac-a6b5-a2d763e8b0f4')*-1) / container_RP)
    Calculated from production volume of reference product using the relative outputs.
  property water content 0.00736789; name used_container_WC; = used_container_WWM/ used_container_DM
  property dry mass 3811.91 kg; name used_container_DM; = used_container_WM-( plywood_WM- plywood_DM)* plywood_in
  property wet mass 3840 kg; name used_container_WM; = weight_container
  property water in wet mass 28.0858 kg; name used_container_WWM; = used_container_WM- used_container_DM
  properties: carbon content, non-fossil 0.0515625, carbon content, fossil 0.0109375
- plywood, for outdoor use: 0.0781969, 0.702397 m3 (2 entries); lognormal variance with pedigree 0.0038, pedigree (2,3,3,1,1)
  (same comment as for plywood, for outdoor use)
  properties: carbon content, fossil 0.0439893, water content 0.0601214, carbon content, non-fossil 0.424285, wet mass 625 kg, dry mass 589.555 kg
