# treatment of wastewater from plywood production, capacity 5E9l/year

Dataset: EcoSpold 2, unit process
Geography: CH
Time period: 1994-01-01 to 2019-12-31
Technology level: current
Classification: EcoSpold01Categories: waste management/wastewater treatment
Classification: ISIC rev.4 ecoinvent: 3700:Sewerage
Tags: Treatment; ConvertedDataset
Scenario: Business-as-Usual
System model: Allocation at the point of substitution
Generated by: Gabor Doka (obsolete)
Published in: Doka G. 2008
Database: ecoinvent
isCopyrightProtected: true
accessRestrictedTo: 1

## General comment
Wastewater purified in a medium size municipal wastewater treatment plant (capacity class 3), with an average capacity size of 24900 per-captia-equivalents PCE.
Wastewater contains (in kg/m3): COD: 0.7 (GSD=177.5%); BOD: 4.23 (GSD=177.5%); PO4-P: 0.00116 (GSD=107.7%); Cu: 0.00003 (GSD=225.8%); Zn: 0.00013 (GSD=225.8%);
[This dataset was already contained in the ecoinvent database version 2. It was not individually updated during the transfer to ecoinvent version 3. Life Cycle Impact Assessment results may still have changed, as they are affected by changes in the supply chain, i.e. in other datasets. This dataset was generated following the ecoinvent quality guidelines for version 2. It may have been subject to central changes described in the ecoinvent version 3 change report (http://www.ecoinvent.org/database/ecoinvent-version-3/reports-of-changes/), and the results of the central updates were reviewed extensively. The changes added e.g. consistent water flows and other information throughout the database. The documentation of this dataset can be found in the ecoinvent reports of version 2, which are still available via the ecoinvent website. The change report linked above covers all central changes that were made during the conversion process.]

## Included activities end
Infrastructure materials for municipal wastewater treatment plant, transports, dismantling. Land use burdens.

## Geography
Specific to the technology mix encountered in Switzerland in 2000. Well applicable to modern treatment practices in Europe, North America or Japan.

## Technology
Three stage wastewater treatment (mechanical, biological, chemical) including sludge digestion (fermentation) according to the average technology in Switzerland

## Parameters
- fraction, process water, to air: 0.1 dimensionless; name fraction_PW_to_air; lognormal variance with pedigree 0.092025, pedigree (4,4,3,2,4)
  Literature value (Statistics Canada, 2007 & Shaffer, K.H., 2008, Consumptive water use in the Great Lakes Basin, USGS) (Vionnet, S., Quantis Water Database - Technical Report, 2012).

## Reference product
- wastewater from plywood production: -1 m3; CPC 39920: Sewage sludge; By-product classification Waste
  production volume 0.0336675 m3
    This is a placeholder value that does not reflect real-world production volumes. This dataset does not currently require a real-world production volume to work in the database framework, and no actual data were collected yet. This has no negative effect on the results of the ecoinvent database. The placeholder value of this activity was scaled according to the nominal GDP of 2005 (source: United Nations, http://data.un.org/Glossary.aspx?q=GDP+%28current+US%24%29, accessed 20130726) to reflect an appropriate share of the global production volume, which is also a placeholder value.
  property price 0 EUR2005
    Waste products are assigned a price of zero as they are assumed to require further treatment.
  property carbon content, non-fossil 0.897931
    COD= 0.7 kg/m3 (Tab A.18, ecoinvent v2.2 report 13_I). COD was converted to TOC, using conversion factors in Tab 4.10 (ecoinvent v2.2 report 13_IV). TOC was considered as Total Carbon.
  property carbon content 0.897931
    carbon content on a dry matter basis (reserved; not for manual entry)
  properties: water in wet mass 999.663 kg, wet mass 1000 kg, dry mass 0.337476 kg, water content 2962.17, carbon content, fossil 0, carbon allocation 0.30303 kg

## By-products
- electricity, for reuse in municipal waste incineration only: 0 kWh; CPC 17100: Electrical energy; By-product classification allocatable product; pedigree (1,1,1,1,1)
  Net electricity generated from this waste and used in internal MSWI plant energy redistribution.
  Uncertainty: uncertainty is calculated from uncertainties in waste composition and uncertainties in energy efficiency and the uncertainty in internal energy demand
  property exergy 3.6 MJ; name E_el_prod_MSWI_exergy
    This exergy property is based on the exergy content of the product.
  property true value relation 3.6; name E_el_prod_MSWI_true_value_relation
    property to calculate "true value" from
  property price 0.1 EUR2005; name E_el_prod_MSWI_price_EUR2005
    Estimated to be the same price as in case of electricity, medium voltage.
- heat, for reuse in municipal waste incineration only: 0 MJ; CPC 17300: Steam and hot water; By-product classification allocatable product; pedigree (1,1,1,1,1)
  Net useful heat generated from this waste and used in internal MSWI plant energy redistribution.
  Uncertainty: uncertainty is calculated from uncertainties in waste composition and uncertainties in energy efficiency and the uncertainty in internal energy demand
  property true value relation 0.1842; name E_th_prod_MSWI_true_value_relation
    property to calculate "true value" from
  property exergy 0.1842 MJ; name E_th_prod_MSWI_exergy
    This exergy property is based on the exergy content of the product.
  property price 0.0106 EUR2005; name E_th_prod_MSWI_price_EUR2005
    Average European district heat price from Ecoheatcool and Euroheat 2005-2006, Ecoheat Work package 1: The European heat market. Final report. 10.6 EUR/GJ i s the price of district heat. http://www.solarthermalworld.org/files/Ecoheatcool%20WP1%20Web.pdf?download
- zinc concentrate: 0 kg; CPC 14290: Other non-ferrous metal ores and concentrates (other than uranium or thorium ores and concentrates); By-product classification allocatable product
  Calculated value from the knowledge of the properties of both products.
  property price 0.38 EUR2005; name ByP_price_EUR2005
    Temporary price data. Calculated as 90% of purchasers price based on: Zinc content in concentrate 53%. Concentrate price per kg Zn 86.5% of refined Zn price (13.5% treatment charges according to CHR Metals Limited 2005: Dynamic cost curves. http://www.minecost.com/dynamic.pdf). 2004 zinc price from USGS (2007) Mineral commodity summaries 2007. <http://minerals.usgs.gov/minerals/pubs/mcs/2007/mcs2007.pdf> [Accessed 25 May 2010]
  property zinc content 0.53; name zinc_C_zinc_concentrate
    Zinc content on a dry matter basis. Value taken from teh "zinc mine operation" /GLO dataset.
  property dry mass 1 kg; name DM_zinc_concentrate
  property carbon content 0
    carbon content on a dry matter basis (reserved; not for manual entry)
  properties: wet mass 1 kg, water content 0, carbon content, non-fossil 0, carbon content, fossil 0, water in wet mass 0 kg, carbon allocation 0 kg

## Inputs from technosphere
- cement, unspecified: 0.00076044 kg; lognormal variance with pedigree 0.08, pedigree (1,1,5,1,1)
  burden from sludge incineration. Uncertainty calculated from wastewater composition and treatment model
  properties: wet mass 1 kg, dry mass 1 kg
- wastewater treatment facility, capacity 5E9l/year: 5.6882e-9 unit; lognormal variance with pedigree 0.04, pedigree (1,1,5,1,1)
  uncertainty heeded in exchanges of the module
- residual material landfill: 3.9606e-12 unit; lognormal variance with pedigree 0.07, pedigree (1,1,5,1,1)
  (same comment as for cement, unspecified)
- quicklime, milled, packed: 1.778e-7 kg; lognormal variance with pedigree 0.1, pedigree (1,1,5,1,1)
  (same comment as for cement, unspecified)
  properties: water content 0.010101, wet mass 1 kg, dry mass 0.99 kg
- process-specific burdens, slag landfill: 0.0070325 kg; lognormal variance with pedigree 0.07, pedigree (1,1,5,1,1)
  burden from sludge incineration. Uncertainty calculated from wastewater composition and treatment model;activityLink introduced to establish a direct link to the corresponding regional supply of this product
- sodium hydroxide, without water, in 50% solution state: 9.8067e-7 kg; lognormal variance with pedigree 0.1, pedigree (1,1,5,1,1)
  (same comment as for cement, unspecified)
  properties: wet mass 1 kg, dry mass 1 kg
- process-specific burdens, residual material landfill: 0.0019011 kg; lognormal variance with pedigree 0.07, pedigree (1,1,5,1,1)
  (same comment as for process-specific burdens, slag landfill)
- process-specific burdens, municipal waste incineration: 1.7813 kg; lognormal variance with pedigree 0.07, pedigree (1,1,5,1,1)
  (same comment as for process-specific burdens, slag landfill)
- heat, district or industrial, other than natural gas: 1.494 MJ; lognormal variance with pedigree 0.07, pedigree (1,1,5,1,1)
  (same comment as for cement, unspecified)
- waste cement, hydrated: -0.0019011 kg; lognormal variance with pedigree 0.08, pedigree (1,1,5,1,1)
  (same comment as for cement, unspecified)
  production volume 6.40054e-5 kg; = (Ref('adb6db35-00ea-4b9a-975b-5a19caa4c08e')*-1)* Ref('c086cc04-7596-4c11-9168-e529b553691d', 'ProductionVolume')/ABS( Ref('c086cc04-7596-4c11-9168-e529b553691d'))
    Calculated from the production volume of wastewater from plywood production in proportion to the respective output amounts.
  properties: dry mass 1 kg, wet mass 1 kg
- aluminium sulfate, powder: 0.0014866 kg; lognormal variance with pedigree 0.06, pedigree (1,1,5,1,1)
  direct wastewater treatment plant burden. Uncertainty calculated from wastewater composition and treatment model
  properties: wet mass 1 kg, dry mass 1 kg
- municipal waste incineration facility: 4.4533e-10 unit; lognormal variance with pedigree 0.07, pedigree (1,1,5,1,1)
  (same comment as for cement, unspecified)
- waste plastic, mixture: -0.0155 kg; lognormal variance with pedigree 0.04, pedigree (1,1,5,1,1)
  (same comment as for aluminium sulfate, powder)
  production volume 0.000521847 kg; = (Ref('63491f6d-535d-4a2a-8a4e-4e2d602f600f')*-1)* Ref('c086cc04-7596-4c11-9168-e529b553691d', 'ProductionVolume')/ABS( Ref('c086cc04-7596-4c11-9168-e529b553691d'))
    (same comment as for waste cement, hydrated)
  properties: dry mass 0.847 kg, water content 0.180638, wet mass 1 kg, carbon content, fossil 0.747344
  note on carbon content, fossil: C content in 1 kg DM was calculated using data in Tab A.2, ecoinvent v2.2 report 13_I
- hydrochloric acid, without water, in 30% solution state: 6.5245e-8 kg; lognormal variance with pedigree 0.16, pedigree (1,1,5,1,1)
  (same comment as for cement, unspecified)
  properties: wet mass 1 kg, dry mass 1 kg
- electricity, high voltage: 0.2561 kWh; lognormal variance with pedigree 0.52, pedigree (1,1,5,1,1)
  (same comment as for cement, unspecified)
- waste graphical paper: -0.0155 kg; lognormal variance with pedigree 0.04, pedigree (1,1,5,1,1)
  (same comment as for aluminium sulfate, powder)
  production volume 0.000521847 kg; = (Ref('2a5487ea-0bd3-4185-980d-f0756f8bc45a')*-1)* Ref('c086cc04-7596-4c11-9168-e529b553691d', 'ProductionVolume')/ABS( Ref('c086cc04-7596-4c11-9168-e529b553691d'))
    (same comment as for waste cement, hydrated)
  properties: water content 0.126126, wet mass 1 kg, carbon content, non-fossil 0.454955, dry mass 0.888 kg
- sewer grid, 5E9l/year, 110 km: 2.1782e-7 km; lognormal variance with pedigree 0.04, pedigree (1,1,5,1,1)
  uncertainty heeded in exchanges of the module
- liquid manure spreading, by vacuum tanker: 0.0083943 m3; lognormal variance with pedigree 0.04, pedigree (1,1,5,1,1)
  burden from sludge spreading. Uncertainty calculated from wastewater composition and treatment model
  This exchange has an activity link directly to the producing activity because the product is primarily consumed in the same geographical area where it is produced.
- slag landfill: 1.2502e-11 unit; lognormal variance with pedigree 0.07, pedigree (1,1,5,1,1)
  (same comment as for cement, unspecified)
- electricity, low voltage: 0.25865 kWh; lognormal variance with pedigree 2.04, pedigree (1,1,5,1,1)
  (same comment as for aluminium sulfate, powder)
- chemical, inorganic: 1.0874e-7 kg; lognormal variance with pedigree 0.16, pedigree (1,1,5,1,1)
  (same comment as for cement, unspecified)
  properties: wet mass 1 kg, carbon content, fossil 0.003, dry mass 1 kg
  note on carbon content, fossil: This dataset is an unweighted average of 20 inorganic substances (listed in Tab 88.1, ecoinvent v2.2 report 8, part II), being part of the top100 chemicals included in this database. The C-content has also been calculated as an unweighted average of the C content of the substances composing this dataset.
- iron sulfate: 0.0055003 kg; lognormal variance with pedigree 0.06, pedigree (1,1,5,1,1)
  (same comment as for aluminium sulfate, powder)
  properties: dry mass 1 kg, wet mass 1 kg
- iron (III) chloride, without water, in 40% solution state: 0.0075253 kg; lognormal variance with pedigree 0.06, pedigree (1,1,5,1,1)
  direct wastewater treatment plant burden plus burden from sludge incineration. Uncertainty calculated from wastewater composition and treatment model
  properties: wet mass 1 kg, dry mass 1 kg

## Emissions to nature
- Aluminium [water, surface water]: 1.038e-8 kg; lognormal variance with pedigree 0.67, pedigree (1,1,5,1,1)
  sewer overload discharge plus direct wastewater treatment plant emission plus emission from sludge incineration. Uncertainty calculated from wastewater composition and treatment model
- Water [air, unspecified]: 0.1 m3; name water_to_air_unspecified; lognormal variance with pedigree 0.0807, pedigree (2,2,5,1,1)
  Calculated value based on water balance.
  property fraction, origin: salt water 0; name fraction_origin_salt_water
  property fraction, origin: fresh water 0; name fraction_origin_fresh_water
  property fraction, origin: unspecified 1; name fraction_origin_unspecified
- COD, Chemical Oxygen Demand [water, surface water]: 0.13567 kg; lognormal variance with pedigree 0.33, pedigree (1,1,5,1,1)
  (same comment as for Aluminium)
- Water [water, unspecified]: 0.9 m3; name water_to_water_unspecified; lognormal variance with pedigree 0.0807, pedigree (2,2,5,1,1)
  Calculated value based on water balance.
  property wet mass 1000 kg; name WM
  property fraction, origin: unspecified 0; name fraction_origin_unspecified_Ww
  property carbon content, non-fossil 0; name C_content_non_fossil
  property fraction, origin: salt water 0; name fraction_origin_salt_water_Ww
  property carbon content, fossil 0; name C_content_fossil
  property dry mass 0 kg; name DM
  property water in wet mass 1000 kg; name WWM
  property fraction, origin: fresh water 1; name fraction_origin_fresh_water_Ww
- Aluminium [air, urban air close to ground]: 1.9487e-7 kg; lognormal variance with pedigree 0.08, pedigree (1,1,5,1,1)
  direct digester gas emission plus emission from sludge incineration. Uncertainty calculated from wastewater composition and treatment model
- Phosphorus [air, urban air close to ground]: 3.9119e-7 kg; lognormal variance with pedigree 0.08, pedigree (1,1,5,1,1)
  (same comment as for Aluminium)
- Zinc [soil, agricultural]: 4.2084e-5 kg; lognormal variance with pedigree 0.72, pedigree (1,1,5,1,1)
  emission from sludge spreading. Uncertainty calculated from wastewater composition and treatment model
- DOC, Dissolved Organic Carbon [water, ground-, long-term]: 0.0038128 kg; lognormal variance with pedigree 0.4, pedigree (1,1,5,1,1)
  emission from sludge incineration. Uncertainty calculated from wastewater composition and treatment model
- Copper, ion [water, ground-, long-term]: 9.5449e-6 kg; lognormal variance with pedigree 0.74, pedigree (1,1,5,1,1)
  (same comment as for DOC, Dissolved Organic Carbon)
- Methane, non-fossil [air, urban air close to ground]: 0.021332 kg; lognormal variance with pedigree 0.43, pedigree (1,1,5,1,1)
  (same comment as for Aluminium)
- Phosphate [water, surface water]: 0.0012725 kg; lognormal variance with pedigree 0.05, pedigree (1,1,5,1,1)
  sewer overload discharge plus direct wastewater treatment plant emission plus emission from sludge incineration plus emission from sludge spreading. Uncertainty calculated from wastewater composition and treatment model
- Copper, ion [water, surface water]: 7.7817e-6 kg; lognormal variance with pedigree 0.66, pedigree (1,1,5,1,1)
  (same comment as for Aluminium)
- Carbon dioxide, non-fossil [air, urban air close to ground]: 7.6035 kg; lognormal variance with pedigree 0.19, pedigree (1,1,5,1,1)
  direct wastewater treatment plant emission plus direct digester gas emission plus emission from sludge incineration. Uncertainty calculated from wastewater composition and treatment model
- Iron [soil, agricultural]: 0.0021612 kg; lognormal variance with pedigree 0.06, pedigree (1,1,5,1,1)
  (same comment as for Zinc)
- DOC, Dissolved Organic Carbon [water, surface water]: 0.30597 kg; lognormal variance with pedigree 0.3, pedigree (1,1,5,1,1)
  (same comment as for Aluminium)
- Carbon monoxide, non-fossil [air, urban air close to ground]: 0.0067433 kg; lognormal variance with pedigree 0.43, pedigree (1,1,5,1,1)
  (same comment as for Aluminium)
- Copper [soil, agricultural]: 1.0411e-5 kg; lognormal variance with pedigree 0.73, pedigree (1,1,5,1,1)
  (same comment as for Zinc)
- Iron, ion [water, ground-, long-term]: 0.0011482 kg; lognormal variance with pedigree 0.9, pedigree (1,1,5,1,1)
  (same comment as for DOC, Dissolved Organic Carbon)
- BOD5, Biological Oxygen Demand [water, surface water]: 0.40107 kg; lognormal variance with pedigree 0.29, pedigree (1,1,5,1,1)
  (same comment as for Aluminium)
- Copper [air, urban air close to ground]: 8.7165e-11 kg; lognormal variance with pedigree 0.78, pedigree (1,1,5,1,1)
  (same comment as for Aluminium)
- Sulfate [water, surface water]: 0.0047291 kg; lognormal variance with pedigree 0.06, pedigree (1,1,5,1,1)
  (same comment as for Aluminium)
- Carbon [soil, agricultural]: 0.34425 kg; lognormal variance with pedigree 0.39, pedigree (1,1,5,1,1)
  (same comment as for Zinc)
- COD, Chemical Oxygen Demand [water, ground-, long-term]: 0.0096355 kg; lognormal variance with pedigree 0.4, pedigree (1,1,5,1,1)
  (same comment as for DOC, Dissolved Organic Carbon)
- Iron, ion [water, surface water]: 8.3885e-7 kg; lognormal variance with pedigree 0.09, pedigree (1,1,5,1,1)
  (same comment as for Aluminium)
- Iron [air, urban air close to ground]: 8.1835e-8 kg; lognormal variance with pedigree 0.11, pedigree (1,1,5,1,1)
  (same comment as for Aluminium)
- Chloride [water, surface water]: 0.0049308 kg; lognormal variance with pedigree 0.06, pedigree (1,1,5,1,1)
  (same comment as for Aluminium)
- Zinc, ion [water, ground-, long-term]: 7.4004e-7 kg; lognormal variance with pedigree 5.52, pedigree (1,1,5,1,1)
  (same comment as for DOC, Dissolved Organic Carbon)
- BOD5, Biological Oxygen Demand [water, ground-, long-term]: 0.0031518 kg; lognormal variance with pedigree 0.4, pedigree (1,1,5,1,1)
  (same comment as for DOC, Dissolved Organic Carbon)
- Phosphate [water, ground-, long-term]: 4.5814e-5 kg; lognormal variance with pedigree 4.24, pedigree (1,1,5,1,1)
  (same comment as for DOC, Dissolved Organic Carbon)
- Phosphate [water, ground-]: 6.0245e-6 kg; lognormal variance with pedigree 0.11, pedigree (1,1,5,1,1)
  (same comment as for Zinc)
- TOC, Total Organic Carbon [water, surface water]: 0.32679 kg; lognormal variance with pedigree 0.28, pedigree (1,1,5,1,1)
  (same comment as for Aluminium)
- TOC, Total Organic Carbon [water, ground-, long-term]: 0.0038128 kg; lognormal variance with pedigree 0.4, pedigree (1,1,5,1,1)
  (same comment as for DOC, Dissolved Organic Carbon)
- NMVOC, non-methane volatile organic compounds, unspecified origin [air, urban air close to ground]: 9.6932e-5 kg; lognormal variance with pedigree 0.54, pedigree (1,1,5,1,1)
  direct digester gas emission. Uncertainty calculated from wastewater composition and treatment model
- Aluminium [water, ground-, long-term]: 9.2312e-5 kg; lognormal variance with pedigree 0.07, pedigree (1,1,5,1,1)
  (same comment as for DOC, Dissolved Organic Carbon)
- Zinc [air, urban air close to ground]: 7.7979e-10 kg; lognormal variance with pedigree 0.77, pedigree (1,1,5,1,1)
  (same comment as for Aluminium)
- Zinc, ion [water, surface water]: 4.0192e-5 kg; lognormal variance with pedigree 0.66, pedigree (1,1,5,1,1)
  (same comment as for Aluminium)
- Aluminium [soil, agricultural]: 0.00010998 kg; lognormal variance with pedigree 0.06, pedigree (1,1,5,1,1)
  (same comment as for Zinc)

## Extrapolations
This dataset has been extrapolated from year 2000 to the year of the calculation (2019). The uncertainty has been adjusted accordingly.

## Review by Niels Jungbluth 2009-01-22
passed.
