# cement production, blast furnace slag 6-34%

Dataset: EcoSpold 2, unit process
Geography: BR
Time period: 2016-01-01 to 2019-12-31
Technology level: current
Classification: ISIC rev.4 ecoinvent: 2394:Manufacture of cement, lime and plaster
Synonyms: Composite cement; CP II-E; Blended cement
Scenario: Business-as-Usual
System model: Allocation at the point of substitution
Share of production covered: 70 %
Generated by: Fernanda Belizario Silva
Published in: Silva, F. B. 2017
Database: ecoinvent
isCopyrightProtected: true
accessRestrictedTo: 1

## General comment
The dataset describes the production of blended Portland cement production with the addition of blast furnace slag in Brazil. There are three types of blended cement in Brazil (CP II) depending on the supplementary cementitious materials (SCM): slag (E), pozzolan (Z) and limestone filler (F). CP II-E has between 6% to 34% of blast furnace slag in mass composition. The three Blended cement types are specified by Brazilian standards (ABNT NBR 11578:1991).
Granulated blast furnace slag is a byproduct of iron production and, when finely ground, it is also a cementing material with hydraulic properties. Slag hydration alone is too slow to give structural properties to cement, but when the slag is combined with Portland cement, the hydration is accelerated due to the extra amount of calcium hydroxide and gypsum. The blast furnace slag is granulated in the iron industry, but usually ground in the cement plant. This extra energy for grinding may be important; however, it is not evaluated due to the lack of specific data of energy consumption per type of cement (electricity consumption in cement plants are informed as a whole).
Six types of Portland and blended cement types represent Brazilian production. The table below presents the different cement types and compositions according to Brazilian standards (NBR 11578:1991, NBR 5735:1991, NBR 5736:1991, NBR 5733:1991).
The CP II cement types are the most consumed cement in Brazil. CP II represents 62.1% of the market according to the National Union of the Cement Industry (SNIC, 2013). Its applications range from reinforced and ordinary concrete to coating mortars. The blast furnace slag in cement gives properties to concrete such as lower hydration heat and protection against sulfate and chloride attack. The CP II-E cement consists of clinker, calcium sulfate, crushed limestone, and 6-34% of blast furnace slag (see composition in the table).
This dataset contains information from clinker stockpile to cement ready to be shipped in bulk. After the clinker is cooled from the rotary kiln, it is ground in ball or roller mills to particles under 75 μm size. Then it goes to silos where it is mixed with calcium sulphate (gypsum) and SCMs. The mixed cement goes to a finishing mill and then it is stored in cement silos, ready to be shipped in bulk or packed.
Primary data were gathered from six cement manufacturers in Brazil, who informed the total values of inputs and outputs related to cement production in 2016, considering all their cement production sites. All types of flows were reported, namely: primary and secondary raw materials and fuels, auxiliary materials, electricity and water consumption. It corresponds to 70% market share, considered a good representativeness level. Although particulate emissions may occur, they are not reported due to lack of specific data for the cement grinding step (air emissions are monitored for the integrated clinker-cement plant as a whole and reported in the clinker production process).

## Included activities start
The activity starts with the reception of raw materials in the cement plant. In plants which are integrated with clinker production, clinker is stored in the silo after cooling in the upstream process (clinker production/BR).

## Included activities end
The activity includes the drying of raw materials, the grinding and mixing of raw materials for cement production in the cement mill (with grinding aids) and ends with cement stored in silos, ready to be shipped. Waste or particulate emission are not considered due to the lack of data. The dataset does not include packaging and administration.

## Geography
This dataset represents production of cement blended with blast furnace slag 6-34% for Brazil.

## Technology
Current technology for cement production in Brazil.

## Time period
Time period corresponds to data collection period (2016).

## Reference product
- cement, blast furnace slag 6-34%: 1 kg; name cement; By-product classification allocatable product; CPC 37440: Portland cement, aluminous cement, slag cement and similar hydraulic cements, except in the form of clinkers; EcoSpold01Categories construction materials/binder
  Cement’s bulk density ranges from 2,8 g/cm³ to 3,2 g/cm³.
  production volume 1.19143e10 kg; name APV_cement; = 57556901*1000*0.621/3
    There is no specific CP II-E total production available for Brazilian market, so the total production of CP II was divided equally by the tree cements grouped under this class. The share of CP II (62,1%) in the market was applied to the total cement production in 2016. Data provided by SNIC.
  property price 0.0615 EUR2005
    2005 import and export prices (total trades (USD) divided by total weight (kg) in China, India, USA, Japan, Russia and Europe, major producers and consumers (http://www.cementchina.net/freport/showfre.asp?id=749) from UN Commodity Trade Statistics Database (http://data.un.org/Explorer.aspxDatabase [Accessed 2 July 2010]). Commodity: Cement (portland, aluminious, slag or hydraulic)
  property carbon content 0
    carbon content on a dry matter basis (reserved; not for manual entry)
  property true value 0.0615; name cement_true_value
    allocation property applied in "true value" allocation // value calculated from revenue
  properties: dry mass 1 kg, carbon content, non-fossil 0, wet mass 1 kg, carbon content, fossil 0, water content 0, water in wet mass 0 kg, carbon allocation 0 kg

## By-products
- heat, for reuse in municipal waste incineration only: 0 MJ; CPC 17300: Steam and hot water; By-product classification allocatable product; pedigree (1,1,1,1,1)
  Net electricity generated from this waste and used in internal MSWI plant energy redistribution.
  Uncertainty: uncertainty is calculated from uncertainties in waste composition and uncertainties in energy efficiency and the uncertainty in internal energy demand
  production volume 665228 MJ
  property exergy 0.1842 MJ; name E_th_prod_MSWI_exergy
    This exergy property is based on the exergy content of the product.
  property price 0.0106 EUR2005; name E_th_prod_MSWI_price_EUR2005
    Average European district heat price from Ecoheatcool and Euroheat 2005-2006, Ecoheat Work package 1: The European heat market. Final report. 10.6 EUR/GJ i s the price of district heat. http://www.solarthermalworld.org/files/Ecoheatcool%20WP1%20Web.pdf?download
  property true value relation 0.1842; name E_th_prod_MSWI_true_value_relation
    property to calculate "true value" from
  property true value 3.66904e-7
    allocation property applied in "true value" allocation // value calculated from true value relation
- electricity, for reuse in municipal waste incineration only: 0 kWh; CPC 17100: Electrical energy; By-product classification allocatable product; pedigree (1,1,1,1,1)
  (same comment as for heat, for reuse in municipal waste incineration only)
  production volume 94270.8 kWh
  property price 0.1 EUR2005; name E_el_prod_MSWI_price_EUR2005
    Estimated to be the same price as in case of electricity, medium voltage.
  property exergy 3.6 MJ; name E_el_prod_MSWI_exergy
    This exergy property is based on the exergy content of the product.
  property true value relation 3.6; name E_el_prod_MSWI_true_value_relation
    property to calculate "true value" from
  property true value 1.01618e-6
    (same comment as for heat, for reuse in municipal waste incineration only)

## Inputs from technosphere
- clinker: 0.659985 kg; = 0,66*cement; lognormal variance with pedigree 0.0059, pedigree (2,2,2,1,1)
  Measured value. Weighted average of values informed by manufacturers. Raw material for cement production.
  Uncertainty: Basic uncertainty calculated from sample.
  properties: dry mass 1 kg, wet mass 1 kg
- scrap steel: -7.09984e-5 kg; = (steel)*-1; lognormal variance with pedigree 0.4059, pedigree (2,2,2,1,1)
  Estimation based on corresponding input.
  Uncertainty: Basic uncertainty calculated from sample.
  production volume 845914 kg; = APV_cement * (steel / cement)
    Calculated from production volume of reference product using the relative outputs.
  properties: carbon content, fossil 0.005, dry mass 1 kg, wet mass 1 kg
- electricity, medium voltage: 0.0509989 kWh; = 0,051*cement; lognormal variance with pedigree 0.0219, pedigree (2,2,2,1,1)
  Measured value. Weighted average of values informed by manufacturers. Electricity for grinding and factory operation.
  Uncertainty: Basic uncertainty calculated from sample.
- tap water: 0.00144997 kg; name tap_water; = 1,45e-3*cement; lognormal variance with pedigree 0.6789, pedigree (2,2,2,1,1)
  Measured value. Weighted average of values informed by manufacturers. Water for sanitary purposes.
  Uncertainty: Basic uncertainty calculated from sample.
  properties: dry mass 0.000337476 kg, water content 2962.17, carbon content, fossil 0.00178991, wet mass 1 kg
  note on carbon content, fossil: Bicarbonate content is 2.93 mol/m3. CO2 content is 0.1 mol/m3 (ecoinvent v2.2 report 8, Tab 93.1).
- cement factory: 2.72994e-11 unit; = 2,73e-11*cement; source Kellenberger D. 2007; lognormal variance with pedigree 0.32, pedigree (3,5,4,5,1)
  Literature value from the dataset cement production, Portland /CH (accessed 20170810)
  Uncertainty: Variance of log-transformed data was taken from ecoinvent report no 1, table 10.3. Value represents demand of infrastructure for input/output group c.
- heat, district or industrial, other than natural gas: 0.0154997 MJ; = 1,55e-2*cement; lognormal variance with pedigree 2.2229, pedigree (2,2,2,1,1)
  Measured value. Weighted average of values informed by manufacturers. Heat for drying of raw materials.
  Uncertainty: Basic uncertainty calculated from sample.
  properties: corresponding fuel use, propane, furnace >100kW 1.05263 MJ
  note on corresponding fuel use, propane, furnace >100kW: Lower heating value of the fuel input related to the heat/electricity output, taken directly from ecoinvent v3.0 dataset "heat production, natural gas, at industrial furnace >100kW, GLO 2000".
- diethylene glycol: 0.000369992 kg; = 3,7e-4*cement; lognormal variance with pedigree 1.2529, pedigree (2,2,2,1,1)
  Measured value. Weighted average of values informed by manufacturers. Grinding aid for cement production.
  Uncertainty: Basic uncertainty calculated from sample.
  properties: carbon content, fossil 0.45283, wet mass 1 kg, dry mass 1 kg
- water, harvested from rainwater: 0.00396991 kg; name rainwater_input; = 3,97e-3*cement; lognormal variance with pedigree 1.6299, pedigree (2,2,2,1,1)
  Measured value. Weighted average of values informed by manufacturers. Water for equipment cooling and dust control.
  Uncertainty: Basic uncertainty calculated from sample.
  properties: carbon content, fossil 0.0017899, dry mass 0.00034 kg, wet mass 1 kg, water content 2940.2
- limestone, crushed, for mill: 0.0699984 kg; name limestone; = 0,07*cement; lognormal variance with pedigree 0.0259, pedigree (2,2,2,1,1)
  (same comment as for clinker)
  properties: wet mass 1 kg, dry mass 1 kg, carbon content, fossil 0.117492
- lubricating oil: 5.49988e-6 kg; name oil; = 5,5e-6*cement; lognormal variance with pedigree 0.5019, pedigree (2,2,2,1,1)
  Measured value. Weighted average of values informed by manufacturers. Maintenance of process equipment.
  Uncertainty: Basic uncertainty calculated from sample.
  properties: dry mass 1 kg, wet mass 1 kg, carbon content, fossil 0.75
  note on carbon content, fossil: Lubricating oil is produced from diesel. C-content/dry mass of fats and oils considered 75%, from: ecoinvent v2.2 report, n 15a, pg 40
- wastewater, average: -1.44997e-6 m3; name wastewater; = (1,45e-6*cement)*-1; lognormal variance with pedigree 0.6789, pedigree (2,2,2,1,1)
  Estimation. Calculated as: (tap_water/1000)* cement. All tap water was considered to leave the process as an effluent.
  Uncertainty: Basic uncertainty calculated from sample.
  production volume 17275.7 m3; = APV_cement * (wastewater / cement)
    Calculated from production volume of reference product using the relative outputs.
  property price 0 EUR2005; name wastewater_price_EUR2005
  properties: wet mass 1000 kg, water content 2882.2, carbon content, non-fossil 0.194039, dry mass 0.346837 kg
  note on carbon content, non-fossil: 0.0673 kg TOC/m3 (Tab A.17, ecoinvent v2.2 report 13_I). TOC was considered as Total Carbon.
- gypsum, mineral: 0.0499989 kg; = (0,03+0,02)*cement; lognormal variance with pedigree 0.0629, pedigree (2,2,2,1,1)
  Measured value. Weighted average of values informed by manufacturers. 0,03 kg is mineral gypsum (primary raw material) and 0,02 kg is phosphogypsum (secondary raw material, by-product of phosphoric acid production); "gypsum, mineral" is used as proxy because phosphogypsum was not available in the ecoinvent database during dataset development.
  Uncertainty: Basic uncertainty calculated from sample.
  properties: dry mass 1 kg, wet mass 1 kg
- waste mineral oil: -5.49988e-6 kg; = (oil)*-1; lognormal variance with pedigree 0.5019, pedigree (2,2,2,1,1)
  (same comment as for scrap steel)
  production volume 65528.5 kg; = APV_cement * (oil/ cement)
    Calculated from production volume of reference product using the relative outputs.
  properties: wet mass 1 kg, water content 0.111111, carbon content, fossil 0.864444, dry mass 0.9 kg
  note on carbon content, fossil: Tab A.6, ecoinvent v2.2 report 13_I. C content has been calculated after data in the tables, and then referred to 1 kg DM
- heat, district or industrial, natural gas: 0.00502989 MJ; = 5,03e-3*cement; lognormal variance with pedigree 3.0979, pedigree (2,2,2,1,1)
  (same comment as for heat, district or industrial, other than natural gas)
- steel, low-alloyed: 7.09984e-5 kg; name steel; = 7,1e-5*cement; lognormal variance with pedigree 0.4059, pedigree (2,2,2,1,1)
  Measured value. Weighted average of values informed by manufacturers. Replacement of wearing parts of process equipment.
  Uncertainty: Basic uncertainty calculated from sample.
  property carbon content, fossil 0.005; name cc_steel
  properties: dry mass 1 kg, wet mass 1 kg
- synthetic rubber: 8.7998e-6 kg; name rubber; = 8,8e-6*cement; lognormal variance with pedigree 0.6669, pedigree (2,2,2,1,1)
  (same comment as for steel, low-alloyed)
  properties: dry mass 1 kg, carbon content, fossil 0.871949, wet mass 1 kg
  note on carbon content, fossil: EPDM (Ethylene-propene-diene terpolymer) rubber is a terpolymer of ethylene, propene, and a diene with the residual unsaturated portion of the diene in the side chain (ecoinvent v2.2 report 7-part XX & Ullmann). Chemical formula (deduced from Evidences of Solvent-Induced Miscibility in Polychloroprene-co-Ethylene-Propene Diene Terpolymer Blends, Dubey et al., Journal of Applied Polymer Science, 2009, 111:1884–1891): C20H35
- granulated blast furnace slag: 0.219995 kg; name GBFS; = 0,22*cement; lognormal variance with pedigree 0.0522, pedigree (3,1,2,1,1)
  Measured value. Weighted average of values informed by manufacturers. Raw material for cement production.
  In Brazil, around 70% of the blast furnace slag used in cement making is ground along with clinker in the cement plant, not in the steel making plant. The energy for grinding is declared in the cement dataset (average aggregate data for all cement types).
  Uncertainty: Basic uncertainty calculated from sample.
  property carbon content, fossil 0; name GBFS_C_content_fossil
  property carbon content, non-fossil 0; name GBFS_C_content_non_fossil
  properties: wet mass 1 kg, dry mass 1 kg
- waste rubber, unspecified: -8.7998e-6 kg; = (rubber)*-1; lognormal variance with pedigree 0.6669, pedigree (2,2,2,1,1)
  (same comment as for scrap steel)
  production volume 104846 kg; = APV_cement * (rubber/ cement)
    Calculated from production volume of reference product using the relative outputs.
  properties: wet mass 1 kg, dry mass 1 kg, carbon content, fossil 0.853

## Inputs from nature
- Water, river [natural resource, in water]: 0.000123997 m3; name water_river_input; = 1,24e-4*cement; lognormal variance with pedigree 0.2749, pedigree (2,2,2,1,1)
  (same comment as for water, harvested from rainwater)
- Water, unspecified natural origin [natural resource, in water]: 2.02995e-6 m3; = 2,03e-6*cement; lognormal variance with pedigree 1.7169, pedigree (2,2,2,1,1)
  (same comment as for water, harvested from rainwater)
- Water, well, in ground [natural resource, in water]: 5.64987e-5 m3; name water_well_input; = 5,65e-5*cement; lognormal variance with pedigree 0.4149, pedigree (2,2,2,1,1)
  (same comment as for water, harvested from rainwater)

## Emissions to nature
- Water [air, unspecified]: 0.000186996 m3; = 1,87e-4*cement; lognormal variance with pedigree 0.1069, pedigree (2,2,2,1,1)
  Estimation. Calculated as: ( water_unsp_input+ water_well_input+ water_river_input+ (rainwater_input/1000))*cement. All water input except for tap water was considered to leave the system as evaporated water, as water is used for cooling and dust control.
  Uncertainty: Basic uncertainty calculated from sample.

## Sampling procedure
Data represent circa 70% of the Brazilian cement production in 2016, which is considered a good representativeness level. Data were provided by six cement manufacturers, via confidential questionnaires, regarding the production of cement during the year of 2016.
Raw materials flows are the weighted average of the cement composition informed by each cement manufacturer. The weighing factor used is the total cement production volume, since manufacturers did not report the production volumes of each cement type due to confidentiality. Basic uncertainty was calculated based on the sample's weighted standard deviation and represents variation of composition between manufacturers/factories.
For other input flows (grinding aids, materials for equipment maintenance, fuels, electricity, water consumption), the weighted average of each manufacturer's unit flows was calculated. Except for the grinding aids, all other flows are not distinguished by cement type, as their consumption is reported for the whole cement plant, which usually produces more than one cement type.
Water consumption was usually reported for the whole integrated cement plants (clinker + cement production operations). Based on literature and expert opinion, the total water volume was divided equally between the clinker and the cement production processes and then converted into unit flows.
Raw materials and fuel inputs were considered to be dry. As water is mainly used for cooling and dust control, it was considered that all water evaporates, except for the "tap water" input, which was considered to be used as drinking water and whose output is modelled as an effluent.
Fuel consumption was informed by manufacturers in terms of volume or mass. They were converted into energy using their lower heating values and modelled as a heat input, to simplify the dataset and allow the consideration of corresponding air emissions.
Infrastructure input flow (cement factory) was extrapolated from "cement Portland/CH" dataset (accessed 08.10.2017).
The amounts of the exchanges were calculated considering the weighted average of the sample. No conversion to the geometric mean of the lognormal distribution was done, for consistency reasons with other ecoinvent datasets.

## Extrapolations
Data represent 70% of Brazilian cement production. This sample is extrapolated to represent the production in the whole country. The main values are considered representative for a typical production of Portland cement blended with slag in Brazil.
