# treatment of used railway track

Dataset: EcoSpold 2, unit process
Geography: RoW
Time period: 1999-01-01 to 2019-12-31
Technology level: current
Classification: ISIC rev.4 ecoinvent: 3830:Materials recovery
Classification: EcoSpold01Categories: transport systems/train
Tags: ConvertedDataset; Treatment
Scenario: Business-as-Usual
System model: Allocation at the point of substitution
Generated by: Michael Spielmann (obsolete)
Published in: Spielmann M. 2007
Database: ecoinvent
isCopyrightProtected: true
accessRestrictedTo: 1

## General comment
All data is referred to meter*year. Life time of the rail track infrastructure is assumed to be 100 yrs. Inventory for a conventional gravel track bedding.Data is refers to a two way track.
[This dataset was already contained in the ecoinvent database version 2. It was not individually updated during the transfer to ecoinvent version 3. Life Cycle Impact Assessment results may still have changed, as they are affected by changes in the supply chain, i.e. in other datasets. This dataset was generated following the ecoinvent quality guidelines for version 2. It may have been subject to central changes described in the ecoinvent version 3 change report (http://www.ecoinvent.org/database/ecoinvent-version-3/reports-of-changes/), and the results of the central updates were reviewed extensively. The changes added e.g. consistent water flows and other information throughout the database. The documentation of this dataset can be found in the ecoinvent reports of version 2, which are still available via the ecoinvent website. The change report linked above covers all central changes that were made during the conversion process.]

## Included activities end
The inventory includes the disposal of contaminated gravel (20% of the total amount). About 80% of the gravel is re-used in other activities and thus a cut off allocation has been applied. Transport to disposal and re-use is accounted for with 200km. For diposal of sleepers a cut off allocation is made. Transport to disposal is accounted for with 200km.

## Geography
Data refers to average conditions in Switzerland and a specific conditions in Germany

## Technology
Data represents current technologies

## Time period
Rail length is based on current statistical data (2000). The expenditures for the track disposal represent a recent high speed track in Germany

## Reference product
- used railway track: -1 m*year; CPC 39990: Other wastes n.e.c.; By-product classification Waste
  EcoSpold01Location=CH
  production volume 3.96633 m*year
    This is a placeholder value that does not reflect real-world production volumes. This dataset does not currently require a real-world production volume to work in the database framework, and no actual data were collected yet. This has no negative effect on the results of the ecoinvent database.
  property carbon content, non-fossil 0
    Calculated from C content in input materials in the infrastructure
  property price 0 EUR2005
    Waste products are assigned a price of zero as they are assumed to require further treatment.
  property carbon content, fossil 8.23188e-5
    Calculated from C content in input materials in the infrastructure
  property carbon content 8.23188e-5
    carbon content on a dry matter basis (reserved; not for manual entry)
  properties: water content 0, dry mass 690 kg, water in wet mass 0 kg, wet mass 690 kg, carbon allocation 0.0568 kg

## Inputs from technosphere
- inert waste, for final disposal: -38.65 kg; lognormal variance with pedigree 0.0612, pedigree (2,3,5,5,3)
  EcoSpold01Location=CH
  Swiss Rail study
  Uncertainty: Swiss Rail study
  production volume 115.95 kg
    Calculated from the production volume of used railway track in proportion to the respective output amounts.
  properties: water content 0.00502513, wet mass 1 kg, dry mass 0.995 kg
- pollutant from rail ballast: -0.14 kg; lognormal variance with pedigree 0.0612, pedigree (2,3,5,5,3)
  Swiss Rail study
  EcoSpold01Location=CH
  Uncertainty: Swiss Rail study
  production volume 0.42 kg
    (same comment as for inert waste, for final disposal)
  properties: wet mass 1 kg, dry mass 1 kg

## Sampling procedure
national statistics and literature studies

## Extrapolations
none This dataset has been copied from an original dataset covering the geography CH. The uncertainty has been adjusted accordingly.

## Review by Niels Jungbluth 2005-07-19
passed.
