# coconut oil production, crude

Dataset: EcoSpold 2, unit process
Geography: PH
Time period: 1995-01-01 to 2019-12-31
Technology level: current
Classification: EcoSpold01Categories: chemicals/organics
Classification: ISIC rev.4 ecoinvent: 1040:Manufacture of vegetable and animal oils and fats
Tags: ConvertedDataset
Scenario: Business-as-Usual
System model: Allocation at the point of substitution
Generated by: Roland Hischier
Published in: Zah R. 2004
Database: ecoinvent
isCopyrightProtected: true
accessRestrictedTo: 1

## General comment
data based on the ECOSOL study of the European surfactant industry. Allocations in multioutput processes were made, using the relative mass outputs of products.
[This dataset was already contained in the ecoinvent database version 2. It was not individually updated during the transfer to ecoinvent version 3. Life Cycle Impact Assessment results may still have changed, as they are affected by changes in the supply chain, i.e. in other datasets. This dataset was generated following the ecoinvent quality guidelines for version 2. It may have been subject to central changes described in the ecoinvent version 3 change report (http://www.ecoinvent.org/database/ecoinvent-version-3/reports-of-changes/), and the results of the central updates were reviewed extensively. The changes added e.g. consistent water flows and other information throughout the database. The documentation of this dataset can be found in the ecoinvent reports of version 2, which are still available via the ecoinvent website. The change report linked above covers all central changes that were made during the conversion process.]

## Included activities end
This module contains material and energy input, production of waste and emissions for the steps from the harvested coconuts to the crude coconut oil (i.e. the coconut halving, extraction of water, meat removal & shell production, drying, the oil extraction and transport to the oil mill). Water consumption and infrastructure have been estimated.

## Geography
Data based on coconut oil mills in Phillippines

## Technology
Average technology, typical for Phillippines conditions in the mid 90s

## Time period
data of published literature

## Parameters
- fraction, cooling water, once-through system, to air: 0.004; name fraction_CW_OT_to_air; lognormal variance with pedigree 0.0413, pedigree (2,3,1,3,1)
  Calculated based on literature value (Scown, C.D., 2011, Water Footprint of U.S. Transportation Fuels and supplying information of the article) (Vionnet, S., Quantis Water Database - Technical Report, 2012).
- fraction, cooling water, to air: 0.3875; name fraction_CW_to_air; = (0.5*fraction_CW_OT_to_air)+(0.5*fraction_CW_R_to_air); lognormal variance with pedigree 0.092025, pedigree (4,4,3,2,4)
  Calculated value based on literature value (see comments of the other parametres present in this dataset) and expert opinion. In the case when no industry/literature data are available about the type of cooling or directly fraction, cooling water, to air specific for the process a default assumption is applied. It is assumed that the once-through cooling system is used in 50% of all cases and recirculating system is used in another 50% of all cases.
- fraction, cooling water, recirculating system, to air: 0.771; name fraction_CW_R_to_air; lognormal variance with pedigree 0.0413, pedigree (2,3,1,3,1)
  (same comment as for fraction, cooling water, once-through system, to air)
- fraction, process water, to air: 0.205 dimensionless; name fraction_PW_to_air; lognormal variance with pedigree 0.092025, pedigree (4,4,3,2,4)
  Literature value (Statistics Canada, 2007 & Shaffer, K.H., 2008, Consumptive water use in the Great Lakes Basin, USGS) (Vionnet, S., Quantis Water Database - Technical Report, 2012).
- fraction, cooling water, cooling pond system, to air: 0.032; name fraction_CW_CP_to_air; lognormal variance with pedigree 0.0413, pedigree (2,3,1,3,1)
  (same comment as for fraction, cooling water, once-through system, to air)

## Reference product
- coconut oil, crude: 1 kg; CPC 21661: Coconut oil, crude; By-product classification allocatable product
  EcoSpold01Location=PH
  production volume 1.50754e9 kg
    Worldwide 2'900 kt in 1993
    2005 production volumes in FAOSTAT (Production)
  property price 0.596 EUR2005
    Calculated value based on data from United Nations Commodity Trade Statistics Database (comtrade.un.org). UN comtrade category: 851311 Coconut (copra) oil crude. Using exchange rate of 1EURO = 1.209 USD.
  property carbon content, non-fossil 0.75
    C-content/dry mass of fats and oils considered 75%, from: "Evolutionary and Biochemical Aspects", A.D. Kay and T. Vrede (in Global Ecology, 2010, Elsevier B.V., S.E. Jørgensen Ed.)
  property carbon content 0.75
    carbon content on a dry matter basis (reserved; not for manual entry)
  property true value 0.596
    allocation property applied in "true value" allocation // value calculated from revenue
  properties: dry mass 1 kg, water in wet mass 0 kg, carbon content, fossil 0, water content 0, wet mass 1 kg, carbon allocation 0.75 kg

## By-products
- heat, for reuse in municipal waste incineration only: 0 MJ; CPC 17300: Steam and hot water; By-product classification allocatable product; pedigree (1,1,1,1,1)
  Net electricity generated from this waste and used in internal MSWI plant energy redistribution.
  Uncertainty: uncertainty is calculated from uncertainties in waste composition and uncertainties in energy efficiency and the uncertainty in internal energy demand
  production volume 26.4279 MJ
  property exergy 0.1842 MJ; name E_th_prod_MSWI_exergy
    This exergy property is based on the exergy content of the product.
  property price 0.0106 EUR2005; name E_th_prod_MSWI_price_EUR2005
    Average European district heat price from Ecoheatcool and Euroheat 2005-2006, Ecoheat Work package 1: The European heat market. Final report. 10.6 EUR/GJ i s the price of district heat. http://www.solarthermalworld.org/files/Ecoheatcool%20WP1%20Web.pdf?download
  property true value relation 0.1842; name E_th_prod_MSWI_true_value_relation
    property to calculate "true value" from
  property true value 1.15315e-10
    allocation property applied in "true value" allocation // value calculated from true value relation
- electricity, for reuse in municipal waste incineration only: 0 kWh; CPC 17100: Electrical energy; By-product classification allocatable product; pedigree (1,1,1,1,1)
  (same comment as for heat, for reuse in municipal waste incineration only)
  production volume 3.72176 kWh
  property price 0.1 EUR2005; name E_el_prod_MSWI_price_EUR2005
    Estimated to be the same price as in case of electricity, medium voltage.
  property exergy 3.6 MJ; name E_el_prod_MSWI_exergy
    This exergy property is based on the exergy content of the product.
  property true value relation 3.6; name E_el_prod_MSWI_true_value_relation
    property to calculate "true value" from
  property true value 3.17383e-10
    (same comment as for heat, for reuse in municipal waste incineration only)

## Inputs from technosphere
- coconut, dehusked: 2.97 kg
  It is assumed, that all the coconut oil production in Philippines uses coconut, dehusked produced in Philipines.
  properties: water content 0.446, dry mass 0.691563 kg, carbon content, non-fossil 0.708236, wet mass 1 kg
- chemical factory, organics: 4e-10 unit; lognormal variance with pedigree 0.51, pedigree (5,5,5,5,4)
  EcoSpold01Location=RER
  Estimated from a large chem. plant
  Uncertainty: estimated from a large chem. plant
- wood ash mixture, pure: -0.00104 kg; lognormal variance with pedigree 0.0686, pedigree (2,5,5,1,1)
  Data from ECOSOL study (Literature)
  EcoSpold01Location=CH
  Uncertainty: data from ECOSOL study (Literature)
  production volume 1.56784e6 kg
    Calculated from the production volume of coconut oil, crude in proportion to the respective output amounts.
  properties: carbon content, non-fossil 0.012, wet mass 1 kg, dry mass 1 kg
- heat, district or industrial, other than natural gas: 0.297 MJ; lognormal variance with pedigree 0.076, pedigree (4,5,5,1,1)
  Estimation, based on ECOSOL data
  EcoSpold01Location=RER
  Uncertainty: estimation, based on ECOSOL data
- electricity, medium voltage: 0.172 kWh; lognormal variance with pedigree 0.076, pedigree (4,5,5,1,1)
  EcoSpold01Location=UCTE
  Estimation, based on ECOSOL data
  Uncertainty: estimation, based on ECOSOL data
- transport, freight, lorry, unspecified: 0.134 metric ton*km
  It is assumed, that all the coconut oil production in Philippines uses coconut, dehusked produced in Philipines. Transport was added based on the value (0.134 tkm) estimated in ecoinvent version 2 report 12 "Life Cycle Inventories of Detergents" (Zah and Hischier, 2007)

## Inputs from nature
- Energy, gross calorific value, in biomass [natural resource, biotic]: 37.5 MJ
- Water, unspecified natural origin [natural resource, in water]: 0.006 m3; name water_UNO_input; lognormal variance with pedigree 0.21, pedigree (5,5,5,5,4)
  Estimated from a large chem. plant
  Uncertainty: estimated from a large chem. plant
- Water, cooling, unspecified natural origin [natural resource, in water]: 0.024 m3; name water_cooling_UNO_input; lognormal variance with pedigree 0.21, pedigree (5,5,5,5,4)
  Estimated from a large chem. plant
  Uncertainty: estimated from a large chem. plant

## Emissions to nature
- BOD5, Biological Oxygen Demand [water, surface water]: 0.0138 kg; lognormal variance with pedigree 0.1086, pedigree (2,5,5,1,1)
  Data from ECOSOL study (Literature)
  Uncertainty: data from ECOSOL study (Literature)
- Oils, unspecified [water, surface water]: 0.00442 kg; lognormal variance with pedigree 0.3686, pedigree (2,5,5,1,1)
  Data from ECOSOL study (Literature)
  Uncertainty: data from ECOSOL study (Literature)
- Sulfur dioxide [air, urban air close to ground]: 5.8e-5 kg; lognormal variance with pedigree 0.0686, pedigree (2,5,5,1,1)
  Data from ECOSOL study (Literature)
  Uncertainty: data from ECOSOL study (Literature)
- Particulates, < 2.5 um [air, urban air close to ground]: 0.000265 kg; lognormal variance with pedigree 0.3686, pedigree (2,5,5,1,1)
  Data from ECOSOL study (Literature)
  Uncertainty: data from ECOSOL study (Literature)
- Water [air, unspecified]: 0.01053 m3; name water_to_air_unspecified; = (water_cooling_UNO_input*fraction_CW_to_air)+(water_UNO_input*fraction_PW_to_air); lognormal variance with pedigree 0.0807, pedigree (2,2,5,1,1)
  Calculated value based on literature values and expert opinion. See comments in the parametres' comment field.
  property fraction, origin: unspecified 1; name fraction_origin_unspecified
  property fraction, origin: fresh water 0; name fraction_origin_fresh_water
  property fraction, origin: salt water 0; name fraction_origin_salt_water
- Nitrogen oxides [air, urban air close to ground]: 8.8e-5 kg; lognormal variance with pedigree 0.1086, pedigree (2,5,5,1,1)
  Data from ECOSOL study (Literature)
  Uncertainty: data from ECOSOL study (Literature)
- NMVOC, non-methane volatile organic compounds, unspecified origin [air, urban air close to ground]: 0.0002 kg; lognormal variance with pedigree 0.1086, pedigree (2,5,5,1,1)
  Data from ECOSOL study (Literature)
  Uncertainty: data from ECOSOL study (Literature)
- Water [water, unspecified]: 0.01947 m3; name water_to_water_unspecified; = water_cooling_UNO_input*(1-fraction_CW_to_air)+water_UNO_input*(1-fraction_PW_to_air); lognormal variance with pedigree 0.0807, pedigree (2,2,5,1,1)
  (same comment as for Water)
  property wet mass 1000 kg; name WM
  property carbon content, non-fossil 0; name C_content_non_fossil
  property fraction, origin: unspecified 1; name fraction_origin_unspecified_Ww
  property water in wet mass 1000 kg; name WWM
  property fraction, origin: salt water 0; name fraction_origin_salt_water_Ww
  property dry mass 0 kg; name DM
  property carbon content, fossil 0; name C_content_fossil
  property fraction, origin: fresh water 0; name fraction_origin_fresh_water_Ww
- Acidity, unspecified [water, surface water]: 0.00479 kg
- Dissolved solids [water, surface water]: 0.0416 kg; lognormal variance with pedigree 0.1086, pedigree (2,5,5,1,1)
  Data from ECOSOL study (Literature)
  Uncertainty: data from ECOSOL study (Literature)
- Nitrogen [water, surface water]: 0.00442 kg; lognormal variance with pedigree 0.1086, pedigree (2,5,5,1,1)
  Data from ECOSOL study (Literature)
  Uncertainty: data from ECOSOL study (Literature)
- Particulates, > 2.5 um, and < 10um [air, urban air close to ground]: 0.000456 kg; lognormal variance with pedigree 0.1786, pedigree (2,5,5,1,1)
  Data from ECOSOL study (Literature)
  Uncertainty: data from ECOSOL study (Literature)
- DOC, Dissolved Organic Carbon [water, surface water]: 0.00511111 kg; lognormal variance with pedigree 0.1086, pedigree (2,5,5,1,1)
  Calculated as equal to TOC.
  Uncertainty: data from ECOSOL study (Literature)
- COD, Chemical Oxygen Demand [water, surface water]: 0.0138 kg; lognormal variance with pedigree 0.1086, pedigree (2,5,5,1,1)
  Data from ECOSOL study (Literature)
  Uncertainty: data from ECOSOL study (Literature)
- Particulates, > 10 um [air, urban air close to ground]: 0.000339 kg; lognormal variance with pedigree 0.1086, pedigree (2,5,5,1,1)
  Data from ECOSOL study (Literature)
  Uncertainty: data from ECOSOL study (Literature)
- Carbon dioxide, non-fossil [air, urban air close to ground]: 0.268 kg; lognormal variance with pedigree 0.0686, pedigree (2,5,5,1,1)
  Data from ECOSOL study (Literature)
  Uncertainty: data from ECOSOL study (Literature)
- TOC, Total Organic Carbon [water, surface water]: 0.00511111 kg; lognormal variance with pedigree 0.1086, pedigree (2,5,5,1,1)
  Calculated by default as TOC (gC) = COD/2.7 (COD measured in g O2). Should more correctly be calculated from the carbon content of the specified emissions to water.
  Uncertainty: data from ECOSOL study (Literature)

## Extrapolations
data out of ECOSOL study of European Surfactant Industry. Common translation rules used, reported in Chemical report (Althaus et al. 2003).

## Review by Christian Capello 2005-07-19
energetic value of crude coconut oil has been added
