# ethoxylated alcohol (AE11) production, palm oil

Dataset: EcoSpold 2, unit process
Geography: RER
Time period: 1992-01-01 to 2019-12-31
Technology level: current
Classification: ISIC rev.4 ecoinvent: 2023:Manufacture of soap and detergents, cleaning and polishing preparations, pe
Classification: EcoSpold01Categories: washing agents/tensides
Tags: ConvertedDataset
Scenario: Business-as-Usual
System model: Allocation at the point of substitution
Share of production covered: 40 %
Generated by: Rainer Zah
Published in: Zah R. 2007
Database: ecoinvent
isCopyrightProtected: true
accessRestrictedTo: 1

## General comment
This dataset represents the production of 1 kg of ethoxylated alcohol with eleven polyether units (AE11) from C12-C15 fatty alcohol derived from plam oil.
Material and energy input are from literature sources, Transport and infrastructure are estimation based on a large chemical plant. Production of waste and emissions to water and air are calculated based on literature sources.
Flow diagram of the production of alcohol ethoxylates:
[This dataset was already contained in the ecoinvent database version 2. It was not individually updated during the transfer to ecoinvent version 3. Life Cycle Impact Assessment results may still have changed, as they are affected by changes in the supply chain, i.e. in other datasets. This dataset was generated following the ecoinvent quality guidelines for version 2. It may have been subject to central changes described in the ecoinvent version 3 change report (http://www.ecoinvent.org/database/ecoinvent-version-3/reports-of-changes/), and the results of the central updates were reviewed extensively. The changes added e.g. consistent water flows and other information throughout the database. The documentation of this dataset can be found in the ecoinvent reports of version 2, which are still available via the ecoinvent website. The change report linked above covers all central changes that were made during the conversion process.]

## Included activities start
From reception of fatty alcohol from palm oil, ethylene oxide, and nitrogen at the factory gate.

## Included activities end
This activity ends with 1 kg of ethoxylated alcohol (AE11). The dataset includes material and energy input, transport, infrastructure, production of waste and emissions to water and air. The datset doesn't include water consumption.

## Geography
Data based on the European ethoxylated alcohols production

## Technology
Alcohol ethoxylates (AE) are produced by the reaction of fatty alcohols with ethylene oxide leading to a condensation of polyethylene glycolether groups on the alcohol chains. The fatty alcohols can be derived from petrochemical, palm kernel, or coconut oil. The reaction takes place at temperatures ranging from 150°C to 200°C. The grade of ethoxylation, e.g. the specific number of polyether units condensed to the alcohol chains, is controlled by the concentration of ethylene oxide in the ethoxylation process.
This is an average technology for the production of AE representing typical European production mix in the mid 90s.
Reference:
Schul W. (1995) A Life-Cycle Inventory for the Production of Detergent Range Alcohol Ethoxylates in Europe. In: Tenside, Surfactants, Detergents, 32(2), pp. 171-192.
Stalmans M., Berenbold H., Berna J. L., Cavalli L., Dillarstone A., Franke M., Hirsinger F., Janzen D., Kosswig K., Postlethwaite D., Rappert T., Renta C., Scharer D., Schick K.-P., Schul W., Thomas H. and Sloten R. V. (1995) European Life-Cycle Inventory for Detergent Surfactants Production. In: Tenside, Surfactants, Detergents, 32(2), pp. 84-109

## Time period
data of published literature

## Reference product
- ethoxylated alcohol (AE11): 1 kg; CPC 353: Soap, cleaning preparations, perfumes and toilet preparations; By-product classification allocatable product
  Alcohol Ethoxylates (AE) are molecules with an hydrophobic and an hydrophilic part. The hydrophobic part is formed by fatty alcohols with chain lengths from C9-C18. The hydrophilic part consists of a polyether chain formed by condensation of ethylene oxide to the fatty alcohol. Several hundred different AE are commercially available, differing by alcohol structure and number of polyether units. The generic chemical structure of AE is:
  CH3-(CH2)n-CHR-CH2-(O-CH2-CH2)m-OH
  (n = 5-15, m = 2-100, R = H or n-alkyl)
  AE11 have an average value of eleven polyether units (m = 11).
  Alcohol Ethoxylates (AE) are the largest group within the class of nonionic tensides. In comparison with other tensides like anionic surfactants, alcohol ethoxylates exhibit a better fat soil removal capacity, especially at low temperatures.
  EcoSpold01Location=RER
  production volume 1.5138e6 kg; = 17.4%*50%*6%*290000000
    "Estimated value. The European production volume is estimated based on information from Cefic (European Chemical Industry Council) and the American Chemistry Council.
    According to Cefic (2016) the global sales of chemicals in the year 2015 was 3 534 billion euros. The reported share of sales per region are: EU28 14.7%; Other Europe (Switzerland, Norway, Turkey, Russia and Ukraine) 2.7%; NAFTA (US, Canada and Mexico) 16.5%; Latin America 3.8%; China 39.9%; Japan 3.9%; Republic of Korea 3.2%; India 2.2%; Rest of Asia 11.9%; Rest of the World 1.3%, Switzerland 1%. Cefic also reports the US total sales, which amount to 518.7 billion euros out of the global 3 534 billion euros (14.7%). The same share is reported by the American Chemistry Council (2016), according to which the USA sales account for 15% of global sales for the year 2016.
    Estimated value. According to HERA (2009) the global production volume is estimated to be 290000000 kg for the year of 2003. Moreover, it is assumed that 50% of ethoxylated alcohols originate from vegetable oil sources whilst the remaining 50% comes from petrochemical origins. It is furthermore assumed that the amount of it that is produced from palm oil, actually represents the whole amount produced from vegetable sources. In addition, according to HERA 2009, the distribution of AE11 on household products is 6%.
    Reference:
    HERA 2009, Human & Environmental Risk Assessment on ingredients of European household cleaning products, Alcohol Ethoxylates, September 2009.
    Cefic 2016. Facts and figures 2016 of the European chemical industry. Accessible at: http://www.cefic.org/Facts-and-Figures/Chemicals-Industry-Profile/
    American Chemistry Council 2016. Outlook: U.S. Chemical Industry Continues to Outpace Industrial Output; Accounts for More Than One-Half of Construction Spending by Manufacturing Sector. Accessible at: https://www.americanchemistry.com/Media/PressReleasesTranscripts/ACC-news-releases/US-Chemical-Industry-Continues-to-Outpace-Industrial-Output.html"
  property carbon content, fossil 0.378041
    The generic chemical structure of AE is: CH3-(CH2)n-CHR-CH2-(O-CH2-CH2)m-OH (n = 5-15, m = 2-100, R = H or n-alkyl). AE are produced by the reaction of fatty alcohols with ethylene oxide leading to a condensation of polyethylene glycolether groups on the alcohol chains (ecoinvent v2.2 report 12-part 4). Fatty alcohols were considered to have an average length of C14. Ethoxylated alcohol (AE11) has an average value of eleven polyether units (AE11) (ecoinvent v2.2 report 12-part 4). The formula that has then been used to calculate the C content of the products is CH3-(CH2)11-CH2-CH2-(O-CH2-CH2)11-OH. In this molecule, C in (O-CH2-CH2)11 has a fossile origin, the rest has a biogenic origin
  property carbon content, non-fossil 0.240572
    (same comment as for ethoxylated alcohol (AE11))
  property price 1.55061 EUR2005
    Calculated based on inputs: The price of the product has been calculated as a sum of the values of the material and energy inputs for this product. This value is therefore a rough estimation. It may underestimate the real price since there are additional expenses when producing any product. These expences can include for example labour costs, treatment of waste materials and profit for the producer. Please consider carefully whether this level of data quality is acceptable for your application.
  property carbon content 0.618613
    carbon content on a dry matter basis (reserved; not for manual entry)
  properties: dry mass 1 kg, water content 0, water in wet mass 0 kg, wet mass 1 kg, carbon allocation 0.618613 kg

## Inputs from technosphere
- ethylene oxide: 0.652 kg; source Schul W. 1995; lognormal variance with pedigree 0.051225, pedigree (2,3,5,2,1)
  EcoSpold01Location=RER
  Literature Value.
  properties: wet mass 1 kg, dry mass 1 kg, carbon content, fossil 0.545455
- heat, district or industrial, other than natural gas: 0.46 MJ; source Schul W. 1995; lognormal variance with pedigree 0.051225, pedigree (2,3,5,2,1)
  Literature Value.
  EcoSpold01Location=RER
- heat, district or industrial, natural gas: 0.24 MJ; source Schul W. 1995; lognormal variance with pedigree 0.051225, pedigree (2,3,5,2,1)
  Literature Value.
  EcoSpold01Location=RER
- fatty alcohol: 0.342 kg; source Schul W. 1995; lognormal variance with pedigree 0.051225, pedigree (2,3,5,2,1)
  EcoSpold01Location=RER
  Literature Value.
  properties: dry mass 1 kg, wet mass 1 kg, carbon content, fossil 0.0408973, carbon content, non-fossil 0.743434
  note on carbon content, fossil: Fatty alcohols have chain lengths between C6 and C22, their chemical formula is CH3(CH2)nCH2OH (ecoinvent v2.2 report 12, pg 16). As an average, C14 was used. The dataset represents a mix of 27% produced from fatty acid splitting and 73% produced from methyl ester (ecoinvent v2.2 report 12, pg 21). In the methyl esterification, methanol (CH3OH) has a fossil origin
- nitrogen, liquid: 0.019 kg; source Schul W. 1995; lognormal variance with pedigree 0.051225, pedigree (2,3,5,2,1)
  EcoSpold01Location=RER
  Literature Value.
  properties: wet mass 1 kg, dry mass 1 kg
- chemical factory, organics: 4e-10 unit; source Frischknecht R. 2007; lognormal variance with pedigree 0.351225, pedigree (2,3,5,2,1)
  EcoSpold01Location=RER
  Estimation: estimated from large chemical plant
- electricity, medium voltage: 0.0624 kWh; source Schul W. 1995; lognormal variance with pedigree 0.051225, pedigree (2,3,5,2,1)
  EcoSpold01Location=UCTE
  Literature Value.

## Emissions to nature
- DOC, Dissolved Organic Carbon [water, surface water]: 0.000655556 kg; lognormal variance with pedigree 0.091225, pedigree (2,3,5,2,1)
  Calculated Value: Calculated by default as DOC (gC) = COD/2.7 (COD measured in g O2).
- NMVOC, non-methane volatile organic compounds, unspecified origin [air, urban air close to ground]: 0.00303 kg; source Schul W. 1995; lognormal variance with pedigree 0.091225, pedigree (2,3,5,2,1)
  Calculated Value: calculated by comparing the aggregated emissions of the alcohol ethoxylates with the aggregated emissions of the fatty alcohols and of ethylene oxide.
- BOD5, Biological Oxygen Demand [water, surface water]: 0.000956 kg; source Schul W. 1995; lognormal variance with pedigree 0.091225, pedigree (2,3,5,2,1)
  (same comment as for NMVOC, non-methane volatile organic compounds, unspecified origin)
- TOC, Total Organic Carbon [water, surface water]: 0.000655556 kg; lognormal variance with pedigree 0.091225, pedigree (2,3,5,2,1)
  Calculated Value: Calculated by default as TOC (gC) = COD/2.7 (COD measured in g O2).
- Particulates, > 10 um [air, urban air close to ground]: 0.00108 kg; source Schul W. 1995; lognormal variance with pedigree 0.091225, pedigree (2,3,5,2,1)
  (same comment as for NMVOC, non-methane volatile organic compounds, unspecified origin)
- Carbon dioxide, fossil [air, urban air close to ground]: 0.0108 kg; source Schul W. 1995; lognormal variance with pedigree 0.051225, pedigree (2,3,5,2,1)
  (same comment as for NMVOC, non-methane volatile organic compounds, unspecified origin)
- Carbon monoxide, fossil [air, urban air close to ground]: 3.25e-5 kg; source Schul W. 1995; lognormal variance with pedigree 0.701225, pedigree (2,3,5,2,1)
  (same comment as for NMVOC, non-methane volatile organic compounds, unspecified origin)
- Chromium, ion [water, surface water]: 7.24e-7 kg; source Schul W. 1995; lognormal variance with pedigree 0.701225, pedigree (2,3,5,2,1)
  (same comment as for NMVOC, non-methane volatile organic compounds, unspecified origin)
- Acidity, unspecified [water, surface water]: 4.4e-7 kg; source Schul W. 1995; lognormal variance with pedigree 0.091225, pedigree (2,3,5,2,1)
  (same comment as for NMVOC, non-methane volatile organic compounds, unspecified origin)
- Sulfur dioxide [air, urban air close to ground]: 0.000374 kg; source Schul W. 1995; lognormal variance with pedigree 0.051225, pedigree (2,3,5,2,1)
  (same comment as for NMVOC, non-methane volatile organic compounds, unspecified origin)
- Hydrocarbons, unspecified [water, surface water]: 5.68e-8 kg; source Schul W. 1995; lognormal variance with pedigree 0.351225, pedigree (2,3,5,2,1)
  (same comment as for NMVOC, non-methane volatile organic compounds, unspecified origin)
- COD, Chemical Oxygen Demand [water, surface water]: 0.00177 kg; source Schul W. 1995; lognormal variance with pedigree 0.091225, pedigree (2,3,5,2,1)
  (same comment as for NMVOC, non-methane volatile organic compounds, unspecified origin)
- Iron, ion [water, surface water]: 6.15e-9 kg; source Schul W. 1995; lognormal variance with pedigree 0.701225, pedigree (2,3,5,2,1)
  (same comment as for NMVOC, non-methane volatile organic compounds, unspecified origin)
- Ammonium, ion [water, surface water]: 1.52e-9 kg; source Schul W. 1995; lognormal variance with pedigree 0.091225, pedigree (2,3,5,2,1)
  (same comment as for NMVOC, non-methane volatile organic compounds, unspecified origin)
- Suspended solids, unspecified [water, surface water]: 0.000214 kg; source Schul W. 1995; lognormal variance with pedigree 0.091225, pedigree (2,3,5,2,1)
  (same comment as for NMVOC, non-methane volatile organic compounds, unspecified origin)
- Nitrogen [water, surface water]: 3.28e-5 kg; source Schul W. 1995; lognormal variance with pedigree 0.701225, pedigree (2,3,5,2,1)
  (same comment as for NMVOC, non-methane volatile organic compounds, unspecified origin)
- Aldehydes, unspecified [air, urban air close to ground]: 1.19e-5 kg; source Schul W. 1995; lognormal variance with pedigree 0.171225, pedigree (2,3,5,2,1)
  (same comment as for NMVOC, non-methane volatile organic compounds, unspecified origin)
- Methane, fossil [air, urban air close to ground]: 0.00782 kg; source Schul W. 1995; lognormal variance with pedigree 0.061225, pedigree (2,3,5,2,1)
  (same comment as for NMVOC, non-methane volatile organic compounds, unspecified origin)
- Zinc, ion [water, surface water]: 1.79e-7 kg; source Schul W. 1995; lognormal variance with pedigree 0.701225, pedigree (2,3,5,2,1)
  (same comment as for NMVOC, non-methane volatile organic compounds, unspecified origin)
- Carbon dioxide, non-fossil [air, urban air close to ground]: 0.223 kg; source Schul W. 1995; lognormal variance with pedigree 0.051225, pedigree (2,3,5,2,1)
  (same comment as for NMVOC, non-methane volatile organic compounds, unspecified origin)
- Oils, unspecified [water, surface water]: 1.23e-5 kg; source Schul W. 1995; lognormal variance with pedigree 0.351225, pedigree (2,3,5,2,1)
  (same comment as for NMVOC, non-methane volatile organic compounds, unspecified origin)
- Phenol [water, surface water]: 9.47e-10 kg; source Schul W. 1995; lognormal variance with pedigree 0.351225, pedigree (2,3,5,2,1)
  (same comment as for NMVOC, non-methane volatile organic compounds, unspecified origin)
- Nitrogen oxides [air, urban air close to ground]: 0.000115 kg; source Schul W. 1995; lognormal variance with pedigree 0.091225, pedigree (2,3,5,2,1)
  (same comment as for NMVOC, non-methane volatile organic compounds, unspecified origin)
- Dissolved solids [water, surface water]: 0.00167 kg; source Schul W. 1995; lognormal variance with pedigree 0.091225, pedigree (2,3,5,2,1)
  (same comment as for NMVOC, non-methane volatile organic compounds, unspecified origin)

## Sampling procedure
data out of ECOSOL study of European Surfactant Industry. Common translation rules used, reported in Chemical report (Althaus et al. 2003).

## Extrapolations
This dataset has been extrapolated from year 1995 to the year of the calculation (2019). The uncertainty has been adjusted accordingly.

## Review by Emilia Moreno Ruiz 2017-08-09
This dataset was additionally reviewed in a separate review process by Eric Johnson of Atlantic Consulting as well as Emilia Moreno Ruiz and Gregor Wernet of ecoinvent.

## Review by Heiko Kunst 2003-08-06
Passed.
