# heat production, light fuel oil, at boiler 10kW condensing, non-modulating

Dataset: EcoSpold 2, unit process
Geography: CH
Time period: 1991-01-01 to 2019-12-31
Technology level: current
Classification: ISIC rev.4 ecoinvent: 3530a: Steam and air conditioning supply based on liquid fuels
Classification: EcoSpold01Categories: oil/heating systems
Tags: ConvertedDataset
Scenario: Business-as-Usual
System model: Allocation at the point of substitution
Generated by: Niels Jungbluth
Published in: Jungbluth, N. 2007
Database: ecoinvent
isCopyrightProtected: true
accessRestrictedTo: 1

## General comment
Inventory for the operation of a light fuel oil boiler. Data related to input.
[This dataset was already contained in the ecoinvent database version 2. It was not individually updated during the transfer to ecoinvent version 3. Life Cycle Impact Assessment results may still have changed, as they are affected by changes in the supply chain, i.e. in other datasets. This dataset was generated following the ecoinvent quality guidelines for version 2. It may have been subject to central changes described in the ecoinvent version 3 change report (http://www.ecoinvent.org/database/ecoinvent-version-3/reports-of-changes/), and the results of the central updates were reviewed extensively. The changes added e.g. consistent water flows and other information throughout the database. The documentation of this dataset can be found in the ecoinvent reports of version 2, which are still available via the ecoinvent website. The change report linked above covers all central changes that were made during the conversion process.]

## Included activities end
Direct air emissions from combustion, waste, effluents and electricity use.

## Geography
Assumption for operation in Switzerland.

## Technology
Non-modulating, condensing boiler sold in 2000.

## Time period
New data for regulated emissions like NOx, particles, other figures are partly based on older literature data.

## Reference product
- heat, central or small-scale, other than natural gas: 1 MJ; By-product classification allocatable product; CPC 17300: Steam and hot water
  production volume 3.62e10 MJ; name heat_apv
    Assumption. The original value from the dataset was altered in order to model the correct shares of central or small-scale heat producing datasets on the market for heat, central or small-scale, other than natural gas according to the BFE Gesamtenergiestatistik for the year 2012. See talk pages for further discussion.
    BFE. 2013. Gesamtenergiestatistik_2013_Tabellen.xlsx. http://www.bfe.admin.ch/themen/00526/00541/00542/00631/index.html?lang=de&dossier_id=05071
    //Original comment from global dataset//:
    Total heat from oil calculated from IEA Oil statistics for 2007 (http://www.iea.org/stats/oildata.asp?COUNTRY_CODE=CH ; residential, commercial and agriculture), using default IEA MJ/kg conversion factors, dividing the total evenly over 4 boiler types, multiplied by conversion efficiency of specific boiler type (1.0), all on a net heat value basis.
  property price 0.0106 EUR2005
    Average European district heat price from Ecoheatcool and Euroheat 2005-2006, Ecoheat Work package 1: The European heat market. Final report. 10.6 EUR/GJ i s the price of district heat. http://www.solarthermalworld.org/files/Ecoheatcool%20WP1%20Web.pdf?download
  property true value 0.0106
    allocation property applied in "true value" allocation // value calculated from revenue
  properties: Corresponding fuel use 1 MJ

## By-products
- electricity, for reuse in municipal waste incineration only: 0 kWh; CPC 17100: Electrical energy; By-product classification allocatable product; pedigree (1,1,1,1,1)
  Net electricity generated from this waste and used in internal MSWI plant energy redistribution.
  Uncertainty: uncertainty is calculated from uncertainties in waste composition and uncertainties in energy efficiency and the uncertainty in internal energy demand
  production volume 8619.8 kWh
  property exergy 3.6 MJ; name E_el_prod_MSWI_exergy
    This exergy property is based on the exergy content of the product.
  property true value relation 3.6; name E_el_prod_MSWI_true_value_relation
    property to calculate "true value" from
  property price 0.1 EUR2005; name E_el_prod_MSWI_price_EUR2005
    Estimated to be the same price as in case of electricity, medium voltage.
  property true value 3.05936e-8
    allocation property applied in "true value" allocation // value calculated from true value relation
- heat, for reuse in municipal waste incineration only: 0 MJ; CPC 17300: Steam and hot water; By-product classification allocatable product; pedigree (1,1,1,1,1)
  Net useful heat generated from this waste and used in internal MSWI plant energy redistribution.
  Uncertainty: uncertainty is calculated from uncertainties in waste composition and uncertainties in energy efficiency and the uncertainty in internal energy demand
  production volume 60980 MJ
  property exergy 0.1842 MJ; name E_th_prod_MSWI_exergy
    This exergy property is based on the exergy content of the product.
  property true value relation 0.1842; name E_th_prod_MSWI_true_value_relation
    property to calculate "true value" from
  property price 0.0106 EUR2005; name E_th_prod_MSWI_price_EUR2005
    (same comment as for heat, central or small-scale, other than natural gas)
  property true value 1.10741e-8
    (same comment as for electricity, for reuse in municipal waste incineration only)
- zinc concentrate: 0 kg; CPC 14290: Other non-ferrous metal ores and concentrates (other than uranium or thorium ores and concentrates); By-product classification allocatable product
  Calculated value from the knowledge of the properties of both products.
  production volume 2.16296 kg
  property price 0.38 EUR2005; name ByP_price_EUR2005
    Temporary price data. Calculated as 90% of purchasers price based on: Zinc content in concentrate 53%. Concentrate price per kg Zn 86.5% of refined Zn price (13.5% treatment charges according to CHR Metals Limited 2005: Dynamic cost curves. http://www.minecost.com/dynamic.pdf). 2004 zinc price from USGS (2007) Mineral commodity summaries 2007. <http://minerals.usgs.gov/minerals/pubs/mcs/2007/mcs2007.pdf> [Accessed 25 May 2010]
  property zinc content 0.53; name zinc_C_zinc_concentrate
    Zinc content on a dry matter basis. Value taken from teh "zinc mine operation" /GLO dataset.
  property dry mass 1 kg; name DM_zinc_concentrate
  property carbon content 0
    carbon content on a dry matter basis (reserved; not for manual entry)
  property true value 2.27052e-11
    allocation property applied in "true value" allocation // value calculated from revenue
  properties: wet mass 1 kg, water content 0, carbon content, non-fossil 0, carbon content, fossil 0, water in wet mass 0 kg, carbon allocation 0 kg

## Inputs from technosphere
- oil boiler, 10kW: 6.61377e-7 unit; lognormal variance with pedigree 0.3526, pedigree (3,3,5,1,1)
  Estimation 2100h use per year
  Estimation 2100h use per year
- hazardous waste, for incineration: -4.14998e-6 kg; name haz_waste; lognormal variance with pedigree 0.0526, pedigree (3,3,5,1,1)
  Literature
  Literature
  production volume 150230 kg; = heat_apv*haz_waste
    Calculated from the production volume of light fuel oil, burned in boiler 10kW condensing, non-modulating in proportion to the respective output amounts.
  property price 0 EUR2005; name haz_waste_price_EUR2005
  properties: water content 0.333333, wet mass 1 kg, dry mass 0.75 kg, carbon content, fossil 0.554667
  note on carbon content, fossil: Tab A.6, ecoinvent v2.2 report 13_I. C content has been calculated after data in the tables, and then referred to 1 kg DM
- electricity, low voltage: 0.00360279 kWh; lognormal variance with pedigree 0.0426, pedigree (3,3,5,1,1)
  Literature
  Literature
- light fuel oil: 0.0234199 kg; lognormal variance with pedigree 0.0426, pedigree (3,3,5,1,1)
  Literature
  Literature
  properties: carbon content, fossil 0.862, wet mass 1 kg, dry mass 1 kg
- oil storage, 3000l: 4.40918e-7 unit; lognormal variance with pedigree 0.3526, pedigree (3,3,5,1,1)
  Calculated
  This exchange has an activity link directly to the producing activity because the product is primarily consumed in the same geographical area where it is produced.
- condensate from light oil boiler: -9.83636e-6 m3; name condensate; lognormal variance with pedigree 0.3526, pedigree (3,3,5,1,1)
  Literature, basic uncertainity = 3
  Literature, basic uncertainity = 3
  production volume 356078 m3; = heat_apv*condensate
    (same comment as for hazardous waste, for incineration)
  property price 0 EUR2005; name condensate_price_EUR2005
  properties: wet mass 1000 kg, dry mass 0.337476 kg, carbon content, fossil 0.0740793, water content 2962.17
  note on carbon content, fossil: 0.025 kg TOC/m3 (Tab A.18, ecoinvent v2.2 report 13_I). TOC was considered as Total Carbon.
- chimney: 1.32279e-6 m; lognormal variance with pedigree 0.3526, pedigree (3,3,5,1,1)
  (same comment as for oil storage, 3000l)

## Emissions to nature
- Dioxins, measured as 2,3,7,8-tetrachlorodibenzo-p-dioxin [air, urban air close to ground]: 0 kg; pedigree (1,1,1,1,1)
  Literature
- Acetaldehyde [air, urban air close to ground]: 2.04999e-8 kg; lognormal variance with pedigree 0.8526, pedigree (3,3,5,1,1)
  Literature, basic uncertainity estimated = 6
- Propane [air, urban air close to ground]: 2.99999e-8 kg; lognormal variance with pedigree 0.8526, pedigree (3,3,5,1,1)
  Literature, basic uncertainity estimated = 6
- Hydrocarbons, aromatic [air, urban air close to ground]: 1.99999e-8 kg; lognormal variance with pedigree 0.8526, pedigree (3,3,5,1,1)
  Literature, basic uncertainity estimated = 6
- Butane [air, urban air close to ground]: 1.49999e-7 kg; lognormal variance with pedigree 0.8526, pedigree (3,3,5,1,1)
  Literature, basic uncertainity estimated = 6
- Copper [air, urban air close to ground]: 3.99998e-10 kg; lognormal variance with pedigree 0.6926, pedigree (3,3,5,1,1)
  Literature
- Toluene [air, urban air close to ground]: 9.99996e-9 kg; lognormal variance with pedigree 0.8526, pedigree (3,3,5,1,1)
  Literature, basic uncertainity estimated = 6
- Carbon dioxide, fossil [air, urban air close to ground]: 0.0739997 kg; lognormal variance with pedigree 0.0426, pedigree (3,3,5,1,1)
  Literature
- Mercury [air, urban air close to ground]: 4.99998e-10 kg; lognormal variance with pedigree 0.6926, pedigree (3,3,5,1,1)
  Literature
- Nitrogen oxides [air, urban air close to ground]: 2.74999e-5 kg; lognormal variance with pedigree 0.11, pedigree (1,1,5,1,1)
  Deviation calculated
- Zinc [air, urban air close to ground]: 4.99998e-10 kg; lognormal variance with pedigree 0.6926, pedigree (3,3,5,1,1)
  Literature
- Hydrocarbons, aliphatic, unsaturated [air, urban air close to ground]: 1.99999e-8 kg; lognormal variance with pedigree 0.8526, pedigree (3,3,5,1,1)
  Literature, basic uncertainity estimated = 6
- Benzene [air, urban air close to ground]: 1.99999e-8 kg; lognormal variance with pedigree 0.8526, pedigree (3,3,5,1,1)
  Literature, basic uncertainity estimated = 6
- Methane, fossil [air, urban air close to ground]: 1.99999e-7 kg; lognormal variance with pedigree 0.8526, pedigree (3,3,5,1,1)
  Literature, basic uncertainity estimated = 6
- Ethyne [air, urban air close to ground]: 9.99996e-9 kg; lognormal variance with pedigree 0.8526, pedigree (3,3,5,1,1)
  Literature, basic uncertainity estimated = 6
- Ethene [air, urban air close to ground]: 4.99998e-8 kg; lognormal variance with pedigree 0.8526, pedigree (3,3,5,1,1)
  Literature, basic uncertainity estimated = 6
- Acetone [air, urban air close to ground]: 4.99998e-8 kg; lognormal variance with pedigree 0.8526, pedigree (3,3,5,1,1)
  Literature, basic uncertainity estimated = 6
- Acrolein [air, urban air close to ground]: 1.15e-8 kg; lognormal variance with pedigree 0.8526, pedigree (3,3,5,1,1)
  Literature, basic uncertainity estimated = 6
- Ethane [air, urban air close to ground]: 1.99999e-8 kg; lognormal variance with pedigree 0.8526, pedigree (3,3,5,1,1)
  Literature, basic uncertainity estimated = 6
- Benzaldehyde [air, urban air close to ground]: 5.99998e-9 kg; lognormal variance with pedigree 0.8526, pedigree (3,3,5,1,1)
  Literature, basic uncertainity estimated = 6
- PAH, polycyclic aromatic hydrocarbons [air, urban air close to ground]: 4.59998e-10 kg; lognormal variance with pedigree 0.3526, pedigree (3,3,5,1,1)
  Literature
- Hydrocarbons, aliphatic, alkanes, unspecified [air, urban air close to ground]: 2.49999e-7 kg; lognormal variance with pedigree 0.8526, pedigree (3,3,5,1,1)
  Literature, basic uncertainity estimated = 6
- Carbon monoxide, fossil [air, urban air close to ground]: 8.99996e-6 kg; lognormal variance with pedigree 0.93, pedigree (1,1,5,1,1)
  Deviation calculated
- Sulfur dioxide [air, urban air close to ground]: 4.56688e-5 kg; lognormal variance with pedigree 0.0426, pedigree (3,3,5,1,1)
  Calculated
- Dinitrogen monoxide [air, urban air close to ground]: 6.99997e-7 kg; lognormal variance with pedigree 0.5226, pedigree (3,3,5,1,1)
  Literature, basic uncertainty estimated = 4
- Propene [air, urban air close to ground]: 1.99999e-8 kg; lognormal variance with pedigree 0.8526, pedigree (3,3,5,1,1)
  Literature, basic uncertainity estimated = 6
- Hydrogen fluoride [air, urban air close to ground]: 4.49998e-9 kg; lognormal variance with pedigree 0.0926, pedigree (3,3,5,1,1)
  Literature
- Pentane [air, urban air close to ground]: 9.99996e-8 kg; lognormal variance with pedigree 0.8526, pedigree (3,3,5,1,1)
  Literature, basic uncertainity estimated = 6
- Particulates, < 2.5 um [air, urban air close to ground]: 4.99998e-7 kg; lognormal variance with pedigree 0.3526, pedigree (3,3,5,1,1)
  Literature, basic uncertainty estimated = 3
- Formaldehyde [air, urban air close to ground]: 5.99998e-9 kg; lognormal variance with pedigree 0.8526, pedigree (3,3,5,1,1)
  Literature, basic uncertainity estimated = 6
- Propanal [air, urban air close to ground]: 5.99998e-9 kg; lognormal variance with pedigree 0.8526, pedigree (3,3,5,1,1)
  Literature, basic uncertainity estimated = 6

## Sampling procedure
Data published in literature based on measurements.

## Extrapolations
Some information from other European countries has been used to determine the emission factors.

## Review by Michael Spielmann (obsolete) 2006-02-16
passed
none
