# indium tin oxide powder production, nanoscale, for sputtering target

Dataset: EcoSpold 2, unit process
Geography: RER
Time period: 2000-01-01 to 2019-12-31
Technology level: current
Classification: EcoSpold01Categories: electronics/module
Classification: ISIC rev.4 ecoinvent: 2029:Manufacture of other chemical products n.e.c.
Synonyms: Indium Tin Oxide; Indium Zinn Oxid
Tags: ConvertedDataset
Scenario: Business-as-Usual
System model: Allocation at the point of substitution
Generated by: Mischa Classen
Published in: Hischier R. 2007
Database: ecoinvent
isCopyrightProtected: true
accessRestrictedTo: 1

## General comment
This dataset describes the production of nanoscaled ITO powder by coprecipitation for the use in sputtering targets with a density close to the theoretical one. No direct process emissions are considered due to a lack of respective information. The input raw materials are prompt scrap from the sputtering process, amounting to 77% of the raw material, and raw materials won from primary metals, making 23%. 8.5% of the total ITO is lost during scrap processing.
[This dataset was already contained in the ecoinvent database version 2. It was not individually updated during the transfer to ecoinvent version 3. Life Cycle Impact Assessment results may still have changed, as they are affected by changes in the supply chain, i.e. in other datasets. This dataset was generated following the ecoinvent quality guidelines for version 2. It may have been subject to central changes described in the ecoinvent version 3 change report (http://www.ecoinvent.org/database/ecoinvent-version-3/reports-of-changes/), and the results of the central updates were reviewed extensively. The changes added e.g. consistent water flows and other information throughout the database. The documentation of this dataset can be found in the ecoinvent reports of version 2, which are still available via the ecoinvent website. The change report linked above covers all central changes that were made during the conversion process.]

## Included activities end
Electricity and heat demand for precipitation; recovery of spent ITO targets,

## Geography
Water provision and disposal approximated with Swiss conditions

## Technology
Relates to coprecipitation of ITO from a raw aqueous solution and subsequent calcination. The raw solution can be prepared from both pure metals as well as from spent targets.

## Reference product
- indium tin oxide powder, nanoscale, for sputtering target: 1 kg; By-product classification allocatable product; CPC 35499: Other chemical products n.e.c.
  EcoSpold01Location=RER
  production volume 1.32237 kg
    This is a placeholder value that does not reflect real-world production volumes. This dataset does not currently require a real-world production volume to work in the database framework, and no actual data were collected yet. This has no negative effect on the results of the ecoinvent database. The placeholder value of this activity was scaled according to the nominal GDP of 2005 (source: United Nations, http://data.un.org/Glossary.aspx?q=GDP+%28current+US%24%29, accessed 20130726) to reflect an appropriate share of the global production volume, which is also a placeholder value.
  property price 85.1002 EUR2005
    Calculated based on inputs: The price of the product has been calculated as a sum of the values of the material and energy inputs for this product. This value is therefore a rough estimation. It may underestimate the real price since there are additional expenses when producing any product. These expences can include for example labour costs, treatment of waste materials and profit for the producer. Please consider carefully whether this level of data quality is acceptable for your application.
  property carbon content, fossil 0
    Indium-Tin-Oxide (In2O3/SnO2), details in ecoinvent v2.2 report 16_partIII-Annex I)
  property carbon content, non-fossil 0
    Indium-Tin-Oxide (In2O3/SnO2), details in ecoinvent v2.2 report 16_partIII-Annex I)
  property carbon content 0
    carbon content on a dry matter basis (reserved; not for manual entry)
  property true value 85.1002
    allocation property applied in "true value" allocation // value calculated from revenue
  properties: water in wet mass 0 kg, wet mass 1 kg, water content 0, dry mass 1 kg, carbon allocation 0 kg

## By-products
- electricity, for reuse in municipal waste incineration only: 0 kWh; CPC 17100: Electrical energy; By-product classification allocatable product; pedigree (1,1,1,1,1)
  Net electricity generated from this waste and used in internal MSWI plant energy redistribution.
  Uncertainty: uncertainty is calculated from uncertainties in waste composition and uncertainties in energy efficiency and the uncertainty in internal energy demand
  production volume 0.00107162 kWh
  property exergy 3.6 MJ; name E_el_prod_MSWI_exergy
    This exergy property is based on the exergy content of the product.
  property true value relation 3.6; name E_el_prod_MSWI_true_value_relation
    property to calculate "true value" from
  property price 0.1 EUR2005; name E_el_prod_MSWI_price_EUR2005
    Estimated to be the same price as in case of electricity, medium voltage.
  property true value 0.000137685
    allocation property applied in "true value" allocation // value calculated from true value relation
- heat, for reuse in municipal waste incineration only: 0 MJ; CPC 17300: Steam and hot water; By-product classification allocatable product; pedigree (1,1,1,1,1)
  Net useful heat generated from this waste and used in internal MSWI plant energy redistribution.
  Uncertainty: uncertainty is calculated from uncertainties in waste composition and uncertainties in energy efficiency and the uncertainty in internal energy demand
  production volume 0.00758158 MJ
  property true value relation 0.1842; name E_th_prod_MSWI_true_value_relation
    property to calculate "true value" from
  property exergy 0.1842 MJ; name E_th_prod_MSWI_exergy
    This exergy property is based on the exergy content of the product.
  property price 0.0106 EUR2005; name E_th_prod_MSWI_price_EUR2005
    Average European district heat price from Ecoheatcool and Euroheat 2005-2006, Ecoheat Work package 1: The European heat market. Final report. 10.6 EUR/GJ i s the price of district heat. http://www.solarthermalworld.org/files/Ecoheatcool%20WP1%20Web.pdf?download
  property true value 4.98417e-5
    (same comment as for electricity, for reuse in municipal waste incineration only)
- zinc concentrate: 0 kg; CPC 14290: Other non-ferrous metal ores and concentrates (other than uranium or thorium ores and concentrates); By-product classification allocatable product
  Calculated value from the knowledge of the properties of both products.
  production volume 2.68862e-7 kg
  property price 0.38 EUR2005; name ByP_price_EUR2005
    Temporary price data. Calculated as 90% of purchasers price based on: Zinc content in concentrate 53%. Concentrate price per kg Zn 86.5% of refined Zn price (13.5% treatment charges according to CHR Metals Limited 2005: Dynamic cost curves. http://www.minecost.com/dynamic.pdf). 2004 zinc price from USGS (2007) Mineral commodity summaries 2007. <http://minerals.usgs.gov/minerals/pubs/mcs/2007/mcs2007.pdf> [Accessed 25 May 2010]
  property zinc content 0.53; name zinc_C_zinc_concentrate
    Zinc content on a dry matter basis. Value taken from teh "zinc mine operation" /GLO dataset.
  property dry mass 1 kg; name DM_zinc_concentrate
  property carbon content 0
    carbon content on a dry matter basis (reserved; not for manual entry)
  property true value 1.02168e-7
    allocation property applied in "true value" allocation // value calculated from revenue
  properties: wet mass 1 kg, water content 0, carbon content, non-fossil 0, carbon content, fossil 0, water in wet mass 0 kg, carbon allocation 0 kg

## Inputs from technosphere
- hydrochloric acid, without water, in 30% solution state: 0.361209 kg; lognormal variance with pedigree 0.2627, pedigree (3,3,5,3,5)
  EcoSpold01Location=RER
  properties: wet mass 1 kg, dry mass 1 kg
- water, deionised: 0 kg; name water_deionised_input; pedigree (1,1,1,1,1)
  EcoSpold01Location=CH
  Value. The amount of deionised water on the input to the process as provided by the data provider for eiv2 was 39.732kg. This amount is adjusted, so the water balance is achieved.
  properties: wet mass 1 kg
- sodium hydroxide, without water, in 50% solution state: 0.606399 kg; lognormal variance with pedigree 0.2687, pedigree (4,3,5,3,5)
  EcoSpold01Location=RER
  properties: wet mass 1 kg, dry mass 1 kg
- electricity, medium voltage: 7.65408 kWh; lognormal variance with pedigree 0.2687, pedigree (4,3,5,3,5)
  EcoSpold01Location=UCTE
- ammonia, liquid: 0.330989 kg; lognormal variance with pedigree 0.3307, pedigree (5,3,5,3,5)
  EcoSpold01Location=RER
  properties: dry mass 1 kg, wet mass 1 kg
- indium: 0.0975768 kg; lognormal variance with pedigree 0.2627, pedigree (3,3,5,3,5)
  EcoSpold01Location=RER
  properties: dry mass 1 kg, wet mass 1 kg
- heat, district or industrial, natural gas: 1.328 MJ; lognormal variance with pedigree 0.1221, pedigree (3,1,5,3,4)
  EcoSpold01Location=RER
- chemical factory: 0.019551 kg; lognormal variance with pedigree 0.6307, pedigree (5,3,5,3,5)
  EcoSpold01Location=RER
  activityLink introduced to establish a direct link to the corresponding regional supply of this product
- chemical factory, organics: 7.99998e-10 unit; lognormal variance with pedigree 0.6307, pedigree (5,3,5,3,5)
  activityLink introduced to establish a direct link to the corresponding regional supply of this product
  EcoSpold01Location=RER
- tin: 0.00996418 kg; lognormal variance with pedigree 0.2627, pedigree (3,3,5,3,5)
  EcoSpold01Location=RER
  properties: dry mass 1 kg, wet mass 1 kg
- methanol: 0.02 kg; lognormal variance with pedigree 0.2687, pedigree (4,3,5,3,5)
  EcoSpold01Location=GLO
  properties: dry mass 1 kg, carbon content, fossil 0.375, wet mass 1 kg
- wastewater from ceramic production: -0.0441309 m3; name wastewater_output; lognormal variance with pedigree 0.3307, pedigree (5,3,5,3,5)
  EcoSpold01Location=CH
  production volume 0.044131 m3
    Calculated from the production volume of indium tim oxide powder, nanoscale, for sputtering target in proportion to the respective output amounts.
  property price 0 EUR2005; name wastewater_output_price_EUR2005
  properties: water content 2962.17, wet mass 1000 kg, dry mass 0.337476 kg
- water, deionised: 43.9726, 0.158291 kg (2 entries); lognormal variance with pedigree 0.2627, pedigree (3,3,5,3,5)
  (same comment as for water, deionised)

## Emissions to nature
- Ethanol [air, urban air close to ground]: 0.02 kg; lognormal variance with pedigree 0.3087, pedigree (4,3,5,3,5)

## Sampling procedure
Literature

## Extrapolations
see Geography and Technology

## Review by Roberto Dones 2007-08-22
Passed
