# ventilation system production, decentralized, 6 x 120 m3/h, steel ducts, with earth tube heat exchanger

Dataset: EcoSpold 2, unit process
Geography: RoW
Time period: 2003-01-01 to 2019-12-31
Technology level: current
Classification: ISIC rev.4 ecoinvent: 4322:Plumbing, heat and air-conditioning installation
Classification: EcoSpold01Categories: ventilation/ventilation systems
Tags: ConvertedDataset
Scenario: Business-as-Usual
System model: Allocation at the point of substitution
Generated by: Alex Primas
Published in: Hässig, W. 2007
Database: ecoinvent
isCopyrightProtected: true
accessRestrictedTo: 1

## General comment
Ventilation system for a multi family house. The house considered in the investigation includes 6 flats with 130 m2 floor area each and a ventilation rate of 120 m3/h. The influence of a smaller concrete demand due to embedment of ventilation tubes in the concrete of the floor (-8.05 kg concrete per m2 floor area) is not included.
[This dataset was already contained in the ecoinvent database version 2. It was not individually updated during the transfer to ecoinvent version 3. Life Cycle Impact Assessment results may still have changed, as they are affected by changes in the supply chain, i.e. in other datasets. This dataset was generated following the ecoinvent quality guidelines for version 2. It may have been subject to central changes described in the ecoinvent version 3 change report (http://www.ecoinvent.org/database/ecoinvent-version-3/reports-of-changes/), and the results of the central updates were reviewed extensively. The changes added e.g. consistent water flows and other information throughout the database. The documentation of this dataset can be found in the ecoinvent reports of version 2, which are still available via the ecoinvent website. The change report linked above covers all central changes that were made during the conversion process.]

## Included activities end
Materials used for the ventilation system. Transport of the components to the construction site. Disposal of the components included. Influence of ventilation ducts on building construction not included. No materials for renwal of components included. Operation of system not included.

## Geography
Data representative for a building in Zurich, Switzerland

## Technology
Decentral ventilation system including 4 parallel polyethylene ground heat exchanger tubes (200 mm diameter). Air distribution to the 6 decentral ventilation units with a galvanised steel tube (400 mm diameter). Distribution of fresh- and exhaust-air within the flat with galvanised steel ducts (100x50 mm). Exhaust air from the 6 decentral ventilation units with a galvanised steel tube (400 mm diameter) to the exhaust on the roof.

## Time period
Amount of material investigated in 2003

## Reference product
- ventilation system, decentralized, 6 x 120 m3/h, steel ducts, with earth tube heat exchanger: 1 unit; name vent_sys_RP; CPC 44815: Fans and ventilating or recycling hoods of the domestic type; By-product classification allocatable product
  EcoSpold01Location=CH
  production volume 3.96633 unit; name vent_sys_RP_PV
    This is a placeholder value that does not reflect real-world production volumes. This dataset does not currently require a real-world production volume to work in the database framework, and no actual data were collected yet. This has no negative effect on the results of the ecoinvent database.
  property price 5440.5 EUR2005
    Calculated based on inputs: The price of the product has been calculated as a sum of the values of the material and energy inputs for this product. This value is therefore a rough estimation. It may underestimate the real price since there are additional expenses when producing any product. These expences can include for example labour costs, treatment of waste materials and profit for the producer. Please consider carefully whether this level of data quality is acceptable for your application.
  property true value 5440.5; name vent_sys_RP_true_value
    allocation property applied in "true value" allocation // value calculated from revenue

## By-products
- electricity, for reuse in municipal waste incineration only: 0 kWh; CPC 17100: Electrical energy; By-product classification allocatable product; pedigree (1,1,1,1,1)
  Net electricity generated from this waste and used in internal MSWI plant energy redistribution.
  Uncertainty: uncertainty is calculated from uncertainties in waste composition and uncertainties in energy efficiency and the uncertainty in internal energy demand
  production volume 346.775 kWh
  property true value relation 3.6; name E_el_prod_MSWI_true_value_relation
    property to calculate "true value" from
  property exergy 3.6 MJ; name E_el_prod_MSWI_exergy
    This exergy property is based on the exergy content of the product.
  property price 0.1 EUR2005; name E_el_prod_MSWI_price_EUR2005
    Estimated to be the same price as in case of electricity, medium voltage.
  property true value 9.3381
    allocation property applied in "true value" allocation // value calculated from true value relation
- heat, for reuse in municipal waste incineration only: 0 MJ; CPC 17300: Steam and hot water; By-product classification allocatable product; pedigree (1,1,1,1,1)
  Net useful heat generated from this waste and used in internal MSWI plant energy redistribution.
  Uncertainty: uncertainty is calculated from uncertainties in waste composition and uncertainties in energy efficiency and the uncertainty in internal energy demand
  production volume 2427.36 MJ
  property true value relation 0.1842; name E_th_prod_MSWI_true_value_relation
    property to calculate "true value" from
  property exergy 0.1842 MJ; name E_th_prod_MSWI_exergy
    This exergy property is based on the exergy content of the product.
  property price 0.0106 EUR2005; name E_th_prod_MSWI_price_EUR2005
    Average European district heat price from Ecoheatcool and Euroheat 2005-2006, Ecoheat Work package 1: The European heat market. Final report. 10.6 EUR/GJ i s the price of district heat. http://www.solarthermalworld.org/files/Ecoheatcool%20WP1%20Web.pdf?download
  property true value 3.35051
    (same comment as for electricity, for reuse in municipal waste incineration only)
- zinc concentrate: 0 kg; CPC 14290: Other non-ferrous metal ores and concentrates (other than uranium or thorium ores and concentrates); By-product classification allocatable product
  Calculated value from the knowledge of the properties of both products.
  production volume 0.000459198 kg
  property price 0.38 EUR2005; name ByP_price_EUR2005
    Temporary price data. Calculated as 90% of purchasers price based on: Zinc content in concentrate 53%. Concentrate price per kg Zn 86.5% of refined Zn price (13.5% treatment charges according to CHR Metals Limited 2005: Dynamic cost curves. http://www.minecost.com/dynamic.pdf). 2004 zinc price from USGS (2007) Mineral commodity summaries 2007. <http://minerals.usgs.gov/minerals/pubs/mcs/2007/mcs2007.pdf> [Accessed 25 May 2010]
  property zinc content 0.53; name zinc_C_zinc_concentrate
    Zinc content on a dry matter basis. Value taken from teh "zinc mine operation" /GLO dataset.
  property dry mass 1 kg; name DM_zinc_concentrate
  property carbon content 0
    carbon content on a dry matter basis (reserved; not for manual entry)
  property true value 4.39941e-5
    allocation property applied in "true value" allocation // value calculated from revenue
  properties: wet mass 1 kg, water content 0, carbon content, non-fossil 0, carbon content, fossil 0, water in wet mass 0 kg, carbon allocation 0 kg
- copper: 0 kg; By-product classification allocatable product; CPC 41413: Refined copper and copper alloys, unwrought; master alloys of copper
  production volume 3.88626 kg
  property price 5.52 EUR2005
    Literature value (http://www.economist.com/news/business/21576714-mining-industry-has-enriched-chile-its-future-precarious-copper-solution). Average price between 20015 and 2013.
  property carbon content 0
    carbon content on a dry matter basis (reserved; not for manual entry)
  property true value 5.40856
    allocation property applied in "true value" allocation // value calculated from revenue
  properties: water in wet mass 0 kg, water content 0, carbon content, non-fossil 0, dry mass 1 kg, carbon content, fossil 0, wet mass 1 kg, carbon allocation 0 kg
- lead: 0 kg; CPC 41441: Lead, unwrought; By-product classification allocatable product
  EcoSpold01Location=SE
  production volume 0.0441986 kg
  property price 0.744 EUR2005
    Temporary price data. Calculated as 90% of purchasers price based on: Source: ecoinvent v2 report 10-part IX, Tab 5.10 & 2.5
  property carbon content 0
    carbon content on a dry matter basis (reserved; not for manual entry)
  property true value 0.00829072
    allocation property applied in "true value" allocation // value calculated from revenue
  properties: wet mass 1 kg, water content 0, carbon content, non-fossil 0, carbon content, fossil 0, dry mass 1 kg, water in wet mass 0 kg, carbon allocation 0 kg
- nickel, 99.5%: 0 kg; CPC 41422: Unwrought nickel; By-product classification allocatable product
  EcoSpold01Location=SE
  production volume 0.0922634 kg
  property price 10.4 EUR2005
    Temporary price data. Calculated as 90% of purchasers price based on: 2004 nickel price from USGS (2007) Mineral commodity summaries 2007. <http://minerals.usgs.gov/minerals/pubs/mcs/2007/mcs2007.pdf> [Accessed 25 May 2010]
  property carbon content 0
    carbon content on a dry matter basis (reserved; not for manual entry)
  property true value 0.241921
    allocation property applied in "true value" allocation // value calculated from revenue
  properties: water in wet mass 0 kg, wet mass 1 kg, carbon content, non-fossil 0, dry mass 1 kg, water content 0, carbon content, fossil 0, carbon allocation 0 kg
- silver: 0 kg; CPC 41310: Silver (including silver plated with gold or platinum), unwrought or in semi-manufactured forms, or in powder […]; By-product classification allocatable product; CAS 7440-22-4
  EcoSpold01Location=SE
  production volume 0.0152364 kg
  property price 178 EUR2005
    (same comment as for lead)
  property carbon content 0
    carbon content on a dry matter basis (reserved; not for manual entry)
  property true value 0.683774
    allocation property applied in "true value" allocation // value calculated from revenue
  properties: wet mass 1 kg, carbon content, non-fossil 0, dry mass 1 kg, water content 0, carbon content, fossil 0, water in wet mass 0 kg, carbon allocation 0 kg
- palladium: 0 kg; CPC 4160: Other non-ferrous metals and articles thereof (including waste and scrap of some metals); cermets and articles […]; By-product classification allocatable product
  EcoSpold01Location=SE
  production volume 0.000843433 kg
  property price 5640 EUR2005
    Temporary price data. Calculated as 90% of purchasers price based on: 2004 price from USGS (2007) Mineral commodity summaries 2007. <http://minerals.usgs.gov/minerals/pubs/mcs/2007/mcs2007.pdf> [Accessed 25 May 2010]
  property carbon content 0
    carbon content on a dry matter basis (reserved; not for manual entry)
  property true value 1.19934
    allocation property applied in "true value" allocation // value calculated from revenue
  properties: wet mass 1 kg, carbon content, fossil 0, water in wet mass 0 kg, water content 0, carbon content, non-fossil 0, dry mass 1 kg, carbon allocation 0 kg
- gold: 0 kg; CPC 41320: Gold (including gold plated with platinum), unwrought or in semi-manufactured forms, or in powder form; By-product classification allocatable product; CAS 7440-57-5
  EcoSpold01Location=SE
  production volume 0.000462535 kg
  property price 10600 EUR2005
    Temporary price data. Calculated as 90% of purchasers price based on: Source: ecoinvent v2 report 10-part IX, Tab 2.5
  property carbon content 0
    carbon content on a dry matter basis (reserved; not for manual entry)
  property true value 1.23612
    allocation property applied in "true value" allocation // value calculated from revenue
  properties: wet mass 1 kg, carbon content, fossil 0, dry mass 1 kg, carbon content, non-fossil 0, water content 0, water in wet mass 0 kg, carbon allocation 0 kg
- iron scrap, sorted, pressed: 0 kg; By-product classification Recyclable; CPC 39310: Slag, dross, scalings and other waste from the manufacture of iron or steel; pedigree (1,1,1,1,1)
  Iron scrap recovered from this waste.
  production volume 0.0103541 kg
  property price 0.175 EUR2005
    Temporary price data. Calculated as 90% of purchasers price based on: 2005 import and export prices (total trades (USD) divided by total weight (kg) in biggest economies of the world: EU27, USA, Brasil, China, India, Japan and Russia) from UN Commodity Trade Statistics Database (http://data.un.org/Explorer.aspxDatabase [Accessed 2011.06.20]). Commodity: Waste or scrap, of cast iron
  property carbon content 0
    carbon content on a dry matter basis (reserved; not for manual entry)
  property true value 0.000456837
    allocation property applied in "true value" allocation // value calculated from revenue
  properties: water content 0, water in wet mass 0 kg, carbon content, fossil 0, dry mass 1 kg, carbon content, non-fossil 0, wet mass 1 kg, carbon allocation 0 kg
- iron scrap, unsorted: 0 kg; source European Aluminium Association 2008; CPC 39310: Slag, dross, scalings and other waste from the manufacture of iron or steel; By-product classification Recyclable; pedigree (1,1,1,1,1)
  production volume 0.00636948 kg
  property price 0.149 EUR2005; name ironScrapAmount_price_EUR2005
    Temporary price data. Calculated as 90% of purchasers price based on: estimated at 85% of sorted scrap
  property carbon content 0
    carbon content on a dry matter basis (reserved; not for manual entry)
  property true value 0.000239277
    allocation property applied in "true value" allocation // value calculated from revenue
  properties: water in wet mass 0 kg, water content 0, carbon content, fossil 0, carbon content, non-fossil 0, dry mass 1 kg, wet mass 1 kg, carbon allocation 0 kg
- aluminium oxide, non-metallurgical: 0 kg; source European Aluminium Association 2008; CPC 41432: Alumina (aluminium oxide), except artificial corundum; By-product classification allocatable product; CAS 1344-28-1; pedigree (1,1,1,1,1)
  production volume 0.400807 kg
  property carbon content, non-fossil 0; name C_content_non_fossil
  property price 0.28 EUR2005; name Al2O3Amount_price_EUR2005
    From UN trade database. http://data.un.org/ Import data from the largest economies of the world are used (Brazil, India, USA, China, Japan and EU-27).
  property dry mass 1 kg; name DM
  property water content 0; name water_content
  property wet mass 1 kg; name WM
  property water in wet mass 0 kg; name WWM
  property carbon content, fossil 0; name C_content_fossil
  property carbon content 0
    carbon content on a dry matter basis (reserved; not for manual entry)
  property true value 0.0282947
    allocation property applied in "true value" allocation // value calculated from revenue
  properties: carbon allocation 0 kg
- aluminium, cast alloy: 0 kg; source European Aluminium Association 2008; By-product classification allocatable product; CPC 41431: Unwrought aluminium; pedigree (1,1,1,1,1)
  EcoSpold01Location=RER
  production volume 3.74666 kg
  property price 1.3 EUR2005; name castAlloyAmount_price_EUR2005
    Temporary price data. Calculated as 90% of purchasers price based on: Source: London Metal Exchange, Aluminium alloy price for 2005
  property carbon content 0
    carbon content on a dry matter basis (reserved; not for manual entry)
  property true value 1.228
    allocation property applied in "true value" allocation // value calculated from revenue
  properties: water in wet mass 0 kg, carbon content, non-fossil 0, water content 0, dry mass 1 kg, carbon content, fossil 0, wet mass 1 kg, carbon allocation 0 kg
- aluminium, wrought alloy: 0 kg; source European Aluminium Association 2008; By-product classification allocatable product; CPC 4153: Semi-finished products of aluminium or aluminium alloys; pedigree (1,1,1,1,1)
  production volume 1.64022 kg
  property price 1.44 EUR2005; name secondaryAluminiumOutput_price_EUR2005
    Estimated based on literature values and expert judgement. Aluminium ccast alloys are about 90% of the price of aluminium wrought alloys.
  property carbon content 0
    carbon content on a dry matter basis (reserved; not for manual entry)
  property true value 0.59549
    allocation property applied in "true value" allocation // value calculated from revenue
  properties: wet mass 1 kg, water content 0, carbon content, fossil 0, water in wet mass 0 kg, carbon content, non-fossil 0, dry mass 1 kg, carbon allocation 0 kg

## Inputs from technosphere
- used ventilation control and wiring decentralized unit: -5.97439 unit; name byP_3; lognormal variance with pedigree 0.0446, pedigree (2,4,5,5,1)
  Questionnaire, Data related to building considered
  EcoSpold01Location=CH
  Uncertainty: Questionnaire, Data related to building considered
  production volume 23.798 unit; = byP_3/ vent_sys_RP* vent_sys_RP_PV
    Calculated from the production volume of ventilation system, decentralized, 6 x 120 m3/h, steel ducts, with earth tube heat exchanger in proportion to the respective output amounts.
  property price 0 EUR2005; name byP_3_price_EUR2005
  properties: wet mass 2.18 kg, dry mass 2.18 kg, carbon content, non-fossil 3.69963e-5, carbon content, fossil 0.275687
- polyethylene pipe, DN 200, SDR 41: 119.488 m; lognormal variance with pedigree 0.0446, pedigree (2,4,5,5,1)
  Questionnaire, Data related to building considered
  EcoSpold01Location=RER
  Uncertainty: Questionnaire, Data related to building considered
  properties: wet mass 3 kg, dry mass 3 kg, carbon content, fossil 0.857143
- room-connecting overflow element, steel, approx. 40 m3/h: 17.9232 unit; lognormal variance with pedigree 0.0446, pedigree (2,4,5,5,1)
  (same comment as for polyethylene pipe, DN 200, SDR 41)
  properties: dry mass 1.1 kg, carbon content, fossil 0.211386, wet mass 1.1 kg
- used air filter decentralized unit, 180-250 m3/h: -11.9488 unit; name byP_5; lognormal variance with pedigree 0.0446, pedigree (2,4,5,5,1)
  EcoSpold01Location=CH
  Questionnaire, Data related to building considered
  Uncertainty: Questionnaire, Data related to building considered
  production volume 47.596 unit; = byP_5/ vent_sys_RP* vent_sys_RP_PV
    (same comment as for used ventilation control and wiring decentralized unit)
  property price 0 EUR2005; name byP_5_price_EUR2005
  properties: dry mass 0.22 kg, carbon content, fossil 0.367027, carbon content, non-fossil 0.154835, wet mass 0.22 kg
- sealing tape, aluminium/PE, 50 mm wide: 697.012 m; lognormal variance with pedigree 0.0446, pedigree (2,4,5,5,1)
  EcoSpold01Location=RER
  Questionnaire, Data related to building considered
  Uncertainty: Questionnaire, Data related to building considered
  properties: dry mass 0.057 kg, wet mass 0.057 kg, carbon content, fossil 0.707644
  note on carbon content, fossil: C content calculated as the addition of the C contents in the final product components (Tape made of Polyethylene, laminated with aluminium foil and acrylic glue as adherent layer)
- waste bulk iron, excluding reinforcement: 0 kg; name byP_2; pedigree (1,1,1,1,1)
  (same comment as for used air filter decentralized unit, 180-250 m3/h)
  production volume 0 kg
    (same comment as for used ventilation control and wiring decentralized unit)
  property price 0 EUR2005; name byP_2_price_EUR2005
  properties: wet mass 1 kg, dry mass 1 kg
- used outside air intake stainless steel, DN 370: -0.995732 unit; name byP_14; lognormal variance with pedigree 0.0446, pedigree (2,4,5,5,1)
  (same comment as for used ventilation control and wiring decentralized unit)
  production volume 3.96633 unit; = byP_14/ vent_sys_RP* vent_sys_RP_PV
    (same comment as for used ventilation control and wiring decentralized unit)
  property price 0 EUR2005; name byP_14_price_EUR2005
  properties: dry mass 32 kg, carbon content, fossil 0.0520342, wet mass 32 kg
- exhaust air roof hood, steel, DN 400: 0.995732 unit; lognormal variance with pedigree 0.042, pedigree (1,1,5,5,1)
  2,4,1,1,1,nA; Questionnaire, Data related to building considered
  EcoSpold01Location=CH
  properties: dry mass 17 kg, carbon content, fossil 0.00377059, wet mass 17 kg
- exhaust air valve, in-wall housing, plastic/steel, DN 125: 17.9232 unit; lognormal variance with pedigree 0.0446, pedigree (2,4,5,5,1)
  (same comment as for used air filter decentralized unit, 180-250 m3/h)
  properties: wet mass 0.5 kg, dry mass 0.5 kg, carbon content, fossil 0.0797702
  note on carbon content, fossil: Exhaust air outlet mounted in room ceiling. Including housing for duct connection. component made of polyvinylchloride and zinc coated steel.
- outside air intake, stainless steel, DN 370: 0.995732 unit; lognormal variance with pedigree 0.0446, pedigree (2,4,5,5,1)
  (same comment as for sealing tape, aluminium/PE, 50 mm wide)
  properties: wet mass 32 kg, carbon content, fossil 0.0520342, dry mass 32 kg
  note on carbon content, fossil: C content was calculated as an addition of C content in the product components
- flexible duct, aluminium/PET, DN of 125: 19.9146 m; lognormal variance with pedigree 0.0446, pedigree (2,4,5,5,1)
  (same comment as for sealing tape, aluminium/PE, 50 mm wide)
  properties: dry mass 0.205 kg, wet mass 0.205 kg, carbon content, fossil 0.436512
  note on carbon content, fossil: C content was calculated as an addition of C content in the product components (Flexible tube made of PET, laminated with aluminium foil and strengthened with galvanised steel spiral wire)
- used flexible duct aluminium/PET, DN of 125: -19.9146 m; name byP_4; lognormal variance with pedigree 0.0446, pedigree (2,4,5,5,1)
  (same comment as for used air filter decentralized unit, 180-250 m3/h)
  production volume 79.3266 m; = byP_4/ vent_sys_RP* vent_sys_RP_PV
    (same comment as for used ventilation control and wiring decentralized unit)
  property price 0 EUR2005; name byP_4_price_EUR2005
  properties: wet mass 0.205 kg, carbon content, fossil 0.436512, dry mass 0.205 kg
- used blower and heat exchange unit decentralized, 180-250 m3/h: -5.97439 unit; name byP_10; lognormal variance with pedigree 0.0446, pedigree (2,4,5,5,1)
  (same comment as for used ventilation control and wiring decentralized unit)
  production volume 23.798 unit; = byP_10/ vent_sys_RP* vent_sys_RP_PV
    (same comment as for used ventilation control and wiring decentralized unit)
  property price 0 EUR2005; name byP_10_price_EUR2005
  properties: wet mass 43.1 kg, carbon content, non-fossil 6.48865e-7, dry mass 43.1 kg, carbon content, fossil 0.225044
- used exhaust air roof hood steel, DN 400: -0.995732 unit; name byP_1; lognormal variance with pedigree 0.0446, pedigree (2,4,5,5,1)
  (same comment as for used ventilation control and wiring decentralized unit)
  production volume 3.96633 unit; = byP_1/ vent_sys_RP* vent_sys_RP_PV
    (same comment as for used ventilation control and wiring decentralized unit)
  property price 0 EUR2005; name byP_1_price_EUR2005
  properties: carbon content, fossil 0.00377059, dry mass 17 kg, wet mass 17 kg
- silencer, steel, DN 125: 23.8976 unit; lognormal variance with pedigree 0.0446, pedigree (2,4,5,5,1)
  (same comment as for used ventilation control and wiring decentralized unit)
  properties: dry mass 8.3 kg, wet mass 8.3 kg, carbon content, fossil 0.00483456
- ventilation duct, steel, 100x50 mm: 597.439 m; lognormal variance with pedigree 0.0446, pedigree (2,4,5,5,1)
  (same comment as for sealing tape, aluminium/PE, 50 mm wide)
  properties: carbon content, fossil 0.00376667, dry mass 1.5 kg, wet mass 1.5 kg
  note on carbon content, fossil: Rectangular duct made of galvanised steel, 1 m electric welded seam per m duct.
- excavation, hydraulic digger: 136.415 m3; lognormal variance with pedigree 0.062, pedigree (4,4,5,5,1)
  Assumption, Data related to building considered
  EcoSpold01Location=RER
  Uncertainty: Assumption, Data related to building considered
- air distribution terminal panel, steel, 120 m3/h: 11.9488 unit; lognormal variance with pedigree 0.0446, pedigree (2,4,5,5,1)
  (same comment as for used air filter decentralized unit, 180-250 m3/h)
  properties: wet mass 9.5 kg, carbon content, fossil 0.0166978, dry mass 9.5 kg
  note on carbon content, fossil: C content was calculated as an addition of C content in the product component, and then referred to 1 kg DM
- used silencer steel, DN 125: -23.8976 unit; name byP_12; lognormal variance with pedigree 0.0446, pedigree (2,4,5,5,1)
  (same comment as for used ventilation control and wiring decentralized unit)
  production volume 95.192 unit; = byP_12/ vent_sys_RP* vent_sys_RP_PV
    (same comment as for used ventilation control and wiring decentralized unit)
  property price 0 EUR2005; name byP_12_price_EUR2005
  properties: dry mass 8.3 kg, wet mass 8.3 kg, carbon content, fossil 0.00483456
- used exhaust air valve in-wall housing, plastic/steel: -17.9232 unit; name byP_8; lognormal variance with pedigree 0.0446, pedigree (2,4,5,5,1)
  (same comment as for used air filter decentralized unit, 180-250 m3/h)
  production volume 71.394 unit; = byP_8/ vent_sys_RP* vent_sys_RP_PV
    (same comment as for used ventilation control and wiring decentralized unit)
  property price 0 EUR2005; name byP_8_price_EUR2005
  properties: dry mass 0.5 kg, wet mass 0.5 kg, carbon content, fossil 0.0797702
- spiral-seam duct, steel, DN 400: 39.8293 m; lognormal variance with pedigree 0.0446, pedigree (2,4,5,5,1)
  (same comment as for polyethylene pipe, DN 200, SDR 41)
  properties: dry mass 6 kg, carbon content, fossil 0.00376667, wet mass 6 kg
  note on carbon content, fossil: Tube made of galvanised steel, 3.2 m electric welded seam per m tube.
- used insulation spiral-seam duct rockwool, DN 400: -39.8293 m; name byP_16; lognormal variance with pedigree 0.0446, pedigree (2,4,5,5,1)
  (same comment as for used ventilation control and wiring decentralized unit)
  production volume 158.653 m; = byP_16/ vent_sys_RP* vent_sys_RP_PV
    (same comment as for used ventilation control and wiring decentralized unit)
  property price 0 EUR2005; name byP_16_price_EUR2005
  properties: dry mass 3.3 kg, wet mass 3.3 kg, carbon content, fossil 0.00924113
- air filter, decentralized unit, 180-250 m3/h: 11.9488 unit; lognormal variance with pedigree 0.0446, pedigree (2,4,5,5,1)
  (same comment as for polyethylene pipe, DN 200, SDR 41)
  properties: dry mass 0.22 kg, carbon content, non-fossil 0.154835, wet mass 0.22 kg, carbon content, fossil 0.367027
  note on carbon content, non-fossil: C content was calculated as an addition of C content in the product components (Bag filter made of polyester fleece, frame cardboard). Then, it was referred to 1 kg DM
- ventilation duct, elbow 90°, steel, 100x50 mm: 227.027 unit; lognormal variance with pedigree 0.0446, pedigree (2,4,5,5,1)
  (same comment as for polyethylene pipe, DN 200, SDR 41)
  properties: dry mass 0.27 kg, wet mass 0.27 kg, carbon content, fossil 0.00376852
- used room-connecting overflow element steel, approx. 40 m3/h: -17.9232 unit; name byP_7; lognormal variance with pedigree 0.0446, pedigree (2,4,5,5,1)
  (same comment as for used ventilation control and wiring decentralized unit)
  production volume 71.394 unit; = byP_7/ vent_sys_RP* vent_sys_RP_PV
    (same comment as for used ventilation control and wiring decentralized unit)
  property price 0 EUR2005; name byP_7_price_EUR2005
  properties: wet mass 1.1 kg, carbon content, fossil 0.211386, dry mass 1.1 kg
- spiral-seam duct, steel, DN 125: 11.9488 m; lognormal variance with pedigree 0.0446, pedigree (2,4,5,5,1)
  (same comment as for sealing tape, aluminium/PE, 50 mm wide)
  properties: wet mass 1.9 kg, carbon content, fossil 0.00377105, dry mass 1.9 kg
  note on carbon content, fossil: Tube made of galvanised steel, 2.6 m electric welded seam per m tube.
- ventilation control and wiring, decentralized unit: 5.97439 unit; lognormal variance with pedigree 0.0446, pedigree (2,4,5,5,1)
  (same comment as for sealing tape, aluminium/PE, 50 mm wide)
  properties: wet mass 2.18 kg, carbon content, fossil 0.275687, carbon content, non-fossil 3.69963e-5, dry mass 2.18 kg
  note on carbon content, fossil: C content was calculated as an addition of C content in the product components, then it was referred to 1 kg DM
- insulation spiral-seam duct, rockwool, DN 400, 30 mm: 39.8293 m; lognormal variance with pedigree 0.0446, pedigree (2,4,5,5,1)
  (same comment as for sealing tape, aluminium/PE, 50 mm wide)
  properties: carbon content, fossil 0.00924113, dry mass 3.3 kg, wet mass 3.3 kg
  note on carbon content, fossil: C content calculated as the addition of the C contents in the final product components (Insulation made of rock wool with 0.2 mm aluminium foil cover. Protected with a net made of galvanised steel wire)
- waste polyethylene/polypropylene product: 0 kg; name byP_9; pedigree (1,1,1,1,1)
  (same comment as for used air filter decentralized unit, 180-250 m3/h)
  production volume 0 kg
    (same comment as for used ventilation control and wiring decentralized unit)
  property price 0 EUR2005; name byP_9_price_EUR2005
  properties: water content 0.180638, wet mass 1 kg, dry mass 0.847 kg, carbon content, fossil 0.748045
  note on carbon content, fossil: Mixed various plastics was used to estimate the C content of this waste (Tab A.2, ecoinvent v2.2 report 13_I)
- air filter, in exhaust air valve: 17.9232 unit; lognormal variance with pedigree 0.0446, pedigree (2,4,5,5,1)
  (same comment as for polyethylene pipe, DN 200, SDR 41)
  properties: wet mass 0.04 kg, dry mass 0.04 kg, carbon content, fossil 0.65625
  note on carbon content, fossil: C content was calculated as an addition of C content in the product components (Mat filter made of polyester fleece). Then, it was referred to 1 kg DM
- supply air inlet, steel/SS, DN 75: 29.872 unit; lognormal variance with pedigree 0.0446, pedigree (2,4,5,5,1)
  (same comment as for sealing tape, aluminium/PE, 50 mm wide)
  properties: carbon content, fossil 0.00337682, dry mass 2.2 kg, wet mass 2.2 kg
- used air distribution terminal panel steel, 120 m3/h: -11.9488 unit; name byP_11; lognormal variance with pedigree 0.0446, pedigree (2,4,5,5,1)
  (same comment as for used ventilation control and wiring decentralized unit)
  production volume 47.596 unit; = byP_11/ vent_sys_RP* vent_sys_RP_PV
    (same comment as for used ventilation control and wiring decentralized unit)
  property price 0 EUR2005; name byP_11_price_EUR2005
  properties: wet mass 9.5 kg, carbon content, fossil 0.0166978, dry mass 9.5 kg
- ventilation duct, connection piece, steel, 100x50 mm: 149.36 unit; lognormal variance with pedigree 0.0446, pedigree (2,4,5,5,1)
  (same comment as for sealing tape, aluminium/PE, 50 mm wide)
  properties: wet mass 0.2 kg, dry mass 0.2 kg, carbon content, fossil 0.0037725
- used air filter in exhaust air valve: -17.9232 unit; name byP_6; lognormal variance with pedigree 0.0446, pedigree (2,4,5,5,1)
  (same comment as for used ventilation control and wiring decentralized unit)
  production volume 71.394 unit; = byP_6/ vent_sys_RP* vent_sys_RP_PV
    (same comment as for used ventilation control and wiring decentralized unit)
  property price 0 EUR2005; name byP_6_price_EUR2005
  properties: carbon content, fossil 0.65625, dry mass 0.04 kg, wet mass 0.04 kg
- blower and heat exchange unit, decentralized, 180-250 m3/h: 5.97439 unit; lognormal variance with pedigree 0.0446, pedigree (2,4,5,5,1)
  (same comment as for polyethylene pipe, DN 200, SDR 41)
  properties: carbon content, non-fossil 6.48865e-7, carbon content, fossil 0.225044, dry mass 43.1 kg, wet mass 43.1 kg
- used sealing tape aluminium/PE, 50 mm wide: -697.012 m; name byP_15; lognormal variance with pedigree 0.0446, pedigree (2,4,5,5,1)
  (same comment as for used ventilation control and wiring decentralized unit)
  production volume 2776.43 m; = byP_15/ vent_sys_RP* vent_sys_RP_PV
    (same comment as for used ventilation control and wiring decentralized unit)
  property price 0 EUR2005; name byP_15_price_EUR2005
  properties: wet mass 0.057 kg, carbon content, fossil 0.707644, dry mass 0.057 kg
- waste bulk iron, excluding reinforcement: -426.818, -887.548 kg (2 entries); lognormal variance with pedigree 0.0446, pedigree (2,4,5,5,1)
  (same comment as for used air filter decentralized unit, 180-250 m3/h)
  production volume 5235.56 kg
- waste polyethylene/polypropylene product: -101.4, -257.063 kg (2 entries); lognormal variance with pedigree 0.0446, pedigree (2,4,5,5,1)
  (same comment as for used air filter decentralized unit, 180-250 m3/h)
  production volume 1427.88 kg

## Sampling procedure
Questionnaire and assumptions. Data valid for example building used.

## Extrapolations
none This dataset has been copied from an original dataset covering the geography CH. The uncertainty has been adjusted accordingly.

## Review by Rolf Frischknecht 2007-08-16
passed
none
