# lignite dust factory construction

Dataset: EcoSpold 2, unit process
Geography: RoW
Time period: 1990-01-01 to 2019-12-31
Technology level: current
Classification: ISIC rev.4 ecoinvent: 4290:Construction of other civil engineering projects
Classification: EcoSpold01Categories: lignite/production
Tags: ConvertedDataset
Scenario: Business-as-Usual
System model: Allocation at the point of substitution
Generated by: Christian Bauer
Published in: Röder, A. 2007
Database: ecoinvent
isCopyrightProtected: true
accessRestrictedTo: 1

## General comment
The material and energy input has been roughly estimated, assuming 5 % of the coke plant masses.
[This dataset was already contained in the ecoinvent database version 2. It was not individually updated during the transfer to ecoinvent version 3. Life Cycle Impact Assessment results may still have changed, as they are affected by changes in the supply chain, i.e. in other datasets. This dataset was generated following the ecoinvent quality guidelines for version 2. It may have been subject to central changes described in the ecoinvent version 3 change report (http://www.ecoinvent.org/database/ecoinvent-version-3/reports-of-changes/), and the results of the central updates were reviewed extensively. The changes added e.g. consistent water flows and other information throughout the database. The documentation of this dataset can be found in the ecoinvent reports of version 2, which are still available via the ecoinvent website. The change report linked above covers all central changes that were made during the conversion process.]

## Included activities end
Includes the most important construction materials for the plant and their disposal. Also included is the landuse of the plant and the energy needed for the construction.

## Geography
Not specified.

## Technology
No specific information available.

## Reference product
- lignite dust factory: 1 unit; CPC 53269: Other constructions for manufacturing; By-product classification allocatable product
  EcoSpold01Location=RER
  production volume 2.67763 unit
    This is a placeholder value that does not reflect real-world production volumes. This dataset does not currently require a real-world production volume to work in the database framework, and no actual data were collected yet. This has no negative effect on the results of the ecoinvent database.
  property price 7.20494e6 EUR2005
    Calculated based on inputs: The price of the product has been calculated as a sum of the values of the material and energy inputs for this product. This value is therefore a rough estimation. It may underestimate the real price since there are additional expenses when producing any product. These expences can include for example labour costs, treatment of waste materials and profit for the producer. Please consider carefully whether this level of data quality is acceptable for your application.
  property true value 7.20494e6
    allocation property applied in "true value" allocation // value calculated from revenue

## By-products
- heat, for reuse in municipal waste incineration only: 0 MJ; CPC 17300: Steam and hot water; By-product classification allocatable product; pedigree (1,1,1,1,1)
  Net electricity generated from this waste and used in internal MSWI plant energy redistribution.
  Uncertainty: uncertainty is calculated from uncertainties in waste composition and uncertainties in energy efficiency and the uncertainty in internal energy demand
  production volume 224530 MJ
  property exergy 0.1842 MJ; name E_th_prod_MSWI_exergy
    This exergy property is based on the exergy content of the product.
  property price 0.0106 EUR2005; name E_th_prod_MSWI_price_EUR2005
    Average European district heat price from Ecoheatcool and Euroheat 2005-2006, Ecoheat Work package 1: The European heat market. Final report. 10.6 EUR/GJ i s the price of district heat. http://www.solarthermalworld.org/files/Ecoheatcool%20WP1%20Web.pdf?download
  property true value relation 0.1842; name E_th_prod_MSWI_true_value_relation
    property to calculate "true value" from
  property true value 490.459
    allocation property applied in "true value" allocation // value calculated from true value relation
- electricity, for reuse in municipal waste incineration only: 0 kWh; CPC 17100: Electrical energy; By-product classification allocatable product; pedigree (1,1,1,1,1)
  (same comment as for heat, for reuse in municipal waste incineration only)
  production volume 32364.9 kWh
  property true value relation 3.6; name E_el_prod_MSWI_true_value_relation
    property to calculate "true value" from
  property price 0.1 EUR2005; name E_el_prod_MSWI_price_EUR2005
    Estimated to be the same price as in case of electricity, medium voltage.
  property exergy 3.6 MJ; name E_el_prod_MSWI_exergy
    This exergy property is based on the exergy content of the product.
  property true value 1381.71
    (same comment as for heat, for reuse in municipal waste incineration only)

## Inputs from technosphere
- electricity, medium voltage: 0 kWh; pedigree (1,1,1,1,1)
  own assumption
  EcoSpold01Location=UCTE
- polyethylene, high density, granulate: 74980.5 kg; lognormal variance with pedigree 0.342, pedigree (1,1,5,5,1)
  own assumption
  EcoSpold01Location=RER
  properties: carbon content, fossil 0.857143, dry mass 1 kg, wet mass 1 kg
  note on carbon content, fossil: Polyethylene is formed out of a huge amount of ethylene monomers (C2H4) (ecoinvent v2.2 report 11_II). MW=28 g/mol
- stone wool: 374903 kg; lognormal variance with pedigree 0.342, pedigree (1,1,5,5,1)
  own assumption
  EcoSpold01Location=CH
  properties: carbon content, fossil 0.015401, dry mass 1 kg, wet mass 1 kg
  note on carbon content, fossil: The chemical composition of the glass fibres used in the rock wool production is similar to the composition of naturally cooled volcano basalt and has a composition listed in Tab. 3.1 and 3.2 in ecoinvent v2.2 report 16, part XIV. Rock wool contains: a minimum of 96% mineral fibres,between 0.5 and 3.0 weight percent of phenolic resin depending on the specific product characteristics, and about 0.2 percent mineral oil (ecoinvent v2.2 report 16, part XIV). An average composition of 1.8% phenolic resin, 0.2% mineral oil, and 98% mineral fibres has been assumed and used to calculate C content of the rock wool
- waste reinforced concrete: -1.99948e7 kg; lognormal variance with pedigree 0.342, pedigree (1,1,5,5,1)
  own assumption
  EcoSpold01Location=CH
  production volume 6e7 kg
    Calculated from the production volume of lignite dust factory in proportion to the respective output amounts.
  properties: water content 0.00585407, wet mass 1 kg, dry mass 0.99418 kg
- waste polyethylene/polypropylene product: -74980.5 kg; lognormal variance with pedigree 0.342, pedigree (1,1,5,5,1)
  own assumption
  EcoSpold01Location=CH
  production volume 225000 kg
    (same comment as for waste reinforced concrete)
  properties: water content 0.180638, carbon content, fossil 0.748045, dry mass 0.847 kg, wet mass 1 kg
  note on carbon content, fossil: Mixed various plastics was used to estimate the C content of this waste (Tab A.2, ecoinvent v2.2 report 13_I)
- concrete, normal: 0 m3; pedigree (1,1,1,1,1)
  own assumption
  EcoSpold01Location=CH
  properties: wet mass 2380 kg, dry mass 2190 kg, water content 0.086758
- diesel, burned in building machine: 3.74903e7 MJ; lognormal variance with pedigree 0.342, pedigree (1,1,5,5,1)
  EcoSpold01Location=GLO
  own assumption
- steel, low-alloyed, hot rolled: 674825 kg; lognormal variance with pedigree 0.342, pedigree (1,1,5,5,1)
  own assumption
  EcoSpold01Location=RER
  properties: carbon content, fossil 0.005, wet mass 1 kg, dry mass 1 kg
  note on carbon content, fossil: Low alloyed steel composition given in Tab. 3.2 ecoinvent v2.2 report 10_partII. Steel assumed to have a C content of 0.5%
- steel, chromium steel 18/8, hot rolled: 67482.5 kg; lognormal variance with pedigree 0.342, pedigree (1,1,5,5,1)
  EcoSpold01Location=RER
  own assumption
  properties: dry mass 1 kg, wet mass 1 kg, carbon content, fossil 0.0008
  note on carbon content, fossil: Stainless steel model is the grade 304 steel (18/8 stainless, 18% chromium 8% nickel; max. 0.08% C)
- reinforcing steel: 6.74825e6 kg; lognormal variance with pedigree 0.342, pedigree (1,1,5,5,1)
  EcoSpold01Location=RER
  own assumption
  properties: dry mass 1 kg, carbon content, fossil 0.004, wet mass 1 kg
- heat, district or industrial, other than natural gas: 0 MJ; pedigree (1,1,1,1,1)
  EcoSpold01Location=RER
  own assumption
- waste mineral wool: -374903 kg; lognormal variance with pedigree 0.342, pedigree (1,1,5,5,1)
  own assumption
  EcoSpold01Location=CH
  production volume 1.125e6 kg
    (same comment as for waste reinforced concrete)
  properties: wet mass 1 kg, dry mass 1 kg
- electricity, medium voltage: 34027.1, 6191.5, 104998, 1.52237e6, 217879, 713862 kWh (6 entries); lognormal variance with pedigree 0.342, pedigree (1,1,5,5,1)
  own assumption
  EcoSpold01Location=UCTE
- concrete, normal: 199.7, 20.8085, 168.459, 94.7584, 401.275, 13.5348, 7799.2 m3 (7 entries); lognormal variance with pedigree 0.342, pedigree (1,1,5,5,1)
  own assumption
  EcoSpold01Location=CH
- heat, district or industrial, other than natural gas: 16799.5, 3.74735e7 MJ (2 entries); lognormal variance with pedigree 0.342, pedigree (1,1,5,5,1)
  EcoSpold01Location=RER
  own assumption

## Inputs from nature
- Occupation, industrial area [natural resource, land]: 299922 m2*year; lognormal variance with pedigree 0.342, pedigree (1,1,5,5,1)
  own assumption
- Transformation, to industrial area [natural resource, land]: 9997.4 m2; lognormal variance with pedigree 0.342, pedigree (1,1,5,5,1)
  own assumption
- Transformation, from unspecified [natural resource, land]: 9997.4 m2; lognormal variance with pedigree 0.342, pedigree (1,1,5,5,1)
  own assumption

## Sampling procedure
literature

## Extrapolations
see Geography/Text This dataset has been copied from an original dataset covering the geography RER. The uncertainty has been adjusted accordingly.

## Review by Hans-Jörg Althaus 2003-07-04
passed
