# treatment of waste polystyrene, sanitary landfill

Dataset: EcoSpold 2, unit process
Geography: CH
Time period: 1994-01-01 to 2019-12-31
Technology level: current
Classification: EcoSpold01Categories: waste management/sanitary landfill
Classification: ISIC rev.4 ecoinvent: 3821:Treatment and disposal of non-hazardous waste
Synonyms: PS
Tags: ConvertedDataset; Treatment
Scenario: Business-as-Usual
System model: Allocation at the point of substitution
Generated by: Gabor Doka (obsolete)
Published in: Doka G. 2007
Database: ecoinvent
isCopyrightProtected: true
accessRestrictedTo: 1

## General comment
Inventoried waste contains 100% PS; .
waste composition (wet, in ppm): upper heating value 38.88 MJ/kg; lower heating value 38.67 MJ/kg; H2O 2000; O 38852; H 78046; C 868490; S 678.75; N 1942.6; P n.a.; B n.a.; Cl 1132.1; Br 882.12; F 14.25; I n.a.; Ag n.a.; As 1.8418; Ba 180.79; Cd 23.336; Co 30.622; Cr 39.613; Cu 107.56; Hg 0.82311; Mn 77.469; Mo n.a.; Ni 19.968; Pb 14.935; Sb 41.65; Se 2.0357; Sn 25.403; V 279.32; Zn 834.61; Be 0.48468; Sc n.a.; Sr 85.789; Ti 969.36; Tl 0.38774; W n.a.; Si n.a.; Fe 3611.5; Ca n.a.; Al 193.87; K n.a.; Mg n.a.; Na 1420.6;
Share of carbon in waste that is biogenic 0%.
Overall degradability of waste during 100 years: 1%.
[This dataset was already contained in the ecoinvent database version 2. It was not individually updated during the transfer to ecoinvent version 3. Life Cycle Impact Assessment results may still have changed, as they are affected by changes in the supply chain, i.e. in other datasets. This dataset was generated following the ecoinvent quality guidelines for version 2. It may have been subject to central changes described in the ecoinvent version 3 change report (http://www.ecoinvent.org/database/ecoinvent-version-3/reports-of-changes/), and the results of the central updates were reviewed extensively. The changes added e.g. consistent water flows and other information throughout the database. The documentation of this dataset can be found in the ecoinvent reports of version 2, which are still available via the ecoinvent website. The change report linked above covers all central changes that were made during the conversion process.]

## Included activities end
Waste-specific short-term emissions to air via landfill gas incineration and landfill leachate. Burdens from treatment of short-term leachate (0-100a) in wastewater treatment plant (including WWTP sludge disposal in municipal incinerator). Long-term emissions from landfill to groundwater (after base lining failure).

## Geography
Technology encountered in Switzerland in 2000. Landfill includes base seal, leachate collection system, treatment of leachate in municipal wastewater treatment plant.

## Technology
Swiss municipal sanitary landfill for biogenic or untreated municipal waste ('reactive organic landfill'). Landfill gas and leachate collection system. Recultivation and monitoring for 150 years after closure.

## Reference product
- waste polystyrene: -1 kg; By-product classification Waste; CPC 39270: Waste, parings and scrap of plastics; CAS 9003-53-6
  production volume 0 kg
    estimated proportion; source: ecoinvent v2; value to be replaced by value to be calculated from the demand for this treatment activity
  property price 0 EUR2005
    Waste products are assigned a price of zero as they are assumed to require further treatment.
  property carbon content 0.922579
    carbon content on a dry matter basis (reserved; not for manual entry)
  properties: carbon content, non-fossil 0, wet mass 1 kg, water in wet mass 0.002 kg, water content 0.00200401, dry mass 0.998 kg, carbon content, fossil 0.922579, carbon allocation 0.920734 kg

## By-products
- electricity, for reuse in municipal waste incineration only: 0 kWh; CPC 17100: Electrical energy; By-product classification allocatable product; pedigree (1,1,1,1,1)
  Net electricity generated from this waste and used in internal MSWI plant energy redistribution.
  Uncertainty: uncertainty is calculated from uncertainties in waste composition and uncertainties in energy efficiency and the uncertainty in internal energy demand
  property exergy 3.6 MJ; name E_el_prod_MSWI_exergy
  property true value relation 3.6; name E_el_prod_MSWI_true_value_relation
  property price 0.1 EUR2005; name E_el_prod_MSWI_price_EUR2005
- heat, for reuse in municipal waste incineration only: 0 MJ; CPC 17300: Steam and hot water; By-product classification allocatable product; pedigree (1,1,1,1,1)
  Net useful heat generated from this waste and used in internal MSWI plant energy redistribution.
  Uncertainty: uncertainty is calculated from uncertainties in waste composition and uncertainties in energy efficiency and the uncertainty in internal energy demand
  property true value relation 0.1842; name E_th_prod_MSWI_true_value_relation
  property exergy 0.1842 MJ; name E_th_prod_MSWI_exergy
  property price 0.0106 EUR2005; name E_th_prod_MSWI_price_EUR2005
- zinc concentrate: 0 kg; CPC 14290: Other non-ferrous metal ores and concentrates (other than uranium or thorium ores and concentrates); By-product classification allocatable product
  Calculated value from the knowledge of the properties of both products.
  property price 0.38 EUR2005; name ByP_price_EUR2005
    Temporary price data. Calculated as 90% of purchasers price based on: Zinc content in concentrate 53%. Concentrate price per kg Zn 86.5% of refined Zn price (13.5% treatment charges according to CHR Metals Limited 2005: Dynamic cost curves. http://www.minecost.com/dynamic.pdf). 2004 zinc price from USGS (2007) Mineral commodity summaries 2007. <http://minerals.usgs.gov/minerals/pubs/mcs/2007/mcs2007.pdf> [Accessed 25 May 2010]
  property zinc content 0.53; name zinc_C_zinc_concentrate
    Zinc content on a dry matter basis. Value taken from teh "zinc mine operation" /GLO dataset.
  property dry mass 1 kg; name DM_zinc_concentrate
  property carbon content 0
    carbon content on a dry matter basis (reserved; not for manual entry)
  properties: wet mass 1 kg, water content 0, carbon content, non-fossil 0, carbon content, fossil 0, water in wet mass 0 kg, carbon allocation 0 kg

## Inputs from technosphere
- ammonia, liquid: 6.82e-8 kg; lognormal variance with pedigree 0.7, pedigree (1,1,5,1,1)
  burden from incineration of sludge from wastewater treatment of the short-term leachate (0-100a). uncertainty is calculated from uncertainties in waste composition and transfer coefficients in incinerator and uncertainty of waste decomposition and short-term leaching in sanitary landfill
  properties: dry mass 1 kg, wet mass 1 kg
- process-specific burdens, slag landfill: 3.99e-6 kg; lognormal variance with pedigree 0.57, pedigree (1,1,5,1,1)
  burden from incineration of sludge from wastewater treatment of the short-term leachate (0-100a). uncertainty is calculated from uncertainties in waste composition and transfer coefficients in incinerator and uncertainty of waste decomposition and short-term leaching in sanitary landfill;activityLink introduced to establish a direct link to the corresponding regional supply of this product
- wastewater treatment facility, capacity 5E9l/year: 1.42e-11 unit; lognormal variance with pedigree 0.2106, pedigree (5,5,5,5,5)
  burden from wastewater treatment of the short-term leachate (0-100a). Uncertainty calculated from unertainty of the waste composition of this waste, uncertainty in waste decomposition and short-term leaching in sanitary landfill
- chemical, organic: 6.4e-8 kg; lognormal variance with pedigree 1.76, pedigree (1,1,5,1,1)
  (same comment as for ammonia, liquid)
  properties: wet mass 1 kg, dry mass 1 kg, carbon content, fossil 0.628
  note on carbon content, fossil: This dataset is an unweighted average of 20 organic substances (listed in Tab 88.1, ecoinvent v2.2 report 8, part II), being part of the top100 chemicals included in this database. The C-content has also been calculated as an unweighted average of the C content of the substances composing this dataset.
- electricity, low voltage: 0.00045 kWh; lognormal variance with pedigree 0.53, pedigree (5,5,5,5,5)
  (same comment as for wastewater treatment facility, capacity 5E9l/year)
- titanium dioxide: 1.95e-9 kg; lognormal variance with pedigree 0.95, pedigree (1,1,5,1,1)
  (same comment as for ammonia, liquid)
  properties: wet mass 1 kg, dry mass 1 kg
- heat, central or small-scale, other than natural gas: 3.572e-5 MJ; lognormal variance with pedigree 0.22, pedigree (5,5,5,5,5)
  (same comment as for wastewater treatment facility, capacity 5E9l/year)
- process-specific burdens, sanitary landfill: 1 kg; lognormal variance with pedigree 0.04, pedigree (1,1,5,1,1)
  demands per kilogram waste. uncertainty is heeded in the module;activityLink introduced to establish a direct link to the corresponding regional supply of this product
- cement, unspecified: 3.93e-7 kg; lognormal variance with pedigree 0.55, pedigree (1,1,5,1,1)
  (same comment as for ammonia, liquid)
  properties: dry mass 1 kg, wet mass 1 kg
- hydrochloric acid, without water, in 30% solution state: 1.46e-10 kg; lognormal variance with pedigree 0.95, pedigree (1,1,5,1,1)
  (same comment as for ammonia, liquid)
  properties: dry mass 1 kg, wet mass 1 kg
- electricity, for reuse in municipal waste incineration only: 2.2e-5 kWh; name E_el_prod_MSWI; lognormal variance with pedigree 1.14, pedigree (1,1,5,1,1)
  (same comment as for ammonia, liquid)
- iron (III) chloride, without water, in 40% solution state: 4.2e-8 kg; lognormal variance with pedigree 1.01, pedigree (1,1,5,1,1)
  (same comment as for ammonia, liquid)
  properties: dry mass 1 kg, wet mass 1 kg
- sodium hydroxide, without water, in 50% solution state: 3.39e-9 kg; lognormal variance with pedigree 0.62, pedigree (1,1,5,1,1)
  (same comment as for ammonia, liquid)
  properties: dry mass 1 kg, wet mass 1 kg
- quicklime, milled, packed: 6.15e-10 kg; lognormal variance with pedigree 0.62, pedigree (1,1,5,1,1)
  (same comment as for ammonia, liquid)
  properties: dry mass 0.99 kg, wet mass 1 kg, water content 0.010101
- heat, for reuse in municipal waste incineration only: 0.000128 MJ; name E_th_prod_MSWI; lognormal variance with pedigree 0.74, pedigree (1,1,5,1,1)
  (same comment as for ammonia, liquid)
- sanitary landfill facility: 5.56e-10 unit; lognormal variance with pedigree 0.04, pedigree (1,1,5,1,1)
  demands per kilogram waste. uncertainty is heeded in the module
  This exchange has an activity link directly to the producing activity because the product is primarily consumed in the same geographical area where it is produced.
- waste plastic, mixture: -3.88e-5 kg; lognormal variance with pedigree 0.2106, pedigree (5,5,5,5,5)
  (same comment as for wastewater treatment facility, capacity 5E9l/year)
  production volume 0 kg
    Calculated from the production volume of waste polystyrene, 0.2% water in proportion to the respective output amounts.
  properties: carbon content, fossil 0.747344, wet mass 1 kg, dry mass 0.847 kg, water content 0.180638
  note on carbon content, fossil: C content in 1 kg DM was calculated using data in Tab A.2, ecoinvent v2.2 report 13_I
- municipal waste incineration facility: 3.82e-14 unit; lognormal variance with pedigree 0.74, pedigree (1,1,5,1,1)
  Burden from incineration of sludge from wastewater treatment of the short-term leachate (0-100a).
  Burden from incineration of sludge from wastewater treatment of the short-term leachate (0-100a).
- waste graphical paper: -3.88e-5 kg; lognormal variance with pedigree 0.2106, pedigree (5,5,5,5,5)
  (same comment as for wastewater treatment facility, capacity 5E9l/year)
  production volume 0 kg
    (same comment as for waste plastic, mixture)
  properties: carbon content, non-fossil 0.454955, wet mass 1 kg, water content 0.126126, dry mass 0.888 kg
- process-specific burdens, residual material landfill: 9.83e-7 kg; lognormal variance with pedigree 0.54, pedigree (1,1,5,1,1)
  (same comment as for process-specific burdens, slag landfill)
- waste cement, hydrated: -9.83e-7 kg; lognormal variance with pedigree 0.55, pedigree (1,1,5,1,1)
  (same comment as for ammonia, liquid)
  production volume 0 kg
    (same comment as for waste plastic, mixture)
  properties: dry mass 1 kg, wet mass 1 kg
- heat, district or industrial, natural gas: 5.5242e-5 MJ; lognormal variance with pedigree 0.22, pedigree (5,5,5,5,5)
  (same comment as for ammonia, liquid)
- residual material landfill: 2.05e-15 unit; lognormal variance with pedigree 0.54, pedigree (1,1,5,1,1)
  (same comment as for ammonia, liquid)
- sewer grid, 5E9l/year, 110 km: 5.45e-10 km; lognormal variance with pedigree 0.2106, pedigree (5,5,5,5,5)
  (same comment as for wastewater treatment facility, capacity 5E9l/year)
- chromium oxide, flakes: 3.99e-11 kg; lognormal variance with pedigree 1.07, pedigree (5,5,5,5,5)
  burden from incineration of sludge from wastewater treatment of the short-term leachate (0-100a). Proxy for vanadium pentoxide V2O5 in SCR catalyst, uncertainty calculated from uncertainty in average DeNOx input, uncertainty in the share of thermal NOx, uncertainty of nitrogen content in average municipal waste and the unertainty in nitrogen content in *this* waste and uncertainty of waste decomposition and short-term leaching in sanitary landfill
  properties: wet mass 1 kg, dry mass 1 kg
- chemical, inorganic: 2.43e-10 kg; lognormal variance with pedigree 0.95, pedigree (1,1,5,1,1)
  (same comment as for ammonia, liquid)
  properties: carbon content, fossil 0.003, dry mass 1 kg, wet mass 1 kg
  note on carbon content, fossil: This dataset is an unweighted average of 20 inorganic substances (listed in Tab 88.1, ecoinvent v2.2 report 8, part II), being part of the top100 chemicals included in this database. The C-content has also been calculated as an unweighted average of the C content of the substances composing this dataset.
- process-specific burdens, municipal waste incineration: 0.000153 kg; lognormal variance with pedigree 0.74, pedigree (1,1,5,1,1)
  Burden from incineration of sludge from wastewater treatment of the short-term leachate (0-100a).
  Burden from incineration of sludge from wastewater treatment of the short-term leachate (0-100a).;activityLink introduced to establish a direct link to the corresponding regional supply of this product
- slag landfill: 7.09e-15 unit; lognormal variance with pedigree 0.57, pedigree (1,1,5,1,1)
  (same comment as for ammonia, liquid)

## Emissions to nature
- Titanium, ion [water, surface water]: 2.46e-7 kg; lognormal variance with pedigree 1.44, pedigree (1,1,5,1,1)
  Emissions from short-term leachate treatment and incineration of resulting sludge. Uncertainty calculated depending on waste input and uncertainty of transfer coefficents in landfill, wastewater treatment and incineration model.
- Titanium, ion [water, ground-, long-term]: 0.000969 kg; lognormal variance with pedigree 0.7, pedigree (1,1,5,1,1)
  Emissions from long-term leachate (>100a) directly from MSW landfill and indirectly via incineration of treatement sludge from leachate treatement. Uncertainty calculated depending on waste input and uncertainty of long-term transfer coefficents in landfill.
- Sodium, ion [water, surface water]: 5.88e-5 kg; lognormal variance with pedigree 0.86, pedigree (1,1,5,1,1)
  Emissions from short-term leachate treatment. Uncertainty calculated depending on waste input and uncertainty of transfer coefficents in landfill and wastewater treatment.
- Barium [air, non-urban air or from high stacks]: 5.18e-10 kg; lognormal variance with pedigree 2.35, pedigree (1,1,5,1,1)
  burden from direct release or incineration of landfill biogas. Uncertainty calculated from unertainty of the waste composition of this waste, uncertainty in waste decomposition and short-term leaching in sanitary landfill
- Sulfate [water, surface water]: 7.72e-6 kg; lognormal variance with pedigree 1.23, pedigree (1,1,5,1,1)
  (same comment as for Sodium, ion)
- Hydrogen fluoride [air, non-urban air or from high stacks]: 5.68e-8 kg; lognormal variance with pedigree 1.74, pedigree (1,1,5,1,1)
  (same comment as for Barium)
- Fluoride [water, ground-, long-term]: 1.42e-5 kg; lognormal variance with pedigree 1.26, pedigree (1,1,5,1,1)
  (same comment as for Titanium, ion)
- Chloride [water, surface water]: 2.85e-5 kg; lognormal variance with pedigree 0.94, pedigree (1,1,5,1,1)
  (same comment as for Sodium, ion)
- Methane, fossil [air, urban air close to ground]: 1.42e-6 kg; lognormal variance with pedigree 0.91, pedigree (1,1,5,1,1)
  (same comment as for Titanium, ion)
- Lead [water, ground-, long-term]: 1.49e-5 kg; lognormal variance with pedigree 1.25, pedigree (1,1,5,1,1)
  (same comment as for Titanium, ion)
- Mercury [water, surface water]: 1.78e-10 kg; lognormal variance with pedigree 2.34, pedigree (1,1,5,1,1)
  (same comment as for Titanium, ion)
- Titanium [air, non-urban air or from high stacks]: 1.21e-10 kg; lognormal variance with pedigree 2.52, pedigree (1,1,5,1,1)
  (same comment as for Barium)
- BOD5, Biological Oxygen Demand [water, surface water]: 5.02e-5 kg; lognormal variance with pedigree 0.86, pedigree (1,1,5,1,1)
  (same comment as for Titanium, ion)
- Nitrogen oxides [air, urban air close to ground]: 4.23e-7 kg; lognormal variance with pedigree 0.6, pedigree (1,1,5,1,1)
  (same comment as for Titanium, ion)
- Lead [air, urban air close to ground]: 2.91e-14 kg; lognormal variance with pedigree 2.34, pedigree (1,1,5,1,1)
  (same comment as for Titanium, ion)
- Sulfate [water, ground-, long-term]: 0.00189 kg; lognormal variance with pedigree 0.75, pedigree (1,1,5,1,1)
  (same comment as for Titanium, ion)
- Selenium [air, urban air close to ground]: 0 kg; pedigree (1,1,1,1,1)
  (same comment as for Titanium, ion)
- Antimony [air, non-urban air or from high stacks]: 1.1e-11 kg; lognormal variance with pedigree 2.85, pedigree (1,1,5,1,1)
  (same comment as for Barium)
- Particulates, < 2.5 um [air, non-urban air or from high stacks]: 4.14e-7 kg; lognormal variance with pedigree 0.71, pedigree (1,1,5,1,1)
  (same comment as for Barium)
- Chromium, ion [water, surface water]: 7.09e-12 kg; lognormal variance with pedigree 2.1, pedigree (1,1,5,1,1)
  (same comment as for Titanium, ion)
- Arsenic [air, non-urban air or from high stacks]: 4.64e-11 kg; lognormal variance with pedigree 2.67, pedigree (1,1,5,1,1)
  (same comment as for Barium)
- Manganese [air, non-urban air or from high stacks]: 2.22e-10 kg; lognormal variance with pedigree 2.46, pedigree (1,1,5,1,1)
  (same comment as for Barium)
- Iron, ion [water, ground-, long-term]: 0.000253 kg; lognormal variance with pedigree 2.3, pedigree (1,1,5,1,1)
  (same comment as for Titanium, ion)
- Thallium [air, urban air close to ground]: 1.11e-13 kg; lognormal variance with pedigree 2.49, pedigree (1,1,5,1,1)
  (same comment as for Titanium, ion)
- Chromium [air, non-urban air or from high stacks]: 1.13e-12 kg; lognormal variance with pedigree 3.13, pedigree (1,1,5,1,1)
  (same comment as for Barium)
- Vanadium [air, urban air close to ground]: 1.45e-11 kg; lognormal variance with pedigree 1.56, pedigree (1,1,5,1,1)
  (same comment as for Titanium, ion)
- Tin [air, non-urban air or from high stacks]: 3.74e-13 kg; lognormal variance with pedigree 3.28, pedigree (1,1,5,1,1)
  (same comment as for Barium)
- Cobalt [water, surface water]: 5e-8 kg; lognormal variance with pedigree 1.66, pedigree (1,1,5,1,1)
  (same comment as for Titanium, ion)
- Sodium, ion [water, ground-, long-term]: 0.00136 kg; lognormal variance with pedigree 0.65, pedigree (1,1,5,1,1)
  (same comment as for Titanium, ion)
- Aluminium [air, urban air close to ground]: 1.42e-10 kg; lognormal variance with pedigree 1.69, pedigree (1,1,5,1,1)
  (same comment as for Titanium, ion)
- Aluminium [water, ground-, long-term]: 0.000194 kg; lognormal variance with pedigree 0.91, pedigree (1,1,5,1,1)
  (same comment as for Titanium, ion)
- Cobalt [air, urban air close to ground]: 1.54e-15 kg; lognormal variance with pedigree 1.78, pedigree (1,1,5,1,1)
  (same comment as for Titanium, ion)
- Selenium [water, surface water]: 1.43e-9 kg; lognormal variance with pedigree 2.17, pedigree (1,1,5,1,1)
  (same comment as for Titanium, ion)
- Nitrite [water, ground-, long-term]: 4.2e-5 kg; lognormal variance with pedigree 0.61, pedigree (1,1,5,1,1)
  (same comment as for Titanium, ion)
- Bromine [air, non-urban air or from high stacks]: 3.11e-7 kg; lognormal variance with pedigree 1.5, pedigree (1,1,5,1,1)
  (same comment as for Barium)
- Nitrogen oxides [air, non-urban air or from high stacks]: 1.25e-8 kg; lognormal variance with pedigree 1.25, pedigree (1,1,5,1,1)
  (same comment as for Barium)
- Nickel [air, non-urban air or from high stacks]: 2.9e-12 kg; lognormal variance with pedigree 3.02, pedigree (1,1,5,1,1)
  (same comment as for Barium)
- Barium [air, urban air close to ground]: 1.95e-9 kg; lognormal variance with pedigree 1.31, pedigree (1,1,5,1,1)
  (same comment as for Titanium, ion)
- Lead [water, surface water]: 9.67e-11 kg; lognormal variance with pedigree 2.28, pedigree (1,1,5,1,1)
  (same comment as for Titanium, ion)
- Antimony [air, urban air close to ground]: 2.16e-12 kg; lognormal variance with pedigree 2.41, pedigree (1,1,5,1,1)
  (same comment as for Titanium, ion)
- Strontium [air, urban air close to ground]: 2.46e-12 kg; lognormal variance with pedigree 1.8, pedigree (1,1,5,1,1)
  (same comment as for Titanium, ion)
- Manganese [water, ground-, long-term]: 7.53e-5 kg; lognormal variance with pedigree 1.03, pedigree (1,1,5,1,1)
  (same comment as for Titanium, ion)
- Strontium [water, surface water]: 2.53e-8 kg; lognormal variance with pedigree 1.75, pedigree (1,1,5,1,1)
  (same comment as for Titanium, ion)
- Antimony [water, surface water]: 2.98e-8 kg; lognormal variance with pedigree 1.77, pedigree (1,1,5,1,1)
  (same comment as for Titanium, ion)
- Beryllium [air, non-urban air or from high stacks]: 7.04e-14 kg; lognormal variance with pedigree 3.51, pedigree (1,1,5,1,1)
  (same comment as for Barium)
- Carbon monoxide, fossil [air, urban air close to ground]: 4.67e-7 kg; lognormal variance with pedigree 0.92, pedigree (1,1,5,1,1)
  (same comment as for Titanium, ion)
- Sulfur dioxide [air, non-urban air or from high stacks]: 8.86e-7 kg; lognormal variance with pedigree 1.46, pedigree (1,1,5,1,1)
  (same comment as for Barium)
- Cadmium [air, non-urban air or from high stacks]: 2.74e-10 kg; lognormal variance with pedigree 2.44, pedigree (1,1,5,1,1)
  (same comment as for Barium)
- Beryllium [water, surface water]: 1.43e-10 kg; lognormal variance with pedigree 2.43, pedigree (1,1,5,1,1)
  (same comment as for Titanium, ion)
- NMVOC, non-methane volatile organic compounds, unspecified origin [air, urban air close to ground]: 6.46e-9 kg; lognormal variance with pedigree 1.03, pedigree (1,1,5,1,1)
  (same comment as for Titanium, ion)
- Antimony [water, ground-, long-term]: 4.19e-6 kg; lognormal variance with pedigree 2.44, pedigree (1,1,5,1,1)
  (same comment as for Titanium, ion)
- Dinitrogen monoxide [air, urban air close to ground]: 1.19e-7 kg; lognormal variance with pedigree 0.55, pedigree (1,1,5,1,1)
  (same comment as for Titanium, ion)
- Nitrogen, organic bound [water, ground-, long-term]: 0.00126 kg; lognormal variance with pedigree 0.61, pedigree (1,1,5,1,1)
  (same comment as for Titanium, ion)
- TOC, Total Organic Carbon [water, surface water]: 4.04e-5 kg; lognormal variance with pedigree 0.86, pedigree (1,1,5,1,1)
  (same comment as for Titanium, ion)
- Lead [air, non-urban air or from high stacks]: 2.93e-13 kg; lognormal variance with pedigree 3.31, pedigree (1,1,5,1,1)
  (same comment as for Barium)
- Barium [water, ground-, long-term]: 0.00018 kg; lognormal variance with pedigree 0.91, pedigree (1,1,5,1,1)
  (same comment as for Titanium, ion)
- Beryllium [air, urban air close to ground]: 1.39e-13 kg; lognormal variance with pedigree 2.46, pedigree (1,1,5,1,1)
  (same comment as for Titanium, ion)
- Zinc [air, urban air close to ground]: 4.46e-12 kg; lognormal variance with pedigree 1.54, pedigree (1,1,5,1,1)
  (same comment as for Titanium, ion)
- Thallium [air, non-urban air or from high stacks]: 5.64e-14 kg; lognormal variance with pedigree 3.54, pedigree (1,1,5,1,1)
  (same comment as for Barium)
- Arsenic [air, urban air close to ground]: 9.31e-13 kg; lognormal variance with pedigree 2.15, pedigree (1,1,5,1,1)
  (same comment as for Titanium, ion)
- Methane, fossil [air, non-urban air or from high stacks]: 0.00333 kg; lognormal variance with pedigree 0.45, pedigree (1,1,5,1,1)
  (same comment as for Barium)
- Ammonium, ion [water, surface water]: 2.35e-5 kg; lognormal variance with pedigree 0.64, pedigree (1,1,5,1,1)
  (same comment as for Titanium, ion)
- Titanium [air, urban air close to ground]: 2.39e-10 kg; lognormal variance with pedigree 1.49, pedigree (1,1,5,1,1)
  (same comment as for Titanium, ion)
- Nitrate [water, ground-, long-term]: 8.13e-5 kg; lognormal variance with pedigree 0.61, pedigree (1,1,5,1,1)
  (same comment as for Titanium, ion)
- Cadmium, ion [water, surface water]: 2.08e-8 kg; lognormal variance with pedigree 1.77, pedigree (1,1,5,1,1)
  (same comment as for Titanium, ion)
- Aluminium [air, non-urban air or from high stacks]: 2.42e-11 kg; lognormal variance with pedigree 2.74, pedigree (1,1,5,1,1)
  (same comment as for Barium)
- TOC, Total Organic Carbon [water, ground-, long-term]: 0.22 kg; lognormal variance with pedigree 0.51, pedigree (1,1,5,1,1)
  (same comment as for Titanium, ion)
- Barium [water, surface water]: 1.24e-7 kg; lognormal variance with pedigree 1.3, pedigree (1,1,5,1,1)
  (same comment as for Titanium, ion)
- Arsenic, ion [water, surface water]: 2.92e-9 kg; lognormal variance with pedigree 2.1, pedigree (1,1,5,1,1)
  (same comment as for Titanium, ion)
- Vanadium, ion [water, surface water]: 1.5e-7 kg; lognormal variance with pedigree 1.51, pedigree (1,1,5,1,1)
  (same comment as for Titanium, ion)
- Iron [air, urban air close to ground]: 8.16e-12 kg; lognormal variance with pedigree 1.51, pedigree (1,1,5,1,1)
  (same comment as for Titanium, ion)
- Copper, ion [water, ground-, long-term]: 0.000108 kg; lognormal variance with pedigree 0.99, pedigree (1,1,5,1,1)
  (same comment as for Titanium, ion)
- Mercury [water, ground-, long-term]: 8.22e-7 kg; lognormal variance with pedigree 1.63, pedigree (1,1,5,1,1)
  (same comment as for Titanium, ion)
- Zinc [air, non-urban air or from high stacks]: 8.79e-11 kg; lognormal variance with pedigree 2.57, pedigree (1,1,5,1,1)
  (same comment as for Barium)
- DOC, Dissolved Organic Carbon [water, surface water]: 3.87e-5 kg; lognormal variance with pedigree 0.86, pedigree (1,1,5,1,1)
  (same comment as for Titanium, ion)
- Nitrite [water, surface water]: 4.94e-7 kg; lognormal variance with pedigree 0.88, pedigree (1,1,5,1,1)
  (same comment as for Titanium, ion)
- Manganese [water, surface water]: 4.5e-7 kg; lognormal variance with pedigree 1.39, pedigree (1,1,5,1,1)
  (same comment as for Titanium, ion)
- Ammonium, ion [water, ground-, long-term]: 0.000772 kg; lognormal variance with pedigree 0.61, pedigree (1,1,5,1,1)
  (same comment as for Titanium, ion)
- Hydrogen chloride [air, non-urban air or from high stacks]: 4.11e-7 kg; lognormal variance with pedigree 1.47, pedigree (1,1,5,1,1)
  (same comment as for Barium)
- Cobalt [air, non-urban air or from high stacks]: 2.46e-11 kg; lognormal variance with pedigree 2.75, pedigree (1,1,5,1,1)
  (same comment as for Barium)
- Chromium VI [water, ground-, long-term]: 1.8e-7 kg; lognormal variance with pedigree 8.4, pedigree (1,1,5,1,1)
  (same comment as for Titanium, ion)
- BOD5, Biological Oxygen Demand [water, ground-, long-term]: 0.0571 kg; lognormal variance with pedigree 0.51, pedigree (1,1,5,1,1)
  (same comment as for Titanium, ion)
- Nickel, ion [water, ground-, long-term]: 2e-5 kg; lognormal variance with pedigree 1.22, pedigree (1,1,5,1,1)
  (same comment as for Titanium, ion)
- Copper [air, urban air close to ground]: 2.88e-14 kg; lognormal variance with pedigree 2.11, pedigree (1,1,5,1,1)
  (same comment as for Titanium, ion)
- Carbon monoxide, fossil [air, non-urban air or from high stacks]: 1.23e-6 kg; lognormal variance with pedigree 1.06, pedigree (1,1,5,1,1)
  (same comment as for Barium)
- Mercury [air, non-urban air or from high stacks]: 2.26e-10 kg; lognormal variance with pedigree 2.46, pedigree (1,1,5,1,1)
  (same comment as for Barium)
- Nickel [air, urban air close to ground]: 0 kg; pedigree (1,1,1,1,1)
  (same comment as for Titanium, ion)
- Tin, ion [water, ground-, long-term]: 2.54e-5 kg; lognormal variance with pedigree 1.18, pedigree (1,1,5,1,1)
  (same comment as for Titanium, ion)
- Chromium [air, urban air close to ground]: 0 kg; pedigree (1,1,1,1,1)
  (same comment as for Titanium, ion)
- Selenium [air, non-urban air or from high stacks]: 5.37e-13 kg; lognormal variance with pedigree 3.25, pedigree (1,1,5,1,1)
  (same comment as for Barium)
- DOC, Dissolved Organic Carbon [water, ground-, long-term]: 0.22 kg; lognormal variance with pedigree 0.51, pedigree (1,1,5,1,1)
  (same comment as for Titanium, ion)
- Carbon dioxide, fossil [air, urban air close to ground]: 0.000726 kg; lognormal variance with pedigree 0.86, pedigree (1,1,5,1,1)
  (same comment as for Titanium, ion)
- Copper, ion [water, surface water]: 1.37e-9 kg; lognormal variance with pedigree 2.05, pedigree (1,1,5,1,1)
  (same comment as for Titanium, ion)
- Tin [air, urban air close to ground]: 1.16e-12 kg; lognormal variance with pedigree 2.25, pedigree (1,1,5,1,1)
  (same comment as for Titanium, ion)
- Manganese [air, urban air close to ground]: 2.38e-15 kg; lognormal variance with pedigree 1.53, pedigree (1,1,5,1,1)
  (same comment as for Titanium, ion)
- COD, Chemical Oxygen Demand [water, ground-, long-term]: 0.241 kg; lognormal variance with pedigree 0.51, pedigree (1,1,5,1,1)
  (same comment as for Titanium, ion)
- Strontium [water, ground-, long-term]: 8.58e-5 kg; lognormal variance with pedigree 1.02, pedigree (1,1,5,1,1)
  (same comment as for Titanium, ion)
- Nickel, ion [water, surface water]: 7.04e-9 kg; lognormal variance with pedigree 1.94, pedigree (1,1,5,1,1)
  (same comment as for Titanium, ion)
- Copper [air, non-urban air or from high stacks]: 1.5e-12 kg; lognormal variance with pedigree 3.09, pedigree (1,1,5,1,1)
  (same comment as for Barium)
- Chromium VI [water, surface water]: 2.36e-9 kg; lognormal variance with pedigree 2.06, pedigree (1,1,5,1,1)
  (same comment as for Titanium, ion)
- Iron [air, non-urban air or from high stacks]: 1.24e-10 kg; lognormal variance with pedigree 2.52, pedigree (1,1,5,1,1)
  (same comment as for Barium)
- Cadmium, ion [water, ground-, long-term]: 2.33e-5 kg; lognormal variance with pedigree 1.2, pedigree (1,1,5,1,1)
  (same comment as for Titanium, ion)
- Hydrogen sulfide [water, ground-, long-term]: 4.92e-5 kg; lognormal variance with pedigree 0.75, pedigree (1,1,5,1,1)
  (same comment as for Titanium, ion)
- Chloride [water, ground-, long-term]: 0.0011 kg; lognormal variance with pedigree 0.68, pedigree (1,1,5,1,1)
  (same comment as for Titanium, ion)
- Cobalt [water, ground-, long-term]: 3.06e-5 kg; lognormal variance with pedigree 1.16, pedigree (1,1,5,1,1)
  (same comment as for Titanium, ion)
- Cyanide [air, urban air close to ground]: 1.22e-9 kg; lognormal variance with pedigree 0.72, pedigree (1,1,5,1,1)
  (same comment as for Titanium, ion)
- Selenium [water, ground-, long-term]: 5.74e-7 kg; lognormal variance with pedigree 1.92, pedigree (1,1,5,1,1)
  (same comment as for Titanium, ion)
- Strontium [air, non-urban air or from high stacks]: 1.25e-11 kg; lognormal variance with pedigree 2.83, pedigree (1,1,5,1,1)
  (same comment as for Barium)
- Vanadium, ion [water, ground-, long-term]: 8.13e-5 kg; lognormal variance with pedigree 1.25, pedigree (1,1,5,1,1)
  (same comment as for Titanium, ion)
- Beryllium [water, ground-, long-term]: 4.85e-7 kg; lognormal variance with pedigree 1.7, pedigree (1,1,5,1,1)
  (same comment as for Titanium, ion)
- Sodium [air, non-urban air or from high stacks]: 1.47e-8 kg; lognormal variance with pedigree 1.91, pedigree (1,1,5,1,1)
  (same comment as for Barium)
- Nitrate [water, surface water]: 8.56e-5 kg; lognormal variance with pedigree 0.57, pedigree (1,1,5,1,1)
  (same comment as for Titanium, ion)
- Zinc, ion [water, ground-, long-term]: 0.000689 kg; lognormal variance with pedigree 0.73, pedigree (1,1,5,1,1)
  (same comment as for Titanium, ion)
- Arsenic, ion [water, ground-, long-term]: 1.84e-6 kg; lognormal variance with pedigree 1.53, pedigree (1,1,5,1,1)
  (same comment as for Titanium, ion)
- Ammonia [air, urban air close to ground]: 4.33e-8 kg; lognormal variance with pedigree 0.61, pedigree (1,1,5,1,1)
  (same comment as for Titanium, ion)
- COD, Chemical Oxygen Demand [water, surface water]: 0.00016 kg; lognormal variance with pedigree 0.86, pedigree (1,1,5,1,1)
  (same comment as for Titanium, ion)
- Zinc, ion [water, surface water]: 1.22e-7 kg; lognormal variance with pedigree 1.48, pedigree (1,1,5,1,1)
  (same comment as for Titanium, ion)
- Iron, ion [water, surface water]: 2.52e-7 kg; lognormal variance with pedigree 1.44, pedigree (1,1,5,1,1)
  (same comment as for Titanium, ion)
- Nitrogen [water, surface water]: 6.37e-7 kg; lognormal variance with pedigree 0.58, pedigree (1,1,5,1,1)
  (same comment as for Titanium, ion)
- Cadmium [air, urban air close to ground]: 1.12e-12 kg; lognormal variance with pedigree 1.84, pedigree (1,1,5,1,1)
  (same comment as for Titanium, ion)
- Mercury [air, urban air close to ground]: 0 kg; pedigree (1,1,1,1,1)
  (same comment as for Titanium, ion)
- Tin, ion [water, surface water]: 6.26e-10 kg; lognormal variance with pedigree 2.21, pedigree (1,1,5,1,1)
  (same comment as for Titanium, ion)
- Aluminium [water, surface water]: 5.82e-9 kg; lognormal variance with pedigree 1.66, pedigree (1,1,5,1,1)
  (same comment as for Titanium, ion)
- Thallium [water, ground-, long-term]: 3.88e-7 kg; lognormal variance with pedigree 1.73, pedigree (1,1,5,1,1)
  (same comment as for Titanium, ion)
- Fluoride [water, surface water]: 1.05e-8 kg; lognormal variance with pedigree 1.95, pedigree (1,1,5,1,1)
  (same comment as for Sodium, ion)
- Bromine [water, surface water]: 2.22e-5 kg; lognormal variance with pedigree 0.97, pedigree (1,1,5,1,1)
  (same comment as for Sodium, ion)
- Bromine [water, ground-, long-term]: 0.00086 kg; lognormal variance with pedigree 0.71, pedigree (1,1,5,1,1)
  (same comment as for Titanium, ion)
- Carbon dioxide, fossil [air, non-urban air or from high stacks]: 0.0217 kg; lognormal variance with pedigree 0.41, pedigree (1,1,5,1,1)
  (same comment as for Barium)
- NMVOC, non-methane volatile organic compounds, unspecified origin [air, non-urban air or from high stacks]: 2.33e-8 kg; lognormal variance with pedigree 0.45, pedigree (1,1,5,1,1)
  (same comment as for Barium)
- Thallium [water, surface water]: 1.14e-10 kg; lognormal variance with pedigree 2.46, pedigree (1,1,5,1,1)
  (same comment as for Titanium, ion)
- Vanadium [air, non-urban air or from high stacks]: 7.36e-11 kg; lognormal variance with pedigree 2.6, pedigree (1,1,5,1,1)
  (same comment as for Barium)

## Sampling procedure
Landfill model based on observed leachate concentrations in literature. Extrapolated to 60'000 years heeding chemical characteristics. Initial waste composition from various literature sources.

## Extrapolations
This dataset has been extrapolated from year 2000 to the year of the calculation (2019). The uncertainty has been adjusted accordingly.

## Review by Niels Jungbluth 2003-07-21
Passed. Calculation for standard deviation 95 of, i.e., infrastructure,
land occupation, transport services or other services can differ from
standard Pedigree approach used in this project and figures obtained by
this procedure.
