# willow stem cutting production, for planting

Dataset: EcoSpold 2, unit process
Geography: RoW
Time period: 2005-01-01 to 2019-12-31
Technology level: current
Classification: ISIC rev.4 ecoinvent: 0130:Plant propagation
Scenario: Business-as-Usual
System model: Allocation at the point of substitution
Generated by: Julian Schnetzer
Published in: Hölscher T. 2007
Database: ecoinvent
isCopyrightProtected: true
accessRestrictedTo: 1

## General comment
This dataset represents the production of 1 piece of willow stem cutting. The moisture content at storage is 48%. The average weight of one piece is 20g (fresh matter). The yield is 100'000 stem cuttings per hectare.
This dataset has been copied from an original dataset covering the geography DE.

## Included activities start
This activity represents the production of 1 piece of stem cutting of willow for planting, based on the expenditures of willow growing during 1 season including the establishment and operation of the plantation. The inputs of mineral fertilisers, seed and pesticides are considered. It is assumed that no organic fertilisers are applied.

## Included activities end
The dataset includes all machine operations and corresponding machine infrastructure and sheds. Machine operations are: soil cultivation, planting, fertilisation, weed control, pest and pathogen control, harvest, transport of stem cuttings from field to farm (2 km), and storage in a cold storage house during 1.5 months. Further, direct field emissions are included. This activity ends after cold storage of stem cuttings at the farm gate.

## Technology
conventional production

## Reference product
- willow stem cutting, for planting: 1 unit; name REF_PRODUCT; ISIC rev.4 ecoinvent 012:Growing of perennial crops; CPC 86119: Other support services to crop production; By-product classification allocatable product
  production volume 8.90743e7 unit; = 1/0.060514624*5737500
    Global production volume was scaled from the respective German dataset. It is roughly assumed that Germany amounts for circa 6% of the Global GDP, as of 2005.
    Comment from the German dataset: Estimate based on the required stem cuttings supply for 425 ha (425 ha; pers. comm. T. Hering, Thüringer Landesanstalt für Landwirtschaft, 2011) at a planting density of 13500 stem cuttings per hectare.
  property energy content 0.199 MJ; name REF_PRODUCT_energy_content
    as gross calorific value (when relevant). "Willow" > gross calorific value in BIOBIB - A Database for biofuels (http://www.vt.tuwien.ac.at/biobib/biobib.html).
  property wet mass 0.02 kg; name REF_PRODUCT_WM
  property carbon content, non-fossil 0.48; name REF_PRODUCT_C_content_non_fossil
    biogene carbon content on a dry matter basis;BIOBIB - A Database for biofuels. http://www.vt.tuwien.ac.at/biobib/biobib.html.
  property water content 0.923077; name REF_PRODUCT_water_content; = REF_PRODUCT_WWM/ REF_PRODUCT_DM
  property water in wet mass 0.0096 kg; name REF_PRODUCT_WWM; = REF_PRODUCT_WM- REF_PRODUCT_DM
  property dry mass 0.0104 kg; name REF_PRODUCT_DM; = REF_PRODUCT_WM*0.52
  property price 0.05 EUR2005; name REF_PRODUCT_price_EUR2005
    Assumption, Price for willow stem is equal to price for miscanthus rhizome (per weight). The price for a rhizome lays between 0,15 and 0.20 EUR/rhizome. A rizhome weights around 70 g. A willow stem, around 20g. Information based on prices at producer in Germany (Fachagentur Nachwachsende Rohstoffe) http://www.bio-energie.de/heizen-mit-holz/miscanthus/
  property carbon content 0.48
    carbon content on a dry matter basis (reserved; not for manual entry)
  property true value 0.05; name REF_PRODUCT_true_value
    allocation property applied in "true value" allocation // value calculated from revenue
  properties: carbon allocation 0.004992 kg

## By-products
- heat, for reuse in municipal waste incineration only: 0 MJ; CPC 17300: Steam and hot water; By-product classification allocatable product; pedigree (1,1,1,1,1)
  Net useful heat generated from this waste and used in internal MSWI plant energy redistribution.
  Uncertainty: uncertainty is calculated from uncertainties in waste composition and uncertainties in energy efficiency and the uncertainty in internal energy demand
  production volume 2.03576e6 MJ
  property exergy 0.1842 MJ; name E_th_prod_MSWI_exergy
    This exergy property is based on the exergy content of the product.
  property true value relation 0.1842; name E_th_prod_MSWI_true_value_relation
    property to calculate "true value" from
  property price 0.0106 EUR2005; name E_th_prod_MSWI_price_EUR2005
    Average European district heat price from Ecoheatcool and Euroheat 2005-2006, Ecoheat Work package 1: The European heat market. Final report. 10.6 EUR/GJ i s the price of district heat. http://www.solarthermalworld.org/files/Ecoheatcool%20WP1%20Web.pdf?download
  property true value 0.000156456
    allocation property applied in "true value" allocation // value calculated from true value relation
- electricity, for reuse in municipal waste incineration only: 0 kWh; CPC 17100: Electrical energy; By-product classification allocatable product; pedigree (1,1,1,1,1)
  Net electricity generated from this waste and used in internal MSWI plant energy redistribution.
  Uncertainty: uncertainty is calculated from uncertainties in waste composition and uncertainties in energy efficiency and the uncertainty in internal energy demand
  production volume 226171 kWh
  property true value relation 3.6; name E_el_prod_MSWI_true_value_relation
    property to calculate "true value" from
  property exergy 3.6 MJ; name E_el_prod_MSWI_exergy
    This exergy property is based on the exergy content of the product.
  property price 0.1 EUR2005; name E_el_prod_MSWI_price_EUR2005
    Estimated to be the same price as in case of electricity, medium voltage.
  property true value 0.000339715
    (same comment as for heat, for reuse in municipal waste incineration only)
- zinc concentrate: 0 kg; CPC 14290: Other non-ferrous metal ores and concentrates (other than uranium or thorium ores and concentrates); By-product classification allocatable product
  Calculated value from the knowledge of the properties of both products.
  production volume 323.383 kg
  property price 0.38 EUR2005; name ByP_price_EUR2005
    Temporary price data. Calculated as 90% of purchasers price based on: Zinc content in concentrate 53%. Concentrate price per kg Zn 86.5% of refined Zn price (13.5% treatment charges according to CHR Metals Limited 2005: Dynamic cost curves. http://www.minecost.com/dynamic.pdf). 2004 zinc price from USGS (2007) Mineral commodity summaries 2007. <http://minerals.usgs.gov/minerals/pubs/mcs/2007/mcs2007.pdf> [Accessed 25 May 2010]
  property zinc content 0.53; name zinc_C_zinc_concentrate
    Zinc content on a dry matter basis. Value taken from teh "zinc mine operation" /GLO dataset.
  property dry mass 1 kg; name DM_zinc_concentrate
  property carbon content 0
    carbon content on a dry matter basis (reserved; not for manual entry)
  property true value 1.37958e-6
    allocation property applied in "true value" allocation // value calculated from revenue
  properties: wet mass 1 kg, water content 0, carbon content, non-fossil 0, carbon content, fossil 0, water in wet mass 0 kg, carbon allocation 0 kg
- biogas: 0 m3; source Raboni, Massimo 2014; By-product classification allocatable product; CPC 17200: Coal gas, water gas, producer gas and similar gases, other than petroleum gases and other gaseous hydrocarbons; pedigree (1,1,1,1,1)
  An average yield of 100 litres of biogas per kg biowaste is assumed
  production volume 77128.8 m3
  property carbon content, non-fossil 0.449939
    Total C content in kg/Nm3 (Tab 12.8, ecoinvent v2.2 report n17), referred to 1kg DM
  property price 0.109 EUR2005; name biogas_yield_price_EUR2005
    Temporary price data. Calculated as 90% of purchasers price based on: Same prices per energy output as natural gas, based on the proportional lower heating value (2/3 that of natural gas)
  property carbon content 0.449939
    carbon content on a dry matter basis (reserved; not for manual entry)
  property true value 9.43823e-5
    allocation property applied in "true value" allocation // value calculated from revenue
  properties: dry mass 1.15 kg, wet mass 1.15 kg, carbon content, fossil 0, water content 0, lower heating value 0 MJ/Nm3, water in wet mass 0 kg, carbon allocation 0.51743 kg
- compost: 0 kg; CPC 391: Wastes from food and tobacco industry; By-product classification allocatable product; pedigree (1,1,1,1,1)
  EcoSpold01Location=CH
  Biowaste is reduced in mass by a factor of 2 during composting
  production volume 713722 kg
  property nitrogen content 0.0136364; name Mass_compost_N_content; = Mass_biowaste_N_content/0.5*( DM_biowaste / DM_compost)
    nitrogen content on a dry matter basis
  property water in wet mass 0.472 kg; name Water_in_wet_mass_compost; = 1- DM_compost
  property price 0.03 EUR2005
    Temporary price data. Calculated as 90% of purchasers price based on: Estimation done using the following sources: <http://www.wmaa.asn.au/uploads/documents/MarkWinser_1May2007.pdf>; <http://www.swlf.ait.ac.th/UpdData/International/Composting%20and%20anaerobic%20digestion_%20comparions%20for%20Europe%20and%20Asia.pdf>; <http://www.epa.gov/osw/conserve/rrr/composting/basic.htm>, accessed 2011.06.16
  property carbon content, non-fossil 0.1165
    calculation: dry matter 50%, organic matter 40% of dry matter, C content calculated from organic matter divided by 1.72. Relative to dry matter; relative to fresh matter: divided by 2 => 0.1156
  property dry mass 0.528 kg; name DM_compost
  property water content 0.893939; name Water_content_compost; = Water_in_wet_mass_compost/DM_compost
  property concentration, cadmium 0 kg/kg; name Mass_compost_concentration_Cd; = Mass_biowaste_concentration_Cd*2
    Biowaste mass is reduced by a factor of two during composting, therefore concentration is doubled
  property humus equivalent 0.061 kg
    Humus building fraction expressed in kg per kg product on a FM basis. Humus denotes the converted, primary biomass from plants or animals in the ground. More information can be found in the documentation of the composting itself: "treatment of biowaste, industrial composting".
  property concentration, copper 0 kg/kg; name Mass_compost_concentration_Cu; = Mass_biowaste_concentration_Cu*2
    (same comment as for compost)
  property concentration, calcium 0 kg/kg; name Mass_compost_Ca_concentration; = Mass_biowaste_concentration_Ca*2
    (same comment as for compost)
  property concentration, magnesium 0 kg/kg; name Mass_compost_Mg_concentration; = Mass_biowaste_concentration_Mg*2
    (same comment as for compost)
  property concentration, mercury 0 kg/kg; name Mass_compost_Hg_concentration; = Mass_biowaste_concentration_Hg*2
    (same comment as for compost)
  property concentration, lead 0 kg/kg; name Mass_compost_concentration_Pb; = Mass_biowaste_concentration_Pb*2
    (same comment as for compost)
  property concentration, nickel 0 kg/kg; name Mass_compost_Ni_concentration; = Mass_biowaste_concentration_Ni*2
    (same comment as for compost)
  property concentration, phosphorus 0 kg/kg; name Mass_compost_P_concentration; = Mass_biowaste_concentration_P*2
    (same comment as for compost)
  property concentration, sulfur 0 kg/kg; name Mass_compost_concentration_S; = Mass_biowaste_concentration_S*2
    (same comment as for compost)
  property concentration, potassium 0 kg/kg; name Mass_compost_K_concentration; = Mass_biowaste_concentration_K*2
    (same comment as for compost)
  property nickel content 1.60606e-5; name Mass_compost_Ni_content; = Mass_biowaste_Ni_content/0.5*( DM_biowaste / DM_compost)
    nickel content on a dry matter basis
  property concentration, nitrogen 0 kg/kg; = Mass_biowaste_concentration_N*2
    (same comment as for compost)
  property concentration, zinc 0 kg/kg; name Mass_compost_concentration_Zn; = Mass_biowaste_concentration_Zn*2
    (same comment as for compost)
  property lead content 2.66667e-5; name Mass_compost_Pb_content; = Mass_biowaste_Pb_content/0.5*( DM_biowaste / DM_compost)
    lead content on a dry matter basis
  property copper content 3.81818e-5; name Mass_compost_Cu_content; = Mass_biowaste_Cu_content/0.5*( DM_biowaste / DM_compost)
    copper content on a dry matter basis
  property cadmium content 2.89394e-7; name Mass_compost_Cd_content; = Mass_biowaste_Cd_content/0.5*( DM_biowaste / DM_compost)
    cadmium content on a dry matter basis
  property magnesium content 0.00525758; name Mass_compost_Mg_content; = Mass_biowaste_Mg_content/0.5*( DM_biowaste / DM_compost)
    magnesium content on a dry matter basis
  property zinc content 0.000120303; name Mass_compost_Zn_content; = Mass_biowaste_Zn_content/0.5*( DM_biowaste / DM_compost)
    zinc content on a dry matter basis
  property potassium content 0.0099697; name Mass_compost_K_content; = Mass_biowaste_K_content/0.5*( DM_biowaste / DM_compost)
    potassium content on a dry matter basis
  property sulfur content 0.00190909; name Mass_compost_S_content; = Mass_biowaste_S_content/0.5*( DM_biowaste / DM_compost)
    sulfur content on a dry matter basis
  property calcium content 0.0504545; name Mass_compost_Ca_content; = Mass_biowaste_Ca_content/0.5*( DM_biowaste / DM_compost)
    calcium content on a dry matter basis
  property mercury content 1e-7; name Mass_compost_Hg_content; = Mass_biowaste_Hg_content/0.5*( DM_biowaste / DM_compost)
    mercury content on a dry matter basis
  property phosphorus content 0.00275758; name Mass_compost_P_content; = Mass_biowaste_P_content/0.5*( DM_biowaste / DM_compost)
    phosphorus content on a dry matter basis
  property carbon content 0.1165
    carbon content on a dry matter basis (reserved; not for manual entry)
  property true value 0.00024038
    allocation property applied in "true value" allocation // value calculated from revenue
  properties: carbon content, fossil 0, wet mass 1 kg, carbon allocation 0.061512 kg
- iron scrap, sorted, pressed: 0 kg; By-product classification Recyclable; CPC 39310: Slag, dross, scalings and other waste from the manufacture of iron or steel; pedigree (1,1,1,1,1)
  Iron scrap recovered from this waste.
  Uncertainty: uncertainty calculated from uncertainty in waste composition, uncertainty of share of recyclable metal, uncertainty of transfer coefficient to bottom ash, uncertainty of the efficiency of scrap removal in MSWI plant.
  production volume 0.256207 kg
  property price 0.175 EUR2005
    Temporary price data. Calculated as 90% of purchasers price based on: 2005 import and export prices (total trades (USD) divided by total weight (kg) in biggest economies of the world: EU27, USA, Brasil, China, India, Japan and Russia) from UN Commodity Trade Statistics Database (http://data.un.org/Explorer.aspxDatabase [Accessed 2011.06.20]). Commodity: Waste or scrap, of cast iron
  property carbon content 0
    carbon content on a dry matter basis (reserved; not for manual entry)
  property true value 5.03358e-10
    allocation property applied in "true value" allocation // value calculated from revenue
  properties: carbon content, fossil 0, dry mass 1 kg, carbon content, non-fossil 0, water in wet mass 0 kg, wet mass 1 kg, water content 0, carbon allocation 0 kg
- iron scrap, unsorted: 0 kg; source European Aluminium Association 2008; CPC 39310: Slag, dross, scalings and other waste from the manufacture of iron or steel; By-product classification Recyclable; pedigree (1,1,1,1,1)
  production volume 3.61404e-5 kg
  property price 0.149 EUR2005; name ironScrapAmount_price_EUR2005
    Temporary price data. Calculated as 90% of purchasers price based on: estimated at 85% of sorted scrap
  property carbon content 0
    carbon content on a dry matter basis (reserved; not for manual entry)
  property true value 6.04543e-14
    allocation property applied in "true value" allocation // value calculated from revenue
  properties: water in wet mass 0 kg, water content 0, carbon content, fossil 0, carbon content, non-fossil 0, dry mass 1 kg, wet mass 1 kg, carbon allocation 0 kg
- aluminium oxide, non-metallurgical: 0 kg; source European Aluminium Association 2008; CPC 41432: Alumina (aluminium oxide), except artificial corundum; By-product classification allocatable product; CAS 1344-28-1; pedigree (1,1,1,1,1)
  production volume 0.00227418 kg
  property carbon content, non-fossil 0; name C_content_non_fossil
  property price 0.28 EUR2005; name Al2O3Amount_price_EUR2005
    From UN trade database. http://data.un.org/ Import data from the largest economies of the world are used (Brazil, India, USA, China, Japan and EU-27).
  property dry mass 1 kg; name DM
  property water content 0; name water_content
  property wet mass 1 kg; name WM
  property water in wet mass 0 kg; name WWM
  property carbon content, fossil 0; name C_content_fossil
  property carbon content 0
    carbon content on a dry matter basis (reserved; not for manual entry)
  property true value 7.14875e-12
    allocation property applied in "true value" allocation // value calculated from revenue
  properties: carbon allocation 0 kg
- aluminium, cast alloy: 0 kg; source European Aluminium Association 2008; By-product classification allocatable product; CPC 41431: Unwrought aluminium; pedigree (1,1,1,1,1)
  EcoSpold01Location=RER
  production volume 0.0212585 kg
  property price 1.3 EUR2005; name castAlloyAmount_price_EUR2005
    Temporary price data. Calculated as 90% of purchasers price based on: Source: London Metal Exchange, Aluminium alloy price for 2005
  property carbon content 0
    carbon content on a dry matter basis (reserved; not for manual entry)
  property true value 3.10259e-10
    allocation property applied in "true value" allocation // value calculated from revenue
  properties: water in wet mass 0 kg, carbon content, non-fossil 0, water content 0, dry mass 1 kg, carbon content, fossil 0, wet mass 1 kg, carbon allocation 0 kg
- aluminium, wrought alloy: 0 kg; source European Aluminium Association 2008; By-product classification allocatable product; CPC 4153: Semi-finished products of aluminium or aluminium alloys; pedigree (1,1,1,1,1)
  production volume 0.00930658 kg
  property price 1.44 EUR2005; name secondaryAluminiumOutput_price_EUR2005
    Estimated based on literature values and expert judgement. Aluminium ccast alloys are about 90% of the price of aluminium wrought alloys.
  property carbon content 0
    carbon content on a dry matter basis (reserved; not for manual entry)
  property true value 1.50453e-10
    allocation property applied in "true value" allocation // value calculated from revenue
  properties: wet mass 1 kg, water content 0, carbon content, fossil 0, water in wet mass 0 kg, carbon content, non-fossil 0, dry mass 1 kg, carbon allocation 0 kg
- copper: 0 kg; source Rentz O. 1999; By-product classification allocatable product; CPC 41413: Refined copper and copper alloys, unwrought; master alloys of copper
  Literature value. Copper uses: Before end-use copper is manufactured into semi fabricated products, such as shapes and ingots (known as 'semis'). These manufacturing processes are subdivided into hot working, cold working and, if necessary, process annealing. Few of the semis are ready for use as such. They more typically travel to first-stage manufacturers, who make metal rods, wire, and casting, and then to component manufacturers who produce such things as motors, valves, and insulated cables The components in turn are incorporated by final-stage manufacturers into a variety of finished products - automobiles, commercial buildings, residential housing, and so forth. These uses account for about 79% of the world-wide consumption of copper.
  production volume 0.0024674 kg
  property price 5.52 EUR2005
    Literature value (http://www.economist.com/news/business/21576714-mining-industry-has-enriched-chile-its-future-precarious-copper-solution). Average price between 20015 and 2013.
  property carbon content 0
    carbon content on a dry matter basis (reserved; not for manual entry)
  property true value 1.52907e-10
    allocation property applied in "true value" allocation // value calculated from revenue
  properties: dry mass 1 kg, water in wet mass 0 kg, wet mass 1 kg, carbon content, non-fossil 0, water content 0, carbon content, fossil 0, carbon allocation 0 kg

## Inputs from technosphere
- chopping, maize: 9.83626e-6 ha; source Hölscher T. 2007; lognormal variance with pedigree 0.0412, pedigree (2,1,5,1,1)
  Approximation for the harvest of stem cuttings.
- biowaste: -0.0438845 kg; name BY_PRODUCT
  Waste (willow wood) from cuttings preparation. Total biomass exported is 6462 kg/ha (48% moisture content), cuttings biomass 2000 kg/ha, biowaste 4462 kg/ha.
  production volume 3.97405e6 kg; = BY_PRODUCT/ REF_PRODUCT* Ref('cb290af8-ccfd-4f26-a59d-6890d6db36ee', 'ProductionVolume')
    Calculated from production volume of reference product using the relative outputs.
  property carbon content, non-fossil 0.406; name BY_PRODUCT_C_content_non_fossil
  property water content 95.1538; name BY_PRODUCT_water_content
  property water in wet mass 0.9896 kg; name BY_PRODUCT_WWM
  property dry mass 0.0104 kg; name BY_PRODUCT_DM
  property energy content 0.199 MJ; name BY_PRODUCT_energy_content
  property price 0 EUR2005; name BY_PRODUCT_price_EUR2005
  property wet mass 1 kg; name BY_PRODUCT_WM
  note on carbon content, non-fossil: biogene carbon content on a dry matter basis;BIOBIB - A Database for biofuels. http://www.vt.tuwien.ac.at/biobib/biobib.html. Tab 12.2, ecoinvent v2.2 report 17. C content total=16.24%
  note on energy content: as gross calorific value (when relevant). "Willow" > gross calorific value in BIOBIB - A Database for biofuels (http://www.vt.tuwien.ac.at/biobib/biobib.html).
- building, hall, steel construction: 5.27224e-8 m2; source Hölscher T. 2007; lognormal variance with pedigree 0.3689, pedigree (5,5,5,3,4)
  Required infrastructure for cool house storage; estimated based on storage of potatoes ("potatoe seed production, Swiss integrated production, for setting"), scaled assuming a storage of 100000 pcst/ha during 1.5 months, in boxes of 40x40x60 cm3 à 1500 pcs, a stacking height of 6 m, and half of the area of the buliding being occupied by corridors.
- packaging, for pesticides: 4.5778e-5 kg; lognormal variance with pedigree 0.0912, pedigree (4,3,5,5,4)
  Total amount of active substance/s of pesticides needed for the production of willow stem cutting, for planting is calculated to be circa 2.33E-05 kg. Pesticide/s used in this dataset is/are: 'acetamide-anillide-compound, unspecified', 'glyphosate', 'pesticide, unspecified'. The total amount of active substance/s is doubled in order to account for the packaging of the dilluted product of pesticide/s that is/are applied. Therefore, 4.65E-05 kg of packaging for pesticides is justified with this exchange.
  properties: price 0.0642 EUR2005, carbon content, fossil 0.85714, wet mass 1 kg, dry mass 1 kg
- acetamide-anillide-compound, unspecified: 1.47544e-6 kg; source Hölscher T. 2007; lognormal variance with pedigree 0.0413, pedigree (2,2,5,1,1)
  Approximation for the input of the active ingredient diflufenican. Applied in the year of establishment fo the plantation.
  properties: dry mass 1 kg, wet mass 1 kg, carbon content, fossil 0.659175
  note on carbon content, fossil: Approximated as an unweighted average of the C-content of the acetamide-anillide-compound (Tab 2.25 Sutter, 2010) alachor, metolachlor, propachlor and teflubenzuron
- tillage, ploughing: 9.83626e-6 ha; source Hölscher T. 2007; lognormal variance with pedigree 0.0412, pedigree (2,1,5,1,1)
  One pass in the year of establishment.
- hoeing: 9.83626e-6 ha; source Hölscher T. 2007; lognormal variance with pedigree 0.0412, pedigree (2,1,5,1,1)
  One pass.
- willow stem cutting, for planting: 0.13279 unit; name SEED; source Hölscher T. 2007; lognormal variance with pedigree 0.0413, pedigree (2,2,5,1,1)
  13500 pcs/ha.
  property dry mass 0.0104 kg; name SEED_DM; = SEED_WM*0.52
  property water in wet mass 0.0096 kg; name SEED_WWM; = SEED_WM- SEED_DM
  property wet mass 0.02 kg; name SEED_WM
  property water content 0.923077; name SEED_water_content; = SEED_WWM/ SEED_DM
  property carbon content, non-fossil 0.48; name SEED_C_content_non_fossil
  note on carbon content, non-fossil: biogene carbon content on a dry matter basis;BIOBIB - A Database for biofuels. http://www.vt.tuwien.ac.at/biobib/biobib.html.
- transport, tractor and trailer, agricultural: 0.000127085 metric ton*km; source Hölscher T. 2007; lognormal variance with pedigree 0.1684, pedigree (4,1,5,1,1)
  Transport of harvested plant material from field to farm. Distance: 2 km.
- application of plant protection product, by field sprayer: 1.96725e-5 ha; source Hölscher T. 2007; lognormal variance with pedigree 0.0413, pedigree (2,2,5,1,1)
  Two passes in the year of establishment.
- potato planting: 9.83626e-6 ha; source Hölscher T. 2007; lognormal variance with pedigree 0.0412, pedigree (2,1,5,1,1)
  Approximation for planting of willow stem cuttings.
- electricity, low voltage: 0 kWh; source Hölscher T. 2007; pedigree (1,1,1,1,1)
  Required electricity for cool house storage; estimated based on storage of potatoes ("potatoe seed production, Swiss integrated production, for setting"), scaled assuming a storage of 100000 pcst/ha during 1.5 months, in boxes of 40x40x60 cm3 à 1500 pcs, a stacking height of 6 m, and half of the area of the buliding being occupied by corridors.
- glyphosate: 1.77249e-5 kg; source Hölscher T. 2007; lognormal variance with pedigree 0.0413, pedigree (2,2,5,1,1)
  Application before planting.
  properties: wet mass 1 kg, carbon content, fossil 0.214286, dry mass 1 kg
- pesticide, unspecified: 3.6886e-6 kg; source Hölscher T. 2007; lognormal variance with pedigree 0.0413, pedigree (2,2,5,1,1)
  Approximation of the input of the active ingretient flurtamone.
  properties: dry mass 1 kg, wet mass 1 kg, carbon content, fossil 0.486978
  note on carbon content, fossil: Mean of C content in all pesticides whose formula has been documented in Sutter 2010
- tillage, harrowing, by spring tine harrow: 1.96725e-5 ha; source Hölscher T. 2007; lognormal variance with pedigree 0.0412, pedigree (2,1,5,1,1)
  Two passes.
- electricity, low voltage: 1.19384e-7, 9.63254e-7, 3.15328e-6, 1.69541e-7, 1.14157e-6, 4.79169e-7, 4.23322e-7, 7.37779e-7, 7.87966e-7, 4.53425e-7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 kWh (46 entries); source Hölscher T. 2007; lognormal variance with pedigree 0.0906, pedigree (5,5,5,5,1)
  (same comment as for electricity, low voltage)

## Inputs from nature
- Transformation, from annual crop, non-irrigated, intensive [natural resource, land]: 0.0983626 m2; lognormal variance with pedigree 0.0429, pedigree (2,1,5,1,1)
  Modelled, see chapter 'Land use' in "01_crop production_direct field emissions and natural resources_v1.0.pdf" - pdf-document on the dedicated talk page of ecoinvent (www.ecoinvent.org/documentation)
- Carbon dioxide, in air [natural resource, in air]: 0.0162531 kg; = 44/12 * (REF_PRODUCT_C_content_non_fossil * REF_PRODUCT * REF_PRODUCT_DM + BY_PRODUCT_C_content_non_fossil * (BY_PRODUCT*-1) * BY_PRODUCT_DM - SEED_C_content_non_fossil * SEED * SEED_DM); lognormal variance with pedigree 0.0818, pedigree (2,2,5,1,1)
  Modelled, see chapter 'Release of fossil CO2 after urea applications' in "01_crop production_assessment methods of direct field emissions_v1.0.pdf" - pdf-document on the dedicated talk page of ecoinvent (www.ecoinvent.org/documentation)
- Transformation, to annual crop, non-irrigated, intensive [natural resource, land]: 0.0983626 m2; lognormal variance with pedigree 0.0429, pedigree (2,1,5,1,1)
  (same comment as for Transformation, from annual crop, non-irrigated, intensive)
- Occupation, annual crop, non-irrigated, intensive [natural resource, land]: 0.139594 m2*year; lognormal variance with pedigree 0.0429, pedigree (2,1,5,1,1)
  (same comment as for Transformation, from annual crop, non-irrigated, intensive)

## Emissions to nature
- Diflufenican [soil, agricultural]: 1.47544e-6 kg; lognormal variance with pedigree 0.049, pedigree (2,2,5,1,1)
  Modelled, see chapter 'Emissions of pesticides to agricultural soil' in "01_crop production_direct field emissions and natural resources_v1.0.pdf" - pdf-document on the dedicated talk page of ecoinvent (www.ecoinvent.org/documentation)
- Phosphate [water, surface water]: 7.48628e-6 kg; lognormal variance with pedigree 0.0818, pedigree (2,2,5,1,1)
  Modelled, see chapter 'Emissions of phosphorous to the water' in "01_crop production_direct field emissions and natural resources_v1.0.pdf" - pdf-document on the dedicated talk page of ecoinvent (www.ecoinvent.org/documentation)
- Phosphate [water, ground-]: 2.99455e-6 kg; lognormal variance with pedigree 0.0818, pedigree (2,2,5,1,1)
  (same comment as for Phosphate)
- Phosphorus [water, surface water]: 2.75081e-6 kg; lognormal variance with pedigree 0.0818, pedigree (2,2,5,1,1)
  (same comment as for Phosphate)
- Glyphosate [soil, agricultural]: 1.77249e-5 kg; lognormal variance with pedigree 0.049, pedigree (2,2,5,1,1)
  (same comment as for Diflufenican)
- Nitrate [water, ground-]: 0.00347535 kg; lognormal variance with pedigree 0.0818, pedigree (2,2,5,1,1)
  Modelled with the 'SALCA-NO3 model' described in "01_crop production_direct field emissions and natural resources_v1.0.pdf" - pdf-document on the dedicated talk page of ecoinvent (www.ecoinvent.org/documentation)
- Flurtamone [soil, agricultural]: 3.6886e-6 kg; lognormal variance with pedigree 0.049, pedigree (2,2,5,1,1)
  (same comment as for Diflufenican)
- Nitrogen oxides [air, non-urban air or from high stacks]: 1.94227e-6 kg; lognormal variance with pedigree 0.0818, pedigree (2,2,5,1,1)
  Modelled, see chapter 'Emissions of NOx to the air' in "01_crop production_direct field emissions and natural resources_v1.0.pdf" - pdf-document on the dedicated talk page of ecoinvent (www.ecoinvent.org/documentation)
- Dinitrogen monoxide [air, non-urban air or from high stacks]: 9.24874e-6 kg; lognormal variance with pedigree 0.0818, pedigree (2,2,5,1,1)
  Modelled, see chapter 'Emissions of N2O to the air' in "01_crop production_direct field emissions and natural resources_v1.0.pdf" - pdf-document on the dedicated talk page of ecoinvent (www.ecoinvent.org/documentation)

## Sampling procedure
The inventories were generated on the basis of data from the 'GruBE' project (Hölscher et al. 2007) and complemented with information from expert estimates, extension service documents and literature. The sources used in the project were KTBL (2006), Agrobränsle (2005), Hofmann (1998), Textor (2006) and personal communications from producers. --- Sources: Hölscher T., Deinmling S., Freiermuth Knuchel R., Gaillard G., Kägi T. & Müller-Sämann K. (2007) Energieoptionen aus landwirtschaftlicher Biomasse am Oberrhein - Auswirkungen für Landwirtschaft und Umwelt - Endbericht zum Projekt. Agentur für Nachhaltige Nutzung von Agrarlandschaften (ANNA). Müllheim, Germany. --- KTBL (2006) Energiepflanzen. Daten für die Planung des Energiepflanzenanbaus. Kuratorium für Technik und Bauwesen in der Landwirtschaft, Darmstadt, 372 p. --- Agrogbänsle (2005) Manual Salix viminalis. Ackerbauliche Informationen zum Weidenanbau. Informationsblatt der Firma Agrobränsle. Örebro, Sweden, 5 p. --- Hofmann M. (1998) Bewirtschaftung schnellwachsender Baumarten auf landwirtschaftlichen Flächen Kurzumtrieb. Merkblatt 11 des Forschungsinstituts für schnellwachsende Baumarten. Hann. Münden (ed.), 22 S. --- Textor B. (2006) Die Ernte forstlicher Rohstoffe auf landwirtschaftlichen Flächen im Kurzumtrieb. In: LAP, Landesanstalt für Pflanzenbau Forchheim (2006):Pflanzliche Rohstoffe zur
energetischen Nutzung. Workshop am 4.06.2006, Rheinstetten.

## Extrapolations
[This dataset has been copied from an original dataset covering the geography DE.] Electricity consumption and infrastructure for cold storage house were extrapolated from the dataset 'potato seed production, Swiss integrated production, for setting".
