# electricity production, hydro, reservoir, alpine region

Dataset: EcoSpold 2, unit process
Geography: BA
Time period: 1945-01-01 to 2019-12-31
Technology level: modern
Classification: ISIC rev.4 ecoinvent: 3510:Electric power generation, transmission and distribution
Tags: hydro power
Scenario: Business-as-Usual
System model: Allocation at the point of substitution
Generated by: Karin Treyer
Published in: Bolliger, R. 2007
Database: ecoinvent
isCopyrightProtected: true
accessRestrictedTo: 1

## General comment
This dataset represents the production of high voltage electricity at grid-connected reservoir hydropower plants in Bosnia Herzegovina in 2012. Here, the reservoir hydropower plants are modelled with alpine region plants based on data from Swiss hydropower plants. A representative sample of Swiss dams with a height of more than 30 metres is taken into account for calculating the input. Lifetime is assumed to be 150 years for the structural part and 80 years for the turbines. Net average electrical efficiency, including pipe losses, is 78% (best efficiency can be 84%).

## Included activities start
This dataset starts from the power plant ready to produce electricity, i.e. the reservoir filled with water

## Included activities end
This activity ends with 1kWh of high voltage electricity produced at the power plant and arrived at the busbar.

This dataset includes
- the area/volume occupied for the barrage, power station, and the lake
- a preliminary estimation of emissions of methane and dinitrogen oxide
- operation and maintenance activities and materials of the power plants, such as lubricating oil or mass of water passing through the turbines.

This dataset doesn't include
- land use for access roads to the reservoir
- emissions of carbon dioxide
- raw materials extraction, decommissioning and waste treatment as these activities are already included in the infrastructure datasets
- transformation of the electricity produced.

## Geography
Data were extrapolated from the average Swiss reservoir hydropower plant.

## Technology
Storage power plants have an appendant reservoir. The size of the reservoir can range from daily, monthly to annual storage reservoirs. According to the net head high-pressure, medium-pressure and low-pressure systems can be distinguished. High- and medium-pressure systems are constructed as dams. High-pressure storage power plants with a head of over 50 meters are very common in Switzerland. For this dataset concrete dams (arch dams and gravity dams) with a height of more then 30 meters are taken into account. Also pumped storage power plants are included because in most cases the data is only available for the overall generation system. The same counts for high- and medium-pressure and alpine run-of-river power plants which are also included in the storage power plant dataset. Due to the fact that the efforts for the plant construction are similar to storage power plants and that the estimated production is comparatively low, high- and medium-pressure run-of-river power plants are covered by the reservoir power station dataset.
The technology used in the dataset has an overall efficiency of 82%, more modern technologies show an overall efficiency of about 88%. The overall efficiency is composed of the efficiency of the works water channel, the turbine, the generator and the transformer and are listed below:
Efficiency of power plant current modern
Works water channel 0.95 0.95
Turbine 0.87 0.91
Generator 0.96 0.98
Transformer 0.98 0.99
Reservoir power plant total
without works water channel 0.82 0.88
with works water channel 0.78 0.84
Pumped storage power plant 0.70 0.74
The losses along the works water channel are primarily caused by friction and are calculated from the difference between gross and net head. Based on this calculation the efficiency of the works water channel amounts to 95%. The losses depend on the flow rate and have its maximum at full load. The smaller the cross section of adits and pressure pipelines, the higher the flow velocity and thus the friction losses. In older plants according to Bischof (1992) the efficiency of works water channels could be increased generally more than by replacing turbines and generators.
The efficiency losses in turbines depend on the turbine type (Kaplan, Francis, Pelton, etc.), the turbine output and on the ratio between turbined water amount and the rated water amount. In König (1997) examples for curve progressions of the relationship between these variables are shown. For current power plants an efficiency of 87% is assumed, more modern turbines show an efficiency of about 91%.
The efficiency of generators depends on the output, the rotation speed of the generator and the cooling system. Some relevant data can be found in König (1997). For today’s power plants an efficiency of approximately 96% is assumed, modern generators show an efficiency of about 98%. The efficiency of transformers amounts to 98%, respectively 99%.
References:
Bischof, R. (1992) Modernisierungspotential bei bestehenden Wasserkraftwerken. Vortrag beim Schweizerischen Technischen Verband, Sektion Graubünden, 21. Oktober 1992. Churwalden, Schweiz [unpublished].
König F., von (1985) Bau von Wasserkraftanlagen. C.F. Müller, Karlsruhe.

## Time period
The Annual Production Volume is valid for the year 2012.

## Parameters
- losses from gross electricity production: 0.01 dimensionless; name losses_gross_net; lognormal variance with pedigree 0.003225, pedigree (3,3,1,2,1)
  Literature value. Generic value taken from the IEA Electricity information 2014, part I, p. I.7: 'The difference between gross and net electricity production is generally observed to be about 7% for conventional thermal stations, 1% for hydro stations and 6% for nuclear.'
  IEA/OECD. 2014. Electricity Information 2014. International Energy Agency (IEA), Paris Cedex (FR).
  nan
  Uncertainty: Generic assumption
- gross electricity production: 1.47525e9 kWh; name gross_electricity; lognormal variance with pedigree 0.0019, pedigree (2,2,1,1,2)
  Literature value/statistics, extrapolation. Gross production of grid-connected electricity in reservoir hydropower plants (alpine region) in 2012. The IEA statistics only provide data for production of electricity with hydropower plants in general. The split into reservoir and run-of-river plants was made for all ecoinvent geographies based on Itten et al. 2014. The split of the total worldwide production was then made based on all these ecoinvent geographies.
  Itten R., Frischknecht R., Stucki M. 2014. Life Cycle Inventories of Electricity Mixes and Grid. Version 1.3. treeze, Uster, Switzerland
  IEA. 2014. Electricity Information 2014. ISBN 978-92-64-21692-1. International Energy Agency (IEA), Paris Cedex (FR).
  Uncertainty: Data for total electricity with reservoir and run-of-river hydropower plants had to be split into electricity from reservoir and run-of-river plants.
- lifetime: 150 year; lognormal variance with pedigree 0.0014, pedigree (2,2,1,3,1)
  Estimation based on experiences.
  nan

## Reference product
- electricity, high voltage: 1 kWh; CPC 17100: Electrical energy; By-product classification allocatable product
  production volume 1.4605e9 kWh; name apv_electricity; = gross_electricity*(1-losses_gross_net)
    Calculated value
  property price 0.0977 EUR2005
    Temporary price data. Calculated as 90% of purchasers price based on: 94% of the average price (to account for a 6% loss in transformation and transmission) for electricity for industrial consumersin 2005 (excluded taxes). From IEA.

## Inputs from technosphere
- hydropower plant, reservoir, alpine region: 0 unit; source Bolliger, R. 2007; uniform min 0, max 0, pedigree (1,1,3,1,1)
  Literature value/calculated value. The needed amount of infrastructure per kWh produced is calculated with the lifetime and the annual net energy production (16500GWh/a).
- hydropower plant, reservoir, alpine region: 4.0404e-13 unit; = 1/(150*16500000000); source Bolliger, R. 2007; lognormal variance with pedigree 0.003, pedigree (1,1,3,1,1)
  (same comment as for hydropower plant, reservoir, alpine region)
- lubricating oil: 7.56e-6 kg; name lubricating_oil; = 0.000009*0.84; source Vögtlin H. J. 2002, p. p.36 in Bolliger, Tab. 5.2; lognormal variance with pedigree 0.1001, pedigree (4,2,3,5,3)
  Estimation. Data for a run-of-river power station were overtaken.
  There, a consumption of lubricating oil for turbines of 9 liters per GWh is estimated. With an oil density of 0.84 kg/l this amounts to 0.007 g/kWh. The lubricating oil is in a closed loop system (i.e. cannot get into the turbined water system) and is disposed annualy as waste oil in a hazardous waste treatment plant.
  properties: wet mass 1 kg, carbon content, fossil 0.75, dry mass 1 kg
  note on carbon content, fossil: Lubricating oil is produced from diesel. C-content/dry mass of fats and oils considered 75%, from: ecoinvent v2.2 report, n 15a, pg 40
- waste mineral oil: -7.56e-6 kg; name waste_oil; = (lubricating_oil)*-1; lognormal variance with pedigree 0.1, pedigree (1,1,4,5,1)
  Estimation. This dataset is based on data of Swiss reservoir power plants. The lubricating oil is in a closed loop system (i.e. cannot get into the turbined water system) and is disposed annualy as waste oil in a hazardous waste treatment plant. The information given is based on own assumptions.
  production volume 11041.4 kg; = apv_electricity* waste_oil
    Calculated from the production volume of electricity, high voltage, hydro, reservoir, alpine region in proportion to the respective output amounts.
  property price 0 EUR2005; name waste_oil_price_EUR2005
  properties: dry mass 0.9 kg, water content 0.111111, carbon content, fossil 0.864444, wet mass 1 kg
  note on carbon content, fossil: Tab A.6, ecoinvent v2.2 report 13_I. C content has been calculated after data in the tables, and then referred to 1 kg DM

## Inputs from nature
- Transformation, from unspecified [natural resource, land]: 2.3e-5 m2; name transformation_from; lognormal variance with pedigree 0.164, pedigree (1,1,3,5,1)
  Estimation
- Transformation, to lake, artificial [natural resource, land]: 2.277e-5 m2; = transformation_from-transformation_to_industrial; lognormal variance with pedigree 0.164, pedigree (1,1,3,5,1)
  Estimation
- Occupation, lake, artificial [natural resource, land]: 0.00345 m2*year; = transformation_from*lifetime; lognormal variance with pedigree 0.074, pedigree (1,1,3,5,1)
  calculated value
- Transformation, to industrial area [natural resource, land]: 2.3e-7 m2; name transformation_to_industrial; = transformation_from*0.01; lognormal variance with pedigree 0.16, pedigree (4,1,3,5,3)
  Estimation. The area for the barrage and the power station are assumed to amount to 1% of the total land use. No land use for access roads was taken into account.
- Volume occupied, reservoir [natural resource, in water]: 0.15 m3*year; source BWW 1991, p. p.35 in Bolliger, Tab. 5.2; lognormal variance with pedigree 0.164, pedigree (1,1,3,5,1)
  Estimation based on Swiss reservoir volumes.
- Water, turbine use, unspecified natural origin [natural resource, in water]: 0.81 m3; name water_turbine_use_UNO_input; lognormal variance with pedigree 0.004, pedigree (1,1,3,5,1)
  Literature value/estimation. The specific turbine water amount is inversely proportional to the average head. A guidance value says that a hydropower plant can produce 1kWh of electricity with 1 m3 water over a head of 450 m. The ecological relevance of the turbine water amount is that it presents a demonstrative dimension of water being taken from natural water balance for a while.
- Energy, potential (in hydropower reservoir), converted [natural resource, in water]: 3.79 MJ
  Reflects range average to best performance.

## Emissions to nature
- Methane, non-fossil [air, non-urban air or from high stacks]: 1.4e-5 kg; = 40 / (20000000000/7000); lognormal variance with pedigree 0.1346, pedigree (4,4,3,5,2)
  Klimawirksamkeit. In: Gas - Wasser - Abwasser, 3/95 (1995), S. 224-234.
  Gross methane emissions of natural Swiss lakes are assumed to amount to 40 kg/ha*y (Egger 1995). Further assumptions are the total area of Swiss reservoir plants (7000 ha) and the electricity production of those plants as an average of the years 1991-2000 (20'000 GWh/y).
  It can be assumed the the actual methane emissions are lower than the resulting 0.014 g/kWh because of the high altitude of the reservoirs. There, only little biomass is flooded and the low temperatures constrain anaerobic degradation of the biomass.
  Egger K.W. (1995) Methanemissionen der Schweiz und deren
  Klimawirksamkeit. In: Gas - Wasser - Abwasser, 3/95 (1995), S. 224-234.
  Gross methane emissions of natural Swiss lakes are assumed to amount to 40 kg/ha*y (Egger 1995). Further assumptions are the total area of Swiss reservoir plants (7000 ha) and the electricity production of those plants as an average of the years 1991-2000 (20'000 GWh/y).
  It can be assumed the the actual methane emissions are lower than the resulting 0.014 g/kWh because of the high altitude of the reservoirs. There, only little biomass is flooded and the low temperatures constrain anaerobic degradation of the biomass.
  Egger K.W. (1995) Methanemissionen der Schweiz und deren
  Estimation. The emissions of methane are lower in alpine regions than in warmer regions. Total emissions of greenhouse gases are assumed to be 0.3 CO2equivalents per kWh. Methane emissions are a function of the flooded area, depth of the reservoir, flooded bimoass, surrounding temperature and climatic zone.
- Water [air, unspecified]: 0.0292217 m3; name water_to_air_unspecified; lognormal variance with pedigree 0.0427, pedigree (2,2,3,1,1)
  Calculated value based on literature values and expert opinion. See comments in the parametres' comment field.
  property fraction, origin: salt water 0; name fraction_origin_salt_water_Ww
  property fraction, origin: fresh water 1; name fraction_origin_fresh_water_Ww
  property fraction, origin: unspecified 0; name fraction_origin_unspecified_Ww
- Dinitrogen monoxide [air, non-urban air or from high stacks]: 7.7e-8 kg; source Dones R. 1996, p. p.37, Tab. 5.2, Tab. 4.3; lognormal variance with pedigree 0.13, pedigree (1,1,4,5,1)
  Estimation. Total emissions of greenhouse gases are assumed to be 0.3 CO2equivalents per kWh. Research projects in Swiss natural lakes had measurements of 8-16 micromol per m2 and day (brutto emissions). Because of the limited rates of nitrification and denitrification, a maximum of 0.24 to 2.4 micromol per m2 and Tag can be assumed for Swiss reservoir plants.
- Water [water, unspecified]: 0.780778 m3; name water_to_water_unspecified; = water_turbine_use_UNO_input-water_to_air_unspecified; lognormal variance with pedigree 0.098025, pedigree (4,4,4,2,4)
  (same comment as for Water)
  property fraction, origin: salt water 0; name fraction_origin_salt_water
  property fraction, origin: unspecified 0; name fraction_origin_unspecified
  property fraction, origin: fresh water 1; name fraction_origin_fresh_water

## Sampling procedure
literature

## Extrapolations
This dataset has been extrapolated from year 2015 to the year of the calculation (2019). The uncertainty has been adjusted accordingly.

## Review by Carl Vadenbo 2015-04-17
[This dataset has passed through a streamlined review processes where the underlying modelling of production volumes and technology shares was reviewed in detail prior to the datasets being submitted to the database.]
