# bulk lead-zinc concentrate to generic markets for zinc concentrate and lead concentrate

Dataset: EcoSpold 2, unit process
Geography: GLO
Time period: 2012-01-01 to 2019-12-31
Technology level: current
Classification: ISIC rev.4 ecoinvent: 0729:Mining of other non-ferrous metal ores
Scenario: Business-as-Usual
System model: Allocation at the point of substitution
Generated by: David FitzGerald
Database: ecoinvent
isCopyrightProtected: true
accessRestrictedTo: 1

## General comment
This is a linking activity which links the product bulk lead-zinc concentrate to the generic markets for zinc concentrate and lead concentrate. The bulk lead-zinc concentrate provides a function that is equivalent to a mix of zinc concentrate and lead concentrate.

## Included activities start
This activity starts with the reception of bulk lead-zinc concentrate, produced in a zinc mine.

## Included activities end
This activity ends with the supply of zinc concentrate and lead concentrate to their respective markets. As this is a linking activity, and therefore does not represent any actual activity in the real world, no other inputs or outputs are included.

## Reference product
- zinc concentrate: 1 kg; name zinc_conc_amount; = (bulk_conc_amount * bulk_conc_DM * bulk_conc_Zn_content)/(zinc_conc_DM * zinc_conc_Zn_content); CPC 14290: Other non-ferrous metal ores and concentrates (other than uranium or thorium ores and concentrates); By-product classification allocatable product
  The amount of zinc concentrate required to substitute the zinc contained in the bulk lead-zinc concentrate is calculated based on the zinc content and dry mass of both materials.
  production volume 1.68098e7 kg; name zinc_conc_PV; = zinc_conc_amount/abs(bulk_conc_amount) * 0.1 * 325172491
    10 percent of the annual production volume of bulk lead-zinc concentrate (produced in a zinc mine) is arbitrarily taken as the total annual amount of bulk lead-zinc concentrate that is substituted with zinc concentrate and lead concentrate.
  property price 0.38 EUR2005; name zinc_conc_amount_price_EUR2005
    Temporary price data. Calculated as 90% of purchasers price based on: Zinc content in concentrate 53%. Concentrate price per kg Zn 86.5% of refined Zn price (13.5% treatment charges according to CHR Metals Limited 2005: Dynamic cost curves. http://www.minecost.com/dynamic.pdf). 2004 zinc price from USGS (2007) Mineral commodity summaries 2007. <http://minerals.usgs.gov/minerals/pubs/mcs/2007/mcs2007.pdf> [Accessed 25 May 2010]
  property zinc content 0.59; name zinc_conc_Zn_content
    zinc content on a dry matter basis
  property dry mass 1 kg; name zinc_conc_DM
  property carbon content 0
    carbon content on a dry matter basis (reserved; not for manual entry)
  property true value 0.196441; name zinc_conc_amount_true_value
    allocation property applied in "true value" allocation // value calculated from revenue
  properties: carbon content, fossil 0, water content 0, wet mass 1 kg, carbon content, non-fossil 0, water in wet mass 0 kg, carbon allocation 0 kg

## By-products
- lead concentrate: 0 kg; name lead_conc_amount; = (bulk_conc_amount * bulk_conc_DM * bulk_conc_Pb_content)/(lead_conc_DM * lead_conc_Pb_content); By-product classification allocatable product; CPC 14290: Other non-ferrous metal ores and concentrates (other than uranium or thorium ores and concentrates)
  The amount of lead concentrate required to substitute the lead contained in the bulk lead-zinc concentrate is calculated based on the lead content and dry mass of both materials.
  production volume 1.08566e7 kg; = zinc_conc_PV * lead_conc_amount / abs(zinc_conc_amount)
    Calculated from the production volume of the reference product based on the relative output amounts.
  property price 0.376 EUR2005; name lead_conc_amount_price_EUR2005
    Temporary price data. Calculated as 90% of purchasers price based on: Lead content in concentrate 55%. Concentrate price per kg Pb 86.5% of refined Pb price (13.5% treatment charges according to CHR Metals Limited 2005: Dynamic cost curves. http://www.minecost.com/dynamic.pdf). 2004 lead price from USGS (2007) Mineral commodity summaries 2007. <http://minerals.usgs.gov/minerals/pubs/mcs/2007/mcs2007.pdf> [Accessed 25 May 2010]
  property dry mass 1 kg; name lead_conc_DM
  property lead content 0.62; name lead_conc_Pb_content
    lead content on a dry matter basis
  property carbon content 0
    carbon content on a dry matter basis (reserved; not for manual entry)
  property true value 0.125535; name lead_conc_amount_true_value
    allocation property applied in "true value" allocation // value calculated from revenue
  properties: carbon content, fossil 0, wet mass 1 kg, water in wet mass 0 kg, carbon content, non-fossil 0, water content 0, carbon allocation 0 kg

## Inputs from technosphere
- bulk lead-zinc concentrate: 1.18021 kg; name bulk_conc_amount
  property dry mass 1 kg; name bulk_conc_DM
  property lead content 0.207; name bulk_conc_Pb_content
  property zinc content 0.305; name bulk_conc_Zn_content
  properties: wet mass 1 kg
