# treatment of residue from mechanical treatment, desktop computer, municipal incineration with fly ash extraction

Dataset: EcoSpold 2, unit process
Geography: CH
Time period: 2006-01-01 to 2019-12-31
Technology level: current
Classification: ISIC rev.4 ecoinvent: 3821:Treatment and disposal of non-hazardous waste
Synonyms: Siedlungsabfallverbrennung; Kehrichtverbrennung; municipal waste incineration
Scenario: Business-as-Usual
System model: Allocation at the point of substitution
Share of production covered: 100 %
Generated by: Gabor Doka
Published in: Doka G. 2015
Database: ecoinvent
isCopyrightProtected: true
accessRestrictedTo: 1

## General comment
This dataset represents the activity of waste disposal of residue from mechanical treatment, desktop computer in a municipal solid waste incinerator (MSWI) // Recommended use of this dataset: Only for incineration of shredder residues generated in the recycling (mechanical treatment) of desktop computers // Inventoried waste contains 1.48% rubber; 36.3% Plastics from electronic consumer goods; 36.3% Plastics from electronic industrial goods; 12.4% MSWI iron scrap; 7.21% Alu in MSW; 2.98% Glass; 2.97% wiring copper; 0.218% Pb in ASR inert; 0.038% silver; . // Waste composition (wet, in ppm): upper heating value 26.8 MJ/kg; lower heating value 25.69 MJ/kg; H2O 7264.1; O 66883; H 55378; C 604770; S 403.51; N 9668.6; P 462.62; B n.a.; Cl 5359.8; Br 3998.3; F 181.74; I n.a.; Ag 379.62; As 5.4522; Ba 128.67; Cd 110.11; Co 21.429; Cr 195.94; Cu 33734; Hg 0.61793; Mn 302.43; Mo 2.1809; Ni 494.33; Pb 2339; Sb 3512; Se 1.4245; Sn 230.6; V 31.526; Zn 584.84; Be 0.33917; Sc n.a.; Sr 60.034; Ti 3254.6; Tl 0.27134; W n.a.; Si 16708; Fe 102190; Ca 4435.6; Al 74799; K 85.054; Mg n.a.; Na 2025.7; // Share of carbon in waste that is biogenic 0%. // Share of metals in waste not oxidised and bulk-recyclable (exclude very small or thin parts) Iron: 98.88%; Alu: 95.98%; Copper: 88.13%. // Recovery of metal scrap from bottom ash to recycling: 58.582g iron scrap, 22.162g aluminium scrap, 9.1459g copper scrap. From this waste, the FLUWA process in the technology mix recovers 0.00068kg (DM) of a hydroxide sludge to be recycled in zinc furnaces. // Ultimately one kg of this waste produces 0.2533 kg of bottom ash (can include some washed ash) and 0.008869 kg of residues, which are landfilled (technology mix). Additional solidification of residues with 0.003547 kg of cement.Net energy production: 3.22MJ/kg electric energy and 6.36MJ/kg thermal energy. //

## Included activities start
waste incineration from waste reception gate and delivery into waste bunker at incinerator plant site (without transports to the incinerator)

## Included activities end
Waste-specific short-term emissions to water from leachate. Long-term emissions from landfill to ground water.

## Geography
Specific to the technology mix encountered in Switzerland in 2012.

## Technology
average Swiss MSWI plants in 2010 (grate incinerators) with electrostatic precipitator for fly ash (ESP), wet flue gas scrubber and 25% SNCR , 42.77% SCR-high dust , 32.68% SCR-low dust -DeNOx facilities and 0% without Denox (weighted according to mass of burnt waste, representing Swiss average). Efficiency of iron scrap separation from slag : 58%. Efficiency of non-ferrous scrap separation from slag : 31%. The technology mix for this dataset includes a filter ash treatment (FLUWA) of a share of 46.22%. Gross electric efficiency technology mix 15.84% and Gross thermal efficiency technology mix 28.51%

## Time period
Waste composition as given in literature reference, theoretical data or other source. Transfer coefficients for modern MSWI.

## Reference product
- residue from mechanical treatment, desktop computer: 0 kg; CPC 39: Wastes or scraps; By-product classification Waste
  Main reference product of this activity (supply of disposal service).
  production volume 0 kg
    based on corresponding global production volume of MSW fraction in conventional MSWI (wo fly ash extraction) and scaled down to annual Swiss incinerated MSW mass of 3.02 mio. tonnes.
  property price 0 EUR2005
    Waste products are assigned a price of zero as they are assumed to require further treatment.
  property carbon content 0.6092
    carbon content on a dry matter basis (reserved; not for manual entry)
  properties: molybdenum content 2.1968e-6, copper content 0.033981, chlorine content 0.005399, chromium content 0.00019737, mercury content 6.2245e-7, cadmium content 0.00011092, manganese content 0.00030465, tin content 0.00023229, barium content 0.00012961, cobalt content 2.1586e-5, selenium content 1.435e-6, antimony content 0.0035377, nickel content 0.00049794, vanadium content 3.1757e-5, lead content 0.0023561, zinc content 0.00058912, iron content 0.10293, sodium content 0.0020405, aluminium content 0.075346, potassium content 8.5677e-5, silicon content 0.016831, titanium content 0.0032784, thallium content 2.7332e-7, calcium content 0.0044681, beryllium content 3.4166e-7, strontium content 6.0473e-5, water content 0.0073172, dry mass 0.99274 kg, carbon content, fossil 0.6092, oxygen content 0.067372, bromine content 0.0040275, wet mass 1 kg, water in wet mass 0.0072641 kg, silver content 0.0003824, phosphorus content 0.000466, fluorine content 0.00018307, arsenic content 5.4921e-6, nitrogen content 0.0097393, hydrogen content 0.055783, sulfur content 0.00040646, carbon allocation 0.604777 kg
- iron scrap, sorted, pressed: 1 kg; By-product classification Recyclable; CPC 39310: Slag, dross, scalings and other waste from the manufacture of iron or steel; pedigree (1,1,1,1,1)
  Iron scrap recovered from this waste.
  Uncertainty: uncertainty calculated from uncertainty in waste composition, uncertainty of share of recyclable metal, uncertainty of transfer coefficient to bottom ash, uncertainty of the efficiency of scrap removal in MSWI plant.
  production volume 135700 kg

## By-products
- electricity, for reuse in municipal waste incineration only: 0 kWh; name E_el_prod_MSWI; CPC 17100: Electrical energy; By-product classification allocatable product; pedigree (1,1,1,1,1)
  Net electricity generated from this waste and used in internal MSWI plant energy redistribution.
  Uncertainty: uncertainty is calculated from uncertainties in waste composition and uncertainties in energy efficiency and the uncertainty in internal energy demand
  production volume 0 kWh
    calculated in proportion to reference product waste input to incinerator
  property exergy 3.6 MJ; name E_el_prod_MSWI_exergy
    This exergy property is based on the exergy content of the product.
  property true value relation 3.6; name E_el_prod_MSWI_true_value_relation
    property to calculate "true value" from
  property price 0.1 EUR2005; name E_el_prod_MSWI_price_EUR2005
    Estimated to be the same price as in case of electricity, medium voltage.
- heat, for reuse in municipal waste incineration only: 0 MJ; name E_th_prod_MSWI; CPC 17300: Steam and hot water; By-product classification allocatable product; pedigree (1,1,1,1,1)
  Net useful heat generated from this waste and used in internal MSWI plant energy redistribution.
  Uncertainty: uncertainty is calculated from uncertainties in waste composition and uncertainties in energy efficiency and the uncertainty in internal energy demand
  production volume 0 MJ
    calculated in proportion to reference product waste input to incinerator
  property exergy 0.1842 MJ; name E_th_prod_MSWI_exergy
    This exergy property is based on the exergy content of the product.
  property true value relation 0.1842; name E_th_prod_MSWI_true_value_relation
    property to calculate "true value" from
  property price 0.0106 EUR2005; name E_th_prod_MSWI_price_EUR2005
    Average European district heat price from Ecoheatcool and Euroheat 2005-2006, Ecoheat Work package 1: The European heat market. Final report. 10.6 EUR/GJ i s the price of district heat. http://www.solarthermalworld.org/files/Ecoheatcool%20WP1%20Web.pdf?download
- iron scrap, sorted, pressed: 0 kg; By-product classification Recyclable; CPC 39310: Slag, dross, scalings and other waste from the manufacture of iron or steel; pedigree (1,1,1,1,1)
  (same comment as for iron scrap, sorted, pressed)
  production volume 0 kg
    calculated in proportion to reference product waste input to incinerator
  property price 0.175 EUR2005
    Temporary price data. Calculated as 90% of purchasers price based on: 2005 import and export prices (total trades (USD) divided by total weight (kg) in biggest economies of the world: EU27, USA, Brasil, China, India, Japan and Russia) from UN Commodity Trade Statistics Database (http://data.un.org/Explorer.aspxDatabase [Accessed 2011.06.20]). Commodity: Waste or scrap, of cast iron
  property carbon content 0
    carbon content on a dry matter basis (reserved; not for manual entry)
  properties: carbon content, non-fossil 0, water content 0, carbon content, fossil 0, dry mass 1 kg, wet mass 1 kg, water in wet mass 0 kg, carbon allocation 0 kg
- iron scrap, unsorted: 0 kg; source European Aluminium Association 2008; CPC 39310: Slag, dross, scalings and other waste from the manufacture of iron or steel; By-product classification Recyclable; pedigree (1,1,1,1,1)
  property price 0.149 EUR2005; name ironScrapAmount_price_EUR2005
    Temporary price data. Calculated as 90% of purchasers price based on: estimated at 85% of sorted scrap
  property carbon content 0
    carbon content on a dry matter basis (reserved; not for manual entry)
  properties: water in wet mass 0 kg, water content 0, carbon content, fossil 0, carbon content, non-fossil 0, dry mass 1 kg, wet mass 1 kg, carbon allocation 0 kg
- aluminium oxide, non-metallurgical: 0 kg; source European Aluminium Association 2008; CPC 41432: Alumina (aluminium oxide), except artificial corundum; By-product classification allocatable product; CAS 1344-28-1; pedigree (1,1,1,1,1)
  property carbon content, non-fossil 0; name C_content_non_fossil
  property price 0.28 EUR2005; name Al2O3Amount_price_EUR2005
    From UN trade database. http://data.un.org/ Import data from the largest economies of the world are used (Brazil, India, USA, China, Japan and EU-27).
  property dry mass 1 kg; name DM
  property water content 0; name water_content
  property wet mass 1 kg; name WM
  property water in wet mass 0 kg; name WWM
  property carbon content, fossil 0; name C_content_fossil
  property carbon content 0
    carbon content on a dry matter basis (reserved; not for manual entry)
  properties: carbon allocation 0 kg
- aluminium, cast alloy: 0 kg; source European Aluminium Association 2008; By-product classification allocatable product; CPC 41431: Unwrought aluminium; pedigree (1,1,1,1,1)
  EcoSpold01Location=RER
  property price 1.3 EUR2005; name castAlloyAmount_price_EUR2005
    Temporary price data. Calculated as 90% of purchasers price based on: Source: London Metal Exchange, Aluminium alloy price for 2005
  property carbon content 0
    carbon content on a dry matter basis (reserved; not for manual entry)
  properties: water in wet mass 0 kg, carbon content, non-fossil 0, water content 0, dry mass 1 kg, carbon content, fossil 0, wet mass 1 kg, carbon allocation 0 kg
- aluminium, wrought alloy: 0 kg; source European Aluminium Association 2008; By-product classification allocatable product; CPC 4153: Semi-finished products of aluminium or aluminium alloys; pedigree (1,1,1,1,1)
  property price 1.44 EUR2005; name secondaryAluminiumOutput_price_EUR2005
    Estimated based on literature values and expert judgement. Aluminium ccast alloys are about 90% of the price of aluminium wrought alloys.
  property carbon content 0
    carbon content on a dry matter basis (reserved; not for manual entry)
  properties: wet mass 1 kg, water content 0, carbon content, fossil 0, water in wet mass 0 kg, carbon content, non-fossil 0, dry mass 1 kg, carbon allocation 0 kg
- copper: 0 kg; source Rentz O. 1999; By-product classification allocatable product; CPC 41413: Refined copper and copper alloys, unwrought; master alloys of copper
  Literature value. Copper uses: Before end-use copper is manufactured into semi fabricated products, such as shapes and ingots (known as 'semis'). These manufacturing processes are subdivided into hot working, cold working and, if necessary, process annealing. Few of the semis are ready for use as such. They more typically travel to first-stage manufacturers, who make metal rods, wire, and casting, and then to component manufacturers who produce such things as motors, valves, and insulated cables The components in turn are incorporated by final-stage manufacturers into a variety of finished products - automobiles, commercial buildings, residential housing, and so forth. These uses account for about 79% of the world-wide consumption of copper.
  property price 5.52 EUR2005
    Literature value (http://www.economist.com/news/business/21576714-mining-industry-has-enriched-chile-its-future-precarious-copper-solution). Average price between 20015 and 2013.
  property carbon content 0
    carbon content on a dry matter basis (reserved; not for manual entry)
  properties: dry mass 1 kg, water in wet mass 0 kg, wet mass 1 kg, carbon content, non-fossil 0, water content 0, carbon content, fossil 0, carbon allocation 0 kg
- zinc concentrate: 0 kg; CPC 14290: Other non-ferrous metal ores and concentrates (other than uranium or thorium ores and concentrates); By-product classification allocatable product
  Calculated value from the knowledge of the properties of both products.
  property price 0.38 EUR2005; name ByP_price_EUR2005
    Temporary price data. Calculated as 90% of purchasers price based on: Zinc content in concentrate 53%. Concentrate price per kg Zn 86.5% of refined Zn price (13.5% treatment charges according to CHR Metals Limited 2005: Dynamic cost curves. http://www.minecost.com/dynamic.pdf). 2004 zinc price from USGS (2007) Mineral commodity summaries 2007. <http://minerals.usgs.gov/minerals/pubs/mcs/2007/mcs2007.pdf> [Accessed 25 May 2010]
  property zinc content 0.53; name zinc_C_zinc_concentrate
    Zinc content on a dry matter basis. Value taken from teh "zinc mine operation" /GLO dataset.
  property dry mass 1 kg; name DM_zinc_concentrate
  property carbon content 0
    carbon content on a dry matter basis (reserved; not for manual entry)
  properties: wet mass 1 kg, water content 0, carbon content, non-fossil 0, carbon content, fossil 0, water in wet mass 0 kg, carbon allocation 0 kg

## Inputs from technosphere
- cement, unspecified: 0 kg; pedigree (1,1,1,1,1)
  Cement required for solidification of landfilled residual material.
  Uncertainty: Uncertainty calculated from uncertainty of the waste composition of this waste, of transfer coefficients in the incinerator and of the solidification recipe.
  properties: wet mass 1 kg, dry mass 1 kg
- transport, freight, lorry, unspecified: 0 metric ton*km; pedigree (1,1,1,1,1)
  Transport services to transport incineration residues to landfills and filter ash to external treatments (FLUWA).
  Uncertainty: uncertainty calculated from uncertainty of the waste composition of this waste, uncertainty of transfer coefficients and the uncertainty in generic transportation distances
- waste cement, hydrated: 0 kg; pedigree (1,1,1,1,1)
  Hydrated cement output for solidification of landfilled residual material.
  Uncertainty: Uncertainty calculated from uncertainty of the waste composition of this waste and transfer coefficients in the incinerator and of the solidification recipe.
  production volume 0 kg
    calculated in proportion to reference product waste input to incinerator
  properties: dry mass 1 kg, wet mass 1 kg
- ammonia, liquid: 0 kg; pedigree (1,1,1,1,1)
  Input to DeNOx stage (100% NH3).
  Uncertainty: uncertainty calculated from uncertainty in average DeNOx input, uncertainty in the share of thermal NOx, uncertainty of nitrogen content in average municipal waste and the uncertainty in nitrogen content in *this* waste.
  properties: wet mass 1 kg, dry mass 1 kg
- heat, district or industrial, natural gas: 0 MJ; pedigree (1,1,1,1,1)
  Input to DeNOx stage, to heat up flue gas in low-dust SCR.
  Uncertainty: uncertainty calculated from uncertainty in average DeNOx input, uncertainty in the share of thermal NOx, uncertainty of nitrogen content in average municipal waste and the uncertainty in nitrogen content in *this* waste.
- spent activated carbon with mercury: 0 kg; pedigree (1,1,1,1,1)
  Spent ion exchanger charged with mercury, from FLUWA filter ash treatment, approximated here with Spent activated carbon with mercury, deposited undergound in a polyethylene Big Bag.
  Uncertainty: uncertainty calculated from uncertainty in of transfer coefficients in the incinerator, and the uncertainty of the waste composition of this waste.
  production volume 0 kg; = ABS(Ref('0423e508-6886-4d3b-88a8-abfa11018c95', 'ProductionVolume') * (Ref('1c047626-ad4f-49a4-ba4e-c9ffea648c48') / Ref('0423e508-6886-4d3b-88a8-abfa11018c95')))
    Calculated from production volume of reference product using the relative outputs.
  properties: wet mass 1 kg, carbon content, fossil 0.6, dry mass 1 kg
- titanium dioxide: 0 kg; pedigree (1,1,1,1,1)
  Input to DeNOx stage (TiO2 catalyst carrier)
  Uncertainty: uncertainty calculated from uncertainty in average DeNOx input, uncertainty in the share of thermal NOx, uncertainty of nitrogen content in average municipal waste and the uncertainty in nitrogen content in *this* waste.
  properties: dry mass 1 kg, wet mass 1 kg
- chromium oxide, flakes: 0 kg; pedigree (1,1,1,1,1)
  Input to DeNOx stage. Active component in SCR catalyst (vanadium pentoxide, V2O5), here approximated with the available chromium trioxide.
  Uncertainty: uncertainty calculated from uncertainty in average DeNOx input, uncertainty in the share of thermal NOx, uncertainty of nitrogen content in average municipal waste and the uncertainty in nitrogen content in *this* waste.
  properties: wet mass 1 kg, dry mass 1 kg
- hydrogen peroxide, without water, in 50% solution state: 0 kg; pedigree (1,1,1,1,1)
  Auxilliary oxidising agent for filter ash treatment (FLUWA).
  Uncertainty: uncertainty calculated from uncertainty in of transfer coefficients in the incinerator, and the uncertainty of the waste composition of this waste
  properties: dry mass 1 kg, wet mass 1 kg
- cationic resin: 0 kg; pedigree (1,1,1,1,1)
  Auxilliary input for mercury removal in filter ash treatment (FLUWA).
  Uncertainty: uncertainty calculated from uncertainty in of transfer coefficients in the incinerator, and the uncertainty of the waste composition of this waste
  properties: water content 1, wet mass 1 kg, dry mass 0.5 kg, carbon content, fossil 0.521606
- aluminium scrap, post-consumer, prepared for melting: 0 kg; pedigree (1,1,1,1,1)
  Aluminium scrap recovered from this waste.
  Uncertainty: uncertainty calculated from uncertainty in waste composition, uncertainty of share of recyclable metal, uncertainty of transfer coefficient to bottom ash, uncertainty of the efficiency of scrap removal in MSWI plant.
  production volume 0 kg
    calculated in proportion to reference product waste input to incinerator
  properties: dry mass 1 kg, price 0.806 EUR2005, wet mass 1 kg
- municipal waste incineration facility: 0 unit
  Demands per kilogram waste.
- water, decarbonised: 0 kg; pedigree (1,1,1,1,1)
  Incinerator process water used in flue gas scrubber stage.
  Uncertainty: uncertainty calculated from uncertainty in average water input, and the uncertainty of the waste composition of this waste
  properties: wet mass 1 kg
- copper scrap, sorted, pressed: 0 kg; pedigree (1,1,1,1,1)
  Copper scrap recovered from this waste.
  Uncertainty: uncertainty calculated from uncertainty in waste composition, uncertainty of share of recyclable metal, uncertainty of transfer coefficient to bottom ash, uncertainty of the efficiency of scrap removal in MSWI plant.
  production volume 0 kg
    calculated in proportion to reference product waste input to incinerator
  properties: wet mass 1 kg, dry mass 1 kg, price 2.84 EUR2005
- process-specific burdens, slag landfill: 0 kg; pedigree (1,1,1,1,1)
  Mass-specific expenditures required for landfilling of bottom ash.;activityLink introduced to establish a direct link to the corresponding regional supply of this product
  Uncertainty: uncertainty is calculated from uncertainties in waste composition and transfer coefficients in incinerator
- metalliferous hydroxide sludge: 0 kg; pedigree (1,1,1,1,1)
  Metalliferous hydroxide sludge from filter ash leaching (FLUWA).
  Uncertainty: uncertainty is calculated from uncertainties in waste composition and transfer coefficients to filter ash in incinerator and the uncertainty of the transfer coefficients of the FLUWA process.
  production volume 0 kg
    calculated in proportion to reference product waste input to incinerator
  properties: water content 3, carbon content, fossil 0.046248, dry mass 0.25 kg, wet mass 1 kg, chlorine content 0.17415, oxygen content 0.32321, bromine content 0.1161, sulfur content 0.027969, cadmium content 0.054867, antimony content 0.055615, zinc content 0.14459, calcium content 0.033552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
- slag landfill: 0 unit; pedigree (1,1,1,1,1)
  Landfill infrastructure required for landfilling of bottom ash.
  Uncertainty: uncertainty is calculated from uncertainties in waste composition and transfer coefficients in incinerator
- sodium hydroxide, without water, in 50% solution state: 0 kg; pedigree (1,1,1,1,1)
  Auxilliary inputs for the flue gas treatment stage of the incinerator plant, and partially in the filter ash treatment (FLUWA).
  Uncertainty: uncertainty calculated from uncertainty in average NaOH input, of transfer coefficients in the incinerator, and the uncertainty of the waste composition of this waste
  properties: wet mass 1 kg, dry mass 1 kg
- residual material landfill: 0 unit; pedigree (1,1,1,1,1)
  Landfill infrastructure required for landfilling of incineration residues.
  Uncertainty: uncertainty is calculated from uncertainties in waste composition and transfer coefficients in incinerator
- quicklime, milled, packed: 0 kg; pedigree (1,1,1,1,1)
  Auxilliary inputs for the flue gas treatment stage of the incinerator plant.
  Uncertainty: uncertainty calculated from uncertainty in average CaO input, of transfer coefficients in the incinerator, and the uncertainty of the waste composition of this waste
  properties: wet mass 1 kg, dry mass 0.99 kg, water content 0.010101
- process-specific burdens, residual material landfill: 0 kg; pedigree (1,1,1,1,1)
  Mass-specific expenditures required for landfilling of incineration residues.;activityLink introduced to establish a direct link to the corresponding regional supply of this product
  Uncertainty: uncertainty is calculated from uncertainties in waste composition and transfer coefficients in incinerator
- hydrochloric acid, without water, in 30% solution state: 0 kg; pedigree (1,1,1,1,1)
  Auxilliary inputs for the wastewater treatment stage of the incinerator plant.
  Uncertainty: uncertainty calculated from uncertainty in average HCl input, of transfer coefficients in the incinerator, and the uncertainty of the waste composition of this waste
  properties: dry mass 1 kg, wet mass 1 kg
- iron (III) chloride, without water, in 40% solution state: 0 kg; pedigree (1,1,1,1,1)
  Auxilliary inputs for the wastewater treatment stage of the incinerator plant.
  Uncertainty: uncertainty calculated from uncertainty in average FeCl3 input, of transfer coefficients in the incinerator, and the uncertainty of the waste composition of this waste
  properties: dry mass 1 kg, wet mass 1 kg
- chemical, organic: 0 kg; pedigree (1,1,1,1,1)
  Auxilliary inputs for the wastewater treatment stage of the incinerator plant. Proxy for (pure) Trisodium-trimercapto-s-triazine (CAS 17766-26-6), used as 15% diluted solution, aka TMT15.
  Uncertainty: uncertainty calculated from uncertainty in average TMT15 input, of transfer coefficients in the incinerator, and the uncertainty of the waste composition of this waste
  properties: wet mass 1 kg, carbon content, fossil 0.628, dry mass 1 kg
- chemical, inorganic: 0 kg; pedigree (1,1,1,1,1)
  Auxilliary inputs for the wastewater treatment stage of the incinerator plant. Proxy for Polyelectrolyte.
  Uncertainty: uncertainty calculated from uncertainty in average Polyelectrolyte input, of transfer coefficients in the incinerator, and the uncertainty of the waste composition of this waste
  properties: carbon content, fossil 0.003, wet mass 1 kg, dry mass 1 kg
- printed wiring board, mounted mainboard, desktop computer, Pb containing: 5.0777e-5 kg; lognormal variance with pedigree 0.0701, pedigree (1,4,5,3,3)
  EcoSpold01Location=GLO
  Measured Value.
- steel, chromium steel 18/8, hot rolled: 1.07764e-5 kg; lognormal variance with pedigree 0.0701, pedigree (1,4,5,3,3)
  Measured Value.
  EcoSpold01Location=RER
- printed wiring board, surface mounted, unspecified, Pb free: 4.79246e-5 kg; lognormal variance with pedigree 0.0701, pedigree (1,4,5,3,3)
  Measured Value. This original value from production mix has been replaced by 2 flows. Pb-containing has a share of 0.3, Pb-free has a share of 0.7.
- printed wiring board, for surface mounting, Pb containing surface: 1.31337e-6 m2; lognormal variance with pedigree 0.0701, pedigree (1,4,5,3,3)
  Measured Value.
  This original value from production mix has been replaced by 2 flows. Each has 50% share in the production mix.
- disk drive, CD/DVD, ROM, for desktop computer: 0.000336762 unit; lognormal variance with pedigree 0.0701, pedigree (1,4,5,3,3)
  EcoSpold01Location=GLO
  Measured Value.
- cable, network cable, category 5, without plugs: 0.00101029 m; lognormal variance with pedigree 0.0701, pedigree (1,4,5,3,3)
  EcoSpold01Location=GLO
  Measured Value.
- sheet rolling, steel: 0.00209207 kg; lognormal variance with pedigree 0.0701, pedigree (1,4,5,3,3)
  EcoSpold01Location=RER
  Measured Value.
- acrylonitrile-butadiene-styrene copolymer: 1.07427e-5 kg; lognormal variance with pedigree 0.0701, pedigree (1,4,5,3,3)
  Measured Value.
  EcoSpold01Location=RER
- powder coat, steel: 0.00013393 m2; lognormal variance with pedigree 0.0701, pedigree (1,4,5,3,3)
  Measured Value.
  EcoSpold01Location=RER
- steel, low-alloyed, hot rolled: 0.00209207 kg; lognormal variance with pedigree 0.0701, pedigree (1,4,5,3,3)
  EcoSpold01Location=RER
  Measured Value.
- plug, inlet and outlet, for network cable: 0.000336762 unit; lognormal variance with pedigree 0.0701, pedigree (1,4,5,3,3)
  EcoSpold01Location=GLO
  Measured Value.
- electricity, medium voltage: 0.000916465 kWh; source Stachura 2006; lognormal variance with pedigree 0.0701, pedigree (1,4,5,3,3)
  EcoSpold01Location=UCTE
  Estimation, based on literature, OGIP basic datasheet and own calculations.
- battery, Li-ion, rechargeable, prismatic: 9.76611e-7 kg; lognormal variance with pedigree 0.0701, pedigree (1,4,5,3,3)
  EcoSpold01Location=GLO
  Measured Value.
- polymer foaming: 5.3882e-5 kg; source Atlantic Consulting 1998; lognormal variance with pedigree 0.0701, pedigree (1,4,5,3,3)
  Literature Value.
  EcoSpold01Location=RER
- aluminium, cast alloy: 2.94605e-6 kg; lognormal variance with pedigree 0.0701, pedigree (1,4,5,3,3)
  Measured Value.
  EcoSpold01Location=RER
- printed wiring board, surface mounted, unspecified, Pb containing: 2.05391e-5 kg; lognormal variance with pedigree 0.0701, pedigree (1,4,5,3,3)
  (same comment as for printed wiring board, surface mounted, unspecified, Pb free)
- hot rolling, steel: 1.07764e-5 kg; lognormal variance with pedigree 0.0701, pedigree (1,4,5,3,3)
  Measured Value.
  EcoSpold01Location=RER
- power supply unit, for desktop computer: 0.000336762 unit; lognormal variance with pedigree 0.0701, pedigree (1,4,5,3,3)
  EcoSpold01Location=CN
  Measured Value.
- integrated circuit, memory type: 5.05143e-6 kg; lognormal variance with pedigree 0.0701, pedigree (1,4,5,3,3)
  EcoSpold01Location=GLO
  Measured Value.
- copper: 2.10392e-5 kg; lognormal variance with pedigree 0.0701, pedigree (1,4,5,3,3)
  EcoSpold01Location=RER
  Measured Value.
- section bar extrusion, aluminium: 0.000132866 kg; lognormal variance with pedigree 0.0701, pedigree (1,4,5,3,3)
  Measured Value.
  EcoSpold01Location=RER
- aluminium, wrought alloy: 0.000129919 kg; lognormal variance with pedigree 0.0701, pedigree (1,4,5,3,3)
  Measured Value.
  EcoSpold01Location=RER
- polypropylene, granulate: 6.89016e-5 kg; source Atlantic Consulting 1998; lognormal variance with pedigree 0.0701, pedigree (1,4,5,3,3)
  EcoSpold01Location=RER
  Measured and literature Value.
  Further references:
  Hewlett Packard (2002) Environmental Profile: Embedded & Personal Systems. Download of 070213 from <http://www.hp.com/hpinfo/globalcitizenship/environment/productdata/edsembedded--.html>.
- hard disk drive, for desktop computer: 0.000336762 unit; lognormal variance with pedigree 0.0701, pedigree (1,4,5,3,3)
  Measured Value.
  EcoSpold01Location=GLO
- plug, inlet and outlet, for computer cable: 0.000336762 unit; lognormal variance with pedigree 0.0701, pedigree (1,4,5,3,3)
  Measured Value.
  EcoSpold01Location=GLO
- cable, ribbon cable, 20-pin, with plugs: 1.70402e-5 kg; lognormal variance with pedigree 0.0701, pedigree (1,4,5,3,3)
  Measured Value.
  EcoSpold01Location=GLO
- printed wiring board, for surface mounting, Pb free surface: 1.31337e-6 m2; lognormal variance with pedigree 0.0701, pedigree (1,4,5,3,3)
  (same comment as for printed wiring board, for surface mounting, Pb containing surface)
- photovoltaic cell factory: 4.49005e-12 unit; lognormal variance with pedigree 0.3701, pedigree (1,4,5,3,3)
  EcoSpold01Location=DE
  Proxy, due to a lack of data of the infrastructure for the computer production the photovoltaic cell factory was used. It was assumed a life-time of 25 years, and a annual production volume of 3’000’000 pieces.
- cable, connector for computer, without plugs: 0.000841906 m; lognormal variance with pedigree 0.0701, pedigree (1,4,5,3,3)
  EcoSpold01Location=GLO
  Measured Value.
- stretch blow moulding: 3.4178e-5 kg; lognormal variance with pedigree 0.0701, pedigree (1,4,5,3,3)
  Measured Value.
  EcoSpold01Location=RER
- tap water: 0.545555 kg; source Fujitsu L. 2003; lognormal variance with pedigree 0.0701, pedigree (1,4,5,3,3)
  Estimation, based on literature.
  EcoSpold01Location=RER
- polyethylene, high density, granulate: 8.41569e-6 kg; lognormal variance with pedigree 0.0701, pedigree (1,4,5,3,3)
  Measured Value.
  EcoSpold01Location=RER
- wire drawing, copper: 2.10392e-5 kg; lognormal variance with pedigree 0.0701, pedigree (1,4,5,3,3)
  EcoSpold01Location=RER
  Measured Value.
- used desktop computer: -0.00380541 kg; lognormal variance with pedigree 0.0701, pedigree (1,4,5,3,3)
  Measured Value.
  EcoSpold01Location=CH
  production volume 11.3 kg
- corrugated board box: 0.000152282, 6.80865e-6, 0.000578419 kg (3 suppliers, which the file names only by identifier); sum of these 0.000737509 kg; source Atlantic Consulting 1998; lognormal variance with pedigree 0.0701, pedigree (1,4,5,3,3)
  Literature Value.
  EcoSpold01Location=RER
- waste polypropylene: -5.18639e-6, -3.9984e-7, -1.65148e-7, -1.56824e-7, -5.98419e-6, -6.67181e-8, -3.02393e-8, -4.18926e-5 kg (8 suppliers, which the file names only by identifier); sum of these -5.3882e-5 kg; source Atlantic Consulting 1998; lognormal variance with pedigree 0.0701, pedigree (1,4,5,3,3)
  Literature Value. Disposed of via a municipal incineration plant.
  EcoSpold01Location=CH
  production volume 0.16 kg
- wastewater, unpolluted: -4.36444e-6, -0.00054119 m3 (2 suppliers, which the file names only by identifier); sum of these -0.000545555 m3; source Fujitsu L. 2003; lognormal variance with pedigree 0.0701, pedigree (1,4,5,3,3)
  EcoSpold01Location=CH
  Estimation, based on literature.
  production volume 1.62 m3

## Inputs from nature
- Oxygen [natural resource, in air]: 0 kg; pedigree (1,1,1,1,1)
  Oxygen from ambient air needed to combust and oxidise this waste. Net demand, i.e. without O2 leaving the plant in flue gas uncombusted.
  Uncertainty: uncertainty is calculated from uncertainties in waste composition and transfer coefficients to flue gas and soild residues in incinerator

## Emissions to nature
- Strontium [air, urban air close to ground]: 0 kg; pedigree (1,1,1,1,1)
  Emission to air from waste composition and transfer coefficients.
  Uncertainty: uncertainty is calculated from uncertainties in waste composition and transfer coefficients in incinerator
- Iron, ion [water, ground-, long-term]: 0 kg; pedigree (1,1,1,1,1)
  Long-term emissions from landfilling of incineration residues.
  Uncertainty: uncertainty is calculated from uncertainties in waste composition and transfer coefficients in incinerator and landfills.
- Dioxins, measured as 2,3,7,8-tetrachlorodibenzo-p-dioxin [air, urban air close to ground]: 0 kg; pedigree (1,1,1,1,1)
  Incomplete combustion product emitted to air.
  Uncertainty: uncertainty calculated from uncertainty in average operation emissions, and the uncertainty of the flue gas volume from this waste.
- Silicon [water, surface water]: 0 kg; pedigree (1,1,1,1,1)
  Emissions to water from waste composition and transfer coefficients in incinerator and landfills.
  Uncertainty: uncertainty is calculated from uncertainties in waste composition and transfer coefficients in incinerator and landfills
- Titanium [air, urban air close to ground]: 0 kg; pedigree (1,1,1,1,1)
  (same comment as for Strontium)
- Calcium, ion [water, ground-, long-term]: 0 kg; pedigree (1,1,1,1,1)
  (same comment as for Iron, ion)
- Toluene [air, urban air close to ground]: 0 kg; pedigree (1,1,1,1,1)
  (same comment as for Dioxins, measured as 2,3,7,8-tetrachlorodibenzo-p-dioxin)
- Calcium, ion [water, surface water]: 0 kg; pedigree (1,1,1,1,1)
  (same comment as for Silicon)
- Thallium [air, urban air close to ground]: 0 kg; pedigree (1,1,1,1,1)
  (same comment as for Strontium)
- Aluminium [water, ground-, long-term]: 0 kg; pedigree (1,1,1,1,1)
  (same comment as for Iron, ion)
- Benzene, pentachloro- [air, urban air close to ground]: 0 kg; pedigree (1,1,1,1,1)
  (same comment as for Dioxins, measured as 2,3,7,8-tetrachlorodibenzo-p-dioxin)
- Iron, ion [water, surface water]: 0 kg; pedigree (1,1,1,1,1)
  (same comment as for Silicon)
- Silicon [air, urban air close to ground]: 0 kg; pedigree (1,1,1,1,1)
  (same comment as for Strontium)
- Potassium, ion [water, ground-, long-term]: 0 kg; pedigree (1,1,1,1,1)
  (same comment as for Iron, ion)
- Benzene, hexachloro- [air, urban air close to ground]: 0 kg; pedigree (1,1,1,1,1)
  (same comment as for Dioxins, measured as 2,3,7,8-tetrachlorodibenzo-p-dioxin)
- Aluminium [water, surface water]: 0 kg; pedigree (1,1,1,1,1)
  (same comment as for Silicon)
- Iron [air, urban air close to ground]: 0 kg; pedigree (1,1,1,1,1)
  (same comment as for Strontium)
- Sodium, ion [water, ground-, long-term]: 0 kg; pedigree (1,1,1,1,1)
  (same comment as for Iron, ion)
- Phenol, pentachloro- [air, urban air close to ground]: 0 kg; pedigree (1,1,1,1,1)
  (same comment as for Dioxins, measured as 2,3,7,8-tetrachlorodibenzo-p-dioxin)
- Sodium, ion [water, surface water]: 0 kg; pedigree (1,1,1,1,1)
  (same comment as for Silicon)
- Calcium [air, urban air close to ground]: 0 kg; pedigree (1,1,1,1,1)
  (same comment as for Strontium)
- NMVOC, non-methane volatile organic compounds, unspecified origin [air, urban air close to ground]: 0 kg; pedigree (1,1,1,1,1)
  (same comment as for Dioxins, measured as 2,3,7,8-tetrachlorodibenzo-p-dioxin)
- Benzo(a)pyrene [air, urban air close to ground]: 0 kg; pedigree (1,1,1,1,1)
  (same comment as for Dioxins, measured as 2,3,7,8-tetrachlorodibenzo-p-dioxin)
- Potassium, ion [water, surface water]: 0 kg; pedigree (1,1,1,1,1)
  (same comment as for Silicon)
- Aluminium [air, urban air close to ground]: 0 kg; pedigree (1,1,1,1,1)
  (same comment as for Strontium)
- Particulates, < 2.5 um [air, urban air close to ground]: 0 kg; pedigree (1,1,1,1,1)
  (same comment as for Dioxins, measured as 2,3,7,8-tetrachlorodibenzo-p-dioxin)
- Heat, waste [water, surface water]: 0 MJ; pedigree (1,1,1,1,1)
  Waste heat generated from heating value of this waste plus any electricity required to process it.
  Uncertainty: uncertainty is calculated from uncertainties in waste composition and uncertainties in energy efficiency and the uncertainty in internal energy demand
- Chromium, ion [water, surface water]: 0 kg; pedigree (1,1,1,1,1)
  (same comment as for Silicon)
- Potassium [air, urban air close to ground]: 0 kg; pedigree (1,1,1,1,1)
  (same comment as for Strontium)
- Particulates, > 2.5 um, and < 10um [air, urban air close to ground]: 0 kg; pedigree (1,1,1,1,1)
  (same comment as for Dioxins, measured as 2,3,7,8-tetrachlorodibenzo-p-dioxin)
- Heat, waste [air, urban air close to ground]: 0 MJ; pedigree (1,1,1,1,1)
  (same comment as for Heat, waste)
- DOC, Dissolved Organic Carbon [water, ground-, long-term]: 0 kg; pedigree (1,1,1,1,1)
  (same comment as for Iron, ion)
- BOD5, Biological Oxygen Demand [water, surface water]: 0 kg; pedigree (1,1,1,1,1)
  (same comment as for Silicon)
- Water [air, urban air close to ground]: 0 m3; pedigree (1,1,1,1,1)
  Water vapour from waste humidity, hydrogen oxidation and part of the process water.
  Uncertainty: Uncertainty calculated from uncertainty in waste composition, process water input and the uncertainty of fraction to air.
- BOD5, Biological Oxygen Demand [water, ground-, long-term]: 0 kg; pedigree (1,1,1,1,1)
  (same comment as for Iron, ion)
- Sodium [air, urban air close to ground]: 0 kg; pedigree (1,1,1,1,1)
  (same comment as for Strontium)
- COD, Chemical Oxygen Demand [water, ground-, long-term]: 0 kg; pedigree (1,1,1,1,1)
  (same comment as for Iron, ion)
- COD, Chemical Oxygen Demand [water, surface water]: 0 kg; pedigree (1,1,1,1,1)
  (same comment as for Silicon)
- Water [water, surface water]: 0 m3; pedigree (1,1,1,1,1)
  Process water released to surface water.
  Uncertainty: uncertainty calculated from uncertainty in process water input and the uncertainty of fraction to surface water.
- TOC, Total Organic Carbon [water, ground-, long-term]: 0 kg; pedigree (1,1,1,1,1)
  (same comment as for Iron, ion)
- TOC, Total Organic Carbon [water, surface water]: 0 kg; pedigree (1,1,1,1,1)
  (same comment as for Silicon)
- Carbon monoxide, fossil [air, urban air close to ground]: 0 kg; pedigree (1,1,1,1,1)
  (same comment as for Dioxins, measured as 2,3,7,8-tetrachlorodibenzo-p-dioxin)
- Sulfate [water, ground-, long-term]: 0 kg; pedigree (1,1,1,1,1)
  (same comment as for Iron, ion)
- DOC, Dissolved Organic Carbon [water, surface water]: 0 kg; pedigree (1,1,1,1,1)
  (same comment as for Silicon)
- Carbon dioxide, fossil [air, urban air close to ground]: 0 kg; pedigree (1,1,1,1,1)
  (same comment as for Strontium)
- Nitrate [water, ground-, long-term]: 0 kg; pedigree (1,1,1,1,1)
  (same comment as for Iron, ion)
- Sulfate [water, surface water]: 0 kg; pedigree (1,1,1,1,1)
  (same comment as for Silicon)
- Methane, fossil [air, urban air close to ground]: 0 kg; pedigree (1,1,1,1,1)
  (same comment as for Dioxins, measured as 2,3,7,8-tetrachlorodibenzo-p-dioxin)
- Phosphate [water, ground-, long-term]: 0 kg; pedigree (1,1,1,1,1)
  (same comment as for Iron, ion)
- Nitrate [water, surface water]: 0 kg; pedigree (1,1,1,1,1)
  (same comment as for Silicon)
- Sulfur dioxide [air, urban air close to ground]: 0 kg; pedigree (1,1,1,1,1)
  (same comment as for Strontium)
- Chloride [water, ground-, long-term]: 0 kg; pedigree (1,1,1,1,1)
  (same comment as for Iron, ion)
- Phosphate [water, surface water]: 0 kg; pedigree (1,1,1,1,1)
  (same comment as for Silicon)
- Nitrogen oxides [air, urban air close to ground]: 0 kg; pedigree (1,1,1,1,1)
  Sum of fuel-Nox and thermal-NOx emitted to air after DeNOx stage.
  Uncertainty: uncertainty calculated from uncertainty in average N-emissions and uncertainty in the share of thermal NOx and the uncertainty in nitrogen content in *this* waste.
- Bromine [water, ground-, long-term]: 0 kg; pedigree (1,1,1,1,1)
  (same comment as for Iron, ion)
- Chloride [water, surface water]: 0 kg; pedigree (1,1,1,1,1)
  (same comment as for Silicon)
- Ammonia [air, urban air close to ground]: 0 kg; pedigree (1,1,1,1,1)
  Nitrogen species emitted to air after DeNOx stage.
  Uncertainty: uncertainty calculated from uncertainty in average N-emissions and uncertainty in the share of thermal NOx and the uncertainty in nitrogen content in *this* waste.
- Fluoride [water, ground-, long-term]: 0 kg; pedigree (1,1,1,1,1)
  (same comment as for Iron, ion)
- Bromine [water, surface water]: 0 kg; pedigree (1,1,1,1,1)
  (same comment as for Silicon)
- Dinitrogen monoxide [air, urban air close to ground]: 0 kg; pedigree (1,1,1,1,1)
  (same comment as for Ammonia)
- Silver, ion [water, ground-, long-term]: 0 kg; pedigree (1,1,1,1,1)
  (same comment as for Iron, ion)
- Fluoride [water, surface water]: 0 kg; pedigree (1,1,1,1,1)
  (same comment as for Silicon)
- Cyanide [air, urban air close to ground]: 0 kg; pedigree (1,1,1,1,1)
  (same comment as for Ammonia)
- Arsenic, ion [water, ground-, long-term]: 0 kg; pedigree (1,1,1,1,1)
  (same comment as for Iron, ion)
- Silver, ion [water, surface water]: 0 kg; pedigree (1,1,1,1,1)
  (same comment as for Silicon)
- Phosphorus [air, urban air close to ground]: 0 kg; pedigree (1,1,1,1,1)
  (same comment as for Strontium)
- Barium [water, ground-, long-term]: 0 kg; pedigree (1,1,1,1,1)
  (same comment as for Iron, ion)
- Arsenic, ion [water, surface water]: 0 kg; pedigree (1,1,1,1,1)
  (same comment as for Silicon)
- Hydrogen chloride [air, urban air close to ground]: 0 kg; pedigree (1,1,1,1,1)
  (same comment as for Strontium)
- Cadmium, ion [water, ground-, long-term]: 0 kg; pedigree (1,1,1,1,1)
  (same comment as for Iron, ion)
- Barium [water, surface water]: 0 kg; pedigree (1,1,1,1,1)
  (same comment as for Silicon)
- Bromine [air, urban air close to ground]: 0 kg; pedigree (1,1,1,1,1)
  (same comment as for Strontium)
- Cobalt [water, ground-, long-term]: 0 kg; pedigree (1,1,1,1,1)
  (same comment as for Iron, ion)
- Cadmium, ion [water, surface water]: 0 kg; pedigree (1,1,1,1,1)
  (same comment as for Silicon)
- Hydrogen fluoride [air, urban air close to ground]: 0 kg; pedigree (1,1,1,1,1)
  (same comment as for Strontium)
- Chromium VI [water, ground-, long-term]: 0 kg; pedigree (1,1,1,1,1)
  (same comment as for Iron, ion)
- Cobalt [water, surface water]: 0 kg; pedigree (1,1,1,1,1)
  (same comment as for Silicon)
- Arsenic [air, urban air close to ground]: 0 kg; pedigree (1,1,1,1,1)
  (same comment as for Strontium)
- Copper, ion [water, ground-, long-term]: 0 kg; pedigree (1,1,1,1,1)
  (same comment as for Iron, ion)
- Chromium VI [water, surface water]: 0 kg; pedigree (1,1,1,1,1)
  (same comment as for Silicon)
- Barium [air, urban air close to ground]: 0 kg; pedigree (1,1,1,1,1)
  (same comment as for Strontium)
- Mercury [water, ground-, long-term]: 0 kg; pedigree (1,1,1,1,1)
  (same comment as for Iron, ion)
- Copper, ion [water, surface water]: 0 kg; pedigree (1,1,1,1,1)
  (same comment as for Silicon)
- Cadmium [air, urban air close to ground]: 0 kg; pedigree (1,1,1,1,1)
  (same comment as for Strontium)
- Manganese [water, ground-, long-term]: 0 kg; pedigree (1,1,1,1,1)
  (same comment as for Iron, ion)
- Mercury [water, surface water]: 0 kg; pedigree (1,1,1,1,1)
  (same comment as for Silicon)
- Cobalt [air, urban air close to ground]: 0 kg; pedigree (1,1,1,1,1)
  (same comment as for Strontium)
- Molybdenum [water, ground-, long-term]: 0 kg; pedigree (1,1,1,1,1)
  (same comment as for Iron, ion)
- Manganese [water, surface water]: 0 kg; pedigree (1,1,1,1,1)
  (same comment as for Silicon)
- Chromium [air, urban air close to ground]: 0 kg; pedigree (1,1,1,1,1)
  (same comment as for Strontium)
- Nickel, ion [water, ground-, long-term]: 0 kg; pedigree (1,1,1,1,1)
  (same comment as for Iron, ion)
- Molybdenum [water, surface water]: 0 kg; pedigree (1,1,1,1,1)
  (same comment as for Silicon)
- Copper [air, urban air close to ground]: 0 kg; pedigree (1,1,1,1,1)
  (same comment as for Strontium)
- Lead [water, ground-, long-term]: 0 kg; pedigree (1,1,1,1,1)
  (same comment as for Iron, ion)
- Lead [water, surface water]: 0 kg; pedigree (1,1,1,1,1)
  (same comment as for Silicon)
- Mercury [air, urban air close to ground]: 0 kg; pedigree (1,1,1,1,1)
  (same comment as for Strontium)
- Antimony [water, ground-, long-term]: 0 kg; pedigree (1,1,1,1,1)
  (same comment as for Iron, ion)
- Nickel, ion [water, surface water]: 0 kg; pedigree (1,1,1,1,1)
  (same comment as for Silicon)
- Manganese [air, urban air close to ground]: 0 kg; pedigree (1,1,1,1,1)
  (same comment as for Strontium)
- Selenium [water, ground-, long-term]: 0 kg; pedigree (1,1,1,1,1)
  (same comment as for Iron, ion)
- Antimony [water, surface water]: 0 kg; pedigree (1,1,1,1,1)
  (same comment as for Silicon)
- Molybdenum [air, urban air close to ground]: 0 kg; pedigree (1,1,1,1,1)
  (same comment as for Strontium)
- Tin, ion [water, ground-, long-term]: 0 kg; pedigree (1,1,1,1,1)
  (same comment as for Iron, ion)
- Tin, ion [water, surface water]: 0 kg; pedigree (1,1,1,1,1)
  (same comment as for Silicon)
- Nickel [air, urban air close to ground]: 0 kg; pedigree (1,1,1,1,1)
  (same comment as for Strontium)
- Vanadium, ion [water, ground-, long-term]: 0 kg; pedigree (1,1,1,1,1)
  (same comment as for Iron, ion)
- Selenium [water, surface water]: 0 kg; pedigree (1,1,1,1,1)
  (same comment as for Silicon)
- Lead [air, urban air close to ground]: 0 kg; pedigree (1,1,1,1,1)
  (same comment as for Strontium)
- Zinc, ion [water, ground-, long-term]: 0 kg; pedigree (1,1,1,1,1)
  (same comment as for Iron, ion)
- Vanadium, ion [water, surface water]: 0 kg; pedigree (1,1,1,1,1)
  (same comment as for Silicon)
- Antimony [air, urban air close to ground]: 0 kg; pedigree (1,1,1,1,1)
  (same comment as for Strontium)
- Beryllium [water, ground-, long-term]: 0 kg; pedigree (1,1,1,1,1)
  (same comment as for Iron, ion)
- Zinc, ion [water, surface water]: 0 kg; pedigree (1,1,1,1,1)
  (same comment as for Silicon)
- Selenium [air, urban air close to ground]: 0 kg; pedigree (1,1,1,1,1)
  (same comment as for Strontium)
- Strontium [water, ground-, long-term]: 0 kg; pedigree (1,1,1,1,1)
  (same comment as for Iron, ion)
- Beryllium [water, surface water]: 0 kg; pedigree (1,1,1,1,1)
  (same comment as for Silicon)
- Tin [air, urban air close to ground]: 0 kg; pedigree (1,1,1,1,1)
  (same comment as for Strontium)
- Titanium, ion [water, ground-, long-term]: 0 kg; pedigree (1,1,1,1,1)
  (same comment as for Iron, ion)
- Strontium [water, surface water]: 0 kg; pedigree (1,1,1,1,1)
  (same comment as for Silicon)
- Vanadium [air, urban air close to ground]: 0 kg; pedigree (1,1,1,1,1)
  (same comment as for Strontium)
- Thallium [water, ground-, long-term]: 0 kg; pedigree (1,1,1,1,1)
  (same comment as for Iron, ion)
- Titanium, ion [water, surface water]: 0 kg; pedigree (1,1,1,1,1)
  (same comment as for Silicon)
- Zinc [air, urban air close to ground]: 0 kg; pedigree (1,1,1,1,1)
  (same comment as for Strontium)
- Silicon [water, ground-, long-term]: 0 kg; pedigree (1,1,1,1,1)
  (same comment as for Iron, ion)
- Benzene [air, urban air close to ground]: 0 kg; pedigree (1,1,1,1,1)
  (same comment as for Dioxins, measured as 2,3,7,8-tetrachlorodibenzo-p-dioxin)
- Thallium [water, surface water]: 0 kg; pedigree (1,1,1,1,1)
  (same comment as for Silicon)
- Water [air, unspecified]: 3.32789e-5 m3; lognormal variance with pedigree 0.0807, pedigree (2,2,5,1,1)
  Calculated value based on literature values and expert opinion. See comments in the parametres' comment field.
