# heat pump production, brine-water, 10kW

Dataset: EcoSpold 2, unit process
Geography: CH
Time period: 1990-01-01 to 2019-12-31
Technology level: current
Classification: ISIC rev.4 ecoinvent: 2819:Manufacture of other general-purpose machinery
Classification: EcoSpold01Categories: heat pumps/production of components
Tags: ConvertedDataset
Scenario: Business-as-Usual
System model: Allocation at the point of substitution
Share of production covered: 0 %
Generated by: Thomas Heck
Published in: Heck, T. 2007
Database: ecoinvent
isCopyrightProtected: true
accessRestrictedTo: 1

## General comment
This dataset represents a brine-water heat pump unit for an average one family house in the Swiss midland. Switzerland is assumed to represent an average climatological and geological location in Europe. Lifetime of the heat pump is assumed to be 20 years. This dataset is based on the following reference values: for the average one-family house a heating requirement of 10 kW, a heat distribution system (low-temperature system) of 50/40°C and a heat supply of approximately 20.000 kWh with 2.000 operating hours were assumed. Furthermore, a system with a heating output of 10,25 kW (at a supply temperature of 40°C), a mean cooling capacity of 8,25 kW (to dimension the borehole heat exchanger) and a extraction performance of 55 W/m were chosen. The system is assumed to be operated without an auxiliary heating system. This dataset is based on manufacturer information (Firma Hoval) of a heat pump with a heating capacity of 10,25 kW at operating conditions of B-5/W40.
[This dataset was already contained in the ecoinvent database version 2. It was not individually updated during the transfer to ecoinvent version 3. Life Cycle Impact Assessment results may still have changed, as they are affected by changes in the supply chain, i.e. in other datasets. This dataset was generated following the ecoinvent quality guidelines for version 2. It may have been subject to central changes described in the ecoinvent version 3 change report (http://www.ecoinvent.org/database/ecoinvent-version-3/reports-of-changes/), and the results of the central updates were reviewed extensively. The changes added e.g. consistent water flows and other information throughout the database. The documentation of this dataset can be found in the ecoinvent reports of version 2, which are still available via the ecoinvent website. The change report linked above covers all central changes that were made during the conversion process.]
References:
Arbeitsgemeinschaft Wärmepumpen, "Allgemeine Information über Wärmepumpenheizungsanla-gen – Merkblatt A 1 und A 8", 1991.

## Included activities start
From reception of precursors (low-alloyed steel, reinforcing steel, copper, Armaflex, PVC, R134a) at the factory gate.

## Included activities end
This activity ends with a 10 kW brine-water heat pump unit with a lifetime of 20 years. The dataset includes emissions caused by refrigerating agent leakages during production process and the disposal of plastic. R134a as refrigerating agent is included. This dataset does not inlcude emissions caused during operation.

## Technology
Brine-water heat pumps use geothermal energy by extracting the heat stored in the ground with a borehole heat exchanger. Borehole heat exchangers basically consist of coaxial or U-shaped polyethylene tubes and are installed vertically in the soil, usually at a depth of 50 up to 250 meters. Thereby the soil serves as heat source. The heat is withdrawn from the soil through a closed-loop system situated in the tube and is fed to the heat pump. As heat-conveying fluid, i.e. brine, in the majority of cases water is used compounded with 25 % to 35% of antifreezing agent. The heat pump then transforms the heat through a second circuit to an appropriate temperature level for low-temperature heating systems. Brine-water heat pumps are more expensive but have a higher annual coefficient of performance compared to air-water heat pumps, i.e. high quality energy is used in a more efficient way. According to Lovvorn and Hess life time of the heat pump is 20 years.
References:
Brunner M. und Gorhan L.: GEOTHERMIE - DIE UMWELTSCHONENDE ENERGIE. http://www.geothermal-energy.ch/downloads/umweltsch-dt.PDF.
Lovvorn, N.C. (2001). Reliability and Lifetime of Residential Heat Pumps. Paper. Proceedings of Joint HPC and IPUHPC Workshop “Hands-On Experience with Heat Pumps for Buildings,” 10-11 October 2001. Arnhem, The Netherlands. CD-ROM: “Hands-On Experience with Heat Pumps for Buildings,” Workshop Report HPC-WR-23. IEA Heat Pump Centre. Sittard, The Netherlands.
Lovvorn, N.C. (2001). Reliability and Lifetime of Residential Heat Pumps. Power Point Presentation. CD-ROM: “Hands-On Experience with Heat Pumps for Buildings,” Workshop Report HPC-WR-23. IEA Heat Pump Centre. Sittard, The Netherlands.
Persönliche Mitteilung Herr Hess, Firma: Polydynamics Ltd., Zürich, Juli 1993.

## Parameters
- fraction, process water, to air: 0.15 dimensionless; name fraction_PW_to_air; lognormal variance with pedigree 0.092025, pedigree (4,4,3,2,4)
  Literature value. In case when no industry/process specific data are available, default evaporation fraction value is used. This value is 15% and is based on literature (Statistics Canada, 2007 & Shaffer, K.H., 2008, Consumptive water use in the Great Lakes Basin, USGS & Shiklomanov, 2003, World Water Resources at the Beginning of the 21st Century) and has been approved by an expert.

## Reference product
- heat pump, brine-water, 10kW: 1 unit; CPC 43913: Refrigerating and freezing equipment and heat pumps, except household type equipment; By-product classification allocatable product
  EcoSpold01Location=CH
  production volume 0.0336675 unit
    This is a placeholder value that does not reflect real-world production volumes. This dataset does not currently require a real-world production volume to work in the database framework, and no actual data were collected yet. This has no negative effect on the results of the ecoinvent database. The placeholder value of this activity was scaled according to the nominal GDP of 2005 (source: United Nations, http://data.un.org/Glossary.aspx?q=GDP+%28current+US%24%29, accessed 20130726) to reflect an appropriate share of the global production volume, which is also a placeholder value.
  property price 523 EUR2005
    EU27 I/O database-68 Electronic machinery (4.02 EURO2003/kg dry soilds) in the 'EU & DK Input Output Database' (available in SimaPro); 131 kg
  property true value 523
    allocation property applied in "true value" allocation // value calculated from revenue

## By-products
- electricity, for reuse in municipal waste incineration only: 0 kWh; CPC 17100: Electrical energy; By-product classification allocatable product; pedigree (1,1,1,1,1)
  Net electricity generated from this waste and used in internal MSWI plant energy redistribution.
  Uncertainty: uncertainty is calculated from uncertainties in waste composition and uncertainties in energy efficiency and the uncertainty in internal energy demand
  production volume 11.9017 kWh
  property exergy 3.6 MJ; name E_el_prod_MSWI_exergy
    This exergy property is based on the exergy content of the product.
  property true value relation 3.6; name E_el_prod_MSWI_true_value_relation
    property to calculate "true value" from
  property price 0.1 EUR2005; name E_el_prod_MSWI_price_EUR2005
    Estimated to be the same price as in case of electricity, medium voltage.
  property true value 1.52684
    allocation property applied in "true value" allocation // value calculated from true value relation
- heat, for reuse in municipal waste incineration only: 0 MJ; CPC 17300: Steam and hot water; By-product classification allocatable product; pedigree (1,1,1,1,1)
  Net useful heat generated from this waste and used in internal MSWI plant energy redistribution.
  Uncertainty: uncertainty is calculated from uncertainties in waste composition and uncertainties in energy efficiency and the uncertainty in internal energy demand
  production volume 83.4184 MJ
  property true value relation 0.1842; name E_th_prod_MSWI_true_value_relation
    property to calculate "true value" from
  property exergy 0.1842 MJ; name E_th_prod_MSWI_exergy
    This exergy property is based on the exergy content of the product.
  property price 0.0106 EUR2005; name E_th_prod_MSWI_price_EUR2005
    Average European district heat price from Ecoheatcool and Euroheat 2005-2006, Ecoheat Work package 1: The European heat market. Final report. 10.6 EUR/GJ i s the price of district heat. http://www.solarthermalworld.org/files/Ecoheatcool%20WP1%20Web.pdf?download
  property true value 0.547563
    (same comment as for electricity, for reuse in municipal waste incineration only)
- zinc concentrate: 0 kg; CPC 14290: Other non-ferrous metal ores and concentrates (other than uranium or thorium ores and concentrates); By-product classification allocatable product
  Calculated value from the knowledge of the properties of both products.
  production volume 0.00305024 kg
  property price 0.38 EUR2005; name ByP_price_EUR2005
    Temporary price data. Calculated as 90% of purchasers price based on: Zinc content in concentrate 53%. Concentrate price per kg Zn 86.5% of refined Zn price (13.5% treatment charges according to CHR Metals Limited 2005: Dynamic cost curves. http://www.minecost.com/dynamic.pdf). 2004 zinc price from USGS (2007) Mineral commodity summaries 2007. <http://minerals.usgs.gov/minerals/pubs/mcs/2007/mcs2007.pdf> [Accessed 25 May 2010]
  property zinc content 0.53; name zinc_C_zinc_concentrate
    Zinc content on a dry matter basis. Value taken from teh "zinc mine operation" /GLO dataset.
  property dry mass 1 kg; name DM_zinc_concentrate
  property carbon content 0
    carbon content on a dry matter basis (reserved; not for manual entry)
  property true value 0.00115909
    allocation property applied in "true value" allocation // value calculated from revenue
  properties: wet mass 1 kg, water content 0, carbon content, non-fossil 0, carbon content, fossil 0, water in wet mass 0 kg, carbon allocation 0 kg

## Inputs from technosphere
- steel, low-alloyed, hot rolled: 19.9209 kg; source Hinden 1993; lognormal variance with pedigree 0.186, pedigree (4,5,5,1,1)
  EcoSpold01Location=RER
  Estimation. The vaporizer and the condenser are built up of 20 kg low-alloyed steel. Steel is assumed to be recycled after operation.
  Further references:
  Persönliche Mitteilung Herr Hess, Firma: Polydynamics Ltd., Zürich, Juli 1993.
  properties: carbon content, fossil 0.005, wet mass 1 kg, dry mass 1 kg
  note on carbon content, fossil: Low alloyed steel composition given in Tab. 3.2 ecoinvent v2.2 report 10_partII. Steel assumed to have a C content of 0.5%
- lubricating oil: 1.69328 kg; source Hinden 1993; lognormal variance with pedigree 0.1227, pedigree (3,3,5,3,4)
  Estimation. 1,7 kg of lubricating oil is used for lubricating the compressor.
  Further references:
  Persönliche Mitteilung Herr Hess, Firma: Polydynamics Ltd., Zürich, Juli 1993.
  EcoSpold01Location=RER
  properties: carbon content, fossil 0.75, dry mass 1 kg, wet mass 1 kg
  note on carbon content, fossil: Lubricating oil is produced from diesel. C-content/dry mass of fats and oils considered 75%, from: ecoinvent v2.2 report, n 15a, pg 40
- refrigerant R134a: 3.07779 kg; source Wärmepumpen-Testzentrum 2003; lognormal variance with pedigree 0.11, pedigree (1,1,5,1,1)
  Estimation. The filling amount of refrigerating agent (R134a) used for four brine-water heat pumps ranges between 0.17 and 0.43 kg/kW (B0/W35) with an average value of approx. 0.3 kg/kW (B0/W35). In this dataset a filling quantity of 3 kg R134a is assumed. The refrigerant is assumed to be recycled after operation.
  EcoSpold01Location=RER
  properties: wet mass 1 kg, carbon content, fossil 0.235294, dry mass 1 kg
- reinforcing steel: 74.7035 kg; source Hinden 1993; lognormal variance with pedigree 0.186, pedigree (4,5,5,1,1)
  Estimation. The compressor and the casing are built up of 75 kg reinforcing steel. Steel is assumed to be recycled after operation.
  Further references:
  Persönliche Mitteilung Herr Hess, Firma: Polydynamics Ltd., Zürich, Juli 1993.
  EcoSpold01Location=RER
  properties: carbon content, fossil 0.004, wet mass 1 kg, dry mass 1 kg
- electricity, medium voltage: 139.447 kWh; source Jensch W. 1988; lognormal variance with pedigree 0.1227, pedigree (3,3,5,3,4)
  EcoSpold01Location=CH
  Estimation. For the production of a heat pump unit 5,6 GJ energy is used; 50 % is used for construction and installation (2,8 GJ per heat pump unit), of which 50 % is electricity and 50 % is natural gas.
- tube insulation, elastomere: 9.96047 kg; source Hinden 1993; lognormal variance with pedigree 0.186, pedigree (4,5,5,1,1)
  EcoSpold01Location=DE
  Estimation. 10 kg of Armaflex is used for tube insulation.
  Further references:
  Persönliche Mitteilung Herr Hess, Firma: Polydynamics Ltd., Zürich, Juli 1993.
  properties: carbon content, fossil 0.837817, dry mass 1 kg, wet mass 1 kg
  note on carbon content, fossil: The main raw material (93%) is synthetic rubber (Ethylene propylene diene monomer (EPDM)), that is used together with PVC (ecoinvent v2.2 report 7_XV), C2H3Cl
- copper: 21.913 kg; source Hinden 1993; lognormal variance with pedigree 0.186, pedigree (4,5,5,1,1)
  Estimation. 22 kg of copper are used for the compressor, the heat pump lines and the electric cable of the control system. Copper is assumed to be recycled after operation.
  Further references:
  Persönliche Mitteilung Herr Hess, Firma: Polydynamics Ltd., Zürich, Juli 1993.
  EcoSpold01Location=RER
  properties: wet mass 1 kg, dry mass 1 kg
- heat, district or industrial, natural gas: 1324.74 MJ; source Jensch W. 1988; lognormal variance with pedigree 0.1227, pedigree (3,3,5,3,4)
  EcoSpold01Location=RER
  Estimation. For the production of a heat pump unit 5,6 GJ energy is used; 50 % is used for construction and installation (2,8 GJ per heat pump unit), of which 50 % is electricity and 50 % is natural gas.
- waste plastic, mixture: -10.9565 kg; lognormal variance with pedigree 0.186, pedigree (4,5,5,1,1)
  EcoSpold01Location=CH
  Estimation. Tube insulation and PVC.
  production volume 11 kg
    Calculated from the production volume of heat pump, brine-water, 10kW in proportion to the respective output amounts.
  properties: carbon content, fossil 0.747344, water content 0.180638, dry mass 0.847 kg, wet mass 1 kg
  note on carbon content, fossil: C content in 1 kg DM was calculated using data in Tab A.2, ecoinvent v2.2 report 13_I
- polyvinylchloride, bulk polymerised: 0.996047 kg; source Hinden 1993; lognormal variance with pedigree 0.186, pedigree (4,5,5,1,1)
  EcoSpold01Location=RER
  Estimation. 1 kg of PVC is used for cable insulation.
  Further references:
  Persönliche Mitteilung Herr Hess, Firma: Polydynamics Ltd., Zürich, Juli 1993.
  properties: carbon content, fossil 0.387097, wet mass 1 kg, dry mass 1 kg
  note on carbon content, fossil: Monomer is vynyl chloride, C2H3Cl (ecoinvent v2.2 report 11_II). MW=62 g/mol

## Inputs from nature
- Water, unspecified natural origin [natural resource, in water]: 0.705201 m3; name water_UNO_input; source Frischknecht R. 1999; lognormal variance with pedigree 0.186, pedigree (4,5,5,1,1)
  Literature value. In Frischknecht 5,4 kg of water is used to produce one kg of compressor or engine. In this dataset this value is used for the production of a heat pump unit.
  Literature value. In Frischknecht 5,4 kg of water is used to produce one kg of compressor or engine. In this dataset this value is used for the production of a heat pump unit.

## Emissions to nature
- Water [air, unspecified]: 0.10578 m3; name water_to_air_unspecified; = (water_UNO_input*fraction_PW_to_air); lognormal variance with pedigree 0.0807, pedigree (2,2,5,1,1)
  Calculated value based on literature values and expert opinion. See comments in the parametres' comment field.
  property fraction, origin: salt water 0; name fraction_origin_salt_water
  property fraction, origin: fresh water 0; name fraction_origin_fresh_water
  property fraction, origin: unspecified 1; name fraction_origin_unspecified
- Water [water, unspecified]: 0.599421 m3; name water_to_water_unspecified; = water_UNO_input*(1-fraction_PW_to_air); lognormal variance with pedigree 0.0807, pedigree (2,2,5,1,1)
  (same comment as for Water)
  property fraction, origin: unspecified 1; name fraction_origin_unspecified_Ww
  property fraction, origin: salt water 0; name fraction_origin_salt_water_Ww
  property fraction, origin: fresh water 0; name fraction_origin_fresh_water_Ww
  property water in wet mass 1000 kg; name WWM
  property dry mass 0 kg; name DM
  property carbon content, non-fossil 0; name C_content_non_fossil
  property carbon content, fossil 0; name C_content_fossil
  property wet mass 1000 kg; name WM
- Ethane, 1,1,1,2-tetrafluoro-, HFC-134a [air, urban air close to ground]: 0.687273 kg; source Frischknecht R. 1999
  Estimation. During the production process of a heat pump unit 3 % of emissions are caused by refrigerating agent leakages; 20 % of the filling quantity are emitted during scrapping. Hence, 23 % of the filling quantity is defined as emissions to air. (In Hofstetter, 10% of emissions are caused by careless work; 10 % of the rest are caused during dismantling of intact equipment.). Emissions caused by leakages during operation are not included (but they are included in the calculation of the heat production process).
  Further references:
  P. Hofstetter "FCKW-Einsatz und Entsorgung in der Kälte- und Klimatechnik mit ökologischem Vergleich heutiger Kühlschranksysteme und Ausblick auf alternative Kältesysteme", Zürich, 1990.

## Sampling procedure
Literature, manufacturer information

## Review by Gerald Rebitzer (obsolete) 2004-06-09
prepared

## Review by Roland Hischier 2011-09-22
Transfer of documentation done.
