# airport construction

Dataset: EcoSpold 2, unit process
Geography: RER
Time period: 1990-01-01 to 2019-12-31
Technology level: current
Classification: ISIC rev.4 ecoinvent: 4210:Construction of roads and railways
Classification: EcoSpold01Categories: transport systems/airplane
Scenario: Business-as-Usual
System model: Allocation at the point of substitution
Generated by: Michael Spielmann (obsolete)
Published in: Spielmann M. 2007
Database: ecoinvent
isCopyrightProtected: true
accessRestrictedTo: 1

## General comment
The dataset represents the construction, the maintenance and land use and the disposal of airport infrastructure of one entire airport. The data represents the airport in Zurich. The dataset of the maintenance and land use represents the maintenance and land use of one entire airport. The data used represents the situation at the Zurich airport and expressed in per year of operation.

## Included activities start
The activity starts with the material for the construction (concrete, gravel and reinforcing steel). For the maintenance and land use data, the activity starts with the land transformation and occupation of the airport.

## Included activities end
The activity ends with the construction, the maintenance and land use and the disposal of airport infrastructure of one entire airport. The activity includes the material consumption for the construction (concrete, gravel and reinforcing steel), the energy consumption (diesel and electricity), the excavation, the building of the hall and until and including the building of the multi-storey. For the maintenance and land use data, the activity ends with the maintenance and land use of one airport. The activity includes the land transformation and occupation, the energy consumption (electricity, natural gas, light fuel oil, diesel and petrol), the consumption of propylene glicol and ethylene glicol for de-icing of aircrafts and sealed area, the water consumption (tap water), the emissions to air (carbon dioxide, carbon monoxide, NMVOC and nitrogen oxides), the emissions to water (BOD5, DOC, TOC and COD) and until and including the treatment of sewage.

## Geography
Data refers the conditions at the major airport in Switzerland.

## Technology
Construction expenditures for sealed area at airports (excluding built up area) data is available from Maibach et al. (1999). The data represents the airport in Zurich (now unique Airport) and is based on assumptions as follows:
• Foundation layer: 40 cm gravel and a life span of 100 years.
• Concrete floor: of 22 cm with a concrete reinforcement of 1.8 kg steel/m2. The lifespan of the concrete layer is assumed to be 30 33.3 years - thereby requiring 2 replacements over the lifetime of the foundation layer.
• Transport: The transport to the construction site is 25 km.
The data presented in Maibach et al. (1999) represents the condition in the early 1990’ties and assuming a sealed area of 190 ha. In 2000 the sealed area is reported with 330 ha. 40 ha, however, are built up land, so that the sealed non built up area of 290 ha is taken into account in this project. In consequence, the data presented is adjusted by a factor of 1.5 to represent current conditions.
For material and energy consumption due to the construction and disposal of buildings is employed generic modules as available from Kellenberger et al. (2003). For the type, height and specific area consumptions of single buildings no information was readily available. In order to facilitate a first estimate was made the following assumptions:
• 70% of the built up area is occupied with building halls
• 30% are multi storey buildings with an average of 5 floors. The assumed height between the floors is 2 7m Kellenberger et al. (2003) and these are also assumed to have a lifetime of 33.3yrs.
In addition to expenditures due to construction, expenditures due to refurbishment and demolition are accounted for.
The data of the maintenance and land use used for this module describe the situation at the Zurich airport as reported in the environmental report of the Zurich Airport Unique (2002) and expressed in per year of operation . Additional information was available from experts at the airport.
The data merely represent clearing services and infrastructure expenditures within the area of the airport. Air traffic related activities (e.g. traffic to and from the airport) and infrastructure (e.g. operation of multi storage car parks for passengers and airport staff) are not accounted for.
Clearing of the aircraft comprises various transport services (e.g. passenger transport for which a variety of vehicles are used). Whilst some of them are conventional road vehicles, also airport specific vehicles are in operation, for which no life cycle data is available. Thus, the emission data merely represent operation emissions. In addition, the yearly diesel consumption is accounted for, so are obtained emissions of the fuel chain.
Aircraft clearing further includes de-icing activities of both, sealed area and aircraft. Glycol brines are usually used for de icing. Propylene glycol and diethylen glycolare are used for de-icing of aircrafts. For de-icing of sealed area, a composition of isopropanol and ethylene glycol is used. The actually use of these materials differs significantly from year to year. Thus, the geometrical mean for 3 years.
Operation of airport infrastructure comprises the heat and electricity consumption for buildings and aircraft maintenance. Most of the heat consumed at the airport is generated on site using natural gas and oil. Also, water consumption, waste water and waste disposal are included.
In this project is distinguished between land transformation and land occupation Frischknecht et al. (2003).Whilst transformation directly changes the ecological quality of land, occupation postpones changes of the ecological quality.
Occupation refers to the time period for which the land is unavailable for other activities. The occupation intervention is expressed in terms of land use type, area and time. The unit is therefore square metres*year [m2/a]. In general, the airport may be classified as industrial area. In addition we further distinguish three subcategories. The category “industrial area, vegetation” includes the entire non-sealed area of the airport. Sealed area is further divided into built up land and traffic area comprising runways and parking area.
For transformation (the change of land use to be allocated to a certain user or user type) we assumed a life span of 100 years for the Zurich airport. We further assume that the expansions of existing airports are less important. Information on the initial use of the considered airport area has not been considered, since it is not considered as representative. Also, no information on the use of the airport area after a possible cut back has been available.
References:
Maibach M., Peter D. and Seiler B. (1999) Ökoinventar Transporte: Grundlagen für den ökologischen Vergleich von Transportsystemen und den Einbezug von Transportsystemen in Ökobilanzen. Technischer Schlussbericht. In: Schweizerischer Nationalfonds zur Förderung der wissenschaftlichen Forschung (ed. SPP Umwelt M.). 2nd Edition. INFRAS, Zürich
Unique (2002) Umweltbericht 2001 Flughafen Zürich from www.uniqueairport.com/umweltschutz.
Kellenberger D., Althaus H.-J. and Jungbluth N. (2003) Life Cycle Inventories of Building Products. Final report ecoinvent 2000 No. 7. EMPA Duebendorf, Swiss Centre for Life Cycle Inventories, Duebendorf, CH, Online-Version under: www.ecoinvent.ch.
Frischknecht R., Althaus H.-J., Doka G., R. D., Hirschier R., Hellweg S., Jungbluth N., Kellenberger D., Nemecek T., Rebitzer G. and Spielmann M. (2003) Overview and Methodology. Final report ecoinvent 2000 No. 1. ESU-services, Uster, Swiss Centre for Life Cycle Inventories, Duebendorf, CH, Online-Version under: www.ecoinvent.ch.

## Time period
The data represents the condition in the early 1990’ties. However, the data presented is adjusted by a factor of 1.5 to represent current conditions. The use of de-icing materials is calculated as the geometric mean of 3 years.

## Parameters
- fraction, tap water, to air: 0.15; name fraction_TW_to_air; = fraction_PW_to_air; lognormal variance with pedigree 0.092025, pedigree (4,4,3,2,4)
  Calculated value. See comment in the other parametres present in this dataset. Tap water is considered to be always used as process water, thus process water fractions to air are applied to all tap water input flows to calculate the amount of water consumed in the processes.
- fraction, process water, to air: 0.15 dimensionless; name fraction_PW_to_air; lognormal variance with pedigree 0.092025, pedigree (4,4,3,2,4)
  Literature value. In case when no industry/process specific data are available, default evaporation fraction value is used. This value is 15% and is based on literature (Statistics Canada, 2007 & Shaffer, K.H., 2008, Consumptive water use in the Great Lakes Basin, USGS & Shiklomanov, 2003, World Water Resources at the Beginning of the 21st Century) and has been approved by an expert.

## Reference product
- airport: 1 unit; CPC 53213: Airfield runways; By-product classification allocatable product
  production volume 1.2854 unit
    Calculated from total 'transport, freight, aircraft, intracontinental': 2.97E-11 (unit/tkm)', 'transport, freight, aircraft, intercontinental': 2.48E-12 (unit/tkm)', 'transport, passenger, aircraft, intracontinental': 2.97E-12 (unit/pkm), and 'transport, passenger, aircraft, intercontinental': 2.48E-13 (unit/pkm).
  property price 3.08637e9 EUR2005
    Calculated based on inputs: The price of the product has been calculated as a sum of the values of the material and energy inputs for this product. This value is therefore a rough estimation. It may underestimate the real price since there are additional expenses when producing any product. These expences can include for example labour costs, treatment of waste materials and profit for the producer. Please consider carefully whether this level of data quality is acceptable for your application.
  property true value 3.08637e9
    allocation property applied in "true value" allocation // value calculated from revenue

## By-products
- electricity, for reuse in municipal waste incineration only: 0 kWh; CPC 17100: Electrical energy; By-product classification allocatable product; pedigree (1,1,1,1,1)
  Net electricity generated from this waste and used in internal MSWI plant energy redistribution.
  Uncertainty: uncertainty is calculated from uncertainties in waste composition and uncertainties in energy efficiency and the uncertainty in internal energy demand
  production volume 4.12014e6 kWh
  property exergy 3.6 MJ; name E_el_prod_MSWI_exergy
    This exergy property is based on the exergy content of the product.
  property true value relation 3.6; name E_el_prod_MSWI_true_value_relation
    property to calculate "true value" from
  property price 0.1 EUR2005; name E_el_prod_MSWI_price_EUR2005
    Estimated to be the same price as in case of electricity, medium voltage.
  property true value 411830
    allocation property applied in "true value" allocation // value calculated from true value relation
- heat, for reuse in municipal waste incineration only: 0 MJ; CPC 17300: Steam and hot water; By-product classification allocatable product; pedigree (1,1,1,1,1)
  Net useful heat generated from this waste and used in internal MSWI plant energy redistribution.
  Uncertainty: uncertainty is calculated from uncertainties in waste composition and uncertainties in energy efficiency and the uncertainty in internal energy demand
  production volume 2.91494e7 MJ
  property true value relation 0.1842; name E_th_prod_MSWI_true_value_relation
    property to calculate "true value" from
  property exergy 0.1842 MJ; name E_th_prod_MSWI_exergy
    This exergy property is based on the exergy content of the product.
  property price 0.0106 EUR2005; name E_th_prod_MSWI_price_EUR2005
    Average European district heat price from Ecoheatcool and Euroheat 2005-2006, Ecoheat Work package 1: The European heat market. Final report. 10.6 EUR/GJ i s the price of district heat. http://www.solarthermalworld.org/files/Ecoheatcool%20WP1%20Web.pdf?download
  property true value 149081
    (same comment as for electricity, for reuse in municipal waste incineration only)
- zinc concentrate: 0 kg; CPC 14290: Other non-ferrous metal ores and concentrates (other than uranium or thorium ores and concentrates); By-product classification allocatable product
  Calculated value from the knowledge of the properties of both products.
  production volume 729.266 kg
  property price 0.38 EUR2005; name ByP_price_EUR2005
    Temporary price data. Calculated as 90% of purchasers price based on: Zinc content in concentrate 53%. Concentrate price per kg Zn 86.5% of refined Zn price (13.5% treatment charges according to CHR Metals Limited 2005: Dynamic cost curves. http://www.minecost.com/dynamic.pdf). 2004 zinc price from USGS (2007) Mineral commodity summaries 2007. <http://minerals.usgs.gov/minerals/pubs/mcs/2007/mcs2007.pdf> [Accessed 25 May 2010]
  property zinc content 0.53; name zinc_C_zinc_concentrate
    Zinc content on a dry matter basis. Value taken from teh "zinc mine operation" /GLO dataset.
  property dry mass 1 kg; name DM_zinc_concentrate
  property carbon content 0
    carbon content on a dry matter basis (reserved; not for manual entry)
  property true value 215.591
    allocation property applied in "true value" allocation // value calculated from revenue
  properties: wet mass 1 kg, water content 0, carbon content, non-fossil 0, carbon content, fossil 0, water in wet mass 0 kg, carbon allocation 0 kg

## Inputs from technosphere
- excavation, skid-steer loader: 74686.4 m3; source Maibach M. 1999; lognormal variance with pedigree 0.1787, pedigree (4,3,5,3,1)
  Calculated value. The data presented in Maibach et al. (1999) represents the condition in the early 1990’ties and assuming a sealed area of 190 ha. In 2000 the sealed area is reported with 330 ha. 40 ha, however, are built up land, so that the sealed non built up area of 290 ha is taken into account in this project. In consequence, the data presented is adjusted by a factor of 1.5 to represent current conditions.;activityLink introduced to establish a direct link to the corresponding regional supply of this product
  Uncertainty: l
- gravel, crushed: 2.37957e7 kg; source Maibach M. 1999; lognormal variance with pedigree 0.0587, pedigree (4,3,5,3,1)
  Calculated value. The data presented in Maibach et al. (1999) represents the condition in the early 1990’ties and assuming a sealed area of 190 ha. In 2000 the sealed area is reported with 330 ha. 40 ha, however, are built up land, so that the sealed non built up area of 290 ha is taken into account in this project. In consequence, the data presented is adjusted by a factor of 1.5 to represent current conditions.
  Uncertainty: l
  properties: dry mass 1 kg, wet mass 1 kg
- reinforcing steel: 179967 kg; source Maibach M. 1999; lognormal variance with pedigree 0.0587, pedigree (4,3,5,3,1)
  (same comment as for gravel, crushed)
  properties: wet mass 1 kg, dry mass 1 kg, carbon content, fossil 0.004
- petrol, unleaded: 6.15888e7 kg; source Unique 2002; lognormal variance with pedigree 0.06, pedigree (1,4,5,1,3)
  Calculated value. Maintenance and land use
  Uncertainty: e
  properties: carbon content, fossil 0.865, dry mass 1 kg, wet mass 1 kg
- building, hall: 279949 m2; source Kellenberger D. 2003; lognormal variance with pedigree 0.3667, pedigree (4,3,5,3,3)
  Literature value. For material and energy consumption due to the construction and disposal of buildings is employed generic modules as available from Kellenberger et al. (2003). 70% of the built up area is occupied with building halls.
  Uncertainty: s
- heat, district or industrial, natural gas: 5.47101e10 MJ; source Unique 2002; lognormal variance with pedigree 0.06, pedigree (1,4,5,1,3)
  Calculated value. Operation of airport infrastructure comprises the heat and electricity consumption for buildings and aircraft maintenance. Most of the heat consumed at the airport is generated on site using natural gas and oil. Maintenance and land use
  Uncertainty: e
- wastewater, unpolluted: -1.31976e8 m3; source Unique 2002; lognormal variance with pedigree 0.06, pedigree (1,4,5,1,3)
  Literature value. The data used for this module describe the situation at the Zurich airport as reported in the environmental report of the Zurich Airport Unique (2002) and expressed in per year of operation. Maintenance and land use
  Uncertainty: e
  production volume 1.69673e8 m3; = Ref('f4c76fdc-0f5e-4135-97f3-17cc567cf719', 'ProductionVolume') * ((Ref('68995a05-687f-46a5-a562-5fee1ddcef24')*-1) / Ref('f4c76fdc-0f5e-4135-97f3-17cc567cf719'))
    Calculated from production volume of reference product using the relative outputs.
  properties: wet mass 1000 kg, dry mass 0.337476 kg, water content 2962.17, carbon content, non-fossil 0.00178991, carbon content, fossil 0.00178991
  note on carbon content, fossil: Assumed to be like in tap water. Bicarbonate content is 2.93 mol/m3. CO2 content is 0.1 mol/m3 (ecoinvent v2.2 report 8, Tab 93.1).
- concrete, medium strength: 21996 m3; source Maibach M. 1999; lognormal variance with pedigree 0.0587, pedigree (4,3,5,3,1)
  Literature value. Construction expenditures for sealed area at airports (excluding built up area) data is available from Maibach et al. (1999). The data represents the airport in Zurich. Concrete floor: of 22 cm with a concrete reinforcement of 1.8 kg steel/m2. The lifespan of the concrete layer is assumed to be 33.3 years - thereby requiring 2 replacements over the lifetime of the foundation layer.
  Uncertainty: l
  properties: water content 0.086758, dry mass 2190 kg, wet mass 2380 kg
- building, multi-storey: 1.61971e6 m3; source Kellenberger D. 2003; lognormal variance with pedigree 0.3667, pedigree (4,3,5,3,3)
  Literature value. For material and energy consumption due to the construction and disposal of buildings is employed generic modules as available from Kellenberger et al. (2003). 30% are multi storey buildings with an average of 5 floors. The assumed height between the floors is 2.7m Kellenberger et al. (2003) and these are also assumed to have a lifetime of 33.3yrs.
  Uncertainty: s
- ethylene glycol: 4.09925e7 kg; source Unique 2002; lognormal variance with pedigree 0.16, pedigree (1,1,5,1,1)
  Literature value. Aircraft clearing further includes de-icing activities of both, sealed area and aircraft. Glycol brines are usually used for de icing. Propylene glycol and diethylen glycolare are used for de-icing of aircrafts. For de-icing of sealed area, a composition of isopropanol and ethylene glycol is used. The actually use of these materials differs significantly from year to year. Thus, the geometrical mean for 3 years. Maintenance and land use
  properties: carbon content, fossil 0.387097, dry mass 1 kg, wet mass 1 kg
- electricity, medium voltage: 1.72004e10 kWh; = 3.57E+06+1.72E+10; source Maibach M. 1999; lognormal variance with pedigree 0.0681, pedigree (4,4,5,3,3)
  3.57E+06 kWh of electricity is used for the construction of the airport. Calculated value. The data presented in Maibach et al. (1999) represents the condition in the early 1990’ties and assuming a sealed area of 190 ha. In 2000 the sealed area is reported with 330 ha. 40 ha, however, are built up land, so that the sealed non built up area of 290 ha is taken into account in this project. In consequence, the data presented is adjusted by a factor of 1.5 to represent current conditions.
  1.72E+10 kWh of electricity is used for the maintenance and land use of the airport. Calculated value. Operation of airport infrastructure comprises the heat and electricity consumption for buildings and aircraft maintenance. 2002, Unique, Umweltbericht 2001 Flughafen Zürich, 3 - SeparatePublication
  Uncertainty: l
- diesel: 3.22941e8 kg; source Unique 2002; lognormal variance with pedigree 0.06, pedigree (1,4,5,1,3)
  Literature value. Expenditures due to clearing of aircrafts. Maintenance and land use
  Uncertainty: e
  properties: dry mass 1 kg, carbon content, fossil 0.865, wet mass 1 kg
  note on carbon content, fossil: C-content of diesel is 86.5% (ecoinvent v2.2 report 6_IV, Tab 3.14)
- tap water: 1.55266e11 kg; name tap_water_input; source Unique 2002; lognormal variance with pedigree 0.06, pedigree (1,4,5,1,3)
  Calculated value. Maintenance and land use
  Uncertainty: e
  properties: wet mass 1 kg, carbon content, fossil 0.00178991, water content 2962.17, dry mass 0.000337476 kg
  note on carbon content, fossil: Bicarbonate content is 2.93 mol/m3. CO2 content is 0.1 mol/m3 (ecoinvent v2.2 report 8, Tab 93.1).
- diesel, burned in building machine: 2.49955e7 MJ; source Maibach M. 1999; lognormal variance with pedigree 0.1787, pedigree (4,3,5,3,1)
  (same comment as for gravel, crushed)
- propylene glycol, liquid: 1.6397e8 kg; source Unique 2002; lognormal variance with pedigree 0.11, pedigree (1,1,5,1,1)
  (same comment as for ethylene glycol)
  properties: dry mass 1 kg, carbon content, fossil 0.473684, wet mass 1 kg
- decommissioned airport infrastructure, contaminated gravel: -0.999818 unit; lognormal variance with pedigree 0.16, pedigree (1,1,5,1,1)
  production volume 1.2854 unit; = Ref('f4c76fdc-0f5e-4135-97f3-17cc567cf719', 'ProductionVolume') * ((Ref('727c6df0-0cf4-4de6-83c5-a293ea864e03')*-1) / Ref('f4c76fdc-0f5e-4135-97f3-17cc567cf719'))
    Calculated from production volume of reference product using the relative outputs.
  properties: dry mass 1.13322e9 kg, wet mass 1.13322e9 kg, carbon content, fossil 0.00149419, carbon content, non-fossil 0.009271
  note on carbon content, fossil: Calculated from C content in input materials in the infrastructure
- heat, district or industrial, other than natural gas: 9.8782e9 MJ; source Unique 2002; lognormal variance with pedigree 0.06, pedigree (1,4,5,1,3)
  (same comment as for heat, district or industrial, natural gas)

## Inputs from nature
- Transformation, to traffic area, road network [natural resource, land]: 2.89947e6 m2; source Unique 2002; lognormal variance with pedigree 0.18, pedigree (1,4,5,1,3)
  Literature value. For transformation (the change of land use to be allocated to a certain user or user type) we assumed a life span of 100 years for the Zurich airport. Is assumed that the expansions of existing airports are less important. Information on the initial use of the considered airport area has not been considered, since it is not considered as representative. Also, no information on the use of the airport area after a possible cut back has been available. Maintenance and land use
  Uncertainty: e
- Occupation, industrial area [natural resource, land]: 5.89893e8 m2*year; lognormal variance with pedigree 0.1, pedigree (1,4,5,1,3)
  Oral communication. The figures are based on oral communication with Mr. Strahm (Masterplanung; uniqueairport, Zürich)
  Occupation refers to the time period for which the land is unavailable for other activities. The occupation intervention is expressed in terms of land use type, area and time. The unit is therefore square metres*year [m2/a]. In general, the airport may be classified as industrial area. In addition we further distinguish three subcategories. The category “industrial area, vegetation” includes the entire non-sealed area of the airport. Sealed area is further divided into built up land and traffic area comprising runways and parking area. Maintenance and land use
  Uncertainty: e
- Transformation, to industrial area [natural resource, land]: 5.89893e6 m2; source Unique 2002; lognormal variance with pedigree 0.18, pedigree (1,4,5,1,3)
  (same comment as for Transformation, to traffic area, road network)
- Transformation, from unspecified [natural resource, land]: 8.7984e6 m2; source Unique 2002; lognormal variance with pedigree 0.18, pedigree (1,4,5,1,3)
  (same comment as for Transformation, to traffic area, road network)
- Occupation, traffic area, road network [natural resource, land]: 2.89947e8 m2*year; lognormal variance with pedigree 0.1, pedigree (1,4,5,1,3)
  (same comment as for Occupation, industrial area)

## Emissions to nature
- Water [air, unspecified]: 2.32899e7 m3; name water_to_air_unspecified; = (tap_water_input/1000)*fraction_TW_to_air; lognormal variance with pedigree 0.130025, pedigree (4,4,5,2,4)
  Calculated value based on literature values and expert opinion. See comments in the parametres' comment field.
  property fraction, origin: fresh water 1; name fraction_origin_fresh_water
  property fraction, origin: salt water 0; name fraction_origin_salt_water
  property fraction, origin: unspecified 0; name fraction_origin_unspecified
- NMVOC, non-methane volatile organic compounds, unspecified origin [air, non-urban air or from high stacks]: 2.36957e7 kg; source Unique 2002; lognormal variance with pedigree 0.1, pedigree (1,4,5,1,3)
  Literature value. The major source of VOC accounted for as NMVOC are processes in the service garage. Maintenance and land use
  Uncertainty: e
- Carbon dioxide, fossil [air, non-urban air or from high stacks]: 1.20978e9 kg; source Unique 2002; lognormal variance with pedigree 0.06, pedigree (1,4,5,1,3)
  Calculated value. Data of aircraft clearing in the environmental report includes kerosene consumption caused by turbine starting and operation of auxiliary turbines. The consumption of kerosene is already accounted for in the operation of an aircraft. Thus, environmental exchanges due to kerosene use are excluded. This is achieved by calculating the CO2 emissions of the used diesel and gasoline and determine the share of CO2 emissions due to the burning of these fuels. About 1/3 of the CO2 emissions result from burning of diesel and gasoline fuels for on-site transport processes. Maintenance and land use
  Uncertainty: e
- COD, Chemical Oxygen Demand [water, unspecified]: 6.80876e7 kg; source Maibach M. 1999; lognormal variance with pedigree 0.84, pedigree (1,1,5,1,1)
  Estimated value. 20% of the amont of ethylene glycol and propylene glycol are accounted for. Maintenance and land use
- DOC, Dissolved Organic Carbon [water, unspecified]: 2.01963e7 kg; source Maibach M. 1999; lognormal variance with pedigree 0.84, pedigree (1,1,5,1,1)
  (same comment as for COD, Chemical Oxygen Demand)
- Nitrogen oxides [air, non-urban air or from high stacks]: 5.20905e6 kg; source Unique 2002; lognormal variance with pedigree 0.1, pedigree (1,4,5,1,3)
  (same comment as for Carbon dioxide, fossil)
- BOD5, Biological Oxygen Demand [water, unspecified]: 6.80876e7 kg; source Maibach M. 1999; lognormal variance with pedigree 0.84, pedigree (1,1,5,1,1)
  (same comment as for COD, Chemical Oxygen Demand)
- Carbon monoxide, fossil [air, non-urban air or from high stacks]: 713870 kg; source Unique 2002; lognormal variance with pedigree 0.71, pedigree (1,4,5,1,3)
  (same comment as for Carbon dioxide, fossil)
- TOC, Total Organic Carbon [water, unspecified]: 2.01963e7 kg; source Maibach M. 1999; lognormal variance with pedigree 0.84, pedigree (1,1,5,1,1)
  (same comment as for COD, Chemical Oxygen Demand)

## Sampling procedure
literature studies and oral communication.

## Review by Carl Vadenbo 2012-06-27
In preparation for the release of ecoinvent v3.0, the datasets 'airport RER' and 'operation, maintenance, airport RER' in ecoinvent v2.2 were merged into the dataset 'airport construction, RER 1990-2000' and the output of 'decommissioned airport infrastructure' was added. The amounts of the exchanges were reviewed and were found to correspond to the disaggregated datasets. The uncertainty information has only been adjusted for geographical representativeness in GLO, and consequently needs to be revised before subsequent releases of the database. Despite this shortcoming, the new dataset was accepted for inclusion into the ecoinvent database on 2012.07.06.

## Review by Niels Jungbluth 2003-09-23
passed.
