# treatment of waste paperboard, unsanitary landfill, moist infiltration class (300mm)

Dataset: EcoSpold 2, unit process
Geography: GLO
Time period: 2006-01-01 to 2019-12-31
Technology level: current
Classification: ISIC rev.4 ecoinvent: 3821:Treatment and disposal of non-hazardous waste
Synonyms: municipal waste landfill
Scenario: Business-as-Usual
System model: Allocation at the point of substitution
Share of production covered: 1 %
Generated by: Avraam Symeonidis
Database: ecoinvent
isCopyrightProtected: true
accessRestrictedTo: 1

## General comment
This dataset represents the activity of waste disposal of waste paperboard in a unsanitary landfill. Recommended use of this dataset: For cardboard, which goes to disposal as part of managed communal waste mixture. Larger amounts of *already separated* cardboard could go to recycling, depending on country-specific situation. // Waste composition (wet, in ppm): upper heating value 17.91 MJ/kg; lower heating value 15.92 MJ/kg; H2O 104370; O 392680; H 57791; C 433270; S 1776.8; N 2583.5; P n.a.; B n.a.; Cl 7173.3; Br n.a.; F n.a.; I n.a.; Ag n.a.; As 1.168; Ba 57.193; Cd 0.93313; Co 0.91806; Cr 9.2403; Cu 35.113; Hg 0.30131; Mn 95.196; Mo n.a.; Ni 10.64; Pb 28.963; Sb 0.0046044; Se 3.1073; Sn 6.7521; V n.a.; Zn 63.333; Be 1.1299; Sc n.a.; Sr 45.009; Ti n.a.; Tl n.a.; W n.a.; Si n.a.; Fe n.a.; Ca n.a.; Al n.a.; K n.a.; Mg n.a.; Na n.a.; . // Share of carbon in waste that is biogenic 100%. Share of metals in waste not oxidised and bulk-recyclable (exclude very small or thin parts) Iron: 0%; Alu: 0%; Copper: 0%. Overall degradability of waste during 100 years: 32.44%.

## Included activities start
from final waste deposition (without transports to the site)

## Included activities end
Waste-specific short-term emissions to air via landfill gas and landfill leachate. Waste-specific long-term emissions from landfill.

## Geography
Given name of landfill location is 'infiltration class 3 moist (2018)'. Landfill site with mean annual temperature (MAT) of 8 degC, mean annual precipitation (MAP) of 900 mm/year, and net infiltration of 300 mm/year.
Climate adjustments result in an alpha t (temperature) for permafrost areas of 0.999. Total climate adjustments with alpha pt of 0.999.

## Technology
This is an inventory for an unsanitary, sub-controlled landfill for municipal solid waste. Ultimate average landfill height is 15 meters. Operation phase duration is 25 years.Percentage of landfill gas directly emitted is 100w%.
Leachate of the landfill is not treated. Based on average waste composition and climate data the end of carbonate phase is estimated to be reached 5581 years after waste deposition.

## Reference product
- waste paperboard: -1 kg; CPC 39240: Waste and scrap of paper or paperboard; By-product classification Waste; pedigree (1,1,1,1,1)
  main reference product of this activity (supply of disposal service).
  Uncertainty: Uncertainty is not adjusted, as this is the refence product
  production volume 1 kg
    The amount of the annual production volume is a placeholder value. The contribution of this technology to the different local markets can be found in the markets themselves.
  property price 0 EUR2005
    Waste products are assigned a price of zero as they are assumed to require further treatment.
  property carbon content 0.48376
    carbon content on a dry matter basis (reserved; not for manual entry)
  properties: antimony content 5.141e-9, tin content 7.5389e-6, dry mass 0.89563 kg, zinc content 7.0713e-5, carbon content, non-fossil 0.48376, beryllium content 1.2616e-6, wet mass 1 kg, strontium content 5.0253e-5, selenium content 3.4694e-6, water content 0.11653, water in wet mass 0.10437 kg, lead content 3.2338e-5, nitrogen content 0.0028846, cobalt content 1.025e-6, chromium content 1.0317e-5, heating value, gross 17.906 MJ, sulfur content 0.0019839, heating value, net 15.917 MJ, manganese content 0.00010629, chlorine content 0.0080092, mercury content 3.3642e-7, hydrogen content 0.064525, cadmium content 1.0419e-6, nickel content 1.188e-5, arsenic content 1.3041e-6, copper content 3.9204e-5, barium content 6.3858e-5, oxygen content 0.43844, carbon allocation 0.43327 kg

## Inputs from technosphere
- excavation, skid-steer loader: 0.00031708 m3; lognormal variance with pedigree 0.082256, pedigree (1,1,3,1,1)
  application of daily cover.
  Uncertainty: Uncertainty calculated from uncertainty in base parameters.
- diesel, burned in building machine: 0.046738 MJ; lognormal variance with pedigree 0.082256, pedigree (1,1,3,1,1)
  for waste distribution and compaction.
  Uncertainty: Uncertainty calculated from uncertainty in base parameters.

## Emissions to nature
- Manganese [water, ground-, long-term]: 5.9861e-5 kg; lognormal variance with pedigree 0.24561, pedigree (1,1,3,1,1)
  Emissions from long-term leachate (>100a) directly from MSW landfill and indirectly via incineration of treatement sludge from leachate treatement.
  Uncertainty: Uncertainty calculated depending on waste input and uncertainty of long-term transfer coefficents in landfill.
- Hydrogen sulfide [water, ground-]: 1.5617e-5 kg; lognormal variance with pedigree 0.17378, pedigree (1,1,3,1,1)
  burden from short-term leachate to groundwater in uncontrolled landfill in moist cimate.
  Uncertainty: Uncertainty calculated from unertainty of the waste composition of this waste, uncertainty in waste decomposition and short-term leaching in landfill
- Mercury [water, ground-, long-term]: 2.9195e-7 kg; lognormal variance with pedigree 0.43298, pedigree (1,1,3,1,1)
  (same comment as for Manganese)
- Ammonium, ion [water, ground-]: 0.00079761 kg; lognormal variance with pedigree 0.13638, pedigree (1,1,3,1,1)
  (same comment as for Hydrogen sulfide)
- Chromium VI [water, ground-, long-term]: 4.9949e-8 kg; lognormal variance with pedigree 2.0242, pedigree (1,1,3,1,1)
  (same comment as for Manganese)
- Sulfate [water, ground-]: 0.00059909 kg; lognormal variance with pedigree 0.17378, pedigree (1,1,3,1,1)
  (same comment as for Hydrogen sulfide)
- Copper, ion [water, ground-, long-term]: 3.5057e-5 kg; lognormal variance with pedigree 0.27733, pedigree (1,1,3,1,1)
  (same comment as for Manganese)
- DOC, Dissolved Organic Carbon [water, ground-]: 0.0040889 kg; lognormal variance with pedigree 0.099812, pedigree (1,1,3,1,1)
  (same comment as for Hydrogen sulfide)
- Cadmium, ion [water, ground-, long-term]: 8.7957e-7 kg; lognormal variance with pedigree 0.39667, pedigree (1,1,3,1,1)
  (same comment as for Manganese)
- BOD5, Biological Oxygen Demand [water, ground-]: 0.0010587 kg; lognormal variance with pedigree 0.099812, pedigree (1,1,3,1,1)
  (same comment as for Hydrogen sulfide)
- Cobalt [water, ground-, long-term]: 8.2243e-7 kg; lognormal variance with pedigree 0.39732, pedigree (1,1,3,1,1)
  (same comment as for Manganese)
- Heat, waste [water, ground-, long-term]: 12.104 MJ; lognormal variance with pedigree 0.024912, pedigree (1,1,3,1,1)
  burden from long-term decomposition of waste (>100a).
  Uncertainty: Uncertainty calculated from unertainty of the waste composition of this waste, uncertainty in waste decomposition and short-term leaching in landfill
- Barium [water, ground-, long-term]: 3.5964e-5 kg; lognormal variance with pedigree 0.26257, pedigree (1,1,3,1,1)
  (same comment as for Manganese)
- TOC, Total Organic Carbon [water, ground-]: 0.0040889 kg; lognormal variance with pedigree 0.099812, pedigree (1,1,3,1,1)
  (same comment as for Hydrogen sulfide)
- Arsenic, ion [water, ground-, long-term]: 1.0991e-6 kg; lognormal variance with pedigree 0.3894, pedigree (1,1,3,1,1)
  (same comment as for Manganese)
- Heat, waste [soil, industrial]: 3.5262 MJ; lognormal variance with pedigree 0.033354, pedigree (1,1,3,1,1)
  burden from short-term decomposition of waste (0-100a).
  Uncertainty: Uncertainty calculated from unertainty of the waste composition of this waste, uncertainty in waste decomposition and short-term leaching in landfill
- Nitrite [water, ground-, long-term]: 1.0935e-5 kg; lognormal variance with pedigree 0.14696, pedigree (1,1,3,1,1)
  (same comment as for Manganese)
- COD, Chemical Oxygen Demand [water, ground-]: 0.0044723 kg; lognormal variance with pedigree 0.099812, pedigree (1,1,3,1,1)
  (same comment as for Hydrogen sulfide)
- Chloride [water, ground-, long-term]: 0.0012382 kg; lognormal variance with pedigree 0.1102, pedigree (1,1,3,1,1)
  (same comment as for Manganese)
- Beryllium [air, non-urban air or from high stacks]: 5.3212e-12 kg; lognormal variance with pedigree 0.73006, pedigree (1,1,3,1,1)
  burden from direct release or incineration of landfill biogas; or windblown leachate evaporite in arid climates.
  Uncertainty: Uncertainty calculated from unertainty of the waste composition of this waste, uncertainty in waste decomposition and short-term leaching in landfill
- Nitrate [water, ground-, long-term]: 2.1129e-5 kg; lognormal variance with pedigree 0.14696, pedigree (1,1,3,1,1)
  (same comment as for Manganese)
- Strontium [air, non-urban air or from high stacks]: 2.1196e-10 kg; lognormal variance with pedigree 0.60874, pedigree (1,1,3,1,1)
  (same comment as for Beryllium)
- Ammonium, ion [water, ground-, long-term]: 0.00020091 kg; lognormal variance with pedigree 0.14696, pedigree (1,1,3,1,1)
  (same comment as for Manganese)
- Tin [air, non-urban air or from high stacks]: 3.2229e-12 kg; lognormal variance with pedigree 0.74567, pedigree (1,1,3,1,1)
  (same comment as for Beryllium)
- Nitrogen, organic bound [water, ground-, long-term]: 0.00032838 kg; lognormal variance with pedigree 0.14696, pedigree (1,1,3,1,1)
  (same comment as for Manganese)
- Zinc [air, non-urban air or from high stacks]: 2.1603e-10 kg; lognormal variance with pedigree 0.6079, pedigree (1,1,3,1,1)
  (same comment as for Beryllium)
- Hydrogen sulfide [water, ground-, long-term]: 0.00011107 kg; lognormal variance with pedigree 0.14817, pedigree (1,1,3,1,1)
  (same comment as for Manganese)
- Selenium [air, non-urban air or from high stacks]: 2.6543e-11 kg; lognormal variance with pedigree 0.67757, pedigree (1,1,3,1,1)
  (same comment as for Beryllium)
- TOC, Total Organic Carbon [water, ground-, long-term]: 0.29289 kg; lognormal variance with pedigree 0.0082852, pedigree (1,1,3,1,1)
  (same comment as for Manganese)
- Antimony [air, non-urban air or from high stacks]: 3.9332e-14 kg; lognormal variance with pedigree 0.8026, pedigree (1,1,3,1,1)
  (same comment as for Beryllium)
- Sulfate [water, ground-, long-term]: 0.0042609 kg; lognormal variance with pedigree 0.14817, pedigree (1,1,3,1,1)
  (same comment as for Manganese)
- Nickel [air, non-urban air or from high stacks]: 5.0108e-11 kg; lognormal variance with pedigree 0.65659, pedigree (1,1,3,1,1)
  (same comment as for Beryllium)
- COD, Chemical Oxygen Demand [water, ground-, long-term]: 0.32034 kg; lognormal variance with pedigree 0.0082852, pedigree (1,1,3,1,1)
  (same comment as for Manganese)
- Lead [air, non-urban air or from high stacks]: 1.8431e-11 kg; lognormal variance with pedigree 0.68826, pedigree (1,1,3,1,1)
  (same comment as for Beryllium)
- DOC, Dissolved Organic Carbon [water, ground-, long-term]: 0.29289 kg; lognormal variance with pedigree 0.0082852, pedigree (1,1,3,1,1)
  (same comment as for Manganese)
- Manganese [air, non-urban air or from high stacks]: 8.8316e-9 kg; lognormal variance with pedigree 0.48552, pedigree (1,1,3,1,1)
  (same comment as for Beryllium)
- BOD5, Biological Oxygen Demand [water, ground-, long-term]: 0.075836 kg; lognormal variance with pedigree 0.0082852, pedigree (1,1,3,1,1)
  (same comment as for Manganese)
- Mercury [air, non-urban air or from high stacks]: 2.6751e-9 kg; lognormal variance with pedigree 0.52762, pedigree (1,1,3,1,1)
  (same comment as for Beryllium)
- Copper [air, non-urban air or from high stacks]: 1.5918e-11 kg; lognormal variance with pedigree 0.69272, pedigree (1,1,3,1,1)
  (same comment as for Beryllium)
- Strontium [water, ground-]: 8.4784e-7 kg; lognormal variance with pedigree 0.34181, pedigree (1,1,3,1,1)
  (same comment as for Hydrogen sulfide)
- Cobalt [air, non-urban air or from high stacks]: 2.3903e-11 kg; lognormal variance with pedigree 0.68054, pedigree (1,1,3,1,1)
  (same comment as for Beryllium)
- Tin, ion [water, ground-]: 1.2892e-8 kg; lognormal variance with pedigree 0.47433, pedigree (1,1,3,1,1)
  (same comment as for Hydrogen sulfide)
- Chromium [air, non-urban air or from high stacks]: 8.5318e-12 kg; lognormal variance with pedigree 0.71415, pedigree (1,1,3,1,1)
  (same comment as for Beryllium)
- Zinc, ion [water, ground-]: 9.7213e-7 kg; lognormal variance with pedigree 0.33629, pedigree (1,1,3,1,1)
  (same comment as for Hydrogen sulfide)
- Cadmium [air, non-urban air or from high stacks]: 3.5467e-10 kg; lognormal variance with pedigree 0.5914, pedigree (1,1,3,1,1)
  (same comment as for Beryllium)
- Beryllium [water, ground-]: 2.1285e-8 kg; lognormal variance with pedigree 0.46313, pedigree (1,1,3,1,1)
  (same comment as for Hydrogen sulfide)
- Hydrogen chloride [air, non-urban air or from high stacks]: 8.4366e-5 kg; lognormal variance with pedigree 0.19104, pedigree (1,1,3,1,1)
  (same comment as for Beryllium)
- Antimony [water, ground-]: 1.5733e-10 kg; lognormal variance with pedigree 0.53882, pedigree (1,1,3,1,1)
  (same comment as for Hydrogen sulfide)
- Arsenic [air, non-urban air or from high stacks]: 9.5291e-10 kg; lognormal variance with pedigree 0.55914, pedigree (1,1,3,1,1)
  (same comment as for Beryllium)
- Selenium [water, ground-]: 1.0617e-7 kg; lognormal variance with pedigree 0.4138, pedigree (1,1,3,1,1)
  (same comment as for Hydrogen sulfide)
- Barium [air, non-urban air or from high stacks]: 5.306e-9 kg; lognormal variance with pedigree 0.50247, pedigree (1,1,3,1,1)
  (same comment as for Beryllium)
- Lead [water, ground-]: 5.5294e-8 kg; lognormal variance with pedigree 0.42613, pedigree (1,1,3,1,1)
  (same comment as for Hydrogen sulfide)
- Sulfur dioxide [air, non-urban air or from high stacks]: 7.5131e-5 kg; lognormal variance with pedigree 0.21725, pedigree (1,1,3,1,1)
  burden from direct release or incineration of landfill biogas.
  Uncertainty: Uncertainty calculated from unertainty of the waste composition of this waste, uncertainty in waste decomposition and short-term leaching in landfill
- Manganese [water, ground-]: 3.5327e-5 kg; lognormal variance with pedigree 0.25088, pedigree (1,1,3,1,1)
  (same comment as for Hydrogen sulfide)
- Methane, non-fossil [air, non-urban air or from high stacks]: 0.10168 kg; lognormal variance with pedigree 0.026929, pedigree (1,1,3,1,1)
  (same comment as for Sulfur dioxide)
- Nickel, ion [water, ground-]: 2.0043e-7 kg; lognormal variance with pedigree 0.38966, pedigree (1,1,3,1,1)
  (same comment as for Hydrogen sulfide)
- Nitrogen oxides [air, non-urban air or from high stacks]: 1.1481e-6 kg; lognormal variance with pedigree 0.19227, pedigree (1,1,3,1,1)
  (same comment as for Sulfur dioxide)
- Chromium VI [water, ground-]: 3.4127e-8 kg; lognormal variance with pedigree 0.44312, pedigree (1,1,3,1,1)
  (same comment as for Hydrogen sulfide)
- Strontium [water, ground-, long-term]: 4.4161e-5 kg; lognormal variance with pedigree 0.26908, pedigree (1,1,3,1,1)
  (same comment as for Manganese)
- Copper, ion [water, ground-]: 5.5712e-8 kg; lognormal variance with pedigree 0.42565, pedigree (1,1,3,1,1)
  (same comment as for Hydrogen sulfide)
- Carbon dioxide, non-fossil [air, non-urban air or from high stacks]: 0.22014 kg; lognormal variance with pedigree 0.002, pedigree (1,1,3,1,1)
  (same comment as for Sulfur dioxide)
- Mercury [water, ground-]: 6.6877e-9 kg; lognormal variance with pedigree 0.50108, pedigree (1,1,3,1,1)
  (same comment as for Hydrogen sulfide)
- Occupation, dump site [natural resource, land]: 0.0023333 m2*year; lognormal variance with pedigree 0.082256, pedigree (1,1,3,1,1)
  for landfill operation phase and spontaneous renaturation.
  Uncertainty: Uncertainty calculated from uncertainty in base parameters.
- Cadmium, ion [water, ground-]: 5.3201e-8 kg; lognormal variance with pedigree 0.43982, pedigree (1,1,3,1,1)
  (same comment as for Hydrogen sulfide)
- Beryllium [water, ground-, long-term]: 1.1086e-6 kg; lognormal variance with pedigree 0.39041, pedigree (1,1,3,1,1)
  (same comment as for Manganese)
- Cobalt [water, ground-]: 9.5612e-8 kg; lognormal variance with pedigree 0.42629, pedigree (1,1,3,1,1)
  (same comment as for Hydrogen sulfide)
- Zinc, ion [water, ground-, long-term]: 6.236e-5 kg; lognormal variance with pedigree 0.25772, pedigree (1,1,3,1,1)
  (same comment as for Manganese)
- Chloride [water, ground-]: 0.005853 kg; lognormal variance with pedigree 0.10421, pedigree (1,1,3,1,1)
  (same comment as for Hydrogen sulfide)
- Tin, ion [water, ground-, long-term]: 6.7392e-6 kg; lognormal variance with pedigree 0.33193, pedigree (1,1,3,1,1)
  (same comment as for Manganese)
- Arsenic, ion [water, ground-]: 6.7974e-8 kg; lognormal variance with pedigree 0.43204, pedigree (1,1,3,1,1)
  (same comment as for Hydrogen sulfide)
- Selenium [water, ground-, long-term]: 9.8317e-7 kg; lognormal variance with pedigree 0.43829, pedigree (1,1,3,1,1)
  (same comment as for Manganese)
- Barium [water, ground-]: 2.1224e-5 kg; lognormal variance with pedigree 0.26784, pedigree (1,1,3,1,1)
  (same comment as for Hydrogen sulfide)
- Antimony [water, ground-, long-term]: 5.2902e-10 kg; lognormal variance with pedigree 0.77148, pedigree (1,1,3,1,1)
  (same comment as for Manganese)
- Nitrate [water, ground-]: 8.3882e-5 kg; lognormal variance with pedigree 0.13638, pedigree (1,1,3,1,1)
  (same comment as for Hydrogen sulfide)
- Lead [water, ground-, long-term]: 2.8908e-5 kg; lognormal variance with pedigree 0.28373, pedigree (1,1,3,1,1)
  (same comment as for Manganese)
- Nitrite [water, ground-]: 4.3412e-5 kg; lognormal variance with pedigree 0.13638, pedigree (1,1,3,1,1)
  (same comment as for Hydrogen sulfide)
- Nickel, ion [water, ground-, long-term]: 1.044e-5 kg; lognormal variance with pedigree 0.31693, pedigree (1,1,3,1,1)
  (same comment as for Manganese)
- Nitrogen, organic bound [water, ground-]: 0.0013036 kg; lognormal variance with pedigree 0.13638, pedigree (1,1,3,1,1)
  (same comment as for Hydrogen sulfide)

## Extrapolations
This dataset has been extrapolated from year 2012 to the year of the calculation (2019). The uncertainty has been adjusted accordingly.
