# barley grain to generic market for energy feed

Dataset: EcoSpold 2, unit process
Geography: GLO
Time period: 2012-01-01 to 2019-12-31
Technology level: modern
Classification: ISIC rev.4 ecoinvent: 108:Manufacture of prepared animal feeds
Scenario: Business-as-Usual
System model: Allocation at the point of substitution
Generated by: Tereza Levova
Database: ecoinvent
isCopyrightProtected: true
accessRestrictedTo: 1

## General comment
This is a linking activity that converts barley grain into gross energy for the feed market and protein, 100% crude for the feed market.
The naming of the dataset is based on the feed nomenclature system of the National Research Council (USA). Products with less than 20 percent of protein are classified as energy feeds. Products with more than 20 percent of protein are classified as protein feeds.

## Included activities start
The activity starts with the reception of barley grain

## Included activities end
The activity ends with the conversion of barley grain into gross energy and crude protein

## Technology
the technology is considered modern for modelling purposes in the consequential (system expansion) system model.

## Parameters
- fraction_to_generic_market: 0.9 % (obsolete); lognormal variance with pedigree 0.108, pedigree (4,1,1,1,1)
  It is assumed that 90% of barley grain is traded on generic protein feed market, i.e. its buyers do not care what type of protein feed they are buying. Remaining 10% of the production volume (PV) is assumed to be used for uses, where specific type of protein feed is required and cannot be substituted by any other protein feed.

## Reference product
- energy feed, gross: 1 MJ; name energy_feed_RP; source Agroscope 2011; CPC 23319: Preparations used in animal feeding n.e.c.; By-product classification allocatable product
  production volume 1.94198e12 MJ; = 138620000000* barley_grain_in_gross_E_feed_per_kg_DM_0* barley_input_DM* fraction_to_generic_market
    Calculated based on production volume of barley grain in barley production. 1.3862E+11 kg is the amount of barley produced in the whole world in 2005 (FAO).
  property price 0.0108 EUR2005; name energy_feed_RP_price_EUR2005
    Based on energy feed, gross content in soybean meal and prices per kg of soybean meal. Assumed soybean meal is the most used feed. Soybean meal 2004 prices for World import/export data (tonnes and US$) from FaoStat statistics (http://faostat.fao.org/site/535/default.aspx#ancor, TRADE)- [Accessed 24 May 2010]. See calculations for protein /energy content
  property carbon content 0
    carbon content on a dry matter basis (reserved; not for manual entry)
  property true value 0.0108; name energy_feed_RP_true_value
    allocation property applied in "true value" allocation // value calculated from revenue
  properties: wet mass 1 kg, dry mass 1 kg, water in wet mass 0 kg, carbon content, non-fossil 0, water content 0, carbon content, fossil 0, carbon allocation 0 kg

## By-products
- protein feed, 100% crude: 0 kg; name protein_feed_output; = barley_grain_in_protein_feed_per_kg_DM_0* barley_input_DM * barley_grain_input; source Agroscope 2011; By-product classification allocatable product; CPC 23319: Preparations used in animal feeding n.e.c.; pedigree (1,1,1,1,1)
  based on dry mass of barley grain (0.86 kg/kg fresh mass) and the protein content of barley grain (0.1163kg/kg dry mass)
  production volume 1.2478e10 kg; = Ref('1b4b0b49-a011-4826-9b88-dd8ad3493a34', 'ProductionVolume') * (Ref('8d2f13f8-5732-483b-9014-01035a4fdffd') / energy_feed_RP)
    Calculated as a relative to the reference product.
  property carbon content, non-fossil 0.53
    considered pure protein (ecoinvent v2.2 report 17, pg 288). C-content in protein is estimated to be 53% ( from "Evolutionary and Biochemical Aspects", A.D. Kay and T. Vrede (in Global Ecology, 2010, Elsevier B.V., S.E. Jørgensen Ed.).
  property price 0.424 EUR2005; name protein_feed_output_price_EUR2005
    Based on protein content and energy feed, gross content in soybean meal and prices per kg of soybean meal. Assumed soybean meal is the most used feed. Soybean meal 2004 prices for World import/export data (tonnes and US$) from FaoStat statistics (http://faostat.fao.org/site/535/default.aspx#ancor, TRADE)- [Accessed 24 May 2010]. See calculations for protein /energy content
  property carbon content 0.53
    carbon content on a dry matter basis (reserved; not for manual entry)
  property true value 0.00272438; name protein_feed_output_true_value
    allocation property applied in "true value" allocation // value calculated from revenue
  properties: dry mass 1 kg, carbon content, fossil 0, water content 0, wet mass 1 kg, water in wet mass 0 kg, carbon allocation 0.53 kg

## Inputs from technosphere
- barley grain: 0.0513014 kg; name barley_grain_input; = energy_feed_RP*1/ barley_grain_in_gross_E_feed_per_kg_DM_0*1/ barley_input_DM; source Agroscope 2011; lognormal variance with pedigree 0.0072, pedigree (3,3,3,5,1)
  input of fresh barley grain is based on the dry matter content (0.86) and the gross energy of barley grain (18.10MJ/kg dry mass)
  property gross energy, feed per kg of dry mass 18.1 MJ/kg; name barley_grain_in_gross_E_feed_per_kg_DM_0
  property protein feed, 100% crude per kg of dry mass 0.1163 kg/kg; name barley_grain_in_protein_feed_per_kg_DM_0
  property dry mass 0.86 kg; name barley_input_DM
  properties: wet mass 1 kg, carbon content, non-fossil 0.46538, water content 0.162791
  note on gross energy, feed per kg of dry mass: Literature value from Agroscope database (http://www.feed-alp.admin.ch).
  note on carbon content, non-fossil: Composition data obtained from Barley hulled, in (http://www.nal.usda.gov/fnic/foodcomp/search/). First, composition data were refered to 1 kg dry mass. Then, C-contents were calculated considering a C-content/dry mass of 46% in carbohydrates (including fibres), 53% in proteins and 75% in fats. All data from "Evolutionary and Biochemical Aspects", A.D. Kay and T. Vrede (in Global Ecology, 2010, Elsevier B.V., S.E. Jørgensen Ed.).

## Sampling procedure
inventory based on gross energy and protein composition of raw material. Data obtained from Agroscope database of feedstuff compositions.

## Review by Emilia Moreno Ruiz 2013-03-18
formula broken - corrected

## Review by Bo Weidema 2012-03-14
Production volumes are for 2005, even though the dataset is indicated to be valid for 2012.
