# fatty alcohol production, petrochemical

Dataset: EcoSpold 2, unit process
Geography: RoW
Time period: 1995-01-01 to 2019-12-31
Technology level: modern
Classification: EcoSpold01Categories: chemicals/organics
Classification: ISIC rev.4 ecoinvent: 2011:Manufacture of basic chemicals
Tags: ConvertedDataset
Scenario: Business-as-Usual
System model: Allocation at the point of substitution
Generated by: Roland Hischier
Published in: Zah R. 2007
Database: ecoinvent
isCopyrightProtected: true
accessRestrictedTo: 1

## General comment
This dataset represents the production of 1 kg of fatty alcohol from pertrochemical.
Technology is based on European production in the mid 90'. Two production processes were considered: Ziegler process and Oxo process. For the dataset it was assumed according to literature sources a mix of 82% of fatty alcohols produced with the Oxo process and 18% produced by the Ziegler process.
In each step examined, the material and energy input as well as the emissions to air and water and the produced waste are from literature sources. Water consumption and infrastructure are estimation. Transport is calculated based on literature sources.
Production system of fatty alcohols from petrochemical:
[This dataset was already contained in the ecoinvent database version 2. It was not individually updated during the transfer to ecoinvent version 3. Life Cycle Impact Assessment results may still have changed, as they are affected by changes in the supply chain, i.e. in other datasets. This dataset was generated following the ecoinvent quality guidelines for version 2. It may have been subject to central changes described in the ecoinvent version 3 change report (http://www.ecoinvent.org/database/ecoinvent-version-3/reports-of-changes/), and the results of the central updates were reviewed extensively. The changes added e.g. consistent water flows and other information throughout the database. The documentation of this dataset can be found in the ecoinvent reports of version 2, which are still available via the ecoinvent website. The change report linked above covers all central changes that were made during the conversion process.]

## Included activities start
From reception of precursors ethylene, n-olefin, natural gas, crude oil at the factory gate.

## Included activities end
This activity ends with 1 kg of fatty alcohol. This dataset includes material and energy input, water consumption, infrastructure, transport, production of waste and emissions for the production of fatty alcohol out of petropchemical.

## Geography
Data based on the European n-olefins production

## Technology
Average technology typical for European production conditions in the mid 90s. //Comment added during dataset update:// the petrochemical route has been designated as modern, since it has the good ability to change capacity with changes in demand compared to most oleochemical raw materials (with palm oil as an exception).
For the production out of petrochemical resources, two main routes exist:
1) Ziegler process: this process is a catalytic process involving as catalyst triethylaluminium. After a hydrogenation of the catalyst, ethylene is inserted into the aluminium-carbon bond of this molecule to build up the carbon chain. This step is then followed by a growth reaction of the aluminium alkyls to aluminium alcoholates by oxidation with air. These are then subsequently hydrolysed to alcohols, as shown in the process steps listed.
Flow diagram of the Ziegler process for the production of petrochemical fatty alcohols:
The different process reactions: Hydrogenation [1], ethylation [2], growth reaction [3], oxidation [4] and final hydrolysis [5]
2) Oxo process: this process constitutes a hydroformylation in which long chain olefins are reacted with hydrogen and carbon monoxide. An intermediate aldehyde is formed, which is subsequently reduced by hydrogen.
Flow diagram of the oxo process for the production of petrochemical fatty alcohols:
Reference:
Noweck K. (2001) Fatty Alcohols. In: Ullmann's Encyclopedia of Industrial Chemistry, Sixth Edition, June 2001

## Time period
data of published literature

## Parameters
- fraction, cooling water, recirculating system, to air: 0.771; name fraction_CW_R_to_air; lognormal variance with pedigree 0.0413, pedigree (2,3,1,3,1)
  Calculated based on literature value (Scown, C.D., 2011, Water Footprint of U.S. Transportation Fuels and supplying information of the article) (Vionnet, S., Quantis Water Database - Technical Report, 2012).
- fraction, process water, to air: 0.15 dimensionless; name fraction_PW_to_air; lognormal variance with pedigree 0.092025, pedigree (4,4,3,2,4)
  Literature value. In case when no industry/process specific data are available, default evaporation fraction value is used. This value is 15% and is based on literature (Statistics Canada, 2007 & Shaffer, K.H., 2008, Consumptive water use in the Great Lakes Basin, USGS & Shiklomanov, 2003, World Water Resources at the Beginning of the 21st Century) and has been approved by an expert.
- fraction, cooling water, cooling pond system, to air: 0.032; name fraction_CW_CP_to_air; lognormal variance with pedigree 0.0413, pedigree (2,3,1,3,1)
  (same comment as for fraction, cooling water, recirculating system, to air)
- fraction, cooling water, to air: 0.3875; name fraction_CW_to_air; = (0.5*fraction_CW_OT_to_air)+(0.5*fraction_CW_R_to_air); lognormal variance with pedigree 0.092025, pedigree (4,4,3,2,4)
  Calculated value based on literature value (see comments of the other parametres present in this dataset) and expert opinion. In the case when no industry/literature data are available about the type of cooling or directly fraction, cooling water, to air specific for the process a default assumption is applied. It is assumed that the once-through cooling system is used in 50% of all cases and recirculating system is used in another 50% of all cases.
- fraction, cooling water, once-through system, to air: 0.004; name fraction_CW_OT_to_air; lognormal variance with pedigree 0.0413, pedigree (2,3,1,3,1)
  (same comment as for fraction, cooling water, recirculating system, to air)

## Reference product
- fatty alcohol: 1 kg; source Noweck K. 2001; CPC 34139: Other alcohols, phenols, phenol-alcohols, and their halogenated, sulphonated, nitrated or nitrosated derivativ[…]; By-product classification allocatable product
  Fatty alcohols are aliphatic alcohols with chain lengths between C6 and C22:
  CH3(CH2)nCH2OH (n=4-20)
  They are predominantly linear and monohydric and can be saturated or have one or more double bonds. Alcohols with a carbon chain length above C22 are referred to as wax alcohols. Diols with chain lengths exceeding C8 are regarded as substituted fatty alcohols. The character of fatty alcohols (primary or secondary, linear or branched, saturated or unsaturated) is determined by the manufacturing process and the raw material used. Fatty alcohols and their derivatives are used in polymers, surfactants, oil additives and cosmetics and have many specialty uses.
  While saturated fatty alcohols up to dodecanol are clear colorless liquids, the next higher homologues are soft materials. Saturated alcohols crystallize in a nearly orthorhombic lattice and all of them have a lower specific density than water. While lower members have a characteristic odor, higher fatty alcohols are odorless. The boiling as well as the melting points increase uniformly with the chain lengh and are both significantly higher compared with hydrocarbons having the same number of carbon atoms. Suitable solvents therefore are common organic solvents - i.e. petroleum ether, lower alcohols, diethyl ether. Concerning the solubility in water, only hexanol and octanol show some solubility - all higher fatty alcohols are immiscible with water.
  Fatty alcohols are mainly used as derivatives. In Western Europe only 5% of the production is used directly and 95% is used as intermediates. Major property of fatty alcohols is the amphiphilic character. Therefore, surfactants account for 70-75% of total fatty alcohol production. They can be used in detergents, emulsions, cosmetic creams, lotions, or as lubricants.
  EcoSpold01Location=RER
  production volume 6.24e8 kg
    Global capacity 2600 million kg, capacity utilisation at 75%. (Source: http://goliath.ecnext.com/coms2/gi_0198-101933/Surfactant-producers-take-a-cautious.html). 50% of this is assumed to be petrochemically sourced (http://www.zenitech.com/documents/new%20pdfs/articles/All%20about%20fatty%20alcohols%20Condea.pdf).
  property price 2.1 EUR2005
    From ICIS (http://www.icispricing.com/il_shared/Samples/SubPage10100086.asp) Commodity: 'Fatty Alcohols'. Year 2011
  property carbon content, fossil 0.784331
    Fatty alcohols have chain lengths between C6 and C22, their chemical formula is CH3(CH2)nCH2OH (ecoinvent report 12, pg 16). As an average, C14 was used.
  property carbon content 0.784331
    carbon content on a dry matter basis (reserved; not for manual entry)
  property true value 2.1
    allocation property applied in "true value" allocation // value calculated from revenue
  properties: water content 0, dry mass 1 kg, wet mass 1 kg, water in wet mass 0 kg, carbon content, non-fossil 0, carbon allocation 0.784331 kg

## By-products
- heat, for reuse in municipal waste incineration only: 0 MJ; CPC 17300: Steam and hot water; By-product classification allocatable product; pedigree (1,1,1,1,1)
  Net electricity generated from this waste and used in internal MSWI plant energy redistribution.
  Uncertainty: uncertainty is calculated from uncertainties in waste composition and uncertainties in energy efficiency and the uncertainty in internal energy demand
  production volume 382137 MJ
  property exergy 0.1842 MJ; name E_th_prod_MSWI_exergy
    This exergy property is based on the exergy content of the product.
  property price 0.0106 EUR2005; name E_th_prod_MSWI_price_EUR2005
    Average European district heat price from Ecoheatcool and Euroheat 2005-2006, Ecoheat Work package 1: The European heat market. Final report. 10.6 EUR/GJ i s the price of district heat. http://www.solarthermalworld.org/files/Ecoheatcool%20WP1%20Web.pdf?download
  property true value relation 0.1842; name E_th_prod_MSWI_true_value_relation
    property to calculate "true value" from
  property true value 4.04419e-6
    allocation property applied in "true value" allocation // value calculated from true value relation
- electricity, for reuse in municipal waste incineration only: 0 kWh; CPC 17100: Electrical energy; By-product classification allocatable product; pedigree (1,1,1,1,1)
  (same comment as for heat, for reuse in municipal waste incineration only)
  production volume 51732.2 kWh
  property price 0.1 EUR2005; name E_el_prod_MSWI_price_EUR2005
    Estimated to be the same price as in case of electricity, medium voltage.
  property exergy 3.6 MJ; name E_el_prod_MSWI_exergy
    This exergy property is based on the exergy content of the product.
  property true value relation 3.6; name E_el_prod_MSWI_true_value_relation
    property to calculate "true value" from
  property true value 1.07e-5
    (same comment as for heat, for reuse in municipal waste incineration only)
- iron scrap, sorted, pressed: 0 kg; By-product classification Recyclable; CPC 39310: Slag, dross, scalings and other waste from the manufacture of iron or steel; pedigree (1,1,1,1,1)
  metallic iron scrap removed from ash reamains and recycled.
  Uncertainty: uncertainty is calculated from uncertainties in waste composition and transfer coefficients to soild residues
  production volume 7002.71 kg
  property price 0.175 EUR2005
    Temporary price data. Calculated as 90% of purchasers price based on: 2005 import and export prices (total trades (USD) divided by total weight (kg) in biggest economies of the world: EU27, USA, Brasil, China, India, Japan and Russia) from UN Commodity Trade Statistics Database (http://data.un.org/Explorer.aspxDatabase [Accessed 2011.06.20]). Commodity: Waste or scrap, of cast iron
  property carbon content 0
    carbon content on a dry matter basis (reserved; not for manual entry)
  property true value 1.82208e-6
    allocation property applied in "true value" allocation // value calculated from revenue
  properties: carbon content, non-fossil 0, wet mass 1 kg, dry mass 1 kg, water content 0, carbon content, fossil 0, water in wet mass 0 kg, carbon allocation 0 kg
- copper: 0 kg; source Rentz O. 1999; By-product classification allocatable product; CPC 41413: Refined copper and copper alloys, unwrought; master alloys of copper
  Literature value. Copper uses: Before end-use copper is manufactured into semi fabricated products, such as shapes and ingots (known as 'semis'). These manufacturing processes are subdivided into hot working, cold working and, if necessary, process annealing. Few of the semis are ready for use as such. They more typically travel to first-stage manufacturers, who make metal rods, wire, and casting, and then to component manufacturers who produce such things as motors, valves, and insulated cables The components in turn are incorporated by final-stage manufacturers into a variety of finished products - automobiles, commercial buildings, residential housing, and so forth. These uses account for about 79% of the world-wide consumption of copper.
  production volume 225.651 kg
  property price 5.52 EUR2005
    Literature value (http://www.economist.com/news/business/21576714-mining-industry-has-enriched-chile-its-future-precarious-copper-solution). Average price between 20015 and 2013.
  property carbon content 0
    carbon content on a dry matter basis (reserved; not for manual entry)
  property true value 1.82939e-6
    allocation property applied in "true value" allocation // value calculated from revenue
  properties: dry mass 1 kg, water in wet mass 0 kg, wet mass 1 kg, carbon content, non-fossil 0, water content 0, carbon content, fossil 0, carbon allocation 0 kg
- zinc concentrate: 0 kg; CPC 14290: Other non-ferrous metal ores and concentrates (other than uranium or thorium ores and concentrates); By-product classification allocatable product
  Calculated value from the knowledge of the properties of both products.
  production volume 1.79105e-7 kg
  property price 0.38 EUR2005; name ByP_price_EUR2005
    Temporary price data. Calculated as 90% of purchasers price based on: Zinc content in concentrate 53%. Concentrate price per kg Zn 86.5% of refined Zn price (13.5% treatment charges according to CHR Metals Limited 2005: Dynamic cost curves. http://www.minecost.com/dynamic.pdf). 2004 zinc price from USGS (2007) Mineral commodity summaries 2007. <http://minerals.usgs.gov/minerals/pubs/mcs/2007/mcs2007.pdf> [Accessed 25 May 2010]
  property zinc content 0.53; name zinc_C_zinc_concentrate
    Zinc content on a dry matter basis. Value taken from teh "zinc mine operation" /GLO dataset.
  property dry mass 1 kg; name DM_zinc_concentrate
  property carbon content 0
    carbon content on a dry matter basis (reserved; not for manual entry)
  property true value 9.99593e-17
    allocation property applied in "true value" allocation // value calculated from revenue
  properties: wet mass 1 kg, water content 0, carbon content, non-fossil 0, carbon content, fossil 0, water in wet mass 0 kg, carbon allocation 0 kg
- iron scrap, unsorted: 0 kg; source European Aluminium Association 2008; CPC 39310: Slag, dross, scalings and other waste from the manufacture of iron or steel; By-product classification Recyclable; pedigree (1,1,1,1,1)
  production volume 0.185263 kg
  property price 0.149 EUR2005; name ironScrapAmount_price_EUR2005
    Temporary price data. Calculated as 90% of purchasers price based on: estimated at 85% of sorted scrap
  property carbon content 0
    carbon content on a dry matter basis (reserved; not for manual entry)
  property true value 4.4137e-11
    allocation property applied in "true value" allocation // value calculated from revenue
  properties: water in wet mass 0 kg, water content 0, carbon content, fossil 0, carbon content, non-fossil 0, dry mass 1 kg, wet mass 1 kg, carbon allocation 0 kg
- aluminium oxide, non-metallurgical: 0 kg; source European Aluminium Association 2008; CPC 41432: Alumina (aluminium oxide), except artificial corundum; By-product classification allocatable product; CAS 1344-28-1; pedigree (1,1,1,1,1)
  production volume 11.6579 kg
  property carbon content, non-fossil 0; name C_content_non_fossil
  property price 0.28 EUR2005; name Al2O3Amount_price_EUR2005
    From UN trade database. http://data.un.org/ Import data from the largest economies of the world are used (Brazil, India, USA, China, Japan and EU-27).
  property dry mass 1 kg; name DM
  property water content 0; name water_content
  property wet mass 1 kg; name WM
  property water in wet mass 0 kg; name WWM
  property carbon content, fossil 0; name C_content_fossil
  property carbon content 0
    carbon content on a dry matter basis (reserved; not for manual entry)
  property true value 5.21922e-9
    allocation property applied in "true value" allocation // value calculated from revenue
  properties: carbon allocation 0 kg
- aluminium, cast alloy: 0 kg; source European Aluminium Association 2008; By-product classification allocatable product; CPC 41431: Unwrought aluminium; pedigree (1,1,1,1,1)
  EcoSpold01Location=RER
  production volume 108.976 kg
  property price 1.3 EUR2005; name castAlloyAmount_price_EUR2005
    Temporary price data. Calculated as 90% of purchasers price based on: Source: London Metal Exchange, Aluminium alloy price for 2005
  property carbon content 0
    carbon content on a dry matter basis (reserved; not for manual entry)
  property true value 2.26517e-7
    allocation property applied in "true value" allocation // value calculated from revenue
  properties: water in wet mass 0 kg, carbon content, non-fossil 0, water content 0, dry mass 1 kg, carbon content, fossil 0, wet mass 1 kg, carbon allocation 0 kg
- aluminium, wrought alloy: 0 kg; source European Aluminium Association 2008; By-product classification allocatable product; CPC 4153: Semi-finished products of aluminium or aluminium alloys; pedigree (1,1,1,1,1)
  production volume 47.7075 kg
  property price 1.44 EUR2005; name secondaryAluminiumOutput_price_EUR2005
    Estimated based on literature values and expert judgement. Aluminium ccast alloys are about 90% of the price of aluminium wrought alloys.
  property carbon content 0
    carbon content on a dry matter basis (reserved; not for manual entry)
  property true value 1.09844e-7
    allocation property applied in "true value" allocation // value calculated from revenue
  properties: wet mass 1 kg, water content 0, carbon content, fossil 0, water in wet mass 0 kg, carbon content, non-fossil 0, dry mass 1 kg, carbon allocation 0 kg

## Inputs from technosphere
- heat, district or industrial, other than natural gas: 0 MJ; source Hirsinger F. 1995; pedigree (1,1,1,1,1)
  Estimation: estimated based on large chemical plant
  EcoSpold01Location=RER
  Uncertainty: estimation, based on ECOSOL data
- ethylene, average: 0 kg; source Hirsinger F. 1995; pedigree (1,1,1,1,1)
  EcoSpold01Location=RER
  Literature Value.
  Uncertainty: data from ECOSOL study (Literature)
  properties: carbon content, fossil 0.857143, dry mass 1 kg, wet mass 1 kg
  note on carbon content, fossil: Fatty alcohols have chain lengths between C6 and C22, their chemical formula is CH3(CH2)nCH2OH (ecoinvent report 12, pg 16). As an average, C14 was used. Ethylene, C2H4 (ecoinvent v2.2 report 11_II). MW=28 g/mol
- electricity, medium voltage: 0 kWh; source Hirsinger F. 1995; pedigree (1,1,1,1,1)
  EcoSpold01Location=UCTE
  Estimation: estimated based on large chemical plant
  Uncertainty: estimation, based on ECOSOL data
- municipal solid waste: 0 kg; pedigree (1,1,1,1,1)
  Literature Value.
  EcoSpold01Location=CH
  Uncertainty: data from ECOSOL study (Literature)
  production volume 0 kg
    Calculated from the production volume of fatty alcohol in proportion to the respective output amounts.
  properties: carbon content, fossil 0.171549, water content 0.297017, carbon content, non-fossil 0.261655, dry mass 0.771 kg, wet mass 1 kg
  note on carbon content, fossil: Fatty alcohols have chain lengths between C6 and C22, their chemical formula is CH3(CH2)nCH2OH (ecoinvent report 12, pg 16). As an average, C14 was used. MSW composition in tab 4.1, ecoinvent v2.2 report 13_I. C content referred to 1 kg DM
  note on carbon content, non-fossil: see Fig 4.5 from ecoinvent report 12 MSW composition in tab 4.1, ecoinvent v2.2 report 13_I. C content referred to 1 kg DM
- heat, district or industrial, natural gas: 0 MJ; source Hirsinger F. 1995; pedigree (1,1,1,1,1)
  (same comment as for heat, district or industrial, other than natural gas)
- n-olefins: 0.777993 kg; lognormal variance with pedigree 0.0606, pedigree (2,5,5,5,1)
  EcoSpold01Location=RER
  Literature Value.
  Uncertainty: data from ECOSOL study (Literature)
  properties: carbon content, fossil 0.876404, wet mass 1 kg, dry mass 1 kg
  note on carbon content, fossil: Fatty alcohols have chain lengths between C6 and C22, their chemical formula is CH3(CH2)nCH2OH (ecoinvent report 12, pg 16). As an average, C14 was used. n-olefins in detergent context is produced from paraffin and/or ethylene, and it's considered a C10-C16 molecule with at least one double bound (ecoinvent v2.2 report n12, pg 10). C13 was used, as average, and 3 double bonds were stated, so the formula used is C13H22.
- chemical factory, organics: 3.99996e-10 unit; source Hirsinger F. 1995; lognormal variance with pedigree 0.52, pedigree (5,5,5,5,4)
  EcoSpold01Location=RER
  Estimation: estimated based on large chemical plant
  Uncertainty: estimated from a large chem. plant
- heat, district or industrial, other than natural gas: 0.0011543, 2.57482 MJ (2 entries); source Hirsinger F. 1995; lognormal variance with pedigree 0.078, pedigree (4,5,5,5,1)
  (same comment as for heat, district or industrial, other than natural gas)
- ethylene, average: 0.00279505, 0.174203 kg (2 entries); source Hirsinger F. 1995; lognormal variance with pedigree 0.0606, pedigree (2,5,5,5,1)
  EcoSpold01Location=RER
  Literature Value.
  Uncertainty: data from ECOSOL study (Literature)
- electricity, medium voltage: 0.00217304, 0.000395402, 0.00670542, 0.0972216, 0.0139143, 0.0455888 kWh (6 entries); source Hirsinger F. 1995; lognormal variance with pedigree 0.078, pedigree (4,5,5,5,1)
  (same comment as for electricity, medium voltage)
- municipal solid waste: -4.78234e-6, -1.20503e-6, -1.72206e-6, -0.00338226 kg (4 entries); lognormal variance with pedigree 0.0606, pedigree (2,5,5,5,1)
  Literature Value.
  EcoSpold01Location=CH
  Uncertainty: data from ECOSOL study (Literature)
  production volume 2.11536e6 kg
- heat, district or industrial, natural gas: 0.0561392, 3.17383 MJ (2 entries); source Hirsinger F. 1995; lognormal variance with pedigree 0.078, pedigree (4,5,5,5,1)
  (same comment as for heat, district or industrial, other than natural gas)

## Inputs from nature
- Water, unspecified natural origin [natural resource, in water]: 0.00599995 m3; name water_UNO_input; source Hirsinger F. 1995; lognormal variance with pedigree 0.21, pedigree (5,5,5,5,4)
  Estimation: a process water amount of 25% of the cooling water amount is assumed based on literature sources for a large chemical plant.
  Uncertainty: estimated from a large chem. plant
- Gas, natural, in ground [natural resource, in ground]: 0.0761993 m3; source Hirsinger F. 1995; lognormal variance with pedigree 0.0606, pedigree (2,5,5,5,1)
  Literature Value.
  Uncertainty: data from ECOSOL study (Literature)
- Oil, crude, in ground [natural resource, in ground]: 0.0119999 kg; source Hirsinger F. 1995; lognormal variance with pedigree 0.0606, pedigree (2,5,5,5,1)
  Literature Value.
  Uncertainty: data from ECOSOL study (Literature)
- Water, cooling, unspecified natural origin [natural resource, in water]: 0.0239998 m3; name water_cooling_UNO_input; source Hirsinger F. 1995; lognormal variance with pedigree 0.21, pedigree (5,5,5,5,4)
  (same comment as for Water, unspecified natural origin)

## Emissions to nature
- Ammonia [air, urban air close to ground]: 1.67999e-5 kg; source Hirsinger F. 1995; lognormal variance with pedigree 0.1006, pedigree (2,5,5,5,1)
  Literature Value.
  Uncertainty: data from ECOSOL study (Literature)
- Particulates, < 2.5 um [air, urban air close to ground]: 6.20994e-6 kg; source Hirsinger F. 1995; lognormal variance with pedigree 0.3706, pedigree (2,5,5,5,1)
  Literature Value.
  Uncertainty: data from ECOSOL study (Literature)
- Iron, ion [water, surface water]: 7.97993e-7 kg; source Hirsinger F. 1995; lognormal variance with pedigree 0.7106, pedigree (2,5,5,5,1)
  Literature Value.
  Uncertainty: data from ECOSOL study (Literature)
- Oils, unspecified [water, surface water]: 1.81998e-7 kg; source Hirsinger F. 1995; lognormal variance with pedigree 0.3706, pedigree (2,5,5,5,1)
  Literature Value.
  Uncertainty: data from ECOSOL study (Literature)
- Hydrocarbons, unspecified [water, surface water]: 1.19999e-9 kg; source Hirsinger F. 1995; lognormal variance with pedigree 0.1006, pedigree (2,5,5,5,1)
  Literature Value.
  Uncertainty: data from ECOSOL study (Literature)
- BOD5, Biological Oxygen Demand [water, surface water]: 6.00995e-5 kg; source Hirsinger F. 1995; lognormal variance with pedigree 0.1006, pedigree (2,5,5,5,1)
  Literature Value.
  Uncertainty: data from ECOSOL study (Literature)
- Water [air, unspecified]: 0.0101999 m3; name water_to_air_unspecified; = water_cooling_UNO_input*fraction_CW_to_air+water_UNO_input*fraction_PW_to_air; lognormal variance with pedigree 0.130025, pedigree (4,4,5,2,4)
  Calculated value based on literature values and expert opinion. See comments in the parametres' comment field.
  property fraction, origin: fresh water 0; name fraction_origin_fresh_water
  property fraction, origin: salt water 0; name fraction_origin_salt_water
  property fraction, origin: unspecified 1; name fraction_origin_unspecified
- Ammonium, ion [water, surface water]: 8.41992e-6 kg; source Hirsinger F. 1995; lognormal variance with pedigree 0.1006, pedigree (2,5,5,5,1)
  Literature Value.
  Uncertainty: data from ECOSOL study (Literature)
- Water [water, unspecified]: 0.0197998 m3; name water_to_water_unspecified; = water_cooling_UNO_input*(1-fraction_CW_to_air)+water_UNO_input*(1-fraction_PW_to_air); lognormal variance with pedigree 0.130025, pedigree (4,4,5,2,4)
  (same comment as for Water)
  property fraction, origin: fresh water 0; name fraction_origin_fresh_water_Ww
  property fraction, origin: salt water 0; name fraction_origin_salt_water_Ww
  property fraction, origin: unspecified 1; name fraction_origin_unspecified_Ww
- Suspended solids, unspecified [water, surface water]: 9.47992e-5 kg; source Hirsinger F. 1995; lognormal variance with pedigree 0.1006, pedigree (2,5,5,5,1)
  Literature Value.
  Uncertainty: data from ECOSOL study (Literature)
- Sulfur dioxide [air, urban air close to ground]: 0.000749993 kg; source Hirsinger F. 1995; lognormal variance with pedigree 0.0606, pedigree (2,5,5,5,1)
  Literature Value.
  Uncertainty: data from ECOSOL study (Literature)
- Fluoride [water, surface water]: 9.99991e-7 kg; source Hirsinger F. 1995; lognormal variance with pedigree 0.1006, pedigree (2,5,5,5,1)
  Literature Value.
  Uncertainty: data from ECOSOL study (Literature)
- Carbon monoxide, fossil [air, urban air close to ground]: 0.000140999 kg; source Hirsinger F. 1995; lognormal variance with pedigree 0.7106, pedigree (2,5,5,5,1)
  Literature Value.
  Uncertainty: data from ECOSOL study (Literature)
- COD, Chemical Oxygen Demand [water, surface water]: 0.000120199 kg; lognormal variance with pedigree 0.1006, pedigree (2,5,5,5,1)
  Calculated as 2*BOD5.
  Uncertainty: data from ECOSOL study (Literature)
- Sulfate [water, surface water]: 0.000356997 kg; source Hirsinger F. 1995; lognormal variance with pedigree 0.1006, pedigree (2,5,5,5,1)
  Literature Value.
  Uncertainty: data from ECOSOL study (Literature)
- Acidity, unspecified [water, surface water]: 2.98997e-6 kg; source Hirsinger F. 1995; lognormal variance with pedigree 0.1006, pedigree (2,5,5,5,1)
  Literature Value.
  Uncertainty: data from ECOSOL study (Literature)
- DOC, Dissolved Organic Carbon [water, surface water]: 4.45181e-5 kg; lognormal variance with pedigree 0.1006, pedigree (2,5,5,5,1)
  Calculated as equal to TOC.
  Uncertainty: data from ECOSOL study (Literature)
- Zinc, ion [water, surface water]: 1.33999e-7 kg; source Hirsinger F. 1995; lognormal variance with pedigree 0.7106, pedigree (2,5,5,5,1)
  Literature Value.
  Uncertainty: data from ECOSOL study (Literature)
- Particulates, > 2.5 um, and < 10um [air, urban air close to ground]: 1.06999e-5 kg; source Hirsinger F. 1995; lognormal variance with pedigree 0.1806, pedigree (2,5,5,5,1)
  Literature Value.
  Uncertainty: data from ECOSOL study (Literature)
- Chloride [water, surface water]: 0.000200998 kg; source Hirsinger F. 1995; lognormal variance with pedigree 0.1006, pedigree (2,5,5,5,1)
  Literature Value.
  Uncertainty: data from ECOSOL study (Literature)
- TOC, Total Organic Carbon [water, surface water]: 4.45181e-5 kg; lognormal variance with pedigree 0.1006, pedigree (2,5,5,5,1)
  Calculated by default as TOC (gC) = COD/2.7 (COD measured in g O2). Should more correctly be calculated from the carbon content of the specified emissions to water.
  Uncertainty: data from ECOSOL study (Literature)
- Phosphate [water, surface water]: 6.42994e-7 kg; source Hirsinger F. 1995; lognormal variance with pedigree 0.1006, pedigree (2,5,5,5,1)
  Literature Value.
  Uncertainty: data from ECOSOL study (Literature)
- Nitrogen oxides [air, urban air close to ground]: 0.000205998 kg; source Hirsinger F. 1995; lognormal variance with pedigree 0.1006, pedigree (2,5,5,5,1)
  Literature Value.
  Uncertainty: data from ECOSOL study (Literature)
- Particulates, > 10 um [air, urban air close to ground]: 7.94993e-6 kg; source Hirsinger F. 1995; lognormal variance with pedigree 0.1006, pedigree (2,5,5,5,1)
  Literature Value.
  Uncertainty: data from ECOSOL study (Literature)

## Extrapolations
data out of ECOSOL study of European Surfactant Industry. Common translation rules used, reported in Chemical report (Althaus et al. 2003). This dataset has been copied from an original dataset covering the geography RER. The uncertainty has been adjusted accordingly.

## Review by Heiko Kunst 2003-06-20
Passed
Passed
