# printed wiring board production, mounted mainboard, desktop computer, Pb containing

Dataset: EcoSpold 2, unit process
Geography: GLO
Time period: 2005-01-01 to 2019-12-31
Technology level: current
Classification: ISIC rev.4 ecoinvent: 2610:Manufacture of electronic components and boards
Classification: EcoSpold01Categories: electronics/module
Tags: ConvertedDataset
Scenario: Business-as-Usual
System model: Allocation at the point of substitution
Generated by: Roland Hischier
Published in: Hischier R. 2007
Database: ecoinvent
isCopyrightProtected: true
accessRestrictedTo: 1

## General comment
This dataset represents the average composition and production efforts for 1 kg of a motherboard used in a desktop PC. It is based on a typical Desktop PC mainboard, used in modern computers. Main data are taken from the literature and own dismantling activities. Infrastructure and production efforts are based on own assumptions.
[This dataset was already contained in the ecoinvent database version 2. It was not individually updated during the transfer to ecoinvent version 3. Life Cycle Impact Assessment results may still have changed, as they are affected by changes in the supply chain, i.e. in other datasets. This dataset was generated following the ecoinvent quality guidelines for version 2. It may have been subject to central changes described in the ecoinvent version 3 change report (http://www.ecoinvent.org/database/ecoinvent-version-3/reports-of-changes/), and the results of the central updates were reviewed extensively. The changes added e.g. consistent water flows and other information throughout the database. The documentation of this dataset can be found in the ecoinvent reports of version 2, which are still available via the ecoinvent website. The change report linked above covers all central changes that were made during the conversion process.]

## Included activities start
From reception of printed wiring board at the factory gate.

## Included activities end
This dataset includes component input and production efforts (incl. PWB waste due to failure in mounting) for the production of Desktop PC mainboards, using Pb-containing solder material.

## Geography
Data represent a global valuable composition of Desktop PC mainboards.

## Technology
Average PWB mounting technology (solder paste production line)

## Reference product
- printed wiring board, mounted mainboard, desktop computer, Pb containing: 1 kg; By-product classification allocatable product; CPC 47160: Electronic integrated circuits
  EcoSpold01Location=GLO
  The motherboard is the largest circuit board (printed wiring board) in a PC. It contains the microprocessor(s) with heat sink, solid-state random access memory (RAM), support chips, Basic Input/Output System (BIOS), backup battery, etc. Many motherboards include built-in modems, sound, video, Ethernet, SCSI host adapters, RAID, Firewire, and other options. The fabrication of a printed wiring board is described in more details in part II (“modules”) of this report.
  production volume 1 kg
    Dummy value to be replaced by measured, estimated or calculated value
  property price 182.774 EUR2005
    Calculated based on inputs: The price of the product has been calculated as a sum of the values of the material and energy inputs for this product. This value is therefore a rough estimation. It may underestimate the real price since there are additional expenses when producing any product. These expences can include for example labour costs, treatment of waste materials and profit for the producer. Please consider carefully whether this level of data quality is acceptable for your application.
  property carbon content, fossil 0.214344
    C content was calculated as the addition of C content in the PWB components
  property carbon content, non-fossil 0.00406047
    C content was calculated as the addition of C content in the PWB components
  property carbon content 0.218404
    carbon content on a dry matter basis (reserved; not for manual entry)
  property true value 182.774
    allocation property applied in "true value" allocation // value calculated from revenue
  properties: water in wet mass 0 kg, wet mass 1 kg, water content 0, dry mass 1 kg, carbon allocation 0.218404 kg

## By-products
All rows: By-product classification allocatable product
- lead: 0 kg; CPC 41441: Lead, unwrought
  EcoSpold01Location=SE
  production volume 0.000326577 kg
  property price 0.744 EUR2005
    Temporary price data. Calculated as 90% of purchasers price based on: Source: ecoinvent v2 report 10-part IX, Tab 5.10 & 2.5
  property carbon content 0
    carbon content on a dry matter basis (reserved; not for manual entry)
  property true value 0.000242974
    allocation property applied in "true value" allocation // value calculated from revenue
  properties: wet mass 1 kg, water content 0, carbon content, non-fossil 0, carbon content, fossil 0, dry mass 1 kg, water in wet mass 0 kg, carbon allocation 0 kg
- copper: 0 kg; CPC 41413: Refined copper and copper alloys, unwrought; master alloys of copper
  EcoSpold01Location=SE
  production volume 0.00483785 kg
  property price 5.52 EUR2005
    Literature value (http://www.economist.com/news/business/21576714-mining-industry-has-enriched-chile-its-future-precarious-copper-solution). Average price between 20015 and 2013.
  property carbon content 0
    carbon content on a dry matter basis (reserved; not for manual entry)
  property true value 0.0267049
    allocation property applied in "true value" allocation // value calculated from revenue
  properties: water content 0, water in wet mass 0 kg, carbon content, fossil 0, carbon content, non-fossil 0, dry mass 1 kg, wet mass 1 kg, carbon allocation 0 kg
- nickel, 99.5%: 0 kg; CPC 41422: Unwrought nickel
  EcoSpold01Location=SE
  production volume 0.000681722 kg
  property price 10.4 EUR2005
    Temporary price data. Calculated as 90% of purchasers price based on: 2004 nickel price from USGS (2007) Mineral commodity summaries 2007. <http://minerals.usgs.gov/minerals/pubs/mcs/2007/mcs2007.pdf> [Accessed 25 May 2010]
  property carbon content 0
    carbon content on a dry matter basis (reserved; not for manual entry)
  property true value 0.00708991
    allocation property applied in "true value" allocation // value calculated from revenue
  properties: water in wet mass 0 kg, wet mass 1 kg, carbon content, non-fossil 0, dry mass 1 kg, water content 0, carbon content, fossil 0, carbon allocation 0 kg
- silver: 0 kg; CPC 41310: Silver (including silver plated with gold or platinum), unwrought or in semi-manufactured forms, or in powder […]; CAS 7440-22-4
  EcoSpold01Location=SE
  production volume 0.00011258 kg
  property price 178 EUR2005
    (same comment as for lead)
  property carbon content 0
    carbon content on a dry matter basis (reserved; not for manual entry)
  property true value 0.0200392
    allocation property applied in "true value" allocation // value calculated from revenue
  properties: wet mass 1 kg, carbon content, non-fossil 0, dry mass 1 kg, water content 0, carbon content, fossil 0, water in wet mass 0 kg, carbon allocation 0 kg
- palladium: 0 kg; CPC 4160: Other non-ferrous metals and articles thereof (including waste and scrap of some metals); cermets and articles […]
  EcoSpold01Location=SE
  production volume 6.23201e-6 kg
  property price 5640 EUR2005
    Temporary price data. Calculated as 90% of purchasers price based on: 2004 price from USGS (2007) Mineral commodity summaries 2007. <http://minerals.usgs.gov/minerals/pubs/mcs/2007/mcs2007.pdf> [Accessed 25 May 2010]
  property carbon content 0
    carbon content on a dry matter basis (reserved; not for manual entry)
  property true value 0.0351486
    allocation property applied in "true value" allocation // value calculated from revenue
  properties: wet mass 1 kg, carbon content, fossil 0, water in wet mass 0 kg, water content 0, carbon content, non-fossil 0, dry mass 1 kg, carbon allocation 0 kg
- gold: 0 kg; CPC 41320: Gold (including gold plated with platinum), unwrought or in semi-manufactured forms, or in powder form; CAS 7440-57-5
  EcoSpold01Location=SE
  production volume 3.41761e-6 kg
  property price 10600 EUR2005
    Temporary price data. Calculated as 90% of purchasers price based on: Source: ecoinvent v2 report 10-part IX, Tab 2.5
  property carbon content 0
    carbon content on a dry matter basis (reserved; not for manual entry)
  property true value 0.0362267
    allocation property applied in "true value" allocation // value calculated from revenue
  properties: wet mass 1 kg, carbon content, fossil 0, dry mass 1 kg, carbon content, non-fossil 0, water content 0, water in wet mass 0 kg, carbon allocation 0 kg

## Inputs from technosphere
- mounting, surface mount technology, Pb-containing solder: 0.0930561 m2; source Alvarado Ascencio C. 2005; lognormal variance with pedigree 0.0527, pedigree (3,3,5,3,1)
  Estimation, based on literature and own assumptions.
  EcoSpold01Location=GLO
  Uncertainty: data from literature plus own assumptions
- electric connector, peripheral type buss: 0.061182 kg; source Kemna R. 2005; lognormal variance with pedigree 0.0527, pedigree (3,3,5,3,1)
  (same comment as for mounting, surface mount technology, Pb-containing solder)
  properties: carbon content, fossil 0.160512, wet mass 1 kg, dry mass 1 kg
  note on carbon content, fossil: Calculated as the addition of C contents in the product composition
- transistor, wired, small size, through-hole mounting: 0.0456826 kg; source Kemna R. 2005; lognormal variance with pedigree 0.0527, pedigree (3,3,5,3,1)
  EcoSpold01Location=GLO
  Estimation, based on literature and own assumptions.
  Uncertainty: data from literature plus own assumptions
  properties: carbon content, fossil 0.080338, wet mass 1 kg, dry mass 1 kg
  note on carbon content, fossil: Calculated as the addition of C contents in the product composition, and referred to 1 kg DM transistor.
- light emitting diode: 0.000734186 kg; source Kemna R. 2005; lognormal variance with pedigree 0.0527, pedigree (3,3,5,3,1)
  (same comment as for mounting, surface mount technology, Pb-containing solder)
  properties: carbon content, fossil 0.0203273, dry mass 1 kg, wet mass 1 kg
- used printed wiring boards: -0.020394 kg; lognormal variance with pedigree 0.0527, pedigree (3,3,5,3,1)
  Estimation, based on a european PWB mounting company.
  EcoSpold01Location=GLO
  Uncertainty: data from literature plus own assumptions
  production volume 0.020408 kg
    Calculated from the production volume of printed wiring board, mounted mainboard, desktop computer, Pb containing in proportion to the respective output amounts.
  properties: carbon content, fossil 0.193742, carbon content, non-fossil 0.000960142, dry mass 1 kg, wet mass 1 kg
  note on carbon content, fossil: Composition of printed wiring boards used to calculate C content
- capacitor, electrolyte type, < 2cm height: 0.182735 kg; source Kemna R. 2005; lognormal variance with pedigree 0.0527, pedigree (3,3,5,3,1)
  (same comment as for transistor, wired, small size, through-hole mounting)
  properties: carbon content, fossil 0.189636, wet mass 1 kg, carbon content, non-fossil 0.0222053, dry mass 1 kg
  note on carbon content, fossil: Calculated as the addition of C contents in the product composition, and referred to 1 kg capacitors, and then to 1 kg DM
- mounting, through-hole technology, Pb-containing solder: 0.0164217 m2; source Alvarado Ascencio C. 2005; lognormal variance with pedigree 0.0527, pedigree (3,3,5,3,1)
  (same comment as for transistor, wired, small size, through-hole mounting)
- integrated circuit, logic type: 0.081577 kg; source Kemna R. 2005; lognormal variance with pedigree 0.0527, pedigree (3,3,5,3,1)
  (same comment as for transistor, wired, small size, through-hole mounting)
  properties: dry mass 1 kg, wet mass 1 kg, carbon content, fossil 0.221701
- diode, glass-, for surface-mounting: 0.00171312 kg; source Kemna R. 2005; lognormal variance with pedigree 0.0527, pedigree (3,3,5,3,1)
  (same comment as for transistor, wired, small size, through-hole mounting)
  properties: dry mass 1 kg, wet mass 1 kg, carbon content, fossil 0.00928779
- electric connector, peripheral component interconnect buss: 0.183544 kg; source Kemna R. 2005; lognormal variance with pedigree 0.0527, pedigree (3,3,5,3,1)
  (same comment as for transistor, wired, small size, through-hole mounting)
  properties: carbon content, fossil 0.506549, dry mass 1 kg, wet mass 1 kg
- capacitor, tantalum-, for through-hole mounting: 0.0456826 kg; source Kemna R. 2005; lognormal variance with pedigree 0.0527, pedigree (3,3,5,3,1)
  (same comment as for transistor, wired, small size, through-hole mounting)
  properties: dry mass 1 kg, carbon content, fossil 0.181224, wet mass 1 kg
- capacitor, for surface-mounting: 0.0110124 kg; source Kemna R. 2005; lognormal variance with pedigree 0.0527, pedigree (3,3,5,3,1)
  (same comment as for transistor, wired, small size, through-hole mounting)
  properties: dry mass 1 kg, wet mass 1 kg
- integrated circuit, memory type: 0.020394 kg; source Kemna R. 2005; lognormal variance with pedigree 0.0527, pedigree (3,3,5,3,1)
  (same comment as for transistor, wired, small size, through-hole mounting)
  properties: carbon content, fossil 0.113389, dry mass 1 kg, wet mass 1 kg
- resistor, surface-mounted: 0.0110124 kg; source Kemna R. 2005; lognormal variance with pedigree 0.0527, pedigree (3,3,5,3,1)
  (same comment as for transistor, wired, small size, through-hole mounting)
  properties: dry mass 1 kg, carbon content, fossil 0.00893558, wet mass 1 kg
  note on carbon content, fossil: Calculated as the addition of C contents in the product composition, and referred to 1 kg DM resistor.
- inductor, ring core choke type: 0.0114212 kg; source Kemna R. 2005; lognormal variance with pedigree 0.0527, pedigree (3,3,5,3,1)
  (same comment as for mounting, surface mount technology, Pb-containing solder)
  properties: carbon content, fossil 0.445934, dry mass 1 kg, wet mass 1 kg
  note on carbon content, fossil: Calculated as the addition of C contents in the product composition, and referred to 1 kg DM inductor
- printed wiring board, for surface mounting, Pb containing surface: 0.109475 m2; source Kemna R. 2005; lognormal variance with pedigree 0.0507, pedigree (1,3,5,3,1)
  Estimation, based on literature and own assumptions.
  EcoSpold01Location=GLO
  Uncertainty: data from literature
  properties: carbon content, fossil 0.109783, wet mass 3.26 kg, dry mass 3.26 kg
  note on carbon content, fossil: C content was calculated as the addition of C content in the PWB components, listed in Tab 2.2 (ecoinvent v2.2 report 18_II), and considering a final weight of 3.26 kg/m2 (an efficiency of 88%). Referred to 1 kg DM PWB

## Sampling procedure
literature & own dismantling

## Review by Rolf Frischknecht 2007-09-21
passed.
