# furnace production, wood chips, with silo, 50kW

Dataset: EcoSpold 2, unit process
Geography: CH
Time period: 2010-01-01 to 2019-12-31
Technology level: modern
Classification: EcoSpold01Categories: oil/cogeneration
Classification: ISIC rev.4 ecoinvent: 2815:Manufacture of ovens, furnaces and furnace burners
Synonyms: wood fired boiler production; wood chips boiler production
Tags: biomass power
Scenario: Business-as-Usual
System model: Allocation at the point of substitution
Generated by: Marco Mina
Database: ecoinvent
isCopyrightProtected: true
accessRestrictedTo: 1

## General comment
This dataset represent the production and the disposal of a wood chips burning furnace with a storage silo, typical for central heating system.

## Included activities start
From reception of furnace components at the factory gate

## Included activities end
This activity ends with the disposal of the device in the end of its lifetime. The dataset includes the most important materials used for the fabrication of the furnace, the accumulator hot water tank (1500 l), the screw conveyor system and the chimney flue pipes: steel, steel alloys, concrete, refractory fireclay bricks, insulating materials, cast iron, plastics, electronic, lubricating oil, paint. The dataset includes the basement for the furnace (around 6m2) and the wood chips storage silo in concrete (dimensions: 4x2.8x3m), which is assumed to be built in an external space out from an existing building. The dataset includes the land transformation and occupation and the energy and heat for the construction and the disposal of the device. The dataset doesnt includes emissions from manufacture.

## Geography
Could be used for Central European conditions

## Technology
Boiler of modern technology available on the European and Swiss market, with combustion chamber in refractory bricks. The model of reference is a wood chips boiler from brand ETA, mod. Hack 50 kW. It was compared with two other boilers with similar technology (KWB Multifire 50 kW, Lindner&Sommerauer SL-T 50 kW). Austrian technology, commericialized and manufactured also in Switzerland (Swiss brand Buderus).
Source of picture: http://www.eta.co.at/15.0.html

## Time period
This model of furnace is commercialized since 2010 in Europe and Switzerland and is still available on the market (end 2011)

## Reference product
- iron scrap, unsorted: 1 kg; CPC 39310: Slag, dross, scalings and other waste from the manufacture of iron or steel; By-product classification Recyclable; pedigree (1,1,1,1,1)
  disposal of cast iron
  production volume 3510 kg; = Ref('78396fb5-21f7-4b38-8b1b-71bf2909ed50', 'ProductionVolume') * (Ref('1bbf5318-7379-41c7-a290-6c791f60312b') / Ref('78396fb5-21f7-4b38-8b1b-71bf2909ed50'))
    Calculated from production volume of reference product using the relative outputs.
  property price 0.149 EUR2005
    Temporary price data. Calculated as 90% of purchasers price based on: estimated at 85% of sorted scrap
  property carbon content 0
    carbon content on a dry matter basis (reserved; not for manual entry)
  property true value 11.622
    allocation property applied in "true value" allocation // value calculated from revenue
  properties: carbon content, fossil 0, wet mass 1 kg, carbon content, non-fossil 0, dry mass 1 kg, water in wet mass 0 kg, water content 0, carbon allocation 0 kg
- furnace, wood chips, with silo, 50kW: 0 unit; CPC 43420: Industrial or laboratory furnaces and ovens, except non-electric bakery ovens; other industrial or laboratory […]; By-product classification allocatable product
  EcoSpold01Location=GLO
  production volume 45 unit
    extrapolated from estimation of the auto stocker boilers around 50kW installed within the country (see Source)
  property price 7937 EUR2005
    Calculated by 2.0 - Prices from UNDATA "Industrial furnace, oven, incinerator non-electric ne" (http://data.un.org/Data.aspx?q=industrial+furnace&d=ComTrade&f=_l1Code%3a84%3bcmdCode%3a841780). The prices are per kg and converted to per unit by summed weight of material concumption of the process in existing ecoinvent documentation from ecoinvent v.2.2. For weight of concrete, it is separately added for from price per m3 used of each unit and apply EU&DK input output database 2003 (0.08 Euro2003/kg DS of concrete => 176 Euro2003/m3 concrete).
  property lifetime 20 year; name lifetime
  property capacity [MW] 0.05 MW; name capacity_MW
  property lifetime capacity [kWh] 8.76e6 kWh; name lifetime_capacity_kWh; = (lifetime*8760)*capacity_MW*1000
    calculated value
  property true value 7937
    allocation property applied in "true value" allocation // value calculated from revenue

## By-products
- iron scrap, sorted, pressed: 0 kg; By-product classification Recyclable; CPC 39310: Slag, dross, scalings and other waste from the manufacture of iron or steel; pedigree (1,1,1,1,1)
  Iron scrap recovered from this waste.
  Uncertainty: uncertainty calculated from uncertainty in waste composition, uncertainty of share of recyclable metal, uncertainty of transfer coefficient to bottom ash, uncertainty of the efficiency of scrap removal in MSWI plant.
  production volume 4625.45 kg
  property price 0.175 EUR2005
    Temporary price data. Calculated as 90% of purchasers price based on: 2005 import and export prices (total trades (USD) divided by total weight (kg) in biggest economies of the world: EU27, USA, Brasil, China, India, Japan and Russia) from UN Commodity Trade Statistics Database (http://data.un.org/Explorer.aspxDatabase [Accessed 2011.06.20]). Commodity: Waste or scrap, of cast iron
  property carbon content 0
    carbon content on a dry matter basis (reserved; not for manual entry)
  property true value 17.9879
    allocation property applied in "true value" allocation // value calculated from revenue
  properties: wet mass 1 kg, water in wet mass 0 kg, carbon content, non-fossil 0, carbon content, fossil 0, dry mass 1 kg, water content 0, carbon allocation 0 kg
- copper: 0 kg; source Rentz O. 1999; By-product classification allocatable product; CPC 41413: Refined copper and copper alloys, unwrought; master alloys of copper
  Literature value. Copper uses: Before end-use copper is manufactured into semi fabricated products, such as shapes and ingots (known as 'semis'). These manufacturing processes are subdivided into hot working, cold working and, if necessary, process annealing. Few of the semis are ready for use as such. They more typically travel to first-stage manufacturers, who make metal rods, wire, and casting, and then to component manufacturers who produce such things as motors, valves, and insulated cables The components in turn are incorporated by final-stage manufacturers into a variety of finished products - automobiles, commercial buildings, residential housing, and so forth. These uses account for about 79% of the world-wide consumption of copper.
  production volume 54.2038 kg
  properties: dry mass 1 kg, water in wet mass 0 kg, wet mass 1 kg, carbon content, non-fossil 0, water content 0, price 5.52 EUR2005, carbon content, fossil 0, carbon content 0, carbon allocation 0 kg, true value 6.649
- electricity, for reuse in municipal waste incineration only: 0 kWh; CPC 17100: Electrical energy; By-product classification allocatable product; pedigree (1,1,1,1,1)
  Net electricity generated from this waste and used in internal MSWI plant energy redistribution.
  Uncertainty: uncertainty is calculated from uncertainties in waste composition and uncertainties in energy efficiency and the uncertainty in internal energy demand
  production volume 1264.5 kWh
  property exergy 3.6 MJ; name E_el_prod_MSWI_exergy
    This exergy property is based on the exergy content of the product.
  property true value relation 3.6; name E_el_prod_MSWI_true_value_relation
    property to calculate "true value" from
  property price 0.1 EUR2005; name E_el_prod_MSWI_price_EUR2005
    Estimated to be the same price as in case of electricity, medium voltage.
  property true value 3.60082
    allocation property applied in "true value" allocation // value calculated from true value relation
- heat, for reuse in municipal waste incineration only: 0 MJ; CPC 17300: Steam and hot water; By-product classification allocatable product; pedigree (1,1,1,1,1)
  Net useful heat generated from this waste and used in internal MSWI plant energy redistribution.
  Uncertainty: uncertainty is calculated from uncertainties in waste composition and uncertainties in energy efficiency and the uncertainty in internal energy demand
  production volume 8801.46 MJ
  property true value relation 0.1842; name E_th_prod_MSWI_true_value_relation
    property to calculate "true value" from
  property exergy 0.1842 MJ; name E_th_prod_MSWI_exergy
    This exergy property is based on the exergy content of the product.
  property price 0.0106 EUR2005; name E_th_prod_MSWI_price_EUR2005
    Average European district heat price from Ecoheatcool and Euroheat 2005-2006, Ecoheat Work package 1: The European heat market. Final report. 10.6 EUR/GJ i s the price of district heat. http://www.solarthermalworld.org/files/Ecoheatcool%20WP1%20Web.pdf?download
  property true value 1.28241
    (same comment as for electricity, for reuse in municipal waste incineration only)
- zinc concentrate: 0 kg; CPC 14290: Other non-ferrous metal ores and concentrates (other than uranium or thorium ores and concentrates); By-product classification allocatable product
  Calculated value from the knowledge of the properties of both products.
  production volume 0.157437 kg
  property price 0.38 EUR2005; name ByP_price_EUR2005
    Temporary price data. Calculated as 90% of purchasers price based on: Zinc content in concentrate 53%. Concentrate price per kg Zn 86.5% of refined Zn price (13.5% treatment charges according to CHR Metals Limited 2005: Dynamic cost curves. http://www.minecost.com/dynamic.pdf). 2004 zinc price from USGS (2007) Mineral commodity summaries 2007. <http://minerals.usgs.gov/minerals/pubs/mcs/2007/mcs2007.pdf> [Accessed 25 May 2010]
  property zinc content 0.53; name zinc_C_zinc_concentrate
    Zinc content on a dry matter basis. Value taken from teh "zinc mine operation" /GLO dataset.
  property dry mass 1 kg; name DM_zinc_concentrate
  property carbon content 0
    carbon content on a dry matter basis (reserved; not for manual entry)
  property true value 0.00132947
    allocation property applied in "true value" allocation // value calculated from revenue
  properties: wet mass 1 kg, water content 0, carbon content, non-fossil 0, carbon content, fossil 0, water in wet mass 0 kg, carbon allocation 0 kg
- lead: 0 kg; CPC 41441: Lead, unwrought; By-product classification allocatable product
  EcoSpold01Location=SE
  production volume 0.302446 kg
  property price 0.744 EUR2005
    Temporary price data. Calculated as 90% of purchasers price based on: Source: ecoinvent v2 report 10-part IX, Tab 5.10 & 2.5
  property carbon content 0
    carbon content on a dry matter basis (reserved; not for manual entry)
  property true value 0.00500044
    allocation property applied in "true value" allocation // value calculated from revenue
  properties: wet mass 1 kg, water content 0, carbon content, non-fossil 0, carbon content, fossil 0, dry mass 1 kg, water in wet mass 0 kg, carbon allocation 0 kg
- nickel, 99.5%: 0 kg; CPC 41422: Unwrought nickel; By-product classification allocatable product
  EcoSpold01Location=SE
  production volume 0.631348 kg
  property price 10.4 EUR2005
    Temporary price data. Calculated as 90% of purchasers price based on: 2004 nickel price from USGS (2007) Mineral commodity summaries 2007. <http://minerals.usgs.gov/minerals/pubs/mcs/2007/mcs2007.pdf> [Accessed 25 May 2010]
  property carbon content 0
    carbon content on a dry matter basis (reserved; not for manual entry)
  property true value 0.145911
    allocation property applied in "true value" allocation // value calculated from revenue
  properties: water in wet mass 0 kg, wet mass 1 kg, carbon content, non-fossil 0, dry mass 1 kg, water content 0, carbon content, fossil 0, carbon allocation 0 kg
- silver: 0 kg; CPC 41310: Silver (including silver plated with gold or platinum), unwrought or in semi-manufactured forms, or in powder […]; By-product classification allocatable product; CAS 7440-22-4
  EcoSpold01Location=SE
  production volume 0.104261 kg
  property price 178 EUR2005
    (same comment as for lead)
  property carbon content 0
    carbon content on a dry matter basis (reserved; not for manual entry)
  property true value 0.412409
    allocation property applied in "true value" allocation // value calculated from revenue
  properties: wet mass 1 kg, carbon content, non-fossil 0, dry mass 1 kg, water content 0, carbon content, fossil 0, water in wet mass 0 kg, carbon allocation 0 kg
- palladium: 0 kg; CPC 4160: Other non-ferrous metals and articles thereof (including waste and scrap of some metals); cermets and articles […]; By-product classification allocatable product
  EcoSpold01Location=SE
  production volume 0.00577151 kg
  property price 5640 EUR2005
    Temporary price data. Calculated as 90% of purchasers price based on: 2004 price from USGS (2007) Mineral commodity summaries 2007. <http://minerals.usgs.gov/minerals/pubs/mcs/2007/mcs2007.pdf> [Accessed 25 May 2010]
  property carbon content 0
    carbon content on a dry matter basis (reserved; not for manual entry)
  property true value 0.723363
    allocation property applied in "true value" allocation // value calculated from revenue
  properties: wet mass 1 kg, carbon content, fossil 0, water in wet mass 0 kg, water content 0, carbon content, non-fossil 0, dry mass 1 kg, carbon allocation 0 kg
- gold: 0 kg; CPC 41320: Gold (including gold plated with platinum), unwrought or in semi-manufactured forms, or in powder form; By-product classification allocatable product; CAS 7440-57-5
  EcoSpold01Location=SE
  production volume 0.00316507 kg
  property price 10600 EUR2005
    Temporary price data. Calculated as 90% of purchasers price based on: Source: ecoinvent v2 report 10-part IX, Tab 2.5
  property carbon content 0
    carbon content on a dry matter basis (reserved; not for manual entry)
  property true value 0.745551
    allocation property applied in "true value" allocation // value calculated from revenue
  properties: wet mass 1 kg, carbon content, fossil 0, dry mass 1 kg, carbon content, non-fossil 0, water content 0, water in wet mass 0 kg, carbon allocation 0 kg

## Inputs from technosphere
- scrap steel: -0.0177564 kg; lognormal variance with pedigree 0.0088, pedigree (1,2,4,3,1)
  EcoSpold01Location=CH
  disposal of the steel body of the furnace, screw conveyour system, accumulator tank, chimney flue pipes + chromium steel components
  production volume 42795 kg; = Ref('78396fb5-21f7-4b38-8b1b-71bf2909ed50', 'ProductionVolume') * (Ref('775eaa5a-bbe6-484a-961f-a10af43d8b80')*-1)
    Calculated from production volume of reference product using the relative outputs.
  properties: wet mass 1 kg, lifetime 20 year, dry mass 1 kg
- polyethylene, high density, granulate: 6.53494e-5 kg; source ETA Heiztechnik GmbH 2011; lognormal variance with pedigree 0.0265, pedigree (2,3,4,3,1)
  estimation
  EcoSpold01Location=RER
  properties: carbon content, fossil 0.857143, wet mass 1 kg, dry mass 1 kg
  note on carbon content, fossil: Polyethylene is formed out of a huge amount of ethylene monomers (C2H4) (ecoinvent v2.2 report 11_II). MW=28 g/mol
- scrap copper: -7.46851e-5 kg; lognormal variance with pedigree 0.0088, pedigree (1,2,4,3,1)
  disposal of copper
  production volume 180 kg; = Ref('78396fb5-21f7-4b38-8b1b-71bf2909ed50', 'ProductionVolume') * ((Ref('42920ce7-8f9e-4fc2-8cfc-3aea1cc08c14')*-1) / Ref('78396fb5-21f7-4b38-8b1b-71bf2909ed50'))
    Calculated from production volume of reference product using the relative outputs.
  properties: wet mass 1 kg, dry mass 1 kg
- heat, central or small-scale, other than natural gas: 0.029874 MJ; source Heiztechnik GmbH 2011; lognormal variance with pedigree 0.0333, pedigree (4,1,4,3,1)
  estimation - data comes from a comparison between old dataset value and communication with ETA producer (total annual heating value in factory/production)
  EcoSpold01Location=CH
- polystyrene foam slab: 0.000354754 kg; source ETA Heiztechnik GmbH 2011; lognormal variance with pedigree 0.0273, pedigree (3,1,4,3,1)
  EcoSpold01Location=RER
  calculated value - insulation of the accumulator hot water tanks
  properties: wet mass 1 kg, carbon content, fossil 0.859091, dry mass 1 kg
  note on carbon content, fossil: XPS consists in 91% of polystyrene, 7% of blowing agent and the re-maining 2% are flame retardants (bromine compounds) and other additives (ecoinvent v2.2 report 7, part XIV, pg69). The chemical formula of polystyrene is (C8H8)n. Here, the blowing agent is CO2.
- waste polystyrene isolation, flame-retardant: -0.000354754 kg; lognormal variance with pedigree 0.0088, pedigree (1,2,4,3,1)
  disposal of the accumulator tank insulation
  production volume 855 kg; = Ref('78396fb5-21f7-4b38-8b1b-71bf2909ed50', 'ProductionVolume') * ((Ref('2a6e5eb7-e78f-4ac6-adf2-7bafb419e100')*-1) / Ref('78396fb5-21f7-4b38-8b1b-71bf2909ed50'))
    Calculated from production volume of reference product using the relative outputs.
  properties: wet mass 1 kg, water content 0.00199232, dry mass 0.998012 kg, carbon content, fossil 0.918145
  note on carbon content, fossil: Polystyrene isolation (EPS) is flame-retarded with hexa-bromo-cyclo-dodecan (C12H18Br6) and contains 0.67 w% bromine (ecoinvent v2.2 report 13_I, pg 39). The rest is polystyrene: (C8H8)n.
- inert waste, for final disposal: -0.00102692 kg; lognormal variance with pedigree 0.0088, pedigree (1,2,4,3,1)
  disposal of refractory fireclay
  EcoSpold01Location=CH
  production volume 2475 kg; = Ref('78396fb5-21f7-4b38-8b1b-71bf2909ed50', 'ProductionVolume') * (Ref('a85b309b-39e5-44dc-ac22-a4a41fe49cf0')*-1)
    Calculated from production volume of reference product using the relative outputs.
  properties: water content 0.00502513, wet mass 1 kg, lifetime 20 year, dry mass 0.995 kg
- waste mineral oil: -4.66782e-5 kg; lognormal variance with pedigree 0.0088, pedigree (1,2,4,3,1)
  disposal of lubricating oil
  production volume 112.5 kg; = Ref('78396fb5-21f7-4b38-8b1b-71bf2909ed50', 'ProductionVolume') * ((Ref('10a4c356-b9f4-44f1-b8ed-603220276821')*-1) / Ref('78396fb5-21f7-4b38-8b1b-71bf2909ed50'))
    Calculated from production volume of reference product using the relative outputs.
  properties: carbon content, fossil 0.864444, water content 0.111111, dry mass 0.9 kg, wet mass 1 kg
  note on carbon content, fossil: Tab A.6, ecoinvent v2.2 report 13_I. C content has been calculated after data in the tables, and then referred to 1 kg DM
- alkyd paint, white, without solvent, in 60% solution state: 1.86713e-5 kg; source ETA Heiztechnik GmbH 2011; lognormal variance with pedigree 0.0259, pedigree (1,3,4,3,1)
  EcoSpold01Location=RER
  calculated value for the furnace cladding
  properties: dry mass 1 kg, wet mass 1 kg, carbon content, fossil 0.140367, carbon content, non-fossil 0.199629
  note on carbon content, fossil: C content was calculated as an addition of C content in the raw materials.
- refractory, fireclay, packed: 0.00102692 kg; source Heiztechnik GmbH 2011; lognormal variance with pedigree 0.0273, pedigree (1,4,4,3,1)
  EcoSpold01Location=DE
  measured value - refractory bricks in fireclay are used in the combustion chamber inside the furnace (value measured with a ETA technician during wood boilers exposition in the modeled furnace)
  properties: wet mass 1 kg, dry mass 1 kg
- cast iron: 0.00145636 kg; source Heiztechnik GmbH 2011; lognormal variance with pedigree 0.0293, pedigree (3,4,4,3,1)
  estimation
  EcoSpold01Location=RER
  properties: carbon content, fossil 0.04, wet mass 1 kg, dry mass 1 kg
  note on carbon content, fossil: Cast iron is made by remelting pig iron in small furnaces (e.g. cupola furnaces or electric arc furnaces) and poured into moulds to make castings. It usually contains 2% to 6% carbon (ecoinvent v2.2 report 10_partII). An average content of 4% was considered
- copper: 7.46851e-5 kg; source ETA Heiztechnik GmbH 2011; lognormal variance with pedigree 0.0339, pedigree (4,3,4,3,1)
  EcoSpold01Location=RER
  estimation
  properties: dry mass 1 kg, wet mass 1 kg
- waste mineral wool, for final disposal: -0.000924228 kg; lognormal variance with pedigree 0.0088, pedigree (1,2,4,3,1)
  disposal of chimney insulation
  EcoSpold01Location=CH
  production volume 2227.5 kg; = Ref('78396fb5-21f7-4b38-8b1b-71bf2909ed50', 'ProductionVolume') * (Ref('984b9f4b-6b37-4381-af8c-b9c5e3008bad')*-1)
    Calculated from production volume of reference product using the relative outputs.
  properties: dry mass 1 kg, lifetime 20 year, wet mass 1 kg
- sheet rolling, steel: 0.00173643 kg; source ETA Heiztechnik GmbH 2011; lognormal variance with pedigree 0.0273, pedigree (3,1,4,3,1)
  EcoSpold01Location=RER
  estimation
- electricity, low voltage: 0.00985843 kWh; source Heiztechnik GmbH 2011; lognormal variance with pedigree 0.0333, pedigree (4,1,4,3,1)
  EcoSpold01Location=CH
  Estimation - data derives from comparison between old dataset value, energy required for steel manufacturing (similar weight device) and suggestions from ETA technician
- concrete, normal: 0.000161133 m3; source ETA Heiztechnik GmbH 2011; lognormal variance with pedigree 0.0293, pedigree (3,4,4,3,1)
  EcoSpold01Location=CH
  calculated value - basing on the silo dimensions (from furnace manual) was calculated the amount of concrete (0.31m3 + 8.32m3 = 8.63 m3)
  properties: dry mass 2190 kg, wet mass 2380 kg, water content 0.086758
- stone wool: 0.000924228 kg; source ETA Heiztechnik GmbH 2011; lognormal variance with pedigree 0.0339, pedigree (4,3,4,3,1)
  EcoSpold01Location=CH
  calculated value - for the chimney flue pipes (22,5 kg) and the insulation of the boiler (26.7 kg)
  properties: dry mass 1 kg, wet mass 1 kg, carbon content, fossil 0.015401
  note on carbon content, fossil: The chemical composition of the glass fibres used in the rock wool production is similar to the composition of naturally cooled volcano basalt and has a composition listed in Tab. 3.1 and 3.2 in ecoinvent v2.2 report 16, part XIV. Rock wool contains: a minimum of 96% mineral fibres,between 0.5 and 3.0 weight percent of phenolic resin depending on the specific product characteristics, and about 0.2 percent mineral oil (ecoinvent v2.2 report 16, part XIV). An average composition of 1.8% phenolic resin, 0.2% mineral oil, and 98% mineral fibres has been assumed and used to calculate C content of the rock wool
- steel, chromium steel 18/8, hot rolled: 0.000280069 kg; source ETA Heiztechnik GmbH 2011; lognormal variance with pedigree 0.0353, pedigree (4,4,4,3,1)
  estimation
  EcoSpold01Location=RER
  properties: carbon content, fossil 0.0008, dry mass 1 kg, wet mass 1 kg
  note on carbon content, fossil: Stainless steel model is the grade 304 steel (18/8 stainless, 18% chromium 8% nickel; max. 0.08% C)
- electronics, for control units: 5.60138e-5 kg; source Heiztechnik GmbH 2011; lognormal variance with pedigree 0.0273, pedigree (1,4,4,3,1)
  measured value - during wood boilers exposition, in the model of reference
  EcoSpold01Location=RER
  properties: wet mass 1 kg, carbon content, non-fossil 0.00013442, carbon content, fossil 0.337146, dry mass 1 kg
  note on carbon content, non-fossil: The control unit has a composition of 46% steel (housing), 32% plastics, 14% printed wiring boards and 8% cables (various types).;
- electronics scrap from control units: -5.60138e-5 kg; lognormal variance with pedigree 0.0088, pedigree (1,2,4,3,1)
  EcoSpold01Location=RER
  disposal of electronical components
  production volume 135 kg; = Ref('78396fb5-21f7-4b38-8b1b-71bf2909ed50', 'ProductionVolume') * (Ref('2cd7a545-e636-4772-b2d6-a78e47ecfa0d')*-1)
    Calculated from production volume of reference product using the relative outputs.
  properties: wet mass 1 kg, carbon content, non-fossil 0.00013442, lifetime 20 year, dry mass 1 kg, carbon content, fossil 0.337146
- waste concrete: -0.378803 kg; lognormal variance with pedigree 0.0088, pedigree (1,2,4,3,1)
  disposal of the concrete for the furnace basement and for the woodchips silo - around 8,6 m3 of concrete * 2350 kg/m3 (concrete density) = 20288 kg
  EcoSpold01Location=CH
  production volume 912960 kg; = Ref('78396fb5-21f7-4b38-8b1b-71bf2909ed50', 'ProductionVolume') * (Ref('c74a0bf8-3ec0-4399-9826-71ea791215d5')*-1)
    Calculated from production volume of reference product using the relative outputs.
  properties: water content 1, wet mass 1 kg, lifetime 20 year, dry mass 0.5 kg
- steel, low-alloyed, hot rolled: 0.0174763 kg; source ETA Heiztechnik GmbH 2011; lognormal variance with pedigree 0.0613, pedigree (3,4,5,3,1)
  calculated value - (tot weight - summa of all other materials). It includes also the steel for the chimney (diameter 20 cm, height 8 m = around 78 kg)
  EcoSpold01Location=RER
  properties: carbon content, fossil 0.005, dry mass 1 kg, wet mass 1 kg
  note on carbon content, fossil: Low alloyed steel composition given in Tab. 3.2 ecoinvent v2.2 report 10_partII. Steel assumed to have a C content of 0.5%
- waste polyethylene: -6.53494e-5 kg; lognormal variance with pedigree 0.0088, pedigree (1,2,4,3,1)
  EcoSpold01Location=CH
  disposal of plastic materials
  production volume 157.5 kg; = Ref('78396fb5-21f7-4b38-8b1b-71bf2909ed50', 'ProductionVolume') * (Ref('33c9adc2-c5b2-4367-9e7e-c4308c827be7')*-1)
    Calculated from production volume of reference product using the relative outputs.
  properties: lifetime 20 year, carbon content, fossil 0.825301, water content 0.00401606, dry mass 0.996 kg, wet mass 1 kg
  note on carbon content, fossil: C content in 1 kg DM was calculated using data in Tab A.1, ecoinvent v2.2 report 13_I
- lubricating oil: 4.66782e-5 kg; source Heiztechnik GmbH 2011; lognormal variance with pedigree 0.0692, pedigree (4,4,5,5,1)
  Estimation - used for the manufacturing of the furnace and for the maintenance. It is just added to the internal part of the furnace.
  EcoSpold01Location=RER
  properties: carbon content, fossil 0.75, wet mass 1 kg, dry mass 1 kg
  note on carbon content, fossil: Lubricating oil is produced from diesel. C-content/dry mass of fats and oils considered 75%, from: ecoinvent v2.2 report, n 15a, pg 40

## Inputs from nature
- Occupation, industrial area [natural resource, land]: 0.00858878 m2*year; name land_use; = transformation_unspecified*lifetime; source ETA Heiztechnik GmbH 2011; lognormal variance with pedigree 0.0413, pedigree (4,5,4,3,1)
  calculated value
- Transformation, from unspecified [natural resource, land]: 0.000429439 m2; name transformation_unspecified; source ETA Heiztechnik GmbH 2011; lognormal variance with pedigree 0.0733, pedigree (4,5,5,3,1)
  calculated value - space required for the boiler and screw conveyor system, from the furnace manual
  Uncertainty: basic uncertainty:2;
- Transformation, to industrial area [natural resource, land]: 0.000429439 m2; source ETA Heiztechnik GmbH 2011; lognormal variance with pedigree 0.0733, pedigree (4,5,5,3,1)
  (same comment as for Transformation, from unspecified)

## Sampling procedure
literature, furnace manual available for customers, personal communication from producer and technician, measured data during wood boiler exposition

## Review by Bo Weidema 2012-03-02
Reviewed for relevance of dataset structure, exchanges and quality of documentation and readability

## Review by Bo Weidema 2012-02-16
As an exception, this dataset has only been reviewed by one reviewer. As an infraqstructure dataset, this exception is reasonable.
