# mattress production, pocket spring

Dataset: EcoSpold 2, unit process
Geography: GLO
Time period: 2012-01-01 to 2019-12-31
Technology level: current
Classification: ISIC rev.4 ecoinvent: 3100:Manufacture of furniture
Synonyms: spring mattress; bed mattress; pocket spring mattress
Scenario: Business-as-Usual
System model: Allocation at the point of substitution
Generated by: Marina Santa Rosa Rocha
Published in: Thomas Lanoë 2013
Database: ecoinvent
isCopyrightProtected: true
accessRestrictedTo: 1

## General comment
This dataset represents the the production of one pocket spring mattress, with a dimension of 1 m width and 2 m length.The life cycle inventory data was retrieved from Lanoe, Simões and Simões (2013). The considered lifespan of the mattresses was considered to be 10 years. It was considered that a person of maximum weight 120 kg would sleep 8h/day on the mattress, resulting in 29.200 h of sleep.
This dataset is modelled as an infrastructure, meaning that the reference product is not assigned a mass, but it has the properties of “lifetime” and “lifetime capacity”. The inventory additionally accounts for disposal of all materials.

## Included activities start
The activity starts at the reception of the raw material at the factory. The activity includes the manufacturing of the springs, assembling of the mattress.

## Included activities end
The activity ends with the production of one unit of polyurethane foam mattress. The inventory additionally accounts for disposal of all materials. Packaging is not included.

## Geography
"The data is extracted from a single source. The source refers to the production of matresses in a industry located in Portugal"

## Time period
The start date considered the year when the paper was received by the journal (September 2012) (Lanoe, Simões and Simões, 2013). The data is considered to be still valid for the year of 2017.

## Reference product
- mattress: 1 unit; CPC 3815: Mattress supports; mattresses, fitted with springs or stuffed or internally fitted with any material or of cell[…]; By-product classification allocatable product
  production volume 6.17714e7 unit; = 17866000/0,289227609
    Estimated value. The global production volume is extrapolated from the European production volume using the nominal GDP of 2010 (source: United Nations, http://data.un.org/Glossary.aspx?q=GDP+%28current+US%24%29, accessed 20130726 and 20130312).
  property price 300 EUR2005
    Estimated value. The price is taken from IKEA website (retrieved from: http://www.ikea.com/it/it/search/?query=%20Materasso, accessed 13Feb2018). The range of prices varies greatly. A representative price of 300 euros was chosen. The choice is based on the most common price for an average appliance, and accounting for profit margins. According to an article from Blokhin "What profit margin is average for a company in the electronics sector?" (Source: Investopedia, retrieved from: https://www.investopedia.com/ask/answers/051215/what-profit-margin-average-company-electronics-sector.asp, 13Feb2018) the average profit margin made in the electronics sector in 2015 was of 9%.
  property lifetime 10 year
    Literature value. 2013, Thomas Lanoë, Carla L. Simões and Ricardo Simoes, mproving the environmental performance of bedding products by using life cycle assessment at the design stage. , Journal of Cleaner Production, 52, 155 - 164, 1 - Article
  property weight 32.1278 kg; name weight
    (same comment as for mattress)
  property lifetime capacity [h] 29200 hour
    (same comment as for mattress)
  property true value 300
    allocation property applied in "true value" allocation // value calculated from revenue

## By-products
- heat, for reuse in municipal waste incineration only: 0 MJ; CPC 17300: Steam and hot water; By-product classification allocatable product; pedigree (1,1,1,1,1)
  Net electricity generated from this waste and used in internal MSWI plant energy redistribution.
  Uncertainty: uncertainty is calculated from uncertainties in waste composition and uncertainties in energy efficiency and the uncertainty in internal energy demand
  production volume 2.82472e9 MJ
  property exergy 0.1842 MJ; name E_th_prod_MSWI_exergy
    This exergy property is based on the exergy content of the product.
  property price 0.0106 EUR2005; name E_th_prod_MSWI_price_EUR2005
    Average European district heat price from Ecoheatcool and Euroheat 2005-2006, Ecoheat Work package 1: The European heat market. Final report. 10.6 EUR/GJ i s the price of district heat. http://www.solarthermalworld.org/files/Ecoheatcool%20WP1%20Web.pdf?download
  property true value relation 0.1842; name E_th_prod_MSWI_true_value_relation
    property to calculate "true value" from
  property true value 0.0488777
    allocation property applied in "true value" allocation // value calculated from true value relation
- electricity, for reuse in municipal waste incineration only: 0 kWh; CPC 17100: Electrical energy; By-product classification allocatable product; pedigree (1,1,1,1,1)
  (same comment as for heat, for reuse in municipal waste incineration only)
  production volume 4.01905e8 kWh
  property price 0.1 EUR2005; name E_el_prod_MSWI_price_EUR2005
    Estimated to be the same price as in case of electricity, medium voltage.
  property exergy 3.6 MJ; name E_el_prod_MSWI_exergy
    This exergy property is based on the exergy content of the product.
  property true value relation 3.6; name E_el_prod_MSWI_true_value_relation
    property to calculate "true value" from
  property true value 0.134653
    (same comment as for heat, for reuse in municipal waste incineration only)
- zinc concentrate: 0 kg; CPC 14290: Other non-ferrous metal ores and concentrates (other than uranium or thorium ores and concentrates); By-product classification allocatable product
  Calculated value from the knowledge of the properties of both products.
  production volume 24097.1 kg
  property price 0.38 EUR2005; name ByP_price_EUR2005
    Temporary price data. Calculated as 90% of purchasers price based on: Zinc content in concentrate 53%. Concentrate price per kg Zn 86.5% of refined Zn price (13.5% treatment charges according to CHR Metals Limited 2005: Dynamic cost curves. http://www.minecost.com/dynamic.pdf). 2004 zinc price from USGS (2007) Mineral commodity summaries 2007. <http://minerals.usgs.gov/minerals/pubs/mcs/2007/mcs2007.pdf> [Accessed 25 May 2010]
  property zinc content 0.53; name zinc_C_zinc_concentrate
    Zinc content on a dry matter basis. Value taken from teh "zinc mine operation" /GLO dataset.
  property dry mass 1 kg; name DM_zinc_concentrate
  property carbon content 0
    carbon content on a dry matter basis (reserved; not for manual entry)
  property true value 2.14531e-6
    allocation property applied in "true value" allocation // value calculated from revenue
  properties: wet mass 1 kg, water content 0, carbon content, non-fossil 0, carbon content, fossil 0, water in wet mass 0 kg, carbon allocation 0 kg
- iron scrap, sorted, pressed: 0 kg; By-product classification Recyclable; CPC 39310: Slag, dross, scalings and other waste from the manufacture of iron or steel; pedigree (1,1,1,1,1)
  Iron scrap recovered from this waste.
  production volume 8.23371e7 kg
  property price 0.175 EUR2005
    Temporary price data. Calculated as 90% of purchasers price based on: 2005 import and export prices (total trades (USD) divided by total weight (kg) in biggest economies of the world: EU27, USA, Brasil, China, India, Japan and Russia) from UN Commodity Trade Statistics Database (http://data.un.org/Explorer.aspxDatabase [Accessed 2011.06.20]). Commodity: Waste or scrap, of cast iron
  property carbon content 0
    carbon content on a dry matter basis (reserved; not for manual entry)
  property true value 0.00157388
    allocation property applied in "true value" allocation // value calculated from revenue
  properties: water content 0, water in wet mass 0 kg, carbon content, fossil 0, dry mass 1 kg, carbon content, non-fossil 0, wet mass 1 kg, carbon allocation 0 kg

## Inputs from technosphere
- polypropylene, granulate: 0.167297 kg; name polypro; lognormal variance with pedigree 0.0266, pedigree (4,5,4,5,1)
  Literature value. The value derived from the amount for non woven fabric material described by Lanoe et al. 2013 that is 0,1674 kg. The proxy with polypropelene was based on the description of Glew et al., 2012. How do end of life scenarios influence the environmental impact of product
  supply chains? comparing biomaterial and petrochemical products Journal of Cleaner Production 29-30 (2012) 122e131.
  properties: carbon content, fossil 0.857143, wet mass 1 kg, dry mass 1 kg
- wire drawing, steel: 11.9926 kg; lognormal variance with pedigree 0.0266, pedigree (4,5,4,5,1)
  Literature value. The value derived from the amount of wire described by Lanoe et al. 2013 that is 12,006 kg. The wire material was deduced from Glew et al., 2012. How do end of life scenarios influence the environmental impact of product supply chains? comparing biomaterial and petrochemical products. Journal of Cleaner Production 29-30 (2012) 122e131
- plastic processing factory: 1.49004e-8 unit; = 1/67070747; lognormal variance with pedigree 0.51, pedigree (5,5,5,5,5)
  Estimated value. This infrastructure is taken as a proxy. According to the technology comment of the dataset "Plastic processing factory construction, GLO " accessed 20180111: " The life time of the tanks was assumed to be 50 years. The production machines have an assumed life time of 25 years. The yearly production is 27000 t/a”. Thus, the life time estimated output is 27000*50= 1350000 tons. As the pocket spring mattress calculated wet mass is 20,128 kg, the number of mattresses produced is 1350000 t*(1000 kg/t)/20,128 kg = 67070747 units. So, the calculation of the infrastructure is 1/lifetime capacity = 1/67070747 units.
- electricity, medium voltage: 17.5092 kWh; lognormal variance with pedigree 0.0266, pedigree (4,5,4,5,1)
  Literature value. The value derived from the sum of the quilting, pocket spring, hotmelt glue gun, borders, handle, top edge and packaging machine described by Lanoe et al. 2013 that is 17,52kWh.
- polyester resin, unsaturated: 0 kg; name polyester2; pedigree (1,1,1,1,1)
  Literature value. The value derived from the amount of polyester fibre material described by Lanoe et al. 2013 that is 0,3194 kg.
  properties: carbon content, fossil 0.58584, dry mass 1 kg, wet mass 1 kg
- waste plastic, mixture: 0 kg; pedigree (1,1,1,1,1)
  The amount is set equal to sum of the amount for polyesters, EVA and ABS material input.
  production volume 0 kg
    Calculated from production volume of reference product using the relative outputs.
  properties: carbon content, fossil 0.747344, water content 0.180638, dry mass 0.847 kg, wet mass 1 kg
- acrylonitrile-butadiene-styrene copolymer: 0.0119926 kg; name ABS; lognormal variance with pedigree 0.0266, pedigree (4,5,4,5,1)
  Literature value. The value derived from the value for ABS materials described by Lanoe et al. 2013 that is 0,012 kg.
  properties: carbon content, fossil 0.853081, dry mass 1 kg, wet mass 1 kg
- waste textile, soiled: 0 kg; pedigree (1,1,1,1,1)
  The amount is set equal to the input amount for the respective material.
  production volume 0 kg
    Calculated from production volume of reference product using the relative outputs.
  properties: wet mass 1 kg, water content 0.333333, dry mass 0.75 kg, carbon content, non-fossil 0.570519
- maleic unsaturated polyester resin: 0.620617 kg; name polyester; lognormal variance with pedigree 0.0266, pedigree (4,5,4,5,1)
  Literature value. The value derived from the sum of polyester fabric and polyester unsaturated materials described by Lanoe et al. 2013 that is 0,621 kg.
  properties: carbon content, fossil 0.67548, dry mass 1 kg, wet mass 1 kg
- waste polyurethane foam: 0 kg; pedigree (1,1,1,1,1)
  The amount is set equal to the input amount for the respective material.
  production volume 0 kg
    Calculated from production volume of reference product using the relative outputs.
  properties: water content 0.00200401, wet mass 1 kg, dry mass 0.998 kg, carbon content, fossil 0.641283
- polyurethane, flexible foam: 0 kg; name PUR; pedigree (1,1,1,1,1)
  Literature value. The value derived from the amount for PUR foam material described by Lanoe et al. 2013 that is 4,371 kg.
  properties: dry mass 1 kg, wet mass 1 kg, carbon content, fossil 0.633827
- waste polyethylene/polypropylene product: 0 kg; pedigree (1,1,1,1,1)
  The amount is set equal to the input amount for ldpe and polypropelene.
  production volume 0 kg
    Calculated from production volume of reference product using the relative outputs.
  properties: carbon content, fossil 0.748045, wet mass 1 kg, water content 0.180638, dry mass 0.847 kg
  note on carbon content, fossil: Mixed various plastics was used to estimate the C content of this waste (Tab A.2, ecoinvent v2.2 report 13_I)
- textile, woven cotton: 0.630611 kg; name textile; lognormal variance with pedigree 0.0266, pedigree (4,5,4,5,1)
  Literature value. The value derived from the amount for mesh fabric material described by Lanoe et al. 2013 that is 0,631 kg.
  properties: dry mass 1 kg, wet mass 1 kg, carbon content, non-fossil 0.46
  note on carbon content, non-fossil: Cotton fibers are considered to have a 46% C-content in dry mass ("Evolutionary and Biochemical Aspects", A.D. Kay and T. Vrede (in Global Ecology, 2010, Elsevier B.V., S.E. Jørgensen Ed.)
- ethylene vinyl acetate copolymer: 0 kg; name EVA; pedigree (1,1,1,1,1)
  Literature value. The value derived from the value of EVA material described by Lanoe et al. 2013 that is 2 kg.
  properties: carbon content, fossil 0.79734, dry mass 1 kg, wet mass 1 kg
- scrap steel: 0 kg; pedigree (1,1,1,1,1)
  The amount is set equal to the input amount for the respective material.
  production volume 0 kg
    Calculated from production volume of reference product using the relative outputs.
  properties: wet mass 1 kg, dry mass 1 kg
- steel, low-alloyed: 11.9986 kg; name steel; lognormal variance with pedigree 0.0266, pedigree (4,5,4,5,1)
  Literature value. The value derived from the sum of wire and eyelet materials described by Lanoe et al. 2013 that is 12,006 kg. The wire material was deduced from Glew et al., 2012. How do end of life scenarios influence the environmental impact of product supply chains? comparing biomaterial and petrochemical products. Journal of Cleaner Production 29-30 (2012) 122e131
  properties: dry mass 1 kg, carbon content, fossil 0.005, wet mass 1 kg
- polyester resin, unsaturated: 0.0378212, 0.281382 kg (2 entries); lognormal variance with pedigree 0.0266, pedigree (4,5,4,5,1)
  (same comment as for polyester resin, unsaturated)
- waste plastic, mixture: -0.284007, -0.0218953, -0.00904353, -0.00858768, -0.327694, -0.00365348, -0.0016559, -2.29404 kg (8 entries); lognormal variance with pedigree 0.2106, pedigree (5,5,5,5,5)
  The amount is set equal to sum of the amount for polyesters, EVA and ABS material input.
  production volume 1.82374e8 kg
- waste textile, soiled: -0.00929943, -0.621311 kg (2 entries); lognormal variance with pedigree 0.2106, pedigree (5,5,5,5,5)
  The amount is set equal to the input amount for the respective material.
  production volume 3.89778e7 kg
- waste polyurethane foam: -0.00342374, -4.36488 kg (2 entries); lognormal variance with pedigree 0.2106, pedigree (5,5,5,5,5)
  The amount is set equal to the input amount for the respective material.
  production volume 2.70003e8 kg
- polyurethane, flexible foam: 0.760085, 3.60822 kg (2 entries); lognormal variance with pedigree 0.0266, pedigree (4,5,4,5,1)
  (same comment as for polyurethane, flexible foam)
- waste polyethylene/polypropylene product: -0.0469257, -0.00140812, -0.118963 kg (3 entries); lognormal variance with pedigree 0.2106, pedigree (5,5,5,5,5)
  The amount is set equal to the input amount for ldpe and polypropelene.
  production volume 1.03405e7 kg
- ethylene vinyl acetate copolymer: 0.660777, 1.33799 kg (2 entries); lognormal variance with pedigree 0.0266, pedigree (4,5,4,5,1)
  (same comment as for ethylene vinyl acetate copolymer)
- scrap steel: -2.9216, -0.00369363, -9.0733 kg (3 entries); lognormal variance with pedigree 0.2106, pedigree (5,5,5,5,5)
  The amount is set equal to the input amount for the respective material.
  production volume 7.41628e8 kg

## Sampling procedure
"Secondary literature research. Source: Lanoë, Simões and Simoões (2013). Improving the environmental performance of bedding products by using life cycle assessment at the design stage. Journal of Cleaner Production 52 (2013) 155-164"
