# concrete production, 20MPa, self-construction, with cement, limestone 21-35%

Dataset: EcoSpold 2, unit process
Geography: PE
Time period: 2014-01-01 to 2019-12-31
Technology level: current
Classification: ISIC rev.4 ecoinvent: 2395:Manufacture of articles of concrete, cement and plaster
Classification: EcoSpold01Categories: construction materials/concrete
Synonyms: self-construction concrete
Scenario: Business-as-Usual
System model: Allocation at the point of substitution
Generated by: Simon Gmunder
Published in: Gmünder S. 2017
Database: ecoinvent
isCopyrightProtected: false
accessRestrictedTo: 1

## General comment
This dataset represents the production of 20MPa self-construction concrete for buidling construction and gereral use. Density: 2'358 kg/m³ - w/c: 0.65. Ingredients (for 1 m³): cement type ICo 383 kg, Water 256 kg, Gravel 956 kg, Sand 765kg,

## Included activities start
From reception of raw materials at the construction site.

## Included activities end
This activity ends after concrete mixing at the construction site.

The dataset includes the whole manufacturing processes to produce self-construction concrete, but does not include the on site mixing infrastrucutre.

Water for washing is included.

Concrete losses of 3% are considered.

## Geography
Representative production of self-construction concrete 20 MPa with type ICo cement in Peru. Data based from main cement producers and personal comunications with local experts.

## Technology
Represent the current technology for self-construction concrete production in Peru.

## Time period
The production volume of 2016 is considered. The data from sustainability reports goes from 2014 to 2016. Data have been reported with the production volume of corresponding year.

## Parameters
- water to cement ratio: 0.67 dimensionless; name w_c_ratio; lognormal variance with pedigree 0.0046, pedigree (3,4,1,1,1)
- total aggregates: 1721 kg/m3; name aggregates_tot; lognormal variance with pedigree 0.0046, pedigree (3,4,1,1,1)
  Estimated value. The mix design contains 1721 kg /m3 of aggregates (Pimentel, 2017).
- water withdrawal, per cubic meter of concrete: 316.275 kg/m3; name water_withdrawal; = w_c_ratio*cement/(1+losses)+60; lognormal variance with pedigree 0.0046, pedigree (3,4,1,1,1)
  Calculated value. The water cement ratio (w/c) is 0.67. In addition, 60kg is assumed for other water uses such as washing, dust treatment, irrigation, etc.
- losses: 0.03 dimensionless; lognormal variance with pedigree 0.018, pedigree (4,5,1,5,1)
  Estimated value. Losses due to returned concrete from construction sites.

## Reference product
- concrete, 20MPa: 1 m3; name concrete; By-product classification allocatable product; CPC 37510: Non-refractory mortars and concretes
  reference flow
  production volume 6.615e6 m3; name concrete_PV; = 35000000*0.9*0.21
    Calculated value. The total amount of ready-mix concrete used in Peru was estimated to 3.5 million m3 in 2014. The estimation is based on the production volume of Unicon (2137394 m3), which represents 59.8% of the market share (UNICON, 2014). The non-industrial process or “self-construction” concrete represent 90% of the market (Ing. Guerra, 2017; UNICON, 2014). About 45% of the ready-mix is concrete 20MPa concrete and 55% is 40MPa concrete. 21% of the ready-mix concrete is assumed to be consumed in the north (type ICo), 57% in the Center (Portland cement) and 22% in the South (type IP).
  property sand content 709.052 kg; = sand
    calculated
  property price 185 EUR2005; name concrete_price_EUR2005
    Estimated to be the same price as in case of concrete, normal (Data are not easily available. Therefore, an average price of products supplied by the activities in the same ISIC 3 code has been applied.This price is obtained as '_49 Concrete, asphalt and other mineral products, EU27 virgin, EU27' in the 'EU & DK Input Output Database' (available in SimaPro). The price is assumed to be valid for both RER2003, RER 2004, world 2003 and world 2004. Multiplied by density.).
  property gravel content 1063.58 kg; = gravel
    calculated
  property wet mass 2359.78 kg; name wet_mass; = dry_mass+ (w_c_ratio*cement)/(1+losses)
  property water content 0.121833; = water_in_wet_mass/dry_mass
  property cement content 393.975 kg; = cement
  property dry mass 2103.5 kg; name dry_mass; = cement/(1+losses)+ aggregates_tot
  property water in wet mass 256.275 kg; name water_in_wet_mass; = wet_mass-dry_mass
  property carbon content 0
    carbon content on a dry matter basis (reserved; not for manual entry)
  property true value 185; name concrete_true_value
    allocation property applied in "true value" allocation // value calculated from revenue
  properties: carbon content, fossil 0, carbon allocation 0 kg

## By-products
- electricity, for reuse in municipal waste incineration only: 0 kWh; CPC 17100: Electrical energy; By-product classification allocatable product; pedigree (1,1,1,1,1)
  Net electricity generated from this waste and used in internal MSWI plant energy redistribution.
  Uncertainty: uncertainty is calculated from uncertainties in waste composition and uncertainties in energy efficiency and the uncertainty in internal energy demand
  production volume 206372 kWh
  property true value relation 3.6; name E_el_prod_MSWI_true_value_relation
    property to calculate "true value" from
  property exergy 3.6 MJ; name E_el_prod_MSWI_exergy
    This exergy property is based on the exergy content of the product.
  property price 0.1 EUR2005; name E_el_prod_MSWI_price_EUR2005
    Estimated to be the same price as in case of electricity, medium voltage.
  property true value 0.00400674
    allocation property applied in "true value" allocation // value calculated from true value relation
- heat, for reuse in municipal waste incineration only: 0 MJ; CPC 17300: Steam and hot water; By-product classification allocatable product; pedigree (1,1,1,1,1)
  (same comment as for electricity, for reuse in municipal waste incineration only)
  production volume 1.45643e6 MJ
  property exergy 0.1842 MJ; name E_th_prod_MSWI_exergy
    This exergy property is based on the exergy content of the product.
  property true value relation 0.1842; name E_th_prod_MSWI_true_value_relation
    property to calculate "true value" from
  property price 0.0106 EUR2005; name E_th_prod_MSWI_price_EUR2005
    Average European district heat price from Ecoheatcool and Euroheat 2005-2006, Ecoheat Work package 1: The European heat market. Final report. 10.6 EUR/GJ i s the price of district heat. http://www.solarthermalworld.org/files/Ecoheatcool%20WP1%20Web.pdf?download
  property true value 0.00144683
    (same comment as for electricity, for reuse in municipal waste incineration only)

## Inputs from technosphere
- gravel, crushed: 1063.55 kg; name gravel; = 0.6*aggregates_tot*(1+losses); lognormal variance with pedigree 0.0108, pedigree (4,4,2,1,1)
  Estimated value. The mix design contains 1721 kg /m3 of aggregates. The aggregates are composed by a mix of 40% of sand and 60% of gravels (Ing. Pimentel, 2017).
  Uncertainty: Calculated variable. Uncertainty will be determined from propagation of uncertainty factors of underlying variables.
  properties: wet mass 1 kg, dry mass 1 kg
- scrap steel: -0.0237993 kg; = (steel)*-1; lognormal variance with pedigree 0.0115, pedigree (2,3,2,3,1)
  Calculated value.
  production volume 157437 kg; = concrete_PV * steel / concrete
    Calculated from production volume of reference product using the relative outputs.
  properties: dry mass 1 kg, wet mass 1 kg
- tap water: 325.754 kg; = water_withdrawal*(1+losses); lognormal variance with pedigree 0.0175, pedigree (4,3,2,3,3)
  Calculated value.
  EcoSpold01Location=CH
  Uncertainty: Calculated variable. Uncertainty will be determined from propagation of uncertainty factors of underlying variables.
  properties: wet mass 1 kg, water content 2962.17, carbon content, fossil 0.00178991, dry mass 0.000337476 kg
  note on carbon content, fossil: Bicarbonate content is 2.93 mol/m3. CO2 content is 0.1 mol/m3 (ecoinvent v2.2 report 8, Tab 93.1).
- sand: 709.031 kg; = 0.4*aggregates_tot*(1+losses); source Manuel Lascarro 2017; lognormal variance with pedigree 0.009, pedigree (4,2,2,3,1)
  (same comment as for gravel, crushed)
  properties: dry mass 1 kg, wet mass 1 kg
- cement, limestone 21-35%: 393.963 kg; name cement; = 382.5*(1+losses); lognormal variance with pedigree 0.0114, pedigree (4,3,2,5,1)
  Estimated value. 380 kg /m3 in Peru (9 bags of 42.5 kg) for self construction concrete 20MPa (Ing. Guerra, 2017)
  Uncertainty: Calculated variable. Uncertainty will be determined from propagation of uncertainty factors of underlying variables.
  property water in wet mass 0 kg; name cement_WWM
  property water content 0; name cement_water_content
  property wet mass 1 kg; name cement_WM
  property dry mass 1 kg; name cement_DM
- waste rubber, unspecified: -0.034499 kg; = (rub)*-1; lognormal variance with pedigree 0.0115, pedigree (2,3,2,3,1)
  Calculated value.
  production volume 228218 kg; = concrete_PV * rub / concrete
    Calculated from production volume of reference product using the relative outputs.
  properties: wet mass 1 kg, carbon content, fossil 0.853, dry mass 1 kg
- lubricating oil: 0.0498985 kg; name lub_oil; source Kellenberger D. 2007; lognormal variance with pedigree 0.3068, pedigree (2,5,2,5,1)
  Calculated value. Weighted average amount from 34 concrete plants in Brazil is used (Silva 2018).
  Silva, F. B., Oliveira, L. A., Passuello, A. C. B., Moraga, G. L., Silva, V. G., Silva, M. G., Saade, M. R. M., Gmünder, S., Myers, N. , Life Cycle Inventories of cement and concrete production in Latin America, 3 - SeparatePublication
  EcoSpold01Location=RER
  Uncertainty: Variance of logtransformed data calculated based on the sample's coefficient of variation.
  properties: carbon content, fossil 0.75, wet mass 1 kg, dry mass 1 kg
  note on carbon content, fossil: Lubricating oil is produced from diesel. C-content/dry mass of fats and oils considered 75%, from: ecoinvent v2.2 report, n 15a, pg 40
- waste mineral oil: -0.0498985 kg; = (lub_oil)*-1; lognormal variance with pedigree 0.0115, pedigree (2,3,2,3,1)
  Calculated value.
  production volume 330088 kg; = concrete_PV * lub_oil/concrete
    Calculated from production volume of reference product using the relative outputs.
  properties: carbon content, fossil 0.864444, wet mass 1 kg, water content 0.111111, dry mass 0.9 kg
  note on carbon content, fossil: Tab A.6, ecoinvent v2.2 report 13_I. C content has been calculated after data in the tables, and then referred to 1 kg DM
- synthetic rubber: 0.034499 kg; name rub; source Kellenberger D. 2007; lognormal variance with pedigree 0.7308, pedigree (2,5,2,5,1)
  EcoSpold01Location=RER
  Calculated value. Weighted average amount from 34 concrete plants in Brazil is used (Silva 2018).
  Silva, F. B., Oliveira, L. A., Passuello, A. C. B., Moraga, G. L., Silva, V. G., Silva, M. G., Saade, M. R. M., Gmünder, S., Myers, N. , Life Cycle Inventories of cement and concrete production in Latin America, 3 - SeparatePublication
  Uncertainty: Variance of logtransformed data calculated based on the sample's coefficient of variation.
  properties: carbon content, fossil 0.871949, wet mass 1 kg, dry mass 1 kg
  note on carbon content, fossil: EPDM (Ethylene-propene-diene terpolymer) rubber is a terpolymer of ethylene, propene, and a diene with the residual unsaturated portion of the diene in the side chain (ecoinvent v2.2 report 7-part XX & Ullmann). Chemical formula (deduced from Evidences of Solvent-Induced Miscibility in Polychloroprene-co-Ethylene-Propene Diene Terpolymer Blends, Dubey et al., Journal of Applied Polymer Science, 2009, 111:1884–1891): C20H35
- wastewater from concrete production: -0.0247193 m3; name Water_to_water; = ((water_withdrawal- water_in_wet_mass)*.4/1000*(1+losses))*-1; lognormal variance with pedigree 0.0115, pedigree (2,3,2,3,1)
  Calculated value. The water balance is established taking into account the total water input (withdrawal) minus the outputs, which include the water contained in the concrete, the water evaporated and the water infiltrated. In general, no waste water is produced. The water incorporated in the concrete correspond to the cement amount multiplied by w/c ratio. The share of the water evaporated to air and the water infiltrated is calculated based on the sustainability reports from Argos (60% evaporated).
  EcoSpold01Location=CH
  production volume 163523 m3; name waste_water; = concrete_PV*water_to_water/concrete
    Calculated value
  property water content 2225.48; name Water_to_water_water_content
  property water in wet mass 999.551 kg; name Water_to_water_WWM
  property price 0 EUR2005; name Water_to_water_price_EUR2005
  property dry mass 0.449139 kg; name Water_to_water_DM
  properties: carbon content, fossil 0.027074, wet mass 1000 kg
  note on carbon content, fossil: TOC =0.01216 kg/m3 (Tab A.20, ecoinvent v2.2 report 13_I). TOC was considered as Total Carbon.
- electricity, medium voltage: 0.857965 kWh; = 0.833*(1+losses); lognormal variance with pedigree 0.0115, pedigree (2,3,2,3,1)
  EcoSpold01Location=CH
  Calculated value. the average consumption of electricity has been estimated by measuring the average specifications of concrete mixers commonly used in building sites. An average concrete mixer produces 200l (0.2m3). The power of the motor is around 2kW and production capacity of 2.4m3/h (Various, 2017). The electricity consumption is then 0.833 kWh/m3 of concrete.
  Uncertainty: There is an important variability of energy consumption between plants
- waste concrete: -70.7912 kg; name waste_concrete; = (concrete*wet_mass*losses)*-1; lognormal variance with pedigree 0.0115, pedigree (2,3,2,3,1)
  Calculated value.
  production volume 4.68297e8 kg; = concrete_PV * waste_concrete / concrete
    Calculated from production volume of reference product using the relative outputs.
  property price 0 EUR2005; name waste_concrete_price_EUR2005
  properties: wet mass 1 kg, water content 1, dry mass 0.5 kg
- steel, low-alloyed, hot rolled: 0.0237993 kg; name steel; source Kellenberger D. 2007; lognormal variance with pedigree 0.0226, pedigree (2,5,3,5,1)
  Literature value. From ecoinvent dataset "concrete production, 25 MPa, RNA only, GLO, 2006-2006l". Access date: 10.10.2017.
  EcoSpold01Location=RER
  Uncertainty: Basic uncertainty from original dataset, completeness score adjusted
  properties: wet mass 1 kg, dry mass 1 kg, carbon content, fossil 0.005
  note on carbon content, fossil: Low alloyed steel composition given in Tab. 3.2 ecoinvent v2.2 report 10_partII. Steel assumed to have a C content of 0.5%

## Emissions to nature
- Water [air, unspecified]: 0.0370789 m3; name Water_to_air; = (water_withdrawal- water_in_wet_mass)*.6/1000*(1+losses); lognormal variance with pedigree 0.0021, pedigree (2,3,2,3,1)
  Calculated value. The water balance is established taking into account the total water input (withdrawal) minus the outputs, which include the water contained in the concrete, the water evaporated and the water infiltrated. In general, no waste water is produced. The water incorporated in the concrete correspond to the cement amount multiplied by w/c ratio. The share of the water evaporated to air and the water infiltrated is calculated based on the sustainability reports from Argos (60% evaporated).
  Uncertainty: Calculated variable. Uncertainty will be determined from propagation of uncertainty factors of underlying variables.

## Sampling procedure
The 1:2:2.5 concrete recipe is considered as the most commonly used mix design for self-construction in Peru, based on personal communication with the concrete association (Ing. Pimentel, 2017).

Unit flows were calculated by dividing the amounts of inputs and outputs by the total concrete production in mass.

## Extrapolations
The main values are considered representative for a typical production of ready mix concrete for building construction in Peru.

The auxiliary material (rubber, lube oil) are based on a sampling of 34 concrete plants in Brazil.
