# benzaldehyde-2-sulfonic acid production

Dataset: EcoSpold 2, unit process
Geography: GLO
Time period: 2015-01-01 to 2020-12-31
Technology level: current
Classification: ISIC rev.4 ecoinvent: 2011:Manufacture of basic chemicals
Synonyms: sodium ortho-formylbenzenesulfonate, 2-formylbenzenesulfonic acid, OBSA
Scenario: Business-as-Usual
System model: Allocation at the point of substitution
Generated by: Lucia Valsasina
Database: ecoinvent
isCopyrightProtected: true
accessRestrictedTo: 1

## General comment
Benzaldehyde-2-Sulfonic Acid is mainly employed as fluorescent brightening agent in specialty coloring applications. Benzaldehyde-2-Sulfonic Acid is a coloring agent that gives a brilliant blue color to plastics, coatings, and consumer products such as detergents. It is also applied as an additive in electroplating processes and to manufacture specialty textiles (Parchem, 2012).
Reference:
Parchem fine & specialty chemical, 2012, PARCHEM IS A LEADING SUPPLIER OF BENZALDEHYDE-2-SULFONIC ACID. Online from http://www.parchem.com/news-articles/Parchem-is-a-Leading-Supplier-of-Benzaldehyde-2-Sulfonic-Acid-N000149.aspx, last accessed 22/06/2017.
For more information on the model please refer to the dedicate ecoinvent report, access it in the Report section of ecoQuery (http://www.ecoinvent.org/login-databases.html)

## Included activities start
The activity starts when the raw materials enter the process.

## Included activities end
Materials entering the process are included as well as energy uses, infrastructure and emissions.

## Geography
The inputs to the process are calculated based on stoichiometry and literature data, they are therefore considered to be valid for the chosen geography. The inputs of heat, electricity, water, factory and nitrogen are mostly taken as average of industry data. Industry data values are a 5-year average of data (2011 - 2015) published by the Gendorf factory (Gendorf, 2016, Umwelterklärung, www.gendorf.de), (Gendorf, 2015, Umwelterklärung, www.gendorf.de), (Gendorf, 2014, Umwelterklärung, www.gendorf.de). The Gendorf factory is based in Germany, it produces a wide range of chemical substances. The factory produced 1657400 tonnes of chemical substances in the year 2015 (Gendorf, 2016, Umwelterklärung, www.gendorf.de) and 740000 tonnes of intermediate products. Given the range of chemicals produced by the german site, the values are used for the GLO geography, with uncertainty adjusted accordingly.

## Technology
Benzaldehyde-2-sulfonic acid is the result of the heating of 2-Chlorobenzaldehyde in the presence of sodium sulfite at high pressure (Bruhne, F. and Wright, E. 2011).
Chemical reaction:
C7H5ClO + Na2SO3 -> C7H5NaO4S + Na
This inventory representing production of a particular chemical compound is at least partially based on a generic model on the production of chemicals. The data generated by this model have been improved by compound-specific data when available.
The model on production of chemicals is using specific industry or literature data wherever possible and more generic data on chemical production processes to fill compound-specific data gaps when necessary. The basic principles of the model have been published in literature (Hischier 2005, Establishing Life Cycle Inventories of Chemicals Based on Differing Data Availability). The model has been updated and extended with newly available data from the chemical industry.
In the model, unreacted fractions are treated in a waste treatment process, and emissions reported are after a waste treatment process that is included in the scope of this dataset. For volatile reactants, a small level of evaporation is assumed. Solvents and catalysts are mostly recycled in closed-loop systems within the scope of the dataset and reported flows are for losses from this system.
The main source of information for the values for heat, electricity, water (process and cooling), nitrogen, chemical factory is industry data from Gendorf. The values are a 5-year average of data (2011 - 2015) published by the Gendorf factory (Gendorf, 2016, Umwelterklärung, www.gendorf.de), (Gendorf, 2015, Umwelterklärung, www.gendorf.de), (Gendorf, 2014, Umwelterklärung, www.gendorf.de). The Gendorf factory is based in Germany, it produces a wide range of chemical substances. The factory produced 1657400 tonnes of chemical substances in the year 2015 (Gendorf, 2016, Umwelterklärung, www.gendorf.de) and 740000 tonnes of intermediate products.
Reference(s):
Hischier, R. (2005) Establishing Life Cycle Inventories of Chemicals Based on Differing Data Availability (9 pp). The International Journal of Life Cycle Assessment, Volume 10, Issue 1, pp 59–67. 10.1065/lca2004.10.181.7
Gendorf (2016) Umwelterklärung 2015, Werk Gendorf Industriepark, www.gendorf.de
Bruhne, F. and Wright, E. 2011. Benzaldehyde. In Ullmann's Encyclopedia of Industrial Chemistry, Electronic Release, Vol.5, pp.233-235. Wiley-VCH, Weinheim.
For more information on the model please refer to the dedicate ecoinvent report, access it in the Report section of ecoQuery (http://www.ecoinvent.org/login-databases.html)

## Time period
The activity is based on stoichiometry and literature data, it is therefore considered not to change significantly over time in terms of inputs. The inputs of heat, electricity, water, factory and nitrogen are mostly taken as average of industry data. Industry data values are a 5-year average of data (2011 - 2015) published by the Gendorf factory (Gendorf, 2016, Umwelterklärung, www.gendorf.de), (Gendorf, 2015, Umwelterklärung, www.gendorf.de), (Gendorf, 2014, Umwelterklärung, www.gendorf.de). The Gendorf factory is based in Germany, it produces a wide range of chemical substances. The factory produced 1657400 tonnes of chemical substances in the year 2015 (Gendorf, 2016, Umwelterklärung, www.gendorf.de) and 740000 tonnes of intermediate products. The time period is therefore set based on the years from Gendorf reference.

## Reference product
- benzaldehyde-2-sulfonic acid: 1 kg; name RP; CPC 34170: Ethers, alcohol peroxides, ether peroxides, epoxides, acetals and hemiacetals, and their halogenated, sulphona[…]; By-product classification allocatable product
  Benzaldehyde-2-Sulfonic Acid is mainly employed as fluorescent brightening agent in specialty coloring applications. Benzaldehyde-2-Sulfonic Acid is a coloring agent that gives a brilliant blue color to plastics, coatings, and consumer products such as detergents. It is also applied as an additive in electroplating processes and to manufacture specialty textiles (Parchem, 2012).
  Reference: Parchem fine & specialty chemical, 2012, PARCHEM IS A LEADING SUPPLIER OF BENZALDEHYDE-2-SULFONIC ACID. Online from http://www.parchem.com/news-articles/Parchem-is-a-Leading-Supplier-of-Benzaldehyde-2-Sulfonic-Acid-N000149.aspx, last accessed 22/06/2017.
  production volume 925699 kg; name RP_PV
    Estimated value. The global production volume is extrapolated from the US production volume based on reports from Cefic (European Chemical Industry Council), and the American Chemistry Council.
    According to Cefic (2016) the global sales of chemicals in the year 2015 was 3 534 billion euros. The reported share of sales per region are: EU28 14.7%; Other Europe (Switzerland, Norway, Turkey, Russia and Ukraine) 2.7%; NAFTA (US, Canada and Mexico) 16.5%; Latin America 3.8%; China 39.9%; Japan 3.9%; Republic of Korea 3.2%; India 2.2%; Rest of Asia 11.9%; Rest of the World 1.3%. Cefic also reports the US total sales, which amount to 518.7 billion euros out of the global 3 534 billion euros (14.7%). The same share is reported by the American Chemistry Council (2016), according to which the USA sales account for 15% of global sales for the year 2016.
    US production volume:
    According to the Environmental Protection Agency, the consumption of Benzaldehyde-2-sulfonic acid for the year of 2015 (in USA) is estimated to be 136078 kg. The aforementioned value is the average of the range given in the literature. Since no data were found for the global production this value was scaled accordingly.
    References:
    Cefic 2016. Facts and figures 2016 of the European chemical industry. Accessible at: http://www.cefic.org/Facts-and-Figures/Chemicals-Industry-Profile/
    American Chemistry Council 2016. Outlook: U.S. Chemical Industry Continues to Outpace Industrial Output; Accounts for More Than One-Half of Construction Spending by Manufacturing Sector. Accessible at: https://www.americanchemistry.com/Media/PressReleasesTranscripts/ACC-news-releases/US-Chemical-Industry-Continues-to-Outpace-Industrial-Output.html
    Environmental Protection Agency, 2016, Chemical data reporting results, Available at: https://www.epa.gov/chemical-data-reporting/2016-chemical-data-reporting-results
  property price 2.7078 EUR2005; name RP_price_EUR2005
    Calculated based on inputs: The price of the product has been calculated as a sum of the values of the material and energy inputs for this product. This value is therefore a rough estimation. It may underestimate the real price since there are additional expenses when producing any product. These expences can include for example labour costs, treatment of waste materials and profit for the producer. Please consider carefully whether this level of data quality is acceptable for your application.
  property carbon content 0.403886
    carbon content on a dry matter basis (reserved; not for manual entry)
  property true value 2.7078; name RP_true_value
    allocation property applied in "true value" allocation // value calculated from revenue
  properties: wet mass 1 kg, water content 0, water in wet mass 0 kg, dry mass 1 kg, carbon content, fossil 0.403886, carbon content, non-fossil 0, carbon allocation 0.403886 kg

## By-products
- heat, for reuse in municipal waste incineration only: 0 MJ; CPC 17300: Steam and hot water; By-product classification allocatable product; pedigree (1,1,1,1,1)
  Net electricity generated from this waste and used in internal MSWI plant energy redistribution.
  Uncertainty: uncertainty is calculated from uncertainties in waste composition and uncertainties in energy efficiency and the uncertainty in internal energy demand
  production volume 0.701729 MJ
  property exergy 0.1842 MJ; name E_th_prod_MSWI_exergy
    This exergy property is based on the exergy content of the product.
  property price 0.0106 EUR2005; name E_th_prod_MSWI_price_EUR2005
    Average European district heat price from Ecoheatcool and Euroheat 2005-2006, Ecoheat Work package 1: The European heat market. Final report. 10.6 EUR/GJ i s the price of district heat. http://www.solarthermalworld.org/files/Ecoheatcool%20WP1%20Web.pdf?download
  property true value relation 0.1842; name E_th_prod_MSWI_true_value_relation
    property to calculate "true value" from
  property true value 1.04278e-9
    allocation property applied in "true value" allocation // value calculated from true value relation
- electricity, for reuse in municipal waste incineration only: 0 kWh; CPC 17100: Electrical energy; By-product classification allocatable product; pedigree (1,1,1,1,1)
  (same comment as for heat, for reuse in municipal waste incineration only)
  production volume 0.098354 kWh
  property true value relation 3.6; name E_el_prod_MSWI_true_value_relation
    property to calculate "true value" from
  property price 0.1 EUR2005; name E_el_prod_MSWI_price_EUR2005
    Estimated to be the same price as in case of electricity, medium voltage.
  property exergy 3.6 MJ; name E_el_prod_MSWI_exergy
    This exergy property is based on the exergy content of the product.
  property true value 2.82469e-9
    (same comment as for heat, for reuse in municipal waste incineration only)
- zinc concentrate: 0 kg; CPC 14290: Other non-ferrous metal ores and concentrates (other than uranium or thorium ores and concentrates); By-product classification allocatable product
  Calculated value from the knowledge of the properties of both products.
  production volume 1.07425e-5 kg
  property price 0.38 EUR2005; name ByP_price_EUR2005
    Temporary price data. Calculated as 90% of purchasers price based on: Zinc content in concentrate 53%. Concentrate price per kg Zn 86.5% of refined Zn price (13.5% treatment charges according to CHR Metals Limited 2005: Dynamic cost curves. http://www.minecost.com/dynamic.pdf). 2004 zinc price from USGS (2007) Mineral commodity summaries 2007. <http://minerals.usgs.gov/minerals/pubs/mcs/2007/mcs2007.pdf> [Accessed 25 May 2010]
  property zinc content 0.53; name zinc_C_zinc_concentrate
    Zinc content on a dry matter basis. Value taken from teh "zinc mine operation" /GLO dataset.
  property dry mass 1 kg; name DM_zinc_concentrate
  property carbon content 0
    carbon content on a dry matter basis (reserved; not for manual entry)
  property true value 1.49062e-13
    allocation property applied in "true value" allocation // value calculated from revenue
  properties: wet mass 1 kg, water content 0, carbon content, non-fossil 0, carbon content, fossil 0, water in wet mass 0 kg, carbon allocation 0 kg

## Inputs from technosphere
- sodium sulfite: 0 kg; pedigree (1,1,1,1,1)
  Calculated value based on stoichiometric calculations and literature data.
  126.043736g/mol is the molar mass of sodium sulfite (Na2O3S).
  208.170068g/mol is the molar mass of benzaldehyde-2-sulfonic acid (C7H5NaO4S).
  Benzaldehyde-2-sulfonic acid is the result of the heating of 2-Chlorobenzaldehyde in the presence of sodium sulfite at high pressure (Bruhne, F. and Wright, E. 2011).
  Chemical reaction:
  C7H5ClO + Na2SO3 -> C7H5NaO4S + Na
  properties: wet mass 1 kg, dry mass 1 kg
- chemical factory, organics: 4e-10 unit; lognormal variance with pedigree 0.3098, pedigree (2,3,1,4,3)
  Calculated based on literature data published by the industry. For this activity, no information was readily available concerning infrastructure and land-use. Therefore, the infrastructure is estimated based on data from two chemical factories, the BASF site of Ludwigshafen and the chemical factory in Gendorf (which are both located in Germany), which produce a wide range of chemical substances. Based on this data, the following assumptions are made: the built area amounts to about 4.2 ha, the plant has an average output of 50'000 t/a and a lifespan of fifty years. The estimated infrastructure amount is therefore 4.00 E-10 units per kg of produced chemical.
  References:
  Althaus H.-J., Chudacoff M., Hischier R., Jungbluth N., Osses M. and Primas A. (2007) Life Cycle Inventories of Chemicals. ecoinvent report No. 8, v2.0. EMPA Dübendorf, Swiss Centre for Life Cycle Inventories, Dübendorf, CH.
  Gendorf (2000) Umwelterklärung 2000, Werk Gendorf. Werk Gendorf, Burgkirchen.
- o-chlorobenzaldehyde: 0.710799 kg; lognormal variance with pedigree 0.009825, pedigree (2,3,1,2,3)
  Calculated value based on stoichiometric calculations and literature data.
  140.5688g/mol is the molar mass of o-chlorobenzaldehyde (C7H5ClO).
  208.170068g/mol is the molar mass of benzaldehyde-2-sulfonic acid (C7H5NaO4S).
  Benzaldehyde-2-sulfonic acid is the result of the heating of 2-Chlorobenzaldehyde in the presence of sodium sulfite at high pressure (Bruhne, F. and Wright, E. 2011).
  Chemical reaction:
  C7H5ClO + Na2SO3 -> C7H5NaO4S + Na
  properties: carbon content, fossil 0.59812, dry mass 1 kg, wet mass 1 kg
- electricity, medium voltage: 4.16 kWh; lognormal variance with pedigree 0.009825, pedigree (2,3,1,2,3)
  Estimated value. Expert judgement.
  The expert judgement is made starting from Industry data (see details about Gendorf in the paragraph below) and adjusted based on the modelled activity.
  This value is a 5-year average of data (2011 - 2015) published by the Gendorf factory (Gendorf, 2016, Umwelterklärung, www.gendorf.de), (Gendorf, 2015, Umwelterklärung, www.gendorf.de), (Gendorf, 2014, Umwelterklärung, www.gendorf.de). The amount of water for cooling extracted per kg of chemical substance produced is calculated using literature data published by the Gendorf factory based in Germany, which produces a wide range of chemical substances. The factory produced 1657400 tonnes of chemical substances in the year 2015 (Gendorf, 2016, Umwelterklärung, www.gendorf.de) and 740000 tonnes of intermediate products. The reported amounts of water extracted as groundwater and surface water (river) are assumed to be used entirely for cooling purposes.
- nitrogen, liquid: 0 kg; pedigree (1,1,1,1,1)
  Calculated based on literature data published by the industry. This value is a 5-year average of data (2011 - 2015) published by the Gendorf factory (Gendorf, 2016, Umwelterklärung, www.gendorf.de), (Gendorf, 2015, Umwelterklärung, www.gendorf.de), (Gendorf, 2014, Umwelterklärung, www.gendorf.de). The amount of nitrogen used per kg of chemical substance produced is calculated using literature data published by the Gendorf factory based in Germany, which produces a wide range of chemical substances. The factory produced 1657400 tonnes of chemical substances in the year 2015 (Gendorf, 2016, Umwelterklärung, www.gendorf.de) and 740000 tonnes of intermediate products. The reported amount of nitrogen used in 2015 was 33512400 Nm3 (Gendorf, 2016, Umwelterklärung, www.gendorf.de). One Nm3 of nitrogen is equal to 1.2506 kg. The resulting amount of nitrogen - the 5-year average (2011 - 2015, weighted by production volume) is 0.019 kg/kg. Nitrogen is mainly used during the production of chemicals for 'blanketing', which is the process of applying gas to the vapour space of a container or vessel in order to control its composition.
  properties: dry mass 1 kg, wet mass 1 kg
- tap water: 0.026 kg; lognormal variance with pedigree 0.0104, pedigree (2,3,1,4,3)
  Calculated based on literature data published by the industry. This value is a 5-year average of data (2011 - 2015) published by the Gendorf factory (Gendorf, 2016, Umwelterklärung, www.gendorf.de), (Gendorf, 2015, Umwelterklärung, www.gendorf.de), (Gendorf, 2014, Umwelterklärung, www.gendorf.de). The amount of tap water per kg of chemical substance produced is calculated using literature data published by the Gendorf factory based in Germany, which produces a wide range of chemical substances. The factory produced 1657400 tonnes of chemical substances in the year 2015 (Gendorf, 2016, Umwelterklärung, www.gendorf.de) and 740000 tonnes of intermediate products. The amount of tap water consumed in the year 2015 was 55100 tonnes (Gendorf, 2016, Umwelterklärung, www.gendorf.de). The resulting amount of tap water is 0.023 kg/kg of chemical product produced. The 5-year average (2011 - 2015, weighted by production volume) is 0.026 kg/kg.
  properties: dry mass 0.000337476 kg, carbon content, fossil 0.00178991, wet mass 1 kg, water content 2962.17
  note on carbon content, fossil: Bicarbonate content is 2.93 mol/m3. CO2 content is 0.1 mol/m3 (ecoinvent v2.2 report 8, Tab 93.1).
- wastewater, average: 0 m3; name BP_wastewater_average; pedigree (1,1,1,1,1)
  Calculated based on literature data published by the industry. This value is a 5-year average of data (2011 - 2015) published by the Gendorf factory (Gendorf, 2016, Umwelterklärung, www.gendorf.de), (Gendorf, 2015, Umwelterklärung, www.gendorf.de), (Gendorf, 2014, Umwelterklärung, www.gendorf.de). The amount of wastewater (which is later on treated in the municipal WWTP) per kg of chemical substance produced is calculated using literature data published by the Gendorf factory based in Germany, which produces a wide range of chemical substances. The factory produced 1657400 tonnes of chemical substances in the year 2015 (Gendorf, 2016, Umwelterklärung, www.gendorf.de) and 740000 tonnes of intermediate products. The amount of wastewater which is later on treated in the municipal WWTP in the year 2015 was 1200 tonnes (Gendorf, 2016, Umwelterklärung, www.gendorf.de). The resulting amount of wastewater is 2.7E-06 m3/kg of chemical product produced.
  production volume 0 m3
    Calculated from the production volume of the reference product in proportion to the respective output amounts.
  property price 0 EUR2005; name BP_wastewater_average_price_EUR2005
  properties: wet mass 1000 kg, water content 2882.2, dry mass 0.346837 kg, carbon content, non-fossil 0.194039
  note on carbon content, non-fossil: 0.0673 kg TOC/m3 (Tab A.17, ecoinvent v2.2 report 13_I). TOC was considered as Total Carbon.
- heat, from steam, in chemical industry: 0 MJ; pedigree (1,1,1,1,1)
  (same comment as for electricity, medium voltage)
- sodium sulfite: 0.110899, 0.526453 kg (2 entries); lognormal variance with pedigree 0.009825, pedigree (2,3,1,2,3)
  (same comment as for sodium sulfite)
- nitrogen, liquid: 0.00409211, 0.0149079 kg (2 entries); lognormal variance with pedigree 0.0104, pedigree (2,3,1,4,3)
  (same comment as for nitrogen, liquid)
- wastewater, average: -8.43646e-7, -9.12666e-8, -1.76509e-6 m3 (3 entries); lognormal variance with pedigree 0.0104, pedigree (2,3,1,4,3)
  (same comment as for wastewater, average)
  production volume 2.49939 m3
- heat, from steam, in chemical industry: 3.52232, 19.9777 MJ (2 entries); lognormal variance with pedigree 0.009825, pedigree (2,3,1,2,3)
  (same comment as for electricity, medium voltage)

## Inputs from nature
- Water, well, in ground [natural resource, in water]: 0.00083 m3; lognormal variance with pedigree 0.0104, pedigree (2,3,1,4,3)
  Calculated based on literature data published by the industry. This value is a 5-year average of data (2011 - 2015) published by the Gendorf factory (Gendorf, 2016, Umwelterklärung, www.gendorf.de), (Gendorf, 2015, Umwelterklärung, www.gendorf.de), (Gendorf, 2014, Umwelterklärung, www.gendorf.de). The amount of groundwater and surface water (river) extracted per kg of chemical substance produced is calculated using literature data published by the Gendorf factory based in Germany, which produces a wide range of chemical substances. The factory produced 1657400 tonnes of chemical substances in the year 2015 (Gendorf, 2016, Umwelterklärung, www.gendorf.de) and 740000 tonnes of intermediate products. The amount of groundwater and surface water (river) extracted in the year 2015 was 19950000 tonnes and 21488100 tonnes respectively (Gendorf, 2016, Umwelterklärung, www.gendorf.de).
- Water, river [natural resource, in water]: 0.00086 m3; lognormal variance with pedigree 0.0104, pedigree (2,3,1,4,3)
  (same comment as for Water, well, in ground)
- Water, cooling, unspecified natural origin [natural resource, in water]: 0.0164 m3; lognormal variance with pedigree 0.0104, pedigree (2,3,1,4,3)
  Calculated based on literature data published by the industry. This value is a 5-year average of data (2011 - 2015) published by the Gendorf factory (Gendorf, 2016, Umwelterklärung, www.gendorf.de), (Gendorf, 2015, Umwelterklärung, www.gendorf.de), (Gendorf, 2014, Umwelterklärung, www.gendorf.de). The amount of water for cooling extracted per kg of chemical substance produced is calculated using literature data published by the Gendorf factory based in Germany, which produces a wide range of chemical substances. The factory produced 1657400 tonnes of chemical substances in the year 2015 (Gendorf, 2016, Umwelterklärung, www.gendorf.de) and 740000 tonnes of intermediate products. The reported amounts of water extracted as groundwater and surface water (river) are assumed to be used entirely for cooling purposes.

## Emissions to nature
All rows: lognormal variance with pedigree 0.0104, pedigree (2,3,1,4,3)
- Sodium, ion [water, unspecified]: 0.121772 kg
  Calculated value. The values is based on a generic model. The basic principles of the model have been published in literature (Hischier 2005, Establishing Life Cycle Inventories of Chemicals Based on Differing Data Availability). The model has been updated and extended with newly available data from the chemical industry. Find more information in the dedicated report on the ecoinvent website.
  Reference(s):
  Hischier, R. (2005) Establishing Life Cycle Inventories of Chemicals Based on Differing Data Availability (9 pp). The International Journal of Life Cycle Assessment, Volume 10, Issue 1, pp 59–67. 10.1065/lca2004.10.181.7
- Nitrogen [air, unspecified]: 0.019 kg
  Calculated value. The amount of nitrogen released to air is equal to the amount of nitrogen entering the activity.
- Chloride, ion [water, unspecified]: 0.00851532 kg
  (same comment as for Sodium, ion)
- Chloride [water, unspecified]: 0.170306 kg
  (same comment as for Sodium, ion)
- Water [water, unspecified]: 0.0167 m3
  Calculated based on literature data published by the industry (Gendorf, 2016, Umwelterklärung, www.gendorf.de). The amount of water released back to the environment consists of the amount of process water treated in the internal WWTP and then released back to the environment and the amount of cooling water released back to the environment.
- Carbon dioxide, fossil [air, unspecified]: 0.0739945 kg
  (same comment as for Sodium, ion)
- Water [air, unspecified]: 0.0014 m3
  Calculated to ensure the water balance. In general, in the case of recirculating cooling systems, 77% of the water input evaporates to air. In case of once-through cooling systems, 4% of the water input evaporates to air. The process water has in the chemical industry an average evaporation rate of 20.5%. In the specific case of the Gendorf factory, the calculated evaporation rate based on the data published is 6.3%. This matches the qualitative information, that the majority of the cooling systems in Gendorf are once-through and that the amount of cooling water used is significantly higher than the amount of process water used (Gendorf, 2016, Umwelterklärung, www.gendorf.de).
- 2-chlorobenzaldehyde [water, unspecified]: 0.001777 kg
  (same comment as for Sodium, ion)
- Sulfur [water, unspecified]: 0.00818607 kg
  (same comment as for Sodium, ion)
- Sulfite [water, unspecified]: 0.00130276 kg
  (same comment as for Sodium, ion)

## Sampling procedure
Literature data and stochiometric calculation.

## Review by Emilia Moreno Ruiz 2017-08-10
This dataset was additionally reviewed in a separate review process by Eric Johnson of Atlantic Consulting as well as Emilia Moreno Ruiz and Gregor Wernet of ecoinvent.
