# ceramic tile production

Dataset: EcoSpold 2, unit process
Geography: CH
Time period: 1998-01-01 to 2019-12-31
Technology level: current
Classification: EcoSpold01Categories: construction materials/coverings
Classification: ISIC rev.4 ecoinvent: 2392:Manufacture of clay building materials
Tags: ConvertedDataset
Scenario: Business-as-Usual
System model: Allocation at the point of substitution
Generated by: Hans-Jörg Althaus
Published in: Kellenberger D. 2007
Database: ecoinvent
isCopyrightProtected: true
accessRestrictedTo: 1

## General comment
This dataset represents the production of 1 kg of ceramic tiles. As there are different types of ceramics, composition might differ from case to case. However, this dataset refers to oxidic ceramics as data was obtained from only one company.
[This dataset was already contained in the ecoinvent database version 2. It was not individually updated during the transfer to ecoinvent version 3. Life Cycle Impact Assessment results may still have changed, as they are affected by changes in the supply chain, i.e. in other datasets. This dataset was generated following the ecoinvent quality guidelines for version 2. It may have been subject to central changes described in the ecoinvent version 3 change report (http://www.ecoinvent.org/database/ecoinvent-version-3/reports-of-changes/), and the results of the central updates were reviewed extensively. The changes added e.g. consistent water flows and other information throughout the database. The documentation of this dataset can be found in the ecoinvent reports of version 2, which are still available via the ecoinvent website. The change report linked above covers all central changes that were made during the conversion process.]

## Included activities start
From the transportation of raw materials (feldspar, clay, silica sand) to the factory.

## Included activities end
The activity ends with the ceramic tiles transported to Switzerland. The dataset includes the whole manufacturing process. The dataset doesn't include the treatment of some wastes that are sent to external recycling (sludge from wastewater and other wastes).

## Geography
Data was obtained from an Italian company.

## Technology
The data of the infrastructure corresponds to a large scale production in Europe, with the gas fired kiln technology.
Ceramic tiles are produced by slurry processing.

## Parameters
- fraction, process water, to air: 0.15 dimensionless; name fraction_PW_to_air; lognormal variance with pedigree 0.092025, pedigree (4,4,3,2,4)
  Literature value. In case when no industry/process specific data are available, default evaporation fraction value is used. This value is 15% and is based on literature (Statistics Canada, 2007 & Shaffer, K.H., 2008, Consumptive water use in the Great Lakes Basin, USGS & Shiklomanov, 2003, World Water Resources at the Beginning of the 21st Century) and has been approved by an expert.
- fraction, tap water, to air: 0.15; name fraction_TW_to_air; = fraction_PW_to_air; lognormal variance with pedigree 0.092025, pedigree (4,4,3,2,4)
  Calculated value. See comment in the other parametres present in this dataset. Tap water is considered to be always used as process water, thus process water fractions to air are applied to all tap water input flows to calculate the amount of water consumed in the processes.

## Reference product
- ceramic tile: 1 kg; CPC 373: Refractory products and structural non-refractory clay products; By-product classification allocatable product
  Ceramic tiles are clay-based and are made from a single clay or one or more clays mixed with mineral modifiers such as quartz and feldspar. The types of commercial clays used for ceramics are primarily kaolin and ball clay.
  EcoSpold01Location=CH
  production volume 0.0336675 kg
    This is a placeholder value that does not reflect real-world production volumes. This dataset does not currently require a real-world production volume to work in the database framework, and no actual data were collected yet. This has no negative effect on the results of the ecoinvent database. The placeholder value of this activity was scaled according to the nominal GDP of 2005 (source: United Nations, http://data.un.org/Glossary.aspx?q=GDP+%28current+US%24%29, accessed 20130726) to reflect an appropriate share of the global production volume, which is also a placeholder value.
  property price 0.38 EUR2005
    Average 2005 prices for EU27, USA, China, Japan and India from Import/Export data (US$ and tonnes) in UN Commodity Trade Statistics Database; Commodity: unglazed ceramic flags, paving, hearth or wall tiles
  property carbon content 0
    carbon content on a dry matter basis (reserved; not for manual entry)
  property true value 0.38
    allocation property applied in "true value" allocation // value calculated from revenue
  properties: water content 0, water in wet mass 0 kg, dry mass 1 kg, carbon content, non-fossil 0, carbon content, fossil 0, wet mass 1 kg, carbon allocation 0 kg

## By-products
- electricity, for reuse in municipal waste incineration only: 0 kWh; CPC 17100: Electrical energy; By-product classification allocatable product; pedigree (1,1,1,1,1)
  Net electricity generated from this waste and used in internal MSWI plant energy redistribution.
  Uncertainty: uncertainty is calculated from uncertainties in waste composition and uncertainties in energy efficiency and the uncertainty in internal energy demand
  production volume 4.85655e-7 kWh
  property exergy 3.6 MJ; name E_el_prod_MSWI_exergy
    This exergy property is based on the exergy content of the product.
  property true value relation 3.6; name E_el_prod_MSWI_true_value_relation
    property to calculate "true value" from
  property price 0.1 EUR2005; name E_el_prod_MSWI_price_EUR2005
    Estimated to be the same price as in case of electricity, medium voltage.
  property true value 6.23985e-8
    allocation property applied in "true value" allocation // value calculated from true value relation
- heat, for reuse in municipal waste incineration only: 0 MJ; CPC 17300: Steam and hot water; By-product classification allocatable product; pedigree (1,1,1,1,1)
  Net useful heat generated from this waste and used in internal MSWI plant energy redistribution.
  Uncertainty: uncertainty is calculated from uncertainties in waste composition and uncertainties in energy efficiency and the uncertainty in internal energy demand
  production volume 3.43594e-6 MJ
  property true value relation 0.1842; name E_th_prod_MSWI_true_value_relation
    property to calculate "true value" from
  property exergy 0.1842 MJ; name E_th_prod_MSWI_exergy
    This exergy property is based on the exergy content of the product.
  property price 0.0106 EUR2005; name E_th_prod_MSWI_price_EUR2005
    Average European district heat price from Ecoheatcool and Euroheat 2005-2006, Ecoheat Work package 1: The European heat market. Final report. 10.6 EUR/GJ i s the price of district heat. http://www.solarthermalworld.org/files/Ecoheatcool%20WP1%20Web.pdf?download
  property true value 2.25881e-8
    (same comment as for electricity, for reuse in municipal waste incineration only)
- zinc concentrate: 0 kg; CPC 14290: Other non-ferrous metal ores and concentrates (other than uranium or thorium ores and concentrates); By-product classification allocatable product
  Calculated value from the knowledge of the properties of both products.
  production volume 1.21847e-10 kg
  property price 0.38 EUR2005; name ByP_price_EUR2005
    Temporary price data. Calculated as 90% of purchasers price based on: Zinc content in concentrate 53%. Concentrate price per kg Zn 86.5% of refined Zn price (13.5% treatment charges according to CHR Metals Limited 2005: Dynamic cost curves. http://www.minecost.com/dynamic.pdf). 2004 zinc price from USGS (2007) Mineral commodity summaries 2007. <http://minerals.usgs.gov/minerals/pubs/mcs/2007/mcs2007.pdf> [Accessed 25 May 2010]
  property zinc content 0.53; name zinc_C_zinc_concentrate
    Zinc content on a dry matter basis. Value taken from teh "zinc mine operation" /GLO dataset.
  property dry mass 1 kg; name DM_zinc_concentrate
  property carbon content 0
    carbon content on a dry matter basis (reserved; not for manual entry)
  property true value 4.6302e-11
    allocation property applied in "true value" allocation // value calculated from revenue
  properties: wet mass 1 kg, water content 0, carbon content, non-fossil 0, carbon content, fossil 0, water in wet mass 0 kg, carbon allocation 0 kg

## Inputs from technosphere
- lime, packed: 0.0773 kg; source Nicoletti G. M. 2002; lognormal variance with pedigree 0.0407, pedigree (1,3,5,3,1)
  EcoSpold01Location=CH
  Literature value. Lime is used for ceramic body and for frit. The 37.5% of the total soldering materials are assumed to be feldspars.
  properties: water content 0.00200401, dry mass 0.998 kg, carbon content, fossil 0.117492, wet mass 1 kg
  note on carbon content, fossil: Table 3.1, ecoinvent v2.2 report 7, part VII, pg 3. MW CaCO3=100, MW MgCO3=84
- feldspar: 0.386 kg; source Nicoletti G. M. 2002; lognormal variance with pedigree 0.0407, pedigree (1,3,5,3,1)
  EcoSpold01Location=RER
  Literature value. Feldspars are used for ceramic body and for frit. The 62.5% of the total soldering materials are assumed to be feldspars.
  properties: wet mass 1 kg, dry mass 1 kg
- aluminium oxide, non-metallurgical: 0.000389 kg; source Nicoletti G. M. 2002; lognormal variance with pedigree 0.0407, pedigree (1,3,5,3,1)
  Estimation, based on literature value. Aluminium oxide is used for frit. Only the metal content is inventoried as metal.
  EcoSpold01Location=RER
  properties: dry mass 1 kg, wet mass 1 kg
- electricity, medium voltage: 0.313 kWh; source Nicoletti G. M. 2002; lognormal variance with pedigree 0.0407, pedigree (1,3,5,3,1)
  Literature value.
  EcoSpold01Location=UCTE
- heat, district or industrial, natural gas: 5.5765 MJ; source Nicoletti G. M. 2002; lognormal variance with pedigree 0.0407, pedigree (1,3,5,3,1)
  Literature value. Natural gas is assumed as primary energy for heating.
  EcoSpold01Location=RER
- wastewater from ceramic production: -2e-5 m3; name wastewater_output; lognormal variance with pedigree 0.0407, pedigree (1,3,5,3,1)
  Literature value. Waste water is sent to external treatment.
  EcoSpold01Location=CH
  production volume 2e-5 m3
    Calculated from the production volume of ceramic tiles in proportion to the respective output amounts.
  property price 0 EUR2005; name wastewater_output_price_EUR2005
  properties: dry mass 0.337476 kg, water content 2962.17, wet mass 1000 kg
- ceramic factory: 4e-9 unit; source ÖSPAG 2002; lognormal variance with pedigree 0.3507, pedigree (1,3,5,3,1)
  EcoSpold01Location=CH
  Literature value. It is assumed a ceramics factory with a yearly output of 5.000 t of ceramic products, a life time of 50 years for buildings and of 25 years for machines.
- hazardous waste, for underground deposit: -0.00961 kg; source Nicoletti G. M. 2002; lognormal variance with pedigree 0.0407, pedigree (1,3,5,3,1)
  EcoSpold01Location=DE
  Literature value. Wastes to disposal are often oil-contaminated. A major part of the non-contaminated production waste can be recycled in the process, therefore they are assumed as hazardous waste.
  production volume 0.00961 kg
    (same comment as for wastewater from ceramic production)
  properties: carbon content, fossil 0.554667, wet mass 1 kg, dry mass 1 kg
  note on carbon content, fossil: Tab A.6, ecoinvent v2.2 report 13_I, average hazardous waste composition was used, and referred to 0% water mass. No waste-specific emission are currently inventoried for underground deposits. Accordingly, no waste composition must be specified. For generic, average waste to underground deposit deposition in a 200 liter steel drum without cement solidification is assumed (ecoinvent v2.2 report 13_I).
- sodium perborate, tetrahydrate, powder: 0.00611 kg; source Nicoletti G. M. 2002; lognormal variance with pedigree 0.0407, pedigree (1,3,5,3,1)
  Literature value. Penta-hydrate borax is used for frit.
  EcoSpold01Location=RER
  properties: dry mass 1 kg, wet mass 1 kg
- lead: 0.00665 kg; source Nicoletti G. M. 2002; lognormal variance with pedigree 0.0407, pedigree (1,3,5,3,1)
  Estimation, based on literature value. Lead oxide is used for frit. Only the metal content is inventoried as metal.
  EcoSpold01Location=RER
  properties: dry mass 1 kg, wet mass 1 kg
- barite: 0.000556 kg; source Nicoletti G. M. 2002; lognormal variance with pedigree 0.0407, pedigree (1,3,5,3,1)
  EcoSpold01Location=RER
  Literature value. Barium oxide is used for frit.
  properties: dry mass 1 kg, wet mass 1 kg
- tin: 4.9e-5 kg; source Nicoletti G. M. 2002; lognormal variance with pedigree 0.0407, pedigree (1,3,5,3,1)
  Estimation, based on literature value. Tin oxide is used for frit. Only the metal content is inventoried as metal.
  EcoSpold01Location=RER
  properties: wet mass 1 kg, dry mass 1 kg
- stucco: 0.0623 kg; source ÖSPAG 2002; lognormal variance with pedigree 0.0587, pedigree (1,3,5,3,3)
  Estimation, based on literature values. Half of the amount of the sanitary ceramic production is assumed for ceramic tiles, as no information about material for moulds was found in Nicoletti et al., 2002.
  EcoSpold01Location=CH
  properties: dry mass 1 kg, wet mass 1 kg
- titanium dioxide: 0.0184 kg; source Nicoletti G. M. 2002; lognormal variance with pedigree 0.0407, pedigree (1,3,5,3,1)
  EcoSpold01Location=RER
  Literature value. Titanium oxide is used for frit.
  properties: dry mass 1 kg, wet mass 1 kg
- silica sand: 0.17 kg; source Nicoletti G. M. 2002; lognormal variance with pedigree 0.0407, pedigree (1,3,5,3,1)
  Literature value. Silica sand is used for ceramic body (silicious and feldspar sands) and for frit (quarz and feldspar sands).
  EcoSpold01Location=DE
  properties: wet mass 1 kg, dry mass 0.99 kg, water content 0.010101
- zinc: 0.00339 kg; lognormal variance with pedigree 0.0407, pedigree (1,3,5,3,1)
  EcoSpold01Location=RER
  Estimation, based on literature value. Zinc oxide is used for frit. Only the metal content is inventoried as metal.
  properties: wet mass 1 kg, dry mass 1 kg
- clay: 0.489 kg; source Nicoletti G. M. 2002; lognormal variance with pedigree 0.0407, pedigree (1,3,5,3,1)
  Literature value. Clay is used for the ceramic body.
  EcoSpold01Location=CH
  properties: water content 0.0362694, wet mass 1 kg, dry mass 0.965 kg
- tap water: 0.667 kg; name tap_water_input; source Nicoletti G. M. 2002; lognormal variance with pedigree 0.0407, pedigree (1,3,5,3,1)
  Literature value.
  EcoSpold01Location=RER
  properties: water content 2962.17, dry mass 0.000337476 kg, carbon content, fossil 0.00178991, wet mass 1 kg
  note on carbon content, fossil: Bicarbonate content is 2.93 mol/m3. CO2 content is 0.1 mol/m3 (ecoinvent v2.2 report 8, Tab 93.1).

## Emissions to nature
- Particulates, < 2.5 um [air, unspecified]: 0.00871 kg; source EPA 1998; lognormal variance with pedigree 0.0626, pedigree (1,3,5,5,1)
  Literature value. Besides the emissions from heat generation, only dust emissions from the handling of the raw materials are of relevance. The total of the values given in EPA (1998) for "comminution" and "ceramic glass spray booth" (controlled) is inventoried (8.71E-03 kg/kg). Since the ceramic powder has a grain size around 1 mm and fabric filters or wet scrubbers are utilised to abate dust emissions, the particles are inventoried as PM 2.5.
  If organic plasticizers are used (which usually is not the case for sanitary ceramics and ceramic tiles), emissions from burning them are relevant too.
- Water [water, unspecified]: 0.00054695 m3; name water_to_water_unspecified; = (tap_water_input/1000)*(1-fraction_TW_to_air)-(wastewater_output*-1); lognormal variance with pedigree 0.0807, pedigree (2,2,5,1,1)
  Calculated value based on literature values and expert opinion. See comments in the parametres' comment field.
  property wet mass 1000 kg; name WM
  property water in wet mass 1000 kg; name WWM
  property carbon content, non-fossil 0; name C_content_non_fossil
  property fraction, origin: fresh water 1; name fraction_origin_fresh_water_Ww
  property fraction, origin: salt water 0; name fraction_origin_salt_water_Ww
  property fraction, origin: unspecified 0; name fraction_origin_unspecified_Ww
  property dry mass 0 kg; name DM
  property carbon content, fossil 0; name C_content_fossil
- Water [air, unspecified]: 0.00010005 m3; name water_to_air_unspecified; = (tap_water_input/1000*fraction_TW_to_air); lognormal variance with pedigree 0.0807, pedigree (2,2,5,1,1)
  (same comment as for Water)
  property fraction, origin: salt water 0; name fraction_origin_salt_water
  property fraction, origin: unspecified 0; name fraction_origin_unspecified
  property fraction, origin: fresh water 1; name fraction_origin_fresh_water

## Sampling procedure
Data was based on a LCA case study with inventory data for one producer in Italy.

## Extrapolations
see Geography

## Review by Roberto Dones 2003-08-11
passed

## Review by Roland Hischier 2011-09-22
Transfer of documentation done.
