# maize grain processing, dry milling

Dataset: EcoSpold 2, unit process
Geography: ZA
Time period: 2016-01-01 to 2019-12-31
Technology level: current
Classification: ISIC rev.4 ecoinvent: 1061:Manufacture of grain mill products
Classification: EcoSpold01Categories: agricultural means of production/feed
Scenario: Business-as-Usual
System model: Allocation at the point of substitution
Generated by: Ilhaam Patel
Published in: Russo, V 2017
Database: ecoinvent
isCopyrightProtected: true
accessRestrictedTo: 1

## General comment
This dataset represents the production of 1 kg of maize flour, as well as the secondary products maize chop and maize screenings from dry milling practices in South Africa. Maize flour (or corn meal) is a common staple food made from maize ground to different consistencies of fine, medium or coarse. In this dataset maize flour represents all grades of maize meal (sifted, super, special, unsifted etc.), maize rice, maize grits and other products, all intended for human consumption. The secondary products are intended for use in animal feed as an energy and/or protein source, particularly in beef production. The module includes the receiving of maize and processing thereof through multiple cleaning, grinding and sieving steps. Activities that have been considered in this dataset are the inputs of maize, water, electricity, land, infrastructure and an output of waste water.
Boundary of exchanges for maize grain processing by dry milling

## Included activities start
This activity starts with the maize received at the gate of the dry milling plant. Maize received is weighed on weighbridges before entering the plant. Stones, sand, sticks, etc. contained in the maize are removed during the initial cleaning process step.

## Included activities end
This activity ends with the delivery of 1 kg of maize flour, along with by-product(s), at the factory gate of the dry milling plant.

## Geography
Data is for South African context.

## Technology
The data are intended to reflect current equipment and processes in South Africa.

## Time period
The production data represented in this dataset are based on SAGIS supply and demand data for the 2016/2017 marketing season (March to Feb) retrieved online. Reference(s): SAGIS (2017) Supply and Demand: Marketing Year March 2016 to February 2017, South African Grain Information Service. Available at: http://www.sagis.org.za/sd_marketing_year.html. (Accessed August 2017)

## Parameters
- fraction, tap water, to air: 0.9; lognormal variance with pedigree 0.092025, pedigree (4,4,3,2,4)
- fraction, material rejected: 0.06 dimensionless; name reject_material
- fraction, process water, to air: 0.32 dimensionless; lognormal variance with pedigree 0.092025, pedigree (4,4,3,2,4)

## Reference product
- maize flour: 0 kg; name ref_product; CPC 23120: Other cereal flours; By-product classification allocatable product
  This includes maize flour (sifted, special, super and unsifted), maize meal, samp, maize rice, maize grits and other maize products intended for human consumption. This figure is based on the annual average output of products from dry milling for human consumption in South Africa reported by SAGIS (South African Grain Information Service) on a monthly basis (July 2015 - June 2016). Maize processed for human consumption refers to dry milling for the production of samp, maize meal, rice, grits and other products for human consumption, and a hominy chop by-product sold into the animal feed industry. Reference(s): SAGIS (2016) Maize Products per Month Manufactured - July 2015 to June 2016, South African Grain Information Service. Available at: www.sagis.org.za. (Accessed April 2017)
  production volume 3.315e9 kg; name ref_product_flour
    Calculated from the annual production volume of milled maize products (4,750,529 tonnes) and the fraction of total product that is maize flour. This production figure represents the maize processed for human consumption and gristing based on SAGIS supply and demand data for the 2016/2017 marketing season (March to Feb). Maize processed for human consumption refers to dry milling for the production of flour, samp, maize meal, rice, grits and other products for human consumption, and hominy chop for animal consumption. Gristing (or "exchange milling") is where farmers deposit whole maize at a mill and collect maize meal for their workers. Reference(s): SAGIS (2017) Supply and Demand: Marketing Year March 2016 to February 2017, South African Grain Information Service. Available at: http://www.sagis.org.za/sd_marketing_year.html. (Accessed August 2017)
  property price 0.36 EUR2005; name ref_product_price_EUR2005
    Personal communication.
  property dry mass 0.89 kg; name ref_product_DM
  property water in wet mass 0.11 kg; name ref_product_WWM
  property water content 0.123596; name ref_product_water_content; = 0.11/0.89
  property carbon content, fossil 0; name ref_product_C_content_fossil
    fossil carbon content on a dry matter basis
  property carbon content, non-fossil 0.46957; name ref_product_C_content_non_fossil
    Have assumed the same as maize grain input
  property wet mass 1 kg; name ref_product_WM
  property digestable energy content 13.78 MJ/kg
    A weighted average based on the % breakdown of the different maize products for human consumption in South Africa (i.e. maize meal, samp, maize rice, maize grits and other maize products intended for human consumption) and the energy content of representative maize products produced in the region.
  property carbon content 0.46957
    carbon content on a dry matter basis (reserved; not for manual entry)
  property true value 0.36; name ref_product_true_value
    allocation property applied in "true value" allocation // value calculated from revenue
  properties: carbon allocation 0.417917 kg
- energy feed, gross: 1 MJ; name reject_product; = maize_received*reject_material*0.87*18.5; CPC 23319: Preparations used in animal feeding n.e.c.; By-product classification allocatable product; pedigree (1,1,1,1,1)
  Maize screenings: 6% of maize received is estimated to be reject material (foreign matter and defective kernels), representative of a high grade of maize (see comment on maize grain from technosphere for references). Maize received is weighed on weighbridges before entering the plant and contains stones, sand, sticks, etc. which are removed during the initial cleaning process step. Defective kernels and foreign matter (maize screenings) are assumed to be mixed in with the chop and sold as an animal feed product (personal communication with mill operator). Maize screenings are fed to livestock as an energy feed. A gross energy content of 18.5 MJ/kg dry matter (DM) and DM of 87% of feed was applied in this dataset, based on properties of "maize bran" (Feedipedia, 2015). While maize bran theoretically consists of the bran coating removed during the early stages of processing, in practice the maize bran sold as livestock feed is generally a mixture of the bran fraction and other by-products (Feedipedia, 2015). Reference(s): Feedipedia (2015) Animal Feed Resources Information System: Maize Bran and Hominy Feed, Available at: https://www.feedipedia.org/node/712. (Accessed October 2017).
  production volume 4.836e9 MJ; = reject_product*ref_product_flour
    Calculated from production volume of reference product using the relative outputs.
  property price 0.0108 EUR2005; name reject_product_price_EUR2005
    Based on energy feed, gross content in soybean meal and prices per kg of soybean meal. Assumed soybean meal is the most used feed. Soybean meal 2004 prices for World import/export data (tonnes and US$) from FaoStat statistics (http://faostat.fao.org/site/535/default.aspx#ancor, TRADE)- [Accessed 24 May 2010]. See calculations for protein /energy content
  property dry mass 0.047027 kg; name reject_product_dry_mass; = 0.87/reject_product_gross_E_feed_per_kg_DM
  property gross energy, feed per kg of dry mass 18.5 MJ/kg; name reject_product_gross_E_feed_per_kg_DM
    A gross energy content of 18.5 MJ/kg dry matter (DM) applied in this dataset, based on properties of "maize bran" (Feedipedia, 2015). While maize bran theoretically consists of the bran coating removed during the early stages of processing, in practice the maize bran sold as livestock feed is generally a mixture of the bran fraction and other by-products (Feedipedia, 2015). Reference(s): Feedipedia (2015) Animal Feed Resources Information System: Maize Bran and Hominy Feed, Available at: https://www.feedipedia.org/node/712. (Accessed October 2017).
  property water content 0.149425; = reject_product_water_in_wet_mass/reject_product_dry_mass
  property wet mass 0.0540541 kg; = 1/reject_product_gross_E_feed_per_kg_DM
  property water in wet mass 0.00702703 kg; name reject_product_water_in_wet_mass; = 0.13/reject_product_gross_E_feed_per_kg_DM
  property carbon content 0.46957
    carbon content on a dry matter basis (reserved; not for manual entry)
  property true value 0.0157553; name reject_product_true_value
    allocation property applied in "true value" allocation // value calculated from revenue
  properties: carbon content, fossil 0, carbon content, non-fossil 0.46957, carbon allocation 0.0220825 kg

## By-products
- maize chop: 0 kg; name by_product; By-product classification allocatable product; CPC 01122: Maize (corn), other; pedigree (1,1,1,1,1)
  This figure is based on the annual average output of products from dry milling for human consumption in South Africa reported by SAGIS (South African Grain Information Service) on a monthly basis (July 2015 - June 2016). Maize processed for human consumption refers to dry milling for the production of samp, maize meal, rice, grits and other products for human consumption, and a hominy chop by-product sold into the animal feed industry. Reference(s): SAGIS (2016) Maize Products per Month Manufactured - July 2015 to June 2016, South African Grain Information Service. Available at: www.sagis.org.za. (Accessed April 2017)
  production volume 1.3923e9 kg; name ref_product_chop; = by_product* ref_product_flour
    Calculated from production volume of reference product using the relative outputs.
  property price 0.1 EUR2005; name by_product_price_EUR2005
    Estimated value. According to LFC Milling PTY (Ltd), the price of maize chop is set at 85% of the price of maize grain. Price of maize grain is set to 0.12 comment: Literature value. Based on SAFEX price of R 2,025 per tonne (average yellow and white). Source: SAGIS, 2018. Retrieved from: http://www.sagis.org.za/safex_historic.html, accessed 28May2018.
  property dry mass 0.893 kg; name by_product_DM
  property water in wet mass 0.107 kg; name by_product_WWM
  property carbon content, fossil 0; name by_product_C_content_fossil
    fossil carbon content on a dry matter basis
  property water content 0.119821; name by_product_water_content; = 0.107/0.893
  property carbon content, non-fossil 0.46957; name by_product_C_content_non_fossil
    Have assumed the same as maize grain input
  property gross energy, feed per kg of dry mass 18.7 MJ/kg; name by_product_gross_E_feed_per_kg_DM
    A gross energy content of 18.7 MJ/kg dry matter (DM) applied in this dataset, based on properties of "hominy feed" (Feedipedia, 2015). Reference(s): Feedipedia (2015) Animal Feed Resources Information System: Maize Bran and Hominy Feed, Available at: https://www.feedipedia.org/node/712. (Accessed October 2017).
  property wet mass 1 kg; name by_product_WM
  property carbon content 0.46957
    carbon content on a dry matter basis (reserved; not for manual entry)
  property true value 0.042; name by_product_true_value
    allocation property applied in "true value" allocation // value calculated from revenue
  properties: carbon allocation 0.419326 kg
- heat, for reuse in municipal waste incineration only: 0 MJ; CPC 17300: Steam and hot water; By-product classification allocatable product; pedigree (1,1,1,1,1)
  Net electricity generated from this waste and used in internal MSWI plant energy redistribution.
  Uncertainty: uncertainty is calculated from uncertainties in waste composition and uncertainties in energy efficiency and the uncertainty in internal energy demand
  production volume 4253.07 MJ
  property exergy 0.1842 MJ; name E_th_prod_MSWI_exergy
    This exergy property is based on the exergy content of the product.
  property price 0.0106 EUR2005; name E_th_prod_MSWI_price_EUR2005
    Average European district heat price from Ecoheatcool and Euroheat 2005-2006, Ecoheat Work package 1: The European heat market. Final report. 10.6 EUR/GJ i s the price of district heat. http://www.solarthermalworld.org/files/Ecoheatcool%20WP1%20Web.pdf?download
  property true value relation 0.1842; name E_th_prod_MSWI_true_value_relation
    property to calculate "true value" from
  property true value 8.45854e-9
    allocation property applied in "true value" allocation // value calculated from true value relation
- electricity, for reuse in municipal waste incineration only: 0 kWh; CPC 17100: Electrical energy; By-product classification allocatable product; pedigree (1,1,1,1,1)
  (same comment as for heat, for reuse in municipal waste incineration only)
  production volume 590.703 kWh
  property price 0.1 EUR2005; name E_el_prod_MSWI_price_EUR2005
    Estimated to be the same price as in case of electricity, medium voltage.
  property exergy 3.6 MJ; name E_el_prod_MSWI_exergy
    This exergy property is based on the exergy content of the product.
  property true value relation 3.6; name E_el_prod_MSWI_true_value_relation
    property to calculate "true value" from
  property true value 2.29601e-8
    (same comment as for heat, for reuse in municipal waste incineration only)

## Inputs from technosphere
- electricity, low voltage: 0.00205268 kWh; lognormal variance with pedigree 0.002, pedigree (2,3,2,1,1)
  Average electricity use of two dry milling facilities in South Africa: 26 kWh/tonne based on annual production data of a combined wheat & maize mill, and 86 kWh/tonne based on hourly production data of a dedicated maize mill.
  EcoSpold01Location=CH
- maize grain: 0.0390537 kg; name maize_received; = ( ref_product+ by_product)/(1-reject_material); lognormal variance with pedigree 0.002, pedigree (2,3,2,1,1)
  This figure represents maize received at the gate of the dry milling plant to produce 1 kg milled maize products. An average of 6% of maize received is estimated to be reject material (foreign matter and defective kernels), representative of a high grade of maize. Maize received is weighed on weighbridges before entering the plant and contains stones, sand, sticks, etc. which are removed during the initial cleaning process step. Maximum permissable levels of deviations depend on the grade of maize, and range from 8% to 30%, this includes foreign matter (with max permissable levels ranging from 0.3%-0.75%) and defective maize kernels. Quality sampling over the period 2001/02 - 2010/11 suggests the majority of maize produced falls within the standard, with a weighted average of 6.2% total deviations over this period (with a weighted average foreign matter of 0.2%). References: Department of Agriculture (2009). Regulations relating to the grading, packing and marking of maize intended for sale in the Republic of South Africa. Government gazette, 8 May 2009; Southern African Grain Laboratory (SAGL) (2011) South African Maize Crop Quality Report 2010/2011 Season.
  property water in wet mass 0.14 kg; name maize_grain_water_in_wet_mass; = 1-maize_grain_dry_mass
  property dry mass 0.86 kg; name maize_grain_dry_mass
  properties: carbon content, non-fossil 0.46957, wet mass 1 kg, water content 0.162791
  note on carbon content, non-fossil: Estimate not geography specific. Value from "maize grain, feed production, GLO".
- building, multi-storey: 3.12815e-7 m3; lognormal variance with pedigree 0.212, pedigree (3,5,5,5,4)
  Estimation (not specific to South Africa). Value scaled to reference product. Comment from "maize grain, feed production, GLO": The typical storage capacity of the cereal silo found in some feed processing centres in Switzerland is 10,000 tonnes, with an effective storage volume of about 80% of the building volume. With an average grain specific weight of 750 kg/m3, this gives a building volume of about 16,650 m3. Assuming that these feed processing centres process 25,000 tonnes of grain per year, the cereals will be stored for about three months before being processed. The largest feed processing centre in Switzerland (UFA-Biblis) has a feedstuff storage compound of 29,440 m3 (80 m length * 23 m * 16 m height) with an effective storage capacity of 4,140 tonnes (5520 palettes of 750 kg), or about 150 kg/m3 (UFA 2002). This centre processes 275,000 tonnes of concentrate feeds yearly. After processing, the feedstuff must therefore be stored for approx. one week in the processing centre before being sent to the regional storehouse. The average length of storage of the raw materials is set at 3 months in the calculations. The storage volume required was estimated as 1.7 m3/tonne of raw material (grain specific weight 750 kg/m3 and 80% of the building volume used for storage). The lifetime of the storage silo was assumed to be 50 years, the length of the construction phase 2 years. Land use was estimated from the height of Biblis’s storage silo (UFA 2002). Taking the height of 16 m, the area used is 0.1 m2/tonne of feedstuff for 3 months.
- wastewater, unpolluted: -5.16842e-7 m3; name waste_water; = ((water_input*(1- Ref('daadf2d4-7bbb-4f69-8ab5-58df4c1685eb')))/1000)*-1; lognormal variance with pedigree 0.002, pedigree (2,3,2,1,1)
  Estimate, not geography specific. Water is used to clean the maize received ( to remove stones, sand, sticks, etc. picked up from the field during the harvesting of the maize and during storage) and to increase the moisture content of the grain. The water does not contain any chemicals, only minor impurities from the washing process, and is thus considered to be unpolluted. The waste water is released to the municipal sewage system, without prior treatment, based on information provided by two South African mills. The estimate that 32% of water input is consumptive is from literature for a European mill: Salzgeber & Lörcher (1996), cited in "maize grain, feed production, GLO".
  production volume 66273.5 m3; = ref_product_flour * ((Ref('c1e901f9-af4f-465b-9a23-a31f82b10491')*-1) / ref_product)
    Calculated from production volume of reference product using the relative outputs.
  property price 0 EUR2005; name waste_water_price_EUR2005
  properties: carbon content, non-fossil 0.00178991, water content 2962.17, carbon content, fossil 0.00178991, wet mass 1000 kg, dry mass 0.337476 kg
  note on carbon content, fossil: Assumed to be like in tap water. Bicarbonate content is 2.93 mol/m3. CO2 content is 0.1 mol/m3 (ecoinvent v2.2 report 8, Tab 93.1).
- tap water: 0.000760062 kg; name water_input; lognormal variance with pedigree 0.0414, pedigree (2,3,2,1,1)
  Average water use of two dry milling facilities in South Africa. The two mills show very different water usage rates (1.3 litres/tonne and 40 litres/tonne). The former is calculated from annual water use and production tonnages, and the latter on hourly production data.
  properties: wet mass 1 kg, dry mass 0.000337476 kg, water content 2962.17, carbon content, fossil 0.00178991
  note on carbon content, fossil: Estimate not geography specific. Value and comment from "maize grain, feed production, GLO": Bicarbonate content is 2.93 mol/m3. CO2 content is 0.1 mol/m3 (ecoinvent v2.2 report 8, Tab 93.1).
- industrial machine, heavy, unspecified: 4.7827e-7 kg; lognormal variance with pedigree 0.1306, pedigree (5,5,5,5,4)
  Estimate from industrial machinery used in "Limestone, crushed, for mill production" (annual production of 195,000 tonnes), which is assumed to provide a good proxy for flour milling. Value adapted on the basis of annual production, which was estimated to be an average of 415,000 tonnes per year, based on the production figures of two dry milling facilities in South Africa. The estimated life span of the machines is 25 years.

## Inputs from nature
- Occupation, industrial area [natural resource, land]: 1.83811e-6 m2*year; source UFA 2002; lognormal variance with pedigree 0.132, pedigree (3,5,5,5,4)
  Estimation (not specific to South Africa). Value scaled to reference product. Comment from "maize grain, feed production, GLO":Corresponds to 0.2m2/tonne (because the total area occupied as “industrial area” was estimated as twice as high, namely 0.2 m2/tonne) multiplied by 3 months (because the average length of storage of the raw materials is set at 3 months in the calculations).
- Transformation, from unspecified [natural resource, land]: 3.67105e-8 m2; source UFA 2002; lognormal variance with pedigree 0.212, pedigree (3,5,5,5,4)
  Estimation (not specific to South Africa). Value scaled to reference product. Comment from "maize grain, feed production, GLO":Corresponds to occupation industrial area/50 years (the lifetime of the storage silo was assumed to be 50 years).
- Occupation, construction site [natural resource, land]: 7.36795e-8 m2*year; source UFA 2002; lognormal variance with pedigree 0.132, pedigree (3,5,5,5,4)
  Estimation (not specific to South Africa). Value scaled to reference product. Comment from "maize grain, feed production, GLO":Corresponds to land use Transformation*2 years (the length of the construction phase is 2 years).
- Transformation, to industrial area [natural resource, land]: 3.67105e-8 m2; source UFA 2002; lognormal variance with pedigree 0.212, pedigree (3,5,5,5,4)
  Estimation (not specific to South Africa). Value scaled to reference product. Comment from "maize grain, feed production, GLO": Corresponds to occupation industrial area/50 years (the lifetime of the storage silo was assumed to be 50 years).

## Emissions to nature
- Water [water, unspecified]: 1.44014e-6 m3; = (water_input* Ref('daadf2d4-7bbb-4f69-8ab5-58df4c1685eb')/1000)+ (( maize_received* maize_grain_water_in_wet_mass-ref_product* ref_product_WWM- by_product* by_product_WWM- reject_product* reject_product_water_in_wet_mass)/1000); lognormal variance with pedigree 0.002, pedigree (2,3,2,1,1)
  Water balance of mill. All water not in products or leaving via waste water stream is assumed to have been lost to air.

## Sampling procedure
The product fractions and production volumes are calculated from monthly data published by the South African Grain Information Service (SAGIS, 2017). Electricity and water use data are from two dry milling facilities in South Africa. Infrastucure and land use are estimated values, not specific to South Africa. Reference(s): SAGIS (2017) Supply and Demand: Marketing Year March 2016 to February 2017, South African Grain Information Service. Available at: http://www.sagis.org.za/sd_marketing_year.html. (Accessed August 2017)
