# medium density fibre board production, uncoated

Dataset: EcoSpold 2, unit process
Geography: RoW
Time period: 2012-01-01 to 2019-12-31
Technology level: current
Classification: EcoSpold01Categories: wooden materials/processing
Classification: ISIC rev.4 ecoinvent: 1621:Manufacture of veneer sheets and wood-based panels
Synonyms: MDF
Scenario: Business-as-Usual
System model: Allocation at the point of substitution
Generated by: Frank Werner
Database: ecoinvent
isCopyrightProtected: true
accessRestrictedTo: 1

## General comment
This dataset represents medium density fibreboard (MDF) production as the weighted average of medium density board produced by the members of the European Panel Federation (EPF)
Medium density fibreboard (MDF) is an engineered wood product according to the standard EN 622-5. It is formed by breaking down hardwood or softwood residuals into wood fibres, often in a defibrator, combining it with wax and a resin binder, and forming panels by applying high temperature and pressure.
Over time, the word "MDF" has become a generic name for any dry process fibre board. MDF density is typically between 500 kg/m3 and 1000 kg/m3. Standard boards are available in Europe with thicknesses in the range of 1.8 to 60 mm.
The inventoried MDF has the following average composition:
Unlike most other wood based sheet materials, the uniform and close packed fibre distribution throughout the thickness of MDF allows detailed machining operations to be carried out on the faces and edges without breakout or the exposure of voids within the core of the board.
Standard MDF is being used for the manufacture of table tops, door panels and drawer fronts with moulded edges or profiled surfaces. The smooth and stable surfaces of MDF provide an excellent substrate for painting or the application of decorative foils or wood veneers. The inherent stability, good machinability and high strength of MDF creates opportunities for it to be used as an alternative to solid wood for applications such as drawer sides, cabinet rails, mirror surrounds and mouldings.
Although primarily developed for use in furniture, standard MDF is being used increasingly for shop fitments, exhibition displays, wall panelling, architectural mouldings and many other applications where its good machining and finishing characteristics are used to advantage.
MDF product types are available for the use in more demanding situations like for moisture resistant, flame retardant, high density and exterior grades of MDF.
Moisture resistant boards are being used for bathroom fitments, doors, window boards and other interior building applications where resistance to damp conditions or intermittent wetting are important requirements.
Flame retardant boards are being used increasingly for fitted furniture, doors and panelling in public buildings and other areas which have to conform to national fire regulations.

## Included activities start
From the reception at the factory gate of all materials and fuels used.

## Included activities end
Activity ends with the uncoated medium density board at the factory gate.

## Geography
Representation of the production of the member companies of the European Panel Federation (EPF).

## Technology
The most raw materials used for MDF production are wooden materials, such as logs with diameter of 50 – 200 mm, small diameter wood, roundwood core and veneer wastes from plywood produc-tion, saw dust and wood strips from sawmills etc. If necessary, the chips are washed to remove dirt and other debris.
Clean chips are softened in a steam-pressurized digester, then transported into a pressurized refiner chamber. In the refiner chamber, single or double revolving disks are used to mechanically pulp the softened chips into fibres suitable for making the board.
From the refiners, the fibres move to the drying and blending area. A rotary predryer may be used for initial drying of relatively wet furnish. Regardless of whether or not a predryer is used, tube dryers typically are used to reduce the moisture content of the fibres to desired levels. Single-stage or multiple-stage tube drying systems are commonly used in MDF manufacture. Most of the multiple-stage tube drying systems incorporate two stages. In multiple-stage tube dryers, there is a primary tube dryer and a second stage tube dryer in series separated by an emission point such as a cyclonic collector. Heat is usually provided to tube dryers by the direct firing of propane, natural gas, or distillate oil or by indirect heating.
The sequence of the drying and blending operations depends on the method by which resins and other additives are blended with the fibres. Urea-formaldehyde (UF) resins are the most common resins used in the manufacture of MDF. Phenolic resins, melamine resins, and isocyanates are also used. Some plants inject resins into a short-retention blender, while most facilities inject resin formulations into a blowline system. If resin is added in a separate blender, the fibres are first dried and separated from the gas stream by a fibre recovery cyclone, then conveyed to the blender. The fibres then are blended with resin, wax, and any other additives and conveyed to a dry fibre storage bin.
If a blowline system is used, the fibres are first blended with resin, wax, and other additives in a blowline, which is a duct that discharges the resinated fibres to the dryer. After drying, the fibres are separated from the gas stream by a fibre recovery cyclone and then conveyed to a dry fibre storage bin.
Air conveys the resinated fibres from the dry storage bin to the forming machine, where they are deposited on a continuously moving screen system. The continuously formed mat must be pre-pressed before being loaded into the hot press. After prepressing, some pretrimming is done. The trimmed material is collected and recycled to the forming machine.
The prepressed and trimmed mats then are transferred to the hot press. The press applies heat and pressure to activate the resin and bond the fibres into a solid panel. The mat may be pressed in a continuous hot press, or the precompressed mat may be cut by a flying cut-off saw into individual mats that are then loaded into a multi-opening, batch-type hot press. Steam or hot oil heating of the press platens is common in European MDF plants. After pressing, the boards are cooled, sanded, trimmed, and sawed to final dimensions. The boards may also be painted or laminated. Finally, the finished product is packaged for shipment.

## Parameters
- input wood fuel: 4212.26 MJ; name wood_fuel; = 221*19.06
  input of wood fuel used in production, i.e. wood fuel from forestry, internal wood residues, post-consumer wood used for energy purposes, etc; expressed in MJ of absolutely dry mass (lower heating value at humidity u=0%)

## Reference product
- residual wood, dry: 1 m3; name w_chips; CPC 39283: Non-agglomerated wood waste and scrap; By-product classification allocatable product; pedigree (1,1,1,1,1)
  sold residual wood
  production volume 3.30042e6 m3; = p_board * (Ref('0c261a9b-cd9c-4c8a-ab1d-22542ef6879f') / Ref('4c7233ba-7eea-47f7-9144-73075d8ebe25'))
    Calculated from production volume of reference product using the relative outputs.
  property price 26.9 EUR2005; name w_chips_price_EUR2005
    Temporary price data. Calculated as 90% of purchasers price based on: 2004 prices for World Import/Export (USD/cubicmeter) from FaoStat (http://faostat.fao.org/site/626/default.aspx#ancor, [accessed 10th June 2010]) Commodity: 'Chips and Particles' assuming this is for air-dry chips (10% water on a dry matter basis at 650 kg/m3) and no price difference for water content (i.e. assuming air-drying).
  property carbon content 0.494
    carbon content on a dry matter basis (reserved; not for manual entry)
  property true value 1.24719; name w_chips_true_value
    allocation property applied in "true value" allocation // value calculated from revenue
  properties: water content 0.15, dry mass 550 kg, carbon content, fossil 0, carbon content, non-fossil 0.494, water in wet mass 82.5 kg, wet mass 632.5 kg, carbon allocation 271.7 kg
- medium density fibreboard: 0 m3; CPC 31441: Medium density fibreboard (MDF); By-product classification allocatable product
  production volume 7.11851e7 m3; name p_board
    FaoStat 2011
  property price 252 EUR2005
    Export prices for the World+ according to: http://faostat.fao.org/site/626/DesktopDefault.aspx?PageID=626#ancor downloaded 28 April 2009; calculated as export value divided by export volume.
  property dry mass 639.6 kg; name MDF_DM; = MDF_WM-MDF_WWM
  property wet mass 684 kg; name MDF_WM
  property water in wet mass 44.4 kg; name MDF_WWM
  property water content 0.0694184; = MDF_WWM/MDF_DM
  property carbon content, non-fossil 0.421707; = 546*0.494/MDF_DM
    carbon content of wood mass divided by dry mass
  property carbon content 0.47755
    carbon content on a dry matter basis (reserved; not for manual entry)
  property true value 252
    allocation property applied in "true value" allocation // value calculated from revenue
  properties: carbon content, fossil 0.0558423, carbon allocation 305.441 kg

## By-products
- heat, for reuse in municipal waste incineration only: 0 MJ; CPC 17300: Steam and hot water; By-product classification allocatable product; pedigree (1,1,1,1,1)
  Net electricity generated from this waste and used in internal MSWI plant energy redistribution.
  Uncertainty: uncertainty is calculated from uncertainties in waste composition and uncertainties in energy efficiency and the uncertainty in internal energy demand
  production volume 2.17188e7 MJ
  property exergy 0.1842 MJ; name E_th_prod_MSWI_exergy
    This exergy property is based on the exergy content of the product.
  property price 0.0106 EUR2005; name E_th_prod_MSWI_price_EUR2005
    Average European district heat price from Ecoheatcool and Euroheat 2005-2006, Ecoheat Work package 1: The European heat market. Final report. 10.6 EUR/GJ i s the price of district heat. http://www.solarthermalworld.org/files/Ecoheatcool%20WP1%20Web.pdf?download
  property true value relation 0.1842; name E_th_prod_MSWI_true_value_relation
    property to calculate "true value" from
  property true value 0.00207962
    allocation property applied in "true value" allocation // value calculated from true value relation
- electricity, for reuse in municipal waste incineration only: 0 kWh; CPC 17100: Electrical energy; By-product classification allocatable product; pedigree (1,1,1,1,1)
  (same comment as for heat, for reuse in municipal waste incineration only)
  production volume 2.47429e6 kWh
  property price 0.1 EUR2005; name E_el_prod_MSWI_price_EUR2005
    Estimated to be the same price as in case of electricity, medium voltage.
  property exergy 3.6 MJ; name E_el_prod_MSWI_exergy
    This exergy property is based on the exergy content of the product.
  property true value relation 3.6; name E_el_prod_MSWI_true_value_relation
    property to calculate "true value" from
  property true value 0.00463033
    (same comment as for heat, for reuse in municipal waste incineration only)
- biogas: 0 m3; source Raboni, Massimo 2014; By-product classification allocatable product; CPC 17200: Coal gas, water gas, producer gas and similar gases, other than petroleum gases and other gaseous hydrocarbons; pedigree (1,1,1,1,1)
  An average yield of 100 litres of biogas per kg biowaste is assumed
  production volume 156194 m3
  property price 0.109 EUR2005; name biogas_yield_price_EUR2005
    Temporary price data. Calculated as 90% of purchasers price based on: Same prices per energy output as natural gas, based on the proportional lower heating value (2/3 that of natural gas)
  property carbon content, non-fossil 0.449939
    Total C content in kg/Nm3 (Tab 12.8, ecoinvent v2.2 report n17), referred to 1kg DM
  property carbon content 0.449939
    carbon content on a dry matter basis (reserved; not for manual entry)
  property true value 0.000239168
    allocation property applied in "true value" allocation // value calculated from revenue
  properties: water in wet mass 0 kg, wet mass 1.15 kg, carbon content, fossil 0, lower heating value 0 MJ/Nm3, water content 0, dry mass 1.15 kg, carbon allocation 0.51743 kg
- zinc concentrate: 0 kg; CPC 14290: Other non-ferrous metal ores and concentrates (other than uranium or thorium ores and concentrates); By-product classification allocatable product
  Calculated value from the knowledge of the properties of both products.
  production volume 6.16505 kg
  property price 0.38 EUR2005; name ByP_price_EUR2005
    Temporary price data. Calculated as 90% of purchasers price based on: Zinc content in concentrate 53%. Concentrate price per kg Zn 86.5% of refined Zn price (13.5% treatment charges according to CHR Metals Limited 2005: Dynamic cost curves. http://www.minecost.com/dynamic.pdf). 2004 zinc price from USGS (2007) Mineral commodity summaries 2007. <http://minerals.usgs.gov/minerals/pubs/mcs/2007/mcs2007.pdf> [Accessed 25 May 2010]
  property zinc content 0.53; name zinc_C_zinc_concentrate
    Zinc content on a dry matter basis. Value taken from teh "zinc mine operation" /GLO dataset.
  property dry mass 1 kg; name DM_zinc_concentrate
  property carbon content 0
    carbon content on a dry matter basis (reserved; not for manual entry)
  property true value 3.29102e-8
    allocation property applied in "true value" allocation // value calculated from revenue
  properties: wet mass 1 kg, water content 0, carbon content, non-fossil 0, carbon content, fossil 0, water in wet mass 0 kg, carbon allocation 0 kg
- compost: 0 kg; CPC 391: Wastes from food and tobacco industry; By-product classification allocatable product; pedigree (1,1,1,1,1)
  EcoSpold01Location=CH
  Biowaste is reduced in mass by a factor of 2 during composting
  production volume 1.24427e7 kg
  property water in wet mass 0.472 kg; name Water_in_wet_mass_compost; = 1- DM_compost
  property price 0.03 EUR2005
    Temporary price data. Calculated as 90% of purchasers price based on: Estimation done using the following sources: <http://www.wmaa.asn.au/uploads/documents/MarkWinser_1May2007.pdf>; <http://www.swlf.ait.ac.th/UpdData/International/Composting%20and%20anaerobic%20digestion_%20comparions%20for%20Europe%20and%20Asia.pdf>; <http://www.epa.gov/osw/conserve/rrr/composting/basic.htm>, accessed 2011.06.16
  property carbon content, non-fossil 0.1165
    calculation: dry matter 50%, organic matter 40% of dry matter, C content calculated from organic matter divided by 1.72. Relative to dry matter; relative to fresh matter: divided by 2 => 0.1156
  property dry mass 0.528 kg; name DM_compost
  property water content 0.893939; name Water_content_compost; = Water_in_wet_mass_compost/DM_compost
  property concentration, cadmium 0 kg/kg; name Mass_compost_concentration_Cd; = Mass_biowaste_concentration_Cd*2
    Biowaste mass is reduced by a factor of two during composting, therefore concentration is doubled
  property humus equivalent 0.061 kg
    Humus building fraction expressed in kg per kg product on a FM basis. Humus denotes the converted, primary biomass from plants or animals in the ground. More information can be found in the documentation of the composting itself: "treatment of biowaste, industrial composting".
  property concentration, copper 0 kg/kg; name Mass_compost_concentration_Cu; = Mass_biowaste_concentration_Cu*2
    (same comment as for compost)
  property concentration, calcium 0 kg/kg; name Mass_compost_Ca_concentration; = Mass_biowaste_concentration_Ca*2
    (same comment as for compost)
  property concentration, magnesium 0 kg/kg; name Mass_compost_Mg_concentration; = Mass_biowaste_concentration_Mg*2
    (same comment as for compost)
  property concentration, mercury 0 kg/kg; name Mass_compost_Hg_concentration; = Mass_biowaste_concentration_Hg*2
    (same comment as for compost)
  property concentration, lead 0 kg/kg; name Mass_compost_concentration_Pb; = Mass_biowaste_concentration_Pb*2
    (same comment as for compost)
  property concentration, nickel 0 kg/kg; name Mass_compost_Ni_concentration; = Mass_biowaste_concentration_Ni*2
    (same comment as for compost)
  property concentration, phosphorus 0 kg/kg; name Mass_compost_P_concentration; = Mass_biowaste_concentration_P*2
    (same comment as for compost)
  property concentration, sulfur 0 kg/kg; name Mass_compost_concentration_S; = Mass_biowaste_concentration_S*2
    (same comment as for compost)
  property concentration, potassium 0 kg/kg; name Mass_compost_K_concentration; = Mass_biowaste_concentration_K*2
    (same comment as for compost)
  property nickel content 1.60606e-5; name Mass_compost_Ni_content; = Mass_biowaste_Ni_content/0.5*( DM_biowaste / DM_compost)
    nickel content on a dry matter basis
  property concentration, nitrogen 0 kg/kg; = Mass_biowaste_concentration_N*2
    (same comment as for compost)
  property concentration, zinc 0 kg/kg; name Mass_compost_concentration_Zn; = Mass_biowaste_concentration_Zn*2
    (same comment as for compost)
  property lead content 2.66667e-5; name Mass_compost_Pb_content; = Mass_biowaste_Pb_content/0.5*( DM_biowaste / DM_compost)
    lead content on a dry matter basis
  property copper content 3.81818e-5; name Mass_compost_Cu_content; = Mass_biowaste_Cu_content/0.5*( DM_biowaste / DM_compost)
    copper content on a dry matter basis
  property cadmium content 2.89394e-7; name Mass_compost_Cd_content; = Mass_biowaste_Cd_content/0.5*( DM_biowaste / DM_compost)
    cadmium content on a dry matter basis
  property nitrogen content 0.0136364; name Mass_compost_N_content; = Mass_biowaste_N_content/0.5*( DM_biowaste / DM_compost)
    nitrogen content on a dry matter basis
  property magnesium content 0.00525758; name Mass_compost_Mg_content; = Mass_biowaste_Mg_content/0.5*( DM_biowaste / DM_compost)
    magnesium content on a dry matter basis
  property zinc content 0.000120303; name Mass_compost_Zn_content; = Mass_biowaste_Zn_content/0.5*( DM_biowaste / DM_compost)
    zinc content on a dry matter basis
  property potassium content 0.0099697; name Mass_compost_K_content; = Mass_biowaste_K_content/0.5*( DM_biowaste / DM_compost)
    potassium content on a dry matter basis
  property sulfur content 0.00190909; name Mass_compost_S_content; = Mass_biowaste_S_content/0.5*( DM_biowaste / DM_compost)
    sulfur content on a dry matter basis
  property calcium content 0.0504545; name Mass_compost_Ca_content; = Mass_biowaste_Ca_content/0.5*( DM_biowaste / DM_compost)
    calcium content on a dry matter basis
  property mercury content 1e-7; name Mass_compost_Hg_content; = Mass_biowaste_Hg_content/0.5*( DM_biowaste / DM_compost)
    mercury content on a dry matter basis
  property phosphorus content 0.00275758; name Mass_compost_P_content; = Mass_biowaste_P_content/0.5*( DM_biowaste / DM_compost)
    phosphorus content on a dry matter basis
  property carbon content 0.1165
    carbon content on a dry matter basis (reserved; not for manual entry)
  property true value 0.00524382
    allocation property applied in "true value" allocation // value calculated from revenue
  properties: carbon content, fossil 0, wet mass 1 kg, carbon allocation 0.061512 kg
- iron scrap, sorted, pressed: 0 kg; By-product classification Recyclable; CPC 39310: Slag, dross, scalings and other waste from the manufacture of iron or steel; pedigree (1,1,1,1,1)
  metallic iron scrap removed from ash reamains and recycled.
  Uncertainty: uncertainty is calculated from uncertainties in waste composition and transfer coefficients to soild residues
  production volume 1.30767 kg
  property price 0.175 EUR2005
    Temporary price data. Calculated as 90% of purchasers price based on: 2005 import and export prices (total trades (USD) divided by total weight (kg) in biggest economies of the world: EU27, USA, Brasil, China, India, Japan and Russia) from UN Commodity Trade Statistics Database (http://data.un.org/Explorer.aspxDatabase [Accessed 2011.06.20]). Commodity: Waste or scrap, of cast iron
  property carbon content 0
    carbon content on a dry matter basis (reserved; not for manual entry)
  property true value 3.21474e-9
    allocation property applied in "true value" allocation // value calculated from revenue
  properties: carbon content, non-fossil 0, wet mass 1 kg, dry mass 1 kg, water content 0, carbon content, fossil 0, water in wet mass 0 kg, carbon allocation 0 kg
- copper: 0 kg; source Rentz O. 1999; By-product classification allocatable product; CPC 41413: Refined copper and copper alloys, unwrought; master alloys of copper
  Literature value. Copper uses: Before end-use copper is manufactured into semi fabricated products, such as shapes and ingots (known as 'semis'). These manufacturing processes are subdivided into hot working, cold working and, if necessary, process annealing. Few of the semis are ready for use as such. They more typically travel to first-stage manufacturers, who make metal rods, wire, and casting, and then to component manufacturers who produce such things as motors, valves, and insulated cables The components in turn are incorporated by final-stage manufacturers into a variety of finished products - automobiles, commercial buildings, residential housing, and so forth. These uses account for about 79% of the world-wide consumption of copper.
  production volume 0.0416233 kg
  property price 5.52 EUR2005
    Literature value (http://www.economist.com/news/business/21576714-mining-industry-has-enriched-chile-its-future-precarious-copper-solution). Average price between 20015 and 2013.
  property carbon content 0
    carbon content on a dry matter basis (reserved; not for manual entry)
  property true value 3.22765e-9
    allocation property applied in "true value" allocation // value calculated from revenue
  properties: dry mass 1 kg, water in wet mass 0 kg, wet mass 1 kg, carbon content, non-fossil 0, water content 0, carbon content, fossil 0, carbon allocation 0 kg
- iron scrap, unsorted: 0 kg; source European Aluminium Association 2008; CPC 39310: Slag, dross, scalings and other waste from the manufacture of iron or steel; By-product classification Recyclable; pedigree (1,1,1,1,1)
  production volume 3.72035e-5 kg
  property price 0.149 EUR2005; name ironScrapAmount_price_EUR2005
    Temporary price data. Calculated as 90% of purchasers price based on: estimated at 85% of sorted scrap
  property carbon content 0
    carbon content on a dry matter basis (reserved; not for manual entry)
  property true value 7.7872e-14
    allocation property applied in "true value" allocation // value calculated from revenue
  properties: water in wet mass 0 kg, water content 0, carbon content, fossil 0, carbon content, non-fossil 0, dry mass 1 kg, wet mass 1 kg, carbon allocation 0 kg
- aluminium oxide, non-metallurgical: 0 kg; source European Aluminium Association 2008; CPC 41432: Alumina (aluminium oxide), except artificial corundum; By-product classification allocatable product; CAS 1344-28-1; pedigree (1,1,1,1,1)
  production volume 0.00234108 kg
  property carbon content, non-fossil 0; name C_content_non_fossil
  property price 0.28 EUR2005; name Al2O3Amount_price_EUR2005
    From UN trade database. http://data.un.org/ Import data from the largest economies of the world are used (Brazil, India, USA, China, Japan and EU-27).
  property dry mass 1 kg; name DM
  property water content 0; name water_content
  property wet mass 1 kg; name WM
  property water in wet mass 0 kg; name WWM
  property carbon content, fossil 0; name C_content_fossil
  property carbon content 0
    carbon content on a dry matter basis (reserved; not for manual entry)
  property true value 9.20841e-12
    allocation property applied in "true value" allocation // value calculated from revenue
  properties: carbon allocation 0 kg
- aluminium, cast alloy: 0 kg; source European Aluminium Association 2008; By-product classification allocatable product; CPC 41431: Unwrought aluminium; pedigree (1,1,1,1,1)
  EcoSpold01Location=RER
  production volume 0.0218839 kg
  property price 1.3 EUR2005; name castAlloyAmount_price_EUR2005
    Temporary price data. Calculated as 90% of purchasers price based on: Source: London Metal Exchange, Aluminium alloy price for 2005
  property carbon content 0
    carbon content on a dry matter basis (reserved; not for manual entry)
  property true value 3.99649e-10
    allocation property applied in "true value" allocation // value calculated from revenue
  properties: water in wet mass 0 kg, carbon content, non-fossil 0, water content 0, dry mass 1 kg, carbon content, fossil 0, wet mass 1 kg, carbon allocation 0 kg
- aluminium, wrought alloy: 0 kg; source European Aluminium Association 2008; By-product classification allocatable product; CPC 4153: Semi-finished products of aluminium or aluminium alloys; pedigree (1,1,1,1,1)
  production volume 0.00958034 kg
  property price 1.44 EUR2005; name secondaryAluminiumOutput_price_EUR2005
    Estimated based on literature values and expert judgement. Aluminium ccast alloys are about 90% of the price of aluminium wrought alloys.
  property carbon content 0
    carbon content on a dry matter basis (reserved; not for manual entry)
  property true value 1.938e-10
    allocation property applied in "true value" allocation // value calculated from revenue
  properties: wet mass 1 kg, water content 0, carbon content, fossil 0, water in wet mass 0 kg, carbon content, non-fossil 0, dry mass 1 kg, carbon allocation 0 kg

## Inputs from technosphere
- urea, as N: 0.0347961 kg; = 0.702/(12+4+2*14+16)*(2*14); lognormal variance with pedigree 0.037, pedigree (1,5,3,5,1)
  input of urea, converted to input of N via molar relationship
  properties: dry mass 1 kg, wet mass 1 kg, carbon content, fossil 0.2
- aluminium sulfate, powder: 0.00242171 kg; lognormal variance with pedigree 0.037, pedigree (1,5,3,5,1)
  aluminium sulfate plus input of unspecified hardeners
  properties: wet mass 1 kg, dry mass 1 kg
- chemical, organic: 0.0950626 kg; lognormal variance with pedigree 0.037, pedigree (1,5,3,5,1)
  input of unspecified additives, dyes, flame redardants, etc.
  properties: dry mass 1 kg, wet mass 1 kg, carbon content, fossil 0.628
  note on carbon content, fossil: This dataset is an unweighted average of 20 organic substances (listed in Tab 88.1, ecoinvent v2.2 report 8, part II), being part of the top100 chemicals included in this database. The C-content has also been calculated as an unweighted average of the C content of the substances composing this dataset.
- wood ash mixture, pure: -0.212965 kg; name w_wood_ash; = (0.000476*wood_fuel)*-1; lognormal variance with pedigree 0.037, pedigree (1,5,3,5,1)
  Emission factor from DS on heat generation from industrial residual wood mulitplied by the input of wood fuel (direct wood fuel plus production residues)
  EcoSpold01Location=CH
  production volume 1.42729e8 kg; = w_wood_ash*p_board
    Calculated from production volume of reference product using the relative outputs.
  property price 0 EUR2005; name w_wood_ash_price_EUR2005
  properties: dry mass 1 kg, carbon content, non-fossil 0.012, wet mass 1 kg
- diesel, burned in building machine: 3.78126 MJ; lognormal variance with pedigree 0.037, pedigree (1,5,3,5,1)
  for internal transport
- furnace, wood chips, softwood storage area, 1000kW: 2.95735e-6 unit; = 6.61E-09*wood_fuel; lognormal variance with pedigree 0.022, pedigree (1,5,3,5,1)
  EcoSpold01Location=CH
  Factor from DS on heat generation from industrial residual wood mulitplied by the input of wood fuel (direct wood fuel plus production residues)
- lubricating oil: 0.0139248 kg; = 0.112+0.0191; lognormal variance with pedigree 0.037, pedigree (1,5,3,5,1)
  input of lubricating oils plus mineral oils, incl. thermooil
  properties: dry mass 1 kg, wet mass 1 kg, carbon content, fossil 0.75
  note on carbon content, fossil: Lubricating oil is produced from diesel. C-content/dry mass of fats and oils considered 75%, from: ecoinvent v2.2 report, n 15a, pg 40
- pulpwood, softwood, measured as solid wood under bark: 0.0663143 m3; = 236/378; lognormal variance with pedigree 0.037, pedigree (1,5,3,5,1)
  input in kg divided by the basic wood density of 378 kg/m3
  properties: dry mass 450 kg, carbon content, non-fossil 0.494, wet mass 1080 kg, water content 1.4
- hazardous waste, for incineration: -0.0843545 kg; name w_HW; lognormal variance with pedigree 0.037, pedigree (1,5,3,5,1)
  Output of minor quantities of waste resins, oily filters and rags
  production volume 5.65341e7 kg; = w_HW*p_board
    Calculated from production volume of reference product using the relative outputs.
  property price 0 EUR2005; name w_HW_price_EUR2005
  properties: carbon content, fossil 0.554667, water content 0.333333, wet mass 1 kg, dry mass 0.75 kg
  note on carbon content, fossil: Tab A.6, ecoinvent v2.2 report 13_I. C content has been calculated after data in the tables, and then referred to 1 kg DM
- pulpwood, hardwood, measured as solid wood under bark: 0.000791043 m3; = 4.26/572; lognormal variance with pedigree 0.037, pedigree (1,5,3,5,1)
  input in kg divided by the basic wood density of 572 kg/m3
  properties: water content 0.8, dry mass 650 kg, wet mass 1170 kg, carbon content, non-fossil 0.494
- biowaste: -0.0959123 kg; name w_biowaste; lognormal variance with pedigree 0.0376, pedigree (2,5,3,5,1)
  sludges from chip washing etc.
  production volume 6.42801e7 kg; = w_biowaste*p_board
    Calculated from production volume of reference product using the relative outputs.
  property price 0 EUR2005; name w_biowaste_price_EUR2005
  properties: dry mass 0.4 kg, wet mass 1 kg, carbon content, non-fossil 0.1624, water content 1.5
- wood chips, wet, measured as dry mass: 0 kg; pedigree (1,1,1,1,1)
  input of wood chips from forestry
  properties: dry mass 1 kg, carbon content, non-fossil 0.494, wet mass 2.1 kg, water content 1.1
- furnace, wood chips, with silo, 5000kW: 1.24988e-5 unit; = 2.9333E-08*wood_fuel/1.05; lognormal variance with pedigree 0.037, pedigree (1,5,3,5,1)
  Infrastructure factor from DS on heat generation from industrial residual wood mulitplied by the input of wood fuel (direct wood fuel plus production residues); correction for assumed efficiency as original value refers to heat output
- wood chips, dry, measured as dry mass: 39.0352 kg; = 23.9+33.6+294+4.81+11.2; lognormal variance with pedigree 0.037, pedigree (1,5,3,5,1)
  input of different types of wood chips from sawmills
  properties: wet mass 1.4 kg, dry mass 1 kg, water content 0.4, carbon content, non-fossil 0.494
  note on carbon content, non-fossil: C content of dry mass is 0.494 kgC/kg dry wood (ecoinvent v2.2 report 9).
- dust collector, electrostatic precipitator, for industrial use: 5.91812e-7 unit; = 1.3889E-09*wood_fuel/1.05; lognormal variance with pedigree 0.037, pedigree (1,5,3,5,1)
  (same comment as for furnace, wood chips, with silo, 5000kW)
- heat, district or industrial, natural gas: 114.004 MJ; = (989+138)/1.05; lognormal variance with pedigree 0.037, pedigree (1,5,3,5,1)
  Input of natural gas plus liquified petrolium gas, converted to heat output
- wastewater from medium density board production: -0.0432296 m3; name w_WW; lognormal variance with pedigree 0.037, pedigree (1,5,3,5,1)
  production volume 2.89723e7 m3; = w_WW*p_board
    Calculated from production volume of reference product using the relative outputs.
  property price 0 EUR2005; name w_WW_price_EUR2005
- wood chips, from post-consumer wood, measured as dry mass: 11.7899 kg; lognormal variance with pedigree 0.037, pedigree (1,5,3,5,1)
  properties: water content 0.4, dry mass 1 kg, wet mass 1.4 kg, carbon content, non-fossil 0.494
- saw dust, wet, measured as dry mass: 3.18858 kg; lognormal variance with pedigree 0.0086, pedigree (1,3,3,5,1)
  input of sawdust
- heat, district or industrial, other than natural gas: 1.63875 MJ; = 16.2/1.05; lognormal variance with pedigree 0.037, pedigree (1,5,3,5,1)
  Fuel input, converted to heat output
- electricity, medium voltage: 0 kWh; pedigree (1,1,1,1,1)
- heat, district or industrial, other than natural gas: 2.69079 MJ; = 26.6/1.05; lognormal variance with pedigree 0.037, pedigree (1,5,3,5,1)
  Fuel input, converted to heat output
- slab and siding, softwood, wet, measured as dry mass: 1.0834 kg; lognormal variance with pedigree 0.0086, pedigree (1,3,3,5,1)
  input of industrial residual wood
- urea formaldehyde resin: 4.94963 kg; lognormal variance with pedigree 0.037, pedigree (1,5,3,5,1)
  part of glueing system (inventoried as averaged production average in Europe)
  properties: dry mass 1 kg, carbon content, fossil 0.408958, wet mass 1 kg
- paraffin: 0.501336 kg; lognormal variance with pedigree 0.037, pedigree (1,5,3,5,1)
  hydrophobing agent
  properties: dry mass 1 kg, carbon content, fossil 0.847059, wet mass 1 kg
- wooden board factory, organic bonded boards: 4.04629e-9 unit; = 1/(525000*50); lognormal variance with pedigree 0.037, pedigree (1,5,3,5,1)
  estimated based on an assumed yearly production volume o 525,000 m3/year and a life time of infrastructure of 50 years
- tap water: 0 kg; pedigree (1,1,1,1,1)
  properties: water content 2962.17, carbon content, fossil 0.00178991, dry mass 0.000337476 kg, wet mass 1 kg
  note on carbon content, fossil: Bicarbonate content is 2.93 mol/m3. CO2 content is 0.1 mol/m3 (ecoinvent v2.2 report 8, Tab 93.1).
- melamine formaldehyde resin: 4.46104 kg; lognormal variance with pedigree 0.037, pedigree (1,5,3,5,1)
  part of glueing system (inventoried as averaged production average in Europe)
  properties: dry mass 1 kg, carbon content, fossil 0.311708, wet mass 1 kg
- wood chips, wet, measured as dry mass: 0.000137803, 0.0613608 kg (2 entries); lognormal variance with pedigree 0.262, pedigree (1,5,3,5,1)
  input of wood chips from forestry
- electricity, medium voltage: 0.307286, 0.0559132, 0.948202, 13.7479, 1.96759, 6.44663 kWh (6 entries); lognormal variance with pedigree 0.0145, pedigree (1,5,3,5,1)
- tap water: 0.0571184, 0.474511, 0.0943975, 2.38033, 0.0619237, 0.176141, 27.2393 kg (7 entries); lognormal variance with pedigree 0.037, pedigree (1,5,3,5,1)

## Inputs from nature
- Water, cooling, unspecified natural origin [natural resource, in water]: 0.0304838 m3; lognormal variance with pedigree 0.036, pedigree (1,5,3,5,1)
- Water, well, in ground [natural resource, in water]: 2.98465e-5 m3; lognormal variance with pedigree 0.037, pedigree (1,5,3,5,1)
- Water, river [natural resource, in water]: 0.0343075 m3; lognormal variance with pedigree 0.037, pedigree (1,5,3,5,1)

## Emissions to nature
- Dioxins, measured as 2,3,7,8-tetrachlorodibenzo-p-dioxin [air, urban air close to ground]: 1.34222e-11 kg; = 3E-14*wood_fuel; lognormal variance with pedigree 0.4806, pedigree (2,5,5,5,1)
  Emission factor from DS on heat generation from industrial residual wood mulitplied by the input of wood fuel (direct wood fuel plus production residues)
- Hydrocarbons, aliphatic, unsaturated [air, urban air close to ground]: 0.00138696 kg; = 3.1E-06*wood_fuel; lognormal variance with pedigree 0.4806, pedigree (2,5,5,5,1)
  (same comment as for Dioxins, measured as 2,3,7,8-tetrachlorodibenzo-p-dioxin)
- Particulates, < 2.5 um [air, urban air close to ground]: 0.00111852 kg; = 2.5E-06*wood_fuel; lognormal variance with pedigree 0.1206, pedigree (2,5,5,5,1)
  (same comment as for Dioxins, measured as 2,3,7,8-tetrachlorodibenzo-p-dioxin)
- Chromium VI [air, urban air close to ground]: 1.78962e-8 kg; = 4E-11*wood_fuel; lognormal variance with pedigree 0.5306, pedigree (2,5,5,5,1)
  (same comment as for Dioxins, measured as 2,3,7,8-tetrachlorodibenzo-p-dioxin)
- Bromine [air, urban air close to ground]: 2.68444e-5 kg; = 6E-08*wood_fuel; lognormal variance with pedigree 0.4806, pedigree (2,5,5,5,1)
  (same comment as for Dioxins, measured as 2,3,7,8-tetrachlorodibenzo-p-dioxin)
- Benzene, ethyl- [air, urban air close to ground]: 1.34222e-5 kg; = 3E-08*wood_fuel; lognormal variance with pedigree 0.4806, pedigree (2,5,5,5,1)
  (same comment as for Dioxins, measured as 2,3,7,8-tetrachlorodibenzo-p-dioxin)
- Carbon dioxide, non-fossil [air, urban air close to ground]: 45.6354 kg; = 0.102*wood_fuel; lognormal variance with pedigree 0.0506, pedigree (2,5,5,5,1)
  (same comment as for Dioxins, measured as 2,3,7,8-tetrachlorodibenzo-p-dioxin)
- Mercury [air, urban air close to ground]: 1.34222e-7 kg; = 3E-10*wood_fuel; lognormal variance with pedigree 0.4806, pedigree (2,5,5,5,1)
  (same comment as for Dioxins, measured as 2,3,7,8-tetrachlorodibenzo-p-dioxin)
- NMVOC, non-methane volatile organic compounds, unspecified origin [air, urban air close to ground]: 0.0419974 kg; = 3.5E-06*wood_fuel + (0.519-0.138-0.000344); lognormal variance with pedigree 0.2106, pedigree (2,5,5,5,1)
  Emission factor from DS on heat generation from industrial residual wood mulitplied by the input of wood fuel (direct wood fuel plus production residues) plus estimated emissions from wood and glue drying processes (based on Albrecht et al. 2009) minus emissions that have been inventoried specifically
- Lead [air, urban air close to ground]: 1.11852e-5 kg; = 2.5E-08*wood_fuel; lognormal variance with pedigree 0.4806, pedigree (2,5,5,5,1)
  (same comment as for Dioxins, measured as 2,3,7,8-tetrachlorodibenzo-p-dioxin)
- m-Xylene [air, urban air close to ground]: 5.36887e-5 kg; = 1.2E-07*wood_fuel; lognormal variance with pedigree 0.4806, pedigree (2,5,5,5,1)
  (same comment as for Dioxins, measured as 2,3,7,8-tetrachlorodibenzo-p-dioxin)
- Nickel [air, urban air close to ground]: 2.68444e-6 kg; = 6E-09*wood_fuel; lognormal variance with pedigree 0.4806, pedigree (2,5,5,5,1)
  (same comment as for Dioxins, measured as 2,3,7,8-tetrachlorodibenzo-p-dioxin)
- Formaldehyde [air, urban air close to ground]: 0.0147159 kg; = 1.3E-07*wood_fuel+0.138; lognormal variance with pedigree 0.4806, pedigree (2,5,5,5,1)
  Emission factor from DS on heat generation from industrial residual wood mulitplied by the input of wood fuel (direct wood fuel plus production residues) plus estimated emissions from wood and glue drying processes
- Zinc [air, urban air close to ground]: 0.000134222 kg; = 3E-07*wood_fuel; lognormal variance with pedigree 0.4806, pedigree (2,5,5,5,1)
  (same comment as for Dioxins, measured as 2,3,7,8-tetrachlorodibenzo-p-dioxin)
- Arsenic [air, urban air close to ground]: 4.47406e-7 kg; = 1E-09*wood_fuel; lognormal variance with pedigree 0.4806, pedigree (2,5,5,5,1)
  (same comment as for Dioxins, measured as 2,3,7,8-tetrachlorodibenzo-p-dioxin)
- Dinitrogen monoxide [air, urban air close to ground]: 0.00102903 kg; = 2.3E-06*wood_fuel; lognormal variance with pedigree 0.4806, pedigree (2,5,5,5,1)
  (same comment as for Dioxins, measured as 2,3,7,8-tetrachlorodibenzo-p-dioxin)
- Cadmium [air, urban air close to ground]: 3.13184e-7 kg; = 7E-10*wood_fuel; lognormal variance with pedigree 0.4806, pedigree (2,5,5,5,1)
  (same comment as for Dioxins, measured as 2,3,7,8-tetrachlorodibenzo-p-dioxin)
- PAH, polycyclic aromatic hydrocarbons [air, urban air close to ground]: 4.96621e-6 kg; = 1.11E-08*wood_fuel; lognormal variance with pedigree 0.4806, pedigree (2,5,5,5,1)
  (same comment as for Dioxins, measured as 2,3,7,8-tetrachlorodibenzo-p-dioxin)
- Benzene, hexachloro- [air, urban air close to ground]: 3.22132e-12 kg; = 7.2E-15*wood_fuel; lognormal variance with pedigree 0.4806, pedigree (2,5,5,5,1)
  (same comment as for Dioxins, measured as 2,3,7,8-tetrachlorodibenzo-p-dioxin)
- Manganese [air, urban air close to ground]: 7.6059e-5 kg; = 1.7E-07*wood_fuel; lognormal variance with pedigree 0.4806, pedigree (2,5,5,5,1)
  (same comment as for Dioxins, measured as 2,3,7,8-tetrachlorodibenzo-p-dioxin)
- Methane, non-fossil [air, urban air close to ground]: 0.000671109 kg; = 1.5E-06*wood_fuel; lognormal variance with pedigree 0.4806, pedigree (2,5,5,5,1)
  (same comment as for Dioxins, measured as 2,3,7,8-tetrachlorodibenzo-p-dioxin)
- Fluorine [air, urban air close to ground]: 2.23703e-5 kg; = 5E-08*wood_fuel; lognormal variance with pedigree 0.4806, pedigree (2,5,5,5,1)
  (same comment as for Dioxins, measured as 2,3,7,8-tetrachlorodibenzo-p-dioxin)
- Toluene [air, urban air close to ground]: 0.000134222 kg; = 3E-07*wood_fuel; lognormal variance with pedigree 0.4806, pedigree (2,5,5,5,1)
  (same comment as for Dioxins, measured as 2,3,7,8-tetrachlorodibenzo-p-dioxin)
- Magnesium [air, urban air close to ground]: 0.000161066 kg; = 3.6E-07*wood_fuel; lognormal variance with pedigree 0.4806, pedigree (2,5,5,5,1)
  (same comment as for Dioxins, measured as 2,3,7,8-tetrachlorodibenzo-p-dioxin)
- Acetaldehyde [air, urban air close to ground]: 6.38298e-5 kg; = 6.1E-08*wood_fuel+0.000344; lognormal variance with pedigree 0.4806, pedigree (2,5,5,5,1)
  Emission factor from DS on heat generation from industrial residual wood mulitplied by the input of wood fuel (direct wood fuel plus production residues ) plus estimated emissions from wood and glue drying processes (based on Albrecht et al. 2009).
- Calcium [air, urban air close to ground]: 0.00261733 kg; = 5.85E-06*wood_fuel; lognormal variance with pedigree 0.4806, pedigree (2,5,5,5,1)
  (same comment as for Dioxins, measured as 2,3,7,8-tetrachlorodibenzo-p-dioxin)
- Sodium [air, urban air close to ground]: 0.000581628 kg; = 1.3E-06*wood_fuel; lognormal variance with pedigree 0.4806, pedigree (2,5,5,5,1)
  (same comment as for Dioxins, measured as 2,3,7,8-tetrachlorodibenzo-p-dioxin)
- Carbon monoxide, non-fossil [air, urban air close to ground]: 0.0894812 kg; = 2E-04*wood_fuel; lognormal variance with pedigree 0.0706, pedigree (2,5,5,5,1)
  (same comment as for Dioxins, measured as 2,3,7,8-tetrachlorodibenzo-p-dioxin)
- Copper [air, urban air close to ground]: 9.84293e-6 kg; = 2.2E-08*wood_fuel; lognormal variance with pedigree 0.4806, pedigree (2,5,5,5,1)
  (same comment as for Dioxins, measured as 2,3,7,8-tetrachlorodibenzo-p-dioxin)
- Ammonia [air, urban air close to ground]: 0.000774013 kg; = 1.73E-06*wood_fuel; lognormal variance with pedigree 0.4806, pedigree (2,5,5,5,1)
  (same comment as for Dioxins, measured as 2,3,7,8-tetrachlorodibenzo-p-dioxin)
- Potassium [air, urban air close to ground]: 0.0104693 kg; = 2.34E-05*wood_fuel; lognormal variance with pedigree 0.4806, pedigree (2,5,5,5,1)
  (same comment as for Dioxins, measured as 2,3,7,8-tetrachlorodibenzo-p-dioxin)
- Methanol [air, non-urban air or from high stacks]: 0.00191187 kg; lognormal variance with pedigree 0.482, pedigree (3,5,5,5,1)
  Estimated emissions from wood and glue drying processes
- Chlorine [air, urban air close to ground]: 8.05331e-5 kg; = 1.8E-07*wood_fuel; lognormal variance with pedigree 0.4806, pedigree (2,5,5,5,1)
  (same comment as for Dioxins, measured as 2,3,7,8-tetrachlorodibenzo-p-dioxin)
- Phosphorus [air, urban air close to ground]: 0.000134222 kg; = 3E-07*wood_fuel; lognormal variance with pedigree 0.4806, pedigree (2,5,5,5,1)
  (same comment as for Dioxins, measured as 2,3,7,8-tetrachlorodibenzo-p-dioxin)
- Nitrogen oxides [air, urban air close to ground]: 0.0536887 kg; = 0.00012*wood_fuel; lognormal variance with pedigree 0.1206, pedigree (2,5,5,5,1)
  (same comment as for Dioxins, measured as 2,3,7,8-tetrachlorodibenzo-p-dioxin)
- Particulates, > 10 um [air, unspecified]: 0.00851846 kg; lognormal variance with pedigree 0.444, pedigree (3,5,3,5,1)
  dust emissions
- Chromium [air, urban air close to ground]: 1.77173e-6 kg; = 3.96E-09*wood_fuel; lognormal variance with pedigree 0.4806, pedigree (2,5,5,5,1)
  (same comment as for Dioxins, measured as 2,3,7,8-tetrachlorodibenzo-p-dioxin)
- Benzo(a)pyrene [air, urban air close to ground]: 2.23703e-7 kg; = 5E-10*wood_fuel; lognormal variance with pedigree 0.4806, pedigree (2,5,5,5,1)
  (same comment as for Dioxins, measured as 2,3,7,8-tetrachlorodibenzo-p-dioxin)
- Sulfur dioxide [air, urban air close to ground]: 0.00111852 kg; = 2.5E-06*wood_fuel; lognormal variance with pedigree 0.4806, pedigree (2,5,5,5,1)
  (same comment as for Dioxins, measured as 2,3,7,8-tetrachlorodibenzo-p-dioxin)
- Benzene [air, urban air close to ground]: 0.00040714 kg; = 9.1E-07*wood_fuel; lognormal variance with pedigree 0.4806, pedigree (2,5,5,5,1)
  (same comment as for Dioxins, measured as 2,3,7,8-tetrachlorodibenzo-p-dioxin)
- Hydrocarbons, aliphatic, alkanes, unspecified [air, urban air close to ground]: 0.00040714 kg; = 9.1E-07*wood_fuel; lognormal variance with pedigree 0.4806, pedigree (2,5,5,5,1)
  (same comment as for Dioxins, measured as 2,3,7,8-tetrachlorodibenzo-p-dioxin)
- Phenol, pentachloro- [air, urban air close to ground]: 3.62399e-9 kg; = 8.1E-12*wood_fuel; lognormal variance with pedigree 0.4806, pedigree (2,5,5,5,1)
  (same comment as for Dioxins, measured as 2,3,7,8-tetrachlorodibenzo-p-dioxin)

## Sampling procedure
Survey among member companies of the European Panel Federation; emissions profile per MJ wood input from PSI (2014)
