# wastewater treatment facility construction, lagoon, capacity 5.0E9l/year

Dataset: EcoSpold 2, unit process
Geography: CA-QC
Time period: 2012-01-01 to 2019-12-31
Technology level: current
Classification: ISIC rev.4 ecoinvent: 4220:Construction of utility projects
Classification: EcoSpold01Categories: waste management/wastewater treatment
Scenario: Business-as-Usual
System model: Allocation at the point of substitution
Share of production covered: 0.5 %
Generated by: Marylène Dussault
Published in: Godin, David 2012
Database: ecoinvent
isCopyrightProtected: true
accessRestrictedTo: 1

## General comment
This dataset represents the construction of a medium size (class 3) wastewaster facultative aereted lagoons treatment facility. Average flow rate for this class is 13689 m3/d (5.0E9 l/yr) with a lifetime of 40 years. Lagoon treatment includes influent pumping station, ponds and UV disinfection. Dataset is extrapolated from a one lagoon facility in Quebec (CA): average flow of 8050 m3/d. Inventory is extrapolated to a small size plant based on cost curve.

## Included activities start
From reception of raw materials and construction equipment. This dataset includes material inputs for equipment of the different water treatment stages ( influent pumping, aeration, pond construction, UV desinfection) and energy for construction. Equipment needed for construction, UV equipment and processing of material are excluded due to lack of data.

## Included activities end
This datasets ends with the dismantlement of the plant at the end of its useful life, expected to be 40 years. Clay and gravel material are assumed to be left on site. Input material end-of-life is included, but equipment and energy used for dismantling is excluded due to lack of data.

## Geography
Data provided from literature and measurements from a single treatment plant in Quebec.

## Technology
Wastewater treatement plant, facultative aerated lagoon

## Time period
Time of publication.

## Parameters
- scaling factor B_landuse: 0.73 dimensionless; name B_landuse; lognormal variance with pedigree 0.0432, pedigree (5,4,1,1,2)
  Literature value. Cost-based scaling factor, usually used to account for economies of scale, as reported in US EPA 430/9-80-003 report (1980). Note that the factor is reported to be valid for a capacity range of 190 m3/d to 20 000 m3/d.
  US EPA. 1980. Construction costs for municipal wastewater treatment plants : 1973-1978. Report: EPA/430/9-80-003; FRD-11. U.S. Environmental Protection Agency, Office of Water Program Operations.
- plant average daily flow rate: 13689 m3/d; name Q_av; lognormal variance with pedigree 0, pedigree (1,1,1,1,1)
  Assumed average flow for class 3 to be13689 m3/d (5.0e9l/yr). Can be adapted to extrapolate construction inventory for different plant sizes ranging from 190 m3/d to 20 000 m3/d (representativity of used cost curves). To adapt the entire dataset to a different plant size change this parameter to the average flow rate of the wastewater facility you wish to model. Than change the amount called for this flow in the "wastewater treatment " dataset based on new plant lifetime production.
  Uncertainty: Fixed value for inventory calculation. no uncertainty associated.
- factorA_diesel: 8490 MJ/(m3/d)^2; name A_diesel; lognormal variance with pedigree 0.0453, pedigree (3,4,5,3,2)
  Calculated value for constant A in scaling equation Y=A*Q^-B, where Y and Q are respectively the mass of material per unit flow and flow rate and B is a scaling factor to account for economies of scale Calculations based on contruction inventory extrapolated from one lagoon facility in Québec as reported by Godin (2012), treatment plant average flow rate and cost scaling factor B for lagoon facility (EPA, 1980). This factor is used to calculate the energy required for construction provided by diesel burning construction machine.
  2012, Godin, David, Analyse environnementale et éconnomique du cycle de vie d'un système d'épuration des eaux usées, 227, Master thesis, Laval University, Québec, Canada, 0 - Undefined
  US EPA. 1980. Construction costs for municipal wastewater treatment plants : 1973-1978. Report: EPA/430/9-80-003; FRD-11. U.S. Environmental Protection Agency, Office of Water Program Operations.
- factor A_pvc: 126000 kg/(m3/d)^2; name A_pvc; lognormal variance with pedigree 0.0453, pedigree (3,4,5,3,2)
  Calculated value for constant A in scaling equation Y=A*Q^-B, where Y and Q are respectively the mass of material per unit flow and flow rate and B is a scaling factor to account for economies of scale Calculations based on contruction inventory extrapolated from one lagoon facility in Québec as reported by Godin (2012), treatment plant average flow rate and cost scaling factor B for lagoon facility (EPA, 1980).
  2012, Godin, David, Analyse environnementale et éconnomique du cycle de vie d'un système d'épuration des eaux usées, 227, Master thesis, Laval University, Québec, Canada, 0 - Undefined
  US EPA. 1980. Construction costs for municipal wastewater treatment plants : 1973-1978. Report: EPA/430/9-80-003; FRD-11. U.S. Environmental Protection Agency, Office of Water Program Operations.
- factorA_gravel: 4.72e6 kg/(m3/d)^2; name A_gravel; lognormal variance with pedigree 0.0453, pedigree (3,4,5,3,2)
  (same comment as for factor A_pvc)
- factor A_pe: 3000 kg/(m3/d)^2; name A_pe; lognormal variance with pedigree 0.0453, pedigree (3,4,5,3,2)
  (same comment as for factor A_pvc)
- factorA_iron: 2120 kg/(m3/d)^2; name A_iron; lognormal variance with pedigree 0.0453, pedigree (3,4,5,3,2)
  (same comment as for factor A_pvc)
- factor A_concrete: 70.1 m3/(m3/d)^2; name A_concrete; lognormal variance with pedigree 0.0453, pedigree (3,4,5,3,2)
  (same comment as for factor A_pvc)
- scaling factor: 0.73 dimensionless; name B; lognormal variance with pedigree 0.0448, pedigree (3,4,2,1,4)
  Literature value. Cost-based scaling factor, usually used to account for economies of scale, as reported in US EPA 430/9-80-003 report (1980). Note that the factor is reported to be valid for a capacity range of 190 m3/d to 20 000 m3/d.
- factor A_fibre glass: 831 kg/(m3/d)^2; name A_fglass; lognormal variance with pedigree 0.0448, pedigree (3,4,2,1,4)
  (same comment as for factor A_pvc)
- factorA_clay: 5.26e6 kg/(m3/d)^2; name A_clay; lognormal variance with pedigree 0.0513, pedigree (4,4,5,3,2)
  Calculated value for constant A in scaling equation Y=A*Q^-B, where Y and Q are respectively the mass of material per unit flow and flow rate and B is a scaling factor to account for economies of scale Calculations based on contruction inventory extrapolated from one lagoon facility in Québec as reported by Godin (2012), treatment plant average flow rate and cost scaling factor B for lagoon facility (EPA, 1980). Clay inventory was reported in volume, density of 1826 kg/m3 was used.
  2012, Godin, David, Analyse environnementale et éconnomique du cycle de vie d'un système d'épuration des eaux usées, 227, Master thesis, Laval University, Québec, Canada, 0 - Undefined
  US EPA. 1980. Construction costs for municipal wastewater treatment plants : 1973-1978. Report: EPA/430/9-80-003; FRD-11. U.S. Environmental Protection Agency, Office of Water Program Operations.
- factor A_copper: 141 kg/(m3/d)^2; name A_Cu; lognormal variance with pedigree 0.0453, pedigree (3,4,5,3,2)
  (same comment as for factor A_pvc)
- factorA_excavation: 20100 kg/(m3/d)^2; name A_excav; lognormal variance with pedigree 0.0453, pedigree (3,4,5,3,2)
  (same comment as for factor A_pvc)
- factor A_steel: 3700 kg/(m3/d)^2; name A_steel; lognormal variance with pedigree 0.0453, pedigree (3,4,5,3,2)
  Calculated value for constant A in scaling equation Y=A*Q^-B, where Y and Q are respectively the mass of material per unit flow and flow rate and B is a scaling factor to account for economies of scale Calculations based on contruction inventory extrapolated from one lagoon facility in Québec as reported by Godin (2012), treatment plant average flow rate and cost scaling factor B for lagoon facility (EPA, 1980). Steel is used to represent stainless steel.
  2012, Godin, David, Analyse environnementale et éconnomique du cycle de vie d'un système d'épuration des eaux usées, 227, Master thesis, Laval University, Québec, Canada, 0 - Undefined
  US EPA. 1980. Construction costs for municipal wastewater treatment plants : 1973-1978. Report: EPA/430/9-80-003; FRD-11. U.S. Environmental Protection Agency, Office of Water Program Operations.
- factor A_reinforcing steel: 4590 kg/(m3/d)^2; name A_reinfSteel; lognormal variance with pedigree 0.0453, pedigree (3,4,5,3,2)
  (same comment as for factor A_pvc)
- factor A_landuse: 9700 m2/(m3/d)^2; name A_landuse; lognormal variance with pedigree 0.0052, pedigree (3,4,1,1,2)
  Calculated value for constant A in scaling equation Y=A*Q^-B. Based on reported surface area of a lagoon wastewater treatment facility in Quebec as reported by Godin (2012),
  2012, Godin, David, Analyse environnementale et éconnomique du cycle de vie d'un système d'épuration des eaux usées, 227, Master thesis, Laval University, Québec, Canada, 0 - Undefined
  US EPA. 1980. Construction costs for municipal wastewater treatment plants : 1973-1978. Report: EPA/430/9-80-003; FRD-11. U.S. Environmental Protection Agency, Office of Water Program Operations.

## Reference product
- iron scrap, unsorted: 1 kg; name w_iron; = iron; CPC 39310: Slag, dross, scalings and other waste from the manufacture of iron or steel; By-product classification Recyclable; pedigree (1,1,1,1,1)
  Calculated Value.
  Uncertainty: Calculated variable. Uncertainty will be determined from propagation of uncertainty factors of underlying variables.
  production volume 9959.8 kg; name PV_w_iron; = PV_wwtp * (w_iron / wwtp)
    Calculated from production volume of reference product using the relative outputs.
  property price 0.149 EUR2005; name w_iron_price_EUR2005
    Temporary price data. Calculated as 90% of purchasers price based on: estimated at 85% of sorted scrap
  property carbon content 0
    carbon content on a dry matter basis (reserved; not for manual entry)
  property true value 4133.73; name w_iron_true_value
    allocation property applied in "true value" allocation // value calculated from revenue
  properties: dry mass 1 kg, water content 0, wet mass 1 kg, carbon content, fossil 0, carbon content, non-fossil 0, water in wet mass 0 kg, carbon allocation 0 kg
- wastewater treatment facility, capacity 5E9l/year: 0 unit; name wwtp; CPC 53253: Sewage and water treatment plants; By-product classification allocatable product
  production volume 0.359 unit; name PV_wwtp
    Estimated value. Based on calculated amount of facility per m3 of wastewater treated and volume treated by lagoon of this size category per year.
  property price 1.03606e7 EUR2005; name wwtp_price_EUR2005
    Calculated based on inputs: The price of the product has been calculated as a sum of the values of the material and energy inputs for this product. This value is therefore a rough estimation. It may underestimate the real price since there are additional expenses when producing any product. These expences can include for example labour costs, treatment of waste materials and profit for the producer. Please consider carefully whether this level of data quality is acceptable for your application.
  property lifetime capacity in m3 1.99859e8 m3; name wwtp_Lft_capacity_m3_1; = Q_av*(1/UnitConversion(1, 'day', 'year'))*wwtp_lifetime
    Calculated value. Estimation of lifetime capacity based on average flow rate and estimation of plant useful life.
  property lifetime 40 year; name wwtp_lifetime
    Literature value. Estimated lifetime for lagoon facility as reported by Godin (2012).
  property true value 1.03606e7; name wwtp_true_value
    allocation property applied in "true value" allocation // value calculated from revenue

## By-products
- heat, for reuse in municipal waste incineration only: 0 MJ; CPC 17300: Steam and hot water; By-product classification allocatable product; pedigree (1,1,1,1,1)
  Net electricity generated from this waste and used in internal MSWI plant energy redistribution.
  Uncertainty: uncertainty is calculated from uncertainties in waste composition and uncertainties in energy efficiency and the uncertainty in internal energy demand
  production volume 354298 MJ
  property exergy 0.1842 MJ; name E_th_prod_MSWI_exergy
    This exergy property is based on the exergy content of the product.
  property price 0.0106 EUR2005; name E_th_prod_MSWI_price_EUR2005
    Average European district heat price from Ecoheatcool and Euroheat 2005-2006, Ecoheat Work package 1: The European heat market. Final report. 10.6 EUR/GJ i s the price of district heat. http://www.solarthermalworld.org/files/Ecoheatcool%20WP1%20Web.pdf?download
  property true value relation 0.1842; name E_th_prod_MSWI_true_value_relation
    property to calculate "true value" from
  property true value 6717.4
    allocation property applied in "true value" allocation // value calculated from true value relation
- electricity, for reuse in municipal waste incineration only: 0 kWh; CPC 17100: Electrical energy; By-product classification allocatable product; pedigree (1,1,1,1,1)
  (same comment as for heat, for reuse in municipal waste incineration only)
  production volume 40694 kWh
  property true value relation 3.6; name E_el_prod_MSWI_true_value_relation
    property to calculate "true value" from
  property price 0.1 EUR2005; name E_el_prod_MSWI_price_EUR2005
    Estimated to be the same price as in case of electricity, medium voltage.
  property exergy 3.6 MJ; name E_el_prod_MSWI_exergy
    This exergy property is based on the exergy content of the product.
  property true value 15079.1
    (same comment as for heat, for reuse in municipal waste incineration only)
- iron scrap, sorted, pressed: 0 kg; By-product classification Recyclable; CPC 39310: Slag, dross, scalings and other waste from the manufacture of iron or steel; pedigree (1,1,1,1,1)
  Iron scrap recovered from this waste.
  production volume 6.33108 kg
  property price 0.175 EUR2005
    Temporary price data. Calculated as 90% of purchasers price based on: 2005 import and export prices (total trades (USD) divided by total weight (kg) in biggest economies of the world: EU27, USA, Brasil, China, India, Japan and Russia) from UN Commodity Trade Statistics Database (http://data.un.org/Explorer.aspxDatabase [Accessed 2011.06.20]). Commodity: Waste or scrap, of cast iron
  property carbon content 0
    carbon content on a dry matter basis (reserved; not for manual entry)
  property true value 3.08618
    allocation property applied in "true value" allocation // value calculated from revenue
  properties: water content 0, water in wet mass 0 kg, carbon content, fossil 0, dry mass 1 kg, carbon content, non-fossil 0, wet mass 1 kg, carbon allocation 0 kg
- copper: 0 kg; source Rentz O. 1999; By-product classification allocatable product; CPC 41413: Refined copper and copper alloys, unwrought; master alloys of copper
  Literature value. Copper uses: Before end-use copper is manufactured into semi fabricated products, such as shapes and ingots (known as 'semis'). These manufacturing processes are subdivided into hot working, cold working and, if necessary, process annealing. Few of the semis are ready for use as such. They more typically travel to first-stage manufacturers, who make metal rods, wire, and casting, and then to component manufacturers who produce such things as motors, valves, and insulated cables The components in turn are incorporated by final-stage manufacturers into a variety of finished products - automobiles, commercial buildings, residential housing, and so forth. These uses account for about 79% of the world-wide consumption of copper.
  production volume 156.756 kg
  properties: dry mass 1 kg, water in wet mass 0 kg, wet mass 1 kg, carbon content, non-fossil 0, water content 0, price 5.52 EUR2005, carbon content, fossil 0, carbon content 0, carbon allocation 0 kg, true value 2410.29
- zinc concentrate: 0 kg; CPC 14290: Other non-ferrous metal ores and concentrates (other than uranium or thorium ores and concentrates); By-product classification allocatable product
  Calculated value from the knowledge of the properties of both products.
  production volume 1.24422e-7 kg
  property price 0.38 EUR2005; name ByP_price_EUR2005
    Temporary price data. Calculated as 90% of purchasers price based on: Zinc content in concentrate 53%. Concentrate price per kg Zn 86.5% of refined Zn price (13.5% treatment charges according to CHR Metals Limited 2005: Dynamic cost curves. http://www.minecost.com/dynamic.pdf). 2004 zinc price from USGS (2007) Mineral commodity summaries 2007. <http://minerals.usgs.gov/minerals/pubs/mcs/2007/mcs2007.pdf> [Accessed 25 May 2010]
  property zinc content 0.53; name zinc_C_zinc_concentrate
    Zinc content on a dry matter basis. Value taken from teh "zinc mine operation" /GLO dataset.
  property dry mass 1 kg; name DM_zinc_concentrate
  property carbon content 0
    carbon content on a dry matter basis (reserved; not for manual entry)
  property true value 1.317e-7
    allocation property applied in "true value" allocation // value calculated from revenue
  properties: wet mass 1 kg, water content 0, carbon content, non-fossil 0, carbon content, fossil 0, water in wet mass 0 kg, carbon allocation 0 kg

## Inputs from technosphere
- gravel, crushed: 0.885886 kg; name gravel; = (A_gravel* Q_av^- B)* Q_av; lognormal variance with pedigree 0.002, pedigree (1,1,3,1,1)
  Calculated Value. Assumed material stays in place after useful life of facility.
  Uncertainty: Calculated variable. Uncertainty will be determined from propagation of uncertainty factors of underlying variables.
  properties: wet mass 1 kg, dry mass 1 kg
- waste reinforced concrete: -1.31569e-5 kg; name W_reinfconc; = (concrete)*-1; lognormal variance with pedigree 0.002, pedigree (1,1,3,1,1)
  EcoSpold01Location=CH
  Estimation. Based on material input.
  Uncertainty: Calculated variable. Uncertainty will be determined from propagation of uncertainty factors of underlying variables.
  production volume 329.331 kg; name PV_w_reinfconc; = PV_wwtp*W_reinfconc/wwtp
    Calculated from the production volume of water works in proportion to the respective output amounts.
  property price 0 EUR2005; name W_reinfconc_price_EUR2005
  properties: wet mass 1 kg, dry mass 0.99418 kg, water content 0.00585407
- clay: 0.987237 kg; = (A_clay* Q_av^- B)* Q_av; lognormal variance with pedigree 0.002, pedigree (1,1,3,1,1)
  (same comment as for gravel, crushed)
  properties: wet mass 1 kg, water content 0.0362694, dry mass 0.965 kg
- reinforcing steel: 0.000861486 kg; name reinfsteel; = (A_reinfsteel* Q_av^- B)* Q_av; lognormal variance with pedigree 0.002, pedigree (1,1,3,1,1)
  EcoSpold01Location=RER
  Calculated Value.
  Uncertainty: Calculated variable. Uncertainty will be determined from propagation of uncertainty factors of underlying variables.
  properties: dry mass 1 kg, carbon content, fossil 0.004, wet mass 1 kg
- excavation, hydraulic digger: 0.00377252 m3; name earth; = (A_excav* Q_av^- B)* Q_av; lognormal variance with pedigree 0.002, pedigree (1,1,3,1,1)
  (same comment as for iron scrap, unsorted)
- diesel, burned in building machine: 0.00159347 MJ; = (A_diesel* Q_av^- B)* Q_av; lognormal variance with pedigree 0.002, pedigree (1,1,3,1,1)
  (same comment as for iron scrap, unsorted)
- polyvinylchloride, bulk polymerised: 0.0236486 kg; name PVC; = ( A_pvc* Q_av^- B)* Q_av; lognormal variance with pedigree 0.002, pedigree (1,1,3,1,1)
  (same comment as for reinforcing steel)
  properties: carbon content, fossil 0.387097, dry mass 1 kg, wet mass 1 kg
  note on carbon content, fossil: Monomer is vynyl chloride, C2H3Cl (ecoinvent v2.2 report 11_II). MW=62 g/mol
- scrap steel: -0.000694444 kg; name W_steel; = (steel)*-1; lognormal variance with pedigree 0.002, pedigree (1,1,3,1,1)
  Estimation. Based on material input.
  Uncertainty: Calculated variable. Uncertainty will be determined from propagation of uncertainty factors of underlying variables.
  production volume 17382.7 kg; name PV_w_steel; = PV_wwtp*W_steel/wwtp
    Calculated from production volume of reference product using the relative outputs.
  property price 0 EUR2005; name W_steel_price_EUR2005
  properties: wet mass 1 kg, dry mass 1 kg
- polyethylene, high density, granulate: 0.000563063 kg; name hdpe; = ( A_pe*Q_av^- B)* Q_av; lognormal variance with pedigree 0.002, pedigree (1,1,3,1,1)
  (same comment as for iron scrap, unsorted)
  properties: wet mass 1 kg, dry mass 1 kg, carbon content, fossil 0.857143
  note on carbon content, fossil: Polyethylene is formed out of a huge amount of ethylene monomers (C2H4) (ecoinvent v2.2 report 11_II). MW=28 g/mol
- waste reinforcement steel: -0.000861486 kg; name W_reinfSteel; = (reinfsteel)*-1; lognormal variance with pedigree 0.002, pedigree (1,1,3,1,1)
  (same comment as for waste reinforced concrete)
  production volume 21563.9 kg; name PV_w_reinfSteel; = PV_wwtp*(W_reinfSteel/wwtp)
    (same comment as for waste reinforced concrete)
  property price 0 EUR2005; name W_reinfSteel_price_EUR2005
  properties: wet mass 1 kg, dry mass 1 kg
- waste plastic, mixture: -0.000563063 kg; name W_plastics; = (hdpe)*-1; lognormal variance with pedigree 0.002, pedigree (1,1,3,1,1)
  (same comment as for scrap steel)
  production volume 14094.1 kg; name PV_w_plastics; = PV_wwtp*W_plastics/wwtp
    Calculated from production volume of reference product using the relative outputs.
  property price 0 EUR2005; name W_plastics_price_EUR2005
  properties: wet mass 1 kg, carbon content, fossil 0.747344, water content 0.180638, dry mass 0.847 kg
- scrap copper: -2.6464e-5 kg; name W_cu; = (cu)*-1
  Estimation. Based on material input.
  production volume 662.421 kg; name PV_w_cu; = PV_wwtp*W_cu/wwtp
    Calculated from production volume of reference product using the relative outputs.
  property price 0 EUR2005; name W_cu_price_EUR2005
  properties: dry mass 1 kg, wet mass 1 kg
- copper: 2.6464e-5 kg; name Cu; = (A_Cu* Q_av^- B)*Q_av; lognormal variance with pedigree 0.002, pedigree (1,1,3,1,1)
  Calculated Value.
  EcoSpold01Location=RER
  Uncertainty: Calculated variable. Uncertainty will be determined from propagation of uncertainty factors of underlying variables.
  properties: wet mass 1 kg, dry mass 1 kg
- process-specific burdens, sanitary landfill: 0.00377252 kg; = earth; lognormal variance with pedigree 0.0126, pedigree (4,4,3,1,1)
  Approximated process. Represents disposal of earth dug during excavation.
- cast iron: 0.000397898 kg; name iron; = (A_iron* Q_av^- B)* Q_av; lognormal variance with pedigree 0.002, pedigree (1,1,3,1,1)
  Calculated Value.
  Uncertainty: Calculated variable. Uncertainty will be determined from propagation of uncertainty factors of underlying variables. Uncertainty of actual relation between variables not accounted for at this time, although this could be included in a future update.
  properties: carbon content, fossil 0.04, dry mass 1 kg, wet mass 1 kg
  note on carbon content, fossil: Cast iron is made by remelting pig iron in small furnaces (e.g. cupola furnaces or electric arc furnaces) and poured into moulds to make castings. It usually contains 2% to 6% carbon (ecoinvent v2.2 report 10_partII). An average content of 4% was considered
- concrete, normal: 1.31569e-5 m3; name concrete; = (A_concrete* Q_av^- B)* Q_av; lognormal variance with pedigree 0.002, pedigree (1,1,3,1,1)
  Calculated Value.
  EcoSpold01Location=CH
  Uncertainty: Calculated variable. Uncertainty will be determined from propagation of uncertainty factors of underlying variables.
  properties: water content 0.086758, wet mass 2380 kg, dry mass 2190 kg
- steel, chromium steel 18/8, hot rolled: 0.000694444 kg; name steel; = (A_steel* Q_av^- B)* Q_av; lognormal variance with pedigree 0.002, pedigree (1,1,3,1,1)
  (same comment as for cast iron)
  properties: dry mass 1 kg, carbon content, fossil 0.0008, wet mass 1 kg
  note on carbon content, fossil: Stainless steel model is the grade 304 steel (18/8 stainless, 18% chromium 8% nickel; max. 0.08% C)
- waste polyvinylchloride: -0.0236486 kg; name W_pvc; = (pvc)*-1; lognormal variance with pedigree 0.002, pedigree (1,1,3,1,1)
  (same comment as for waste reinforced concrete)
  production volume 591950 kg; name PV_w_pvc; = PV_wwtp*W_pvc/wwtp
    (same comment as for waste reinforced concrete)
  property price 0 EUR2005; name W_pvc_price_EUR2005
  properties: water content 0.00200401, wet mass 1 kg, carbon content, fossil 0.440882, dry mass 0.998 kg
  note on carbon content, fossil: C content in 1 kg DM was calculated using data in Tab A.1, ecoinvent v2.2 report 13_I

## Inputs from nature
- Transformation, to industrial area [natural resource, land]: 0.00182057 m2; name land; = (A_landuse* Q_av^-B_landuse)* Q_av; lognormal variance with pedigree 0.002, pedigree (1,1,3,1,1)
  (same comment as for iron scrap, unsorted)
- Transformation, from unspecified [natural resource, land]: 0.00182057 m2; = (A_landuse* Q_av^-B_landuse)* Q_av; lognormal variance with pedigree 0.002, pedigree (1,1,3,1,1)
  (same comment as for iron scrap, unsorted)
- Occupation, industrial area [natural resource, land]: 0.0728228 m2*year; = land*wwtp_lifetime; lognormal variance with pedigree 0.002, pedigree (1,1,3,1,1)
  (same comment as for iron scrap, unsorted)

## Sampling procedure
Based on data collection at plan published in Godin, D. (2012).

## Extrapolations
From one single lagoon treatment facility to construction of all Quebec medium-sized lagoon facility. Extrapolation is based on scaling initial inventory to average size plant using published cost scaling curves from EPA (1980). This approach assumes that the economic scaling factor is applicable to material quantity. Cost-based scaling factor, usually used to account for economies of scale, Dataset is parameterized based on average flow. Note that the factor is reported to be valid for a capacity range of 190 m3/d to 20 000 m3/d.

US EPA. 1980. Construction costs for municipal wastewater treatment plants : 1973-1978. Report: EPA/430/9-80-003; FRD-11. U.S. Environmental Protection Agency, Office of Water Program Operations.
