# concrete production, 20MPa, self-construction, with cement, alternative constituents 45%

Dataset: EcoSpold 2, unit process
Geography: CO
Time period: 2014-01-01 to 2019-12-31
Technology level: current
Classification: ISIC rev.4 ecoinvent: 2395:Manufacture of articles of concrete, cement and plaster
Classification: EcoSpold01Categories: construction materials/concrete
Synonyms: self-construction concrete
Scenario: Business-as-Usual
System model: Allocation at the point of substitution
Generated by: Simon Gmünder
Published in: Gmünder S. 2017
Database: ecoinvent
isCopyrightProtected: false
accessRestrictedTo: 1

## General comment
This dataset represents the production of Colombian 20MPself-construction concrete for buidling construction and gereral use. Density: 2'334 kg/m³ - w/c: 0.67. Ingredients (for 1 m³): Cement type UG Type 350 kg, Water 235 kg, Gravel 1050 kg, Sand 700kg.

## Included activities start
From reception of raw materials at the construction site.

## Included activities end
This activity ends after concrete mixing at the construction site.

The dataset includes the whole manufacturing processes to produce self-construction concrete, but does not include the on site mixing infrastrucutre.

Concrete losses of 3% are considered.

## Geography
Representative production of self-construction concrete 20 MPa with GU type cemen int Colombia. Data based from main cement producers and personal comunications with local experts.

## Technology
Represent the current technology for self-construction concrete production in Colombia.

## Time period
The production volume of 2016 is considered. The data from sustainability reports goes from 2014 to 2016. Data have been reported with the production volume of corresponding year.

## Parameters
- total aggregates: 1750 kg/m3; name aggregates_tot; lognormal variance with pedigree 0.0046, pedigree (3,4,1,1,1)
  Estimated value. For the mix design for self-construction - around 20MPa in Colombia 1:2:3 recipe are considered as the most commonly used mix design for self-construction (Ing. Pimentel, 2017).
  The mix design contains 1750 kg /m3 of aggregates (Pimentel, 2017).
- water withdrawal, per cubic meter of concrete: 294.5 kg/m3; name water_withdrawal; = w_c_ratio*cement/(1+losses)+60; lognormal variance with pedigree 0.0046, pedigree (3,4,1,1,1)
  Calculated value. The water cement ratio (w/c) is 0.67. In addition, 60kg is assumed for other water uses such as washing, dust treatment, irrigation, etc.
- losses: 0.03 dimensionless; lognormal variance with pedigree 0.018, pedigree (4,5,1,5,1)
  Estimated value. Losses at the construction sites.
- water to cement ratio: 0.67 dimensionless; name w_c_ratio; lognormal variance with pedigree 0.0046, pedigree (3,4,1,1,1)

## Reference product
- concrete, 20MPa: 1 m3; name concrete; By-product classification allocatable product; CPC 37510: Non-refractory mortars and concretes
  reference flow
  production volume 5.27662e6 m3; name concrete_PV; = 7759735*0.68
    Calculated value. Considering the Colombian concrete production in 2016 (7'759'735 m3 (DANE, 2017)), The “self-construction” concrete represent 68% of the market (20MPa). The ready-mix concrete with a 20MPa strenght class makes 25.6% of the makret share the remaining 6.4% consists of ready-mix concrete of 40MPa strength class.
    DANE. (2017). Estadísticas de Concreto Premezclado.
  property price 185 EUR2005; name concrete_price_EUR2005
    Estimated to be the same price as in case of concrete, normal (Data are not easily available. Therefore, an average price of products supplied by the activities in the same ISIC 3 code has been applied.This price is obtained as '_49 Concrete, asphalt and other mineral products, EU27 virgin, EU27' in the 'EU & DK Input Output Database' (available in SimaPro). The price is assumed to be valid for both RER2003, RER 2004, world 2003 and world 2004. Multiplied by density.).
  property water content 0.111667; = water_in_wet_mass/dry_mass
  property sand content 700 kg; = sand/(1+losses)
    Calculated value.
  property gravel content 1050 kg; = gravel/(1+losses)
    Calculated value.
  property water in wet mass 234.5 kg; name water_in_wet_mass; = wet_mass-dry_mass
  property dry mass 2100 kg; name dry_mass; = cement/(1+losses)+ aggregates_tot
  property cement content 350 kg; = cement/(1+losses)
    Calculated value.
  property wet mass 2334.5 kg; name wet_mass; = dry_mass+ w_c_ratio*cement/(1+losses)
  property carbon content 0
    carbon content on a dry matter basis (reserved; not for manual entry)
  property true value 185; name concrete_true_value
    allocation property applied in "true value" allocation // value calculated from revenue
  properties: carbon content, fossil 0, carbon allocation 0 kg

## By-products
- electricity, for reuse in municipal waste incineration only: 0 kWh; CPC 17100: Electrical energy; By-product classification allocatable product; pedigree (1,1,1,1,1)
  Net electricity generated from this waste and used in internal MSWI plant energy redistribution.
  Uncertainty: uncertainty is calculated from uncertainties in waste composition and uncertainties in energy efficiency and the uncertainty in internal energy demand
  production volume 164618 kWh
  property true value relation 3.6; name E_el_prod_MSWI_true_value_relation
    property to calculate "true value" from
  property exergy 3.6 MJ; name E_el_prod_MSWI_exergy
    This exergy property is based on the exergy content of the product.
  property price 0.1 EUR2005; name E_el_prod_MSWI_price_EUR2005
    Estimated to be the same price as in case of electricity, medium voltage.
  property true value 0.00400674
    allocation property applied in "true value" allocation // value calculated from true value relation
- heat, for reuse in municipal waste incineration only: 0 MJ; CPC 17300: Steam and hot water; By-product classification allocatable product; pedigree (1,1,1,1,1)
  (same comment as for electricity, for reuse in municipal waste incineration only)
  production volume 1.16176e6 MJ
  property exergy 0.1842 MJ; name E_th_prod_MSWI_exergy
    This exergy property is based on the exergy content of the product.
  property true value relation 0.1842; name E_th_prod_MSWI_true_value_relation
    property to calculate "true value" from
  property price 0.0106 EUR2005; name E_th_prod_MSWI_price_EUR2005
    Average European district heat price from Ecoheatcool and Euroheat 2005-2006, Ecoheat Work package 1: The European heat market. Final report. 10.6 EUR/GJ i s the price of district heat. http://www.solarthermalworld.org/files/Ecoheatcool%20WP1%20Web.pdf?download
  property true value 0.00144683
    (same comment as for electricity, for reuse in municipal waste incineration only)

## Inputs from technosphere
- gravel, crushed: 1081.47 kg; name gravel; = 0.6*aggregates_tot*(1+losses); lognormal variance with pedigree 0.0108, pedigree (4,4,2,1,1)
  Estimated value. The mix design contains 1860 kg /m3 of aggregates. The aggregates are composed by a mix of 40% of sand and 60% of gravels (Ing. Pimentel, 2017).
  Uncertainty: Calculated variable. Uncertainty will be determined from propagation of uncertainty factors of underlying variables.
  properties: wet mass 1 kg, dry mass 1 kg
- tap water: 303.326 kg; = water_withdrawal*(1+losses); lognormal variance with pedigree 0.0175, pedigree (4,3,2,3,3)
  Calculated value.
  EcoSpold01Location=CH
  Uncertainty: Calculated variable. Uncertainty will be determined from propagation of uncertainty factors of underlying variables.
  properties: wet mass 1 kg, carbon content, fossil 0.00178991, water content 2962.17, dry mass 0.000337476 kg
  note on carbon content, fossil: Bicarbonate content is 2.93 mol/m3. CO2 content is 0.1 mol/m3 (ecoinvent v2.2 report 8, Tab 93.1).
- waste concrete: -70.0329 kg; name waste_concrete; = (concrete*wet_mass*losses)*-1; lognormal variance with pedigree 0.3068, pedigree (2,5,2,5,1)
  Calculated value.
  Uncertainty: Variance of logtransformed data calculated based on the sample's coefficient of variation.
  production volume 3.69548e8 kg; = concrete_PV * waste_concrete / concrete
    Calculated from production volume of reference product using the relative outputs.
  property price 0 EUR2005; name waste_concrete_price_EUR2005
  properties: wet mass 1 kg, water content 1, dry mass 0.5 kg
- sand: 720.979 kg; = 0.4*aggregates_tot*(1+losses); source Manuel Lascarro 2017; lognormal variance with pedigree 0.009, pedigree (4,2,2,3,1)
  (same comment as for gravel, crushed)
  properties: wet mass 1 kg, dry mass 1 kg
- steel, low-alloyed, hot rolled: 0.0237993 kg; name steel; source Kellenberger D. 2007; lognormal variance with pedigree 0.0146, pedigree (2,1,3,5,1)
  EcoSpold01Location=RER
  Literature value. From ecoinvent dataset "concrete production, 25 MPa, RNA only, GLO, 2006-2006l". Access date: 10.10.2017.
  properties: wet mass 1 kg, carbon content, fossil 0.005, dry mass 1 kg
  note on carbon content, fossil: Low alloyed steel composition given in Tab. 3.2 ecoinvent v2.2 report 10_partII. Steel assumed to have a C content of 0.5%
- waste rubber, unspecified: -0.034499 kg; = (rub)*-1; lognormal variance with pedigree 0.3068, pedigree (2,5,2,5,1)
  (same comment as for waste concrete)
  production volume 182043 kg; = concrete_PV * rub / concrete
    Calculated from production volume of reference product using the relative outputs.
  properties: wet mass 1 kg, carbon content, fossil 0.853, dry mass 1 kg
- lubricating oil: 0.0498985 kg; name lub_oil; source Kellenberger D. 2007; lognormal variance with pedigree 0.3068, pedigree (2,5,2,5,1)
  EcoSpold01Location=RER
  Calculated value. Weighted average amount from 34 concrete plants in Brazil is used (Silva 2018).
  Silva, F. B., Oliveira, L. A., Passuello, A. C. B., Moraga, G. L., Silva, V. G., Silva, M. G., Saade, M. R. M., Gmünder, S., Myers, N. , Life Cycle Inventories of cement and concrete production in Latin America, 3 - SeparatePublication
  Uncertainty: Variance of logtransformed data calculated based on the sample's coefficient of variation.
  properties: wet mass 1 kg, dry mass 1 kg, carbon content, fossil 0.75
  note on carbon content, fossil: Lubricating oil is produced from diesel. C-content/dry mass of fats and oils considered 75%, from: ecoinvent v2.2 report, n 15a, pg 40
- cement, alternative constituents 45%: 360.489 kg; name cement; = 350*(1+losses); source Manuel Lascarro 2017; lognormal variance with pedigree 0.0114, pedigree (4,3,2,5,1)
  Estimated value. Confirmed by local experts from association (Dir, Lascarro, Ing Pimentel, Asocreto, 2017) and biggest ready-mix plant from Holcim in Bogota (Holcim, 2017)
  Holcim. (2017). Visit of Concrete facility - Holcim Puente Aranda. Bogota.
  Uncertainty: Calculated variable. Uncertainty will be determined from propagation of uncertainty factors of underlying variables.
  property dry mass 1 kg; name cement_DM
  property water in wet mass 0 kg; name cement_WWM
  property carbon content, fossil 0; name cement_C_content_fossil
  property wet mass 1 kg; name cement_WM
  property water content 0; name cement_water_content
- scrap steel: -0.0237993 kg; = (steel)*-1; lognormal variance with pedigree 0.0226, pedigree (2,5,3,5,1)
  Calculated value.
  Uncertainty: Basic uncertainty from original dataset, completeness score adjusted
  production volume 125584 kg; = concrete_PV * steel / concrete
    Calculated from production volume of reference product using the relative outputs.
  properties: wet mass 1 kg, dry mass 1 kg
- synthetic rubber: 0.034499 kg; name rub; source Kellenberger D. 2007; lognormal variance with pedigree 0.7308, pedigree (2,5,2,5,1)
  Calculated value. Weighted average amount from 34 concrete plants in Brazil is used (Silva 2018).
  Silva, F. B., Oliveira, L. A., Passuello, A. C. B., Moraga, G. L., Silva, V. G., Silva, M. G., Saade, M. R. M., Gmünder, S., Myers, N. , Life Cycle Inventories of cement and concrete production in Latin America, 3 - SeparatePublication
  EcoSpold01Location=RER
  Uncertainty: Variance of logtransformed data calculated based on the sample's coefficient of variation.
  properties: dry mass 1 kg, carbon content, fossil 0.871949, wet mass 1 kg
  note on carbon content, fossil: EPDM (Ethylene-propene-diene terpolymer) rubber is a terpolymer of ethylene, propene, and a diene with the residual unsaturated portion of the diene in the side chain (ecoinvent v2.2 report 7-part XX & Ullmann). Chemical formula (deduced from Evidences of Solvent-Induced Miscibility in Polychloroprene-co-Ethylene-Propene Diene Terpolymer Blends, Dubey et al., Journal of Applied Polymer Science, 2009, 111:1884–1891): C20H35
- electricity, medium voltage: 0.857965 kWh; = 0.833*(1+losses); lognormal variance with pedigree 0.0115, pedigree (2,3,2,3,1)
  EcoSpold01Location=CH
  Calculated value. the average consumption of electricity has been estimated by measuring the average specifications of concrete mixers commonly used in building sites. An average concrete mixer produces 200l (0.2m3). The power of the motor is around 2kW and production capacity of 2.4m3/h (Various, 2017). The electricity consumption is then 0.833 kWh/m3 of concrete.
  Uncertainty: There is an important variability of energy consumption between plants
- waste mineral oil: -0.0498985 kg; = (lub_oil)*-1; lognormal variance with pedigree 0.0226, pedigree (2,5,3,5,1)
  (same comment as for scrap steel)
  production volume 263303 kg; = concrete_PV * lub_oil/concrete
    Calculated from production volume of reference product using the relative outputs.
  properties: carbon content, fossil 0.864444, wet mass 1 kg, water content 0.111111, dry mass 0.9 kg
  note on carbon content, fossil: Tab A.6, ecoinvent v2.2 report 13_I. C content has been calculated after data in the tables, and then referred to 1 kg DM
- wastewater from concrete production: -0.0247193 m3; name Water_to_water; = ((water_withdrawal- water_in_wet_mass)*.4/1000*(1+losses))*-1; lognormal variance with pedigree 0.0115, pedigree (2,3,2,3,1)
  EcoSpold01Location=CH
  Calculated value. The water balance is established taking into account the total water input (withdrawal) minus the outputs, which include the water contained in the concrete, the water evaporated and the water infiltrated. In general, no waste water is produced. The water incorporated in the concrete correspond to the cement amount multiplied by w/c ratio. The share of the water evaporated to air and the water infiltrated is calculated based on the sustainability reports from Argos (60% evaporated).
  production volume 130438 m3; name waste_water; = concrete_PV*water_to_water/concrete
    Calculated value.
  property price 0 EUR2005; name Water_to_water_price_EUR2005
  property water in wet mass 999.551 kg; name Water_to_water_WWM
  property dry mass 0.449139 kg; name Water_to_water_DM
  property water content 2225.48; name Water_to_water_water_content
  properties: wet mass 1000 kg, carbon content, fossil 0.027074
  note on carbon content, fossil: TOC =0.01216 kg/m3 (Tab A.20, ecoinvent v2.2 report 13_I). TOC was considered as Total Carbon.

## Emissions to nature
- Water [air, unspecified]: 0.0370789 m3; name Water_to_air; = (water_withdrawal- water_in_wet_mass)*.6/1000*(1+losses); lognormal variance with pedigree 0.0021, pedigree (2,3,2,3,1)
  Calculated value. The water balance is established taking into account the total water input (withdrawal) minus the outputs, which include the water contained in the concrete, the water evaporated and the water infiltrated. In general, no waste water is produced. The water incorporated in the concrete correspond to the cement amount multiplied by w/c ratio. The share of the water evaporated to air and the water infiltrated is calculated based on the sustainability reports from Argos (60% evaporated).
  Uncertainty: Calculated variable. Uncertainty will be determined from propagation of uncertainty factors of underlying variables.

## Sampling procedure
The 1:2:3 concrete recipe is considered as the most commonly used mix design for self-construction in Colombia, based on personal communication with the Colombian concrete association (Ing. Pimentel, 2017).

Unit flows were calculated by dividing the amounts of inputs and outputs by the total concrete production in mass.

## Extrapolations
The main values are considered representative for a typical production of self-construction concrete for building construction in Colombia.

The infrastrucutre is included and the main emissions to water and some inputs are taken from the global dataset for ready-mix concrete production (20MPa).

The auxiliary material (rubber, lube oil) are based on a sampling of 34 concrete plants in Brazil.
