# treatment of used refrigerant R134a, reclamation

Dataset: EcoSpold 2, unit process
Geography: GLO
Time period: 2010-01-01 to 2019-12-31
Technology level: modern
Classification: ISIC rev.4 ecoinvent: 382:Waste treatment and disposal
Scenario: Business-as-Usual
System model: Allocation at the point of substitution
Generated by: Tereza Levova
Database: ecoinvent
isCopyrightProtected: true
accessRestrictedTo: 1

## General comment
This dataset represent treatment of used refrigerant R134a by reclamation.
The refrigerant R134a is widely used refrigerant (mainly in automobile air conditioning systems and othere refrigeration and cooling technolodges). It can be treated by primary three different technologies; 1) venting, 2) reclamation and 3) final disposal.
Since the R134a causes global warming venting as a way of treatment is forbidden in some countries. For example in the US (US EPA, http://www.epa.gov/ozone/title6/608/faq.html, accessed 20141105).

## Included activities start
The activity starts, when the used refrigerant is accepted for treatment.

## Included activities end
There are no data on the amount of energy needed during this process.

## Technology
Reclamation refers to the reprocessing of used HFC-134a to new product specifications. Quality of reclaimed product is verified by chemical analysis (DuPont, HFC-134a Technical Information, http://www2.dupont.com/Refrigerants/en_US/assets/downloads/h45945_hfc134a_push.pdf, accessed 20141105).
The machine for R-134a reclaim are mostly portable machineries for cars. Their functions are mainly recovery, vacuuming and charging. Recovery is the process to recover the R-134a and purifying it, the purified refrigerant is then stored in the machine. Vacuuming the car is to eliminate any residuals to prevent contamination. Charging is then insertion of the refrigerant (http://wonderfu.buy.lightneasy.org/pz66c0ed9-fully-automatic-r134a-recovery-machine-and-refrigerant-charging-machine.html, accessed 20150924).

## Parameters
- motor power: 0.7 kW; name motor_power
  Literature data.
  The power used by the reclamation machine as reported by the producer.
  0.7 kW reported by producer - Dayang (http://dyautoequip.en.alibaba.com/product/1639275705-219888480/r134a_refrigerant_recharging_equipment.html>, accessed 20150924 ).
  Cross reference:
  0.75 kW reported by another producer - Wonderfu (<http://www.wonderfu.com/sale-4009681-auto-r134a-recovery-machine-for-garage-refrigerant-reclaiming-equipment.html>, accessed 20150924).
- recovery speed: 15 kg/hour; name recovery_speed; = 250/1000*60
  Literature data.
  The recovery speed during the reclamation as reported by the producer.
  250 g/min. reported by producer - Dayang (http://dyautoequip.en.alibaba.com/product/1639275705-219888480/r134a_refrigerant_recharging_equipment.html>, accessed 20150924 ).
  Cross reference:
  300 g/min. reported by another producer - Wonderfu (<http://www.wonderfu.com/sale-4009681-auto-r134a-recovery-machine-for-garage-refrigerant-reclaiming-equipment.html>, accessed 20150924).

## Reference product
- used refrigerant R134a: 0 kg; name used_refrigerant; CPC 39: Wastes or scraps; By-product classification Waste
  production volume 0 kg; name used_refrigerant_PV; = 340000000*0.3*0.7
    Calculated based on literature and estimates.
    3.4E8 kg is the amount of refrigerant R134a produced annual.
    It is estimated, that 70% of the refrigerant is vented already during the use phase. Estimated based on the information published by IPCC (http://www.ghgprotocol.org/files/ghgp/tools/hfc-pfc.xls, accessed 20150723).
    The shares of the three different technologies are estimated to be as follows;
    0.5 venting
    0.3 reclamation
    0.2 final disposal
    There are various sources of information which suggest, that the share of venting can be anywhere between 20 - 100%. So the estimated amount used in this dataset is rather uncertain.
  property price 0 EUR2005; name used_refrigerant_price_EUR2005
    Waste products are assigned a price of zero as they are assumed to require further treatment.
  property carbon content 0.23529
    carbon content on a dry matter basis (reserved; not for manual entry)
  properties: wet mass 1 kg, dry mass 1 kg, water content 0, water in wet mass 0 kg, carbon content, fossil 0.23529, carbon content, non-fossil 0, carbon allocation 0.23529 kg
- refrigerant R134a: 1 kg; CPC 34: Basic chemicals; By-product classification allocatable product; pedigree (1,1,1,1,1)
  Calculated value.
  production volume 6.41886e7 kg

## By-products
- refrigerant R134a: 0 kg; name refrigerant_ByP; = ABS(used_refrigerant)- refrigerant_to_air- waste_haz; CPC 34: Basic chemicals; By-product classification allocatable product; pedigree (1,1,1,1,1)
  Calculated value.
  production volume 0 kg; = refrigerant_ByP/ABS( used_refrigerant)* used_refrigerant_PV
    Calculated from production volume of reference product using the relative outputs.
  property price 5 EUR2005; name refrigerant_ByP_price_EUR2005
    Estimated based on purchasing price.
  property carbon content 0.235294
    carbon content on a dry matter basis (reserved; not for manual entry)
  properties: dry mass 1 kg, water content 0, carbon content, non-fossil 0, water in wet mass 0 kg, wet mass 1 kg, carbon content, fossil 0.235294, carbon allocation 0.235294 kg

## Inputs from technosphere
- hazardous waste, for incineration: 0 kg; name waste_haz; = ABS( used_refrigerant)*0.1; pedigree (1,1,1,1,1)
  Estimated value. It is estimated, that during the reclamation 10% of the refrigerant is not possible to reclamate and is disposed of as a hazardous waste.
  production volume 0 kg; = waste_haz/ABS( used_refrigerant)* used_refrigerant_PV
    Calculated from production volume of reference product using the relative outputs.
  property price 0 EUR2005; name waste_haz_price_EUR2005
  properties: carbon content, fossil 0.554667, dry mass 0.75 kg, wet mass 1 kg, water content 0.333333
  note on carbon content, fossil: Tab A.6, ecoinvent v2.2 report 13_I. C content has been calculated after data in the tables, and then referred to 1 kg DM
- electricity, medium voltage: 0 kWh; = motor_power/ recovery_speed; pedigree (1,1,1,1,1)
  Calculated value. For more information see the comment in the parameters.
- hazardous waste, for incineration: 0, 0, 0 kg (3 entries); pedigree (1,1,1,1,1)
  (same comment as for hazardous waste, for incineration)
- building, hall: 1.62901e-6 m2
  Calculated value based on estimates.
  1m2 of hall is available every day for 50 years
  1 refrigeration machine occupies during the dismantling the area of its base for the period of 2 days
- used refrigeration machine, R134a as refrigerant: -0.000328439 unit; lognormal variance with pedigree 0.0026, pedigree (1,1,3,1,1)
  Calculated value.
  production volume 109800 unit
- steel, low-alloyed, hot rolled: 0.0467317 kg; lognormal variance with pedigree 0.0186, pedigree (4,5,3,1,1)
  Calculated value.
  16.7 kg/m is the weight of HE 100A I beam (height 96mm)
  Following parts of the refrigeration machine are also made from steel;
  - receiver of capacity 6.2l is made from stainelss steel.
  - economiser
  - evaporator fan motor
  - condenser fan motor
  - evaporator coil heaters
- electronics, for control units: 0.00492659 kg; lognormal variance with pedigree 0.0186, pedigree (4,5,3,1,1)
  Estimated based on picture.
- maintenance, refrigeration machine: 0.000328439 unit; lognormal variance with pedigree 0.0026, pedigree (1,1,3,1,1)
  Calculated value.
- air compressor, screw-type compressor, 4kW: 0.000136068 unit; source Maersk Container Industry 2013; lognormal variance with pedigree 0.0186, pedigree (4,5,3,1,1)
  Calculated value.
  The weight od the air compressor present in the database is 140kg. The weight of the compressor needed for the refrigeration unit is 58kg. The amount of the exchange needed is scaled accordingly.
  The original Star Cool refrigeration machine the compressor's description:
  Make; Bitzer
  Type: Semi – hermetic two-stage reciprocating.
  Number of cylinders: 2 Low stages cylinders, 2 High stage cylinders.
  Speed: Variable in interval from 20 Hz – 110 Hz controlled by the frequency converter.
  Model: S4BCF – 5.2Y
  Nominal power: 5.5 kW
  Compressor oil type: Reniso Triton SEZ 55 or equivalent
  Compressor housing: Seawater resistant aluminium, unpainted.
  Displacement: 42 m3/h @ 110 Hz
  Weight: 58 Kg
- refrigerant R134a: 0.00147798 kg; lognormal variance with pedigree 0.0186, pedigree (4,5,3,1,1)
  Literature value.
- polypropylene, granulate: 0.00281278 kg; source Maersk Container Industry 2013; lognormal variance with pedigree 0.0186, pedigree (4,5,3,1,1)
  Calcualetd value.
  The rear bulkhead of the refrigeration machine is covered by polypropylene fibre reinforced thermoplastic. Since this product is not available in the database ordinary polypropylene is used instead.
  The condenser fan is made of glass fibre reinforced polypropylene.
  440mm is the diameter of the fan
  2mm is the thickness of the blades
- zinc coat, pieces: 0.0059459 m2; lognormal variance with pedigree 0.0052, pedigree (3,3,3,1,1)
  Calcualted value. It is assumed, that majority of the steel and aluminium surfaces are coated.
- glass fibre reinforced plastic, polyamide, injection moulded: 1.02383e-7 kg; source Maersk Container Industry 2013; lognormal variance with pedigree 0.0186, pedigree (4,5,3,1,1)
  Calculated value based on literature.
  The two evaporater fans which are part of the evaporator fan module are made of polyamide, glass reinforced.
  315mm is the diameter of a fan
  2mm is the estimated thickness of the blades.
- metal working, average for aluminium product manufacturing: 0.038177 kg; lognormal variance with pedigree 0.0052, pedigree (3,3,3,1,1)
  Calculated value.
- aluminium, wrought alloy: 0.038177 kg; source Maersk Container Industry 2013; lognormal variance with pedigree 0.0186, pedigree (4,5,3,1,1)
  Calculated based on estimates and literature.
  Aluminium is in the refrigerated machine used foe many parts. It is used in the evaporator and condenser coils; the fins are made of aluminium. In the evaporator fan module; the cover for the fans.
- welding, arc, steel: 0.0027983 m; lognormal variance with pedigree 0.0052, pedigree (3,3,3,1,1)
  Calculated value.
- metal working, average for steel product manufacturing: 0.0467317 kg; lognormal variance with pedigree 0.0186, pedigree (4,5,3,1,1)
  Calculated value. The amount of steel needed is calculated as a difference between known weight of the whole refrigerated machine and all the individual parts.
- copper: 0.0021299 kg; source Maersk Container Industry 2013; lognormal variance with pedigree 0.0186, pedigree (4,5,3,1,1)
  Calculated based on assumptions.
  Copper is used in the refrigerated machine as a part of evaporator coil module and condenser coil module. The tubes are made of copper.
  6*2=12 is the number of copper coils present in the evaporator coil module.
  0.253 kg is the weight of 1m of copper coil with diameter of 10mm and wall thickness of 1mm (http://www.copper-tubes.net/soft.html, accessed 20141022).
  4 is the number of rows of copper coils present in the condenser coil module
  0.1685 kg is the weight of 1m of copper coil with diameter of 7mm and wall thickness of 1mm (calculated based on http://www.copper-tubes.net/soft.html, accessed 20141022).
- cable, three-conductor cable: 0.00591191 m; source Maersk Container Industry 2013; lognormal variance with pedigree 0.0052, pedigree (3,3,3,1,1)
  Literature value.
- polyurethane, rigid foam: 0.00159711, 0.00323394 kg (2 entries); source Maersk Container Industry 2013; lognormal variance with pedigree 0.0052, pedigree (3,3,3,1,1)
  Calculated value. The rear bulkhead of the refrigeration machine is covered by polyurethane insulation foam.

## Emissions to nature
- Ethane, 1,1,1,2-tetrafluoro-, HFC-134a [air, unspecified]: 0 kg; name refrigerant_to_air; = ABS(used_refrigerant)*0.001; pedigree (1,1,1,1,1)
  Estimated value. It is estimated, that during the reclamation 0.1% of the refrigerant is emitted to air.

## Review by Gabor Doka 2014-12-19
passed
