# treatment of hard coal ash, residual material landfill

Dataset: EcoSpold 2, unit process
Geography: DE
Time period: 1994-01-01 to 2019-12-31
Technology level: current
Classification: ISIC rev.4 ecoinvent: 3822:Treatment and disposal of hazardous waste
Classification: EcoSpold01Categories: waste management/residual material landfill
Tags: ConvertedDataset; Treatment
Scenario: Business-as-Usual
System model: Allocation at the point of substitution
Generated by: Gabor Doka (obsolete)
Published in: Doka G. 2009
Database: ecoinvent
isCopyrightProtected: true
accessRestrictedTo: 1

## General comment
Inventoried waste contains 100% DE hard coal ash; .
waste composition (wet, in ppm): H2O n.a.; O 575260; H n.a.; C n.a.; S 3806.9; N n.a.; P 1427; B 149.07; Cl 41.297; Br 43.92; F 91.229; I 2.2287; Ag n.a.; As 38.874; Ba 1027.3; Cd 1.4689; Co 58.551; Cr 132.54; Cu 128.78; Hg 0.21287; Mn 439.27; Mo 32.536; Ni 135.23; Pb 164.67; Sb 7.7516; Se 9.0108; Sn 58.396; V 234.78; Zn 209.54; Be 12.113; Sc 34.643; Sr 855.58; Ti 5933.2; Tl 3.9161; W 15.383; Si 176700; Fe 54015; Ca 21975; Al 107170; K 12286; Mg 30736; Na 6756;
Share of carbon in waste that is biogenic 60.4%.
[This dataset was already contained in the ecoinvent database version 2. It was not individually updated during the transfer to ecoinvent version 3. Life Cycle Impact Assessment results may still have changed, as they are affected by changes in the supply chain, i.e. in other datasets. This dataset was generated following the ecoinvent quality guidelines for version 2. It may have been subject to central changes described in the ecoinvent version 3 change report (http://www.ecoinvent.org/database/ecoinvent-version-3/reports-of-changes/), and the results of the central updates were reviewed extensively. The changes added e.g. consistent water flows and other information throughout the database. The documentation of this dataset can be found in the ecoinvent reports of version 2, which are still available via the ecoinvent website. The change report linked above covers all central changes that were made during the conversion process.]

## Included activities end
Waste-specific short-term emissions to water from leachate. Long-term emissions from landfill to ground water.

## Geography
Technology encountered in Switzerland in 2000. Landfill includes base seal and leachate collection system.

## Technology
Swiss residual material landfill for polluted, inorganic waste. With base seal and leachate collection system. Recultivation after closure.

## Time period
Waste composition as given in literature reference, theoretical data or other source. Transfer coefficients from prospective model.

## Reference product
- hard coal ash: -1 kg; CPC 39: Wastes or scraps; By-product classification Waste
  EcoSpold01Location=DE
  production volume 2.92038e8 kg
    Estimated. Energy prodcution in mainly responsible for hard coal ashes. The production volume is calculated as the sum of hard coal ashes resulting from electricity and heat and power co-generation production from hard coal in the respective country.
  property price 0 EUR2005
    Waste products are assigned a price of zero as they are assumed to require further treatment.
  property carbon content 0
    carbon content on a dry matter basis (reserved; not for manual entry)
  properties: carbon content, non-fossil 0, water content 0, dry mass 1 kg, carbon content, fossil 0, wet mass 1 kg, water in wet mass 0 kg, carbon allocation 0 kg

## Inputs from technosphere
- residual material landfill: 2.0833e-9 unit; lognormal variance with pedigree 0.04, pedigree (1,1,5,1,1)
  demands per kilogram waste. uncertainty is heeded in the module
  EcoSpold01Location=CH
- process-specific burdens, residual material landfill: 1 kg; lognormal variance with pedigree 0.04, pedigree (1,1,5,1,1)
  EcoSpold01Location=CH
  demands per kilogram waste. uncertainty is heeded in the module;activityLink introduced to establish a direct link to the corresponding regional supply of this product

## Emissions to nature
- Fluoride [water, surface water]: 4.9439e-6 kg; lognormal variance with pedigree 1.19, pedigree (1,1,5,1,1)
  uncertainty is calculated from uncertainties in waste composition and transfer coefficients in residual landfill
- Scandium [water, surface water]: 4.8891e-6 kg; lognormal variance with pedigree 1.23, pedigree (1,1,5,1,1)
  (same comment as for Fluoride)
- Phosphate [water, surface water]: 1.6319e-6 kg; lognormal variance with pedigree 1.43, pedigree (1,1,5,1,1)
  (same comment as for Fluoride)
- Magnesium [water, surface water]: 5.8302e-6 kg; lognormal variance with pedigree 1.15, pedigree (1,1,5,1,1)
  (same comment as for Fluoride)
- Boron [water, ground-, long-term]: 0.00014658 kg; lognormal variance with pedigree 0.95, pedigree (1,1,5,1,1)
  uncertainty is calculated from uncertainties in waste composition and transfer coefficients in incinerator and landfills.
- Strontium [water, surface water]: 5.1711e-7 kg; lognormal variance with pedigree 1.44, pedigree (1,1,5,1,1)
  (same comment as for Fluoride)
- Antimony [water, ground-, long-term]: 5.018e-6 kg; lognormal variance with pedigree 1.35, pedigree (1,1,5,1,1)
  (same comment as for Boron)
- Bromine [water, ground-, long-term]: 8.6389e-6 kg; lognormal variance with pedigree 1.13, pedigree (1,1,5,1,1)
  (same comment as for Boron)
- Silicon [water, ground-, long-term]: 0.17631 kg; lognormal variance with pedigree 0.12, pedigree (1,1,5,1,1)
  (same comment as for Boron)
- Iodide [water, ground-, long-term]: 2.2287e-13 kg; lognormal variance with pedigree 1.53, pedigree (1,1,5,1,1)
  (same comment as for Boron)
- Manganese [water, ground-, long-term]: 3.6285e-6 kg; lognormal variance with pedigree 6.56, pedigree (1,1,5,1,1)
  (same comment as for Boron)
- Copper, ion [water, surface water]: 8.2757e-9 kg; lognormal variance with pedigree 1.98, pedigree (1,1,5,1,1)
  (same comment as for Fluoride)
- Beryllium [water, surface water]: 7.3214e-9 kg; lognormal variance with pedigree 2, pedigree (1,1,5,1,1)
  (same comment as for Fluoride)
- Titanium, ion [water, surface water]: 2.9404e-6 kg; lognormal variance with pedigree 1.21, pedigree (1,1,5,1,1)
  (same comment as for Fluoride)
- Beryllium [water, ground-, long-term]: 4.3855e-6 kg; lognormal variance with pedigree 1.54, pedigree (1,1,5,1,1)
  (same comment as for Boron)
- Cadmium, ion [water, surface water]: 1.6648e-11 kg; lognormal variance with pedigree 2.8, pedigree (1,1,5,1,1)
  (same comment as for Fluoride)
- Aluminium [water, surface water]: 5.3111e-5 kg; lognormal variance with pedigree 0.9, pedigree (1,1,5,1,1)
  (same comment as for Fluoride)
- Chloride [water, surface water]: 1.1811e-5 kg; lognormal variance with pedigree 1.16, pedigree (1,1,5,1,1)
  (same comment as for Fluoride)
- Zinc, ion [water, ground-, long-term]: 2.5682e-6 kg; lognormal variance with pedigree 5.75, pedigree (1,1,5,1,1)
  (same comment as for Boron)
- Tin, ion [water, surface water]: 1.8474e-9 kg; lognormal variance with pedigree 2.18, pedigree (1,1,5,1,1)
  (same comment as for Fluoride)
- Strontium [water, ground-, long-term]: 0.00030975 kg; lognormal variance with pedigree 0.98, pedigree (1,1,5,1,1)
  (same comment as for Boron)
- Sodium, ion [water, ground-, long-term]: 0.0042206 kg; lognormal variance with pedigree 0.46, pedigree (1,1,5,1,1)
  (same comment as for Boron)
- Aluminium [water, ground-, long-term]: 0.031813 kg; lognormal variance with pedigree 0.52, pedigree (1,1,5,1,1)
  (same comment as for Boron)
- Lead [water, surface water]: 1.426e-9 kg; lognormal variance with pedigree 2.21, pedigree (1,1,5,1,1)
  (same comment as for Fluoride)
- Cobalt [water, ground-, long-term]: 1.001e-5 kg; lognormal variance with pedigree 1.85, pedigree (1,1,5,1,1)
  (same comment as for Boron)
- Tungsten [water, ground-, long-term]: 9.9581e-6 kg; lognormal variance with pedigree 1.26, pedigree (1,1,5,1,1)
  (same comment as for Boron)
- Sodium, ion [water, surface water]: 0.0025354 kg; lognormal variance with pedigree 0.48, pedigree (1,1,5,1,1)
  (same comment as for Fluoride)
- Nickel, ion [water, surface water]: 8.1734e-8 kg; lognormal variance with pedigree 1.68, pedigree (1,1,5,1,1)
  (same comment as for Fluoride)
- Thallium [water, surface water]: 2.3669e-9 kg; lognormal variance with pedigree 2.15, pedigree (1,1,5,1,1)
  (same comment as for Fluoride)
- Phosphate [water, ground-, long-term]: 0.0009775 kg; lognormal variance with pedigree 1.21, pedigree (1,1,5,1,1)
  (same comment as for Boron)
- Copper, ion [water, ground-, long-term]: 4.9572e-6 kg; lognormal variance with pedigree 3.62, pedigree (1,1,5,1,1)
  (same comment as for Boron)
- Boron [water, surface water]: 1.168e-6 kg; lognormal variance with pedigree 1.34, pedigree (1,1,5,1,1)
  (same comment as for Fluoride)
- Antimony [water, surface water]: 2.7337e-6 kg; lognormal variance with pedigree 1.37, pedigree (1,1,5,1,1)
  (same comment as for Fluoride)
- Calcium, ion [water, surface water]: 3.315e-6 kg; lognormal variance with pedigree 1.22, pedigree (1,1,5,1,1)
  (same comment as for Fluoride)
- Thallium [water, ground-, long-term]: 1.4178e-6 kg; lognormal variance with pedigree 1.69, pedigree (1,1,5,1,1)
  (same comment as for Boron)
- Calcium, ion [water, ground-, long-term]: 0.0019857 kg; lognormal variance with pedigree 1.76, pedigree (1,1,5,1,1)
  (same comment as for Boron)
- Titanium, ion [water, ground-, long-term]: 0.0017613 kg; lognormal variance with pedigree 0.84, pedigree (1,1,5,1,1)
  (same comment as for Boron)
- Iron, ion [water, surface water]: 4.5196e-7 kg; lognormal variance with pedigree 1.5, pedigree (1,1,5,1,1)
  (same comment as for Fluoride)
- Sulfate [water, surface water]: 0.0012253 kg; lognormal variance with pedigree 0.64, pedigree (1,1,5,1,1)
  (same comment as for Fluoride)
- Barium [water, surface water]: 1.4166e-8 kg; lognormal variance with pedigree 1.91, pedigree (1,1,5,1,1)
  (same comment as for Fluoride)
- Barium [water, ground-, long-term]: 8.4857e-6 kg; lognormal variance with pedigree 6.45, pedigree (1,1,5,1,1)
  (same comment as for Boron)
- Arsenic, ion [water, surface water]: 3.8874e-5 kg; lognormal variance with pedigree 1.13, pedigree (1,1,5,1,1)
  (same comment as for Fluoride)
- Magnesium [water, ground-, long-term]: 0.0034923 kg; lognormal variance with pedigree 1.46, pedigree (1,1,5,1,1)
  (same comment as for Boron)
- Bromine [water, surface water]: 3.5281e-5 kg; lognormal variance with pedigree 1.11, pedigree (1,1,5,1,1)
  (same comment as for Fluoride)
- Potassium, ion [water, ground-, long-term]: 0.0088231 kg; lognormal variance with pedigree 0.39, pedigree (1,1,5,1,1)
  (same comment as for Boron)
- Fluoride [water, ground-, long-term]: 8.6285e-5 kg; lognormal variance with pedigree 1.01, pedigree (1,1,5,1,1)
  (same comment as for Boron)
- Nickel, ion [water, ground-, long-term]: 4.8958e-5 kg; lognormal variance with pedigree 1.22, pedigree (1,1,5,1,1)
  (same comment as for Boron)
- Potassium, ion [water, surface water]: 0.0034634 kg; lognormal variance with pedigree 0.43, pedigree (1,1,5,1,1)
  (same comment as for Fluoride)
- Iron, ion [water, ground-, long-term]: 0.00027072 kg; lognormal variance with pedigree 7.23, pedigree (1,1,5,1,1)
  (same comment as for Boron)
- Lead [water, ground-, long-term]: 8.5418e-7 kg; lognormal variance with pedigree 7.86, pedigree (1,1,5,1,1)
  (same comment as for Boron)
- Iodide [water, surface water]: 2.2287e-6 kg; lognormal variance with pedigree 1.51, pedigree (1,1,5,1,1)
  (same comment as for Fluoride)
- Tungsten [water, surface water]: 5.425e-6 kg; lognormal variance with pedigree 1.28, pedigree (1,1,5,1,1)
  (same comment as for Fluoride)
- Scandium [water, ground-, long-term]: 2.9754e-5 kg; lognormal variance with pedigree 1.14, pedigree (1,1,5,1,1)
  (same comment as for Boron)
- Zinc, ion [water, surface water]: 4.2874e-9 kg; lognormal variance with pedigree 2.07, pedigree (1,1,5,1,1)
  (same comment as for Fluoride)
- Tin, ion [water, ground-, long-term]: 1.1066e-6 kg; lognormal variance with pedigree 5.01, pedigree (1,1,5,1,1)
  (same comment as for Boron)
- Molybdenum [water, ground-, long-term]: 1.4937e-7 kg; lognormal variance with pedigree 1.17, pedigree (1,1,5,1,1)
  (same comment as for Boron)
- Chromium VI [water, surface water]: 7.9675e-6 kg; lognormal variance with pedigree 1.13, pedigree (1,1,5,1,1)
  (same comment as for Fluoride)
- Mercury [water, surface water]: 1.6774e-11 kg; lognormal variance with pedigree 2.79, pedigree (1,1,5,1,1)
  (same comment as for Fluoride)
- Selenium [water, ground-, long-term]: 5.8331e-6 kg; lognormal variance with pedigree 1.33, pedigree (1,1,5,1,1)
  (same comment as for Boron)
- Vanadium, ion [water, surface water]: 5.762e-7 kg; lognormal variance with pedigree 1.43, pedigree (1,1,5,1,1)
  (same comment as for Fluoride)
- Molybdenum [water, surface water]: 3.2386e-5 kg; lognormal variance with pedigree 1.15, pedigree (1,1,5,1,1)
  (same comment as for Fluoride)
- Sulfate [water, ground-, long-term]: 0.010195 kg; lognormal variance with pedigree 0.53, pedigree (1,1,5,1,1)
  (same comment as for Boron)
- Cobalt [water, surface water]: 1.6711e-8 kg; lognormal variance with pedigree 1.89, pedigree (1,1,5,1,1)
  (same comment as for Fluoride)
- Vanadium, ion [water, ground-, long-term]: 0.00018046 kg; lognormal variance with pedigree 0.91, pedigree (1,1,5,1,1)
  (same comment as for Boron)
- Chromium VI [water, ground-, long-term]: 2.5168e-5 kg; lognormal variance with pedigree 0.97, pedigree (1,1,5,1,1)
  (same comment as for Boron)
- Selenium [water, surface water]: 3.1777e-6 kg; lognormal variance with pedigree 1.35, pedigree (1,1,5,1,1)
  (same comment as for Fluoride)
- Chloride [water, ground-, long-term]: 2.9486e-5 kg; lognormal variance with pedigree 1.12, pedigree (1,1,5,1,1)
  (same comment as for Boron)
- Cadmium, ion [water, ground-, long-term]: 9.9722e-9 kg; lognormal variance with pedigree 7.79, pedigree (1,1,5,1,1)
  (same comment as for Boron)
- Mercury [water, ground-, long-term]: 1.0048e-8 kg; lognormal variance with pedigree 4.14, pedigree (1,1,5,1,1)
  (same comment as for Boron)
- Manganese [water, surface water]: 6.0576e-9 kg; lognormal variance with pedigree 2.02, pedigree (1,1,5,1,1)
  (same comment as for Fluoride)
- Arsenic, ion [water, ground-, long-term]: 3.8874e-14 kg; lognormal variance with pedigree 1.15, pedigree (1,1,5,1,1)
  (same comment as for Boron)
- Silicon [water, surface water]: 0.0003974 kg; lognormal variance with pedigree 0.66, pedigree (1,1,5,1,1)
  (same comment as for Fluoride)

## Sampling procedure
Landfill model based on observed leachate concentrations in literature. Extrapolated to 60'000 years heeding chemical characteristics. Initial waste composition from various literature sources.

## Extrapolations
This dataset has been extrapolated from year 2000 to the year of the calculation (2019). The uncertainty has been adjusted accordingly.

## Review by Niels Jungbluth 2009-02-15
passed.
