# aluminium around steel bi-metal wire production, 3.67 mm external diameter

Dataset: EcoSpold 2, unit process
Geography: RoW
Time period: 2012-01-01 to 2019-12-31
Technology level: current
Classification: ISIC rev.4 ecoinvent: 25:Manufacture of fabricated metal products, except machinery and equipment
Classification: EcoSpold01Categories: metals/processing
Scenario: Business-as-Usual
System model: Allocation at the point of substitution
Share of production covered: 7.5 %
Generated by: Jean-Francois Menard
Database: ecoinvent
isCopyrightProtected: true
accessRestrictedTo: 1

## General comment
This dataset represents the production of aluminium and steel bi-metal wire, which consists of the co-extrusion of aluminium and steel. The final product is usually a cast aluminium alloy layer around a carbon steel wire. The data providing manufacturing company supplies a range of wire sizes, from 2.05 to 5.19 mm of exrternal diameter. The aluminum layer thickness is at least 10% of the wire radius and approximately 25% of the cross-sectional area. The modelled product is compliant with ASTM B415 and ASTM B502 standards. This dataset represents a 3.67 mm wire since it is the size for which data were provided on a per kg basis but the dataset is parameterized to the wire external diamteter so new instances can be created for other diameters.
This dataset has been copied from an original dataset covering the geography Québec. The uncertainty has been adjusted accordingly.

## Included activities start
From the reception of the material and energy inputs at the factory gate.

## Included activities end
This activity ends with the bi-metal wire ready for shipping or to be used in the manufacturing of standed cable.
This dataset includes: pre-treatment process steps for both the steel wire and the aluminium rod (cleaning, rinse and drying) ; heating of the steel wire ; co-extrusion of aluminium around the steel wire with lubricant ; water cooling ; air drying ; eddy currents inspection ; drawing of the wire and winding on coils.
This dataset excludes: secondary packaging crate (4.75E-4 kg of sawnwood per kg of 3.67 mm diameter cable).

## Geography
This dataset has been extrapolated from an original dataset covering the geography Québec. The uncertainty has been adjusted accordingly.

## Technology
Most used technology. Alternate technology (aluminium in powder form instead of rod) is estimatred to represent less than 10% of market.

## Parameters
- pure aluminium loss rate: 0.0664 dimensionless; name alu_loss; lognormal variance with pedigree 0.0132, pedigree (2,4,1,5,3)
  Calculated value. Pure aluminium loss rate. Calculated from per kg data for 3.67 mm diameter wire (assumed to be diameter or mass independent) from data providing manufacturing comapny.
- steel mass fraction: 0.9 dimensionless; name steel_mass_fraction; lognormal variance with pedigree 0.0132, pedigree (2,4,1,5,3)
  Calculated value. Mass fraction of carbon steel in bi-metal wire, derived from the mass-to-length (in kg/m) data for the different diameters of wires manfuctured by the data providing company and aluminium (2700 kg/m3, source: http://en.wikipedia.org/wiki/Aluminium) and carbon steek (7850 kg/m3, source: http://en.wikipedia.org/wiki/Carbon_steel) densities. The aluminium thickness was determined to be 13.1% of the wire radius, to obtained the mass-to-length data (within about 0.1%), which then gives the calculated steel mass fraction.
- alkaline solution for bi-metal cable extrusion: 1.85517e-5 kg; name alkaline_solution_per_m; lognormal variance with pedigree 0.0132, pedigree (2,4,1,5,3)
  Calculated value. Per meter value calculated from per kg data for 3.67 mm diameter wire (assumed to be diameter or mass independent) from data providing manufacturing comapny.
- wire diameter: 3.67 mm; name wire_diameter
  Basic parameter used in the calculation of the exchanges.
- wire linear mass density: 0.069663 kg/m; name wire_linear_mass_density; = (5.1964e-3 * wire_diameter^1.9964); lognormal variance with pedigree 0.052, pedigree (5,4,1,5,3)
  Calculated value. Power function relationship between the linear mass density (in kg/m) of the bi-metal wire and its diameter (in mm) derived from the mass-to-length data for the different diameters of wires manfuctured by the data providing company. The R² value of the regression is of 1,00.
  Uncertainty: Calculated variable. Uncertainty should be determined from propagation of uncertainty factors of underlying variables, however no uncertainty could be generated for the terms of the power function. Uncertainty of actual relation between variables not accounted at this time, although this could be included in a future update.
- bi-metal cable loss rate: 0.0436 dimensionless; name cable_loss; lognormal variance with pedigree 0.0132, pedigree (2,4,1,5,3)
  Calculated value. Finished bi-metal cable loss rate. Calculated from per kg data for 3.67 mm diameter wier (assumed to be diameter or mass independent) from data providing manufacturing comapny.

## Reference product
- aluminium around steel bi-metal wire, 3.67mm external diameter: 1 m; name bimetal; By-product classification allocatable product; CPC 4153: Semi-finished products of aluminium or aluminium alloys
  ACS (Aluminium clad steel) wire.
  production volume 7.80765e8 m; name PV_bimetal
    Calculated value. Value calculated from the data providing manufacturing company's production volume (in kg, the mass-to-length data for the different diameters of wires manfuctured, the un-weighted average mass per m was used) and its etimated share of the global market.
  property dry mass 0.069663 kg; name bimetal_DM; = wire_linear_mass_density
  property water content 0; name bimetal_water_content
  property water in wet mass 0 kg; name bimetal_WWM
  property wet mass 0.069663 kg; name bimetal_WM; = bimetal_DM
  property carbon content, non-fossil 0; name bimetal_C_content_non_fossil
    biogene carbon content on a dry matter basis
  property carbon content, fossil 0.00225; name bimetal_C_content_fossil
    Based on fossil carbon content (0.0025) indicated in ecoinvent v3.1 dataset "steel production, converter, unalloyed, GLO 2000" ("Unalloyed steels or carbon steels are those in which the level of an individual element in no case reaches or exceeds the limiting concentration given in Tab. 3.1 ecoinvent v2.2 report 10_partII. Assumed to have a C content of 0.25%") and carbon steel mass fraction in wire (0.9).
  property price 0.0676 EUR2005; name bimetal_price_EUR2005
    Temporary price data. Calculated as 90% of purchasers price based on: estimated at 85% of sorted scrap
  property carbon content 0.00225
    carbon content on a dry matter basis (reserved; not for manual entry)
  property true value 0.0676; name bimetal_true_value
    allocation property applied in "true value" allocation // value calculated from revenue
  properties: carbon allocation 0.000156742 kg

## By-products
- iron scrap, unsorted: 0 kg; name steelScrap; = steel-(wire_linear_mass_density*steel_mass_fraction); CPC 39310: Slag, dross, scalings and other waste from the manufacture of iron or steel; By-product classification Recyclable; pedigree (1,1,1,1,1)
  Reported as scrap (off-specifications) bi-metal wire (aluminium part was removed). Calculated value (see Parameters).
  Uncertainty: Calculated variable. Uncertainty will be determined from propagation of uncertainty factors of underlying variables. Uncertainty of actual relation between variables not accounted at this time, although this could be included in a future update.
  production volume 2.23218e6 kg; name PV_steelScrap_1; = PV_bimetal * (steelScrap / bimetal)
    Calculated from production volume of reference product using the relative outputs.
  property price 0.149 EUR2005; name steelScrap_price_EUR2005
    (same comment as for aluminium around steel bi-metal wire, 3.67mm external diameter)
  property carbon content 0
    carbon content on a dry matter basis (reserved; not for manual entry)
  property true value 0.000425985; name steelScrap_true_value
    allocation property applied in "true value" allocation // value calculated from revenue
  properties: wet mass 1 kg, water in wet mass 0 kg, water content 0, dry mass 1 kg, carbon content, fossil 0, carbon content, non-fossil 0, carbon allocation 0 kg
- aluminium, cast alloy: 0 kg; source European Aluminium Association 2008; By-product classification allocatable product; CPC 41431: Unwrought aluminium; pedigree (1,1,1,1,1)
  EcoSpold01Location=RER
  production volume 353666 kg
  property price 1.3 EUR2005; name castAlloyAmount_price_EUR2005
    Temporary price data. Calculated as 90% of purchasers price based on: Source: London Metal Exchange, Aluminium alloy price for 2005
  property carbon content 0
    carbon content on a dry matter basis (reserved; not for manual entry)
  property true value 0.000588865
    allocation property applied in "true value" allocation // value calculated from revenue
  properties: carbon content, fossil 0, dry mass 1 kg, wet mass 1 kg, water content 0, water in wet mass 0 kg, carbon content, non-fossil 0, carbon allocation 0 kg
- aluminium oxide, non-metallurgical: 0 kg; source European Aluminium Association 2008; CPC 41432: Alumina (aluminium oxide), except artificial corundum; By-product classification allocatable product; CAS 1344-28-1; pedigree (1,1,1,1,1)
  production volume 37834.2 kg
  property dry mass 1 kg; name DM
  property wet mass 1 kg; name WM
  property carbon content, fossil 0; name C_content_fossil
  property water in wet mass 0 kg; name WWM
  property water content 0; name water_content
  property price 0.28 EUR2005; name Al2O3Amount_price_EUR2005
    From UN trade database. http://data.un.org/ Import data from the largest economies of the world are used (Brazil, India, USA, China, Japan and EU-27).
  property carbon content, non-fossil 0; name C_content_non_fossil
  property carbon content 0
    carbon content on a dry matter basis (reserved; not for manual entry)
  property true value 1.35682e-5
    allocation property applied in "true value" allocation // value calculated from revenue
  properties: carbon allocation 0 kg
- heat, for reuse in municipal waste incineration only: 0 MJ; CPC 17300: Steam and hot water; By-product classification allocatable product; pedigree (1,1,1,1,1)
  Net electricity generated from this waste and used in internal MSWI plant energy redistribution.
  Uncertainty: uncertainty is calculated from uncertainties in waste composition and uncertainties in energy efficiency and the uncertainty in internal energy demand
  production volume 94515.1 MJ
  property exergy 0.1842 MJ; name E_th_prod_MSWI_exergy
    This exergy property is based on the exergy content of the product.
  property true value relation 0.1842; name E_th_prod_MSWI_true_value_relation
    property to calculate "true value" from
  property price 0.0106 EUR2005; name E_th_prod_MSWI_price_EUR2005
    Average European district heat price from Ecoheatcool and Euroheat 2005-2006, Ecoheat Work package 1: The European heat market. Final report. 10.6 EUR/GJ i s the price of district heat. http://www.solarthermalworld.org/files/Ecoheatcool%20WP1%20Web.pdf?download
  property true value 7.93037e-7
    allocation property applied in "true value" allocation // value calculated from true value relation
- electricity, for reuse in municipal waste incineration only: 0 kWh; CPC 17100: Electrical energy; By-product classification allocatable product; pedigree (1,1,1,1,1)
  (same comment as for heat, for reuse in municipal waste incineration only)
  production volume 13623.8 kWh
  property exergy 3.6 MJ; name E_el_prod_MSWI_exergy
    This exergy property is based on the exergy content of the product.
  property true value relation 3.6; name E_el_prod_MSWI_true_value_relation
    property to calculate "true value" from
  property price 0.1 EUR2005; name E_el_prod_MSWI_price_EUR2005
    Estimated to be the same price as in case of electricity, medium voltage.
  property true value 2.23413e-6
    (same comment as for heat, for reuse in municipal waste incineration only)
- aluminium, wrought alloy: 0 kg; source European Aluminium Association 2008; By-product classification allocatable product; CPC 4153: Semi-finished products of aluminium or aluminium alloys; pedigree (1,1,1,1,1)
  production volume 259709 kg
  property price 1.44 EUR2005; name secondaryAluminiumOutput_price_EUR2005
    Estimated based on literature values and expert judgement. Aluminium ccast alloys are about 90% of the price of aluminium wrought alloys.
  property carbon content 0
    carbon content on a dry matter basis (reserved; not for manual entry)
  property true value 0.000478992
    allocation property applied in "true value" allocation // value calculated from revenue
  properties: dry mass 1 kg, wet mass 1 kg, carbon content, fossil 0, water content 0, carbon content, non-fossil 0, water in wet mass 0 kg, carbon allocation 0 kg
- zinc concentrate: 0 kg; CPC 14290: Other non-ferrous metal ores and concentrates (other than uranium or thorium ores and concentrates); By-product classification allocatable product
  Calculated value from the knowledge of the properties of both products.
  production volume 0.000804931 kg
  property price 0.38 EUR2005; name ByP_price_EUR2005
    Temporary price data. Calculated as 90% of purchasers price based on: Zinc content in concentrate 53%. Concentrate price per kg Zn 86.5% of refined Zn price (13.5% treatment charges according to CHR Metals Limited 2005: Dynamic cost curves. http://www.minecost.com/dynamic.pdf). 2004 zinc price from USGS (2007) Mineral commodity summaries 2007. <http://minerals.usgs.gov/minerals/pubs/mcs/2007/mcs2007.pdf> [Accessed 25 May 2010]
  property zinc content 0.53; name zinc_C_zinc_concentrate
    Zinc content on a dry matter basis. Value taken from teh "zinc mine operation" /GLO dataset.
  property dry mass 1 kg; name DM_zinc_concentrate
  property carbon content 0
    carbon content on a dry matter basis (reserved; not for manual entry)
  property true value 3.8244e-14
    allocation property applied in "true value" allocation // value calculated from revenue
  properties: wet mass 1 kg, water content 0, carbon content, non-fossil 0, carbon content, fossil 0, water in wet mass 0 kg, carbon allocation 0 kg

## Inputs from technosphere
- steel, unalloyed: 0.0641221 kg; name steel; = (wire_linear_mass_density*steel_mass_fraction)/(1-cable_loss); lognormal variance with pedigree 0.002, pedigree (1,1,3,1,1)
  Reported as 9.5 mm diameter carbon steel cast alloy rods. Calculated value (see Parameters).
  Uncertainty: Calculated variable. Uncertainty will be determined from propagation of uncertainty factors of underlying variables. Uncertainty of actual relation between variables not accounted at this time, although this could be included in a future update.
  properties: wet mass 1 kg, dry mass 1 kg, carbon content, fossil 0.0025
- propane, burned in building machine: 5.9992e-6 MJ; = propane_per_kg*propane_net_heating_value*wire_linear_mass_density; lognormal variance with pedigree 0.002, pedigree (1,1,3,1,1)
  Reported as for forklift truck. Calculated value (see Exchange Properties).
  Uncertainty: Calculated variable. Uncertainty will be determined from propagation of uncertainty factors of underlying variables. Uncertainty of actual relation between variables not accounted at this time, although this could be included in a future update.
  property fuel input in physical units, m3 1.895e-6 m3; name propane_per_kg
  property heating value, net 46.46 MJ; name propane_net_heating_value
  note on fuel input in physical units, m3: Calculated value. Per kg data for 3.67 mm diameter wire (assumed to be diameter or mass dependent) from data providing manufacturing company.
  note on heating value, net: net (lower) heating (calorific) value. Taken directly from ecoinvent v3.0 dataset "propane, burned in building machine, GLO 2013".
- heat, district or industrial, natural gas: 0 MJ; pedigree (1,1,1,1,1)
  EcoSpold01Location=RER
  Reported as for building heating only. Calculated value (see Exchange Properties).
  Uncertainty: Calculated variable. Uncertainty will be determined from propagation of uncertainty factors of underlying variables. Uncertainty of actual relation between variables not accounted at this time, although this could be included in a future update.
  property Corresponding fuel use 1.0417 MJ; name natural_gas_fuel_use
  property heating value, net 36.3 MJ; name natural_gas_net_heating_value
  property fuel input in physical units, m3 0.00218263 m3; name natural_gas_per_kg
  note on Corresponding fuel use: Lower heating value of the fuel input related to the heat/electricity output. Assume a 96% energy efficiency based on Section 5.3.6 of report "Life cycle Inventories of Energy Systems, Results for Current Systems in Switzerland and other UCTE Countries" (ecoinvent report No. 5, 2007)
  note on heating value, net: net (lower) heating (calorific) value. Value taken from Table 5.1 of report "Overview and methodology, Data quality guidelines for the ecoinvent database version 3" (ecoinvent report No. 1 (v3), 2011).
- sawnwood, softwood, raw, dried (u=20%): 9.06178e-6 m3; name sawnWood; = wood_per_m/wood_density; lognormal variance with pedigree 0.002, pedigree (1,1,3,1,1)
  Reported as coils for primary packaging. Calculated value (see Exchange Properties).
  Uncertainty: Calculated variable. Uncertainty will be determined from propagation of uncertainty factors of underlying variables. Uncertainty of actual relation between variables not accounted at this time, although this could be included in a future update.
  property wet mass 540 kg; name wood_density
  property value per m of bi-metal cable 0.0050027; name wood_per_m
  properties: water content 0.2, carbon content, non-fossil 0.494, dry mass 450 kg
  note on value per m of bi-metal cable: Calculated value. Per meter value (in kg) calculated from per kg data for 3.67 mm diameter wire (assumed to be diameter or mass independent) from data providing manufacturing comapny.
- electricity, medium voltage: 0 kWh; pedigree (1,1,1,1,1)
  Reported as grid electricity. Calculated value (see Exchange Properties).
  Uncertainty: Calculated variable. Uncertainty will be determined from propagation of uncertainty factors of underlying variables. Uncertainty of actual relation between variables not accounted at this time, although this could be included in a future update.
  property value per kg of bi-metal cable 0.427; name electricity_per_kg
  note on value per kg of bi-metal cable: Measured value. Per kg data for 3.67 mm diameter wire (assumed to be diameter or mass dependent) from data providing manufacturing company.
- steel, low-alloyed: 1.20498e-6 kg; lognormal variance with pedigree 0.0152, pedigree (2,4,3,5,3)
  Proxy. Reported as scouring pads. Calculated per meter value (in kg) calculated from per kg data for 3.67 mm diameter wire (assumed to be diameter or mass independent) from data providing manufacturing comapny.
  properties: dry mass 1 kg, carbon content, fossil 0.005, wet mass 1 kg
- chemical, inorganic: 8.87602e-6 kg; = chemical_input + alkaline_solution_per_m*K4P2O7_concentration; lognormal variance with pedigree 0.002, pedigree (1,1,3,1,1)
  Represents an input of chemical reported as inorganic chemicals and an input of tetrapotassium pyrophosphate (K4P2O7, NAS 7320-34-5) used in alkaline solution, calculated based on the solution concentration (see Exchange Properties).
  Uncertainty: Calculated variable. Uncertainty will be determined from propagation of uncertainty factors of underlying variables. Uncertainty of actual relation between variables not accounted at this time, although this could be included in a future update.
  property input_kg 5.364e-6 kg; name chemical_input
  property concentration 0.2; name K4P2O7_concentration
  properties: dry mass 1 kg, wet mass 1 kg, carbon content, fossil 0.003
  note on input_kg: Calculated value. Per meter value (in kg) calculated from per kg data for 3.67 mm diameter wire (assumed to be diameter or mass independent) from data providing manufacturing company.
  note on concentration: Alkaline solution tetra potassium pyrophosphate mass concentration. Value from data providing manufacturing company.
  note on carbon content, fossil: This dataset is an unweighted average of 20 inorganic substances (listed in Tab 88.1, ecoinvent v2.2 report 8, part II), being part of the top100 chemicals included in this database. The C-content has also been calculated as an unweighted average of the C content of the substances composing this dataset.
- tap water: 0 kg; name tapWater; pedigree (1,1,1,1,1)
  Measured value. Per meter value (in kg) calculated from per kg data for 3.67 mm diameter wire (assumed to be diameter or mass independent) from data providing manufacturing company.
  properties: dry mass 0.000337476 kg, carbon content, fossil 0.00178991, wet mass 1 kg, water content 2962.17
  note on carbon content, fossil: Bicarbonate content is 2.93 mol/m3. CO2 content is 0.1 mol/m3 (ecoinvent v2.2 report 8, Tab 93.1).
- aluminium, primary, ingot: 0.00760931 kg; name aluminium; = ((wire_linear_mass_density*(1-steel_mass_fraction))/(1-alu_loss))+((wire_linear_mass_density*steel_mass_fraction)*(cable_loss/(1-cable_loss))*((1-steel_mass_fraction)/steel_mass_fraction)); lognormal variance with pedigree 0.002, pedigree (1,1,3,1,1)
  Reported as primary aluminium cast alloy 9.5 mm diameter rods. Calculated value (see Parameters).
  Uncertainty: Calculated variable. Uncertainty will be determined from propagation of uncertainty factors of underlying variables. Uncertainty of actual relation between variables not accounted at this time, although this could be included in a future update.
  properties: wet mass 1 kg, dry mass 1 kg
- sodium sulfate, anhydrite: 3.26904e-5 kg; lognormal variance with pedigree 0.0152, pedigree (2,4,3,5,3)
  Calculated value. Per meter value (in kg) calculated from per kg data for 3.67 mm diameter wire (assumed to be diameter or mass independent) from data providing manufacturing company.
  properties: dry mass 1 kg, wet mass 1 kg
- wastewater, average: 0 m3; name wasteWater; pedigree (1,1,1,1,1)
  Calculated value. Amount calculated from water inputs. Some effluent characterization data were reported, the calculated per meter values (in kg) calculated from per kg data for 3.67 mm diameter wire (assumed to be diameter or mass independent) from data providing manufacturing comapny: BOD5 = 3.6617E-6 kg/m, COD = 7.504E-6 kg/m, suspended solids = 8.852E-6 kg/m, and hydrocarbons, unspecified = 6,038E-9 kg/m.
  Uncertainty: Calculated variable. Uncertainty will be determined from propagation of uncertainty factors of underlying variables. Uncertainty of actual relation between variables not accounted at this time, although this could be included in a future update.
  production volume 0 m3; name PV_wasteWater
    Calculated from production volume of reference product using the relative outputs.
  property price 0 EUR2005; name wasteWater_price_EUR2005
  properties: water content 2882.2, carbon content, non-fossil 0.194039, dry mass 0.346837 kg, wet mass 1000 kg
  note on carbon content, non-fossil: 0.0673 kg TOC/m3 (Tab A.17, ecoinvent v2.2 report 13_I). TOC was considered as Total Carbon.
- inert waste: 0 kg; name wasteInert; pedigree (1,1,1,1,1)
  Reported as solid waste to inert material landfill. Calculated value. Per meter value (in kg) calculated from per kg data for 3.67 mm diameter wire (assumed to be diameter or mass independent) from data providing manufacturing company.
  production volume 0 kg; name PV_wasteInert
    Calculated from production volume of reference product using the relative outputs.
  property price 0 EUR2005; name wasteInert_price_EUR2005
  properties: dry mass 1 kg, wet mass 1 kg
- aluminium scrap, new: -0.000795268 kg; name aluScrap; = (aluminium-(wire_linear_mass_density*(1-steel_mass_fraction)))*-1; lognormal variance with pedigree 0.002, pedigree (1,1,3,1,1)
  Reported as new aluminium scrap, generated during co-extrusion of aluminium over steel core. Plus aluminium part of scrap (off-specifications) bi-metal wire. Calculated value (see Parameters).
  Uncertainty: Calculated variable. Uncertainty will be determined from propagation of uncertainty factors of underlying variables. Uncertainty of actual relation between variables not accounted at this time, although this could be included in a future update.
  production volume 634791 kg; name PV_aluScrap; = PV_bimetal * aluScrap / bimetal
    Calculated from production volume of reference product using the relative outputs.
  property price 0.806 EUR2005; name aluScrap_price_EUR2005
  properties: dry mass 1 kg, wet mass 1 kg
- rolling mill: 1.58792e-9 unit; lognormal variance with pedigree 0.52, pedigree (5,5,5,5,5)
  Proxy. Value taken directly from ecoinvent v3.0 dataset "wire drawing, steel, GLO 2002".
  Uncertainty: No data collected. The uncertainty has been maximized.
- water, deionised: 0 kg; name waterDeionized; pedigree (1,1,1,1,1)
  Water used in alkaline solution. Calculated value (see Exchange Properties).
  Uncertainty: Calculated variable. Uncertainty will be determined from propagation of uncertainty factors of underlying variables. Uncertainty of actual relation between variables not accounted at this time, although this could be included in a future update.
  property concentration 0.57; name water_concentration
  properties: wet mass 1 kg
  note on concentration: Alkaline solution water (solvent) mass concentration. Value from data providing manufacturing company.
- waste mineral oil: 0 kg; name wasteOil; pedigree (1,1,1,1,1)
  EcoSpold01Location=CH
  Reported as used mineral oil, 10% water. Calculated value. Per meter value (in kg) calculated from per kg data for 3.67 mm diameter wire (assumed to be diameter or mass independent) from data providing manufacturing company.
  production volume 0 kg; name PV_wasteOil
    Calculated from production volume of reference product using the relative outputs.
  property price 0 EUR2005; name wasteOil_price_EUR2005
  properties: dry mass 0.9 kg, wet mass 1 kg, carbon content, fossil 0.864444, water content 0.111111
  note on carbon content, fossil: Tab A.6, ecoinvent v2.2 report 13_I. C content has been calculated after data in the tables, and then referred to 1 kg DM
- potassium hydroxide: 3.62925e-6 kg; name potassiumHydrox; = alkaline_solution_per_m*KOH_concentration; lognormal variance with pedigree 0.002, pedigree (1,1,3,1,1)
  Potassium hydroxide used in alkaline solution. Calculated value (see Exchange Properties).
  Uncertainty: Calculated variable. Uncertainty will be determined from propagation of uncertainty factors of underlying variables. Uncertainty of actual relation between variables not accounted at this time, although this could be included in a future update.
  property concentration 0.2; name KOH_concentration
  properties: wet mass 1 kg, dry mass 0.856 kg, water content 0.168224
  note on concentration: Alkaline solution potassium hydroxide mass concentration. Value from data providing manufacturing company.
- soap: 0.000603315 kg; = alkaline_solution_per_m*soap_concentration + calcium_stearate_surfactant_per_kg*wire_linear_mass_density; lognormal variance with pedigree 0.002, pedigree (1,1,3,1,1)
  Soap used in alkaline solution and used as proxy for extrusion lubricant (calcium stearate surfactants). Calculated value (see Exchange Properties).
  EcoSpold01Location=RER
  Uncertainty: Calculated variable. Uncertainty will be determined from propagation of uncertainty factors of underlying variables. Uncertainty of actual relation between variables not accounted at this time, although this could be included in a future update.
  property concentration 0.03; name soap_concentration
  property value per kg of bi-metal cable 0.008846; name calcium_stearate_surfactant_per_kg
  properties: dry mass 0.87 kg, wet mass 1 kg, water content 0.149425, carbon content, non-fossil 0.692237
  note on concentration: Alkaline solution soap mass concentration. Value from data providing manufacturing company.
  note on value per kg of bi-metal cable: Soap used as proxy for calcium stearate surfactant. Calculated value. Per kg data for 3.67 mm diameter wire (assumed to be diameter or mass dependent) from data providing manufacturing comapny.
  note on carbon content, non-fossil: Soap (CnH2n+1 COO Na) is produced by a combined saponification and neutralisation process performed on a blend of oleochemical feedstocks comprised of short chain (C12-14, derived from coconut or palm kernel oil) and long chain (C16-18, from tallow or palm oil) esters.The ratio of short to long fatty acid chains is 20:80 (ecoinvent v2.2 report 12). Short fatty acid has been estimated as C12.5H(2*12.5+1); MW R=176 g/mol. Long fatty acid has been estimated as C16H(2*16+1); MW R=225 g/mol. MW of COONa=67 g/mol
- heat, district or industrial, natural gas: 0.00148962, 0.003693 MJ (2 entries); lognormal variance with pedigree 0.002, pedigree (1,1,3,1,1)
  (same comment as for heat, district or industrial, natural gas)
  properties: Corresponding fuel use 1.0417 MJ, heating value, net 36.3 MJ, fuel input in physical units, m3 0.00218263 m3
- electricity, medium voltage: 0.000308569, 5.61465e-5, 0.00129602, 0.000455057, 0.00095216, 0.0138053, 0.00448264, 0.0019758, 0.00576425 kWh (9 entries); lognormal variance with pedigree 0.002, pedigree (1,1,3,1,1)
  (same comment as for electricity, medium voltage)
  properties: value per kg of bi-metal cable 0.427
- tap water: 8.98595e-5, 2.0963e-6, 4.1703e-7, 1.05159e-5, 2.73567e-7, 7.78158e-7, 0.000120338 kg (7 entries); lognormal variance with pedigree 0.0146, pedigree (1,4,3,5,3)
  (same comment as for tap water)
- wastewater, average: -2.29039e-8, -2.11718e-7 m3 (2 entries); lognormal variance with pedigree 0.002, pedigree (1,1,3,1,1)
  (same comment as for wastewater, average)
  production volume 187.278 m3
- inert waste: -9.46006e-6, -0.00109839 kg (2 entries); lognormal variance with pedigree 0.0152, pedigree (2,4,3,5,3)
  (same comment as for inert waste)
  production volume 884294 kg
- water, deionised: 3.71e-8, 1.03063e-5 kg (2 entries); lognormal variance with pedigree 0.002, pedigree (1,1,3,1,1)
  (same comment as for water, deionised)
  properties: concentration 0.57, wet mass 1 kg
- waste mineral oil: -7.78518e-7, -3.36453e-5 kg (2 entries); lognormal variance with pedigree 0.0152, pedigree (2,4,3,5,3)
  (same comment as for waste mineral oil)
  production volume 27477.5 kg

## Sampling procedure
Mostly industry data from one manufacturing company in the region of Québec, and some data from literature.

## Extrapolations
Data was obtained from the data providing company on a per kg basis, it was converted to a per m reference flow using a power function derived from wire mass-to-length data for wires of 2.05 to 5.19 mm of diameter data (see Parameters).
This dataset has been copied from an original dataset covering the geography Québec. The uncertainty has been adjusted accordingly.
