# fish canning, large fish

Dataset: EcoSpold 2, unit process
Geography: RoW
Time period: 2012-01-01 to 2019-12-31
Technology level: current
Classification: ISIC rev.4 ecoinvent: 1020:Processing and preserving of fish, crustaceans and molluscs
Scenario: Business-as-Usual
System model: Allocation at the point of substitution
Generated by: Angel Avadí
Published in: Avadí, A. 2018
Database: ecoinvent
isCopyrightProtected: true
accessRestrictedTo: 1

## General comment
The activity represents the canning of large fish in a canning plant. The functional unit is 1000 kg of raw material processed, excluding residues. The total raw material demand of this activity is 1000 kg of preprocessed raw material + the amount of residues generated by preprocessing (gutting, heading, tailing, peeling, filleting, etc). The life cycle inventories were produced based on a sample of 1 Ecuadorian plant (processing capacity: 61 000 t/y, representing 33% of the national processed tuna output). The data aplies to large fish such as tunids, swordfish, marlins, large flatfish and sharks. This activity can be used to model fish processing in other geographies.
Users must use this service activity in combination with an activity providing the raw material (fish).
System boundaries of fish processing for Direct Human Consumption (DHC) and relations between activities
Detailed system boundaries of DCH activities in Peru, including provision of fish from dedicated fleet

## Included activities start
From delivery of consumables to the plant, through its Use phase (production), including all upstream activities (e.g. provision of infrastructure, fuels, electricity, chemicals and packaging materials).

## Included activities end
Excludes fishery activities and provision of raw material (fish)

## Geography
Representative of Ecuador.

## Technology
Tuna processing activities of Ecuadorian fish canning plants, per t of processing capacity. Plants have a lifespan of 40 years.
Process diagram of large fish canning

## Time period
Production figures represent the period 2012-2013. Valid as of 2017.

## Reference product
- fish canning, large fish: 1 kg; name production; source Angel Avadí 2015; By-product classification allocatable product; CPC 212: Prepared and preserved fish, crustaceans, molluscs and other aquatic invertebrates
  Amount of raw material processed, excluding residues. The total raw material demand of this activity is 1000 kg of preprocessed raw material + the amount of residues generated by preprocessing (gutting, heading, tailing, peeling, filleting, etc).
  production volume 2.88933e9 kg; name prod_vol; = 394000000/0.12
    Global production of canned tuna (Tunas prepared or preserved, not minced) in 2013,
  property price 0.650329 EUR2005; name production_price_EUR2005
    Calculated based on inputs: The price of the product has been calculated as a sum of the values of the material and energy inputs for this product. This value is therefore a rough estimation. It may underestimate the real price since there are additional expenses when producing any product. These expences can include for example labour costs, treatment of waste materials and profit for the producer. Please consider carefully whether this level of data quality is acceptable for your application.
  property true value 650.329; name production_true_value
    allocation property applied in "true value" allocation // value calculated from revenue

## By-products
- fish residues: 0 kg; name residues; source Angel Avadí 2015; CPC 21221: Fish fillets and fish meat (whether or not minced), fresh or chilled; By-product classification Recyclable; pedigree (1,1,1,1,1)
  Residues from fish processing, raw or cooked
  Uncertainty: Data from 1 plant, assumptions for larger plants
  production volume 1.84917e9 kg; = prod_vol * residues / production
    Calculated from production volume of reference product using the relative outputs.
  property energy content 4.01 MJ; name residues_energy_content
    Average of 49 fish species, http://www.fao.org/wairdocs/tan/x5916e/x5916e01.htm
  property fat content 0.061; name residues_fat_content
    Average of 49 fish species, http://www.fao.org/wairdocs/tan/x5916e/x5916e01.htm
  property ash content 0.015 kg; name residues_ash
    Ash content of fish is between 1-2% of the edible portion, http://www.fao.org/wairdocs/tan/x5916e/x5916e01.htm
  property carbon content, non-fossil 0.47385; name residues_C_content_non_fossil; = (1-residues_protein-residues_fat_content-residues_ash)*0.444+residues_protein*0.535+residues_fat_content*0.774
    Calculated from C_content = polysaccharids*0.444+protein*0.535+lipids*0.774 and polysaccharids = 1-(protein+lipids+ash)
  property water in wet mass 0.182977 kg; name residues_WWM
  property dry mass 0.241111 kg; name residues_DM
  property price 0.062025 EUR2005; name residues_price_EUR2005
    Calculated value. According to Vázquez-Rowe et al. (2014) fish residues represent 15% of economics savings in relation to canned sardines. The price of canned sardines is here assumed to be 0.5USD per kg (source: alibaba.com, retrieved from: https://www.alibaba.com/showroom/canned-sardine-price.html, accessed 2March2018 & mysupermarket.co.uk, retrieved from: http://www.mysupermarket.co.uk/grocery-categories/Tinned_Sardines_in_Lidl.html, accessed 3AMrch 2018). We assume the price is calculated as 0.5USD/kg *0.15. The price is then converted in EUR.
    Vázquez-Rowe et al. (2014) Life cycle assessment of European pilchard (Sardina pilchardus) consumption. A case study for Galicia (NW Spain). Science of the Total Environment 475 (2014) 48–60
  property wet mass 0.424088 kg; name residues_WM
  property water content 0.758889; name residues_water_content
  property protein content 0.18; name residues_protein
    Average of 49 fish species, http://www.fao.org/wairdocs/tan/x5916e/x5916e01.htm
  property carbon content 0.47385
    carbon content on a dry matter basis (reserved; not for manual entry)
  property true value 39.696; name residues_true_value
    allocation property applied in "true value" allocation // value calculated from revenue
  properties: carbon allocation 0.11425 kg
- iron scrap, sorted, pressed: 0 kg; By-product classification Recyclable; CPC 39310: Slag, dross, scalings and other waste from the manufacture of iron or steel; pedigree (1,1,1,1,1)
  Iron scrap recovered from this waste.
  Uncertainty: uncertainty calculated from uncertainty in waste composition, uncertainty of share of recyclable metal, uncertainty of transfer coefficient to bottom ash, uncertainty of the efficiency of scrap removal in MSWI plant.
  production volume 7.54029e8 kg
  property price 0.175 EUR2005
    Temporary price data. Calculated as 90% of purchasers price based on: 2005 import and export prices (total trades (USD) divided by total weight (kg) in biggest economies of the world: EU27, USA, Brasil, China, India, Japan and Russia) from UN Commodity Trade Statistics Database (http://data.un.org/Explorer.aspxDatabase [Accessed 2011.06.20]). Commodity: Waste or scrap, of cast iron
  property carbon content 0
    carbon content on a dry matter basis (reserved; not for manual entry)
  property true value 45.6693
    allocation property applied in "true value" allocation // value calculated from revenue
  properties: water in wet mass 0 kg, dry mass 1 kg, carbon content, fossil 0, carbon content, non-fossil 0, wet mass 1 kg, water content 0, carbon allocation 0 kg
- zinc concentrate: 0 kg; CPC 14290: Other non-ferrous metal ores and concentrates (other than uranium or thorium ores and concentrates); By-product classification allocatable product
  Calculated value from the knowledge of the properties of both products.
  production volume 1667.13 kg
  property price 0.38 EUR2005; name ByP_price_EUR2005
    Temporary price data. Calculated as 90% of purchasers price based on: Zinc content in concentrate 53%. Concentrate price per kg Zn 86.5% of refined Zn price (13.5% treatment charges according to CHR Metals Limited 2005: Dynamic cost curves. http://www.minecost.com/dynamic.pdf). 2004 zinc price from USGS (2007) Mineral commodity summaries 2007. <http://minerals.usgs.gov/minerals/pubs/mcs/2007/mcs2007.pdf> [Accessed 25 May 2010]
  property zinc content 0.53; name zinc_C_zinc_concentrate
    Zinc content on a dry matter basis. Value taken from teh "zinc mine operation" /GLO dataset.
  property dry mass 1 kg; name DM_zinc_concentrate
  property carbon content 0
    carbon content on a dry matter basis (reserved; not for manual entry)
  property true value 9.38186e-5
    allocation property applied in "true value" allocation // value calculated from revenue
  properties: wet mass 1 kg, water content 0, carbon content, non-fossil 0, carbon content, fossil 0, water in wet mass 0 kg, carbon allocation 0 kg
- electricity, for reuse in municipal waste incineration only: 0 kWh; CPC 17100: Electrical energy; By-product classification allocatable product; pedigree (1,1,1,1,1)
  Net electricity generated from this waste and used in internal MSWI plant energy redistribution.
  Uncertainty: uncertainty is calculated from uncertainties in waste composition and uncertainties in energy efficiency and the uncertainty in internal energy demand
  production volume 4.5342e6 kWh
  property exergy 3.6 MJ; name E_el_prod_MSWI_exergy
    This exergy property is based on the exergy content of the product.
  property true value relation 3.6; name E_el_prod_MSWI_true_value_relation
    property to calculate "true value" from
  property price 0.1 EUR2005; name E_el_prod_MSWI_price_EUR2005
    Estimated to be the same price as in case of electricity, medium voltage.
  property true value 0.0335251
    allocation property applied in "true value" allocation // value calculated from true value relation
- heat, for reuse in municipal waste incineration only: 0 MJ; CPC 17300: Steam and hot water; By-product classification allocatable product; pedigree (1,1,1,1,1)
  Net useful heat generated from this waste and used in internal MSWI plant energy redistribution.
  Uncertainty: uncertainty is calculated from uncertainties in waste composition and uncertainties in energy efficiency and the uncertainty in internal energy demand
  production volume 3.18757e7 MJ
  property exergy 0.1842 MJ; name E_th_prod_MSWI_exergy
    This exergy property is based on the exergy content of the product.
  property true value relation 0.1842; name E_th_prod_MSWI_true_value_relation
    property to calculate "true value" from
  property price 0.0106 EUR2005; name E_th_prod_MSWI_price_EUR2005
    Average European district heat price from Ecoheatcool and Euroheat 2005-2006, Ecoheat Work package 1: The European heat market. Final report. 10.6 EUR/GJ i s the price of district heat. http://www.solarthermalworld.org/files/Ecoheatcool%20WP1%20Web.pdf?download
  property true value 0.0121896
    (same comment as for electricity, for reuse in municipal waste incineration only)
- waste polyethylene, for recycling, sorted: 0 kg; CPC 39270: Waste, parings and scrap of plastics; By-product classification Recyclable; pedigree (1,1,1,1,1)
  production volume 9.88177e7 kg
  property price 0.035 EUR2005
    Convert from EU 27 price to the world by currency exchange rate.
  property carbon content 0.829
    carbon content on a dry matter basis (reserved; not for manual entry)
  property true value 0.398654
    allocation property applied in "true value" allocation // value calculated from revenue
  properties: water content 0.00603622, water in wet mass 0.006 kg, dry mass 0.994 kg, wet mass 1 kg, carbon content, non-fossil 0, carbon content, fossil 0.829, carbon allocation 0.824026 kg
- iron scrap, unsorted: 0 kg; CPC 39310: Slag, dross, scalings and other waste from the manufacture of iron or steel; By-product classification Recyclable; pedigree (1,1,1,1,1)
  Not included in the original report. Added based on the CH inventory in order to have better consistency.;
  The amount and annual production volume for the recyclable by-product output 'iron scrap, sorted' was set to 0 during the review of the database for the release of v3.4. This is a temporary solution to ensure the appropriate point of cut-off for this product within the database. Original amount: 0.00619 kg/reference flow
  production volume 0.27651 kg
  property price 0.149 EUR2005
    Temporary price data. Calculated as 90% of purchasers price based on: estimated at 85% of sorted scrap
  property carbon content 0
    carbon content on a dry matter basis (reserved; not for manual entry)
  property true value 3.30932e-9
    allocation property applied in "true value" allocation // value calculated from revenue
  properties: carbon content, non-fossil 0, wet mass 1 kg, water content 0, carbon content, fossil 0, dry mass 1 kg, water in wet mass 0 kg, carbon allocation 0 kg
- aluminium oxide, non-metallurgical: 0 kg; source European Aluminium Association 2008; CPC 41432: Alumina (aluminium oxide), except artificial corundum; By-product classification allocatable product; CAS 1344-28-1; pedigree (1,1,1,1,1)
  production volume 17.3997 kg
  property carbon content, non-fossil 0; name C_content_non_fossil
  property price 0.28 EUR2005; name Al2O3Amount_price_EUR2005
    From UN trade database. http://data.un.org/ Import data from the largest economies of the world are used (Brazil, India, USA, China, Japan and EU-27).
  property dry mass 1 kg; name DM
  property water content 0; name water_content
  property wet mass 1 kg; name WM
  property water in wet mass 0 kg; name WWM
  property carbon content, fossil 0; name C_content_fossil
  property carbon content 0
    carbon content on a dry matter basis (reserved; not for manual entry)
  property true value 3.9133e-7
    allocation property applied in "true value" allocation // value calculated from revenue
  properties: carbon allocation 0 kg
- aluminium, cast alloy: 0 kg; source European Aluminium Association 2008; By-product classification allocatable product; CPC 41431: Unwrought aluminium; pedigree (1,1,1,1,1)
  EcoSpold01Location=RER
  production volume 162.649 kg
  property price 1.3 EUR2005; name castAlloyAmount_price_EUR2005
    Temporary price data. Calculated as 90% of purchasers price based on: Source: London Metal Exchange, Aluminium alloy price for 2005
  property carbon content 0
    carbon content on a dry matter basis (reserved; not for manual entry)
  property true value 1.69839e-5
    allocation property applied in "true value" allocation // value calculated from revenue
  properties: water in wet mass 0 kg, carbon content, non-fossil 0, water content 0, dry mass 1 kg, carbon content, fossil 0, wet mass 1 kg, carbon allocation 0 kg
- aluminium, wrought alloy: 0 kg; source European Aluminium Association 2008; By-product classification allocatable product; CPC 4153: Semi-finished products of aluminium or aluminium alloys; pedigree (1,1,1,1,1)
  production volume 71.2046 kg
  property price 1.44 EUR2005; name secondaryAluminiumOutput_price_EUR2005
    Estimated based on literature values and expert judgement. Aluminium ccast alloys are about 90% of the price of aluminium wrought alloys.
  property carbon content 0
    carbon content on a dry matter basis (reserved; not for manual entry)
  property true value 8.23593e-6
    allocation property applied in "true value" allocation // value calculated from revenue
  properties: wet mass 1 kg, water content 0, carbon content, fossil 0, water in wet mass 0 kg, carbon content, non-fossil 0, dry mass 1 kg, carbon allocation 0 kg
- copper: 0 kg; source Rentz O. 1999; By-product classification allocatable product; CPC 41413: Refined copper and copper alloys, unwrought; master alloys of copper
  Literature value. Copper uses: Before end-use copper is manufactured into semi fabricated products, such as shapes and ingots (known as 'semis'). These manufacturing processes are subdivided into hot working, cold working and, if necessary, process annealing. Few of the semis are ready for use as such. They more typically travel to first-stage manufacturers, who make metal rods, wire, and casting, and then to component manufacturers who produce such things as motors, valves, and insulated cables The components in turn are incorporated by final-stage manufacturers into a variety of finished products - automobiles, commercial buildings, residential housing, and so forth. These uses account for about 79% of the world-wide consumption of copper.
  production volume 309.349 kg
  property price 5.52 EUR2005
    Literature value (http://www.economist.com/news/business/21576714-mining-industry-has-enriched-chile-its-future-precarious-copper-solution). Average price between 20015 and 2013.
  property carbon content 0
    carbon content on a dry matter basis (reserved; not for manual entry)
  property true value 0.000137161
    allocation property applied in "true value" allocation // value calculated from revenue
  properties: dry mass 1 kg, water in wet mass 0 kg, wet mass 1 kg, carbon content, non-fossil 0, water content 0, carbon content, fossil 0, carbon allocation 0 kg

## Inputs from technosphere
- polyethylene, low density, granulate: 0.0108309 kg; name film; source Angel Avadí 2015; triangular min 0.0108309, mostLikely 0.0108309, max 0.0108309, pedigree (2,3,3,5,1)
  Plastic film
  Uncertainty: Data from 1 plant, assumptions for larger plants
  properties: wet mass 1 kg, dry mass 1 kg, carbon content, fossil 0.857143
- metal working, average for chromium steel product manufacturing: 0.0256195 kg; source Angel Avadí 2015
  Tinplate can
- fish canning plant: 5.93782e-10 unit; = ((production+residues)/1000)/(capacity*lifetime); source Angel Avadí 2015
  One unit of plant represents the installed capacity required to process 1 t of raw material
  property lifetime 40 year; name lifetime
  property capacity [kg] 61000 kg; name capacity
- vegetable oil, refined: 0.23676 kg; source Angel Avadí 2015; triangular min 0.23676, mostLikely 0.23676, max 0.23676, pedigree (2,3,3,5,1)
  Oil for canned fish
  Uncertainty: Data from 1 plant, assumptions for larger plants
  properties: wet mass 1 kg, dry mass 1 kg, carbon content, non-fossil 0.768
- carton board box production, with offset printing: 0.0596405 kg; source Angel Avadí 2015; triangular min 0.0596405, mostLikely 0.0596405, max 0.0596405, pedigree (2,3,3,5,1)
  Cardboard boxes
  Uncertainty: Data from 1 plant, assumptions for larger plants
- electricity, medium voltage: 0 kWh; source Angel Avadí 2015; pedigree (1,1,1,1,1)
  Electricity use for all production phases from reception/cold storage to final product
  Uncertainty: Data from 1 plant, assumptions for larger plants
- tin plated chromium steel sheet, 2 mm: 0.0256195 m2; name tinplate_can; source Angel Avadí 2015; triangular min 0.0256195, mostLikely 0.0256195, max 0.0256195, pedigree (2,3,3,5,1)
  Tinplate can
  Uncertainty: Data from 1 plant, assumptions for larger plants
  properties: dry mass 15.6365 kg, wet mass 15.6365 kg
- extrusion of plastic sheets and thermoforming, inline: 0.00026503 kg; source Angel Avadí 2015
  Plastic boxes
- extrusion, plastic film: 0.0108309 kg; source Angel Avadí 2015
  Plastic film
- scrap tin sheet: -0.399665 kg; = (tinplate_can*15.6)*-1; source Avadí, A. 2018
  Waste tinplate cans (sheet use times weight of each sheet)
  production volume 1.30713e9 kg; = prod_vol * ((Ref('b9eec358-5c73-4bb9-8b44-fce9e77c377d')*-1) / production)
    Calculated from production volume of reference product using the relative outputs.
  properties: dry mass 1 kg, wet mass 1 kg
- polyethylene, high density, granulate: 0.00026503 kg; name plastic; source Angel Avadí 2015; triangular min 0.00026503, mostLikely 0.00026503, max 0.00026503, pedigree (2,3,3,5,1)
  Plastic boxes
  Uncertainty: Data from 1 plant, assumptions for larger plants
  properties: carbon content, fossil 0.857143, wet mass 1 kg, dry mass 1 kg
  note on carbon content, fossil: Polyethylene is formed out of a huge amount of ethylene monomers (C2H4) (ecoinvent v2.2 report 11_II). MW=28 g/mol
- water, completely softened: 0 kg; name water; source Angel Avadí 2015; pedigree (1,1,1,1,1)
  Soft water for process
  Uncertainty: Data from 1 plant, assumptions for larger plants
  properties: wet mass 1 kg
- waste polyethylene, for recycling, unsorted: 0 kg; source Avadí, A. 2018
  Waste PET from crates and packaging
  production volume 0 kg
    Calculated from production volume of reference product using the relative outputs.
  properties: price 0.0315 EUR2005
- heat, district or industrial, other than natural gas: 0 MJ; source Angel Avadí 2015; pedigree (1,1,1,1,1)
  Industrial heat for cooking/sterilisation
  Uncertainty: Data from 1 plant, assumptions for larger plants
  properties: corresponding fuel use, propane, furnace >100kW 1.05263 MJ
  note on corresponding fuel use, propane, furnace >100kW: Lower heating value of the fuel input related to the heat/electricity output, taken directly from ecoinvent v3.0 dataset "heat production, natural gas, at industrial furnace >100kW, GLO 2000".
- wastewater from vegetable oil refinery: -0.10168 m3; = ((water*.6)/1000)*-1; source Avadí, A. 2018
  Proxy for wastewater from fish processing plant. Asumed 40% of the water is either incorporated into the product or lost
  production volume 3.32551e8 m3; = prod_vol * ((Ref('8d06b6b2-9e23-4553-8fc5-3be4343cbf4d')*-1) / production)
    Calculated from production volume of reference product using the relative outputs.
  properties: carbon content, non-fossil 0.8, wet mass 1000 kg, water content 1146.05, dry mass 0.871801 kg
  note on carbon content, non-fossil: Estimated load for fish processing plant cleansing wastewater. The loading of fish processing wastewater is mainly organic (http://www.dfo-mpo.gc.ca/Library/273700.pdf)
- sodium chloride, powder: 0.00441716 kg; source Angel Avadí 2015; triangular min 0.00441716, mostLikely 0.00441716, max 0.00441716, pedigree (2,3,3,5,1)
  Salt for brine
  Uncertainty: Data from 1 plant, assumptions for larger plants
  properties: dry mass 1 kg, wet mass 1 kg
- electricity, medium voltage: 0.00151388 kWh; source Angel Avadí 2015; triangular min 0.00151388, mostLikely 0.00151388, max 0.00151388, pedigree (2,3,3,5,1)
  (same comment as for electricity, medium voltage)
- electricity, medium voltage: 0.000750293 kWh; source Angel Avadí 2015; triangular min 0.000750293, mostLikely 0.000750293, max 0.000750293, pedigree (2,3,3,5,1)
  (same comment as for electricity, medium voltage)
- electricity, medium voltage: 0.000535571 kWh; source Angel Avadí 2015; triangular min 0.000535571, mostLikely 0.000535571, max 0.000535571, pedigree (2,3,3,5,1)
  (same comment as for electricity, medium voltage)
- electricity, medium voltage: 0.00710355 kWh; source Angel Avadí 2015; triangular min 0.00710355, mostLikely 0.00710355, max 0.00710355, pedigree (2,3,3,5,1)
  (same comment as for electricity, medium voltage)
- electricity, medium voltage: 0.00253801 kWh; source Angel Avadí 2015; triangular min 0.00253801, mostLikely 0.00253801, max 0.00253801, pedigree (2,3,3,5,1)
  (same comment as for electricity, medium voltage)
- electricity, medium voltage: 9.57124e-5 kWh; source Angel Avadí 2015; triangular min 9.57124e-5, mostLikely 9.57124e-5, max 9.57124e-5, pedigree (2,3,3,5,1)
  (same comment as for electricity, medium voltage)
- electricity, medium voltage: 0.000785694 kWh; source Angel Avadí 2015; triangular min 0.000785694, mostLikely 0.000785694, max 0.000785694, pedigree (2,3,3,5,1)
  (same comment as for electricity, medium voltage)
- electricity, medium voltage: 0.00011999 kWh; source Angel Avadí 2015; triangular min 0.00011999, mostLikely 0.00011999, max 0.00011999, pedigree (2,3,3,5,1)
  (same comment as for electricity, medium voltage)
- electricity, medium voltage: 0.00019899 kWh; source Angel Avadí 2015; triangular min 0.00019899, mostLikely 0.00019899, max 0.00019899, pedigree (2,3,3,5,1)
  (same comment as for electricity, medium voltage)
- electricity, medium voltage: 3.99731e-6 kWh; source Angel Avadí 2015; triangular min 3.99731e-6, mostLikely 3.99731e-6, max 3.99731e-6, pedigree (2,3,3,5,1)
  (same comment as for electricity, medium voltage)
- electricity, medium voltage: 0.000162253 kWh; source Angel Avadí 2015; triangular min 0.000162253, mostLikely 0.000162253, max 0.000162253, pedigree (2,3,3,5,1)
  (same comment as for electricity, medium voltage)
- electricity, medium voltage: 0.000113867 kWh; source Angel Avadí 2015; triangular min 0.000113867, mostLikely 0.000113867, max 0.000113867, pedigree (2,3,3,5,1)
  (same comment as for electricity, medium voltage)
- electricity, medium voltage: 7.72466e-5 kWh; source Angel Avadí 2015; triangular min 7.72466e-5, mostLikely 7.72466e-5, max 7.72466e-5, pedigree (2,3,3,5,1)
  (same comment as for electricity, medium voltage)
- electricity, medium voltage: 6.95439e-6 kWh; source Angel Avadí 2015; triangular min 6.95439e-6, mostLikely 6.95439e-6, max 6.95439e-6, pedigree (2,3,3,5,1)
  (same comment as for electricity, medium voltage)
- electricity, medium voltage: 2.34497e-5 kWh; source Angel Avadí 2015; triangular min 2.34497e-5, mostLikely 2.34497e-5, max 2.34497e-5, pedigree (2,3,3,5,1)
  (same comment as for electricity, medium voltage)
- electricity, medium voltage: 0.00286202 kWh; source Angel Avadí 2015; triangular min 0.00286202, mostLikely 0.00286202, max 0.00286202, pedigree (2,3,3,5,1)
  (same comment as for electricity, medium voltage)
- electricity, medium voltage: 4.19957e-5 kWh; source Angel Avadí 2015; triangular min 4.19957e-5, mostLikely 4.19957e-5, max 4.19957e-5, pedigree (2,3,3,5,1)
  (same comment as for electricity, medium voltage)
- electricity, medium voltage: 0.00046181 kWh; source Angel Avadí 2015; triangular min 0.00046181, mostLikely 0.00046181, max 0.00046181, pedigree (2,3,3,5,1)
  (same comment as for electricity, medium voltage)
- electricity, medium voltage: 0.000111205 kWh; source Angel Avadí 2015; triangular min 0.000111205, mostLikely 0.000111205, max 0.000111205, pedigree (2,3,3,5,1)
  (same comment as for electricity, medium voltage)
- electricity, medium voltage: 0.000152591 kWh; source Angel Avadí 2015; triangular min 0.000152591, mostLikely 0.000152591, max 0.000152591, pedigree (2,3,3,5,1)
  (same comment as for electricity, medium voltage)
- electricity, medium voltage: 0.0106599 kWh; source Angel Avadí 2015; triangular min 0.0106599, mostLikely 0.0106599, max 0.0106599, pedigree (2,3,3,5,1)
  (same comment as for electricity, medium voltage)
- electricity, medium voltage: 6.59366e-5 kWh; source Angel Avadí 2015; triangular min 6.59366e-5, mostLikely 6.59366e-5, max 6.59366e-5, pedigree (2,3,3,5,1)
  (same comment as for electricity, medium voltage)
- electricity, medium voltage: 0.000116417 kWh; source Angel Avadí 2015; triangular min 0.000116417, mostLikely 0.000116417, max 0.000116417, pedigree (2,3,3,5,1)
  (same comment as for electricity, medium voltage)
- electricity, medium voltage: 0.000117348 kWh; source Angel Avadí 2015; triangular min 0.000117348, mostLikely 0.000117348, max 0.000117348, pedigree (2,3,3,5,1)
  (same comment as for electricity, medium voltage)
- electricity, medium voltage: 0.0010611 kWh; source Angel Avadí 2015; triangular min 0.0010611, mostLikely 0.0010611, max 0.0010611, pedigree (2,3,3,5,1)
  (same comment as for electricity, medium voltage)
- electricity, medium voltage: 0.0078316 kWh; source Angel Avadí 2015; triangular min 0.0078316, mostLikely 0.0078316, max 0.0078316, pedigree (2,3,3,5,1)
  (same comment as for electricity, medium voltage)
- electricity, medium voltage: 0.11355 kWh; source Angel Avadí 2015; triangular min 0.11355, mostLikely 0.11355, max 0.11355, pedigree (2,3,3,5,1)
  (same comment as for electricity, medium voltage)
- electricity, medium voltage: 0.0368702 kWh; source Angel Avadí 2015; triangular min 0.0368702, mostLikely 0.0368702, max 0.0368702, pedigree (2,3,3,5,1)
  (same comment as for electricity, medium voltage)
- electricity, medium voltage: 0.0532454 kWh; source Angel Avadí 2015; triangular min 0.0532454, mostLikely 0.0532454, max 0.0532454, pedigree (2,3,3,5,1)
  (same comment as for electricity, medium voltage)
- water, completely softened: 70.8678 kg; source Angel Avadí 2015; triangular min 70.8678, mostLikely 70.8678, max 70.8678, pedigree (2,3,3,5,1)
  Soft water for process
  Uncertainty: Data from 1 plant, assumptions for larger plants
- water, completely softened: 98.5984 kg; source Angel Avadí 2015; triangular min 98.5984, mostLikely 98.5984, max 98.5984, pedigree (2,3,3,5,1)
  Soft water for process
  Uncertainty: Data from 1 plant, assumptions for larger plants
- waste polyethylene, for recycling, unsorted: -2.55666e-5, -0.00849519, -0.00257515 kg (3 entries); source Avadí, A. 2018
  Waste PET from crates and packaging
  production volume 3.629e7 kg
- heat, district or industrial, other than natural gas: 0.0417086 MJ; source Angel Avadí 2015; triangular min 0.0417086, mostLikely 0.0417086, max 0.0417086, pedigree (2,3,3,5,1)
  (same comment as for heat, district or industrial, other than natural gas)
- heat, district or industrial, other than natural gas: 2.49993 MJ; source Angel Avadí 2015; triangular min 2.49993, mostLikely 2.49993, max 2.49993, pedigree (2,3,3,5,1)
  (same comment as for heat, district or industrial, other than natural gas)

## Emissions to nature
- BOD5, Biological Oxygen Demand [water, unspecified]: 6.89077e-5 kg; source Angel Avadí 2015; triangular min 6.89077e-5, mostLikely 6.89077e-5, max 6.89077e-5, pedigree (2,3,3,5,1)
  Emissions to water from process waters
  Uncertainty: Data from 1 plant, assumptions for larger plants
- TOC, Total Organic Carbon [water, unspecified]: 0.000109546 kg; name TOC; source Angel Avadí 2015; triangular min 0.000109546, mostLikely 0.000109546, max 0.000109546, pedigree (2,3,3,5,1)
  (same comment as for BOD5, Biological Oxygen Demand)
- COD, Chemical Oxygen Demand [water, unspecified]: 0.000429348 kg; source Angel Avadí 2015; triangular min 0.000429348, mostLikely 0.000429348, max 0.000429348, pedigree (2,3,3,5,1)
  (same comment as for BOD5, Biological Oxygen Demand)
- DOC, Dissolved Organic Carbon [water, unspecified]: 0.000109546 kg; source Angel Avadí 2015
  Emissions to water from process waters

## Sampling procedure
Data from 1 canning plant, opperated by the largest fish processing company in the country. This plant is representative of the current technology and managemen.
As of 2014 there were 27 active tuna canning plants, with an aggregated processing capacity of 671 400 t/y.

## Extrapolations
Data from tuna canning were assumed to represent the canning of other large fish
