# propane extraction, from liquefied petroleum gas

Dataset: EcoSpold 2, unit process
Geography: GLO
Time period: 2005-01-01 to 2019-12-31
Technology level: current
Classification: ISIC rev.4 ecoinvent: 2011:Manufacture of basic chemicals
Synonyms: LPG
Scenario: Business-as-Usual
System model: Allocation at the point of substitution
Generated by: Sofia Parada Tur
Database: ecoinvent
isCopyrightProtected: true
accessRestrictedTo: 1

## General comment
In the present inventory, propane is extracted from Liquified Petroleum Gas.
The composition of LPG varies. According to Ullmann’s Encyclopedia on average LPG contains (percentage by volume) 60% - 85% of propane, 14% - 38% of butane and 0% - 6% of pentane and other gases (such as isopentane, cyclopentane, ethylene and others). The process efficiency is app. 75%. In the modeling it is assumed that the mixed gases which were not separated during the process (25% of the volume of LPG entering the process) are burned and used for electricity production within the boundaries of this activity. The model is built in such a way, that if the amount of electricity produced within the boundaries of this activity is not sufficient, additional electricity will be required from the technosphere.

## Included activities start
The activity starts with LPG entering the Fractionator.

## Included activities end
The activity ends when separated propane leaves the depropanizer. Energy use, cooling water and steem use are included.

## Technology
As seen in the sketch below, the fractionation of LPG is made out of following sub-technologies; fractionator, overhead accumulator vessel, compressor, chiller, separator, deethaniser and depropaniser. The present inventory deals with the production of propane, therefore considers the depropaniser step. This technology presents basic LPG fractionation. More advanced technologies (with bigger efficiency of LPG recovery) are being used.

## Time period
Reference year of production volumes

## Parameters
- fraction of cooling water which evaporates to air, recirculating cooling system: 0.771; name fraction_CW_R_to_air; lognormal variance with pedigree 0.092025, pedigree (4,4,3,2,4)
  Calculated based on literature value (Scown, C.D., 2011, Water Footprint of U.S. Transportation Fuels and supplying information of the article) (Vionnet, S., Quantis Water Database - Technical Report, 2012).
- fraction of cooling water which evaporates to air, once-through cooling system: 0.004; name fraction_CW_OT_to_air; lognormal variance with pedigree 0.092025, pedigree (4,4,3,2,4)
  (same comment as for fraction of cooling water which evaporates to air, recirculating cooli)
- fraction of propane in LPG: 0.725 dimensionless; name fraction_of_propane_in_LPG; = (0.6+0.85)/2; lognormal variance with pedigree 0.0108, pedigree (4,1,2,5,1)
  Calculated average (min.= 60%, max.= 85%) based on literature value (Ullmann's Encyclopedia).
- fraction of cooling water which evaporates to air: 0.3875; name fraction_CW_to_air; = (0.5*fraction_CW_OT_to_air)+(0.5*fraction_CW_R_to_air); lognormal variance with pedigree 0.092025, pedigree (4,4,3,2,4)
  fraction of cooling water which evaporates to air, i.e. is consumed
- fraction of butane in LPG: 0.26 dimensionless; name fraction_of_butane_in_LPG; = (0.14+0.38)/2; lognormal variance with pedigree 0.0108, pedigree (4,1,2,5,1)
  Calculated average (min.= 14%, max.= 38%) based on literature value (Ullmann's Encyclopedia).
- technology efficiency: 0.75 dimensionless; name technology_efficiency; lognormal variance with pedigree 0.0188, pedigree (4,5,2,5,1)
  Literature value (Ullmann's Encyclopedia)

## Reference product
- propane: 1 kg; name propane_RP; = 1* technology_efficiency; source Ullmann 2010; CPC 33410: Propane and butanes, liquefied; By-product classification allocatable product; CAS 74-98-6
  Calculated value. Based on 1 kg of propane produced with a technology efficiency of 75%.
  production volume 4.56995e10 kg; name propane_PV; = 18063036000*propane_RP_density*5
    Estimated based on literature value from the U.S. Energy Information Administration (http://www.eia.gov/dnav/pet/pet_pnp_refp2_a_epllban_ypy_mbbl_a.htm). 1.8E+10 l of net propane were produced in the US in 2005. The production volume in the whole world is extrapolated from the US data using difference in GDP (world:US=5).
  property heating value, net 45.0626 MJ; name propane_RP_Net_Heat_Value; = propane_RP_Gross_Heat_Value-(propane_RP_Gross_Heat_Value*0.099)
    Calculated value based on literature data (http://hypertextbook.com/facts/2002/EricLeung.shtml). The net (lower) heating (calorific) value of butane is approximately 9.9% lower the the gross (upper) heating (calorific) value.
  property density 0.506 kg/l; name propane_RP_density
    Literature value (Ullmann's Encyclopedia), density of liquid propane at saturation pressure; 15.6°C.
  property heating value, gross 50.014 MJ; name propane_RP_Gross_Heat_Value; = 50014/1000
    Literature value (Ullmann's Encyclopedia), gross (upper) heating (calorific) value.
  property price 0.267 EUR2005; name propane_RP_price_EUR2005
    2.O - Average import and export prices (total trades (USD) divided by total weight (kg) in EU27, USA, China, Japan and India) from UN data - Average of Propane and butane (http://data.un.org/Data.aspx?q=Butanes+&d=ComTrade&f=_l1Code%3a28%3bcmdCode%3a271113 and http://data.un.org/Data.aspx?q=propane&d=ComTrade&f=_l1Code%3a28%3bcmdCode%3a271112; accessed 1 June 10).
  property carbon content 0.272379
    carbon content on a dry matter basis (reserved; not for manual entry)
  property true value 0.20025; name propane_RP_true_value
    allocation property applied in "true value" allocation // value calculated from revenue
  properties: carbon content, fossil 0.272379, water content 0, dry mass 1 kg, water in wet mass 0 kg, wet mass 1 kg, carbon content, non-fossil 0, carbon allocation 0.272379 kg

## By-products
- heat, central or small-scale, natural gas: 0 MJ; name heat; = fraction_of_propane_in_LPG*(1-technology_efficiency)* 0.506* 45.063; source Ullmann 2010; CPC 17300: Steam and hot water; By-product classification allocatable product; pedigree (1,1,1,1,1)
  Calculated based on literature values (Ullmanns' Encyclopedia and Refining Processes Handbook 2008, www.hydrocarbonprocessing.com). The amount of mixed gasses which is not separated during the process (25% of the LPG on the input) is burned and used for electricity production. The composition of LPG on the input is considered to be by volume; 72.5% propane, 26% butane and 1.5% other gases, such as pentane (considered to be representative for all the other gases).
  production volume 2.51825e11 MJ; = heat*propane_PV/propane_RP
    Calculated from production volume of reference product using the relative outputs.
  property price 0.01 EUR2005; name heat_price_EUR2005
  property true value 0.0413284; name heat_true_value

## Inputs from technosphere
- steam, in chemical industry: 0 kg; source Hydrocarbon Processing 2008; pedigree (1,1,1,1,1)
  Estimated based on literature value. The amount of steam of 0.7733 kg/kg is estimated based on literature value (Refining Processes Handbook 2008, www.hydrocarbonprocessing.com) on similar processes.
  properties: wet mass 1 kg, dry mass 1 kg
- liquefied petroleum gas: 0.828923 kg; name LPG_input; = 1* technology_efficiency; source Hydrocarbon Processing 2008; lognormal variance with pedigree 0.0492, pedigree (4,3,5,1,1)
  Mass balanced. In order to keep mass balance, the input of LPG is equal to the output of propane and gases that leave the system as heat. LPG has 72.5% of propane.
  property density 0.526325 kg/l; name LPG_input_density; = ((0.583* fraction_of_butane_in_LPG)+(0.506* fraction_of_propane_in_LPG))/( fraction_of_butane_in_LPG+fraction_of_propane_in_LPG)
  properties: wet mass 1 kg, dry mass 1 kg, carbon content, fossil 0.821863
  note on density: Calculated value as a waited average of butane density (0.5788 kg/l) and propane density (0.5005 kg/l). Assumed to be present in the LPG in the ratio butane 26%: propane 72.5%.
- heat, central or small-scale, natural gas: 0.301645 MJ; = 0.3639*propane_RP; source Hydrocarbon Processing 2008; lognormal variance with pedigree 0.0492, pedigree (4,3,5,1,1)
  Estimated based on literature value. The amount of energy of 0.3639 MJ/kg is estimated based on literature value (Refining Processes Handbook 2008, www.hydrocarbonprocessing.com) on similar processes.
- steam, in chemical industry: 0.0960777, 0.544929 kg (2 entries); source Hydrocarbon Processing 2008; lognormal variance with pedigree 0.0492, pedigree (4,3,5,1,1)
  (same comment as for steam, in chemical industry)

## Inputs from nature
- Water, cooling, unspecified natural origin [natural resource, in water]: 3.73016e-5 m3; name water_cooling_UNO_input; = propane_RP*0.000045; source Hydrocarbon Processing 2008; lognormal variance with pedigree 0.0492, pedigree (4,3,5,1,1)
  Estimated based on literature value. The amount of cooling water of 4.5+E-5 m3/kg is estimated based on literature value (Refining Processes Handbook 2008, www.hydrocarbonprocessing.com) on similar processes.

## Emissions to nature
- Water [water, unspecified]: 2.28472e-5 m3; name water_to_water_unspecified; = water_cooling_UNO_input*(1-fraction_CW_to_air); lognormal variance with pedigree 0.0807, pedigree (2,2,5,1,1)
  Calculated value based on literature values and expert opinion. See comments in the parametres' comment field.
- Water [air, unspecified]: 1.44544e-5 m3; name water_to_air_unspecified; = water_cooling_UNO_input*fraction_CW_to_air; lognormal variance with pedigree 0.0807, pedigree (2,2,5,1,1)
  (same comment as for Water)
  property water in wet mass 1 kg; name WWM
  property wet mass 1 kg; name WM

## Extrapolations
Production volumes are extrapolated from the US values using the difference in GDP.
