# sawnwood production, softwood, dried (u=20%), planed

Dataset: EcoSpold 2, unit process
Geography: RER
Time period: 2014-01-01 to 2019-12-31
Technology level: current
Classification: EcoSpold01Categories: wooden materials/extraction
Classification: ISIC rev.4 ecoinvent: 1610:Sawmilling and planing of wood
Scenario: Business-as-Usual
System model: Allocation at the point of substitution
Generated by: Emilia Moreno Ruiz
Database: ecoinvent
isCopyrightProtected: false
accessRestrictedTo: 1

## General comment
[Dataset to be replaced by 'sawnwood production, softwood, dried (u=20%), planed, CH, 2014 - 2014']
[Dataset to be replaced by 'sawnwood production, softwood, dried (u=20%), planed, Europe without Switzerland, 2014 - 2014']

## Included activities start
Entry of the specific products issued of the planing activity

## Included activities end
Delivery of the generic planed product

## Reference product
- sawnwood, softwood, dried (u=20%), planed: 1 m3; CPC 31101: Wood, sawn or chipped lengthwise, sliced or peeled, of a thickness exceeding 6 mm, of coniferous wood; By-product classification allocatable product
  production volume 1.53258e6 m3; = 0.287*5.34E+06
    50% of the Production Volume issued from the planing has been made accesible as this generic product.
    The Production Volumes have been downscaled from GLO to RER using the relative GDP values 2011 (source: United Nations, <http://data.un.org/Glossary.aspx?q=GDP+%28current+US%24%29>, accessed 20130726).
  property price 151 EUR2005
    Temporary price data. Calculated as 90% of purchasers price based on: 2004 export prices for the World+ according to: http://faostat.fao.org/site/626/DesktopDefault.aspx?PageID=626#ancor downloaded 28 April 2009; calculated as export value divided by export volume.
  property carbon content 0.494
    carbon content on a dry matter basis (reserved; not for manual entry)
  properties: wet mass 540 kg, carbon content, non-fossil 0.494, water content 0.2, carbon content, fossil 0, water in wet mass 90 kg, dry mass 450 kg, carbon allocation 222.3 kg

## Inputs from technosphere
- sawnwood, beam, softwood, dried (u=20%), planed: 0.333333 m3; = 1/3; lognormal variance with pedigree 0.0026, pedigree (1,1,3,1,1)
  The input share has been calculated using data from the planing activity
  properties: wet mass 464.64 kg, water content 0.2, carbon content, non-fossil 0.494, dry mass 387.2 kg
- sawnwood, board, softwood, dried (u=20%), planed: 0.333333 m3; = 1/3; lognormal variance with pedigree 0.0026, pedigree (1,1,3,1,1)
  The input share has been calculated using data from the planing activity
  properties: water content 0.2, dry mass 387.2 kg, carbon content, non-fossil 0.494, wet mass 464.64 kg
- sawnwood, lath, softwood, dried (u=20%), planed: 0.333333 m3; = 1/3; lognormal variance with pedigree 0.0026, pedigree (1,1,3,1,1)
  The input share has been calculated using data from the planing activity
  properties: wet mass 485.76 kg, carbon content, non-fossil 0.494, dry mass 404.8 kg, water content 0.2

## Extrapolations
This dataset has been extrapolated from year 2014 to the year of the calculation (2019). The uncertainty has been adjusted accordingly.
