# locomotive production

Dataset: EcoSpold 2, unit process
Geography: RER
Time period: 1993-01-01 to 2019-12-31
Technology level: current
Classification: ISIC rev.4 ecoinvent: 3020:Manufacture of railway locomotives and rolling stock
Classification: EcoSpold01Categories: transport systems/train
Scenario: Business-as-Usual
System model: Allocation at the point of substitution
Generated by: Michael Spielmann (obsolete)
Published in: Spielmann M. 2007
Database: ecoinvent
isCopyrightProtected: true
accessRestrictedTo: 1

## General comment
The dataset represents the production of a locomotive used for rail transportation with a life span assumed to be 40 years. The disposal of the locomotive is included as well.

## Included activities start
Service starts with the material consumption and expenditure for the production of the locomotive.

## Included activities end
The dataset ends with the production and disposal of one locomotive. The dataset includes material consumption, transport, energy and fuel consumption and disposal.

## Geography
Manufacturing data represents a locomotive produced in Germany
.

## Technology
The environmental interventions of the locomotive manufacturing are derived from an assessment of the “RE 460”. The “Re 460” is a locomotive which currently is used for both rail and passenger transportation in Switzerland. The life span of the locomotive “Re 460” is assumed to be 40 years resulting in a lifetime performance of 9.6 Mio. Kilometres Frischknecht et al. (1996). Expenditures due to vehicle manufacturing are limited to energy consumption (electricity and light fuel oil, including administration).
References:
Frischknecht R., Bollens U., Bosshart S., Ciot M., Ciseri L., Doka G., Dones R., Gantner U. and Hischier R. (1996) Ökoinventare von Energiesystemen: Grundlagen für den ökologischen Vergleich von Energiesystemen und den Einbezug von Energiesystemen in Ökobilanzen für die Schweiz. Auflage No. 3. Gruppe Energie - Stoffe - Umwelt (ESU), Eidgenössische Technische Hochschule Zuerich und Sektion Ganzheitliche Systemanalysen, Paul Scherrer Institut, Villigen, Bundesamt für Energie (Hrsg.), Bern

## Time period
The energy data represents conditions in 2001. For some materials data from 1993 has been employed.

## Reference product
- locomotive: 1 unit; By-product classification allocatable product; CPC 4951: Rail locomotives and locomotive tenders
  EcoSpold01Location=RER
  production volume 1.32237 unit
    This is a placeholder value that does not reflect real-world production volumes. This dataset does not currently require a real-world production volume to work in the database framework, and no actual data were collected yet. This has no negative effect on the results of the ecoinvent database. The placeholder value of this activity was scaled according to the nominal GDP of 2005 (source: United Nations, http://data.un.org/Glossary.aspx?q=GDP+%28current+US%24%29, accessed 20130726) to reflect an appropriate share of the global production volume, which is also a placeholder value.
  property price 244972 EUR2005
    UNdata (Average Import/Export prices for EU27; 4.808 EUR/kg) http://data.un.org/Data.aspx?q=locomotives&d=ComTrade&f=_l1Code%3a86 (Rail locomotives, diesel-electric). The weight of locomotive is 84t (Source: Existing ecoinvent documentation from ecoinvent v.2.2. From information in the dataset locomotive.)
  property true value 244972
    allocation property applied in "true value" allocation // value calculated from revenue

## By-products
- heat, for reuse in municipal waste incineration only: 0 MJ; CPC 17300: Steam and hot water; By-product classification allocatable product; pedigree (1,1,1,1,1)
  Net electricity generated from this waste and used in internal MSWI plant energy redistribution.
  production volume 4712.91 MJ
  property true value relation 0.1842; name E_th_prod_MSWI_true_value_relation
    property to calculate 'true value' from
  property exergy 0.1842 MJ; name E_th_prod_MSWI_exergy
    This exergy property is based on the exergy content of the product.
  property price 0.0106 EUR2005; name E_th_prod_MSWI_price_EUR2005
    Average European district heat price from Ecoheatcool and Euroheat 2005-2006, Ecoheat Work package 1: The European heat market. Final report. 10.6 EUR/GJ i s the price of district heat. http://www.solarthermalworld.org/files/Ecoheatcool%20WP1%20Web.pdf?download
  property true value 23.4614
    allocation property applied in "true value" allocation // value calculated from true value relation
- electricity, for reuse in municipal waste incineration only: 0 kWh; CPC 17100: Electrical energy; By-product classification allocatable product; pedigree (1,1,1,1,1)
  (same comment as for heat, for reuse in municipal waste incineration only)
  production volume 660.669 kWh
  property price 0.1 EUR2005; name E_el_prod_MSWI_price_EUR2005
    Estimated to be the same price as in case of electricity, medium voltage.
  property exergy 3.6 MJ; name E_el_prod_MSWI_exergy
    This exergy property is based on the exergy content of the product.
  property true value relation 3.6; name E_el_prod_MSWI_true_value_relation
    property to calculate 'true value' from
  property true value 64.2779
    (same comment as for heat, for reuse in municipal waste incineration only)
- zinc concentrate: 0 kg; CPC 14290: Other non-ferrous metal ores and concentrates (other than uranium or thorium ores and concentrates); By-product classification allocatable product
  Calculated value from the knowledge of the properties of both products.
  production volume 6.57027e-5 kg
  property price 0.38 EUR2005; name ByP_price_EUR2005
    Temporary price data. Calculated as 90% of purchasers price based on: Zinc content in concentrate 53%. Concentrate price per kg Zn 86.5% of refined Zn price (13.5% treatment charges according to CHR Metals Limited 2005: Dynamic cost curves. http://www.minecost.com/dynamic.pdf). 2004 zinc price from USGS (2007) Mineral commodity summaries 2007. <http://minerals.usgs.gov/minerals/pubs/mcs/2007/mcs2007.pdf> [Accessed 25 May 2010]
  property zinc content 0.53; name zinc_C_zinc_concentrate
    Zinc content on a dry matter basis. Value taken from teh "zinc mine operation" /GLO dataset.
  property dry mass 1 kg; name DM_zinc_concentrate
  property carbon content 0
    carbon content on a dry matter basis (reserved; not for manual entry)
  property true value 1.88805e-5
    allocation property applied in "true value" allocation // value calculated from revenue
  properties: wet mass 1 kg, water content 0, carbon content, non-fossil 0, carbon content, fossil 0, water in wet mass 0 kg, carbon allocation 0 kg

## Inputs from technosphere
- alkyd paint, white, without solvent, in 60% solution state: 384.862 kg; source Elsener J. 1993; lognormal variance with pedigree 0.0586, pedigree (4,3,5,1,1)
  EcoSpold01Location=RER
  Calculated value. The data is based on Elsener & Strub (1993).
  Uncertainty: oral communication
  properties: wet mass 1 kg, carbon content, fossil 0.140367, carbon content, non-fossil 0.199629, dry mass 1 kg
  note on carbon content, fossil: C content was calculated as an addition of C content in the raw materials.
- polyvinylchloride, emulsion polymerised: 44.7926 kg; source Elsener J. 1993; lognormal variance with pedigree 0.0586, pedigree (4,3,5,1,1)
  (same comment as for alkyd paint, white, without solvent, in 60% solution state)
  properties: wet mass 1 kg, carbon content, fossil 0.387097, dry mass 1 kg
  note on carbon content, fossil: Monomer is vynyl chloride, C2H3Cl (ecoinvent v2.2 report 11_II). MW=62 g/mol
- polyethylene, high density, granulate: 6337.73 kg; source Elsener J. 1993; lognormal variance with pedigree 0.0586, pedigree (4,3,5,1,1)
  (same comment as for alkyd paint, white, without solvent, in 60% solution state)
  properties: dry mass 1 kg, wet mass 1 kg, carbon content, fossil 0.857143
  note on carbon content, fossil: Polyethylene is formed out of a huge amount of ethylene monomers (C2H4) (ecoinvent v2.2 report 11_II). MW=28 g/mol
- aluminium, cast alloy: 1775.36 kg; = 0.32*5550; source Elsener J. 1993; lognormal variance with pedigree 0.0586, pedigree (4,3,5,1,1)
  5550 kg aluminium, production mix. Calculated value. The data is based on Elsener & Strub (1993).
  0.32: part of aluminium cast alloy in aluminium, production mix. Based on the aluminium, production mix in ecoinvent v2.2.
  Uncertainty: oral communication
  properties: dry mass 1 kg, wet mass 1 kg
- lubricating oil: 3558.73 kg; source Elsener J. 1993; lognormal variance with pedigree 0.0586, pedigree (4,3,5,1,1)
  (same comment as for alkyd paint, white, without solvent, in 60% solution state)
  properties: wet mass 1 kg, carbon content, fossil 0.75, dry mass 1 kg
  note on carbon content, fossil: Lubricating oil is produced from diesel. C-content/dry mass of fats and oils considered 75%, from: ecoinvent v2.2 report, n 15a, pg 40
- flat glass, uncoated: 234.916 kg; source Elsener J. 1993; lognormal variance with pedigree 0.0586, pedigree (4,3,5,1,1)
  (same comment as for alkyd paint, white, without solvent, in 60% solution state)
  properties: dry mass 1 kg, wet mass 1 kg
- steel, chromium steel 18/8, hot rolled: 2808.99 kg; source Elsener J. 1993; lognormal variance with pedigree 0.0586, pedigree (4,3,5,1,1)
  Calculated value. The data is based on Elsener & Strub (1993).
  EcoSpold01Location=RER
  Uncertainty: oral communication
  properties: carbon content, fossil 0.0008, dry mass 1 kg, wet mass 1 kg
  note on carbon content, fossil: Stainless steel model is the grade 304 steel (18/8 stainless, 18% chromium 8% nickel; max. 0.08% C)
- copper: 6807.56 kg; source Elsener J. 1993; lognormal variance with pedigree 0.0586, pedigree (4,3,5,1,1)
  (same comment as for alkyd paint, white, without solvent, in 60% solution state)
  properties: dry mass 1 kg, wet mass 1 kg
- stone wool, packed: 31.9885 kg; source Elsener J. 1993; lognormal variance with pedigree 0.0586, pedigree (4,3,5,1,1)
  Calculated value. The data is based on Elsener & Strub (1993).
  EcoSpold01Location=CH
  Uncertainty: oral communication
  properties: carbon content, fossil 0.015401, wet mass 1 kg, dry mass 1 kg
  note on carbon content, fossil: The chemical composition of the glass fibres used in the rock wool production is similar to the composition of naturally cooled volcano basalt and has a composition listed in Tab. 3.1 and 3.2 in ecoinvent v2.2 report 16, part XIV. Rock wool contains: a minimum of 96% mineral fibres,between 0.5 and 3.0 weight percent of phenolic resin depending on the specific product characteristics, and about 0.2 percent mineral oil (ecoinvent v2.2 report 16, part XIV). An average composition of 1.8% phenolic resin, 0.2% mineral oil, and 98% mineral fibres has been assumed and used to calculate C content of the rock wool
- aluminium, wrought alloy: 3772.65 kg; = 0.68*5550; source Elsener J. 1993; lognormal variance with pedigree 0.0586, pedigree (4,3,5,1,1)
  5550 kg aluminium, production mix. Calculated value. The data is based on Elsener & Strub (1993).
  0.68: part of aluminium, wrought alloy in aluminium, production mix. Based on the aluminium, production mix in ecoinvent v2.2.
  Uncertainty: oral communication
  properties: wet mass 1 kg, dry mass 1 kg
- heat, district or industrial, other than natural gas: 1.36751e6 MJ; lognormal variance with pedigree 0.0586, pedigree (4,3,5,1,1)
  EcoSpold01Location=RER
  Uncertainty: oral communication
- used locomotive: -0.999642 unit; lognormal variance with pedigree 0.34, pedigree (1,1,5,1,1)
  production volume 1.32237 unit; = Ref('2b140f12-7b5d-4cb1-a1cc-80ce8af18bbf', 'ProductionVolume') * ((Ref('ba9528b1-44e9-4b9c-b095-2d503f04cb14')*-1) / Ref('2b140f12-7b5d-4cb1-a1cc-80ce8af18bbf'))
    Calculated from production volume of reference product using the relative outputs.
  properties: carbon content, fossil 0.101404, carbon content, non-fossil 0.00220235, dry mass 84000 kg, wet mass 84000 kg
  note on carbon content, fossil: Calculated from C content in input materials in the infrastructure
- steel, low-alloyed, hot rolled: 16394.1 kg; source Elsener J. 1993; lognormal variance with pedigree 0.0586, pedigree (4,3,5,1,1)
  (same comment as for alkyd paint, white, without solvent, in 60% solution state)
  properties: wet mass 1 kg, dry mass 1 kg, carbon content, fossil 0.005
  note on carbon content, fossil: Low alloyed steel composition given in Tab. 3.2 ecoinvent v2.2 report 10_partII. Steel assumed to have a C content of 0.5%
- glued laminated timber, for outdoor use: 0.593787 m3; source Elsener J. 1993; lognormal variance with pedigree 0.0586, pedigree (4,3,5,1,1)
  (same comment as for alkyd paint, white, without solvent, in 60% solution state)
  properties: carbon content, non-fossil 0.478422, water content 0.13, carbon content, fossil 0.00982967, wet mass 430 kg, dry mass 380.531 kg
  note on carbon content, non-fossil: The laminated timber is composed of wood and glue. The weight of the wood is assumed to be the DM minus 12 kg glue. C content of wood is 0.494 kgC/kg dry wood (ecoinvent v2.2 report 9)
  note on carbon content, fossil: C content of 12 kg Melamine formaldehyde resin (C4H6N6O) used for glueing
- polyvinylchloride, suspension polymerised: 306.082 kg; source Elsener J. 1993; lognormal variance with pedigree 0.0586, pedigree (4,3,5,1,1)
  (same comment as for steel, chromium steel 18/8, hot rolled)
  properties: dry mass 1 kg, wet mass 1 kg, carbon content, fossil 0.387097
- electricity, medium voltage: 151946 kWh; source Elsener J. 1993; lognormal variance with pedigree 0.0586, pedigree (4,3,5,1,1)
  Calculated value. The data is based on Elsener & Strub (1993).
  EcoSpold01Location=UCTE
  Uncertainty: oral communication
- lead: 262.906 kg; source Elsener J. 1993; lognormal variance with pedigree 0.0586, pedigree (4,3,5,1,1)
  (same comment as for steel, chromium steel 18/8, hot rolled)
  properties: dry mass 1 kg, wet mass 1 kg
- reinforcing steel: 34187.8 kg; source Elsener J. 1993; lognormal variance with pedigree 0.0586, pedigree (4,3,5,1,1)
  (same comment as for steel, chromium steel 18/8, hot rolled)
  properties: carbon content, fossil 0.004, dry mass 1 kg, wet mass 1 kg

## Sampling procedure
The data of the material composition and energy consumption is based on oral communication with an expert of one company.

## Extrapolations
Data for one locomotive in operation in Switzerland is used as an estimate for Europe

## Review by Carl Vadenbo 2012-06-29
In preparation for the release of ecoinvent v3.0, the output of used locomotive was removed from the 'transport, passenger/freight, rail' datasets and added to 'locomotive, RER' in ecoinvent v2.2 and renamed to 'locomotive production, RER 1993'. The added exchange of by-product/waste was reviewed and the new dataset was accepted for inclusion into the ecoinvent database on 2012.07.05.

## Review by Roland Hischier 2011-09-23
Transfer of documentation done.

## Review by Niels Jungbluth 2003-07-23
passed
