# pentaerythritol production in sodium hydroxide solution

Dataset: EcoSpold 2, unit process
Geography: RER
Time period: 1997-01-01 to 2020-12-31
Technology level: current
Classification: ISIC rev.4 ecoinvent: 2011:Manufacture of basic chemicals
Synonyms: Pentaerythrite; Auxinutril; 115-77-5; 2,2-bis(hydroxymethyl)propane-1,3-diol; Pentek
Scenario: Business-as-Usual
System model: Allocation at the point of substitution
Generated by: Mike Chudacoff
Published in: Althaus H.-J. 2007
Database: ecoinvent
isCopyrightProtected: true
accessRestrictedTo: 1

## General comment
This dataset represents a multi-output process which delivers the co-products pentaerythritol and sodium formate from the reaction of formaldehyde with acetaldehyde. Sodium formate can be used as a fuel or sold. Pentaerythritol is an organic chemical compound in the form of white crystals. It is used primarily for the production of alkyd resins, as well as lubricants and antioxidants. Pentaerythritol is produced industrially by reacting formaldehyde with acetaldehyde at 15 – 45 °C in the presence of aqueous calcium hydroxide or sodium hydroxide. This dataset is based on industry data as well as estimations based on data from a large chemical plant (Gendorf 2016).
References:
Althaus H.-J., Chudacoff M., Hischier R., Jungbluth N., Osses M. and Primas A. (2007) Life Cycle Inventories of Chemicals. ecoinvent report No. 8, v2.0. EMPA Dübendorf, Swiss Centre for Life Cycle Inventories, Dübendorf, CH.
Gendorf (2016) Umwelterklärung 2015, Werk Gendorf Industriepark, www.gendorf.de.

## Included activities start
The activity starts when the raw materials enter the process.

## Included activities end
This activity ends with the production of pentaerythritol. The dataset includes all precursors, ancillary materials, energy and estimated infrastructure.

## Geography
The data is based on confidential information concerning European production processes. Some values are based on data from a large chemical factory located in Germany. These are assumed to be valid for this geography.

## Technology
Penta is produced industrially by reacting formaldehyde with acetaldehyde at 15 – 45 °C in the presence of aqueous calcium hydroxide or sodium hydroxide, according to the following reaction:
3 HCHO + H3C-CHO -> C5H12O4
Generally, a fourfold surplus of formaldehyde is used in order to minimize the production of dipentaerythritol.
There are no competing routes for the production of penta. Production information is confidential.
Reference:
Althaus H.-J., Chudacoff M., Hischier R., Jungbluth N., Osses M. and Primas A. (2007) Life Cycle Inventories of Chemicals. Final report ecoinvent data v2.0 No. 8. Swiss Centre for Life Cycle Inventories, Dübendorf, CH.

## Time period
The time period represents the approximate period during which the data was collected. Some values are based on data published by the Gendorf factory that were collected between 2011 and 2015. The time period has been adjusted accordingly. For more details, see the comments of the exchanges.

## Reference product
- sodium formate: 1 kg; name BP_sodium_formate; CPC 34140: Carboxylic acids and their anhydrides, halides, peroxides and peroxyacids and their halogenated, sulphonated, […]; By-product classification allocatable product; CAS 141-53-7
  production volume 4.33205e7 kg; = RP_PV*BP_sodium_formate/ABS(RP)
    Calculated from the production volume of pentaerythritol in proportion to the respective output amounts.
  property price 0.466 EUR2005
    Temporary price data. Calculated as 90% of purchasers price based on: 2004 Import/Export data (total trades (USD) divided by total weight (kg) in EU27, USA, China, Japan and India) from UN Commodity Trade Statistics Database (http://data.un.org/Explorer.aspxDatabase [Accessed 2 July 2010]). Commodity: 'Salts of formic acid'.
  property carbon content 0.176471
    carbon content on a dry matter basis (reserved; not for manual entry)
  property true value 0.29358; name BP_sodium_formate_true_value
    allocation property applied in "true value" allocation // value calculated from revenue
  properties: carbon content, fossil 0.176471, carbon content, non-fossil 0, wet mass 1 kg, water in wet mass 0 kg, dry mass 1 kg, water content 0, carbon allocation 0.176471 kg
- pentaerythritol: 0 kg; name RP; By-product classification allocatable product; CPC 34139: Other alcohols, phenols, phenol-alcohols, and their halogenated, sulphonated, nitrated or nitrosated derivativ[…]; CAS 115-77-5
  Pentaerythritol is an organic chemical compound in the form of white crystals. It is used primarily for the production of alkyd resins, as well as lubricants and antioxidants.
  production volume 6.87627e7 kg; name RP_PV; = 208000000*0.33059
    Estimated. The european production volume is extrapolated from the global production volume using the nominal GDP of 2005 (source: United Nations, http://data.un.org/Glossary.aspx?q=GDP+%28current+US%24%29, accessed 20130726 and 20130312).
    Gross domestic product (GDP) at current prices is GDP at prices of the current reporting period. Also known as nominal GDP.
  property price 0.936 EUR2005
    Temporary price data. Calculated as 90% of purchasers price based on: 2004 import/export prices (total trades (USD) divided by total weight (kg) in EU27, USA, China, Japan and India) from UN data - Pentaerythritol (http://data.un.org/Data.aspx?q=Pentaerythritol&d=ComTrade&f=_l1Code%3a30%3bcmdCode%3a290542; accessed 1 June 10).
  property carbon content 0.441176
    carbon content on a dry matter basis (reserved; not for manual entry)
  property true value 0.936; name RP_true_value
    allocation property applied in "true value" allocation // value calculated from revenue
  properties: wet mass 1 kg, water content 0, water in wet mass 0 kg, carbon content, non-fossil 0, carbon content, fossil 0.441176, dry mass 1 kg, carbon allocation 0.441176 kg

## By-products
- heat, for reuse in municipal waste incineration only: 0 MJ; CPC 17300: Steam and hot water; By-product classification allocatable product; pedigree (1,1,1,1,1)
  Net electricity generated from this waste and used in internal MSWI plant energy redistribution.
  Uncertainty: uncertainty is calculated from uncertainties in waste composition and uncertainties in energy efficiency and the uncertainty in internal energy demand
  production volume 41.9491 MJ
  property exergy 0.1842 MJ; name E_th_prod_MSWI_exergy
    This exergy property is based on the exergy content of the product.
  property price 0.0106 EUR2005; name E_th_prod_MSWI_price_EUR2005
    Average European district heat price from Ecoheatcool and Euroheat 2005-2006, Ecoheat Work package 1: The European heat market. Final report. 10.6 EUR/GJ i s the price of district heat. http://www.solarthermalworld.org/files/Ecoheatcool%20WP1%20Web.pdf?download
  property true value relation 0.1842; name E_th_prod_MSWI_true_value_relation
    property to calculate "true value" from
  property true value 1.16811e-9
    allocation property applied in "true value" allocation // value calculated from true value relation
- electricity, for reuse in municipal waste incineration only: 0 kWh; CPC 17100: Electrical energy; By-product classification allocatable product; pedigree (1,1,1,1,1)
  (same comment as for heat, for reuse in municipal waste incineration only)
  production volume 5.89835 kWh
  property true value relation 3.6; name E_el_prod_MSWI_true_value_relation
    property to calculate "true value" from
  property price 0.1 EUR2005; name E_el_prod_MSWI_price_EUR2005
    Estimated to be the same price as in case of electricity, medium voltage.
  property exergy 3.6 MJ; name E_el_prod_MSWI_exergy
    This exergy property is based on the exergy content of the product.
  property true value 3.17451e-9
    (same comment as for heat, for reuse in municipal waste incineration only)
- zinc concentrate: 0 kg; CPC 14290: Other non-ferrous metal ores and concentrates (other than uranium or thorium ores and concentrates); By-product classification allocatable product
  Calculated value from the knowledge of the properties of both products.
  production volume 0.000797975 kg
  property price 0.38 EUR2005; name ByP_price_EUR2005
    Temporary price data. Calculated as 90% of purchasers price based on: Zinc content in concentrate 53%. Concentrate price per kg Zn 86.5% of refined Zn price (13.5% treatment charges according to CHR Metals Limited 2005: Dynamic cost curves. http://www.minecost.com/dynamic.pdf). 2004 zinc price from USGS (2007) Mineral commodity summaries 2007. <http://minerals.usgs.gov/minerals/pubs/mcs/2007/mcs2007.pdf> [Accessed 25 May 2010]
  property zinc content 0.53; name zinc_C_zinc_concentrate
    Zinc content on a dry matter basis. Value taken from teh "zinc mine operation" /GLO dataset.
  property dry mass 1 kg; name DM_zinc_concentrate
  property carbon content 0
    carbon content on a dry matter basis (reserved; not for manual entry)
  property true value 4.30488e-13
    allocation property applied in "true value" allocation // value calculated from revenue
  properties: wet mass 1 kg, water content 0, carbon content, non-fossil 0, carbon content, fossil 0, water in wet mass 0 kg, carbon allocation 0 kg

## Inputs from technosphere
- water, deionised: 0 kg; pedigree (1,1,1,1,1)
  Water for the sodium hydroxide solution (50%).
  Uncertainty: p
  properties: wet mass 1 kg
- chemical factory, organics: 1.51596e-10 unit; lognormal variance with pedigree 0.309225, pedigree (2,3,1,2,3)
  Calculated based on literature data published by the industry. For this activity, no information was readily available concerning infrastructure and land-use. Therefore, the infrastructure is estimated based on data from two chemical factories, the BASF site of Ludwigshafen and the chemical factory in Gendorf (which are both located in Germany), which produce a wide range of chemical substances. Based on this data, the following assumptions are made: the built area amounts to about 4.2 ha, the plant has an average output of 50'000 t/a and a lifespan of fifty years. The estimated infrastructure amount is therefore 4.00 E-10 units per kg of produced chemical.
  References:
  Althaus H.-J., Chudacoff M., Hischier R., Jungbluth N., Osses M. and Primas A. (2007) Life Cycle Inventories of Chemicals. ecoinvent report No. 8, v2.0. EMPA Dübendorf, Swiss Centre for Life Cycle Inventories, Dübendorf, CH.
  Gendorf (2000) Umwelterklärung 2000, Werk Gendorf. Werk Gendorf, Burgkirchen.
- tap water: 0.00985377 kg; lognormal variance with pedigree 0.009825, pedigree (2,3,1,2,3)
  Calculated based on literature data published by the industry. This value is a 5-year average of data (2011 - 2015) published by the Gendorf factory (Gendorf, 2016, Umwelterklärung, www.gendorf.de), (Gendorf, 2015, Umwelterklärung, www.gendorf.de), (Gendorf, 2014, Umwelterklärung, www.gendorf.de). The amount of tap water per kg of chemical substance produced is calculated using literature data published by the Gendorf factory based in Germany, which produces a wide range of chemical substances. The factory produced 1657400 tonnes of chemical substances in the year 2015 (Gendorf, 2016, Umwelterklärung, www.gendorf.de) and 740000 tonnes of intermediate products. The amount of tap water consumed in the year 2015 was 55100 tonnes (Gendorf, 2016, Umwelterklärung, www.gendorf.de). The resulting amount of tap water is 0.023 kg/kg of chemical product produced. The 5-year average (2011 - 2015, weighted by production volume) is 0.026 kg/kg.
  properties: wet mass 1 kg, dry mass 0.000337476 kg, carbon content, fossil 0.00178991, water content 2962.17
  note on carbon content, fossil: Bicarbonate content is 2.93 mol/m3. CO2 content is 0.1 mol/m3 (ecoinvent v2.2 report 8, Tab 93.1).
- acetaldehyde: 0.136437 kg; lognormal variance with pedigree 0, pedigree (1,1,1,1,1)
  Precursor
  Uncertainty: p
  properties: carbon content, fossil 0.545296, wet mass 1 kg, dry mass 1 kg
- sodium hydroxide, without water, in 50% solution state: 0.142122 kg; lognormal variance with pedigree 0, pedigree (1,1,1,1,1)
  Precursor. 0.75 kg of sodium hydroxide in a 50% solution is needed to produce 1 kg of pentaerythritol, therefore 0.375 kg of 100% sodium hydroxide is required (the water of the solution is taken into account in the input of deionised water).
  Uncertainty: p
  properties: wet mass 1 kg, dry mass 1 kg
- wastewater, average: 0 m3; name BP_wastewater_average; pedigree (1,1,1,1,1)
  Calculated based on literature data published by the industry. This value is a 5-year average of data (2011 - 2015) published by the Gendorf factory (Gendorf, 2016, Umwelterklärung, www.gendorf.de), (Gendorf, 2015, Umwelterklärung, www.gendorf.de), (Gendorf, 2014, Umwelterklärung, www.gendorf.de). The amount of wastewater (which is later on treated in the municipal WWTP) per kg of chemical substance produced is calculated using literature data published by the Gendorf factory based in Germany, which produces a wide range of chemical substances. The factory produced 1657400 tonnes of chemical substances in the year 2015 (Gendorf, 2016, Umwelterklärung, www.gendorf.de) and 740000 tonnes of intermediate products. The amount of wastewater which is later on treated in the municipal WWTP in the year 2015 was 1200 tonnes (Gendorf, 2016, Umwelterklärung, www.gendorf.de). The resulting amount of wastewater is 2.7E-06 m3/kg of chemical product produced.
  production volume 0 m3
    (same comment as for sodium formate)
  property price 0 EUR2005; name BP_wastewater_average_price_EUR2005
  properties: water content 2882.2, carbon content, non-fossil 0.194039, wet mass 1000 kg, dry mass 0.346837 kg
  note on carbon content, non-fossil: 0.0673 kg TOC/m3 (Tab A.17, ecoinvent v2.2 report 13_I). TOC was considered as Total Carbon.
- heat, district or industrial, other than natural gas: 0.757982 MJ; lognormal variance with pedigree 0.0006, pedigree (2,1,1,1,1)
  Fuel
  Uncertainty: f
- heat, district or industrial, natural gas: 1.51596 MJ; lognormal variance with pedigree 0.0006, pedigree (2,1,1,1,1)
  Fuel
  Uncertainty: f
- electricity, medium voltage: 0.15766 kWh; lognormal variance with pedigree 0.009825, pedigree (2,3,1,2,3)
  Calculated based on literature data published by the industry. This value is a 5-year average of data (2011 - 2015) published by the Gendorf factory (Gendorf, 2016, Umwelterklärung, www.gendorf.de), (Gendorf, 2015, Umwelterklärung, www.gendorf.de), (Gendorf, 2014, Umwelterklärung, www.gendorf.de). The amount of electricity per kg of chemical substance produced is calculated using literature data published by the Gendorf factory based in Germany, which produces a wide range of chemical substances. The factory produced 1657400 tonnes of chemical substances in the year 2015 (Gendorf, 2016, Umwelterklärung, www.gendorf.de) and 740000 tonnes of intermediate products. The amount of electricity consumed in the year 2015 was 3498800 GJ (Gendorf, 2016, Umwelterklärung, www.gendorf.de). The resulting amount of electricity is 0.406 kWh/kg (year 2015) of chemical substance produced. The 5-year average (2011 - 2015, weighted by production volume) is 0.416 kWh/kg (1.5 MJ/kg). Cross-reference: the amount of chemicals produced (excluding intermediate products) in the EU-28 in the year 2011 was 327 million tonnes (Eurostat, http://ec.europa.eu/eurostat/statistics-explained/index.php/Chemicals_production_statistics, accessed 20170126). The chemical and petrochemical industry sector consumed 2.33 EJ of energy in 2011 (European Commission - Joint Research Centre, 2014, BAT on Common Waste water and Waste Gas Treatment/Management Systems in the Chemical Sector). The resulting energy (both heat and electricity) consumed per kg of chemicals produced in 2011 is thus 7.13 MJ/kg. This is higher than the value calculated using data published by Gendorf – 3.85 MJ/kg, but that is to be expected as the intermediate products are not accounted for.
- nitrogen, liquid: 0.00720083 kg; lognormal variance with pedigree 0.009825, pedigree (2,3,1,2,3)
  Calculated based on literature data published by the industry. This value is a 5-year average of data (2011 - 2015) published by the Gendorf factory (Gendorf, 2016, Umwelterklärung, www.gendorf.de), (Gendorf, 2015, Umwelterklärung, www.gendorf.de), (Gendorf, 2014, Umwelterklärung, www.gendorf.de). The amount of nitrogen used per kg of chemical substance produced is calculated using literature data published by the Gendorf factory based in Germany, which produces a wide range of chemical substances. The factory produced 1657400 tonnes of chemical substances in the year 2015 (Gendorf, 2016, Umwelterklärung, www.gendorf.de) and 740000 tonnes of intermediate products. The reported amount of nitrogen used in 2015 was 33512400 Nm3 (Gendorf, 2016, Umwelterklärung, www.gendorf.de). One Nm3 of nitrogen is equal to 1.2506 kg. The resulting amount of nitrogen - the 5-year average (2011 - 2015, weighted by production volume) is 0.019 kg/kg. Nitrogen is mainly used during the production of chemicals for 'blanketing', which is the process of applying gas to the vapour space of a container or vessel in order to control its composition.
  properties: wet mass 1 kg, dry mass 1 kg
- formaldehyde: 0.394151 kg; lognormal variance with pedigree 0, pedigree (1,1,1,1,1)
  Precursor
  Uncertainty: p
  properties: dry mass 1 kg, wet mass 1 kg, carbon content, fossil 0.4
- water, deionised: 0.141612, 0.000509768 kg (2 entries); lognormal variance with pedigree 0, pedigree (1,1,1,1,1)
  Water for the sodium hydroxide solution (50%).
  Uncertainty: p
- wastewater, average: -9.23383e-7, -9.98928e-8 m3 (2 entries); lognormal variance with pedigree 0.009825, pedigree (2,3,1,2,3)
  (same comment as for wastewater, average)
  production volume 185.659 m3

## Inputs from nature
- Water, river [natural resource, in water]: 0.000325932 m3; lognormal variance with pedigree 0.009825, pedigree (2,3,1,2,3)
  Calculated based on literature data published by the industry. This value is a 5-year average of data (2011 - 2015) published by the Gendorf factory (Gendorf, 2016, Umwelterklärung, www.gendorf.de), (Gendorf, 2015, Umwelterklärung, www.gendorf.de), (Gendorf, 2014, Umwelterklärung, www.gendorf.de). The amount of groundwater and surface water (river) extracted per kg of chemical substance produced is calculated using literature data published by the Gendorf factory based in Germany, which produces a wide range of chemical substances. The factory produced 1657400 tonnes of chemical substances in the year 2015 (Gendorf, 2016, Umwelterklärung, www.gendorf.de) and 740000 tonnes of intermediate products. The amount of groundwater and surface water (river) extracted in the year 2015 was 19950000 tonnes and 21488100 tonnes respectively (Gendorf, 2016, Umwelterklärung, www.gendorf.de).
- Water, cooling, unspecified natural origin [natural resource, in water]: 0.00621546 m3; lognormal variance with pedigree 0.009825, pedigree (2,3,1,2,3)
  Calculated based on literature data published by the industry. This value is a 5-year average of data (2011 - 2015) published by the Gendorf factory (Gendorf, 2016, Umwelterklärung, www.gendorf.de), (Gendorf, 2015, Umwelterklärung, www.gendorf.de), (Gendorf, 2014, Umwelterklärung, www.gendorf.de). The amount of water for cooling extracted per kg of chemical substance produced is calculated using literature data published by the Gendorf factory based in Germany, which produces a wide range of chemical substances. The factory produced 1657400 tonnes of chemical substances in the year 2015 (Gendorf, 2016, Umwelterklärung, www.gendorf.de) and 740000 tonnes of intermediate products. The reported amounts of water extracted as groundwater and surface water (river) are assumed to be used entirely for cooling purposes.
- Peat, in ground [natural resource, biotic]: 0.00659445 kg; lognormal variance with pedigree 0.012, pedigree (3,1,1,1,1)
  Fuel
  Uncertainty: f
- Water, well, in ground [natural resource, in water]: 0.000314563 m3; lognormal variance with pedigree 0.009825, pedigree (2,3,1,2,3)
  (same comment as for Water, river)

## Emissions to nature
- Ammonia [air, urban air close to ground]: 1.24309e-5 kg; lognormal variance with pedigree 0, pedigree (1,1,1,1,1)
  Airborne emission
  Uncertainty: a
- Nitrogen oxides [air, urban air close to ground]: 0.000249755 kg; lognormal variance with pedigree 0, pedigree (1,1,1,1,1)
  Airborne emission
  Uncertainty: a
- COD, Chemical Oxygen Demand [water, surface water]: 0.000352007 kg; lognormal variance with pedigree 0.012, pedigree (3,1,1,1,1)
  Calculated as COD (g O2) = 2.7*TOC (gC).
  Uncertainty: e
- Nitrogen [air, unspecified]: 0.00720083 kg; lognormal variance with pedigree 0.009825, pedigree (2,3,1,2,3)
  Calculated value. The amount of nitrogen released to air is equal to the amount of nitrogen entering the activity.
- Water [water, unspecified]: 0.00632915 m3; lognormal variance with pedigree 0.009825, pedigree (2,3,1,2,3)
  Calculated based on literature data published by the industry (Gendorf, 2016, Umwelterklärung, www.gendorf.de). The amount of water released back to the environment consists of the amount of process water treated in the internal WWTP and then released back to the environment and the amount of cooling water released back to the environment.
- DOC, Dissolved Organic Carbon [water, surface water]: 0.000130373 kg; lognormal variance with pedigree 0.012, pedigree (3,1,1,1,1)
  Assumed equal to TOC.
  Uncertainty: e
- Water [air, unspecified]: 0.000530588 m3; lognormal variance with pedigree 0.009825, pedigree (2,3,1,2,3)
  Calculated to ensure the water balance. In general, in the case of recirculating cooling systems, 77% of the water input evaporates to air. In case of once-through cooling systems, 4% of the water input evaporates to air. The process water has in the chemical industry an average evaporation rate of 20.5%. In the specific case of the Gendorf factory, the calculated evaporation rate based on the data published is 6.3%. This matches the qualitative information, that the majority of the cooling systems in Gendorf are once-through and that the amount of cooling water used is significantly higher than the amount of process water used (Gendorf, 2016, Umwelterklärung, www.gendorf.de).
- Carbon monoxide, fossil [air, urban air close to ground]: 0.000390361 kg; lognormal variance with pedigree 0, pedigree (1,1,1,1,1)
  Airborne emission
  Uncertainty: a
- TOC, Total Organic Carbon [water, surface water]: 0.000130373 kg; lognormal variance with pedigree 0.012, pedigree (3,1,1,1,1)
  According to industry sources, there are 4.3 g TOC/kg penta. This waste stream enters a wastewater treatment facility with a removal efficiency of about 92%, which results in 0.344 g TOC/kg penta post-treatment.
  Uncertainty: e
- BOD5, Biological Oxygen Demand [water, surface water]: 0.000176004 kg; lognormal variance with pedigree 0.012, pedigree (3,1,1,1,1)
  Calculated as 0.5*COD.
  Uncertainty: e
- Sulfur dioxide [air, urban air close to ground]: 0.000121656 kg; lognormal variance with pedigree 0, pedigree (1,1,1,1,1)
  Airborne emission
  Uncertainty: a
- Carbon dioxide, fossil [air, urban air close to ground]: 0.0492689 kg; lognormal variance with pedigree 0.012, pedigree (3,1,1,1,1)
  Airborne emission
  Uncertainty: a
- Particulates, > 2.5 um, and < 10um [air, urban air close to ground]: 1.4667e-5 kg; lognormal variance with pedigree 0, pedigree (1,1,1,1,1)
  Airborne emission
  Uncertainty: a

## Sampling procedure
Literature and survey data. Some values are calculated based on data from a large chemical factory located in Germany. For more details, see the comments of the exchanges.

## Review by Gregor Wernet 2017-08-04
This dataset was additionally reviewed in a separate review process by Eric Johnson of Atlantic Consulting as well as Emilia Moreno Ruiz and Gregor Wernet of ecoinvent.
