# treatment of lignite ash, opencast refill

Dataset: EcoSpold 2, unit process
Geography: GR
Time period: 1996-01-01 to 2019-12-31
Technology level: current
Classification: EcoSpold01Categories: waste management/others
Classification: ISIC rev.4 ecoinvent: 3822:Treatment and disposal of hazardous waste
Synonyms: ashes form lignite incineration disposed as backfill in opencast lignite mines
Tags: Treatment; ConvertedDataset
Scenario: Business-as-Usual
System model: Allocation at the point of substitution
Generated by: Gabor Doka (obsolete)
Published in: Doka G. 2008
Database: ecoinvent
isCopyrightProtected: true
accessRestrictedTo: 1

## General comment
backfilled waste composition is (in ppm): H2O n.a.; O n.a.; H n.a.; C n.a.; S 23093; N n.a.; P 102.81; B 542.74; Cl 12.887; Br 4.1237; F 12.887; I 0.51546; Ag n.a.; As 12.661; Ba 257.73; Cd 1.5461; Co 38.66; Cr 36.082; Cu 15.408; Hg 0.025845; Mn 51.546; Mo 17.991; Ni 38.414; Pb 12.708; Sb 10.224; Se 4.2866; Sn 4.1237; V 89.956; Zn 70.966; Be 2.5773; Sc 1.2887; Sr 180.16; Ti 257.73; Tl 0.051261; W 2.5773; Si 123710; Fe 13918; Ca 51546; Al 12113; K 1546.4; Mg 7732; Na 2319.6;
[This dataset was already contained in the ecoinvent database version 2. It was not individually updated during the transfer to ecoinvent version 3. Life Cycle Impact Assessment results may still have changed, as they are affected by changes in the supply chain, i.e. in other datasets. This dataset was generated following the ecoinvent quality guidelines for version 2. It may have been subject to central changes described in the ecoinvent version 3 change report (http://www.ecoinvent.org/database/ecoinvent-version-3/reports-of-changes/), and the results of the central updates were reviewed extensively. The changes added e.g. consistent water flows and other information throughout the database. The documentation of this dataset can be found in the ecoinvent reports of version 2, which are still available via the ecoinvent website. The change report linked above covers all central changes that were made during the conversion process.]

## Included activities end
This module contains only direct emissions from lignite ash used as backfill in opencast lignite mines: short-term emissions (0-100a) and long-term emissions (>100a) both to ground water. E.g. land-use and energy consumption is *not* included.

## Geography
Ash composition calculated from country-specific coal composition (GR) and technology-specific transfer coefficients in power plant.

## Technology
Lignite ash as backfill in lignite opencast mine (together with tailings)

## Reference product
- lignite ash: -1 kg; By-product classification Waste; CPC 39: Wastes or scraps
  EcoSpold01Location=GR
  production volume 7.27878e9 kg
    Estimated. Electricity and synthetic natural gas production are responsible for more than 90% of lignite use (https://www.lignite.com/about-lignite/lignite-uses/, accessed 20151008) . The production volume is calculated as the sum of lignite ashes resulting from electricity and heat and power co-generation production from lignite, in the respective country.
  property price 0 EUR2005
    Waste products are assigned a price of zero as they are assumed to require further treatment.
  property carbon content 0
    carbon content on a dry matter basis (reserved; not for manual entry)
  properties: wet mass 1 kg, carbon content, non-fossil 0, carbon content, fossil 0, dry mass 1 kg, water content 0, water in wet mass 0 kg, carbon allocation 0 kg

## Emissions to nature
- Chromium VI [water, ground-]: 5.442e-6 kg; lognormal variance with pedigree 1.22, pedigree (1,1,5,1,1)
  Short-term emission from lignite ash backfill. Uncertainty derived from uncertainty in ash composition and uncertainty in transfer coefficients.
- Barium [water, ground-, long-term]: 0.00025772 kg; lognormal variance with pedigree 0.88, pedigree (1,1,5,1,1)
  Long-term emission from lignite ash backfill. Uncertainty derived from uncertainty in ash composition and uncertainty in transfer coefficients.
- Lead [water, ground-, long-term]: 1.2708e-5 kg; lognormal variance with pedigree 1.28, pedigree (1,1,5,1,1)
  (same comment as for Barium)
- Chloride [water, ground-]: 7.3524e-6 kg; lognormal variance with pedigree 1.28, pedigree (1,1,5,1,1)
  (same comment as for Chromium VI)
- Silicon [water, ground-, long-term]: 0.088215 kg; lognormal variance with pedigree 0.17, pedigree (1,1,5,1,1)
  (same comment as for Barium)
- Scandium [water, ground-]: 3.6419e-7 kg; lognormal variance with pedigree 1.62, pedigree (1,1,5,1,1)
  (same comment as for Chromium VI)
- Tungsten [water, ground-]: 9.9396e-7 kg; lognormal variance with pedigree 1.51, pedigree (1,1,5,1,1)
  (same comment as for Chromium VI)
- Arsenic, ion [water, ground-]: 1.2661e-5 kg; lognormal variance with pedigree 1.28, pedigree (1,1,5,1,1)
  (same comment as for Chromium VI)
- Fluoride [water, ground-, long-term]: 1.1205e-5 kg; lognormal variance with pedigree 1.28, pedigree (1,1,5,1,1)
  (same comment as for Barium)
- Phosphate [water, ground-]: 2.9498e-7 kg; lognormal variance with pedigree 1.66, pedigree (1,1,5,1,1)
  (same comment as for Chromium VI)
- Fluoride [water, ground-]: 1.6812e-6 kg; lognormal variance with pedigree 1.37, pedigree (1,1,5,1,1)
  (same comment as for Chromium VI)
- Calcium, ion [water, ground-]: 1.9509e-5 kg; lognormal variance with pedigree 1, pedigree (1,1,5,1,1)
  (same comment as for Chromium VI)
- Chloride [water, ground-, long-term]: 5.5342e-6 kg; lognormal variance with pedigree 1.29, pedigree (1,1,5,1,1)
  (same comment as for Barium)
- Bromine [water, ground-]: 4.054e-6 kg; lognormal variance with pedigree 1.42, pedigree (1,1,5,1,1)
  (same comment as for Chromium VI)
- Strontium [water, ground-, long-term]: 0.00017989 kg; lognormal variance with pedigree 0.92, pedigree (1,1,5,1,1)
  (same comment as for Barium)
- Cobalt [water, ground-]: 2.7684e-8 kg; lognormal variance with pedigree 1.82, pedigree (1,1,5,1,1)
  (same comment as for Chromium VI)
- Aluminium [water, ground-]: 1.5062e-5 kg; lognormal variance with pedigree 1.01, pedigree (1,1,5,1,1)
  (same comment as for Chromium VI)
- Thallium [water, ground-]: 7.7734e-11 kg; lognormal variance with pedigree 2.59, pedigree (1,1,5,1,1)
  (same comment as for Chromium VI)
- Boron [water, ground-]: 4.2524e-6 kg; lognormal variance with pedigree 1.17, pedigree (1,1,5,1,1)
  (same comment as for Chromium VI)
- Molybdenum [water, ground-, long-term]: 2.4482e-11 kg; lognormal variance with pedigree 1.25, pedigree (1,1,5,1,1)
  (same comment as for Barium)
- Zinc, ion [water, ground-, long-term]: 7.0963e-5 kg; lognormal variance with pedigree 1.05, pedigree (1,1,5,1,1)
  (same comment as for Barium)
- Lead [water, ground-]: 2.7611e-10 kg; lognormal variance with pedigree 2.43, pedigree (1,1,5,1,1)
  (same comment as for Chromium VI)
- Molybdenum [water, ground-]: 1.7991e-5 kg; lognormal variance with pedigree 1.23, pedigree (1,1,5,1,1)
  (same comment as for Chromium VI)
- Potassium, ion [water, ground-, long-term]: 0.00067377 kg; lognormal variance with pedigree 0.65, pedigree (1,1,5,1,1)
  (same comment as for Barium)
- Beryllium [water, ground-, long-term]: 2.5734e-6 kg; lognormal variance with pedigree 1.49, pedigree (1,1,5,1,1)
  (same comment as for Barium)
- Tin, ion [water, ground-]: 3.273e-10 kg; lognormal variance with pedigree 2.41, pedigree (1,1,5,1,1)
  (same comment as for Chromium VI)
- Calcium, ion [water, ground-, long-term]: 0.051527 kg; lognormal variance with pedigree 0.22, pedigree (1,1,5,1,1)
  (same comment as for Barium)
- Selenium [water, ground-, long-term]: 2.6334e-6 kg; lognormal variance with pedigree 1.43, pedigree (1,1,5,1,1)
  (same comment as for Barium)
- Antimony [water, ground-, long-term]: 6.2809e-6 kg; lognormal variance with pedigree 1.31, pedigree (1,1,5,1,1)
  (same comment as for Barium)
- Cobalt [water, ground-, long-term]: 3.8632e-5 kg; lognormal variance with pedigree 1.13, pedigree (1,1,5,1,1)
  (same comment as for Barium)
- Potassium, ion [water, ground-]: 0.00087262 kg; lognormal variance with pedigree 0.65, pedigree (1,1,5,1,1)
  (same comment as for Chromium VI)
- Sulfate [water, ground-, long-term]: 0.05063 kg; lognormal variance with pedigree 0.31, pedigree (1,1,5,1,1)
  (same comment as for Barium)
- Magnesium [water, ground-, long-term]: 0.0077283 kg; lognormal variance with pedigree 0.44, pedigree (1,1,5,1,1)
  (same comment as for Barium)
- Chromium VI [water, ground-, long-term]: 3.5786e-6 kg; lognormal variance with pedigree 1.2, pedigree (1,1,5,1,1)
  (same comment as for Barium)
- Copper, ion [water, ground-, long-term]: 1.5406e-5 kg; lognormal variance with pedigree 1.25, pedigree (1,1,5,1,1)
  (same comment as for Barium)
- Nickel, ion [water, ground-, long-term]: 3.8355e-5 kg; lognormal variance with pedigree 1.13, pedigree (1,1,5,1,1)
  (same comment as for Barium)
- Boron [water, ground-, long-term]: 0.0003392 kg; lognormal variance with pedigree 0.83, pedigree (1,1,5,1,1)
  (same comment as for Barium)
- Mercury [water, ground-]: 5.1097e-12 kg; lognormal variance with pedigree 2.94, pedigree (1,1,5,1,1)
  (same comment as for Chromium VI)
- Nickel, ion [water, ground-]: 5.8252e-8 kg; lognormal variance with pedigree 1.73, pedigree (1,1,5,1,1)
  (same comment as for Chromium VI)
- Titanium, ion [water, ground-]: 3.2046e-7 kg; lognormal variance with pedigree 1.5, pedigree (1,1,5,1,1)
  (same comment as for Chromium VI)
- Cadmium, ion [water, ground-]: 4.3964e-11 kg; lognormal variance with pedigree 2.67, pedigree (1,1,5,1,1)
  (same comment as for Chromium VI)
- Manganese [water, ground-]: 1.7835e-9 kg; lognormal variance with pedigree 2.19, pedigree (1,1,5,1,1)
  (same comment as for Chromium VI)
- Copper, ion [water, ground-]: 2.4844e-9 kg; lognormal variance with pedigree 2.14, pedigree (1,1,5,1,1)
  (same comment as for Chromium VI)
- Sulfate [water, ground-]: 0.018649 kg; lognormal variance with pedigree 0.35, pedigree (1,1,5,1,1)
  (same comment as for Chromium VI)
- Aluminium [water, ground-, long-term]: 0.012098 kg; lognormal variance with pedigree 0.39, pedigree (1,1,5,1,1)
  (same comment as for Barium)
- Manganese [water, ground-, long-term]: 5.1545e-5 kg; lognormal variance with pedigree 1.09, pedigree (1,1,5,1,1)
  (same comment as for Barium)
- Scandium [water, ground-, long-term]: 9.2447e-7 kg; lognormal variance with pedigree 1.58, pedigree (1,1,5,1,1)
  (same comment as for Barium)
- Tungsten [water, ground-, long-term]: 1.5834e-6 kg; lognormal variance with pedigree 1.49, pedigree (1,1,5,1,1)
  (same comment as for Barium)
- Vanadium, ion [water, ground-]: 5.5288e-7 kg; lognormal variance with pedigree 1.44, pedigree (1,1,5,1,1)
  (same comment as for Chromium VI)
- Iodide [water, ground-, long-term]: 5.1546e-14 kg; lognormal variance with pedigree 1.72, pedigree (1,1,5,1,1)
  (same comment as for Barium)
- Cadmium, ion [water, ground-, long-term]: 1.546e-6 kg; lognormal variance with pedigree 1.55, pedigree (1,1,5,1,1)
  (same comment as for Barium)
- Sodium, ion [water, ground-, long-term]: 0.00071251 kg; lognormal variance with pedigree 0.6, pedigree (1,1,5,1,1)
  (same comment as for Barium)
- Iron, ion [water, ground-, long-term]: 0.0093006 kg; lognormal variance with pedigree 0.41, pedigree (1,1,5,1,1)
  (same comment as for Barium)
- Magnesium [water, ground-]: 3.6798e-6 kg; lognormal variance with pedigree 1.19, pedigree (1,1,5,1,1)
  (same comment as for Chromium VI)
- Iodide [water, ground-]: 5.1546e-7 kg; lognormal variance with pedigree 1.69, pedigree (1,1,5,1,1)
  (same comment as for Chromium VI)
- Barium [water, ground-]: 8.9173e-9 kg; lognormal variance with pedigree 1.97, pedigree (1,1,5,1,1)
  (same comment as for Chromium VI)
- Phosphate [water, ground-, long-term]: 0.00017669 kg; lognormal variance with pedigree 1.08, pedigree (1,1,5,1,1)
  (same comment as for Barium)
- Vanadium, ion [water, ground-, long-term]: 4.8384e-5 kg; lognormal variance with pedigree 1.11, pedigree (1,1,5,1,1)
  (same comment as for Barium)
- Sodium, ion [water, ground-]: 0.0016071 kg; lognormal variance with pedigree 0.59, pedigree (1,1,5,1,1)
  (same comment as for Chromium VI)
- Selenium [water, ground-]: 1.6531e-6 kg; lognormal variance with pedigree 1.44, pedigree (1,1,5,1,1)
  (same comment as for Chromium VI)
- Silicon [water, ground-]: 0.00069805 kg; lognormal variance with pedigree 0.58, pedigree (1,1,5,1,1)
  (same comment as for Chromium VI)
- Antimony [water, ground-]: 3.9428e-6 kg; lognormal variance with pedigree 1.33, pedigree (1,1,5,1,1)
  (same comment as for Chromium VI)
- Mercury [water, ground-, long-term]: 2.5839e-8 kg; lognormal variance with pedigree 2.07, pedigree (1,1,5,1,1)
  (same comment as for Barium)
- Arsenic, ion [water, ground-, long-term]: 1.2661e-14 kg; lognormal variance with pedigree 1.3, pedigree (1,1,5,1,1)
  (same comment as for Barium)
- Strontium [water, ground-]: 2.732e-7 kg; lognormal variance with pedigree 1.52, pedigree (1,1,5,1,1)
  (same comment as for Chromium VI)
- Beryllium [water, ground-]: 3.9083e-9 kg; lognormal variance with pedigree 2.09, pedigree (1,1,5,1,1)
  (same comment as for Chromium VI)
- Titanium, ion [water, ground-, long-term]: 0.00025741 kg; lognormal variance with pedigree 0.88, pedigree (1,1,5,1,1)
  (same comment as for Barium)
- Thallium [water, ground-, long-term]: 5.1183e-8 kg; lognormal variance with pedigree 1.99, pedigree (1,1,5,1,1)
  (same comment as for Barium)
- Zinc, ion [water, ground-]: 3.6431e-9 kg; lognormal variance with pedigree 2.09, pedigree (1,1,5,1,1)
  (same comment as for Chromium VI)
- Tin, ion [water, ground-, long-term]: 4.1234e-6 kg; lognormal variance with pedigree 1.42, pedigree (1,1,5,1,1)
  (same comment as for Barium)
- Bromine [water, ground-, long-term]: 6.9735e-8 kg; lognormal variance with pedigree 1.45, pedigree (1,1,5,1,1)
  (same comment as for Barium)
- Iron, ion [water, ground-]: 1.1645e-7 kg; lognormal variance with pedigree 1.65, pedigree (1,1,5,1,1)
  (same comment as for Chromium VI)

## Sampling procedure
country-specific calculation based on literature data

## Extrapolations
This dataset has been extrapolated from year 2000 to the year of the calculation (2019). The uncertainty has been adjusted accordingly.

## Review by Niels Jungbluth 2009-01-22
passed.
