# treatment of hard coal ash, residual material landfill

Dataset: EcoSpold 2, unit process
Geography: NL
Time period: 1994-01-01 to 2019-12-31
Technology level: current
Classification: ISIC rev.4 ecoinvent: 3822:Treatment and disposal of hazardous waste
Classification: EcoSpold01Categories: waste management/residual material landfill
Tags: Treatment; ConvertedDataset
Scenario: Business-as-Usual
System model: Allocation at the point of substitution
Generated by: Gabor Doka (obsolete)
Published in: Doka G. 2009
Database: ecoinvent
isCopyrightProtected: true
accessRestrictedTo: 1

## General comment
Inventoried waste contains 100% NL hard coal ash; .
waste composition (wet, in ppm): H2O n.a.; O 503850; H n.a.; C n.a.; S 3442.2; N n.a.; P 1167.3; B 255.28; Cl 24.299; Br 40.767; F 92.402; I 3.0702; Ag n.a.; As 25.905; Ba 1446.7; Cd 1.2802; Co 34.801; Cr 152.46; Cu 79.504; Hg 0.10736; Mn 418.72; Mo 13.197; Ni 101.59; Pb 60.916; Sb 3.9052; Se 13.187; Sn 75.906; V 179.04; Zn 127.98; Be 12.963; Sc 49.192; Sr 1345.2; Ti 7701.5; Tl 6.7681; W 20.017; Si 199630; Fe 57245; Ca 16176; Al 137790; K 15538; Mg 44926; Na 7940.1;
Share of carbon in waste that is biogenic 60.4%.
[This dataset was already contained in the ecoinvent database version 2. It was not individually updated during the transfer to ecoinvent version 3. Life Cycle Impact Assessment results may still have changed, as they are affected by changes in the supply chain, i.e. in other datasets. This dataset was generated following the ecoinvent quality guidelines for version 2. It may have been subject to central changes described in the ecoinvent version 3 change report (http://www.ecoinvent.org/database/ecoinvent-version-3/reports-of-changes/), and the results of the central updates were reviewed extensively. The changes added e.g. consistent water flows and other information throughout the database. The documentation of this dataset can be found in the ecoinvent reports of version 2, which are still available via the ecoinvent website. The change report linked above covers all central changes that were made during the conversion process.]

## Included activities end
Waste-specific short-term emissions to water from leachate. Long-term emissions from landfill to ground water.

## Geography
Technology encountered in Switzerland in 2000. Landfill includes base seal and leachate collection system.

## Technology
Swiss residual material landfill for polluted, inorganic waste. With base seal and leachate collection system. Recultivation after closure.

## Time period
Waste composition as given in literature reference, theoretical data or other source. Transfer coefficients from prospective model.

## Reference product
- hard coal ash: -1 kg; CPC 39: Wastes or scraps; By-product classification Waste
  EcoSpold01Location=NL
  production volume 4.97067e7 kg
    Estimated. Energy prodcution in mainly responsible for hard coal ashes. The production volume is calculated as the sum of hard coal ashes resulting from electricity and heat and power co-generation production from hard coal in the respective country.
  property price 0 EUR2005
    Waste products are assigned a price of zero as they are assumed to require further treatment.
  property carbon content 0
    carbon content on a dry matter basis (reserved; not for manual entry)
  properties: dry mass 1 kg, water content 0, wet mass 1 kg, water in wet mass 0 kg, carbon content, non-fossil 0, carbon content, fossil 0, carbon allocation 0 kg

## Inputs from technosphere
- process-specific burdens, residual material landfill: 1 kg; lognormal variance with pedigree 0.04, pedigree (1,1,5,1,1)
  EcoSpold01Location=CH
  demands per kilogram waste. uncertainty is heeded in the module;activityLink introduced to establish a direct link to the corresponding regional supply of this product
- residual material landfill: 2.0833e-9 unit; lognormal variance with pedigree 0.04, pedigree (1,1,5,1,1)
  EcoSpold01Location=CH
  demands per kilogram waste. uncertainty is heeded in the module

## Emissions to nature
- Zinc, ion [water, ground-, long-term]: 1.5685e-6 kg; lognormal variance with pedigree 5.81, pedigree (1,1,5,1,1)
  uncertainty is calculated from uncertainties in waste composition and transfer coefficients in incinerator and landfills.
- Vanadium, ion [water, ground-, long-term]: 0.00013761 kg; lognormal variance with pedigree 0.94, pedigree (1,1,5,1,1)
  (same comment as for Zinc, ion)
- Magnesium [water, ground-, long-term]: 0.0051046 kg; lognormal variance with pedigree 1.42, pedigree (1,1,5,1,1)
  (same comment as for Zinc, ion)
- Molybdenum [water, ground-, long-term]: 6.0589e-8 kg; lognormal variance with pedigree 1.3, pedigree (1,1,5,1,1)
  (same comment as for Zinc, ion)
- Vanadium, ion [water, surface water]: 4.394e-7 kg; lognormal variance with pedigree 1.46, pedigree (1,1,5,1,1)
  uncertainty is calculated from uncertainties in waste composition and transfer coefficients in residual landfill
- Phosphate [water, ground-, long-term]: 0.0007996 kg; lognormal variance with pedigree 1.24, pedigree (1,1,5,1,1)
  (same comment as for Zinc, ion)
- Lead [water, surface water]: 5.2751e-10 kg; lognormal variance with pedigree 2.35, pedigree (1,1,5,1,1)
  (same comment as for Vanadium, ion)
- Calcium, ion [water, surface water]: 2.44e-6 kg; lognormal variance with pedigree 1.25, pedigree (1,1,5,1,1)
  (same comment as for Vanadium, ion)
- Iron, ion [water, ground-, long-term]: 0.00028691 kg; lognormal variance with pedigree 7.23, pedigree (1,1,5,1,1)
  (same comment as for Zinc, ion)
- Chloride [water, surface water]: 6.9499e-6 kg; lognormal variance with pedigree 1.23, pedigree (1,1,5,1,1)
  (same comment as for Vanadium, ion)
- Silicon [water, surface water]: 0.00044897 kg; lognormal variance with pedigree 0.65, pedigree (1,1,5,1,1)
  (same comment as for Vanadium, ion)
- Manganese [water, surface water]: 5.7742e-9 kg; lognormal variance with pedigree 2.03, pedigree (1,1,5,1,1)
  (same comment as for Vanadium, ion)
- Copper, ion [water, surface water]: 5.1093e-9 kg; lognormal variance with pedigree 2.05, pedigree (1,1,5,1,1)
  (same comment as for Vanadium, ion)
- Sodium, ion [water, surface water]: 0.0029797 kg; lognormal variance with pedigree 0.46, pedigree (1,1,5,1,1)
  (same comment as for Vanadium, ion)
- Iron, ion [water, surface water]: 4.7898e-7 kg; lognormal variance with pedigree 1.5, pedigree (1,1,5,1,1)
  (same comment as for Vanadium, ion)
- Silicon [water, ground-, long-term]: 0.19918 kg; lognormal variance with pedigree 0.11, pedigree (1,1,5,1,1)
  (same comment as for Zinc, ion)
- Tin, ion [water, surface water]: 2.4013e-9 kg; lognormal variance with pedigree 2.15, pedigree (1,1,5,1,1)
  (same comment as for Vanadium, ion)
- Bromine [water, surface water]: 3.2748e-5 kg; lognormal variance with pedigree 1.12, pedigree (1,1,5,1,1)
  (same comment as for Vanadium, ion)
- Potassium, ion [water, surface water]: 0.00438 kg; lognormal variance with pedigree 0.4, pedigree (1,1,5,1,1)
  (same comment as for Vanadium, ion)
- Beryllium [water, ground-, long-term]: 4.6931e-6 kg; lognormal variance with pedigree 1.53, pedigree (1,1,5,1,1)
  (same comment as for Zinc, ion)
- Fluoride [water, surface water]: 5.0074e-6 kg; lognormal variance with pedigree 1.19, pedigree (1,1,5,1,1)
  (same comment as for Vanadium, ion)
- Thallium [water, surface water]: 4.0907e-9 kg; lognormal variance with pedigree 2.08, pedigree (1,1,5,1,1)
  (same comment as for Vanadium, ion)
- Zinc, ion [water, surface water]: 2.6185e-9 kg; lognormal variance with pedigree 2.13, pedigree (1,1,5,1,1)
  (same comment as for Vanadium, ion)
- Boron [water, ground-, long-term]: 0.00025101 kg; lognormal variance with pedigree 0.88, pedigree (1,1,5,1,1)
  (same comment as for Zinc, ion)
- Nickel, ion [water, surface water]: 6.1404e-8 kg; lognormal variance with pedigree 1.72, pedigree (1,1,5,1,1)
  (same comment as for Vanadium, ion)
- Selenium [water, ground-, long-term]: 8.5363e-6 kg; lognormal variance with pedigree 1.28, pedigree (1,1,5,1,1)
  (same comment as for Zinc, ion)
- Fluoride [water, ground-, long-term]: 8.7395e-5 kg; lognormal variance with pedigree 1.01, pedigree (1,1,5,1,1)
  (same comment as for Zinc, ion)
- Manganese [water, ground-, long-term]: 3.4588e-6 kg; lognormal variance with pedigree 6.56, pedigree (1,1,5,1,1)
  (same comment as for Zinc, ion)
- Chromium VI [water, surface water]: 9.1649e-6 kg; lognormal variance with pedigree 1.11, pedigree (1,1,5,1,1)
  (same comment as for Vanadium, ion)
- Scandium [water, ground-, long-term]: 4.225e-5 kg; lognormal variance with pedigree 1.1, pedigree (1,1,5,1,1)
  (same comment as for Zinc, ion)
- Chromium VI [water, ground-, long-term]: 2.8951e-5 kg; lognormal variance with pedigree 0.95, pedigree (1,1,5,1,1)
  (same comment as for Zinc, ion)
- Phosphate [water, surface water]: 1.3349e-6 kg; lognormal variance with pedigree 1.46, pedigree (1,1,5,1,1)
  (same comment as for Vanadium, ion)
- Boron [water, surface water]: 2.0002e-6 kg; lognormal variance with pedigree 1.27, pedigree (1,1,5,1,1)
  (same comment as for Vanadium, ion)
- Beryllium [water, surface water]: 7.8349e-9 kg; lognormal variance with pedigree 1.99, pedigree (1,1,5,1,1)
  (same comment as for Vanadium, ion)
- Strontium [water, ground-, long-term]: 0.000487 kg; lognormal variance with pedigree 0.92, pedigree (1,1,5,1,1)
  (same comment as for Zinc, ion)
- Arsenic, ion [water, surface water]: 2.5905e-5 kg; lognormal variance with pedigree 1.18, pedigree (1,1,5,1,1)
  (same comment as for Vanadium, ion)
- Mercury [water, ground-, long-term]: 5.0676e-9 kg; lognormal variance with pedigree 4.23, pedigree (1,1,5,1,1)
  (same comment as for Zinc, ion)
- Titanium, ion [water, surface water]: 3.8167e-6 kg; lognormal variance with pedigree 1.18, pedigree (1,1,5,1,1)
  (same comment as for Vanadium, ion)
- Titanium, ion [water, ground-, long-term]: 0.0022862 kg; lognormal variance with pedigree 0.81, pedigree (1,1,5,1,1)
  (same comment as for Zinc, ion)
- Sulfate [water, ground-, long-term]: 0.0092186 kg; lognormal variance with pedigree 0.54, pedigree (1,1,5,1,1)
  (same comment as for Zinc, ion)
- Magnesium [water, surface water]: 8.5218e-6 kg; lognormal variance with pedigree 1.11, pedigree (1,1,5,1,1)
  (same comment as for Vanadium, ion)
- Tungsten [water, ground-, long-term]: 1.2958e-5 kg; lognormal variance with pedigree 1.22, pedigree (1,1,5,1,1)
  (same comment as for Zinc, ion)
- Cadmium, ion [water, surface water]: 1.451e-11 kg; lognormal variance with pedigree 2.82, pedigree (1,1,5,1,1)
  (same comment as for Vanadium, ion)
- Tungsten [water, surface water]: 7.0593e-6 kg; lognormal variance with pedigree 1.25, pedigree (1,1,5,1,1)
  (same comment as for Vanadium, ion)
- Scandium [water, surface water]: 6.9424e-6 kg; lognormal variance with pedigree 1.19, pedigree (1,1,5,1,1)
  (same comment as for Vanadium, ion)
- Calcium, ion [water, ground-, long-term]: 0.0014616 kg; lognormal variance with pedigree 1.8, pedigree (1,1,5,1,1)
  (same comment as for Zinc, ion)
- Bromine [water, ground-, long-term]: 8.0187e-6 kg; lognormal variance with pedigree 1.14, pedigree (1,1,5,1,1)
  (same comment as for Zinc, ion)
- Antimony [water, surface water]: 1.3772e-6 kg; lognormal variance with pedigree 1.46, pedigree (1,1,5,1,1)
  (same comment as for Vanadium, ion)
- Iodide [water, ground-, long-term]: 3.0702e-13 kg; lognormal variance with pedigree 1.49, pedigree (1,1,5,1,1)
  (same comment as for Zinc, ion)
- Aluminium [water, surface water]: 6.8287e-5 kg; lognormal variance with pedigree 0.88, pedigree (1,1,5,1,1)
  (same comment as for Vanadium, ion)
- Antimony [water, ground-, long-term]: 2.528e-6 kg; lognormal variance with pedigree 1.44, pedigree (1,1,5,1,1)
  (same comment as for Zinc, ion)
- Molybdenum [water, surface water]: 1.3137e-5 kg; lognormal variance with pedigree 1.27, pedigree (1,1,5,1,1)
  (same comment as for Vanadium, ion)
- Nickel, ion [water, ground-, long-term]: 3.6781e-5 kg; lognormal variance with pedigree 1.26, pedigree (1,1,5,1,1)
  (same comment as for Zinc, ion)
- Chloride [water, ground-, long-term]: 1.735e-5 kg; lognormal variance with pedigree 1.19, pedigree (1,1,5,1,1)
  (same comment as for Zinc, ion)
- Mercury [water, surface water]: 8.4601e-12 kg; lognormal variance with pedigree 2.88, pedigree (1,1,5,1,1)
  (same comment as for Vanadium, ion)
- Copper, ion [water, ground-, long-term]: 3.0605e-6 kg; lognormal variance with pedigree 3.68, pedigree (1,1,5,1,1)
  (same comment as for Zinc, ion)
- Aluminium [water, ground-, long-term]: 0.040904 kg; lognormal variance with pedigree 0.5, pedigree (1,1,5,1,1)
  (same comment as for Zinc, ion)
- Selenium [water, surface water]: 4.6504e-6 kg; lognormal variance with pedigree 1.3, pedigree (1,1,5,1,1)
  (same comment as for Vanadium, ion)
- Strontium [water, surface water]: 8.1303e-7 kg; lognormal variance with pedigree 1.38, pedigree (1,1,5,1,1)
  (same comment as for Vanadium, ion)
- Cobalt [water, ground-, long-term]: 5.9497e-6 kg; lognormal variance with pedigree 1.92, pedigree (1,1,5,1,1)
  (same comment as for Zinc, ion)
- Thallium [water, ground-, long-term]: 2.4503e-6 kg; lognormal variance with pedigree 1.62, pedigree (1,1,5,1,1)
  (same comment as for Zinc, ion)
- Cadmium, ion [water, ground-, long-term]: 8.6914e-9 kg; lognormal variance with pedigree 7.81, pedigree (1,1,5,1,1)
  (same comment as for Zinc, ion)
- Barium [water, surface water]: 1.995e-8 kg; lognormal variance with pedigree 1.87, pedigree (1,1,5,1,1)
  (same comment as for Vanadium, ion)
- Sulfate [water, surface water]: 0.0011079 kg; lognormal variance with pedigree 0.65, pedigree (1,1,5,1,1)
  (same comment as for Vanadium, ion)
- Iodide [water, surface water]: 3.0702e-6 kg; lognormal variance with pedigree 1.46, pedigree (1,1,5,1,1)
  (same comment as for Vanadium, ion)
- Potassium, ion [water, ground-, long-term]: 0.011158 kg; lognormal variance with pedigree 0.36, pedigree (1,1,5,1,1)
  (same comment as for Zinc, ion)
- Cobalt [water, surface water]: 9.9328e-9 kg; lognormal variance with pedigree 1.96, pedigree (1,1,5,1,1)
  (same comment as for Vanadium, ion)
- Arsenic, ion [water, ground-, long-term]: 2.5905e-14 kg; lognormal variance with pedigree 1.21, pedigree (1,1,5,1,1)
  (same comment as for Zinc, ion)
- Tin, ion [water, ground-, long-term]: 1.4384e-6 kg; lognormal variance with pedigree 4.97, pedigree (1,1,5,1,1)
  (same comment as for Zinc, ion)
- Barium [water, ground-, long-term]: 1.195e-5 kg; lognormal variance with pedigree 6.4, pedigree (1,1,5,1,1)
  (same comment as for Zinc, ion)
- Lead [water, ground-, long-term]: 3.1598e-7 kg; lognormal variance with pedigree 7.99, pedigree (1,1,5,1,1)
  (same comment as for Zinc, ion)
- Sodium, ion [water, ground-, long-term]: 0.0049603 kg; lognormal variance with pedigree 0.44, pedigree (1,1,5,1,1)
  (same comment as for Zinc, ion)

## Sampling procedure
Landfill model based on observed leachate concentrations in literature. Extrapolated to 60'000 years heeding chemical characteristics. Initial waste composition from various literature sources.

## Extrapolations
This dataset has been extrapolated from year 2000 to the year of the calculation (2019). The uncertainty has been adjusted accordingly.

## Review by Niels Jungbluth 2009-02-15
passed.
