# phosphorus production, white, liquid

Dataset: EcoSpold 2, unit process
Geography: RER
Time period: 2000-01-01 to 2019-12-31
Technology level: current
Classification: ISIC rev.4 ecoinvent: 2011:Manufacture of basic chemicals
Classification: EcoSpold01Categories: chemicals/inorganics
Tags: ConvertedDataset
Scenario: Business-as-Usual
System model: Allocation at the point of substitution
Generated by: Roland Hischier
Published in: Hischier R. 2007
Database: ecoinvent
isCopyrightProtected: true
accessRestrictedTo: 1

## General comment
The functional unit is 1 kg of liquid ozone. Large uncertainty of the process data due to weak data on the production process (based only on literature values).
[This dataset was already contained in the ecoinvent database version 2. It was not individually updated during the transfer to ecoinvent version 3. Life Cycle Impact Assessment results may still have changed, as they are affected by changes in the supply chain, i.e. in other datasets. This dataset was generated following the ecoinvent quality guidelines for version 2. It may have been subject to central changes described in the ecoinvent version 3 change report (http://www.ecoinvent.org/database/ecoinvent-version-3/reports-of-changes/), and the results of the central updates were reviewed extensively. The changes added e.g. consistent water flows and other information throughout the database. The documentation of this dataset can be found in the ecoinvent reports of version 2, which are still available via the ecoinvent website. The change report linked above covers all central changes that were made during the conversion process.]

## Included activities end
Raw materials and chemicals used for production, by-products and waste produced, transport of materials to manufacturing plant, emissions to air, energy demand and an estimation of the infrastructure of the plant.

## Geography
Data used has no specific geographical origin - they represent typical values (Ullmann's). Average values are used for infrastructure and transports.

## Technology
Production from phosphate rock with the aid of the Wöhler process with a yield of 91%.

## Parameters
- fraction, cooling water, to air: 0.3875; name fraction_CW_to_air; = (0.5*fraction_CW_OT_to_air)+(0.5*fraction_CW_R_to_air); lognormal variance with pedigree 0.092025, pedigree (4,4,3,2,4)
  Calculated value based on literature value (see comments of the other parametres present in this dataset) and expert opinion. In the case when no industry/literature data are available about the type of cooling or directly fraction, cooling water, to air specific for the process a default assumption is applied. It is assumed that the once-through cooling system is used in 50% of all cases and recirculating system is used in another 50% of all cases.
- fraction, cooling water, cooling pond system, to air: 0.032; name fraction_CW_CP_to_air; lognormal variance with pedigree 0.0413, pedigree (2,3,1,3,1)
  Calculated based on literature value (Scown, C.D., 2011, Water Footprint of U.S. Transportation Fuels and supplying information of the article) (Vionnet, S., Quantis Water Database - Technical Report, 2012).
- fraction, cooling water, recirculating system, to air: 0.771; name fraction_CW_R_to_air; lognormal variance with pedigree 0.0413, pedigree (2,3,1,3,1)
  (same comment as for fraction, cooling water, cooling pond system, to air)
- fraction, process water, to air: 0.34 dimensionless; name fraction_PW_to_air; lognormal variance with pedigree 0.092025, pedigree (4,4,3,2,4)
  Literature value (Statistics Canada, 2007 & Shaffer, K.H., 2008, Consumptive water use in the Great Lakes Basin, USGS) (Vionnet, S., Quantis Water Database - Technical Report, 2012).
- fraction, cooling water, once-through system, to air: 0.004; name fraction_CW_OT_to_air; lognormal variance with pedigree 0.0413, pedigree (2,3,1,3,1)
  (same comment as for fraction, cooling water, cooling pond system, to air)

## Reference product
- phosphorus, white, liquid: 1 kg; CPC 34231: Chemical elements n.e.c.; inorganic acids except phosphoric, nitric and sulphonitric; inorganic oxygen compoun[…]; By-product classification allocatable product; CAS 7723-14-0
  EcoSpold01Location=RER
  production volume 1.32237 kg
    This is a placeholder value that does not reflect real-world production volumes. This dataset does not currently require a real-world production volume to work in the database framework, and no actual data were collected yet. This has no negative effect on the results of the ecoinvent database. The placeholder value of this activity was scaled according to the nominal GDP of 2005 (source: United Nations, http://data.un.org/Glossary.aspx?q=GDP+%28current+US%24%29, accessed 20130726) to reflect an appropriate share of the global production volume, which is also a placeholder value.
  property price 1.96071 EUR2005
    Calculated based on inputs: The price of the product has been calculated as a sum of the values of the material and energy inputs for this product. This value is therefore a rough estimation. It may underestimate the real price since there are additional expenses when producing any product. These expences can include for example labour costs, treatment of waste materials and profit for the producer. Please consider carefully whether this level of data quality is acceptable for your application.
  property carbon content 0
    carbon content on a dry matter basis (reserved; not for manual entry)
  properties: dry mass 1 kg, carbon content, fossil 0, water in wet mass 0 kg, water content 0, wet mass 1 kg, carbon content, non-fossil 0, carbon allocation 0 kg

## Inputs from technosphere
- chemical factory, organics: 4e-10 unit; lognormal variance with pedigree 0.5, pedigree (5,5,5,5,5)
  EcoSpold01Location=RER
  Estimation
  Uncertainty: estimation
- phosphate rock, as P2O5, beneficiated, dry: 4 kg; lognormal variance with pedigree 0.096, pedigree (4,5,5,5,3)
  EcoSpold01Location=MA
  According to quantitative information in Ullmann's
  Uncertainty: according to quantitative information in Ullmann's
  properties: dry mass 1 kg, wet mass 1 kg
- hard coal: 1.25 kg; lognormal variance with pedigree 0.096, pedigree (4,5,5,5,3)
  According to quantitative information in Ullmann's
  EcoSpold01Location=EEU
  Uncertainty: according to quantitative information in Ullmann's
  properties: carbon content, fossil 0.845, dry mass 0.94 kg, wet mass 1 kg, water content 0.0638298
  note on carbon content, fossil: C content 75-94% (specified in Tab 1.1, report 6, part VI). A mean content of 0.845 kg C/ kg dry hard coal was considered
- phosphate rock, as P2O5, beneficiated, wet: 4 kg; lognormal variance with pedigree 0.096, pedigree (4,5,5,5,3)
  According to quantitative information in Ullmann's
  EcoSpold01Location=US
  Uncertainty: according to quantitative information in Ullmann's
  properties: wet mass 1 kg, dry mass 1 kg
- gravel, crushed: 2.8 kg; lognormal variance with pedigree 0.096, pedigree (4,5,5,5,3)
  EcoSpold01Location=CH
  According to quantitative information in Ullmann's
  Uncertainty: according to quantitative information in Ullmann's
  properties: wet mass 1 kg, dry mass 1 kg
- electricity, medium voltage: 13 kWh; lognormal variance with pedigree 0.096, pedigree (4,5,5,5,3)
  According to quantitative information in Ullmann's
  EcoSpold01Location=UCTE
  Uncertainty: according to quantitative information in Ullmann's

## Inputs from nature
- Water, cooling, unspecified natural origin [natural resource, in water]: 0.024 m3; name water_cooling_UNO_input; lognormal variance with pedigree 0.208, pedigree (5,5,5,1,4)
  Estimated with data from a chemical plant
  Uncertainty: estimated with data from a chemical plant
- Water, unspecified natural origin [natural resource, in water]: 0.01 m3; name water_UNO_input; lognormal variance with pedigree 0.192, pedigree (3,5,5,5,5)
  Estimation
  Uncertainty: estimation

## Emissions to nature
- Carbon dioxide, fossil [air, urban air close to ground]: 0.003 kg; lognormal variance with pedigree 0.096, pedigree (4,5,5,5,3)
  According to quantitative information in Ullmann's
  Uncertainty: according to quantitative information in Ullmann's
- Carbon monoxide, fossil [air, urban air close to ground]: 0.263 kg; lognormal variance with pedigree 0.736, pedigree (4,5,5,5,3)
  (same comment as for Carbon dioxide, fossil)
- Water [water, unspecified]: 0.0213 m3; name water_to_water_unspecified; = water_cooling_UNO_input*(1-fraction_CW_to_air)+water_UNO_input*(1-fraction_PW_to_air); lognormal variance with pedigree 0.0807, pedigree (2,2,5,1,1)
  Calculated value based on literature values and expert opinion. See comments in the parametres' comment field.
  property fraction, origin: salt water 0; name fraction_origin_salt_water_Ww
  property fraction, origin: fresh water 0; name fraction_origin_fresh_water_Ww
  property fraction, origin: unspecified 1; name fraction_origin_unspecified_Ww
  property wet mass 1000 kg; name WM
  property dry mass 0 kg; name DM
  property water in wet mass 1000 kg; name WWM
  property carbon content, fossil 0; name C_content_fossil
  property carbon content, non-fossil 0; name C_content_non_fossil
- Chlorine [air, urban air close to ground]: 1.25e-6 kg; lognormal variance with pedigree 0.136, pedigree (4,5,5,5,3)
  (same comment as for Carbon dioxide, fossil)
- Water [air, unspecified]: 0.0127 m3; name water_to_air_unspecified; = (water_cooling_UNO_input*fraction_CW_to_air)+(water_UNO_input*fraction_PW_to_air); lognormal variance with pedigree 0.0807, pedigree (2,2,5,1,1)
  (same comment as for Water)
  property fraction, origin: fresh water 0; name fraction_origin_fresh_water
  property fraction, origin: salt water 0; name fraction_origin_salt_water
  property fraction, origin: unspecified 1; name fraction_origin_unspecified
- Particulates, < 2.5 um [air, urban air close to ground]: 7.5e-6 kg; lognormal variance with pedigree 0.396, pedigree (4,5,5,5,3)
  (same comment as for Carbon dioxide, fossil)
- Fluorine [air, urban air close to ground]: 6.25e-7 kg; lognormal variance with pedigree 0.136, pedigree (4,5,5,5,3)
  (same comment as for Carbon dioxide, fossil)
- Phosphorus [air, urban air close to ground]: 1.09e-6 kg; lognormal variance with pedigree 0.136, pedigree (4,5,5,5,3)
  (same comment as for Carbon dioxide, fossil)
- Particulates, > 2.5 um, and < 10um [air, urban air close to ground]: 2.5e-6 kg; lognormal variance with pedigree 0.216, pedigree (4,5,5,5,3)
  (same comment as for Carbon dioxide, fossil)
- Particulates, > 10 um [air, urban air close to ground]: 2.5e-6 kg; lognormal variance with pedigree 0.136, pedigree (4,5,5,5,3)
  (same comment as for Carbon dioxide, fossil)
- Methane, fossil [air, urban air close to ground]: 0.003 kg; lognormal variance with pedigree 0.216, pedigree (4,5,5,5,3)
  (same comment as for Carbon dioxide, fossil)

## Sampling procedure
Process data based on indications in Ullmann's encyclopedia.

## Extrapolations
This dataset has been extrapolated from year 2000 to the year of the calculation (2019). The uncertainty has been adjusted accordingly.

## Review by Hans-Jörg Althaus 2003-07-09
Passed
