# wastewater treatment facility construction, capacity 1.1E10l/year

Dataset: EcoSpold 2, unit process
Geography: RoW
Time period: 1996-01-01 to 2019-12-31
Technology level: current
Classification: ISIC rev.4 ecoinvent: 4220:Construction of utility projects
Classification: EcoSpold01Categories: waste management/wastewater treatment
Synonyms: municipal WWTP infrastructure capacity class 2
Tags: ConvertedDataset
Scenario: Business-as-Usual
System model: Allocation at the point of substitution
Generated by: Gabor Doka (obsolete)
Published in: Doka G. 2007
Database: ecoinvent
isCopyrightProtected: true
accessRestrictedTo: 1

## General comment
For municipal wastewater treatment plant capacity class 2 with an average per-captia equivalent PCE (Einwohnergleichwert) of 71'133 and an average annual sewage volume of 14.4 million m3/a. A lifetime of 30 years is assumed.
[This dataset was already contained in the ecoinvent database version 2. It was not individually updated during the transfer to ecoinvent version 3. Life Cycle Impact Assessment results may still have changed, as they are affected by changes in the supply chain, i.e. in other datasets. This dataset was generated following the ecoinvent quality guidelines for version 2. It may have been subject to central changes described in the ecoinvent version 3 change report (http://www.ecoinvent.org/database/ecoinvent-version-3/reports-of-changes/), and the results of the central updates were reviewed extensively. The changes added e.g. consistent water flows and other information throughout the database. The documentation of this dataset can be found in the ecoinvent reports of version 2, which are still available via the ecoinvent website. The change report linked above covers all central changes that were made during the conversion process.]

## Included activities end
Infrastructure materials for municipal wastewater treatment plant, transports, dismantling. Land use burdens.

## Geography
Specific to the technology mix encountered in Switzerland in 2000. Well applicable to modern treatment practices in Europe, North America or Japan.

## Technology
Three stage wastewater treatment (mechanical, biological, chemical) including sludge digestion (fermentation) according to the average technology in Switzerland

## Parameters
- fraction, tap water, to air: 0.15; name fraction_TW_to_air; lognormal variance with pedigree 0.092025, pedigree (4,4,3,2,4)
- fraction, process water, to air: 0.15 dimensionless; name fraction_PW_to_air; lognormal variance with pedigree 0.092025, pedigree (4,4,3,2,4)

## Reference product
- wastewater treatment facility, capacity 1.1E10l/year: 1 unit; CPC 53253: Sewage and water treatment plants; By-product classification allocatable product
  production volume 3.96633 unit
    This is a placeholder value that does not reflect real-world production volumes. This dataset does not currently require a real-world production volume to work in the database framework, and no actual data were collected yet. This has no negative effect on the results of the ecoinvent database.
  property price 2.31421e7 EUR2005
    Calculated based on inputs: The price of the product has been calculated as a sum of the values of the material and energy inputs for this product. This value is therefore a rough estimation. It may underestimate the real price since there are additional expenses when producing any product. These expences can include for example labour costs, treatment of waste materials and profit for the producer. Please consider carefully whether this level of data quality is acceptable for your application.
  property true value 2.31421e7
    allocation property applied in "true value" allocation // value calculated from revenue

## By-products
- heat, for reuse in municipal waste incineration only: 0 MJ; CPC 17300: Steam and hot water; By-product classification allocatable product; pedigree (1,1,1,1,1)
  Net electricity generated from this waste and used in internal MSWI plant energy redistribution.
  Uncertainty: uncertainty is calculated from uncertainties in waste composition and uncertainties in energy efficiency and the uncertainty in internal energy demand
  production volume 2.22025e6 MJ
  property exergy 0.1842 MJ; name E_th_prod_MSWI_exergy
    This exergy property is based on the exergy content of the product.
  property price 0.0106 EUR2005; name E_th_prod_MSWI_price_EUR2005
    Average European district heat price from Ecoheatcool and Euroheat 2005-2006, Ecoheat Work package 1: The European heat market. Final report. 10.6 EUR/GJ i s the price of district heat. http://www.solarthermalworld.org/files/Ecoheatcool%20WP1%20Web.pdf?download
  property true value relation 0.1842; name E_th_prod_MSWI_true_value_relation
    property to calculate "true value" from
  property true value 4209.69
    allocation property applied in "true value" allocation // value calculated from true value relation
- electricity, for reuse in municipal waste incineration only: 0 kWh; CPC 17100: Electrical energy; By-product classification allocatable product; pedigree (1,1,1,1,1)
  (same comment as for heat, for reuse in municipal waste incineration only)
  production volume 318616 kWh
  property exergy 3.6 MJ; name E_el_prod_MSWI_exergy
    This exergy property is based on the exergy content of the product.
  property true value relation 3.6; name E_el_prod_MSWI_true_value_relation
    property to calculate "true value" from
  property price 0.1 EUR2005; name E_el_prod_MSWI_price_EUR2005
    Estimated to be the same price as in case of electricity, medium voltage.
  property true value 11798.6
    (same comment as for heat, for reuse in municipal waste incineration only)
- iron scrap, sorted, pressed: 0 kg; By-product classification Recyclable; CPC 39310: Slag, dross, scalings and other waste from the manufacture of iron or steel; pedigree (1,1,1,1,1)
  Iron scrap recovered from this waste.
  production volume 18264.8 kg
  property price 0.175 EUR2005
    Temporary price data. Calculated as 90% of purchasers price based on: 2005 import and export prices (total trades (USD) divided by total weight (kg) in biggest economies of the world: EU27, USA, Brasil, China, India, Japan and Russia) from UN Commodity Trade Statistics Database (http://data.un.org/Explorer.aspxDatabase [Accessed 2011.06.20]). Commodity: Waste or scrap, of cast iron
  property carbon content 0
    carbon content on a dry matter basis (reserved; not for manual entry)
  property true value 69.766
    allocation property applied in "true value" allocation // value calculated from revenue
  properties: water content 0, water in wet mass 0 kg, carbon content, fossil 0, dry mass 1 kg, carbon content, non-fossil 0, wet mass 1 kg, carbon allocation 0 kg

## Inputs from technosphere
- stone wool, packed: 90936.8 kg; lognormal variance with pedigree 0.3421, pedigree (1,2,5,5,1)
  Data from 3 plants
  properties: dry mass 1 kg, wet mass 1 kg, carbon content, fossil 0.015401
  note on carbon content, fossil: The chemical composition of the glass fibres used in the rock wool production is similar to the composition of naturally cooled volcano basalt and has a composition listed in Tab. 3.1 and 3.2 in ecoinvent v2.2 report 16, part XIV. Rock wool contains: a minimum of 96% mineral fibres,between 0.5 and 3.0 weight percent of phenolic resin depending on the specific product characteristics, and about 0.2 percent mineral oil (ecoinvent v2.2 report 16, part XIV). An average composition of 1.8% phenolic resin, 0.2% mineral oil, and 98% mineral fibres has been assumed and used to calculate C content of the rock wool
- glass fibre: 203858 kg; lognormal variance with pedigree 0.3421, pedigree (1,2,5,5,1)
  Data from 3 plants
  properties: wet mass 1 kg, dry mass 1 kg
- reinforcing steel: 8.08438e6 kg; lognormal variance with pedigree 0.3421, pedigree (1,2,5,5,1)
  Data from 3 plants
  properties: wet mass 1 kg, carbon content, fossil 0.004, dry mass 1 kg
- excavation, hydraulic digger: 362748 m3; lognormal variance with pedigree 0.3421, pedigree (1,2,5,5,1)
  Data from 3 plants
- synthetic rubber: 92036.1 kg; lognormal variance with pedigree 0.3421, pedigree (1,2,5,5,1)
  Data from 3 plants
  properties: dry mass 1 kg, wet mass 1 kg, carbon content, fossil 0.871949
  note on carbon content, fossil: EPDM (Ethylene-propene-diene terpolymer) rubber is a terpolymer of ethylene, propene, and a diene with the residual unsaturated portion of the diene in the side chain (ecoinvent v2.2 report 7-part XX & Ullmann). Chemical formula (deduced from Evidences of Solvent-Induced Miscibility in Polychloroprene-co-Ethylene-Propene Diene Terpolymer Blends, Dubey et al., Journal of Applied Polymer Science, 2009, 111:1884–1891): C20H35
- waste polyethylene/polypropylene product: 0 kg; pedigree (1,1,1,1,1)
  Data from 3 plants
  production volume 0 kg
    Calculated from the production volume of wastewater treatment facility, capacity 1.1E10l/year in proportion to the respective output amounts.
  properties: carbon content, fossil 0.748045, wet mass 1 kg, water content 0.180638, dry mass 0.847 kg
  note on carbon content, fossil: Mixed various plastics was used to estimate the C content of this waste (Tab A.2, ecoinvent v2.2 report 13_I)
- polyethylene, high density, granulate: 254823 kg; lognormal variance with pedigree 0.3421, pedigree (1,2,5,5,1)
  Data from 3 plants
  properties: dry mass 1 kg, carbon content, fossil 0.857143, wet mass 1 kg
  note on carbon content, fossil: Polyethylene is formed out of a huge amount of ethylene monomers (C2H4) (ecoinvent v2.2 report 11_II). MW=28 g/mol
- pitch: 0 kg; pedigree (1,1,1,1,1)
  Data from 3 plants
  properties: dry mass 1 kg, carbon content, fossil 0.83, wet mass 1 kg
- waste bitumen sheet: -52163.8 kg; lognormal variance with pedigree 0.3421, pedigree (1,2,5,5,1)
  Data from 3 plants
  production volume 156600 kg
    (same comment as for waste polyethylene/polypropylene product)
  properties: water content 0.0152284, dry mass 0.985 kg, carbon content, fossil 0.643207, wet mass 1 kg
  note on carbon content, fossil: The bitumen sheet is made of 63% bitumen, 24% surface spread and filler (assumed to be pure SiO2), 6% carrier fleece (assumed to be PE) and 7% elastomer (assumed to be PS) (ecoinvent v2.2 report 13_I, pg 40). C content of bitumen, PE and PS from Tab A.6 and A.1 (ecoinvent v2.2 report 13_I, pg 40), respectively. C content of waste also given in the dataset
- polyethylene, low density, granulate: 1678.83 kg; lognormal variance with pedigree 0.3421, pedigree (1,2,5,5,1)
  Data from 3 plants
  properties: wet mass 1 kg, dry mass 1 kg, carbon content, fossil 0.857143
- steel, chromium steel 18/8, hot rolled: 648549 kg; lognormal variance with pedigree 0.3421, pedigree (1,2,5,5,1)
  Data from 3 plants
  properties: carbon content, fossil 0.0008, dry mass 1 kg, wet mass 1 kg
  note on carbon content, fossil: Stainless steel model is the grade 304 steel (18/8 stainless, 18% chromium 8% nickel; max. 0.08% C)
- waste reinforced concrete: 0 kg; pedigree (1,1,1,1,1)
  Data from 3 plants
  production volume 0 kg
    (same comment as for waste polyethylene/polypropylene product)
  properties: water content 0.00585407, dry mass 0.99418 kg, wet mass 1 kg
- chemical, inorganic: 51764 kg; lognormal variance with pedigree 0.3421, pedigree (1,2,5,5,1)
  Data from 3 plants
  properties: wet mass 1 kg, carbon content, fossil 0.003, dry mass 1 kg
  note on carbon content, fossil: This dataset is an unweighted average of 20 inorganic substances (listed in Tab 88.1, ecoinvent v2.2 report 8, part II), being part of the top100 chemicals included in this database. The C-content has also been calculated as an unweighted average of the C content of the substances composing this dataset.
- tap water: 0 kg; name tap_water_input; pedigree (1,1,1,1,1)
  Data from 3 plants
  properties: wet mass 1 kg, carbon content, fossil 0.00178991, water content 2962.17, dry mass 0.000337476 kg
  note on carbon content, fossil: Bicarbonate content is 2.93 mol/m3. CO2 content is 0.1 mol/m3 (ecoinvent v2.2 report 8, Tab 93.1).
- waste mineral wool: 0 kg; pedigree (1,1,1,1,1)
  Data from 3 plants
  production volume 0 kg
    (same comment as for waste polyethylene/polypropylene product)
  properties: wet mass 1 kg, dry mass 1 kg
- aluminium, cast alloy: 90337.2 kg; lognormal variance with pedigree 0.3421, pedigree (1,2,5,5,1)
  Data from 3 plants
  properties: dry mass 1 kg, wet mass 1 kg
- concrete, medium strength: 0 m3; pedigree (1,1,1,1,1)
  Data from 3 plants
  properties: dry mass 2190 kg, water content 0.086758, wet mass 2380 kg
- copper: 96033.3 kg; lognormal variance with pedigree 0.3421, pedigree (1,2,5,5,1)
  Data from 3 plants
  properties: wet mass 1 kg, dry mass 1 kg
- extrusion, plastic film: 255822 kg; lognormal variance with pedigree 0.3421, pedigree (1,2,5,5,1)
  Data from 3 plants
- limestone, crushed, washed: 2.23844e6 kg; lognormal variance with pedigree 0.3421, pedigree (1,2,5,5,1)
  Data from 3 plants
  properties: wet mass 1 kg, carbon content, fossil 0.117257, water content 0.00200401, dry mass 0.998 kg
  note on carbon content, fossil: Table 3.1, ecoinvent v2.2 report 7, part VII, pg 3. MW CaCO3=100, MW MgCO3=84. C content of limestone is 0.117257 kg/kg DM
- electricity, medium voltage: 0 kWh; pedigree (1,1,1,1,1)
  Data from 3 plants
- chemical, organic: 422706 kg; lognormal variance with pedigree 0.3421, pedigree (1,2,5,5,1)
  Data from 3 plants
  properties: dry mass 1 kg, wet mass 1 kg, carbon content, fossil 0.628
  note on carbon content, fossil: This dataset is an unweighted average of 20 organic substances (listed in Tab 88.1, ecoinvent v2.2 report 8, part II), being part of the top100 chemicals included in this database. The C-content has also been calculated as an unweighted average of the C content of the substances composing this dataset.
- waste polyethylene/polypropylene product: -98372, -249386 kg (2 entries); lognormal variance with pedigree 0.3421, pedigree (1,2,5,5,1)
  Data from 3 plants
  production volume 1.044e6 kg
- pitch: 2391.44, 136.292, 7924.67, 6168.57, 276.501, 394.731, 34871.6 kg (7 entries); lognormal variance with pedigree 0.3421, pedigree (1,2,5,5,1)
  Data from 3 plants
- waste reinforced concrete: -1.55081e7, -2.21327e8 kg (2 entries); lognormal variance with pedigree 0.3421, pedigree (1,2,5,5,1)
  Data from 3 plants
  production volume 7.11e8 kg
- tap water: 14274.8, 118588, 23591.5, 5.07277e6, 594885, 15475.8, 44020.6, 6.80757e6 kg (8 entries); lognormal variance with pedigree 0.3421, pedigree (1,2,5,5,1)
  Data from 3 plants
- waste mineral wool: -85731.4, -209064 kg (2 entries); lognormal variance with pedigree 0.3421, pedigree (1,2,5,5,1)
  Data from 3 plants
  production volume 885000 kg
- concrete, medium strength: 3614.9, 1322.82, 5127.48, 3768.45, 1033.55, 89060.6 m3 (6 entries); lognormal variance with pedigree 0.3421, pedigree (1,2,5,5,1)
  Data from 3 plants
- electricity, medium voltage: 41.7058, 7.5887, 175.169, 596.18, 128.693, 1865.91, 267.047, 874.955 kWh (8 entries); lognormal variance with pedigree 0.3421, pedigree (1,2,5,5,1)
  Data from 3 plants

## Inputs from nature
- Transformation, to industrial area [natural resource, land]: 56061.1 m2; lognormal variance with pedigree 0.1632, pedigree (2,3,5,5,1)
  Estimate on land area from 3 plants
- Transformation, from pasture, man made [natural resource, land]: 56061.1 m2; lognormal variance with pedigree 0.1632, pedigree (2,3,5,5,1)
  Estimate on land area from 3 plants
- Occupation, construction site [natural resource, land]: 56061.1 m2*year; lognormal variance with pedigree 0.0832, pedigree (2,3,5,5,1)
  Estimate on land area from 3 plants, class capacity size and building, operation time
- Occupation, industrial area [natural resource, land]: 1.68083e6 m2*year; lognormal variance with pedigree 0.0832, pedigree (2,3,5,5,1)
  Estimate on land area from 3 plants, class capacity size and building, operation time

## Emissions to nature
- Water [air, unspecified]: 1903.68 m3; name water_to_air_unspecified; lognormal variance with pedigree 0.0827, pedigree (2,2,5,5,1)
  Calculated value based on literature values and expert opinion. See comments in the parametres' comment field.
  property fraction, origin: salt water 0; name fraction_origin_salt_water
  property fraction, origin: fresh water 1; name fraction_origin_fresh_water
  property fraction, origin: unspecified 0; name fraction_origin_unspecified
- Water [water, unspecified]: 10787.5 m3; name water_to_water_unspecified; lognormal variance with pedigree 0.0827, pedigree (2,2,5,5,1)
  (same comment as for Water)
  property dry mass 0 kg; name DM
  property carbon content, fossil 0; name C_content_fossil
  property carbon content, non-fossil 0; name C_content_non_fossil
  property wet mass 1000 kg; name WM
  property fraction, origin: fresh water 1; name fraction_origin_fresh_water_Ww
  property fraction, origin: salt water 0; name fraction_origin_salt_water_Ww
  property water in wet mass 1000 kg; name WWM
  property fraction, origin: unspecified 0; name fraction_origin_unspecified_Ww

## Sampling procedure
data from literature

## Extrapolations
data from three Swiss WWTP, linearily extrapolated according to capacity class. This dataset has been copied from an original dataset covering the geography CH. The uncertainty has been adjusted accordingly.

## Review by Niels Jungbluth 2003-06-18
Passed.
