# treatment of waste paperboard, unsorted, sorting

Dataset: EcoSpold 2, unit process
Geography: CH
Time period: 1994-01-01 to 2019-12-31
Technology level: current
Classification: EcoSpold01Categories: waste management/building demolition
Classification: ISIC rev.4 ecoinvent: 3830:Materials recovery
Tags: Treatment
Scenario: Business-as-Usual
System model: Allocation at the point of substitution
Generated by: [System]
Published in: Doka G. 2007
Database: ecoinvent
isCopyrightProtected: true
accessRestrictedTo: 1

## General comment
This dataset represents sorting of waste paperboard into waste paperboard, sorted which is not meant to be disposed, but reused.

## Included activities end
energy for dismantling, particulate matter emissions from dismantling and handling, machines for handling in sorting plant, electricity demand for sorting plant, transport to dismantling facilities, final disposal of waste material,

## Geography
Specific to the technology mix encountered in Switzerland in late 1990ies

## Technology
Building demolition with skid-steer loaders. Dry sorting plant for building wastes with pre-sorting of mixed waste, crushing and manual sorting.

## Reference product
- waste paperboard, unsorted: 0 kg; name RP_waste_paperboard; By-product classification Recyclable; CPC 39240: Waste and scrap of paper or paperboard
  production volume 0 kg; name PV_RP
    Estimated value. Used paper and carton in CH is of 1.5 million tons, of which 82% are recycled. 50% is assumed to be paper and 50% is assumed to be carton.
    Source: Peter Siegenthaler (2013) Used paper is big business. Retrieved from: http://www.swissinfo.ch/eng/used-paper-is-big-business/37276480, accessed 6th May 2016
  property price 0.03924 EUR2005; name RP_waste_paperboard_price_EUR2005
    Temporary price data. Calculated as 90% of purchasers price based on: Assumed to be 10% less than for sorted waste paperboard
  property carbon content, non-fossil 0.483259
    C content was calculated for 1 kg DM, using data in Tab A.3, ecoinvent v2.2 report 13_I.
  property carbon content 0.483259
    carbon content on a dry matter basis (reserved; not for manual entry)
  properties: wet mass 1 kg, water content 0.243781, water in wet mass 0.196 kg, dry mass 0.804 kg, carbon content, fossil 0, carbon allocation 0.38854 kg
- waste paperboard, sorted: 1 kg; CPC 39240: Waste and scrap of paper or paperboard; By-product classification Recyclable; pedigree (1,1,1,1,1)
  It is assumed that 86.3% (wet weight) of waste paperboard, unsorted is segregated to waste paperboard, sorted. Waste paper, sorted is later used in recycling industry where maximum 79% of it, is transformed into new paperboard.
  production volume 5.30745e8 kg

## By-products
- waste paperboard, sorted: 0 kg; name BP1; = ABS(RP_waste_paperboard*0.863); CPC 39240: Waste and scrap of paper or paperboard; By-product classification Recyclable; pedigree (1,1,1,1,1)
  (same comment as for waste paperboard, sorted)
  production volume 0 kg; name PV_RP1; = BP1*PV_RP
    Calculated from production volume of reference product using the relative outputs.
  property price 0.0436 EUR2005; name ByP_waste_paperboard_sorted_price_EUR200
    Estimated value; three different sources were used to determine the price for waste paperboard, sorted. 35 AUD/tonne (http://larimer.org/solidwaste/charts/Current.htm, accessed 20130328), 70 GBP/tonne (http://www.letsrecycle.com/prices/waste%20paper, accessed 20130328) and 20 USD/tonne (http://www.oxpaperboard.com/1/post/2013/03/ox-paperboard-announces-price-adjustment-to-uncoated-recycled-paperboard.html, accessed 20130328).
  property water content 0.243781; = WWM_waste_paperboard_sorted/ DM_waste_paperboard_sorted
  property water in wet mass 0.196 kg; name WWM_waste_paperboard_sorted; = WM_waste_paperboard_sorted- DM_waste_paperboard_sorted
  property dry mass 0.804 kg; name DM_waste_paperboard_sorted
  property wet mass 1 kg; name WM_waste_paperboard_sorted
  property carbon content 0.483259
    carbon content on a dry matter basis (reserved; not for manual entry)
  properties: carbon content, non-fossil 0.483259, carbon content, fossil 0, carbon allocation 0.38854 kg
- electricity, for reuse in municipal waste incineration only: 0 kWh; CPC 17100: Electrical energy; By-product classification allocatable product; pedigree (1,1,1,1,1)
  Net electricity generated from this waste and used in internal MSWI plant energy redistribution.
  Uncertainty: uncertainty is calculated from uncertainties in waste composition and uncertainties in energy efficiency and the uncertainty in internal energy demand
  property true value relation 3.6; name E_el_prod_MSWI_true_value_relation
    property to calculate "true value" from
  property exergy 3.6 MJ; name E_el_prod_MSWI_exergy
    This exergy property is based on the exergy content of the product.
  property price 0.1 EUR2005; name E_el_prod_MSWI_price_EUR2005
    Estimated to be the same price as in case of electricity, medium voltage.
- heat, for reuse in municipal waste incineration only: 0 MJ; CPC 17300: Steam and hot water; By-product classification allocatable product; pedigree (1,1,1,1,1)
  Net useful heat generated from this waste and used in internal MSWI plant energy redistribution.
  Uncertainty: uncertainty is calculated from uncertainties in waste composition and uncertainties in energy efficiency and the uncertainty in internal energy demand
  property true value relation 0.1842; name E_th_prod_MSWI_true_value_relation
    property to calculate "true value" from
  property exergy 0.1842 MJ; name E_th_prod_MSWI_exergy
    This exergy property is based on the exergy content of the product.
  property price 0.0106 EUR2005; name E_th_prod_MSWI_price_EUR2005
    Average European district heat price from Ecoheatcool and Euroheat 2005-2006, Ecoheat Work package 1: The European heat market. Final report. 10.6 EUR/GJ i s the price of district heat. http://www.solarthermalworld.org/files/Ecoheatcool%20WP1%20Web.pdf?download
- zinc concentrate: 0 kg; CPC 14290: Other non-ferrous metal ores and concentrates (other than uranium or thorium ores and concentrates); By-product classification allocatable product
  Calculated value from the knowledge of the properties of both products.
  property price 0.38 EUR2005; name ByP_price_EUR2005
    Temporary price data. Calculated as 90% of purchasers price based on: Zinc content in concentrate 53%. Concentrate price per kg Zn 86.5% of refined Zn price (13.5% treatment charges according to CHR Metals Limited 2005: Dynamic cost curves. http://www.minecost.com/dynamic.pdf). 2004 zinc price from USGS (2007) Mineral commodity summaries 2007. <http://minerals.usgs.gov/minerals/pubs/mcs/2007/mcs2007.pdf> [Accessed 25 May 2010]
  property zinc content 0.53; name zinc_C_zinc_concentrate
    Zinc content on a dry matter basis. Value taken from teh "zinc mine operation" /GLO dataset.
  property dry mass 1 kg; name DM_zinc_concentrate
  property carbon content 0
    carbon content on a dry matter basis (reserved; not for manual entry)
  properties: wet mass 1 kg, water content 0, carbon content, non-fossil 0, carbon content, fossil 0, water in wet mass 0 kg, carbon allocation 0 kg

## Inputs from technosphere
- waste paperboard: 0 kg; name BP2; = ABS(RP_waste_paperboard)- BP1; pedigree (1,1,1,1,1)
  Calculated based on the production of the the sorted fraction of waste paperboard.
  production volume 0 kg; name PV_RP2; = BP2*PV_RP
    Calculated from production volume of reference product using the relative outputs.
  property price 0 EUR2005; name BP2_price_EUR2005
  properties: water content 0.243781, dry mass 0.804 kg, wet mass 1 kg, carbon content, non-fossil 0.483259
  note on carbon content, non-fossil: C content was calculated for 1 kg DM, using data in Tab A.3, ecoinvent v2.2 report 13_I.
- diesel, burned in building machine: 0.00022348 MJ; lognormal variance with pedigree 0.072, pedigree (1,1,5,5,1)
  energy for demolition. Uncertainty from range in (DAFSTB 1996)
- excavation, hydraulic digger: 0 m3; pedigree (1,1,1,1,1)
  handling in sorting plant. Uncertainty from range in literature
- electricity, low voltage: 0.000176167 kWh; lognormal variance with pedigree 0.052, pedigree (1,1,5,5,1)
  demand in sorting plant. Uncertainty from range in literature
- sorting facility, for construction waste: 0 unit; pedigree (1,1,1,1,1)
  Uncertainty heeded in exchanges, 1kg = 1kg
  This exchange has an activity link directly to the producing activity because the product is primarily consumed in the same geographical area where it is produced.
- steel, chromium steel 18/8, hot rolled: 0.000195615 kg; lognormal variance with pedigree 0.186, pedigree (4,5,5,1,1)
  EcoSpold01Location=RER
  Basic uncertainty:2
- electricity, medium voltage: 0.000737374 kWh; lognormal variance with pedigree 0.1227, pedigree (3,3,5,3,4)
  EcoSpold01Location=UCTE
- zeolite, powder: 5.7199e-6 kg; lognormal variance with pedigree 0.186, pedigree (4,5,5,1,1)
  Basic uncertainty:2
  EcoSpold01Location=RER
- waste paperboard, unsorted: -0.000494293 kg; lognormal variance with pedigree 0.186, pedigree (4,5,5,1,1)
  Basic uncertainty:2
  EcoSpold01Location=CH
  production volume 0.55 kg
- palladium: 1.23429e-8 kg; lognormal variance with pedigree 0.186, pedigree (4,5,5,1,1)
  Basic uncertainty:2
  EcoSpold01Location=RER
- platinum: 6.15642e-8 kg; lognormal variance with pedigree 0.186, pedigree (4,5,5,1,1)
  EcoSpold01Location=RER
  Basic uncertainty:2
- rhodium: 1.23429e-8 kg; lognormal variance with pedigree 0.186, pedigree (4,5,5,1,1)
  EcoSpold01Location=RER
  Basic uncertainty:2
- corrugated board box: 0.000247356 kg; lognormal variance with pedigree 0.186, pedigree (4,5,5,1,1)
  EcoSpold01Location=RER
  Basic uncertainty:2
- wastewater from pig iron production: -9.70226e-8, -4.52772e-7 m3 (2 suppliers, which the file names only by identifier); sum of these -5.49795e-7 m3; lognormal variance with pedigree 0.34, pedigree (1,1,5,1,1)
  rough estimate, uncertainty refers to amount of water only; not quantified here: composition of waste water unkown, therefore high uncertainty of applicability of modul.
  EcoSpold01Location=CH
  production volume 0.0792 m3
- zinc: 1.95626e-6 kg; lognormal variance with pedigree 0.1361, pedigree (5,5,5,3,3)
  EcoSpold01Location=RER
  Assumption according to factsheets of network devices
  Uncertainty: assumption according to factsheets of network devices
- cast iron: 9.7813e-5 kg; lognormal variance with pedigree 0.1361, pedigree (5,5,5,3,3)
  Assumption according to factsheets of network devices
  EcoSpold01Location=RER
  Uncertainty: assumption according to factsheets of network devices
- waste plastic, industrial electronics: -0.000130818 kg; lognormal variance with pedigree 0.1361, pedigree (5,5,5,3,3)
  Assumption according to factsheets of network devices
  EcoSpold01Location=CH
  Uncertainty: assumption according to factsheets of network devices
  production volume 0.11 kg
- silicone product: 1.27561e-6 kg; lognormal variance with pedigree 0.1361, pedigree (5,5,5,3,3)
  (same comment as for zinc)
- sheet rolling, steel: 0.00107947 kg; lognormal variance with pedigree 0.1361, pedigree (5,5,5,3,3)
  (same comment as for cast iron)
- steel, low-alloyed, hot rolled: 0.00446527 kg; lognormal variance with pedigree 0.1361, pedigree (5,5,5,3,3)
  (same comment as for cast iron)
- polypropylene, granulate: 0.000166703 kg; lognormal variance with pedigree 0.1361, pedigree (5,5,5,3,3)
  (same comment as for zinc)
- tin: 3.91252e-6 kg; lognormal variance with pedigree 0.1361, pedigree (5,5,5,3,3)
  (same comment as for cast iron)
- flat glass, coated: 1.95622e-5 kg; lognormal variance with pedigree 0.1361, pedigree (5,5,5,3,3)
  (same comment as for zinc)
- electricity, low voltage: 0.00097811 kWh; lognormal variance with pedigree 0.1361, pedigree (5,5,5,3,3)
  EcoSpold01Location=UCTE
  Assumption according to factsheets of network devices
  Uncertainty: assumption according to factsheets of network devices
- aluminium, wrought alloy: 0.00346095 kg; lognormal variance with pedigree 0.1361, pedigree (5,5,5,3,3)
  (same comment as for cast iron)
- wire drawing, copper: 0.000206813 kg; lognormal variance with pedigree 0.1361, pedigree (5,5,5,3,3)
  (same comment as for zinc)
- polyvinylchloride, bulk polymerised: 1.95626e-5 kg; lognormal variance with pedigree 0.1361, pedigree (5,5,5,3,3)
  (same comment as for cast iron)
- copper: 0.00047145 kg; lognormal variance with pedigree 0.1361, pedigree (5,5,5,3,3)
  (same comment as for cast iron)
- epoxy resin, liquid: 1.95622e-5 kg; lognormal variance with pedigree 0.1361, pedigree (5,5,5,3,3)
  (same comment as for cast iron)
- powder coat, steel: 4.89055e-5 m2; lognormal variance with pedigree 0.1361, pedigree (5,5,5,3,3)
  (same comment as for zinc)
- brass: 9.8706e-6 kg; lognormal variance with pedigree 0.1361, pedigree (5,5,5,3,3)
  (same comment as for waste plastic, industrial electronics)
- polyethylene, high density, granulate: 0.000636949 kg; lognormal variance with pedigree 0.1361, pedigree (5,5,5,3,3)
  (same comment as for cast iron)
- aluminium, cast alloy: 0.000200162 kg; lognormal variance with pedigree 0.1361, pedigree (5,5,5,3,3)
  (same comment as for cast iron)
- waste bulk iron, excluding reinforcement: -0.000640546, -1.67435e-5 kg (2 suppliers, which the file names only by identifier); sum of these -0.00065729 kg; lognormal variance with pedigree 0.1361, pedigree (5,5,5,3,3)
  (same comment as for waste plastic, industrial electronics)
  production volume 0.672 kg
- polyethylene, low density, granulate: 0.00192321 kg; lognormal variance with pedigree 0.0086, pedigree (1,1,4,1,1)
- waste polypropylene: -1.70911e-5 kg; lognormal variance with pedigree 0.0086, pedigree (1,1,4,1,1)
  Generation of by-product/waste derived based on requirement for input material(s)
  production volume 33618.3 kg
- steel, low-alloyed: 0.000249694 kg; lognormal variance with pedigree 0.0086, pedigree (1,1,4,1,1)
- tin plated chromium steel sheet, 2 mm: 5.57954e-6 m2; lognormal variance with pedigree 0.041225, pedigree (1,1,5,2,2)
- extrusion, plastic film: 0.000972933 kg; lognormal variance with pedigree 0.0086, pedigree (1,1,4,1,1)
  activityLink introduced to establish a direct link to the corresponding regional supply of this product
- fleece, polyethylene: 2.77252e-6 kg; lognormal variance with pedigree 0.0086, pedigree (1,1,4,1,1)
- wire drawing, steel: 0.000120892 kg; lognormal variance with pedigree 0.0086, pedigree (1,1,4,1,1)
  (same comment as for extrusion, plastic film)
- injection moulding: 2.68197e-5 kg; lognormal variance with pedigree 0.0086, pedigree (1,1,4,1,1)
  (same comment as for extrusion, plastic film)
- waste polyethylene: -0.000440634 kg; lognormal variance with pedigree 0.0086, pedigree (1,1,4,1,1)
  Generation of by-product/waste derived based on requirement for input material(s)
  production volume 1.05366e6 kg
- electricity, low voltage: 0.000152881 kWh; lognormal variance with pedigree 0.0172, pedigree (1,5,4,4,1)
- waste polypropylene: -1.66355e-5 kg; lognormal variance with pedigree 0.0172, pedigree (1,5,4,4,1)
  Generation of by-product/waste derived based on requirement for input material(s)
  production volume 3.45267e6 kg
- waste polyethylene: -0.000512303 kg; lognormal variance with pedigree 0.0172, pedigree (1,5,4,4,1)
  Generation of by-product/waste derived based on requirement for input material(s)
  production volume 1.08213e8 kg
- extrusion, plastic film: 0.0010366 kg; lognormal variance with pedigree 0.0186, pedigree (1,5,4,5,1)
- waste polyethylene: -0.000504675 kg; lognormal variance with pedigree 0.0186, pedigree (1,5,4,5,1)
  Generation of by-product/waste derived based on requirement for input material(s)
  production volume 3.262e7 kg
- waste polypropylene: -1.84439e-5 kg; lognormal variance with pedigree 0.0186, pedigree (1,5,4,5,1)
  Generation of by-product/waste derived based on requirement for input material(s)
  production volume 1.04078e6 kg
- injection moulding: 2.82546e-5 kg; lognormal variance with pedigree 0.0186, pedigree (1,5,4,5,1)
- corrugated board box: 0.000232036 kg; lognormal variance with pedigree 0.0186, pedigree (1,5,4,5,1)
- wire drawing, steel: 0.000203529 kg; lognormal variance with pedigree 0.0186, pedigree (1,5,4,5,1)
- electricity, low voltage: 0.000117508 kWh; lognormal variance with pedigree 0.0186, pedigree (1,5,4,5,1)
- waste mineral wool: -1.05536e-5 kg; lognormal variance with pedigree 0.06, pedigree (3,5,5,1,1)
  Estimation
  EcoSpold01Location=CH
  Uncertainty: Estimation
  production volume 2.03 kg
- heat, district or industrial, natural gas: 0.000454002 MJ; lognormal variance with pedigree 0.1308, pedigree (2,2,5,3,4)
  EcoSpold01Location=RER
  Questionnaire, data for other type of collector
  Uncertainty: Questionnaire, data for other type of collector
- sheet rolling, copper: 1.54922e-5 kg; lognormal variance with pedigree 0.0586, pedigree (2,5,5,1,1)
  Questionnaire
  EcoSpold01Location=RER
  Uncertainty: Questionnaire
- electricity, medium voltage: 8.53796e-5 kWh; lognormal variance with pedigree 0.1308, pedigree (2,2,5,3,4)
  Questionnaire, data for other type of collector plus data for flat plate collector production
  EcoSpold01Location=GB
  Uncertainty: Questionnaire, data for other type of collector plus data for flat plate collector production
- stone wool, packed: 5.95042e-5 kg; lognormal variance with pedigree 0.0586, pedigree (2,5,5,1,1)
  EcoSpold01Location=CH
  Questionnaire
  Uncertainty: Questionnaire
- selective coat, copper sheet, physical vapour deposition: 1.00468e-5 m2; lognormal variance with pedigree 0.0586, pedigree (2,5,5,1,1)
  EcoSpold01Location=DE
  Questionnaire
  Uncertainty: Questionnaire
- wastewater, from residence: -2.26753e-7 m3; lognormal variance with pedigree 0.1308, pedigree (2,2,5,3,4)
  Questionnaire, data for other type of collector
  EcoSpold01Location=CH
  Uncertainty: Questionnaire, data for other type of collector
  production volume 0.0442 m3
- synthetic rubber: 0.000357292 kg; lognormal variance with pedigree 0.0586, pedigree (2,5,5,1,1)
  EcoSpold01Location=RER
  Questionnaire
  Uncertainty: Questionnaire
- municipal solid waste: -1.42634e-7 kg; lognormal variance with pedigree 0.1308, pedigree (2,2,5,3,4)
  (same comment as for wastewater, from residence)
  production volume 0.0284 kg
- tap water: 0.00248164 kg; lognormal variance with pedigree 0.1308, pedigree (2,2,5,3,4)
  EcoSpold01Location=RER
  Questionnaire, data for other type of collector plus data for flat plate collector production
  Uncertainty: Questionnaire, data for other type of collector plus data for flat plate collector production
- anti-reflex-coating, etching, solar glass: 1.10608e-5 m2; lognormal variance with pedigree 0.0586, pedigree (2,5,5,1,1)
  Questionnaire
  EcoSpold01Location=DK
  Uncertainty: Questionnaire
- glass tube, borosilicate: 0.000142664 kg; lognormal variance with pedigree 0.0586, pedigree (2,5,5,1,1)
  EcoSpold01Location=DE
  Questionnaire plus 5% losses
  Uncertainty: Questionnaire plus 5% losses
- waste glass sheet: -7.22698e-5 kg; lognormal variance with pedigree 0.06, pedigree (3,5,5,1,1)
  Estimation
  EcoSpold01Location=CH
  Uncertainty: Estimation
  production volume 14.2 kg
- hazardous waste, for incineration: -3.70196e-6 kg; lognormal variance with pedigree 0.1308, pedigree (2,2,5,3,4)
  (same comment as for wastewater, from residence)
  production volume 0.227 kg
- water, completely softened: 5.21972e-6 kg; lognormal variance with pedigree 0.0586, pedigree (2,5,5,1,1)
  EcoSpold01Location=RER
  Questionnaire, heat transfer fluid
  Uncertainty: Questionnaire, heat transfer fluid
- heat carrier liquid, 40% C3H8O2: -8.99637e-9 m3; lognormal variance with pedigree 0.06, pedigree (3,5,5,1,1)
  EcoSpold01Location=CH
  Estimation
  Uncertainty: Estimation
  production volume 0.00155 m3
- waste plastic, mixture: -3.61608e-6 kg; lognormal variance with pedigree 0.06, pedigree (3,5,5,1,1)
  EcoSpold01Location=CH
  Estimation
  Uncertainty: Estimation
  production volume 0.72 kg
- solar collector factory: 1.10586e-12 unit; lognormal variance with pedigree 0.3666, pedigree (2,5,5,1,3)
  EcoSpold01Location=RER
  Estimation for flat plate collector
  Uncertainty: Estimation for flat plate collector
- hydrochloric acid, without water, in 30% solution state: 5.67523e-7 kg; lognormal variance with pedigree 0.1308, pedigree (2,2,5,3,4)
  Questionnaire, data for other type of collector
  EcoSpold01Location=RER
  Uncertainty: Questionnaire, data for other type of collector
- brazing solder, cadmium free: 1.67851e-5 kg; lognormal variance with pedigree 0.0586, pedigree (2,5,5,1,1)
  EcoSpold01Location=RER
  Questionnaire
  Uncertainty: Questionnaire
- propylene glycol, liquid: 3.79664e-6 kg; lognormal variance with pedigree 0.0586, pedigree (2,5,5,1,1)
  (same comment as for water, completely softened)
- chemical, organic: 1.13528e-7 kg; lognormal variance with pedigree 0.1308, pedigree (2,2,5,3,4)
  EcoSpold01Location=GLO
  Questionnaire, data for other type of collector
  Uncertainty: Questionnaire, data for other type of collector
- waste glass: -3.41518e-6 kg; lognormal variance with pedigree 0.1308, pedigree (2,2,5,3,4)
  EcoSpold01Location=CH
  Questionnaire, data for other type of collector
  Uncertainty: Questionnaire, data for other type of collector
  production volume 0.68 kg
- welding, gas, steel: 4.89262e-5 m; lognormal variance with pedigree 0.0506, pedigree (2,1,5,1,1)
  Questionnaire
  Questionnaire
- hot water tank factory: 2.74245e-11 unit; lognormal variance with pedigree 0.348, pedigree (5,5,5,1,5)
  Rough estimation
  This exchange has an activity link directly to the producing activity because the product is primarily consumed in the same geographical area where it is produced.
- alkyd paint, white, without solvent, in 60% solution state: 9.8856e-6 kg; lognormal variance with pedigree 0.0506, pedigree (2,1,5,1,1)
  Questionnaire
  Questionnaire
- waste plastic, mixture: -7.93031e-5 kg; lognormal variance with pedigree 0.0506, pedigree (2,1,5,1,1)
  Questionnaire
  Questionnaire
  production volume 0.77 kg
- electricity, medium voltage: 0.00115628 kWh; lognormal variance with pedigree 0.0506, pedigree (2,1,5,1,1)
  Questionnaire
  Questionnaire
- heat, district or industrial, other than natural gas: 0.00255112 MJ; lognormal variance with pedigree 0.0506, pedigree (2,1,5,1,1)
  Questionnaire
  Questionnaire
- butyl acrylate: 7.14258e-5 kg; lognormal variance with pedigree 0.0506, pedigree (2,1,5,1,1)
  Questionnaire
  Questionnaire
- tap water: 0.00553324 kg; lognormal variance with pedigree 0.348, pedigree (5,5,5,1,5)
  EcoSpold01Location=RER
- municipal solid waste: -5.37149e-6 kg; lognormal variance with pedigree 0.138, pedigree (5,5,5,1,1)
  EcoSpold01Location=CH
  production volume 0.00606 kg
- explosives factory: 5.91196e-12 unit; lognormal variance with pedigree 0.638, pedigree (5,5,5,1,5)
  EcoSpold01Location=CH
  activityLink introduced to establish a direct link to the corresponding regional supply of this product
- flat glass, uncoated: 2.65905e-5 kg; lognormal variance with pedigree 0.106, pedigree (4,5,5,1,1)
  EcoSpold01Location=RER
- heat, central or small-scale, other than natural gas: 0.000129974 MJ; lognormal variance with pedigree 0.146, pedigree (4,5,5,1,4)
  EcoSpold01Location=CH
- municipal waste collection service by 21 metric ton lorry: 6.70081e-5 metric ton*km; lognormal variance with pedigree 0.248, pedigree (5,5,5,1,1)
  activityLink introduced to establish a direct link to the corresponding regional supply of this product
  EcoSpold01Location=CH
- wastewater, average: -4.92811e-6 m3; lognormal variance with pedigree 0.138, pedigree (5,5,5,1,1)
  (same comment as for explosives factory)
  production volume 0.00556 m3
- ammonium nitrate, as N: 0.000285467 kg; lognormal variance with pedigree 0.106, pedigree (4,5,5,1,1)
  EcoSpold01Location=RER
- industrial machine, heavy, unspecified: 1.61947e-7 kg; lognormal variance with pedigree 0.438, pedigree (5,5,5,1,1)
  EcoSpold01Location=RER
  activityLink introduced to establish a direct link to the corresponding regional supply of this product
- potato starch: 1.59578e-5 kg; lognormal variance with pedigree 0.106, pedigree (4,5,5,1,1)
  EcoSpold01Location=DE
- paper, woodcontaining, lightweight coated: 0.000446237 kg; lognormal variance with pedigree 0.348, pedigree (5,5,5,1,5)
  EcoSpold01Location=RER
- calcium nitrate: 0.000845865 kg; lognormal variance with pedigree 0.106, pedigree (4,5,5,1,1)
  calculated from the original input measured as N (molar masses N2)
- EUR-flat pallet: 3.78643e-6 unit; lognormal variance with pedigree 0.146, pedigree (4,5,5,1,4)
  EcoSpold01Location=RER
- nitrogen fertiliser, as N: 0.000100357 kg; lognormal variance with pedigree 0.106, pedigree (4,5,5,1,1)
  EcoSpold01Location=RER
- wastewater, from residence: -2.26846e-7 m3; lognormal variance with pedigree 0.0586, pedigree (2,5,5,1,1)
  EcoSpold01Location=CH
  Questionnaire
  Uncertainty: Questionnaire
  production volume 0.0094 m3
- soft solder, Sn97Cu3: 2.98099e-8 kg; lognormal variance with pedigree 0.0586, pedigree (2,5,5,1,1)
  EcoSpold01Location=RER
  Questionnaire
  Uncertainty: Questionnaire
- solar glass, low-iron: 9.24753e-6 kg; lognormal variance with pedigree 0.0586, pedigree (2,5,5,1,1)
  Questionnaire
  EcoSpold01Location=RER
  Uncertainty: Questionnaire
- waste glass sheet: -5.09189e-6 kg; lognormal variance with pedigree 0.06, pedigree (3,5,5,1,1)
  EcoSpold01Location=CH
  Estimation
  Uncertainty: Estimation
  production volume 9.12 kg
- waste mineral wool: -1.27944e-6 kg; lognormal variance with pedigree 0.06, pedigree (3,5,5,1,1)
  EcoSpold01Location=CH
  Estimation
  Uncertainty: Estimation
  production volume 2.43 kg
- heat carrier liquid, 40% C3H8O2: -8.99954e-9 m3; lognormal variance with pedigree 0.0586, pedigree (2,5,5,1,1)
  EcoSpold01Location=CH
  Questionnaire
  Uncertainty: Questionnaire
  production volume 0.00239 m3
- selective coat, copper sheet, black chrome: 5.06971e-7 m2; lognormal variance with pedigree 0.0586, pedigree (2,5,5,1,1)
  EcoSpold01Location=RER
  Questionnaire
  Uncertainty: Questionnaire
- heat, district or industrial, natural gas: 0.0053191 MJ; lognormal variance with pedigree 0.040625, pedigree (1,3,5,2,1)
  EcoSpold01Location=RER
- feldspar: 0.000498265 kg; lognormal variance with pedigree 0.040625, pedigree (1,3,5,2,1)
  EcoSpold01Location=RER
- aluminium hydroxide: 1.23381e-5 kg; lognormal variance with pedigree 0.040625, pedigree (1,3,5,2,1)
  EcoSpold01Location=RER
- tap water: 1.77973e-5 kg; lognormal variance with pedigree 0.040625, pedigree (1,3,5,2,1)
  EcoSpold01Location=RER
- waste sealing sheet, polyethylene: -7.35154e-6 kg; lognormal variance with pedigree 0.040625, pedigree (1,3,5,2,1)
  EcoSpold01Location=CH
  production volume 4471.27 kg
- soda ash, light, crystalline, heptahydrate: 0.000263327 kg; lognormal variance with pedigree 0.040625, pedigree (1,3,5,2,1)
  EcoSpold01Location=RER
- electricity, medium voltage, label-certified: 0.00159069 kWh; lognormal variance with pedigree 0.0426, pedigree (1,3,5,5,1)
- foam glass factory: 9.83575e-13 unit; lognormal variance with pedigree 0.350125, pedigree (1,2,5,2,1)
  EcoSpold01Location=BE
- heat, central or small-scale, other than natural gas: 1.9164e-5 MJ; lognormal variance with pedigree 0.040625, pedigree (1,3,5,2,1)
  EcoSpold01Location=CH
- potassium nitrate: 4.74784e-6 kg; lognormal variance with pedigree 0.040625, pedigree (1,3,5,2,1)
  calculated from original value given as kg N
- sinter, iron: 7.71129e-7 kg; lognormal variance with pedigree 0.040625, pedigree (1,3,5,2,1)
  EcoSpold01Location=GLO
- clay: 1.68411e-7 kg; lognormal variance with pedigree 0.040625, pedigree (1,3,5,2,1)
  EcoSpold01Location=CH
- packaging film, low density polyethylene: 2.81462e-5 kg; lognormal variance with pedigree 0.040625, pedigree (1,3,5,2,1)
  EcoSpold01Location=RER
- manganese concentrate: 5.04203e-5 kg; lognormal variance with pedigree 0.040625, pedigree (1,3,5,2,1)
  EcoSpold01Location=GLO
- glass cullet, sorted: 0.00078451 kg
- carbon black: 1.18634e-5 kg; lognormal variance with pedigree 0.040625, pedigree (1,3,5,2,1)
  EcoSpold01Location=GLO
- molybdenum: 1.48294e-7 kg; lognormal variance with pedigree 0.040625, pedigree (1,3,5,2,1)
  EcoSpold01Location=RER
- waste wood, untreated: -2.61513e-5 kg; lognormal variance with pedigree 0.040625, pedigree (1,3,5,2,1)
  EcoSpold01Location=CH
  26.4 kg per pallet
  production volume 12904.8 kg
- iron ore, beneficiated, 65% Fe: 5.33853e-5 kg; lognormal variance with pedigree 0.040625, pedigree (1,3,5,2,1)
  EcoSpold01Location=GLO
- sodium sulfate, anhydrite: 3.84228e-6 kg; lognormal variance with pedigree 0.040625, pedigree (1,3,5,2,1)
  EcoSpold01Location=RER
- wastewater, average: -1.77857e-6, -1.99229e-8 m3 (2 suppliers, which the file names only by identifier); sum of these -1.7985e-6 m3; lognormal variance with pedigree 0.040125, pedigree (1,2,5,2,1)
  EcoSpold01Location=CH
  production volume 63.6054 m3
- heat, central or small-scale, other than natural gas: 5.74829e-5 MJ; lognormal variance with pedigree 0.0426, pedigree (1,3,5,5,1)
  EcoSpold01Location=CH
- silica sand: 0.000440253 kg; lognormal variance with pedigree 0.0426, pedigree (1,3,5,5,1)
  Calculated as residual raw material requirement.
- tap water: 5.33837e-5 kg; lognormal variance with pedigree 0.0426, pedigree (1,3,5,5,1)
  EcoSpold01Location=RER
- heat, district or industrial, natural gas: 0.0159548 MJ; lognormal variance with pedigree 0.0426, pedigree (1,3,5,5,1)
  EcoSpold01Location=RER
- clay: 5.04843e-7 kg; lognormal variance with pedigree 0.0426, pedigree (1,3,5,5,1)
  EcoSpold01Location=CH
- corrugated board box: 1.57884e-5 kg; lognormal variance with pedigree 0.0426, pedigree (1,3,5,5,1)
  EcoSpold01Location=RER
- lime: 1.16935e-5, 0.000135391 kg (2 suppliers, which the file names only by identifier); sum of these 0.000147084 kg; lognormal variance with pedigree 0.1, pedigree (1,5,5,5,1)
  Calculated to correspond to give same composition of foam glass as foam glass with cullet from packaging glass. Molar mass of lime (CaCO3) to CaO:100 to 56.
  Uncertainty: ;
- wastewater, average: -3.53216e-6 m3; lognormal variance with pedigree 0.0421, pedigree (1,2,5,5,1)
  EcoSpold01Location=CH
  production volume 0.00083076 m3
- sodium sulfate, anhydrite: 6.53828e-6 kg; lognormal variance with pedigree 0.0426, pedigree (1,3,5,5,1)
  EcoSpold01Location=RER
- waste sealing sheet, polyethylene: -2.07947e-5 kg; lognormal variance with pedigree 0.0426, pedigree (1,3,5,5,1)
  EcoSpold01Location=CH
  production volume 0.0584 kg
- waste wood, untreated: -4.59487e-7, -1.29056e-6, -3.08236e-7, -3.70061e-6, -1.94973e-7, -3.35937e-8, -4.90959e-5 kg (7 suppliers, which the file names only by identifier); sum of these -5.50833e-5 kg; lognormal variance with pedigree 0.0426, pedigree (1,3,5,5,1)
  26.4 kg per pallet
  EcoSpold01Location=CH
  production volume 0.168552 kg
- electricity, medium voltage: 0.00159058 kWh; lognormal variance with pedigree 0.0426, pedigree (1,3,5,5,1)
  Calculated from original electricity input and cullet fraction and the reduction in energy requirement per % cullet (EU commission 2012: Best Available Techniques (BAT) Reference Document for the Manufacture of Glass)
  EcoSpold01Location=BE
- styrene-acrylonitrile copolymer: 2.62524e-7 kg; lognormal variance with pedigree 0.0512, pedigree (2,3,5,1,1)
  Literature (de Wild 2006)
  EcoSpold01Location=RER
  Uncertainty: Literature (de Wild 2006)
- capacitor, tantalum-, for through-hole mounting: 6.19811e-7 kg; lognormal variance with pedigree 0.0512, pedigree (2,3,5,1,1)
  EcoSpold01Location=GLO
  Literature (de Wild 2006), Assumption for Ceramic Multilayer Chip Capacitors
  Uncertainty: Literature (de Wild 2006), Assumption for Ceramic Multilayer Chip Capacitors
- waste polystyrene: -6.42643e-6 kg; lognormal variance with pedigree 0.0532, pedigree (2,3,5,5,1)
  EcoSpold01Location=CH
  Calculation, different geographical location
  Uncertainty: Calculation, different geographical location
  production volume 0.132 kg
- polyvinylchloride, suspension polymerised: 2.92354e-8 kg; lognormal variance with pedigree 0.0512, pedigree (2,3,5,1,1)
  EcoSpold01Location=RER
  Literature (de Wild 2006)
  Uncertainty: Literature (de Wild 2006)
- printed wiring board, for through-hole mounting, Pb containing surface: 3.43479e-6 m2; lognormal variance with pedigree 0.0512, pedigree (2,3,5,1,1)
  Literature (de Wild 2006), Calculation
  This original value from production mix has been replaced by 2 flows. Each has 50% share in the production mix.
  Uncertainty: Literature (de Wild 2006), Calculation
- printed wiring board, for through-hole mounting, Pb free surface: 3.43479e-6 m2; lognormal variance with pedigree 0.0512, pedigree (2,3,5,1,1)
  (same comment as for printed wiring board, for through-hole mounting, Pb containing surface)
- section bar extrusion, aluminium: 0.00152165 kg; lognormal variance with pedigree 0.0512, pedigree (2,3,5,1,1)
  Literature (de Wild 2006)
  EcoSpold01Location=RER
  Uncertainty: Literature (de Wild 2006)
- resistor, metal film type, through-hole mounting: 1.31951e-7 kg; lognormal variance with pedigree 0.0512, pedigree (2,3,5,1,1)
  Literature (de Wild 2006), Calculation
  EcoSpold01Location=GLO
  Uncertainty: Literature (de Wild 2006), Calculation
- inductor, ring core choke type: 9.50686e-6 kg; lognormal variance with pedigree 0.0512, pedigree (2,3,5,1,1)
  (same comment as for resistor, metal film type, through-hole mounting)
- capacitor, film type, for through-hole mounting: 9.24296e-6 kg; lognormal variance with pedigree 0.0512, pedigree (2,3,5,1,1)
  EcoSpold01Location=GLO
  Literature (de Wild 2006), Calculation
  Uncertainty: Literature (de Wild 2006), Calculation
- diode, glass-, for through-hole mounting: 1.27885e-6 kg; lognormal variance with pedigree 0.0512, pedigree (2,3,5,1,1)
  (same comment as for resistor, metal film type, through-hole mounting)
- transformer, high voltage use: 1.98997e-5 kg; lognormal variance with pedigree 0.0512, pedigree (2,3,5,1,1)
  EcoSpold01Location=GLO
  Literature (de Wild 2006)
  Uncertainty: Literature (de Wild 2006)
- acrylonitrile-butadiene-styrene copolymer: 9.50052e-6 kg; lognormal variance with pedigree 0.0512, pedigree (2,3,5,1,1)
  Literature (de Wild 2006)
  EcoSpold01Location=RER
  Uncertainty: Literature (de Wild 2006)
- capacitor, electrolyte type, > 2cm height: 6.93561e-6 kg; lognormal variance with pedigree 0.0512, pedigree (2,3,5,1,1)
  (same comment as for capacitor, film type, for through-hole mounting)
- polycarbonate: 4.3651e-6 kg; lognormal variance with pedigree 0.0512, pedigree (2,3,5,1,1)
  EcoSpold01Location=RER
  Literature (de Wild 2006)
  Uncertainty: Literature (de Wild 2006)
- waste polyethylene: -1.4756e-6 kg; lognormal variance with pedigree 0.0532, pedigree (2,3,5,5,1)
  (same comment as for waste polystyrene)
  production volume 0.03 kg
- electric connector, wire clamp: 1.29189e-5 kg; lognormal variance with pedigree 0.0512, pedigree (2,3,5,1,1)
  (same comment as for capacitor, film type, for through-hole mounting)
- integrated circuit, logic type: 7.646e-7 kg; lognormal variance with pedigree 0.0512, pedigree (2,3,5,1,1)
  (same comment as for capacitor, film type, for through-hole mounting)
- transistor, wired, small size, through-hole mounting: 1.0285e-6 kg; lognormal variance with pedigree 0.0512, pedigree (2,3,5,1,1)
  (same comment as for capacitor, film type, for through-hole mounting)
- polystyrene foam slab: 1.25896e-5 kg; lognormal variance with pedigree 0.0612, pedigree (2,3,5,1,1)
  Literature (Schwarz 1992)
  EcoSpold01Location=RER
  Uncertainty: Literature (Schwarz 1992)
- metal working factory: 1.87009e-13 unit; lognormal variance with pedigree 0.3526, pedigree (2,4,5,1,1)
  Calculation, based on annual production of electronic component production plant
  EcoSpold01Location=RER
  Uncertainty: Calculation, based on annual production of electronic component production plant
- used printed wiring boards: -7.38533e-5 kg; lognormal variance with pedigree 0.0532, pedigree (2,3,5,5,1)
  Calculation, different geographical location
  EcoSpold01Location=GLO
  Uncertainty: Calculation, different geographical location
  production volume 0.6898 kg
- glass fibre reinforced plastic, polyester resin, hand lay-up: 6.06174e-6 kg; lognormal variance with pedigree 0.0686, pedigree (4,3,5,1,1)
  Literature (de Wild 2006), Calculation
  EcoSpold01Location=RER
  Uncertainty: Literature (de Wild 2006), Calculation
- lubricating oil: 6.06863e-5 kg; lognormal variance with pedigree 0.2686, pedigree (4,3,5,1,5)
  EcoSpold01Location=RER
  Literature (de Wild 2006), Calculation
  Uncertainty: Literature (de Wild 2006), Calculation
- glass fibre reinforced plastic, polyamide, injection moulded: 9.78145e-6 kg; lognormal variance with pedigree 0.0686, pedigree (4,3,5,1,1)
  (same comment as for glass fibre reinforced plastic, polyester resin, hand lay-up)
- waste mineral oil: -5.93139e-5, -1.37246e-6 kg (2 suppliers, which the file names only by identifier); sum of these -6.06863e-5 kg; lognormal variance with pedigree 0.0706, pedigree (4,3,5,5,1)
  Calculation, different geographical location
  EcoSpold01Location=CH
  Uncertainty: Calculation, different geographical location
  production volume 881 kg
- waste mineral wool, for final disposal: -1.83208e-5 kg; lognormal variance with pedigree 0.054, pedigree (3,4,5,1,1)
  EcoSpold01Location=CH
  Literature
  Uncertainty: Literature
  production volume 19 kg
- heat, district or industrial, natural gas: 0.00133532 MJ; lognormal variance with pedigree 0.0427, pedigree (2,4,5,3,1)
  EcoSpold01Location=RER
  Environmental report
  Uncertainty: Environmental report
- hazardous waste, for incineration: -7.90165e-6 kg; lognormal variance with pedigree 0.054, pedigree (3,4,5,1,1)
  EcoSpold01Location=CH
  Literature
  Uncertainty: Literature
  production volume 6 kg
- toner module, laser printer, black/white: 1.70621e-5 unit; lognormal variance with pedigree 0.0512, pedigree (2,3,5,1,1)
  Calculated based on literature and estimates. Toner module capacity is 5000 pages, one page weight 0.005 kg, thus total weight of paper one toner module can print on is (5000*0.005=) 25 kg. In order to print on paper of total weight of 1 kg (1/25=) 0.04 units of toner module is needed.
- used toner module, laser printer, black/white: -1.50146e-5 kg; lognormal variance with pedigree 0.0526, pedigree (4,4,5,5,1)
  Measured value. The weight of 1 toner module is 0.88 kg.
  production volume 2.94269e6 kg
- printer, laser, black/white: 8.8865e-8 unit; lognormal variance with pedigree 0.0546, pedigree (3,3,5,5,1)
  Calculated based on literature values and estimates. The monthly production volume of this type of printer is 20,000 pg (http://www.epson.de/de/en/viewcon/corporatesite/products/mainunits/specs/9538). The weight of one page is 0.005kg. The lifetime of a printer is estimated to be 4 years. In its lifetime the printer is able to print on (20,000*12*4=) 960,000 pages, of total weight (960,000*0.005=) 4800 kg.
  EcoSpold01Location=GLO
- paper, woodcontaining, lightweight coated: 0.000446245 kg
- electricity, low voltage: 3.48716e-5, 1.59699e-5, 2.80092e-6, 6.54199e-7, 4.60584e-5, 0.000696537, 0.000114812 kWh (7 suppliers, which the file names only by identifier); sum of these 0.000911704 kWh; lognormal variance with pedigree 0.0432, pedigree (2,3,5,5,1)
  EcoSpold01Location=UCTE
- used toner module, laser printer, colour: -1.50152e-5 kg; lognormal variance with pedigree 0.0526, pedigree (4,4,5,5,1)
  Measured value. The weight of 1 toner module is 0.88 kg.
  production volume 2.94269e6 kg
- toner module, laser printer, colour: 1.70627e-5 unit; lognormal variance with pedigree 0.0512, pedigree (2,3,5,1,1)
  Calculated based on literature and estimates.Toner module capacity is 5000 pages, one page weight 0.005 kg, thus total weight of paper one toner module can print on is (5000*0.005=) 25 kg. In order to print on paper of total weight of 1 kg (1/25=) 0.04 units of toner module is needed.
- printer, laser, colour: 8.88682e-8 unit; lognormal variance with pedigree 0.0546, pedigree (3,3,5,5,1)
  (same comment as for printer, laser, black/white)
- polyurethane, flexible foam: 2.78175e-6 kg; lognormal variance with pedigree 0.1381, pedigree (1,2,4,1,1)
  EcoSpold01Location=RER
  Literature and own estimations
  Uncertainty: Literature and own estimations
- section bar rolling, steel: 0.000323567 kg; lognormal variance with pedigree 0.202, pedigree (3,4,5,1,3)
  EcoSpold01Location=RER
  Brunschweiler 1993
  Uncertainty: Brunschweiler 1993
- polystyrene, high impact: 7.62769e-6 kg; lognormal variance with pedigree 0.202, pedigree (3,4,5,1,3)
  EcoSpold01Location=RER
  Schwarz et al. 1992
  Uncertainty: Schwarz et al. 1992
- waste polystyrene isolation, flame-retardant: -3.95914e-6, -1.18804e-7 kg (2 suppliers, which the file names only by identifier); sum of these -4.07795e-6 kg; lognormal variance with pedigree 0.202, pedigree (3,4,5,1,3)
  EcoSpold01Location=CH
  Disposal of plastics parts at end of life
  Uncertainty: Disposal of plastics parts at end of life
  production volume 3.65679 kg
- waste polyethylene/polypropylene product: -0.000483914, -1.4521e-5 kg (2 suppliers, which the file names only by identifier); sum of these -0.000498435 kg; lognormal variance with pedigree 0.202, pedigree (3,4,5,1,3)
  Disposal of plastics parts at end of life
  EcoSpold01Location=CH
  Uncertainty: Disposal of plastics parts at end of life
  production volume 784.501 kg
- section bar rolling, steel: 0.000684692 kg; source Jungbluth N. 2012; lognormal variance with pedigree 0.008, pedigree (1,1,4,1,1)
  EcoSpold01Location=RER
  Estimation/measured value. Data from different manufacturers of open ground mounting systems. An expert estimation is then taken for this dataset.
- zinc coat, pieces: 1.05976e-5 m2; source Jungbluth N. 2012, p. 104; lognormal variance with pedigree 0.1899, pedigree (3,4,5,1,3)
  Estimation. Used for the coating of the zinc coated steel used for the mounting structure.
  EcoSpold01Location=RER
- reinforcing steel: 0.000492514 kg; source Jungbluth N. 2012, p. 101; lognormal variance with pedigree 0.008, pedigree (1,1,4,1,1)
  Literature and own estimations
  EcoSpold01Location=RER
- section bar extrusion, aluminium: 0.00168781 kg; source Jungbluth N. 2012; lognormal variance with pedigree 0.1365, pedigree (1,2,4,1,1)
  Estimation/measured value. Data from different manufacturers of open ground mounting systems. An expert estimation is then taken for this dataset.
  EcoSpold01Location=RER
- zinc coat, coils: 7.47263e-6 m2; source Frischknecht R. 1996; lognormal variance with pedigree 0.1899, pedigree (3,4,5,1,3)
  EcoSpold01Location=RER
  Literature value / estimation. According to Daniel Fraile Montoro from EPIA all ground-mounted PV systems have a fence because of the insurance and the risk of high voltage access. He states that there are many different types of fences, but as a normal one a two meters meshed fence with some wire on the top could be considered [Personal communication with Daniel Fraile Montoro from the European Photovoltaic Industry Associa-tion, 17.11.2009]. For the inventory of such a fence, we consider the steel, zinc, and concrete input. The steel is drawn to wire and the zinc is used for a coils coating.
- concrete, normal: 3.67971e-8 m3; source de Wild-Scholten M. J. 2006; lognormal variance with pedigree 0.008, pedigree (1,1,4,1,1)
  Literature value / estimation. According to Daniel Fraile Montoro from EPIA all ground-mounted PV systems have a fence because of the insurance and the risk of high voltage access. He states that there are many different types of fences, but as a normal one a two meters meshed fence with some wire on the top could be considered [Personal communication with Daniel Fraile Montoro from the European Photovoltaic Industry Associa-tion, 17.11.2009]. For the inventory of such a fence, we consider the steel, zinc, and concrete input. The steel is drawn to wire and the zinc is used for a coils coating.
  EcoSpold01Location=CH
- scrap steel: -0.00012406, -1.56843e-7, -0.000902337 kg (3 suppliers, which the file names only by identifier); sum of these -0.00102655 kg
  Calculated value
  production volume 25421.4 kg
- waste polyethylene/polypropylene product: -0.000421399 kg; lognormal variance with pedigree 0.1899, pedigree (3,4,5,1,3)
  EcoSpold01Location=CH
  Estimation. Disposal of plastics parts at end of life
  production volume 3.08138 kg
- waste polystyrene isolation, flame-retardant: -3.54974e-6 kg; lognormal variance with pedigree 0.1899, pedigree (3,4,5,1,3)
  EcoSpold01Location=CH
  Calculated value. Disposal of plastics parts at end of life
  production volume 15.4071 kg
- scrap aluminium: -8.57646e-5, -4.02388e-6, -0.00155772 kg (3 suppliers, which the file names only by identifier); sum of these -0.0016475 kg
  Calculated value
  production volume 13490.3 kg
- waste reinforced concrete: -3.80064e-5, -4.02707e-7, -0.000542418 kg (3 suppliers, which the file names only by identifier); sum of these -0.000580827 kg
  production volume 28980.4 kg
- textile, woven cotton: 3.63796e-8 kg; lognormal variance with pedigree 0.0572, pedigree (4,3,4,1,4)
  Calculated value: average consumption of textiles in printing process of three companies (including the portion of textile within rubber blankets)
- acrylic dispersion, without water, in 65% solution state: 7.60214e-8 kg; lognormal variance with pedigree 0.0098, pedigree (2,3,4,1,1)
  Calculated value: average consumption of three companies
- maize starch: 2.2189e-8 kg; lognormal variance with pedigree 0.0566, pedigree (5,5,4,1,1)
  Calculated value: average use of developer used of three offset printing companies. Starch main component of developer.
- ethylene glycol monoethyl ether: 3.3475e-8 kg; lognormal variance with pedigree 0.0098, pedigree (2,3,4,1,1)
  Calculated value: Average consumption of three companies
- white spirit: 3.93467e-7 kg; lognormal variance with pedigree 0.0112, pedigree (3,3,4,1,1)
  Calculate value: Average value for different petrol based cleaners of three companies. Only a portion is relied to the use of white spirit itself, the data set ist used also as estimate for the production of other petrol based mixtures. Except for mixtures containing VOCs with high boiling point all VOCs are assumed to be emitted to air. The less volatil content with high boiling VOCs is assumed to be delivered to a professional treatment. Heptan emissions represent emissions from white spirit. Methanol and Propylene oxide emissions represent the Methoxypropanol content and Toluol, Xylene and Ethylbenzol the content of solvent naphtha in furhter used mixtures.
- paper, woodfree, coated: 8.87982e-5 kg; lognormal variance with pedigree 0.0098, pedigree (2,3,4,1,1)
  Calculated value: Average paper consumption of three companies. Paper, woodfree, coated assumed for printing services.
- sheet rolling, aluminium: 1.5907e-6, 1.62154e-6 kg (2 suppliers, which the file names only by identifier); sum of these 3.21224e-6 kg; lognormal variance with pedigree 0.1767, pedigree (5,5,4,3,5)
  Estimate value: assumed processing for the production of printing plates
- spent solvent mixture: -9.58254e-8 kg; lognormal variance with pedigree 0.0113, pedigree (3,3,4,3,1)
  Estimate value: recovered solvent given declared only by one of tree companies. Recovery and professional waste treatment of 'non-voc wash' products assumed for the other companies.
  production volume 830.76 kg
- acrylic varnish, without water, in 87.5% solution state: 2.49785e-8 kg; lognormal variance with pedigree 0.0098, pedigree (2,3,4,1,1)
  Calculated value: average consumption of three companies
- isopropanol: 1.39266e-7 kg; lognormal variance with pedigree 0.0098, pedigree (2,3,4,1,1)
  Calculated value: average Ispopropanol use of three companies (with low VOC consumption)
- waste emulsion paint: -1.80152e-8 kg; lognormal variance with pedigree 0.0099, pedigree (2,3,4,3,1)
  Calculated value: average value for disposal of paints of three companies
  production volume 156.183 kg
- printing ink, offset, without solvent, in 47.5% solution state: 5.92201e-7 kg; lognormal variance with pedigree 0.0098, pedigree (2,3,4,1,1)
  Calculated value: average ink consumption of three companies
- waste paper, unsorted: -2.49146e-5 kg; lognormal variance with pedigree 0.0113, pedigree (3,3,4,3,1)
  Calculated value: average from three companies calculated from the mass balance of paper consumption and output of printed product. Waste paper delivered to recycling unsorted, mixed with furhter waste paper of clients.
  production volume 215998 kg
- thermoforming, with calendering: 2.54257e-8, 2.59186e-8 kg (2 suppliers, which the file names only by identifier); sum of these 5.13442e-8 kg; lognormal variance with pedigree 0.0967, pedigree (5,5,4,3,4)
  Estimate value: Assumed processing for rubber blankets.
- wastewater from pig iron production: -4.47589e-7 m3; lognormal variance with pedigree 0.342, pedigree (1,1,5,5,1)
  EcoSpold01Location=CH
  rough estimate, uncertainty refers to amount of water only; not quantified here: composition of waste water unkown, therefore high uncertainty of applicability of modul.
  production volume 0.2376 m3
- electricity, medium voltage: 2.28257e-5, 4.15332e-6, 7.0434e-5, 0.00102122, 0.000146156, 0.000478866 kWh (6 suppliers, which the file names only by identifier); sum of these 0.00174365 kWh; lognormal variance with pedigree 0.1246, pedigree (3,3,5,5,4)
  EcoSpold01Location=UCTE
- sheet rolling, steel: 0.00102584 kg; lognormal variance with pedigree 0.138, pedigree (5,5,5,5,3)
  (same comment as for zinc)
- silicone product: 1.27576e-6 kg; lognormal variance with pedigree 0.138, pedigree (5,5,5,5,3)
  (same comment as for zinc)
- flat glass, coated: 1.9563e-5 kg; lognormal variance with pedigree 0.138, pedigree (5,5,5,5,3)
  (same comment as for cast iron)
- powder coat, steel: 4.89075e-5 m2; lognormal variance with pedigree 0.138, pedigree (5,5,5,5,3)
  (same comment as for cast iron)
- epoxy resin, liquid: 1.9563e-5 kg; lognormal variance with pedigree 0.138, pedigree (5,5,5,5,3)
  (same comment as for cast iron)
- wire drawing, copper: 0.000206816 kg; lognormal variance with pedigree 0.138, pedigree (5,5,5,5,3)
  (same comment as for cast iron)
- waste bulk iron, excluding reinforcement: -0.000657316 kg; lognormal variance with pedigree 0.138, pedigree (5,5,5,5,3)
  (same comment as for waste plastic, industrial electronics)
  production volume 2.016 kg
- brass: 9.87102e-6 kg; lognormal variance with pedigree 0.138, pedigree (5,5,5,5,3)
  (same comment as for waste plastic, industrial electronics)
- waste plastic, industrial electronics: -0.000130821 kg; lognormal variance with pedigree 0.138, pedigree (5,5,5,5,3)
  (same comment as for waste plastic, industrial electronics)
  production volume 0.33 kg
- electricity, low voltage: 0.00027611 kWh; lognormal variance with pedigree 0.138, pedigree (5,5,5,5,3)
  Assumption according to factsheets of network devices
  EcoSpold01Location=UCTE
  Uncertainty: assumption according to factsheets of network devices
- waste polypropylene: -1.4707e-5, -9.82664e-7, -7.43173e-8, -4.05875e-7, -1.63969e-7, -3.85417e-7 kg (6 suppliers, which the file names only by identifier); sum of these -1.67192e-5 kg; lognormal variance with pedigree 0.0186, pedigree (1,5,4,5,1)
  production volume 325183 kg
- waste polyethylene: -0.000450461, -3.00981e-5, -2.27627e-6, -1.24316e-5, -5.02222e-6, -1.1805e-5 kg (6 suppliers, which the file names only by identifier); sum of these -0.000512095 kg; lognormal variance with pedigree 0.0186, pedigree (1,5,4,5,1)
  production volume 1.01918e7 kg
- sheet rolling, copper: 1.54982e-5 kg; lognormal variance with pedigree 0.0606, pedigree (2,5,5,5,1)
  EcoSpold01Location=RER
  Questionnaire
  Uncertainty: Questionnaire
- propylene glycol, liquid: 3.79807e-6 kg; lognormal variance with pedigree 0.0606, pedigree (2,5,5,5,1)
  Questionnaire, heat transfer fluid
  EcoSpold01Location=RER
  Uncertainty: Questionnaire, heat transfer fluid
- hydrochloric acid, without water, in 30% solution state: 5.67762e-7 kg; lognormal variance with pedigree 0.1327, pedigree (2,2,5,5,4)
  (same comment as for heat, district or industrial, natural gas)
- solar collector factory: 1.10629e-12 unit; lognormal variance with pedigree 0.3686, pedigree (2,5,5,5,3)
  (same comment as for solar collector factory)
- tap water: 6.72977e-6, 5.59076e-5, 1.1122e-5, 0.000280454, 7.29594e-6, 2.07532e-5, 0.00320938 kg (7 suppliers, which the file names only by identifier); sum of these 0.00359164 kg; lognormal variance with pedigree 0.1327, pedigree (2,2,5,5,4)
  (same comment as for tap water)
- water, completely softened: 2.23539e-6, 2.98628e-6 kg (2 suppliers, which the file names only by identifier); sum of these 5.22167e-6 kg; lognormal variance with pedigree 0.0606, pedigree (2,5,5,5,1)
  (same comment as for propylene glycol, liquid)
- waste glass sheet: -7.455e-5 kg; lognormal variance with pedigree 0.062, pedigree (3,5,5,5,1)
  EcoSpold01Location=CH
  Estimation
  Uncertainty: Estimation
  production volume 42.6 kg
- municipal solid waste: -7.19836e-9, -5.55912e-11, -1.63077e-10, -1.0037e-10, -1.76347e-10, -1.78054e-10, -1.81381e-9, -1.70475e-10, -1.30965e-9, -1.66674e-10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 kg (38 suppliers, which the file names only by identifier); sum of these -5.11205e-6 kg; lognormal variance with pedigree 0.1327, pedigree (2,2,5,5,4)
  (same comment as for waste glass)
  production volume 0.0852 kg
- hazardous waste, for incineration: -6.45371e-6 kg; lognormal variance with pedigree 0.1327, pedigree (2,2,5,5,4)
  (same comment as for wastewater, from residence)
  production volume 0.681 kg
- waste plastic, mixture: -1.85896e-9, -4.64169e-9, -2.53797e-9, -1.96895e-9, -5.18274e-9, -9.2994e-6, -6.2135e-7, -4.69917e-8, -6.94605e-10, -5.86968e-8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 kg (41 suppliers, which the file names only by identifier); sum of these -7.59916e-5 kg; lognormal variance with pedigree 0.062, pedigree (3,5,5,5,1)
  EcoSpold01Location=CH
  Estimation
  Uncertainty: Estimation
  production volume 2.16 kg
- waste mineral wool: -1.10258e-5 kg; lognormal variance with pedigree 0.062, pedigree (3,5,5,5,1)
  Estimation
  EcoSpold01Location=CH
  Uncertainty: Estimation
  production volume 6.09 kg
- heat, district or industrial, natural gas: 1.79481e-5, 0.0010147 MJ (2 suppliers, which the file names only by identifier); sum of these 0.00103265 MJ; lognormal variance with pedigree 0.1327, pedigree (2,2,5,5,4)
  (same comment as for heat, district or industrial, natural gas)
- waste glass: -5.23502e-9, -2.64631e-9, -8.33038e-9, -2.12507e-9, -3.09544e-9, -4.91248e-9, -2.77073e-7, -2.55372e-8, -5.79354e-10, -6.47599e-10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 kg (42 suppliers, which the file names only by identifier); sum of these -3.41662e-6 kg; lognormal variance with pedigree 0.1327, pedigree (2,2,5,5,4)
  (same comment as for waste glass)
  production volume 2.04 kg
- electricity, medium voltage: 3.75045e-8, 1.27358e-7, 1.31477e-7, 3.16166e-8, 3.19221e-7, 1.10054e-7, 7.56481e-8, 2.85777e-8, 2.32222e-8, 2.08712e-8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 kWh (16 suppliers, which the file names only by identifier); sum of these 6.73592e-5 kWh; lognormal variance with pedigree 0.1327, pedigree (2,2,5,5,4)
  EcoSpold01Location=GB
  Questionnaire, data for other type of collector plus data for flat plate collector production
  Uncertainty: Questionnaire, data for other type of collector plus data for flat plate collector production
- welding, gas, steel: 4.93441e-5 m; lognormal variance with pedigree 0.0526, pedigree (2,1,5,5,1)
  Questionnaire
  EcoSpold01Location=RER
  Uncertainty: Questionnaire
- alkyd paint, white, without solvent, in 60% solution state: 9.93294e-6 kg; lognormal variance with pedigree 0.0526, pedigree (2,1,5,5,1)
  Questionnaire
  EcoSpold01Location=RER
  Uncertainty: Questionnaire
- butyl acrylate: 7.20401e-5 kg; lognormal variance with pedigree 0.0526, pedigree (2,1,5,5,1)
  EcoSpold01Location=RER
  Questionnaire
  Uncertainty: Questionnaire
- hot water tank factory: 2.76416e-11 unit; lognormal variance with pedigree 0.35, pedigree (5,5,5,5,5)
  EcoSpold01Location=CH
  Rough estimation
  Uncertainty: Rough estimation
- electricity, medium voltage: 0.000175294 kWh; lognormal variance with pedigree 0.0526, pedigree (2,1,5,5,1)
  EcoSpold01Location=CH
  Questionnaire
  Uncertainty: Questionnaire
- heat, district or industrial, other than natural gas: 1.1204e-6, 6.68679e-5, 0.00249919 MJ (3 suppliers, which the file names only by identifier); sum of these 0.00256718 MJ; lognormal variance with pedigree 0.0526, pedigree (2,1,5,5,1)
  EcoSpold01Location=CH
  Questionnaire
  Uncertainty: Questionnaire
- waste plastic, mixture: -7.57874e-6 kg; lognormal variance with pedigree 0.0526, pedigree (2,1,5,5,1)
  Questionnaire
  EcoSpold01Location=CH
  Uncertainty: Questionnaire
  production volume 2.31 kg
- explosives factory: 5.91455e-12 unit; lognormal variance with pedigree 0.64, pedigree (5,5,5,5,5)
  EcoSpold01Location=CH
- flat glass, uncoated: 2.66022e-5 kg; lognormal variance with pedigree 0.108, pedigree (4,5,5,5,1)
  EcoSpold01Location=RER
- industrial machine, heavy, unspecified: 1.62282e-7 kg; lognormal variance with pedigree 0.44, pedigree (5,5,5,5,1)
  EcoSpold01Location=RER
- municipal waste collection service by 21 metric ton lorry: 6.70374e-5 metric ton*km; lognormal variance with pedigree 0.25, pedigree (5,5,5,5,1)
  EcoSpold01Location=CH
- heat, central or small-scale, other than natural gas: 1.83248e-6, 0.000128199 MJ (2 suppliers, which the file names only by identifier); sum of these 0.000130031 MJ; lognormal variance with pedigree 0.148, pedigree (4,5,5,5,4)
  EcoSpold01Location=CH
- municipal solid waste: -4.0407e-7 kg; lognormal variance with pedigree 0.14, pedigree (5,5,5,5,1)
  EcoSpold01Location=CH
  production volume 0.01818 kg
- selective coat, copper sheet, black chrome: 5.07012e-7 m2; lognormal variance with pedigree 0.0606, pedigree (2,5,5,5,1)
  Questionnaire
  EcoSpold01Location=RER
  Uncertainty: Questionnaire
- soft solder, Sn97Cu3: 2.98123e-8 kg; lognormal variance with pedigree 0.0606, pedigree (2,5,5,5,1)
  Questionnaire
  EcoSpold01Location=RER
  Uncertainty: Questionnaire
- metal working factory: 1.87e-13 unit; lognormal variance with pedigree 0.3546, pedigree (2,4,5,5,1)
  (same comment as for metal working factory)
- waste polystyrene: -7.89654e-7, -5.27616e-8, -3.99028e-9, -2.17924e-8, -8.8039e-9, -2.0694e-8, -5.52802e-6 kg (7 suppliers, which the file names only by identifier); sum of these -6.42571e-6 kg; lognormal variance with pedigree 0.0532, pedigree (2,3,5,5,1)
  (same comment as for waste polystyrene)
  production volume 0.396 kg
- lubricating oil: 6.06863e-5 kg; lognormal variance with pedigree 0.2706, pedigree (4,3,5,5,5)
  (same comment as for glass fibre reinforced plastic, polyester resin, hand lay-up)
- waste mineral oil: -6.06863e-5 kg; lognormal variance with pedigree 0.0706, pedigree (4,3,5,5,1)
  (same comment as for waste polystyrene)
  production volume 2643 kg
- waste mineral wool, for final disposal: -7.89316e-6, -1.04313e-5 kg (2 suppliers, which the file names only by identifier); sum of these -1.83245e-5 kg; lognormal variance with pedigree 0.056, pedigree (3,4,5,5,1)
  EcoSpold01Location=CH
  Literature
  Uncertainty: Literature
  production volume 57 kg
- polyurethane, flexible foam: 2.38689e-6 kg; lognormal variance with pedigree 0.1401, pedigree (1,2,4,5,1)
  Literature and own estimations. Rounded values in the reference table.
  EcoSpold01Location=RER
- printing ink, offset, without solvent, in 47.5% solution state: 6.03682e-7 kg; lognormal variance with pedigree 0.0099, pedigree (2,3,4,3,1)
  Calculated value: average ink consumption of three companies
- acrylic dispersion, without water, in 65% solution state: 7.74953e-8 kg; lognormal variance with pedigree 0.0099, pedigree (2,3,4,3,1)
  Calculated value: average consumption of three companies
- isopropanol: 1.41966e-7 kg; lognormal variance with pedigree 0.0099, pedigree (2,3,4,3,1)
  Calculated value: average Ispopropanol use of three companies (with low VOC consumption)
- acrylic varnish, without water, in 87.5% solution state: 2.54627e-8 kg; lognormal variance with pedigree 0.0099, pedigree (2,3,4,3,1)
  Calculated value: average consumption of three companies
- ethylene glycol monoethyl ether: 3.4124e-8 kg; lognormal variance with pedigree 0.0099, pedigree (2,3,4,3,1)
  Calculated value: Average consumption of three companies
- paper, woodfree, coated: 9.05197e-5 kg; lognormal variance with pedigree 0.0099, pedigree (2,3,4,3,1)
  (same comment as for paper, woodfree, coated)
- electricity, low voltage: 1.99025e-6 kWh; lognormal variance with pedigree 0.0099, pedigree (2,3,4,3,1)
  EcoSpold01Location=CH
  Calculated values: Average consumption of three companies
- spent solvent mixture: -2.51628e-8, -7.25203e-8 kg (2 suppliers, which the file names only by identifier); sum of these -9.76831e-8 kg; lognormal variance with pedigree 0.0113, pedigree (3,3,4,3,1)
  (same comment as for spent solvent mixture)
  production volume 5.38792e7 kg
- waste paper, unsorted: -3.29324e-6, -2.21044e-5 kg (2 suppliers, which the file names only by identifier); sum of these -2.53976e-5 kg; lognormal variance with pedigree 0.0113, pedigree (3,3,4,3,1)
  (same comment as for waste paper, unsorted)
  production volume 1.40086e10 kg
- waste emulsion paint: -1.5075e-9, -1.68569e-8 kg (2 suppliers, which the file names only by identifier); sum of these -1.83644e-8 kg; lognormal variance with pedigree 0.0099, pedigree (2,3,4,3,1)
  Calculated value: average value for disposal of paints of three companies
  production volume 1.01293e7 kg

## Inputs from nature
- Water, unspecified natural origin [natural resource, in water]: 1.49018e-7 m3; lognormal variance with pedigree 0.34, pedigree (1,1,5,1,1)
  rough estimate
- Water, well, in ground [natural resource, in water]: 4.5674e-7 m3; lognormal variance with pedigree 0.040625, pedigree (1,3,5,2,1)
- Transformation, from pasture, man made [natural resource, land]: 0.000319285 m2; source Mason J. M. 2006; lognormal variance with pedigree 0.1899, pedigree (3,4,5,1,3)
  Literature value/Estimation. The total area of PV modules used in the large PV power plants is not calculated from the cell efficiency, but corresponds to the actual situation at the power plants investigated. The land use related to an open ground mounting system is 4.7 m2 per m2 of installed modules, based on information about a 3.5 MWp open ground power plant described by Mason et al. (2006) and a 560 kWp open ground power plant described by Frischknecht et al. (1996)
  [Frischknecht R., Bollens U., Bosshart S., Ciot M., Ciseri L., Doka G., Dones R., Gantner U., Hischier R. and Martin A. (1996) Ökoinventare von Energiesyste-men: Grundlagen für den ökologischen Vergleich von Energiesystemen und den Einbezug von Energiesystemen in Ökobilanzen für die Schweiz. 3. Gruppe Energie - Stoffe - Umwelt (ESU), Eidgenössische Technische Hochschule Zürich und Sektion Ganzheitliche Systemanalysen, Paul Scherrer Institut, Villigen, Bundesamt für Energie (Hrsg.), Bern, CH, retrieved from: www.energieforschung.ch.]
- Transformation, to industrial area [natural resource, land]: 0.000319285 m2; source Jungbluth N. 2012; lognormal variance with pedigree 0.188, pedigree (3,3,5,3,3)
  Literature value/Estimation. The total area of PV modules used in the large PV power plants is not calculated from the cell efficiency, but corresponds to the actual situation at the power plants investigated.
- Occupation, industrial area [natural resource, land]: 0.00957856 m2*year; source Jungbluth N. 2012; lognormal variance with pedigree 0.188, pedigree (3,3,5,3,3)
  Calculated value.

## Emissions to nature
- Particulates, > 10 um [air, urban air close to ground]: 0 kg; pedigree (1,1,1,1,1)
  Emission from dismantling and handling. from one extrapolated PM10 emission factor and generic PM fractions from measurements
- Particulates, < 2.5 um [air, urban air close to ground]: 0 kg; pedigree (1,1,1,1,1)
  (same comment as for Particulates, > 10 um)
- Particulates, > 2.5 um, and < 10um [air, urban air close to ground]: 0 kg; pedigree (1,1,1,1,1)
  (same comment as for Particulates, > 10 um)
- Carbon dioxide, fossil [air, unspecified]: 1.00851e-6 kg; lognormal variance with pedigree 0.098025, pedigree (3,5,5,2,3)
  Data of 1994, change was announced, may be outdated; basic uncertainty:1.05
- Water [water, unspecified]: 9.85018e-8 m3; lognormal variance with pedigree 0.0807, pedigree (2,2,5,1,1)
  Calculated value based on literature values and expert opinion. See comments in the parametres' comment field.
- Water [air, unspecified]: 2.3941e-6 m3; lognormal variance with pedigree 0.0807, pedigree (2,2,5,1,1)
  (same comment as for Water)
- Nitrogen oxides [air, non-urban air or from high stacks]: 1.92782e-6 kg; lognormal variance with pedigree 0.082625, pedigree (3,3,5,2,1)
- Sulfur dioxide [air, non-urban air or from high stacks]: 4.44884e-7 kg; lognormal variance with pedigree 0.042625, pedigree (3,3,5,2,1)
- Particulates, < 2.5 um [air, non-urban air or from high stacks]: 8.81015e-8 kg; lognormal variance with pedigree 0.350125, pedigree (1,2,5,2,1)
- Carbon dioxide, fossil [air, non-urban air or from high stacks]: 0.000183881 kg; lognormal variance with pedigree 0.042625, pedigree (3,3,5,2,1)
- Benzene [air, unspecified]: 1.57503e-10 kg; lognormal variance with pedigree 0.1806, pedigree (2,5,5,5,1)
- Propylene oxide [air, urban air close to ground]: 2.3479e-8 kg; lognormal variance with pedigree 0.0172, pedigree (4,3,4,1,1)
  Calculated, stochiometric value: Emissions from the use of ink solvent. Average of three companies calculated from the mass balance of product use and recovery for recycling/disposal. Portion of Methoxypropanol derived from product specifications and related emissions expressed by the portion of methanol and propylene oxide used for the production of Methoxypropanol.
- Heptane [air, urban air close to ground]: 1.22297e-7 kg; lognormal variance with pedigree 0.0112, pedigree (3,3,4,1,1)
  Calculated value: Emissions from the use of solvent Naphtha, white spirit and other petrol based derivates. Average of three companies calculated from the mass balance of product use and recovery for recycling. Heptane used for the portion of aliphatic hydrocarbons C7-C12 given in product specifications.
- Xylene [air, urban air close to ground]: 1.10429e-8 kg; lognormal variance with pedigree 0.0126, pedigree (3,4,4,1,1)
  Calculated value: Emissions from the use of solvent Naphtha, white spirit and other petrol based derivates. Average of three companies calculated from the mass balance of product use and recovery for recycling/disposal. Toluene and Xylene assumed main components of cyclic hydrocarbons, related content of cylcic hydrocarbons from product specifications expressed by 50% Xylene and 50% Toluene.
- Benzene, ethyl- [air, urban air close to ground]: 1.25006e-8 kg; lognormal variance with pedigree 0.0112, pedigree (3,3,4,1,1)
  Calculated value: Emissions from the use of solvent Naphtha, white spirit and other petrol based derivates (i.e. ink solvent). Average of three companies calculated from the mass balance of product use and its recovery for recycling. Benzene, ethyl- content of products derived from product specifications.
- Methanol [air, urban air close to ground]: 1.29006e-8 kg; lognormal variance with pedigree 0.0172, pedigree (4,3,4,1,1)
  Calculated, stochiometric value: Emissions from the use of ink solvent. Average of three companies calculated from the mass balance of product use and recovery for recycling/disposal. Portion of Methoxypropanol in ink solvent derived from product specifications and related emissions expressed by the portion of methanol and propylene oxide used for the production of Methoxypropanol.
- Toluene [air, urban air close to ground]: 1.10429e-8 kg; lognormal variance with pedigree 0.0172, pedigree (4,3,4,1,1)
  Calculated value: Emissions from the use of solvent Naphtha, white spirit and other petrol based derivates. Average of three companies calculated from the mass balance of product use and recovery for recycling. Toluene and Xylene assumed for the portion of cyclic hydrocarbons, related portion derived from product specifications and expressed by 50% Xylene and 50% Toluene.
- 2-Propanol [air, urban air close to ground]: 2.81232e-7 kg; lognormal variance with pedigree 0.1306, pedigree (3,3,4,1,1)
  Calculated value: average from three companies calculated from the mass balance of solvent consumption and solvent recovery for recycling.

## Sampling procedure
waste-specific calculation based on literature data
