# printed wiring board production, for surface mounting, Pb free surface

Dataset: EcoSpold 2, unit process
Geography: GLO
Time period: 2003-01-01 to 2019-12-31
Technology level: current
Classification: EcoSpold01Categories: electronics/module
Classification: ISIC rev.4 ecoinvent: 2610:Manufacture of electronic components and boards
Tags: ConvertedDataset
Scenario: Business-as-Usual
System model: Allocation at the point of substitution
Generated by: Roland Hischier
Published in: Hischier R. 2007
Database: ecoinvent
isCopyrightProtected: true
accessRestrictedTo: 1

## General comment
The dataset represents the assembly of 1 m2 of a 6-layer FR-4 printed wiring board. It is based on a 1.6 mm thick 6-layer PWB with a mixture of several Pb-free surface finishing methods Pb-free surface finished (mixture of different finishing methods) for surface mount applications, with soldermask, a weight of 3.26 kg without mounted components for ICT applications. Main data are taken from environmental reports of 3 German PWB producers, plus from literature.

## Included activities start
From reception of raw materials at the factory gate.

## Included activities end
This dataset includes of a PWB prepared for surface mounting of components. It includes (raw) materials, infrastructure, energy consumption, emissions to air and water and waste. Not included into this dataset is the mounting of the PWB.

## Geography
This module is based on information from European producers that are seen as representative for the global situation.

## Technology
Average PWB production composed of: substrate preparation, imaging, exposure, etching, sandwiching, activation and accelaration steps as well as copper plating, cleaning, oxidification, dry vacuum lamination, micro etching, surface finishing.

## Parameters
- fraction, water, ultrapure, to air: 0.061; name fraction_WUP_to_air; = fraction_PW_to_air; lognormal variance with pedigree 0.092025, pedigree (4,4,3,2,4)
  Calculated value. See comment in the other parametres present in this dataset. Ultrapure water is considered to be always used as process water, thus process water fractions to air are applied to all ultrapure water input flows to calculate the amount of water consumed in the processes.
- fraction, process water, to air: 0.061 dimensionless; name fraction_PW_to_air; lognormal variance with pedigree 0.092025, pedigree (4,4,3,2,4)
  Literature value (Statistics Canada, 2007 & Shaffer, K.H., 2008, Consumptive water use in the Great Lakes Basin, USGS) (Vionnet, S., Quantis Water Database - Technical Report, 2012).
- fraction, tap water, to air: 0.061; name fraction_TW_to_air; = fraction_PW_to_air; lognormal variance with pedigree 0.092025, pedigree (4,4,3,2,4)
  Calculated value. See comment in the other parametres present in this dataset. Tap water is considered to be always used as process water, thus process water fractions to air are applied to all tap water input flows to calculate the amount of water consumed in the processes.

## Reference product
- printed wiring board, for surface mounting, Pb free surface: 1 m2; By-product classification allocatable product; CPC 47130: Printed circuits
  EcoSpold01Location=GLO
  Typically, a printed wiring board (PWB) consists of a number of electric current conducting and non-conducting layers which are sandwiched together. Printed wiring boards are the interconnective electrical framework and physical structure that hold together the various electronic components.
  production volume 1 m2
    $ 18.9315 Billion in 1998 (includes all rigid PWB)
    Dummy value to be replaced by measured, estimated or calculated value
  property price 580.213 EUR2005
    Calculated based on inputs: The price of the product has been calculated as a sum of the values of the material and energy inputs for this product. This value is therefore a rough estimation. It may underestimate the real price since there are additional expenses when producing any product. These expences can include for example labour costs, treatment of waste materials and profit for the producer. Please consider carefully whether this level of data quality is acceptable for your application.
  property carbon content, fossil 0.109783
    C content was calculated as the addition of C content in the PWB components, listed in Tab 2.3 (ecoinvent v2.2 report 18_II), and considering a final weight of 3.26 kg/m2 (an efficiency of 88%). Referred to 1 kg DM PWB
  property carbon content 0.109783
    carbon content on a dry matter basis (reserved; not for manual entry)
  property true value 580.213
    allocation property applied in "true value" allocation // value calculated from revenue
  properties: water content 0, carbon content, non-fossil 0, wet mass 3.26 kg, water in wet mass 0 kg, dry mass 3.26 kg, carbon allocation 0.357891 kg

## By-products
- iron scrap, sorted, pressed: 0 kg; By-product classification Recyclable; CPC 39310: Slag, dross, scalings and other waste from the manufacture of iron or steel; pedigree (1,1,1,1,1)
  metallic iron scrap removed from ash reamains and recycled.
  Uncertainty: uncertainty is calculated from uncertainties in waste composition and transfer coefficients to soild residues
  production volume 0.000173055 kg
  property price 0.175 EUR2005
    Temporary price data. Calculated as 90% of purchasers price based on: 2005 import and export prices (total trades (USD) divided by total weight (kg) in biggest economies of the world: EU27, USA, Brasil, China, India, Japan and Russia) from UN Commodity Trade Statistics Database (http://data.un.org/Explorer.aspxDatabase [Accessed 2011.06.20]). Commodity: Waste or scrap, of cast iron
  property carbon content 0
    carbon content on a dry matter basis (reserved; not for manual entry)
  property true value 2.59472e-5
    allocation property applied in "true value" allocation // value calculated from revenue
  properties: carbon content, non-fossil 0, wet mass 1 kg, dry mass 1 kg, water content 0, carbon content, fossil 0, water in wet mass 0 kg, carbon allocation 0 kg
- copper: 0 kg; source Rentz O. 1999; By-product classification allocatable product; CPC 41413: Refined copper and copper alloys, unwrought; master alloys of copper
  Literature value. Copper uses: Before end-use copper is manufactured into semi fabricated products, such as shapes and ingots (known as 'semis'). These manufacturing processes are subdivided into hot working, cold working and, if necessary, process annealing. Few of the semis are ready for use as such. They more typically travel to first-stage manufacturers, who make metal rods, wire, and casting, and then to component manufacturers who produce such things as motors, valves, and insulated cables The components in turn are incorporated by final-stage manufacturers into a variety of finished products - automobiles, commercial buildings, residential housing, and so forth. These uses account for about 79% of the world-wide consumption of copper.
  production volume 5.57641e-6 kg
  properties: dry mass 1 kg, water in wet mass 0 kg, wet mass 1 kg, carbon content, non-fossil 0, water content 0, price 5.52 EUR2005, carbon content, fossil 0, carbon content 0, carbon allocation 0 kg, true value 2.60514e-5
- electricity, for reuse in municipal waste incineration only: 0 kWh; CPC 17100: Electrical energy; By-product classification allocatable product; pedigree (1,1,1,1,1)
  Net electricity generated from this waste and used in internal MSWI plant energy redistribution.
  Uncertainty: uncertainty is calculated from uncertainties in waste composition and uncertainties in energy efficiency and the uncertainty in internal energy demand
  production volume 0.0921649 kWh
  property exergy 3.6 MJ; name E_el_prod_MSWI_exergy
    This exergy property is based on the exergy content of the product.
  property true value relation 3.6; name E_el_prod_MSWI_true_value_relation
    property to calculate "true value" from
  property price 0.1 EUR2005; name E_el_prod_MSWI_price_EUR2005
    Estimated to be the same price as in case of electricity, medium voltage.
  property true value 0.00178369
    allocation property applied in "true value" allocation // value calculated from true value relation
- heat, for reuse in municipal waste incineration only: 0 MJ; CPC 17300: Steam and hot water; By-product classification allocatable product; pedigree (1,1,1,1,1)
  Net useful heat generated from this waste and used in internal MSWI plant energy redistribution.
  Uncertainty: uncertainty is calculated from uncertainties in waste composition and uncertainties in energy efficiency and the uncertainty in internal energy demand
  production volume 0.715259 MJ
  property true value relation 0.1842; name E_th_prod_MSWI_true_value_relation
    property to calculate "true value" from
  property exergy 0.1842 MJ; name E_th_prod_MSWI_exergy
    This exergy property is based on the exergy content of the product.
  property price 0.0106 EUR2005; name E_th_prod_MSWI_price_EUR2005
    Average European district heat price from Ecoheatcool and Euroheat 2005-2006, Ecoheat Work package 1: The European heat market. Final report. 10.6 EUR/GJ i s the price of district heat. http://www.solarthermalworld.org/files/Ecoheatcool%20WP1%20Web.pdf?download
  property true value 0.000720263
    (same comment as for electricity, for reuse in municipal waste incineration only)
- zinc concentrate: 0 kg; CPC 14290: Other non-ferrous metal ores and concentrates (other than uranium or thorium ores and concentrates); By-product classification allocatable product
  Calculated value from the knowledge of the properties of both products.
  production volume 0.000209636 kg
  property price 0.38 EUR2005; name ByP_price_EUR2005
    Temporary price data. Calculated as 90% of purchasers price based on: Zinc content in concentrate 53%. Concentrate price per kg Zn 86.5% of refined Zn price (13.5% treatment charges according to CHR Metals Limited 2005: Dynamic cost curves. http://www.minecost.com/dynamic.pdf). 2004 zinc price from USGS (2007) Mineral commodity summaries 2007. <http://minerals.usgs.gov/minerals/pubs/mcs/2007/mcs2007.pdf> [Accessed 25 May 2010]
  property zinc content 0.53; name zinc_C_zinc_concentrate
    Zinc content on a dry matter basis. Value taken from teh "zinc mine operation" /GLO dataset.
  property dry mass 1 kg; name DM_zinc_concentrate
  property carbon content 0
    carbon content on a dry matter basis (reserved; not for manual entry)
  property true value 2.2174e-9
    allocation property applied in "true value" allocation // value calculated from revenue
  properties: wet mass 1 kg, water content 0, carbon content, non-fossil 0, carbon content, fossil 0, water in wet mass 0 kg, carbon allocation 0 kg
- iron scrap, unsorted: 0 kg; source European Aluminium Association 2008; CPC 39310: Slag, dross, scalings and other waste from the manufacture of iron or steel; By-product classification Recyclable; pedigree (1,1,1,1,1)
  production volume 4.57834e-9 kg
  property price 0.149 EUR2005; name ironScrapAmount_price_EUR2005
    Temporary price data. Calculated as 90% of purchasers price based on: estimated at 85% of sorted scrap
  property carbon content 0
    carbon content on a dry matter basis (reserved; not for manual entry)
  property true value 6.28529e-10
    allocation property applied in "true value" allocation // value calculated from revenue
  properties: water in wet mass 0 kg, water content 0, carbon content, fossil 0, carbon content, non-fossil 0, dry mass 1 kg, wet mass 1 kg, carbon allocation 0 kg
- aluminium oxide, non-metallurgical: 0 kg; source European Aluminium Association 2008; CPC 41432: Alumina (aluminium oxide), except artificial corundum; By-product classification allocatable product; CAS 1344-28-1; pedigree (1,1,1,1,1)
  production volume 2.88097e-7 kg
  property carbon content, non-fossil 0; name C_content_non_fossil
  property price 0.28 EUR2005; name Al2O3Amount_price_EUR2005
    From UN trade database. http://data.un.org/ Import data from the largest economies of the world are used (Brazil, India, USA, China, Japan and EU-27).
  property dry mass 1 kg; name DM
  property water content 0; name water_content
  property wet mass 1 kg; name WM
  property water in wet mass 0 kg; name WWM
  property carbon content, fossil 0; name C_content_fossil
  property carbon content 0
    carbon content on a dry matter basis (reserved; not for manual entry)
  property true value 7.43239e-8
    allocation property applied in "true value" allocation // value calculated from revenue
  properties: carbon allocation 0 kg
- aluminium, cast alloy: 0 kg; source European Aluminium Association 2008; By-product classification allocatable product; CPC 41431: Unwrought aluminium; pedigree (1,1,1,1,1)
  EcoSpold01Location=RER
  production volume 2.69307e-6 kg
  property price 1.3 EUR2005; name castAlloyAmount_price_EUR2005
    Temporary price data. Calculated as 90% of purchasers price based on: Source: London Metal Exchange, Aluminium alloy price for 2005
  property carbon content 0
    carbon content on a dry matter basis (reserved; not for manual entry)
  property true value 3.22569e-6
    allocation property applied in "true value" allocation // value calculated from revenue
  properties: water in wet mass 0 kg, carbon content, non-fossil 0, water content 0, dry mass 1 kg, carbon content, fossil 0, wet mass 1 kg, carbon allocation 0 kg
- aluminium, wrought alloy: 0 kg; source European Aluminium Association 2008; By-product classification allocatable product; CPC 4153: Semi-finished products of aluminium or aluminium alloys; pedigree (1,1,1,1,1)
  production volume 1.17898e-6 kg
  property price 1.44 EUR2005; name secondaryAluminiumOutput_price_EUR2005
    Estimated based on literature values and expert judgement. Aluminium ccast alloys are about 90% of the price of aluminium wrought alloys.
  property carbon content 0
    carbon content on a dry matter basis (reserved; not for manual entry)
  property true value 1.56422e-6
    allocation property applied in "true value" allocation // value calculated from revenue
  properties: wet mass 1 kg, water content 0, carbon content, fossil 0, water in wet mass 0 kg, carbon content, non-fossil 0, dry mass 1 kg, carbon allocation 0 kg

## Inputs from technosphere
- heat, district or industrial, natural gas: 379.388 MJ; source AT&S AG  2006; lognormal variance with pedigree 0.04, pedigree (1,1,5,1,1)
  Estimation, based on literature, average data over 3 years from 3 European PWB producer.
  Further references:
  hmp (2006) Umweltbericht 2005. Heidenhain-Microprint GmbH (hmp), Berlin (Germany), Online-Version under: www.hmp-heidenhain.de <http://www.hmp-heidenhain.de>.
  SEAG (2006) Umweltbericht 2006 - Zusammenfassung. Schweizer Electronic AG (SEAG), Schramberg (Germany), Online-Version under: www.schweizerelectronic.ag <http://www.schweizerelectronic.ag>.
  EcoSpold01Location=RER
- nickel, 99.5%: 0.000774737 kg; source ZVEI 2006; lognormal variance with pedigree 0.05, pedigree (1,1,5,1,1)
  EcoSpold01Location=GLO
  Calculated value, based on literature assuming a yield of 95% and square weight of 3.26 kg.
  Further references:
  AT&S AG (2006) Environmental Report 2006. Austria Technologie & Systemtechnik Aktiengesellschaft (AT&S AG), Fehring, Leoben (Austria), Online-Version under: www.ats.net <http://www.ats.net>.
  properties: wet mass 1 kg, dry mass 1 kg
- municipal solid waste: 0 kg; source AT&S AG  2006; pedigree (1,1,1,1,1)
  Proxy with literature value, due to a lack of more specific information, to represent garbage, municipal waste to municipal incineration is used.
  EcoSpold01Location=CH
  production volume 0 kg
    Calculated from the production volume of printed wiring board, for surface mounting, Pb free surface in proportion to the respective output amounts.
  properties: dry mass 0.771 kg, wet mass 1 kg, carbon content, non-fossil 0.261655, carbon content, fossil 0.171549, water content 0.297017
  note on carbon content, non-fossil: MSW composition in tab 4.1, ecoinvent v2.2 report 13_I. C content referred to 1 kg DM
- iron (III) chloride, without water, in 40% solution state: 0.860926 kg; source AT&S AG  2006; lognormal variance with pedigree 0.05, pedigree (1,1,5,1,1)
  Literature Value.
  EcoSpold01Location=CH
  properties: wet mass 1 kg, dry mass 1 kg
- silver: 0.000514738 kg; source ZVEI 2006; lognormal variance with pedigree 0.05, pedigree (1,1,5,1,1)
  Calculated value, based on literature assuming a yield of 95% and square weight of 3.26 kg.
  Further references:
  AT&S AG (2006) Environmental Report 2006. Austria Technologie & Systemtechnik Aktiengesellschaft (AT&S AG), Fehring, Leoben (Austria), Online-Version under: www.ats.net <http://www.ats.net>.
  EcoSpold01Location=RER
  properties: dry mass 1 kg, wet mass 1 kg
- glass fibre reinforced plastic, polyester resin, hand lay-up: 1.88969 kg; source ZVEI 2006; lognormal variance with pedigree 0.05, pedigree (1,1,5,1,1)
  Proxy with calculated value, to represent cores and prepreg glass fibre is used. Calculation is based on literature assuming a yield of 88% and square weight of 3.26 kg
  Further references:
  AT&S AG (2006) Environmental Report 2006. Austria Technologie & Systemtechnik Aktiengesellschaft (AT&S AG), Fehring, Leoben (Austria), Online-Version under: www.ats.net <http://www.ats.net>.
  EcoSpold01Location=RER
  properties: carbon content, fossil 0.246639, wet mass 1 kg, dry mass 1 kg
  note on carbon content, fossil: C content was calculated as an addition of C content in the product components (60% glass fibre, 40% polyester resin)
- water, ultrapure: 0 kg; name water_ultrapure_input; source AT&S AG  2006; pedigree (1,1,1,1,1)
  Estimation, based on literature.
  EcoSpold01Location=GLO
  properties: wet mass 1 kg
- copper: 2.87459 kg; source ZVEI 2006; lognormal variance with pedigree 0.05, pedigree (1,1,5,1,1)
  EcoSpold01Location=RER
  Calculated value, based on literature assuming a yield of 88% and square weight of 3.26 kg
  Further references:
  AT&S AG (2006) Environmental Report 2006. Austria Technologie & Systemtechnik Aktiengesellschaft (AT&S AG), Fehring, Leoben (Austria), Online-Version under: www.ats.net <http://www.ats.net>.
  properties: dry mass 1 kg, wet mass 1 kg
- hydrogen peroxide, without water, in 50% solution state: 0 kg; source AT&S AG  2006; pedigree (1,1,1,1,1)
  Literature Value.
  EcoSpold01Location=RER
  properties: wet mass 1 kg, dry mass 1 kg
- tin: 0.00278839 kg; source ZVEI 2006; lognormal variance with pedigree 0.05, pedigree (1,1,5,1,1)
  EcoSpold01Location=RER
  Calculated value, based on literature assuming a yield of 95% and square weight of 3.26 kg.
  Further references:
  AT&S AG (2006) Environmental Report 2006. Austria Technologie & Systemtechnik Aktiengesellschaft (AT&S AG), Fehring, Leoben (Austria), Online-Version under: www.ats.net <http://www.ats.net>.
  properties: wet mass 1 kg, dry mass 1 kg
- gold: 0.000154739 kg; source ZVEI 2006; lognormal variance with pedigree 0.05, pedigree (1,1,5,1,1)
  (same comment as for tin)
  properties: wet mass 1 kg, dry mass 1 kg
- electronic component factory: 1.99999e-8 unit; lognormal variance with pedigree 0.5761, pedigree (4,5,5,3,5)
  Proxy, due to a lack of specific information, the infrastructure electronic component plant is used.
  EcoSpold01Location=GLO
  Uncertainty: rough assumption
- hazardous waste, for incineration: 0 kg; source AT&S AG  2006; pedigree (1,1,1,1,1)
  Proxy with literature value, due to a lack of more specific information, to represent harmful waste, hazardous waste is used.
  EcoSpold01Location=CH
  production volume 0 kg
    (same comment as for municipal solid waste)
  properties: dry mass 0.75 kg, water content 0.333333, wet mass 1 kg, carbon content, fossil 0.554667
  note on carbon content, fossil: Tab A.6, ecoinvent v2.2 report 13_I. C content has been calculated after data in the tables, and then referred to 1 kg DM
- sludge, pig iron production: 0 kg; source AT&S AG  2006; pedigree (1,1,1,1,1)
  EcoSpold01Location=CH
  Proxy with literature value, due to a lack of more specific information, to represent sludge from galvanisation FeOH, sluge pig iron production is used.
  production volume 0 kg
    (same comment as for municipal solid waste)
  properties: dry mass 0.914 kg, water content 0.0940919, carbon content, fossil 0.339168, wet mass 1 kg
- tap water: 23.9669 kg; name tap_water_input; source AT&S AG  2006; lognormal variance with pedigree 0.05, pedigree (1,1,5,1,1)
  EcoSpold01Location=RER
  Estimation, based on literature.
  properties: water content 2962.17, carbon content, fossil 0.00178991, dry mass 0.000337476 kg, wet mass 1 kg
  note on carbon content, fossil: Bicarbonate content is 2.93 mol/m3. CO2 content is 0.1 mol/m3 (ecoinvent v2.2 report 8, Tab 93.1).
- sodium chloride, powder: 0.510718 kg; source AT&S AG  2006; lognormal variance with pedigree 0.05, pedigree (1,1,5,1,1)
  EcoSpold01Location=RER
  Literature Value.
  properties: dry mass 1 kg, wet mass 1 kg
- dipropylene glycol monomethyl ether: 0 kg; source AT&S AG  2006; pedigree (1,1,1,1,1)
  EcoSpold01Location=RER
  Literature Value.
  properties: dry mass 1 kg, carbon content, fossil 0.567568, wet mass 1 kg
- waste emulsion paint: 0 kg; source AT&S AG  2006; pedigree (1,1,1,1,1)
  EcoSpold01Location=CH
  Proxy with literature value, due to a lack of more specific information, to representplastic dispersion, disposal, emulsion paint is used.
  production volume 0 kg
    (same comment as for municipal solid waste)
  properties: wet mass 1 kg, dry mass 1 kg, carbon content, fossil 0.27
  note on carbon content, fossil: Tab A.4, ecoinvent v2.2 report 13_I. C content has been calculated after data in the tables, and then referred to 1 kg DM
- electricity, medium voltage: 326.499 kWh; source AT&S AG  2006; lognormal variance with pedigree 0.04, pedigree (1,1,5,1,1)
  Estimation, based on literature, average data over 3 years from 3 European PWB producer.
  Further references:
  hmp (2006) Umweltbericht 2005. Heidenhain-Microprint GmbH (hmp), Berlin (Germany), Online-Version under: www.hmp-heidenhain.de <http://www.hmp-heidenhain.de>.
  SEAG (2006) Umweltbericht 2006 - Zusammenfassung. Schweizer Electronic AG (SEAG), Schramberg (Germany), Online-Version under: www.schweizerelectronic.ag <http://www.schweizerelectronic.ag>.
  EcoSpold01Location=UCTE
- hydrochloric acid, without water, in 30% solution state: 0 kg; source AT&S AG  2006; pedigree (1,1,1,1,1)
  EcoSpold01Location=RER
  Literature Value.
  properties: dry mass 1 kg, wet mass 1 kg
- sulfuric acid: 0 kg; source AT&S AG  2006; pedigree (1,1,1,1,1)
  Literature Value.
  EcoSpold01Location=RER
  properties: wet mass 1 kg, dry mass 1 kg
- phenolic resin: 0 kg; source ZVEI 2006; pedigree (1,1,1,1,1)
  Proxy with calculated value, to represent soldermask finishing, phenolic resin is used. Calculation is based on literature assuming a yield of 95% and square weight of 3.26 kg.
  Further references:
  AT&S AG (2006) Environmental Report 2006. Austria Technologie & Systemtechnik Aktiengesellschaft (AT&S AG), Fehring, Leoben (Austria), Online-Version under: www.ats.net <http://www.ats.net>.
  EcoSpold01Location=RER
  properties: carbon content, fossil 0.772277, wet mass 1 kg, dry mass 1 kg
  note on carbon content, fossil: (C6H5OH)-CH2-(C6H5OH) was considered to be the basic structure in phenolic resin (ecoinvent v2.2 report 8-part 61). C13H14O2, MW=202 g/mol
- sheet rolling, copper: 1.81669 kg; source ZVEI 2006; lognormal variance with pedigree 0.05, pedigree (1,1,5,1,1)
  EcoSpold01Location=RER
  Calculated value, based on literature assuming a yield of 88% and square weight of 3.26 kg.
  Further references:
  AT&S AG (2006) Environmental Report 2006. Austria Technologie & Systemtechnik Aktiengesellschaft (AT&S AG), Fehring, Leoben (Austria), Online-Version under: www.ats.net <http://www.ats.net>.
- sodium hydroxide, without water, in 50% solution state: 6.96767 kg; source AT&S AG  2006; lognormal variance with pedigree 0.05, pedigree (1,1,5,1,1)
  EcoSpold01Location=RER
  Literature Value.
  properties: dry mass 1 kg, wet mass 1 kg
- municipal solid waste: -0.00400095, -2.4523e-5, -1.71602e-5, -6.81028e-5, -0.048165 kg (5 entries); source AT&S AG  2006; lognormal variance with pedigree 0.05, pedigree (1,1,5,1,1)
  (same comment as for municipal solid waste)
  production volume 0.052276 kg
- water, ultrapure: 255.79, 474.505, 356.8 kg (3 entries); source AT&S AG  2006; lognormal variance with pedigree 0.04, pedigree (1,1,5,1,1)
  Estimation, based on literature.
  EcoSpold01Location=GLO
- hydrogen peroxide, without water, in 50% solution state: 0.307857, 1.46144 kg (2 entries); source AT&S AG  2006; lognormal variance with pedigree 0.05, pedigree (1,1,5,1,1)
  Literature Value.
  EcoSpold01Location=RER
- hazardous waste, for incineration: -4.47546, -0.116986, -9.30649 kg (3 entries); source AT&S AG  2006; lognormal variance with pedigree 0.05, pedigree (1,1,5,1,1)
  (same comment as for hazardous waste, for incineration)
  production volume 13.899 kg
- sludge, pig iron production: -0.699196, -0.0310164, -3.39197 kg (3 entries); source AT&S AG  2006; lognormal variance with pedigree 0.05, pedigree (1,1,5,1,1)
  (same comment as for sludge, pig iron production)
  production volume 4.1222 kg
- dipropylene glycol monomethyl ether: 0.0871197, 0.413568 kg (2 entries); source AT&S AG  2006; lognormal variance with pedigree 0.05, pedigree (1,1,5,1,1)
  EcoSpold01Location=RER
  Literature Value.
- waste emulsion paint: -0.0149429, -5.06711e-6, -0.167091 kg (3 entries); source AT&S AG  2006; lognormal variance with pedigree 0.05, pedigree (1,1,5,1,1)
  (same comment as for waste emulsion paint)
  production volume 0.18204 kg
- hydrochloric acid, without water, in 30% solution state: 2.49448, 11.1495 kg (2 entries); source AT&S AG  2006; lognormal variance with pedigree 0.05, pedigree (1,1,5,1,1)
  EcoSpold01Location=RER
  Literature Value.
- sulfuric acid: 0.173123, 0.994272 kg (2 entries); source AT&S AG  2006; lognormal variance with pedigree 0.05, pedigree (1,1,5,1,1)
  Literature Value.
  EcoSpold01Location=RER
- phenolic resin: 0.0370866, 0.176232 kg (2 entries); source ZVEI 2006; lognormal variance with pedigree 0.05, pedigree (1,1,5,1,1)
  (same comment as for phenolic resin)

## Inputs from nature
- Water, unspecified natural origin [natural resource, in water]: 5.58138 m3; name water_UNO_input; source AT&S AG  2006; lognormal variance with pedigree 0.05, pedigree (1,1,5,1,1)
  Estimation, based on literature.

## Emissions to nature
- Zinc, ion [water, surface water]: 5.14368e-5 kg; source AT&S AG  2006; lognormal variance with pedigree 0.69, pedigree (1,1,5,1,1)
  Estimation, based on literature.
- NMVOC, non-methane volatile organic compounds, unspecified origin [air, urban air close to ground]: 0.0426818 kg; source AT&S AG  2006; lognormal variance with pedigree 0.17, pedigree (1,1,5,1,1)
  Proxy with literature value, to represent organic carbon, NMVOC is used.
- Chromium, ion [water, surface water]: 5.21658e-5 kg; source AT&S AG  2006; lognormal variance with pedigree 0.69, pedigree (1,1,5,1,1)
  Estimation, based on literature.
- COD, Chemical Oxygen Demand [water, surface water]: 0.0817146 kg; source AT&S AG  2006; lognormal variance with pedigree 0.09, pedigree (1,1,5,1,1)
  Estimation, based on literature.
- Copper [air, urban air close to ground]: 0.00497998 kg; source US EPA 1995; lognormal variance with pedigree 0.35, pedigree (1,1,5,1,1)
  Calculated Value, based literature and on an annual PWB yield of 292’000 m2 and a Cu release to air of 3205 lb/year.
- AOX, Adsorbable Organic Halogen as Cl [water, surface water]: 0.000133519 kg; source AT&S AG  2006; lognormal variance with pedigree 0.09, pedigree (1,1,5,1,1)
  Estimation, based on literature.
- TOC, Total Organic Carbon [water, surface water]: 0.0302647 kg; lognormal variance with pedigree 0.09, pedigree (1,1,5,1,1)
  Calculated Value, by default as TOC (gC) = COD/2.7 (COD measured in g O2). Should more correctly be calculated from the carbon content of the specified emissions to water.
- Particulates, > 2.5 um, and < 10um [air, urban air close to ground]: 0.00011218 kg; source AT&S AG  2006; lognormal variance with pedigree 0.17, pedigree (1,1,5,1,1)
  Estimation, based on literature and own assumptions.
- Particulates, < 2.5 um [air, urban air close to ground]: 0.000336529 kg; source AT&S AG  2006; lognormal variance with pedigree 0.35, pedigree (1,1,5,1,1)
  Estimation, based on literature and own assumptions.
- Cadmium, ion [water, surface water]: 1.84219e-5 kg; source AT&S AG  2006; lognormal variance with pedigree 0.69, pedigree (1,1,5,1,1)
  Estimation, based on literature.
- DOC, Dissolved Organic Carbon [water, surface water]: 0.0302647 kg; lognormal variance with pedigree 0.09, pedigree (1,1,5,1,1)
  Calculated Value, as equal to TOC.
- Water [air, unspecified]: 0.408239 m3; name water_to_air_unspecified; = (tap_water_input/1000*fraction_TW_to_air)+(water_ultrapure_input/1000*fraction_WUP_to_air)+(water_UNO_input*fraction_PW_to_air); lognormal variance with pedigree 0.0807, pedigree (2,2,5,1,1)
  Calculated value based on literature values and expert opinion. See comments in the parametres' comment field.
  property fraction, origin: fresh water 0.166018; name fraction_origin_fresh_water
  property fraction, origin: salt water 0; name fraction_origin_salt_water
  property fraction, origin: unspecified 0.833982; name fraction_origin_unspecified
- Hydrogen peroxide [air, urban air close to ground]: 0.000344738 kg; source AT&S AG  2006; lognormal variance with pedigree 0.17, pedigree (1,1,5,1,1)
  Estimation, based on literature.
- Arsenic, ion [water, surface water]: 2.17789e-6 kg; source AT&S AG  2006; lognormal variance with pedigree 0.69, pedigree (1,1,5,1,1)
  Estimation, based on literature.
- Mercury [water, surface water]: 6.09217e-7 kg; source AT&S AG  2006; lognormal variance with pedigree 0.69, pedigree (1,1,5,1,1)
  Estimation, based on literature.
- Water [water, unspecified]: 6.2842 m3; name water_to_water_unspecified; = (tap_water_input/1000)*(1-fraction_TW_to_air)+(water_ultrapure_input/1000)*(1-fraction_WUP_to_air)+water_UNO_input*(1-fraction_PW_to_air); lognormal variance with pedigree 0.0807, pedigree (2,2,5,1,1)
  (same comment as for Water)
  property fraction, origin: salt water 0; name fraction_origin_salt_water_Ww
  property fraction, origin: fresh water 0.166018; name fraction_origin_fresh_water_Ww
  property carbon content, non-fossil 0; name C_content_non_fossil
  property water in wet mass 1000 kg; name WWM
  property dry mass 0 kg; name DM
  property carbon content, fossil 0; name C_content_fossil
  property wet mass 1000 kg; name WM
  property fraction, origin: unspecified 0.833982; name fraction_origin_unspecified_Ww
- Fluoride [water, surface water]: 0.000375738 kg; source AT&S AG  2006; lognormal variance with pedigree 0.09, pedigree (1,1,5,1,1)
  Estimation, based on literature.
- Sulfuric acid [air, urban air close to ground]: 0.000246239 kg; source AT&S AG  2006; lognormal variance with pedigree 0.17, pedigree (1,1,5,1,1)
  Estimation, based on literature.
- Hydrogen chloride [air, urban air close to ground]: 0.00285639 kg; source AT&S AG  2006; lognormal variance with pedigree 0.17, pedigree (1,1,5,1,1)
  Estimation, based on literature.
- BOD5, Biological Oxygen Demand [water, surface water]: 0.0817146 kg; source AT&S AG  2006; lognormal variance with pedigree 0.09, pedigree (1,1,5,1,1)
  Estimation, based on literature.
- Copper, ion [water, surface water]: 0.000175469 kg; source AT&S AG  2006; lognormal variance with pedigree 0.69, pedigree (1,1,5,1,1)
  Estimation, based on literature.
- Nickel, ion [water, surface water]: 6.09217e-5 kg; source AT&S AG  2006; lognormal variance with pedigree 0.69, pedigree (1,1,5,1,1)
  Estimation, based on literature.
- Sodium hydroxide [air, urban air close to ground]: 0.00147739 kg; source AT&S AG  2006; lognormal variance with pedigree 0.17, pedigree (1,1,5,1,1)
  Estimation, based on literature.

## Sampling procedure
literature

## Review by Rolf Frischknecht 2007-11-08
passed.
