# magnesium production, pidgeon process

Dataset: EcoSpold 2, unit process
Geography: CN
Time period: 2011-01-01 to 2019-12-31
Technology level: current
Classification: ISIC rev.4 ecoinvent: 2420:Manufacture of basic precious and other non-ferrous metals
Scenario: Business-as-Usual
System model: Allocation at the point of substitution
Generated by: Simone Ehrenberger
Published in: Simone Ehrenberger 2013
Database: ecoinvent
isCopyrightProtected: true
accessRestrictedTo: 1

## General comment
In the Pidgeon process, magnesium is produced via thermal reduction. The data on energy consumption represent the state of Pidgeon process in 2011. The Pidgeon process in China represents about 85 % of the global magnesium production.

## Included activities start
The process starts with the reception of dolomite at the factory gate.

## Included activities end
This module includes the single steps of the Pidgeon process as well as the production of retorts needed for the reduction furnace and the production of fluxes for the refining. Apart from the retorts for the reduction step, no infrastructure is included.The activity ends with the refining of the raw magnesium and the casting of pure magnesium ingots. No alloying elements are included.

## Allocation
The calculation as given in this module is based on an allocation for the production of coke oven gas and semi coke oven gas according to the energetic contribution of the fuel gases to the entire production from the (semi) coke plant. The emissions from fuel combustion are completely accounted to the Pidgeon process. As at present, these fuel gases are treated as waste from the (semi) coke plant and provided to the magnesium producers for free, the waste gas which would be released to the atmosphere without use can be credited to the magnesium production. In this case, the production of these fuel gases would not be part of the magnesium production system. The coke production which is an upstream process for the FeSi production should be burdened with the full environmental loads in this scenario.

## Technology
The Pidgeon process includes the following process steps: calcination, grinding & mixing, briquetting, reducion and refining. Coal as energy source is only used in for the calcination process. For other process steps, coke oven, semi coke oven, producer or natural gas are used. The use of these fuels is calculated according to the weighted average in terms of annual magnesium output per fuel. The production of producer (coal) gas is included in this module.

A main influencing factor for the emissions from fuel combustion is the composition of the fuel itself. Due to the different origins of the fuel gases used in the Pidgeon process, the composition of the gases varies considerably. For semi coke and coke oven gas, a large variation in gas composition can be observed. As the data base for these compositions is restricted to few measurements, no statistical average can be determined.

## Reference product
- magnesium: 0 kg; CPC 41601: Tungsten, molybdenum, tantalum, magnesium, cobalt, cadmium, titanium, zirconium, beryllium, gallium, hafnium, […]; By-product classification allocatable product; CAS 7439-95-4
  melting yield pure Mg vs. raw Mg is 97,5 %. Production volume refers to 2011
  production volume 0 kg
    in 2011
  property carbon content 0
    carbon content on a dry matter basis (reserved; not for manual entry)
  properties: carbon content, non-fossil 0, wet mass 1 kg, water in wet mass 0 kg, price 11 EUR2005, water content 0, dry mass 1 kg, carbon content, fossil 0, carbon allocation 0 kg
- coal gas: 0 MJ; CPC 17200: Coal gas, water gas, producer gas and similar gases, other than petroleum gases and other gaseous hydrocarbons; By-product classification allocatable product; pedigree (1,1,1,1,1)
  primary data from DLR / IMA study
  properties: wet mass 0.0294737 kg, dry mass 0.0294737 kg, water in wet mass 0 kg, carbon content, fossil 0.28818, water content 0, carbon content, non-fossil 0, carbon content 0.28818, carbon allocation 0.00849373 kg
- magnesium: 1 kg; CPC 41601: Tungsten, molybdenum, tantalum, magnesium, cobalt, cadmium, titanium, zirconium, beryllium, gallium, hafnium, […]; By-product classification allocatable product; CAS 7439-95-4
  melting yield pure Mg vs. raw Mg is 97,5 %. Production volume refers to 2011
  production volume 6.61e8 kg

## By-products
- magnesium: 0 kg; CPC 41601: Tungsten, molybdenum, tantalum, magnesium, cobalt, cadmium, titanium, zirconium, beryllium, gallium, hafnium, […]; By-product classification allocatable product; CAS 7439-95-4
  melting yield pure Mg vs. raw Mg is 97,5 %. Production volume refers to 2011
  properties: carbon content, non-fossil 0, wet mass 1 kg, water in wet mass 0 kg, price 11 EUR2005, water content 0, dry mass 1 kg, carbon content, fossil 0, carbon content 0, carbon allocation 0 kg
- heat, for reuse in municipal waste incineration only: 0 MJ; CPC 17300: Steam and hot water; By-product classification allocatable product; pedigree (1,1,1,1,1)
  Net electricity generated from this waste and used in internal MSWI plant energy redistribution.
  Uncertainty: uncertainty is calculated from uncertainties in waste composition and uncertainties in energy efficiency and the uncertainty in internal energy demand
  property exergy 0.1842 MJ; name E_th_prod_MSWI_exergy
    This exergy property is based on the exergy content of the product.
  property price 0.0106 EUR2005; name E_th_prod_MSWI_price_EUR2005
    Average European district heat price from Ecoheatcool and Euroheat 2005-2006, Ecoheat Work package 1: The European heat market. Final report. 10.6 EUR/GJ i s the price of district heat. http://www.solarthermalworld.org/files/Ecoheatcool%20WP1%20Web.pdf?download
  property true value relation 0.1842; name E_th_prod_MSWI_true_value_relation
    property to calculate "true value" from
- electricity, for reuse in municipal waste incineration only: 0 kWh; CPC 17100: Electrical energy; By-product classification allocatable product; pedigree (1,1,1,1,1)
  (same comment as for heat, for reuse in municipal waste incineration only)
  property price 0.1 EUR2005; name E_el_prod_MSWI_price_EUR2005
    Estimated to be the same price as in case of electricity, medium voltage.
  property exergy 3.6 MJ; name E_el_prod_MSWI_exergy
    This exergy property is based on the exergy content of the product.
  property true value relation 3.6; name E_el_prod_MSWI_true_value_relation
    property to calculate "true value" from

## Inputs from technosphere
- feldspar: 0 kg; pedigree (1,1,1,1,1)
  primary data from DLR / IMA study
  properties: wet mass 1 kg, dry mass 1 kg
- natural gas, low pressure: 0 m3; pedigree (1,1,1,1,1)
  primary data from DLR / IMA study
  properties: dry mass 1 kg, wet mass 1 kg, carbon content, fossil 0.69519
  note on carbon content, fossil: C content considered the same as in high pressure (consumption mix)
- wastewater, average: 0 m3; pedigree (1,1,1,1,1)
  estimation for water balance
  production volume 0 m3; = Ref('c49eaa3c-d91a-4d46-b4d3-74fc5c393a79', 'ProductionVolume') * (Ref('d3de5cdf-ff1b-4b22-842e-2cf9acdd6866') / Ref('c49eaa3c-d91a-4d46-b4d3-74fc5c393a79'))
    Calculated from production volume of reference product using the relative outputs.
  properties: water content 2882.2, dry mass 0.346837 kg, carbon content, non-fossil 0.194039, wet mass 1000 kg
  note on carbon content, non-fossil: 0.0673 kg TOC/m3 (Tab A.17, ecoinvent v2.2 report 13_I). TOC was considered as Total Carbon.
- ferrosilicon: 0 kg; pedigree (1,1,1,1,1)
  primary data from DLR / IMA study
  properties: wet mass 1 kg, dry mass 1 kg
- electricity, low voltage: 0 kWh; pedigree (1,1,1,1,1)
  primary data from DLR / IMA study
- coal gas: 0 MJ; pedigree (1,1,1,1,1)
  primary data from DLR / IMA study
  properties: wet mass 0.0294737 kg, dry mass 0.0294737 kg, carbon content, fossil 0.28818
- dolomite: 0 kg; pedigree (1,1,1,1,1)
  primary data from DLR / IMA study
  properties: wet mass 1 kg, dry mass 1 kg, carbon content, fossil 0.130435
- tap water: 0 kg; pedigree (1,1,1,1,1)
  primary data from DLR / IMA study
  properties: carbon content, fossil 0.00178991, dry mass 0.000337476 kg, wet mass 1 kg, water content 2962.17
  note on carbon content, fossil: Bicarbonate content is 2.93 mol/m3. CO2 content is 0.1 mol/m3 (ecoinvent v2.2 report 8, Tab 93.1).
- scrap steel: 0 kg; pedigree (1,1,1,1,1)
  scrap from retort consumption assuming retort lifetime of 60 days
  production volume 0 kg; = Ref('c49eaa3c-d91a-4d46-b4d3-74fc5c393a79', 'ProductionVolume') * (Ref('9181ba57-7204-450d-98eb-e1e83a7de863') / Ref('c49eaa3c-d91a-4d46-b4d3-74fc5c393a79'))
    Calculated from production volume of reference product using the relative outputs.
  properties: wet mass 1 kg, dry mass 1 kg
- sulfur: 0 kg; pedigree (1,1,1,1,1)
  primary data from DLR / IMA study; needed as protection agent
  properties: dry mass 1 kg, wet mass 1 kg
- drawing of pipe, steel: 0 kg; pedigree (1,1,1,1,1)
  primary data from DLR / IMA study; retort production
- sodium chloride, powder: 0 kg; pedigree (1,1,1,1,1)
  primary data from DLR / IMA study; needed for refining
  properties: dry mass 1 kg, wet mass 1 kg
- steel, unalloyed: 0 kg; pedigree (1,1,1,1,1)
  primary data from DLR / IMA study; retort production
  properties: carbon content, fossil 0.0025, dry mass 1 kg, wet mass 1 kg
- calcium chloride: 0 kg; pedigree (1,1,1,1,1)
  primary data from DLR / IMA study; needed for refining
  properties: dry mass 1 kg, wet mass 1 kg
- nickel, 99.5%: 0 kg; pedigree (1,1,1,1,1)
  primary data from DLR / IMA study; retort production
  properties: wet mass 1 kg, dry mass 1 kg
- hard coal: 22.7376 kg; lognormal variance with pedigree 0.0032, pedigree (2,1,3,1,1)
  primary data from DLR / IMA study
  properties: water content 0.0638298, wet mass 1 kg, carbon content, fossil 0.845, dry mass 0.94 kg
  note on carbon content, fossil: C content 75-94% (specified in Tab 1.1, report 6, part VI). A mean content of 0.845 kg C/ kg dry hard coal was considered
- chromium: 0 kg; pedigree (1,1,1,1,1)
  primary data from DLR / IMA study; retort production
  properties: dry mass 1 kg, wet mass 1 kg
- sludge, pig iron production: 0 kg; pedigree (1,1,1,1,1)
  this type of waste is a proxy for the slag from the Pidgeon process which composition and final treatment is unknown
  production volume 0 kg; = Ref('c49eaa3c-d91a-4d46-b4d3-74fc5c393a79', 'ProductionVolume') * (Ref('261e23f2-a458-476e-9ed6-54441c0d41b7') / Ref('c49eaa3c-d91a-4d46-b4d3-74fc5c393a79'))
    Calculated from production volume of reference product using the relative outputs.
  properties: water content 0.0940919, wet mass 1 kg, dry mass 0.914 kg, carbon content, fossil 0.339168
- coal gas: -162.194 MJ
  EcoSpold01Location=GLO
  production volume 3.04816e12 MJ
- phosphoric acid, fertiliser grade, without water, in 70% solution state: 0.00540646 kg; lognormal variance with pedigree 0.34, pedigree (1,1,5,1,1)
  own assumption
  EcoSpold01Location=GLO
- sodium hydroxide, without water, in 50% solution state: 0.0755423 kg; lognormal variance with pedigree 0.34, pedigree (1,1,5,1,1)
  EcoSpold01Location=RER
  own assumption
- coal tar: -1.18498 kg
  EcoSpold01Location=GLO
  production volume 2.13665e10 kg
- iron sulfate: 0.00270323 kg; lognormal variance with pedigree 0.34, pedigree (1,1,5,1,1)
  EcoSpold01Location=RER
  own assumption
- hard coal coke factory: 6.29519e-10 unit; lognormal variance with pedigree 0.08, pedigree (1,1,5,1,1)
  own assumption
  EcoSpold01Location=RER
- hard coal: 5.33989, 3.27856, 3.21277, 0.762368, 4.78987, 2.50143, 1.39424, 7.08542 kg (8 entries); lognormal variance with pedigree 0.04, pedigree (1,1,5,1,1)
  EcoSpold01Location=UCTE
  standard for ressources
- electricity, medium voltage: 0.000802237, 0.00599455, 0.0194783, 0.00110353, 0.00693377, 0.00299143, 0.00272425, 0.00483242, 0.00281234, 0.000676292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 kWh (46 entries); lognormal variance with pedigree 0.34, pedigree (1,1,5,1,1)
  own assumption
  EcoSpold01Location=UCTE
- water, decarbonised: 1.03787, 2.70055, 0.00168886, 10.8919, 0.536193, 1.76311, 0.0973339, 1.38699, 3.23086, 20.2663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 kg (12 entries); lognormal variance with pedigree 0.34, pedigree (1,1,5,1,1)
  own assumption
  EcoSpold01Location=RER

## Emissions to nature
- Nitrogen oxides [air, unspecified]: 0 kg; pedigree (1,1,1,1,1)
  average emissions according to data from Chinese data survey ( as published in Gao, F., Z. Nie, Z. Wang, X. Gong and T. Zuo (2009). "Life cycle assessment of primary magnesium production using the Pidgeon process in China." The International Journal of Life Cycle Assessment 14(5): 480-489.)
- Water [air, unspecified]: 0.0229589 m3; lognormal variance with pedigree 0.2106, pedigree (5,5,5,5,5)
  estimation for water balance
- Carbon monoxide, fossil [air, unspecified]: 0 kg; pedigree (1,1,1,1,1)
  Weighted average emissions according to fuel consumption at Chinese production sites (primary data from DLR / IMA study)
- Methane, fossil [air, unspecified]: 0 kg; pedigree (1,1,1,1,1)
  (same comment as for Carbon monoxide, fossil)
- Carbon dioxide, fossil [air, unspecified]: 0 kg; pedigree (1,1,1,1,1)
  (same comment as for Carbon monoxide, fossil)
- Hydrocarbons, aliphatic, alkanes, unspecified [air, unspecified]: 0 kg; pedigree (1,1,1,1,1)
  (same comment as for Carbon monoxide, fossil)
- Sulfur dioxide [air, unspecified]: 0 kg; pedigree (1,1,1,1,1)
  weighted average emissions according to fuel consumption at Chinese production sites (primary data from DLR / IMA study);
  There is no information available on the H2S and SO2 content of coke oven, semi coke oven and producer gas. As all three are based on coal as raw material, it is likely that these gases contain at least a certain amount of SO2.. The typical sulphur content of Chinese coal is 1.05 %. Assuming that the sulphur is oxidised and remains in the fuel gas, this would lead to a SO2 content of 0.017 kg per kg coal consumed for fuel production. In case of producer gas, this leads to a SO2 content of 0.2 vol-%, as 0.3 kg coal is needed to produce 1 m³ of producer gas. For coke oven gas, the SO2 content based on a coal consumption of 0.77 kg per m³ gas would be 0.4 vol-%. Semi coke oven gas might be in the same range, but there is not enough information on its production to give an estimation of its SO2 content. As most of the primary magnesium producers have installed desulphurisation units, the emissions of SO2 are lower in these plants.
  The production of reduction retorts is included in this module.
- Particulates, < 2.5 um [air, unspecified]: 0 kg; pedigree (1,1,1,1,1)
  (same comment as for Nitrogen oxides)
- Ethane [air, unspecified]: 0 kg; pedigree (1,1,1,1,1)
  (same comment as for Carbon monoxide, fossil)
- Carbon disulfide [air, non-urban air or from high stacks]: 3.45865e-5 kg; lognormal variance with pedigree 0.05, pedigree (1,1,5,1,1)
  own assumption
- Water [water, unspecified]: 0.0362899 m3; lognormal variance with pedigree 0.0807, pedigree (2,2,5,1,1)
  Calculated value based on literature values and expert opinion. See comments in the parametres' comment field.
- Arsenic [air, non-urban air or from high stacks]: 7.29501e-7 kg; lognormal variance with pedigree 0.08, pedigree (1,1,5,1,1)
  own assumption
- Silver [air, non-urban air or from high stacks]: 4.81397e-9 kg; lognormal variance with pedigree 0.69, pedigree (1,1,5,1,1)
  own assumption
- Cyanide [air, non-urban air or from high stacks]: 0.00012146 kg; lognormal variance with pedigree 0.69, pedigree (1,1,5,1,1)
  own assumption
- Methane, chlorodifluoro-, HCFC-22 [air, non-urban air or from high stacks]: 0.00012109 kg; lognormal variance with pedigree 0.34, pedigree (1,1,5,1,1)
  own assumption
- Benzene [air, non-urban air or from high stacks]: 0.039993 kg; lognormal variance with pedigree 1.37, pedigree (1,1,5,1,1)
  own assumption
- Ethanol [air, non-urban air or from high stacks]: 1.5812e-6 kg; lognormal variance with pedigree 0.69, pedigree (1,1,5,1,1)
  own assumption
- Cadmium [air, non-urban air or from high stacks]: 1.09981e-8 kg; lognormal variance with pedigree 0.08, pedigree (1,1,5,1,1)
  own assumption
- Cobalt [air, non-urban air or from high stacks]: 1.00723e-7 kg; lognormal variance with pedigree 0.69, pedigree (1,1,5,1,1)
  own assumption
- Toluene [air, non-urban air or from high stacks]: 0.000125533 kg; lognormal variance with pedigree 0.69, pedigree (1,1,5,1,1)
  own assumption
- Chromium [air, non-urban air or from high stacks]: 3.5142e-7 kg; lognormal variance with pedigree 0.69, pedigree (1,1,5,1,1)
  own assumption
- Propane [air, non-urban air or from high stacks]: 0.000105907 kg; lognormal variance with pedigree 0.69, pedigree (1,1,5,1,1)
  own assumption
- Carbon monoxide, fossil [air, non-urban air or from high stacks]: 0.629519 kg; lognormal variance with pedigree 0.34, pedigree (1,1,5,1,1)
  own assumption
- Acetone [air, non-urban air or from high stacks]: 0.00156639 kg; lognormal variance with pedigree 0.34, pedigree (1,1,5,1,1)
  own assumption
- NMVOC, non-methane volatile organic compounds, unspecified origin [air, non-urban air or from high stacks]: 0.388821 kg; lognormal variance with pedigree 0.69, pedigree (1,1,5,1,1)
  own assumption
- PAH, polycyclic aromatic hydrocarbons [water, surface water]: 8.10968e-7 kg; lognormal variance with pedigree 0.34, pedigree (1,1,5,1,1)
  own assumption
- Carbon dioxide, fossil [air, non-urban air or from high stacks]: 5.92488 kg; lognormal variance with pedigree 0.05, pedigree (1,1,5,1,1)
  own assumption
- Sodium, ion [water, surface water]: 0.0338089 kg; lognormal variance with pedigree 0.34, pedigree (1,1,5,1,1)
  own assumption
- Phenol, pentachloro- [air, non-urban air or from high stacks]: 0.000127385 kg; lognormal variance with pedigree 0.34, pedigree (1,1,5,1,1)
  own assumption
- Ammonium, ion [water, surface water]: 0.000673956 kg; lognormal variance with pedigree 0.34, pedigree (1,1,5,1,1)
  own assumption
- Particulates, > 10 um [air, non-urban air or from high stacks]: 0.154047 kg; lognormal variance with pedigree 0.34, pedigree (1,1,5,1,1)
  own assumption
- Copper [air, non-urban air or from high stacks]: 4.3696e-7 kg; lognormal variance with pedigree 0.69, pedigree (1,1,5,1,1)
  own assumption
- Zinc [air, non-urban air or from high stacks]: 2.22924e-6 kg; lognormal variance with pedigree 0.69, pedigree (1,1,5,1,1)
  own assumption
- Particulates, > 2.5 um, and < 10um [air, non-urban air or from high stacks]: 0.0418445 kg; lognormal variance with pedigree 0.34, pedigree (1,1,5,1,1)
  own assumption
- Thallium [air, non-urban air or from high stacks]: 5.62864e-8 kg; lognormal variance with pedigree 0.69, pedigree (1,1,5,1,1)
  own assumption
- Hydrogen sulfide [water, surface water]: 0.000108129 kg; lognormal variance with pedigree 0.34, pedigree (1,1,5,1,1)
  own assumption
- Manganese [air, non-urban air or from high stacks]: 6.11004e-7 kg; lognormal variance with pedigree 0.69, pedigree (1,1,5,1,1)
  own assumption
- Ammonia [air, non-urban air or from high stacks]: 0.000226997 kg; lognormal variance with pedigree 1.37, pedigree (1,1,5,1,1)
  own assumption
- Chloride [water, surface water]: 0.0525833 kg; lognormal variance with pedigree 0.34, pedigree (1,1,5,1,1)
  own assumption
- Beryllium [air, non-urban air or from high stacks]: 1.3294e-8 kg; lognormal variance with pedigree 0.69, pedigree (1,1,5,1,1)
  own assumption
- Mercury [air, non-urban air or from high stacks]: 1.3331e-8 kg; lognormal variance with pedigree 0.34, pedigree (1,1,5,1,1)
  own assumption
- Barium [air, non-urban air or from high stacks]: 8.29484e-7 kg; lognormal variance with pedigree 0.69, pedigree (1,1,5,1,1)
  own assumption
- Ethane [air, non-urban air or from high stacks]: 0.0105907 kg; lognormal variance with pedigree 0.69, pedigree (1,1,5,1,1)
  own assumption
- Particulates, < 2.5 um [air, non-urban air or from high stacks]: 0.0914654 kg; lognormal variance with pedigree 0.34, pedigree (1,1,5,1,1)
  own assumption
- Solids, inorganic [water, surface water]: 0.0297355 kg; lognormal variance with pedigree 0.34, pedigree (1,1,5,1,1)
  own assumption
- Nitrogen oxides [air, non-urban air or from high stacks]: 0.0313649 kg; lognormal variance with pedigree 0.34, pedigree (1,1,5,1,1)
  own assumption
- Antimony [air, non-urban air or from high stacks]: 2.66249e-8 kg; lognormal variance with pedigree 0.69, pedigree (1,1,5,1,1)
  own assumption
- Styrene [air, non-urban air or from high stacks]: 1.62194e-6 kg; lognormal variance with pedigree 0.69, pedigree (1,1,5,1,1)
  own assumption
- Lead [air, non-urban air or from high stacks]: 1.12202e-6 kg; lognormal variance with pedigree 0.08, pedigree (1,1,5,1,1)
  own assumption
- Sulfur dioxide [air, non-urban air or from high stacks]: 0.0599895 kg; lognormal variance with pedigree 0.34, pedigree (1,1,5,1,1)
  own assumption
- Selenium [air, non-urban air or from high stacks]: 2.43291e-7 kg; lognormal variance with pedigree 0.69, pedigree (1,1,5,1,1)
  own assumption
- Acrolein [air, non-urban air or from high stacks]: 1.93299e-6 kg; lognormal variance with pedigree 0.34, pedigree (1,1,5,1,1)
  own assumption
- Benzo(a)pyrene [air, non-urban air or from high stacks]: 0.000289208 kg; lognormal variance with pedigree 0.08, pedigree (1,1,5,1,1)
  own assumption
- Methane, fossil [air, non-urban air or from high stacks]: 0.0973903 kg; lognormal variance with pedigree 1.37, pedigree (1,1,5,1,1)
  own assumption
- Methanol [air, non-urban air or from high stacks]: 0.00015812 kg; lognormal variance with pedigree 0.69, pedigree (1,1,5,1,1)
  own assumption
- PAH, polycyclic aromatic hydrocarbons [air, non-urban air or from high stacks]: 8.47999e-5 kg; lognormal variance with pedigree 0.69, pedigree (1,1,5,1,1)
  own assumption
- Nickel [air, non-urban air or from high stacks]: 7.92453e-7 kg; lognormal variance with pedigree 0.69, pedigree (1,1,5,1,1)
  own assumption
- Phosphorus [air, non-urban air or from high stacks]: 1.7034e-6 kg; lognormal variance with pedigree 0.69, pedigree (1,1,5,1,1)
  own assumption

## Review by Hans-Jörg Althaus 2014-02-04
ok
