# calcium nitrate production

Dataset: EcoSpold 2, unit process
Geography: RER
Time period: 2010-01-01 to 2019-12-31
Technology level: current
Classification: EcoSpold01Categories: agricultural means of production/mineral fertiliser
Classification: ISIC rev.4 ecoinvent: 2012:Manufacture of fertilizers and nitrogen compounds
Synonyms: Norge saltpeter
Scenario: Business-as-Usual
System model: Allocation at the point of substitution
Generated by: Sofia Parada Tur
Published in: INFOMINE Research Group 2011
Database: ecoinvent
isCopyrightProtected: true
accessRestrictedTo: 1

## General comment
Refers to 1 kg calcium nitrate with a N-content of 11.86%. The yield of the reaction of limestone and nitric acid is 98.1%. Non-reacting nitric acid and ammonia are considered to be recycled or re-used internally and not being liberated to the environment. This is due to the toxicity of reactants.

## Included activities start
From reception of limestone, nitric acid and ammonia at the factory gate.

## Included activities end
The unit process inventory describes the production of calcium nitrate tetrahydrate.

## Geography
The process described here is the generic method used for the production of calcium nitrate from limestone and nitric acid.

## Technology
Limestone (CaCO3) is usually neutralized in towers of circulating 40-48% nitric acid (HNO3). Acid solutions of calcium nitrate are fed again to the tower until the residual acidity of the solution decreases to 1,5-1,9% of HNO3. Then the free nitric acid is further neutralized with ammonia. Following the application of ammonia, some amount of ammonium nitrate forms, faciliating the crystallization of Ca(NO3)2 from a melt. The filtered solution containing ca. 49% of Ca(NO3)2 and 3% of NH4NO3 is evaporated under vacuum to 75-82% of Ca(NO3)2. This production method is used by most manufacturers of calcium nitrate in the Commonwealth of Independent States (CIS).
The reaction involved is:

## Parameters
- fraction of cooling water which evaporates to air, once-through cooling system: 0.004; name fraction_CW_OT_to_air; lognormal variance with pedigree 0.092025, pedigree (4,4,3,2,4)
  Calculated based on literature value (Scown, C.D., 2011, Water Footprint of U.S. Transportation Fuels and supplying information of the article) (Vionnet, S., Quantis Water Database - Technical Report, 2012).
- efficiency: 0.981 dimensionless; name efficiency_reaction; = (100-1.9)/100; lognormal variance with pedigree 0.0412, pedigree (2,1,1,1,4)
  output relative to input. Calculated based on technology description. Of the input HNO3, 1.9% will not be reacted.
- fraction of cooling water which evaporates to air: 0.3875; name fraction_CW_to_air; = (0.5*fraction_CW_OT_to_air)+(0.5*fraction_CW_R_to_air); lognormal variance with pedigree 0.092025, pedigree (4,4,3,2,4)
  Calculated value based on literature value (see comments of the other parametres present in this dataset) and expert opinion. In the case when no industry/literature data are available about the type of cooling or directly fraction, cooling water, to air specific for the process a default assumption is applied. It is assumed that the once-through cooling system is used in 50% of all cases and recirculating system is used in another 50% of all cases. Fraction of cooling water which evaporates to air, i.e. is consumed.
- fraction of cooling water which evaporates to air, recirculating cooling system: 0.771; name fraction_CW_R_to_air; lognormal variance with pedigree 0.092025, pedigree (4,4,3,2,4)
  (same comment as for fraction of cooling water which evaporates to air, once-through coolin)

## Reference product
- calcium nitrate: 1 kg; name calcium_nitrate; CPC 34240: Phosphates of triammonium; salts and peroxysalts of inorganic acids and metals n.e.c.; By-product classification allocatable product
  production volume 6.51892e9 kg; = 7751*1000*1000/0.1189*0.10
    Estimation.
    Ammonium nitrate is produced in the second step of calcium nitrate production from nitric acid. Th reaction of nitric acid and ammonia is in fact the main production route for ammonium nitrate. Therefore it is estimated that both production volumes are linked. Here, we assume the same Production Volumes for both, since no data is availble for calcium nitrate. Moreover, the main production route for calcium nitrate is as a byproduct in the Odda-Process, therefore, the production of calcium nitrate by the present reaction is assumed to be 10% of the total production.
    Note: ammonium nitrate European production in 2012 is taken from IFA production and trade statistics http://www.fertilizer.org/ifa/Home-Page/STATISTICS/Production-and-trade
    The original production volume is expressed as thousands metric tonne nutrient. The N-content is 0.1189
  property price 0.473 EUR2005; name calcium_nitrate_price_EUR2005
    Temporary price data. Calculated as 90% of purchasers price based on: 2004 prices are calculated on basis of Import/Export data (tonnes and US$) from UN Trade Statistics Database (http://data.un.org/Browse.aspx?d=ComTrade, accessed 7/7-2010). N, P2O5, or K2O content (http://www.fertilizer.org/ifa/Home-Page/STATISTICS/Conversions-factors)
  property carbon content, fossil 0; name C_content_fossil
    fossil carbon content on a dry matter basis
  property carbon content, non-fossil 0; name C_content_non_fossil
    biogene carbon content on a dry matter basis
  property dry mass 1 kg; name DM
  property wet mass 1 kg; name WM
  property water content 0; name water_content
  property water in wet mass 0 kg; name WWM
  property carbon content 0
    carbon content on a dry matter basis (reserved; not for manual entry)
  property true value 0.473; name calcium_nitrate_true_value
    allocation property applied in "true value" allocation // value calculated from revenue
  properties: carbon allocation 0 kg

## By-products
- ammonium nitrate, as N: 0 kg; = ((1- efficiency_reaction)*nitric_acid)*80.04/63.01*0.349978014; CPC 34613: Ammonium nitrate; By-product classification allocatable product; pedigree (1,1,1,1,1)
  stoichiometric calculation. Molar weight.
  The produced ammonium nitrate is calculated based on the non-reacted nitric acid.
  This flow is measured as kg of N. (N content in ammonium nitrate 0.3499)
  production volume 4.31036e7 kg; = Ref('8c69f6ba-8d43-471c-bb80-9f8ccaca4af3', 'ProductionVolume') * (Ref('643cd4ea-a142-4802-bd36-fa2c31fd97e8') / Ref('8c69f6ba-8d43-471c-bb80-9f8ccaca4af3'))
    Calculated from production volume of reference product using the relative outputs.
  property price 0.41 EUR2005
    Prices are calculated on basis of Import/Export data (tonnes and US$) from UN Trade Statistics Database (http://data.un.org/Browse.aspx?d=ComTrade, accessed 7/7-2010). N, P2O5, or K2O content (http://www.fertilizer.org/ifa/Home-Page/STATISTICS/Conversions-factors)
  property carbon content 0
    carbon content on a dry matter basis (reserved; not for manual entry)
  property true value 0.00271095
    allocation property applied in "true value" allocation // value calculated from revenue
  properties: carbon content, fossil 0, dry mass 1 kg, water in wet mass 0 kg, wet mass 1 kg, water content 0, carbon content, non-fossil 0, carbon allocation 0 kg

## Inputs from technosphere
- limestone, unprocessed: 0.618217 kg; = calcium_nitrate*(100.08/164.08)/ efficiency_reaction; lognormal variance with pedigree 0.0572, pedigree (2,5,4,1,4)
  stoichiometric calculation. Molar weight.
  properties: water content 0.00200401, dry mass 0.998 kg, wet mass 1 kg, carbon content, fossil 0.117257
- ammonia, liquid: 0.00399689 kg; = ((1- efficiency_reaction)*nitric_acid)*17.03/63.01; lognormal variance with pedigree 0.0572, pedigree (2,5,4,1,4)
  Stoichiometric calculation. Molar weight.
  The citric acid that does not react with limestone is 1.9% (refer to parameter efficiency). This is further neutralized with ammonia.
  properties: wet mass 1 kg, dry mass 1 kg
- heat, from steam, in chemical industry: 3.18176 MJ; source Gendorf 2000; lognormal variance with pedigree 0.1306, pedigree (2,5,5,5,4)
  Estimation. These values were approximated with data from an large chemical plant site in Germany producing 2.05 Mt a-1 (intermediates included) of different chemicals. The values for the energy consumption per kg of product of this plant (3.2 MJ kg-1) were used as approximation for the energy consumption of the calcium nitrate production.
- chemical factory, organics: 1.28265e-9 unit; source Gendorf 2000; lognormal variance with pedigree 0.448, pedigree (4,5,5,5,5)
  Estimation. The infrastructure is estimated based on the module "chemical plant, organics". This module assumes a built area of about 4.2 ha, an average output of 50'000 t/a, and plant life of fifty years.
  Uncertainty: Estimation
- nitric acid, without water, in 50% solution state: 0.77833 kg; name nitric_acid; = calcium_nitrate*(2*63/164.08)/ efficiency_reaction; lognormal variance with pedigree 0.0572, pedigree (2,5,4,1,4)
  stoichiometric calculation. Molar weight.
  properties: wet mass 1 kg, dry mass 1 kg

## Inputs from nature
- Water, cooling, unspecified natural origin [natural resource, in water]: 0.0238632 m3; name water_cooling_UNO_input; = 0.024*calcium_nitrate; source Gendorf 2000; lognormal variance with pedigree 0.1786, pedigree (4,5,5,5,5)
  Estimation. This value was approximated with data from an large chemical plant site in Germany producing 2.05 Mt a-1 (intermediates included) of different chemicals.
  Uncertainty: Estimation

## Emissions to nature
- Water [water, unspecified]: 0.0146162 m3; name water_to_water_unspecified; = water_cooling_UNO_input*(1-fraction_CW_to_air); lognormal variance with pedigree 0.0487, pedigree (2,2,4,1,1)
  Calculated value based on literature values and expert opinion. See comments in the parametres' comment field.
- Water [air, unspecified]: 0.009247 m3; name water_to_air_unspecified; = water_cooling_UNO_input*fraction_CW_to_air; lognormal variance with pedigree 0.0487, pedigree (2,2,4,1,1)
  (same comment as for Water)
- Carbon dioxide, fossil [air, unspecified]: 0.266634 kg; = calcium_nitrate*44/164.08; lognormal variance with pedigree 0.0572, pedigree (2,5,4,1,4)
  stoichiometric calculation. Molar weight.

## Sampling procedure
Literature sources and principles of chemical engineering.
