# ethanol production from sugar beet

Dataset: EcoSpold 2, unit process
Geography: CH
Time period: 2000-01-01 to 2019-12-31
Technology level: current
Classification: EcoSpold01Categories: biomass/fuels
Classification: ISIC rev.4 ecoinvent: 19a: Liquid and gaseous fuels from biomass
Tags: ConvertedDataset
Scenario: Business-as-Usual
System model: Allocation at the point of substitution
Share of production covered: 12 %
Generated by: Jürgen Sutter
Published in: Jungbluth N. 2007
Database: ecoinvent
isCopyrightProtected: true
accessRestrictedTo: 1

## General comment
The multioutput-process 'sugar beets, to fermentation' delivers the co-products Ethanol, 95% in H20, from sugar beets', 'beets chips', and vinasse. The allocation is based on economic criteria. World production of ethanol from sugar beets is around 10 Mio hl per year.
[This dataset was already contained in the ecoinvent database version 2. It was not individually updated during the transfer to ecoinvent version 3. Life Cycle Impact Assessment results may still have changed, as they are affected by changes in the supply chain, i.e. in other datasets. This dataset was generated following the ecoinvent quality guidelines for version 2. It may have been subject to central changes described in the ecoinvent version 3 change report (http://www.ecoinvent.org/database/ecoinvent-version-3/reports-of-changes/), and the results of the central updates were reviewed extensively. The changes added e.g. consistent water flows and other information throughout the database. The documentation of this dataset can be found in the ecoinvent reports of version 2, which are still available via the ecoinvent website. The change report linked above covers all central changes that were made during the conversion process.]

## Included activities end
Fermentation of sugar beets including materials, energy uses, infrastructure, and emissions.

## Geography
The inventory is modelled with data from a plant in Finland.

## Technology
Production of ethanol from sugar beets with extraction, fermentation, and distillation of ethanol.

## Time period
Time of publications.

## Parameters
- fraction, cooling water, recirculating system, to air: 0.771; name fraction_CW_R_to_air; lognormal variance with pedigree 0.0413, pedigree (2,3,1,3,1)
  Calculated based on literature value (Scown, C.D., 2011, Water Footprint of U.S. Transportation Fuels and supplying information of the article) (Vionnet, S., Quantis Water Database - Technical Report, 2012).
- fraction, cooling water, to air: 0.64; name fraction_CW_to_air; lognormal variance with pedigree 0.092025, pedigree (4,4,3,2,4)
  Calculated value based on literature value (Schonoor, 2008) (Vionnet, S., Quantis Water Database - Technical Report, 2012).
- fraction, cooling water, cooling pond system, to air: 0.032; name fraction_CW_CP_to_air; lognormal variance with pedigree 0.0413, pedigree (2,3,1,3,1)
  (same comment as for fraction, cooling water, recirculating system, to air)
- fraction, tap water, to air: 0; name fraction_TW_to_air; = fraction_PW_to_air
  Calculated value. See comment in the other parametres present in this dataset. Tap water is considered to be always used as process water, thus process water fractions to air are applied to all tap water input flows to calculate the amount of water consumed in the processes.
- fraction, process water, to air: 0 dimensionless; name fraction_PW_to_air
  Estimated value, expert opinion (Vionnet, S., Quantis Water Database - Technical Report, 2012).
- fraction, cooling water, once-through system, to air: 0.004; name fraction_CW_OT_to_air; lognormal variance with pedigree 0.0413, pedigree (2,3,1,3,1)
  (same comment as for fraction, cooling water, recirculating system, to air)

## Reference product
- vinasse, from fermentation of sugar beet: 1 kg; CPC 39149: Beet-pulp and other waste of sugar manufacture; By-product classification Recyclable
  production volume 0 kg
    The world production of ethanol from sugar beets is around 10 Mio hl per year.
    Calculated from the production volume of ethanol, without water, in 95% solution state, from fermentation in proportion to the respective output amounts.
  property price 0.012 EUR2005
    Temporary price data. Calculated as 90% of purchasers price based on: Calculated as 1/10 of the price of sugar beet pulp based on the difference in dry matter content
  property carbon content, non-fossil 0.12867
    The carbon content of the vinasse (2.5 % dry matter) was calculated as 0.12867 kg per dry matter (ecoinvent v2.2 report n 17, pg 281)
  property carbon content 0.12867
    carbon content on a dry matter basis (reserved; not for manual entry)
  property true value 0.00743724
    allocation property applied in "true value" allocation // value calculated from revenue
  properties: dry mass 0.025 kg, water in wet mass 0.975 kg, carbon content, fossil 0, wet mass 1 kg, water content 39, carbon allocation 0.00321675 kg
- ethanol, without water, in 95% solution state, from fermentation: 0 kg; CPC 35491: Biodiesel; By-product classification allocatable product; CAS 64-17-5
  production volume 0 kg
    The world production of ethanol from sugar beets is around 10 Mio hl per year.
    No production in Switzerland. Source: http://www.biofuels-platform.ch/en/infos/eu-bioethanol.php
  property price 0.324 EUR2005
    Temporary price data. Calculated as 90% of purchasers price based on: 2005 prices from FAPRI2007, 2009. Agricultural outlook. (http://www.fapri.missouri.edu/outreach/publications/ag_outlook.asp?current_page=outreach; accessed 22/06/10). Unit conversion from US gallon to kg - 1 gallon = 3.7856 liter * 0.789 kg/liter (ethanol density) = 2.9868 kg
  property carbon content 0.521739
    carbon content on a dry matter basis (reserved; not for manual entry)
  property true value 0.0281005
    allocation property applied in "true value" allocation // value calculated from revenue
  properties: dry mass 1 kg, water content 0, carbon content, non-fossil 0.521739, carbon content, fossil 0, wet mass 1 kg, water in wet mass 0 kg, carbon allocation 0.521739 kg

## By-products
- protein feed, 100% crude: 0 kg; source Agroscope 2011; By-product classification allocatable product; CPC 23319: Preparations used in animal feeding n.e.c.; pedigree (1,1,1,1,1)
  Calculated based on crude protein content of sugar beet pulp (0.09kg/kg dry mass). The dry mass of the reference product is 0.25kg/kg.
  property price 0.424 EUR2005; name protein_output_price_EUR2005
    Based on protein content and energy feed, gross content in soybean meal and prices per kg of soybean meal. Assumed soybean meal is the most used feed. Soybean meal 2004 prices for World import/export data (tonnes and US$) from FaoStat statistics (http://faostat.fao.org/site/535/default.aspx#ancor, TRADE)- [Accessed 24 May 2010]. See calculations for protein /energy content
  property carbon content, non-fossil 0.53
    considered pure protein (ecoinvent v2.2 report 17, pg 288). C-content in protein is estimated to be 53% ( from "Evolutionary and Biochemical Aspects", A.D. Kay and T. Vrede (in Global Ecology, 2010, Elsevier B.V., S.E. Jørgensen Ed.).
  property carbon content 0.53
    carbon content on a dry matter basis (reserved; not for manual entry)
  property true value 0.0015555
    allocation property applied in "true value" allocation // value calculated from revenue
  properties: wet mass 1 kg, water content 0, water in wet mass 0 kg, carbon content, fossil 0, dry mass 1 kg, carbon allocation 0.53 kg
- energy feed, gross: 0 MJ; source Agroscope 2011; CPC 23319: Preparations used in animal feeding n.e.c.; By-product classification allocatable product; pedigree (1,1,1,1,1)
  Calculated based on gross energy of sugar beet pulp (16.92MJ/kg dry mass). The dry mass of the reference product is 0.25kg/kg.
  property price 0.0108 EUR2005; name gross_enery_output_1_price_EUR2005
    Based on energy feed, gross content in soybean meal and prices per kg of soybean meal. Assumed soybean meal is the most used feed. Soybean meal 2004 prices for World import/export data (tonnes and US$) from FaoStat statistics (http://faostat.fao.org/site/535/default.aspx#ancor, TRADE)- [Accessed 24 May 2010]. See calculations for protein /energy content
  property carbon content 0
    carbon content on a dry matter basis (reserved; not for manual entry)
  property true value 0.00744878
    allocation property applied in "true value" allocation // value calculated from revenue
  properties: water content 0, wet mass 1 kg, carbon content, fossil 0, water in wet mass 0 kg, dry mass 1 kg, carbon content, non-fossil 0, carbon allocation 0 kg

## Inputs from technosphere
- heat, central or small-scale, other than natural gas: 0.0161645 MJ; lognormal variance with pedigree 0.04, pedigree (1,1,5,1,1)
  Kaltschmidt 1997
  Kaltschmidt 1997
- heat, district or industrial, natural gas: 0.0887189 MJ; lognormal variance with pedigree 0.0406, pedigree (1,3,5,1,1)
  Eners 2005
  Eners 2005
- ethanol fermentation plant: 1.19617e-11 unit; lognormal variance with pedigree 0.3626, pedigree (2,4,5,5,3)
  Estimation
  This exchange has an activity link directly to the producing activity because the product is primarily consumed in the same geographical area where it is produced.
- sodium phosphate: 0.000161109 kg; lognormal variance with pedigree 0.0406, pedigree (1,3,5,1,1)
  Eners 2005
  Eners 2005
  properties: dry mass 1 kg, wet mass 1 kg
- sodium sulfate, anhydrite: 0.000107413 kg; lognormal variance with pedigree 0.0406, pedigree (1,3,5,1,1)
  Eners 2005
  Eners 2005
  properties: dry mass 1 kg, wet mass 1 kg
- sugar beet: 0.269408 kg; lognormal variance with pedigree 0.0406, pedigree (1,3,5,1,1)
  Eners 2005
  Eners 2005
  properties: carbon content, non-fossil 0.433043, water content 3.34783, dry mass 0.23 kg, wet mass 1 kg
  note on carbon content, non-fossil: Composition data obtained from Beets raw, in (http://www.nal.usda.gov/fnic/foodcomp/search/). First, composition data were refered to 1 kg dry mass. Then, C-contents were calculated considering a C-content/dry mass of 46% in carbohydrates (including fibres), 53% in proteins and 75% in fats. All data from 'Evolutionary and Biochemical Aspects', A.D. Kay and T. Vrede (in Global Ecology, 2010, Elsevier B.V., S.E. Jørgensen Ed.).
- sulfuric acid: 0.000806124 kg; lognormal variance with pedigree 0.0406, pedigree (1,3,5,1,1)
  Eners 2005
  Eners 2005
  properties: wet mass 1 kg, dry mass 1 kg
- tap water: 0.02568 kg; name tap_water_input; lognormal variance with pedigree 0.0406, pedigree (1,3,5,1,1)
  Eners 2005
  Eners 2005
  properties: carbon content, fossil 0.00178991, wet mass 1 kg, water content 2962.17, dry mass 0.000337476 kg
  note on carbon content, fossil: Bicarbonate content is 2.93 mol/m3. CO2 content is 0.1 mol/m3 (ecoinvent v2.2 report 8, Tab 93.1).
- sugar beet pulp: -0.043927 kg
  production volume 0 kg
    (same comment as for vinasse, from fermentation of sugar beet)
  properties: carbon content, non-fossil 0.44213, water content 3, price 0.133 EUR2005, wet mass 1 kg, dry mass 0.25 kg
  note on carbon content, non-fossil: Composition data obtained from Beet, Pulp Wet in (http://beefmagazine.com/images/2009%20feed%20table.pdf). First, composition data were refered to 1 kg dry mass. Then, C-contents were calculated considering a C-content/dry mass of 46% in carbohydrates (including fibres), 53% in proteins and 75% in fats. All data from 'Evolutionary and Biochemical Aspects', A.D. Kay and T. Vrede (in Global Ecology, 2010, Elsevier B.V., S.E. Jørgensen Ed.).
- electricity, medium voltage: 0.00497705 kWh; lognormal variance with pedigree 0.0406, pedigree (1,3,5,1,1)
  Eners 2005
  Eners 2005

## Inputs from nature
- Water, cooling, unspecified natural origin [natural resource, in water]: 1.40998e-8 m3; name water_cooling_UNO_input; lognormal variance with pedigree 0.0406, pedigree (1,3,5,1,1)
  Eners 2005

## Emissions to nature
- Water [air, unspecified]: 9.02385e-9 m3; name water_to_air_unspecified; = (tap_water_input/1000*fraction_TW_to_air)+(water_cooling_UNO_input*fraction_CW_to_air); lognormal variance with pedigree 0.0807, pedigree (2,2,5,1,1)
  Calculated value based on literature values and expert opinion. See comments in the parametres' comment field.
- Carbon dioxide, non-fossil [air, urban air close to ground]: 0.0225118 kg; lognormal variance with pedigree 0.0586, pedigree (4,3,5,1,1)
  Calculated from the carbon balance
- Water [water, unspecified]: 2.56851e-5 m3; name water_to_water_unspecified; = (tap_water_input/1000)*(1-fraction_TW_to_air)+water_cooling_UNO_input*(1-fraction_CW_to_air); lognormal variance with pedigree 0.0807, pedigree (2,2,5,1,1)
  (same comment as for Water)
  property wet mass 1000 kg; name WM
  property carbon content, fossil 0; name C_content_fossil
  property dry mass 0 kg; name DM
  property carbon content, non-fossil 0; name C_content_non_fossil
  property water in wet mass 1000 kg; name WWM

## Sampling procedure
Literature data

## Extrapolations
Some data are derived from other or unknown plants or have been estimated.

## Review by Niels Jungbluth 2006-05-05
Passed.

## Review by Emilia Moreno Ruiz 2014-05-08
Activity Link added to input of sugar beets
