# electricity production, natural gas, combined cycle power plant

Dataset: EcoSpold 2, unit process
Geography: BR-South-eastern grid
Time period: 2014-01-01 to 2019-12-31
Technology level: current
Classification: EcoSpold01Categories: natural gas/power plants
Classification: ISIC rev.4 ecoinvent: 3510:Electric power generation, transmission and distribution
Tags: natural gas power; fossil fuels
Scenario: Business-as-Usual
System model: Allocation at the point of substitution
Generated by: Henrique Rogerio Antunes de Souza Junior
Published in: Faist Emmenegger, M. 2007
Database: ecoinvent
isCopyrightProtected: true
accessRestrictedTo: 1

## General comment
This dataset represents the production of high voltage electricity in a combined cycle natural gas power plant Brazil-South-eastern in 2014.
Comments on the inventory:
Information about electricity production was obtained in Capacidade Instalada de Geração Elétrica Brasil e Mundo (2014): Ano Referência 2014 and Matrizes Elétricas Estaduais: Ano Referência 2015.
Information about emissions was obtained in COELHO, S. O. (2014).
MME (2015). Capacidade Instalada de Geração Elétrica Brasil e Mundo (2014): Ano Referência 2014. Edição de 05 de março de 2015. Ministério De Minas E Energia – MME. Secretaria De Planejamento E Desenvolvimento Energético. Núcleo De Estudos Estratégicos De Energia.
MME (2016). Matrizes Elétricas Estaduais: Ano Referência 2015. Edição de 23 de novembro de 2016. Ministério De Minas E Energia – MME. Secretaria De Planejamento E Desenvolvimento Energético. Núcleo De Estudos Estratégicos De Energia.
COELHO, S. O. (2014). Avaliação das Emissões Atmosféricas das Principais Termelétricas Brasileiras a Gás Natural – Ano Base 2013. Trabalho Final de Curso apresentado ao Colegiado do Curso de Engenharia Sanitária e Ambiental da Universidade Federal de Juiz de Fora, como requisito parcial à obtenção do título de Engenheiro Sanitarista e Ambiental. UNIVERSIDADE FEDERAL DE JUIZ DE FORA – UFJF. 2014.
The original ecoinvent dataset used as a basis was 'electricity production, natural gas, combined cycle power plant, BR, 2000 - 2015' and it has been copied in '12/2017'
[This dataset is meant to replace the following datasets:]

## Included activities start
From the constructed natural gas power plant ready to produce electricity.

From reception of natural gas and operating materials at power plant/factory gate

## Included activities end
This activity ends with 1kWh of high voltage electricity produced at the power plant and arrived at the busbar.

This dataset includes:
- all operation and maintenance activities and materials of the power plants.
- Cooling: It is a assumed that all plants use wet cooling with a cooling tower.No cooling tower is included in this dataset (will be implemented in future versions)
- decarbonised water use for reduction of NOx emissions

This dataset doesn't include
- raw materials extraction, decommissioning and waste treatment as these activities are already included in the infrastructure datasets.
- transformation of the electricity produced.

## Time period
The Annual Production Volume is valid for the year 2014.

## Parameters
- fraction, water, decarbonised, to air: 0.0159178; name fraction_WDC_to_air; = fraction_CW_to_air; lognormal variance with pedigree 0.092025, pedigree (4,4,3,2,4)
  Calculated value. See comments in the other parametres present in this dataset. Decarbonised water is considered to be always used as cooling water, thus cooling water fractions to air are applied to all carbonised water input flows to calculate the amount of water consumed in the processes.
  nan
- water withdrawal, electricity production from NG, once-T and coolingP CS: 0.098 m3/kWh; name WWithdrawal_EP_NG_onceT_andCP_CS; lognormal variance with pedigree 0.092025, pedigree (4,4,3,2,4)
  Estimated based on literature (Scown, 2011, Water Footprint of U.S. Transportation Fuels, SI).
  nan
- fraction, process water, to air: 0.15 dimensionless; name fraction_PW_to_air; lognormal variance with pedigree 0.092025, pedigree (4,4,3,2,4)
  Literature value. In case when no industry/process specific data are available, default evaporation fraction value is used. This value is 15% and is based on literature (Statistics Canada, 2007 & Shaffer, K.H., 2008, Consumptive water use in the Great Lakes Basin, USGS & Shiklomanov, 2003, World Water Resources at the Beginning of the 21st Century) and has been approved by an expert.
  nan
- water consumption, electricity production from NG, once-T and coolingP CS: 0.0005 m3/kWh; name WConsumption_EP_NG_onceT_andCP_CS; lognormal variance with pedigree 0.092025, pedigree (4,4,3,2,4)
  (same comment as for water withdrawal, electricity production from NG, once-T and coolingP )
- gross electricity production: 3.09647e10 kWh; name gross_electricity; = (166699000000*0.28)*(0.62)*(1+losses_gross_net); lognormal variance with pedigree 0.0019, pedigree (2,2,1,1,2)
  Literature value/statistics.
  The data are find in Matrizes Elétricas Estaduais: Ano Referência 2015 (page 6 - South-eastern).
  The gross electricity production are calculated by net production plus generation losses (losses from gross electricity production).
  equation: (annual production*natural gas fraction) * (combined cycle proportion) * "efficiency"
  combined cycle proportion = 62% (according Coelho (2014), this is the proportion of south-eastern electricity production by combined cycle power plants)
  COELHO, S. O. (2014). Avaliação das Emissões Atmosféricas das Principais Termelétricas Brasileiras a Gás Natural - Ano Base 2013. Trabalho Final de Curso apresentado ao Colegiado do Curso de Engenharia Sanitária e Ambiental da Universidade Federal de Juiz de Fora, como requisito parcial à obtenção do título de Engenheiro Sanitarista e Ambiental. UNIVERSIDADE FEDERAL DE JUIZ DE FORA - UFJF. 2014.
  MME (2016). Matrizes Elétricas Estaduais: Ano Referência 2015. Edição de 23 de novembro de 2016. Ministério De Minas E Energia – MME. Secretaria De Planejamento E Desenvolvimento Energético. Núcleo De Estudos Estratégicos De Energia. Available in: <http://www.mme.gov.br/documents/10584/3580498/03+-+Matrizes+El%C3%A9tricas+Estaduais+2016+-+ano+ref.+2015+%28PDF%29/ddfaad8c-a436-4aa8-b619-f95dd2cf689c?version=1.0> Access in: 12/2017.
- once-through and cooling pond cooling systems as a fraction of all cooling syste: 0.625 dimensionless; name once_through_andCP_CS_fractio_from_allCS; lognormal variance with pedigree 0.092025, pedigree (4,4,3,2,4)
  Calculated as an average of data available for Europe (Floerke, 2008, Future changes of freshwater needs in the electricity production sector) and USA (NERL, 2011, Estimating freshwater needs to meet future thermoelectric generation requirements).
  nan
- losses from gross electricity production: 0.07 dimensionless; name losses_gross_net; lognormal variance with pedigree 0.017225, pedigree (4,3,1,2,3)
  Calculated value. Own use of electricity plants in this country in 2012. For the non-OECD countries, the losses were first calculated for the total electricity sector based on the IEA electricity information 2014, table 1.1 (net electricity = gross electricity minus own use). However, this value can be very low if the share of electricity from fossiles is low in a specific country. Therefore, the default loss as described by the IEA in the electricity statistic is applied, which is 0.07 (IEA electricity information 2014: The difference between gross and net electricity production is generally observed to be about 7% for conventional thermal stations, 1% for hydro stations and 6% for nuclear.)
  IEA. 2014. Electricity Information 2014. ISBN 978-92-64-21692-1. International Energy Agency (IEA), Paris Cedex (FR).
  nan
  Uncertainty: generic IEA value used
- water consumption, electricity production from NG, recirculating CS: 0.0018 m3/kWh; name WConsumption_EP_NG_recirculatingCS; lognormal variance with pedigree 0.092025, pedigree (4,4,3,2,4)
  (same comment as for water withdrawal, electricity production from NG, once-T and coolingP )
- recirculating cooling system as a fraction of all cooling systems: 0.375 dimensionless; name recirculating_CS_fraction_from_allCS; lognormal variance with pedigree 0.092025, pedigree (4,4,3,2,4)
  (same comment as for once-through and cooling pond cooling systems as a fraction of all coo)
- fraction, water, completely softened, to air: 0.15; name fraction_WCS_to_air; = fraction_PW_to_air; lognormal variance with pedigree 0.092025, pedigree (4,4,3,2,4)
  Calculated value. See comment in the other parametres present in this dataset. Water, completely softened is considered to be always used as process water, thus process water fractions to air are applied to all water, completely softened input flows to calculate the amount of water consumed in the processes.
  nan
- factor: input of MJ for the production of 1 kWh: 6.30473 MJ/kWh; name factor_MJ_kWh; = 1*3.6/efficiency; lognormal variance with pedigree 0.0532, pedigree (4,4,3,4,4)
  Calculated value. 3.6 MJ = 1kWh.
  nan
- water withdrawal, electricity production from NG, recirculating CS: 0.0021 m3/kWh; name WWithdrawal_EP_NG_recirculating_CS; lognormal variance with pedigree 0.092025, pedigree (4,4,3,2,4)
  (same comment as for water withdrawal, electricity production from NG, once-T and coolingP )
- efficiency: 0.571 dimensionless; lognormal variance with pedigree 0.017225, pedigree (4,3,1,2,3)
  Literature value/calculated value/estimation.
  Net electrical efficiency based on the lower heating value (LHV).
  For all non-OECD countries, data from the IEA electricity information 2014, tables 1.3 (electricity production) and table 1.5 (fuel input) have been used. In cases where only total values for electricity production in electricity only/CHP plants were given, the total value was applied to both types.
  Together with the information on own use (see parameter 'losses'), the net electrical efficiency based on the NCV in natural gas electricity only and CHP plants is calculated. Based on the estimated shares of the four natural gas types (see general comment) and assumed average and maximum values for efficiency in each of these types, the resulting estimated electrical efficiency per country and type was calculated.
  Estimated average and maximum efficiencies for the four power plant types (based on literature values):
  - conventional power plant, w/o CHP: 0.33 / 0.45
  - conventional power plant, with CHP: 0.28 / 0.38
  - combined cycle power plant, w/o CHP: 0.53 / 0.6
  - combined cycle power plant, with CHP: 0.37 / 0.5
  IEA. 2014. Electricity Information 2014. ISBN 978-92-64-21692-1. International Energy Agency (IEA), Paris Cedex (FR).
  IEA/OECD. 2014. Energy balances of non-OECD countries 2014. International Energy Agency (IEA), Paris Cedex (FR).
  output relative to input (requires additional specification)
- fraction, cooling water, to air: 0.0159178; name fraction_CW_to_air; = (WConsumption_EP_NG_recirculatingCS*recirculating_CS_fraction_from_allCS+WConsumption_EP_NG_onceT_andCP_CS*once_through_andCP_CS_fractio_from_allCS)/(WWithdrawal_EP_NG_recirculating_CS*recirculating_CS_fraction_from_allCS+WWithdrawal_EP_NG_onceT_andCP_CS*once_through_andCP_CS_fractio_from_allCS); lognormal variance with pedigree 0.092025, pedigree (4,4,3,2,4)
  Calculated
  nan

## Reference product
- electricity, high voltage: 1 kWh; name electricity; CPC 17100: Electrical energy; By-product classification allocatable product
  production volume 2.87971e10 kWh; name electricity_apv; = gross_electricity* (1-losses_gross_net)
    Data obtained from the reports of the Ministry of Mines and Energy of Brazil (MME, 2016) for the year 2015.
    MME (2016). Matrizes Elétricas Estaduais: Ano Referência 2015. Edição de 23 de novembro de 2016. Ministério De Minas E Energia - MME. Secretaria De Planejamento E Desenvolvimento Energético. Núcleo De Estudos Estratégicos De Energia.
  property price 0.0977 EUR2005
    Temporary price data. Calculated as 90% of purchasers price based on: 94% of the average price (to account for a 6% loss in transformation and transmission) for electricity for industrial consumersin 2005 (excluded taxes). From IEA.
  property true value 0.0977; name electricity_true_value
    allocation property applied in "true value" allocation // value calculated from revenue

## By-products
- heat, for reuse in municipal waste incineration only: 0 MJ; CPC 17300: Steam and hot water; By-product classification allocatable product; pedigree (1,1,1,1,1)
  Net electricity generated from this waste and used in internal MSWI plant energy redistribution.
  Uncertainty: uncertainty is calculated from uncertainties in waste composition and uncertainties in energy efficiency and the uncertainty in internal energy demand
  production volume 7.0654 MJ
  property exergy 0.1842 MJ; name E_th_prod_MSWI_exergy
    This exergy property is based on the exergy content of the product.
  property price 0.0106 EUR2005; name E_th_prod_MSWI_price_EUR2005
    Average European district heat price from Ecoheatcool and Euroheat 2005-2006, Ecoheat Work package 1: The European heat market. Final report. 10.6 EUR/GJ i s the price of district heat. http://www.solarthermalworld.org/files/Ecoheatcool%20WP1%20Web.pdf?download
  property true value relation 0.1842; name E_th_prod_MSWI_true_value_relation
    property to calculate "true value" from
  property true value 1.61389e-12
    allocation property applied in "true value" allocation // value calculated from true value relation
- electricity, for reuse in municipal waste incineration only: 0 kWh; CPC 17100: Electrical energy; By-product classification allocatable product; pedigree (1,1,1,1,1)
  (same comment as for heat, for reuse in municipal waste incineration only)
  production volume 0.995077 kWh
  property true value relation 3.6; name E_el_prod_MSWI_true_value_relation
    property to calculate "true value" from
  property price 0.1 EUR2005; name E_el_prod_MSWI_price_EUR2005
    Estimated to be the same price as in case of electricity, medium voltage.
  property exergy 3.6 MJ; name E_el_prod_MSWI_exergy
    This exergy property is based on the exergy content of the product.
  property true value 4.4423e-12
    (same comment as for heat, for reuse in municipal waste incineration only)

## Inputs from technosphere
- water, completely softened: 0.0378284 kg; name water_completely_softened; = factor_MJ_kWh*0.006; lognormal variance with pedigree 0.2266, pedigree (4,3,4,1,1)
  Literature value/calculated value. Feed water for the steam circuit lost when producing 1kWh of electricity, based on the burning of 1MJ of natural gas. Röder et al. 2007, Tab. 9.65 and Tab. 9.66, p. 160f.
  properties: wet mass 1 kg
- water, decarbonised: 1.26095 kg; name water_decarbonised_user; = factor_MJ_kWh*0.2; lognormal variance with pedigree 0.2266, pedigree (4,3,4,1,1)
  Literature value/calculated value. Cooling water, decarbonised, for the cooling water circuit lost when producing 1kWh of electricity, based on the burning of 1MJ of natural gas. Röder et al. 2007, Tab. 9.65 and Tab. 9.66, p. 160f.
  properties: wet mass 1 kg
- natural gas, high pressure: 0.16166 m3; name natural_gas; = factor_MJ_kWh/ natural_gas_Net_Heat_Value; lognormal variance with pedigree 0.0002, pedigree (1,1,2,1,1)
  Calculated value
  property heating value, net 39 MJ; name natural_gas_Net_Heat_Value
  properties: carbon content, fossil 0.602381, dry mass 0.84 kg, wet mass 0.84 kg
  note on carbon content, fossil: An average C content of 0.506 kg C/ m3 has been assumed (this average has been calculated using data in Tab 3.5, ecoinvent v2.2 report 6_V
  note on heating value, net: Net (lower) heating (calorific) value at norm conditions (0°C, 101.325 kPa). Literature value.
- gas power plant, combined cycle, 400MW electrical: 1.38889e-11 unit; = 1/(400*1000*180000); lognormal variance with pedigree 0.1387, pedigree (3,3,4,3,3)
  Amount of power plant infrastructure input calculated based on expected full load hours during power plant lifetime (180000h) and power plant capacity (400MW). See "gas power plant construction, combined cycle, 400MW electrical" dataset and corresponding documentation.
- residue from cooling tower: -6.30473e-6 kg; name cooling_tower_residue; = (factor_MJ_kWh*0.000001)*-1; lognormal variance with pedigree 1.1067, pedigree (4,3,5,3,3)
  Literature value/calculated value. Mass share of cooling tower needed for producing 1kWh of electricity, based on the burning of 1MJ of natural gas. Weighted average with electricity production data (Itten&Frischknecht 2012) and values of 11 countries
  (AT, BE, DE, ES, FR, GB, IT, JP, LU, NL, US) (Faist Emmenegger et al. 2007)
  Source:
  Itten R. and Frischknecht R. (2012) Life Cycle Inventories of Electricity Mixes and Grid. ESU-services Ltd., Uster, Switzerland.
  production volume 181558 kg; = cooling_tower_residue/electricity* electricity_apv
    Calculated from the production volume of electricity produced.
  property price 0 EUR2005; name cooling_tower_residue_price_EUR2005
  properties: water content 0.428571, dry mass 0.7 kg, wet mass 1 kg, carbon content, fossil 0.0544233

## Inputs from nature
- Water, cooling, unspecified natural origin [natural resource, in water]: 0.0372504 m3; name water_cooling_UNO_input; = ((recirculating_CS_fraction_from_allCS*WWithdrawal_EP_NG_recirculating_CS)+(once_through_andCP_CS_fractio_from_allCS*WWithdrawal_EP_NG_onceT_andCP_CS))/10.5*factor_MJ_kWh; lognormal variance with pedigree 0.098025, pedigree (4,4,4,2,4)
  Calculated based on literature data.

## Emissions to nature
- Cadmium [air, non-urban air or from high stacks]: 1.42487e-9 kg; name cadmium; = factor_MJ_kWh*0.000000000226; lognormal variance with pedigree 0.034, pedigree (3,5,4,5,3)
  Literature value/calculated value. Emissions when producing 1kWh of electricity, based on the burning of 1MJ of natural gas. Weighted average with electricity production data (Itten&Frischknecht 2012) and emission values of 11 countries
  (AT, BE, DE, ES, FR, GB, IT, JP, LU, NL, US) (Faist Emmenegger et al. 2007)
  Country emissions values estimate from range of values from different references. See Tab. 11.19, p. 138 in Faist Emmenegger et al. 2007.
  Source:
  Itten R. and Frischknecht R. (2012) Life Cycle Inventories of Electricity Mixes and Grid. ESU-services Ltd., Uster, Switzerland.
- Formaldehyde [air, non-urban air or from high stacks]: 2.03643e-7 kg; name formaldehyde; = factor_MJ_kWh*0.0000000323; lognormal variance with pedigree 0.6807, pedigree (3,3,5,3,3)
  (same comment as for Cadmium)
- Chromium [air, non-urban air or from high stacks]: 1.80946e-9 kg; name chromium; = factor_MJ_kWh*0.000000000287; lognormal variance with pedigree 0.034, pedigree (3,5,4,5,3)
  (same comment as for Cadmium)
- Butane [air, non-urban air or from high stacks]: 5.83818e-6 kg; name butane; = factor_MJ_kWh*0.000000926; lognormal variance with pedigree 0.6807, pedigree (3,3,5,3,3)
  (same comment as for Cadmium)
- Nitrogen oxides [air, non-urban air or from high stacks]: 8.65324e-6 kg; name nitrogen_oxides; = factor_MJ_kWh*0.0000013725; lognormal variance with pedigree 0.3426, pedigree (5,3,3,5,3)
  The data about emissions was obtained in Emissões Atmosféricas das Principais Termelétricas Brasileiras a Gás Natural - Ano Base 2013. (COELHO, 2014) pages 90-101.
  In his study the author uses US emissions factors.
  total emissions: 172.1 kg
  net generation: 19888 GWh
  plants: Governador Leonel Brizola (ex-TermoRio)-RJ; Norte Fluminense-RJ; Santa Cruz-RJ; B.L.SOBRINHO-RJ; EUZEBIO ROCHA-SP
  The emission values was calculeted by:
  annual emissions/(gross_electricity*(1-losses_gross_net))
  So adapted to the factor.
  COELHO, S. O. (2014). Avaliação das Emissões Atmosféricas das Principais Termelétricas Brasileiras a Gás Natural - Ano Base 2013. Trabalho Final de Curso apresentado ao Colegiado do Curso de Engenharia Sanitária e Ambiental da Universidade Federal de Juiz de Fora, como requisito parcial à obtenção do título de Engenheiro Sanitarista e Ambiental. UNIVERSIDADE FEDERAL DE JUIZ DE FORA - UFJF. 2014.
- Acetaldehyde [air, non-urban air or from high stacks]: 5.04378e-9 kg; name acetaldehyde; = factor_MJ_kWh*0.0000000008; lognormal variance with pedigree 1.1067, pedigree (4,3,5,3,3)
  (same comment as for Cadmium)
- Mercury [air, non-urban air or from high stacks]: 4.33765e-10 kg; name mercury; = factor_MJ_kWh*0.0000000000688; lognormal variance with pedigree 0.6807, pedigree (3,3,5,3,3)
  (same comment as for Cadmium)
- Hexane [air, non-urban air or from high stacks]: 4.99965e-6 kg; name hexane; = factor_MJ_kWh*0.000000793; lognormal variance with pedigree 0.6807, pedigree (3,3,5,3,3)
  (same comment as for Cadmium)
- PAH, polycyclic aromatic hydrocarbons [air, non-urban air or from high stacks]: 5.04378e-8 kg; name pah; = factor_MJ_kWh*0.000000008; lognormal variance with pedigree 1.1067, pedigree (4,3,5,3,3)
  (same comment as for Cadmium)
- Sulfur dioxide [air, non-urban air or from high stacks]: 9.80448e-6 kg; name sulfur_dioxide; = factor_MJ_kWh*0.0000015551; lognormal variance with pedigree 0.0536, pedigree (5,3,3,5,3)
  The data about emissions was obtained in Emissões Atmosféricas das Principais Termelétricas Brasileiras a Gás Natural - Ano Base 2013. (COELHO, 2014) pages 90-101.
  In his study the author uses US emissions factors.
  total emissions: 194.99 kg
  net generation: 19888 GWh
  plants: Governador Leonel Brizola (ex-TermoRio)-RJ; Norte Fluminense-RJ; Santa Cruz-RJ; B.L.SOBRINHO-RJ; EUZEBIO ROCHA-SP
  The emission values was calculeted by:
  annual emissions/(gross_electricity*(1-losses_gross_net))
  So adapted to the factor.
  COELHO, S. O. (2014). Avaliação das Emissões Atmosféricas das Principais Termelétricas Brasileiras a Gás Natural - Ano Base 2013. Trabalho Final de Curso apresentado ao Colegiado do Curso de Engenharia Sanitária e Ambiental da Universidade Federal de Juiz de Fora, como requisito parcial à obtenção do título de Engenheiro Sanitarista e Ambiental. UNIVERSIDADE FEDERAL DE JUIZ DE FORA - UFJF. 2014.
- Particulates, < 2.5 um [air, non-urban air or from high stacks]: 3.09562e-6 kg; name particulates_lt2_5; = factor_MJ_kWh*0.000000491; lognormal variance with pedigree 0.3087, pedigree (3,3,4,3,3)
  Literature value/calculated value. Emissions when producing 1kWh of electricity, based on the burning of 1MJ of natural gas. Weighted average with electricity production data (Itten&Frischknecht 2012) and emission values of 11 countries
  (AT, BE, DE, ES, FR, GB, IT, JP, LU, NL, US) (Faist Emmenegger et al. 2007)
  Country emissions values estimate from range of values from different references. See Tab. 11.15, p. 133f in Faist Emmenegger et al. 2007. CO is a product of an incomplete combustion.
  Source:
  Itten R. and Frischknecht R. (2012) Life Cycle Inventories of Electricity Mixes and Grid. ESU-services Ltd., Uster, Switzerland.
- Toluene [air, non-urban air or from high stacks]: 9.45709e-9 kg; name toluene; = factor_MJ_kWh*0.0000000015; lognormal variance with pedigree 0.6807, pedigree (3,3,5,3,3)
  (same comment as for Cadmium)
- Lead [air, non-urban air or from high stacks]: 6.49387e-10 kg; name lead; = factor_MJ_kWh*0.000000000103; lognormal variance with pedigree 0.034, pedigree (3,5,4,5,3)
  (same comment as for Cadmium)
- Manganese [air, non-urban air or from high stacks]: 4.92399e-10 kg; name manganese; = factor_MJ_kWh*0.0000000000781; lognormal variance with pedigree 0.034, pedigree (3,5,4,5,3)
  (same comment as for Cadmium)
- Selenium [air, non-urban air or from high stacks]: 3.09562e-11 kg; name selenium; = factor_MJ_kWh*0.00000000000491; lognormal variance with pedigree 0.6807, pedigree (3,3,5,3,3)
  (same comment as for Cadmium)
- Benzo(a)pyrene [air, non-urban air or from high stacks]: 3.3352e-12 kg; name benzo_a_pyrene; = factor_MJ_kWh*0.000000000000529; lognormal variance with pedigree 0.6807, pedigree (3,3,5,3,3)
  (same comment as for Cadmium)
- Dinitrogen monoxide [air, non-urban air or from high stacks]: 0.000330215 kg; name dinitrogen_monoxide; = factor_MJ_kWh*0.0000523758; lognormal variance with pedigree 0.3407, pedigree (3,3,5,3,3)
  The data about emissions was obtained in Emissões Atmosféricas das Principais Termelétricas Brasileiras a Gás Natural - Ano Base 2013. (COELHO, 2014) pages 90-101.
  In his study the author uses US emissions factors.
  total emissions: 6,567.34 kg
  net generation: 19888 GWh
  plants: Governador Leonel Brizola (ex-TermoRio)-RJ; Norte Fluminense-RJ; Santa Cruz-RJ; B.L.SOBRINHO-RJ; EUZEBIO ROCHA-SP
  The emission values was calculeted by:
  annual emissions/(gross_electricity*(1-losses_gross_net))
  So adapted to the factor.
  COELHO, S. O. (2014). Avaliação das Emissões Atmosféricas das Principais Termelétricas Brasileiras a Gás Natural - Ano Base 2013. Trabalho Final de Curso apresentado ao Colegiado do Curso de Engenharia Sanitária e Ambiental da Universidade Federal de Juiz de Fora, como requisito parcial à obtenção do título de Engenheiro Sanitarista e Ambiental. UNIVERSIDADE FEDERAL DE JUIZ DE FORA - UFJF. 2014.
- Ethane [air, non-urban air or from high stacks]: 8.63748e-6 kg; name ethane; = factor_MJ_kWh*0.00000137; lognormal variance with pedigree 0.6807, pedigree (3,3,5,3,3)
  (same comment as for Cadmium)
- Carbon dioxide, fossil [air, non-urban air or from high stacks]: 0.317237 kg; name carbon_dioxide_fossil; = factor_MJ_kWh*0.0503173033; lognormal variance with pedigree 0.0532, pedigree (5,3,3,5,3)
  The data about emissions was obtained in Emissões Atmosféricas das Principais Termelétricas Brasileiras a Gás Natural - Ano Base 2013. (COELHO, 2014) pages 90-101.
  In his study the author uses US emissions factors.
  total emissions: 6,309,227.57 kg
  net generation: 19888 GWh
  plants: Governador Leonel Brizola (ex-TermoRio)-RJ; Norte Fluminense-RJ; Santa Cruz-RJ; B.L.SOBRINHO-RJ; EUZEBIO ROCHA-SP
  The emission values was calculeted by:
  annual emissions/(gross_electricity*(1-losses_gross_net))
  So adapted to the factor.
  COELHO, S. O. (2014). Avaliação das Emissões Atmosféricas das Principais Termelétricas Brasileiras a Gás Natural - Ano Base 2013. Trabalho Final de Curso apresentado ao Colegiado do Curso de Engenharia Sanitária e Ambiental da Universidade Federal de Juiz de Fora, como requisito parcial à obtenção do título de Engenheiro Sanitarista e Ambiental. UNIVERSIDADE FEDERAL DE JUIZ DE FORA - UFJF. 2014.
- Methane, fossil [air, non-urban air or from high stacks]: 2.48009e-5 kg; name methane_fossil; = factor_MJ_kWh*0.0000039337; lognormal variance with pedigree 0.6826, pedigree (5,3,3,5,3)
  The data about emissions was obtained in Emissões Atmosféricas das Principais Termelétricas Brasileiras a Gás Natural - Ano Base 2013. (COELHO, 2014) pages 90-101.
  In his study the author uses US emissions factors.
  total emissions: 493.24 kg
  net generation: 19888 GWh
  plants: Governador Leonel Brizola (ex-TermoRio)-RJ; Norte Fluminense-RJ; Santa Cruz-RJ; B.L.SOBRINHO-RJ; EUZEBIO ROCHA-SP
  The emission values was calculeted by:
  annual emissions/(gross_electricity*(1-losses_gross_net))
  So adapted to the factor.
  COELHO, S. O. (2014). Avaliação das Emissões Atmosféricas das Principais Termelétricas Brasileiras a Gás Natural - Ano Base 2013. Trabalho Final de Curso apresentado ao Colegiado do Curso de Engenharia Sanitária e Ambiental da Universidade Federal de Juiz de Fora, como requisito parcial à obtenção do título de Engenheiro Sanitarista e Ambiental. UNIVERSIDADE FEDERAL DE JUIZ DE FORA - UFJF. 2014.
- Beryllium [air, non-urban air or from high stacks]: 1.55727e-11 kg; name beryllium; = factor_MJ_kWh*0.00000000000247; lognormal variance with pedigree 0.034, pedigree (3,5,4,5,3)
  (same comment as for Cadmium)
- Cobalt [air, non-urban air or from high stacks]: 1.08441e-10 kg; name cobalt; = factor_MJ_kWh*0.0000000000172; lognormal variance with pedigree 0.034, pedigree (3,5,4,5,3)
  (same comment as for Cadmium)
- Carbon monoxide, fossil [air, non-urban air or from high stacks]: 6.48902e-5 kg; name carbon_monoxide_fossil; = factor_MJ_kWh*0.0000102923; lognormal variance with pedigree 0.3426, pedigree (5,3,3,5,3)
  The data about emissions was obtained in Emissões Atmosféricas das Principais Termelétricas Brasileiras a Gás Natural - Ano Base 2013. (COELHO, 2014) pages 90-101.
  In his study the author uses US emissions factors.
  total emissions: 1,290.54 kg
  net generation: 19888 GWh
  plants: Governador Leonel Brizola (ex-TermoRio)-RJ; Norte Fluminense-RJ; Santa Cruz-RJ; B.L.SOBRINHO-RJ; EUZEBIO ROCHA-SP
  The emission values was calculeted by:
  annual emissions/(gross_electricity*(1-losses_gross_net))
  So adapted to the factor.
  COELHO, S. O. (2014). Avaliação das Emissões Atmosféricas das Principais Termelétricas Brasileiras a Gás Natural - Ano Base 2013. Trabalho Final de Curso apresentado ao Colegiado do Curso de Engenharia Sanitária e Ambiental da Universidade Federal de Juiz de Fora, como requisito parcial à obtenção do título de Engenheiro Sanitarista e Ambiental. UNIVERSIDADE FEDERAL DE JUIZ DE FORA - UFJF. 2014.
- Pentane [air, non-urban air or from high stacks]: 7.25044e-6 kg; name pentane; = factor_MJ_kWh*0.00000115; lognormal variance with pedigree 0.6807, pedigree (3,3,5,3,3)
  (same comment as for Cadmium)
- Nickel [air, non-urban air or from high stacks]: 2.71734e-9 kg; name nickel; = factor_MJ_kWh*0.000000000431; lognormal variance with pedigree 0.034, pedigree (3,5,4,5,3)
  (same comment as for Cadmium)
- Benzene [air, non-urban air or from high stacks]: 5.68687e-9 kg; name benzene; = factor_MJ_kWh*0.000000000902; lognormal variance with pedigree 0.6807, pedigree (3,3,5,3,3)
  (same comment as for Cadmium)
- Water [water, unspecified]: 0.0379305 m3; name water_to_water_unspecified; = (water_completely_softened/1000)*(1-fraction_WCS_to_air)+(water_decarbonised_user/1000)*(1-fraction_WDC_to_air)+water_cooling_UNO_input*(1-fraction_CW_to_air); lognormal variance with pedigree 0.098025, pedigree (4,4,4,2,4)
  Calculated value based on literature values and expert opinion. See comments in the parametres' comment field.
  property fraction, origin: fresh water 0.0335624; name fraction_origin_fresh_water_Ww
  property fraction, origin: salt water 0; name fraction_origin_salt_water_Ww
  property fraction, origin: unspecified 0.966438; name fraction_origin_unspecified_Ww
- Propionic acid [air, non-urban air or from high stacks]: 1.00876e-7 kg; name propionic_acid; = factor_MJ_kWh*0.000000016; lognormal variance with pedigree 1.1067, pedigree (4,3,5,3,3)
  (same comment as for Cadmium)
- Propane [air, non-urban air or from high stacks]: 4.44483e-6 kg; name propane; = factor_MJ_kWh*0.000000705; lognormal variance with pedigree 0.6807, pedigree (3,3,5,3,3)
  (same comment as for Cadmium)
- Dioxins, measured as 2,3,7,8-tetrachlorodibenzo-p-dioxin [air, non-urban air or from high stacks]: 0 kg; name dioxins; = factor_MJ_kWh*2.9E-17; pedigree (1,1,1,1,1)
  (same comment as for Cadmium)
- Water [air, unspecified]: 0.00061869 m3; name water_to_air_unspecified; = (water_completely_softened/1000)*fraction_WCS_to_air+(water_decarbonised_user/1000)*fraction_WDC_to_air+water_cooling_UNO_input*fraction_CW_to_air; lognormal variance with pedigree 0.098025, pedigree (4,4,4,2,4)
  (same comment as for Water)
  property fraction, origin: unspecified 0.958386; name fraction_origin_unspecified
  property fraction, origin: salt water 0; name fraction_origin_salt_water
  property fraction, origin: fresh water 0.0416136; name fraction_origin_fresh_water
- Acenaphthene [air, non-urban air or from high stacks]: 4.99965e-12 kg; name acenaphthene; = factor_MJ_kWh*0.000000000000793; lognormal variance with pedigree 0.6807, pedigree (3,3,5,3,3)
  (same comment as for Cadmium)
- Acetic acid [air, non-urban air or from high stacks]: 7.62872e-7 kg; name acetic_acid; = factor_MJ_kWh*0.000000121; lognormal variance with pedigree 1.1007, pedigree (3,3,5,3,3)
  (same comment as for Cadmium)
- Arsenic [air, non-urban air or from high stacks]: 2.59124e-10 kg; name arsenic; = factor_MJ_kWh*0.0000000000411; lognormal variance with pedigree 0.034, pedigree (3,5,4,5,3)
  (same comment as for Cadmium)

## Sampling procedure
literature and annual reports

## Extrapolations
All exchange data were extrapolated from datasets of the following 11 countries: AT, BE, DE, ES, FR, GB, IT, JP, LU, NL, US. The data of those countries basically rely on data of the former UCTE (see general comment).

The efficiency is based on IEA/OECD statistics and calculated with own assumptions.

The cooling and feed water use has been taken over from datasets for electricity production with hard coal or lignite.

Updated data for regionalization of Brazil (2014-2017):
- Annual Production Volume (specific data)
- Carbon dioxide, fossil (estimated data with US factors (Coelho, 2014))
- Carbon monoxide, fossil (estimated data with US factors (Coelho, 2014))
- Methane, fossil (estimated data with US factors (Coelho, 2014))
- Nitrogen oxides (estimated data with US factors (Coelho, 2014))
- Dinitrogen oxides (estimated data with US factors (Coelho, 2014))
- Sulfur dioxide (estimated data with US factors (Coelho, 2014))

## Review by Christopher Oberschelp 2017-11-29
Dataset looks reasonable and main exchanges have been checked. Uncertainties might require update later on (as discussed with ecoinvent). LCIA results might be able to show indiviual issues by comparison with a reference dataset.
