# air distribution terminal panel production, steel, 120 m3/h

Dataset: EcoSpold 2, unit process
Geography: RoW
Time period: 2003-01-01 to 2019-12-31
Technology level: current
Classification: ISIC rev.4 ecoinvent: 2819:Manufacture of other general-purpose machinery
Classification: EcoSpold01Categories: ventilation/production of components
Tags: ConvertedDataset
Scenario: Business-as-Usual
System model: Allocation at the point of substitution
Generated by: Alex Primas
Published in: Hässig, W. 2007
Database: ecoinvent
isCopyrightProtected: true
accessRestrictedTo: 1

## General comment
Production of a typical component used for a ventilation system in a multi family house. The house considered in the investigation includes 6 flats with 130 m2 floor area each and a ventilation rate of 120 m3/h.
[This dataset was already contained in the ecoinvent database version 2. It was not individually updated during the transfer to ecoinvent version 3. Life Cycle Impact Assessment results may still have changed, as they are affected by changes in the supply chain, i.e. in other datasets. This dataset was generated following the ecoinvent quality guidelines for version 2. It may have been subject to central changes described in the ecoinvent version 3 change report (http://www.ecoinvent.org/database/ecoinvent-version-3/reports-of-changes/), and the results of the central updates were reviewed extensively. The changes added e.g. consistent water flows and other information throughout the database. The documentation of this dataset can be found in the ecoinvent reports of version 2, which are still available via the ecoinvent website. The change report linked above covers all central changes that were made during the conversion process.]

## Included activities end
Materials used for the production. Estimation of electricity use for the different production steps. Energy use for heating of the production building. Transport of raw materials to the plant. Estimation for the Infrastructure of the Production site included.

## Geography
Data for production in Switzerland used.

## Technology
Housing for air distribution within a flat. Component made of zinc coated steel and PUR foam insulation. Compatible for a ventilation rate of 120 m3/h. Weight per element 9.5 kg

## Time period
Materials investigated in 2003

## Reference product
- air distribution terminal panel, steel, 120 m3/h: 1 unit; CPC 43914: Filtering or purifying machinery and apparatus, for liquids or gases, except oil filters, petrol filters and a[…]; By-product classification allocatable product
  EcoSpold01Location=CH
  production volume 3.96633 unit
    This is a placeholder value that does not reflect real-world production volumes. This dataset does not currently require a real-world production volume to work in the database framework, and no actual data were collected yet. This has no negative effect on the results of the ecoinvent database.
  property price 9.83093 EUR2005
    Calculated based on inputs: The price of the product has been calculated as a sum of the values of the material and energy inputs for this product. This value is therefore a rough estimation. It may underestimate the real price since there are additional expenses when producing any product. These expences can include for example labour costs, treatment of waste materials and profit for the producer. Please consider carefully whether this level of data quality is acceptable for your application.
  property carbon content, fossil 0.0166978
    C content was calculated as an addition of C content in the product component, and then referred to 1 kg DM
  property carbon content 0.0166978
    carbon content on a dry matter basis (reserved; not for manual entry)
  property true value 9.83093
    allocation property applied in "true value" allocation // value calculated from revenue
  properties: water content 0, water in wet mass 0 kg, dry mass 9.5 kg, wet mass 9.5 kg, carbon content, non-fossil 0, carbon allocation 0.158629 kg

## By-products
- electricity, for reuse in municipal waste incineration only: 0 kWh; CPC 17100: Electrical energy; By-product classification allocatable product; pedigree (1,1,1,1,1)
  Net electricity generated from this waste and used in internal MSWI plant energy redistribution.
  Uncertainty: uncertainty is calculated from uncertainties in waste composition and uncertainties in energy efficiency and the uncertainty in internal energy demand
  production volume 0.00742542 kWh
  property exergy 3.6 MJ; name E_el_prod_MSWI_exergy
    This exergy property is based on the exergy content of the product.
  property true value relation 3.6; name E_el_prod_MSWI_true_value_relation
    property to calculate "true value" from
  property price 0.1 EUR2005; name E_el_prod_MSWI_price_EUR2005
    Estimated to be the same price as in case of electricity, medium voltage.
  property true value 0.000236917
    allocation property applied in "true value" allocation // value calculated from true value relation
- heat, for reuse in municipal waste incineration only: 0 MJ; CPC 17300: Steam and hot water; By-product classification allocatable product; pedigree (1,1,1,1,1)
  (same comment as for electricity, for reuse in municipal waste incineration only)
  production volume 0.0522171 MJ
  property exergy 0.1842 MJ; name E_th_prod_MSWI_exergy
    This exergy property is based on the exergy content of the product.
  property true value relation 0.1842; name E_th_prod_MSWI_true_value_relation
    property to calculate "true value" from
  property price 0.0106 EUR2005; name E_th_prod_MSWI_price_EUR2005
    Average European district heat price from Ecoheatcool and Euroheat 2005-2006, Ecoheat Work package 1: The European heat market. Final report. 10.6 EUR/GJ i s the price of district heat. http://www.solarthermalworld.org/files/Ecoheatcool%20WP1%20Web.pdf?download
  property true value 8.52462e-5
    (same comment as for electricity, for reuse in municipal waste incineration only)

## Inputs from technosphere
- electricity, medium voltage: 0 kWh; pedigree (1,1,1,1,1)
  Data estimated from related processes
  EcoSpold01Location=CH
  Uncertainty: Data estimated from related processes
- steel, low-alloyed: 3.78988 kg; lognormal variance with pedigree 0.0546, pedigree (2,4,5,5,1)
  EcoSpold01Location=RER
  Questionnaire
  Uncertainty: Questionnaire
  properties: dry mass 1 kg, carbon content, fossil 0.005, wet mass 1 kg
  note on carbon content, fossil: Low alloyed steel composition given in Tab. 3.2 ecoinvent v2.2 report 10_partII. Steel assumed to have a C content of 0.5%
- heat, district or industrial, natural gas: 0 MJ; pedigree (1,1,1,1,1)
  Data estimated from related companies
  EcoSpold01Location=RER
  Uncertainty: Data estimated from related companies
- steel, unalloyed: 6.43979 kg; lognormal variance with pedigree 0.0546, pedigree (2,4,5,5,1)
  Questionnaire
  EcoSpold01Location=RER
  Uncertainty: Questionnaire
  properties: dry mass 1 kg, carbon content, fossil 0.0025, wet mass 1 kg
  note on carbon content, fossil: Unalloyed steels or carbon steels are those in which the level of an individual element in no case reaches or exceeds the limiting concentration given in Tab. 3.1 ecoinvent v2.2 report 10_partII. Assumed to have a C content of 0.25%
- heat, district or industrial, other than natural gas: 0 MJ; pedigree (1,1,1,1,1)
  4,5,1,2,1,5; Data estimated from related companies
  EcoSpold01Location=RER
- waste polyurethane: 0 kg; pedigree (1,1,1,1,1)
  Estimations on precentage material disposed
  EcoSpold01Location=CH
  Uncertainty: Estimations on precentage material disposed
  production volume 0 kg
    Calculated from the production volume of air distribution terminal panel, steel, 120 m3/h in proportion to the respective output amounts.
  properties: water content 0.00200401, carbon content, fossil 0.641283, wet mass 1 kg, dry mass 0.998 kg
  note on carbon content, fossil: C content was calculated for 1 kg DM, using data in Tab A.2, ecoinvent v2.2 report 13_I.
- sheet rolling, steel: 10.1997 kg; lognormal variance with pedigree 0.056, pedigree (3,4,5,5,1)
  Questionnaire, estimations
  EcoSpold01Location=RER
  Uncertainty: Questionnaire, estimations
- zinc coat, coils: 1.79994 m2; lognormal variance with pedigree 0.056, pedigree (3,4,5,5,1)
  EcoSpold01Location=RER
  Questionnaire, estimations
  Uncertainty: Questionnaire, estimations
- polyurethane, flexible foam: 0.219993 kg; lognormal variance with pedigree 0.0546, pedigree (2,4,5,5,1)
  Questionnaire
  EcoSpold01Location=RER
  Uncertainty: Questionnaire
  properties: wet mass 1 kg, dry mass 1 kg, carbon content, fossil 0.633827
  note on carbon content, fossil: Polyurethanes (PUR) is the collective name for an extensive group of polymers with very different compositions and correspondingly varied property profiles, though their molecule chain contains all a urethane group (-NH-CO-O-). All PURs are built on a common principle : they are produced by the diisocyanate polyaddition process, that links polyols and (di)isocyanates. In this dataset, an example of typical polyurethane mixture is described (Ullmann, Polyurethanes, Dieterich et al. & ecoinvent v2 report 11_II). C content was calculated as an addition of C contents in its components.
- ventilation components factory: 3.79988e-8 unit; lognormal variance with pedigree 0.396, pedigree (4,5,5,5,3)
  Calculated with data of a similar company
  EcoSpold01Location=RER
  Uncertainty: Calculated with data of a similar company
- electricity, medium voltage: 0.0310893, 0.00565694, 0.130579, 0.444418, 0.0959331, 1.39093, 0.199068, 0.652229 kWh (8 entries); lognormal variance with pedigree 0.11, pedigree (3,5,5,5,3)
  (same comment as for electricity, medium voltage)
- heat, district or industrial, natural gas: 0.235361, 5.36286, 13.3062 MJ (3 entries); lognormal variance with pedigree 0.078, pedigree (4,5,5,5,1)
  (same comment as for heat, district or industrial, natural gas)
- heat, district or industrial, other than natural gas: 0.00825046, 0.492407, 18.4037 MJ (3 entries); lognormal variance with pedigree 0.072, pedigree (1,1,5,5,1)
  4,5,1,2,1,5; Data estimated from related companies
  EcoSpold01Location=RER
- waste polyurethane: -0.00222476, -0.00014865, -1.12422e-5, -6.13978e-5, -2.4804e-5, -5.8303e-5, -0.0018956, -0.0155746 kg (8 entries); lognormal variance with pedigree 0.072, pedigree (4,4,5,5,1)
  (same comment as for waste polyurethane)
  production volume 0.06 kg

## Sampling procedure
Questionnaire and technical information of producer. Data of one common product used.

## Extrapolations
none This dataset has been copied from an original dataset covering the geography CH. The uncertainty has been adjusted accordingly.

## Review by Rolf Frischknecht 2007-08-16
passed
none
