# operation, dried roughage store, non ventilated

Dataset: EcoSpold 2, unit process
Geography: CA-QC
Time period: 1994-01-01 to 2019-12-31
Technology level: current
Classification: EcoSpold01Categories: agricultural means of production/buildings
Classification: ISIC rev.4 ecoinvent: 0163:Post-harvest crop activities
Tags: Recontextualization; Operation
Scenario: Business-as-Usual
System model: Allocation at the point of substitution
Generated by: Pascal Lesage
Published in: Nemecek, T. 2007
Database: ecoinvent
isCopyrightProtected: true
accessRestrictedTo: 1

## General comment
The module includes the use of energy and auxiliary materials for the operation of lighting, impeller blower and ventilator. The functional unit is kg DM hay (DM: dry matter).
[This dataset was already contained in the ecoinvent database version 2. It was not individually updated during the transfer to ecoinvent version 3. Life Cycle Impact Assessment results may still have changed, as they are affected by changes in the supply chain, i.e. in other datasets. This dataset was generated following the ecoinvent quality guidelines for version 2. It may have been subject to central changes described in the ecoinvent version 3 change report (http://www.ecoinvent.org/database/ecoinvent-version-3/reports-of-changes/), and the results of the central updates were reviewed extensively. The changes added e.g. consistent water flows and other information throughout the database. The documentation of this dataset can be found in the ecoinvent reports of version 2, which are still available via the ecoinvent website. The change report linked above covers all central changes that were made during the conversion process.]
Child dataset exchanges identical to GLO dataset. Created to enable linking to regional markets (e.g. for electricity). Data quality indicators adjusted accordingly.

## Included activities end
The inventory takes into account the energy and auxiliary materials like water, lubricating oil and cleaning agents. Also included is the use of the infrastructure. Not taken into account were the direct emission of the animal husbandry, fodder production and produced waste water.

## Geography
The inventory applies for Swiss agricultural buildings only, because of the solid method of construction.

## Technology
The use of energy and auxiliary materials are calculated for the conditions defined in the infrastructure-module with literature data and experts knowledge.
Child dataset exchanges identical to GLO dataset. Created to enable linking to regional markets (e.g. for electricity). Data quality indicators adjusted accordingly.

## Time period
Period indicated in the reference.

## Parameters
- world gross domestic product 2011: 7e13 USD(2011); name worldGDP2011; lognormal variance with pedigree 0.0006, pedigree (1,1,1,1,1)
  World Gross domestic product for 2011, expressed in 2011 USD. Source: World Bank.
- Quebec gross domestic product 2011: 3.11e11 USD(2011); name quebecGDP2011; lognormal variance with pedigree 0.0006, pedigree (1,1,1,1,1)
  Quebec Gross domestic product for 2011, expressed in 2011 USD. Source: Institut de la statistique du Québec. Converted from CAD to USD using a yearly average exchange rate of 0.989 CAD/USD (Source: bank of Canada).

## Reference product
- operation, dried roughage store, non ventilated: 1 kg; CPC 86111: Post-harvest crop services; By-product classification allocatable product
  EcoSpold01Location=CH
  production volume 0.0177714 kg; = PARENTVALUE * quebecGDP2011/worldGDP2011
    Gross approximation of Quebec production volume using relative value of Quebec GDP to world GDP
  property price 0.0103508 EUR2005
    Calculated based on inputs: The price of the product has been calculated as a sum of the values of the material and energy inputs for this product. This value is therefore a rough estimation. It may underestimate the real price since there are additional expenses when producing any product. These expences can include for example labour costs, treatment of waste materials and profit for the producer. Please consider carefully whether this level of data quality is acceptable for your application.

## Inputs from technosphere
- electricity, low voltage: 0.00509 kWh; lognormal variance with pedigree 0.0427, pedigree (2,2,5,5,1)
  EcoSpold01Location=CH
- dried roughage store, non ventilated: 0.000265 m3; lognormal variance with pedigree 0.3427, pedigree (2,2,5,5,1)
  EcoSpold01Location=CH

## Sampling procedure
In the use of energy and auxiliary materials are big differences between the farms. The inventory is based on mean values from CH and WEU.

## Extrapolations
This dataset has been extrapolated from year 2002 to the year of the calculation (2019). The uncertainty has been adjusted accordingly.

## Review by Roland Hischier 2003-08-06
Passed.
