# potato production, organic

Dataset: EcoSpold 2, unit process
Geography: RoW
Time period: 1996-01-01 to 2019-12-31
Technology level: current
Classification: ISIC rev.4 ecoinvent: 0113:Growing of vegetables and melons, roots and tubers
Synonyms: Solanum tuberosum L.
Scenario: Business-as-Usual
System model: Allocation at the point of substitution
Share of production covered: 87 %
Generated by: Thomas Nemecek
Published in: Nemecek, T. 2007
Database: ecoinvent
isCopyrightProtected: true
accessRestrictedTo: 1

## General comment
This dataset represents the production of 1 kg of potatoes (fresh matter). The yield is 22908 kg/ha at a moisture content at storage of 78%.
[This dataset was already contained in the ecoinvent database version 2. It was not individually updated during the transfer to ecoinvent version 3. Life Cycle Impact Assessment results may still have changed, as they are affected by changes in the supply chain, i.e. in other datasets. This dataset was generated following the ecoinvent quality guidelines for version 2. It may have been subject to central changes described in the ecoinvent version 3 change report (http://www.ecoinvent.org/database/ecoinvent-version-3/reports-of-changes/), and the results of the central updates were reviewed extensively. The changes added e.g. consistent water flows and other information throughout the database. The documentation of this dataset can be found in the ecoinvent reports of version 2, which are still available via the ecoinvent website. The change report linked above covers all central changes that were made during the conversion process.]

## Included activities start
This activity starts after the harvest of the previous crop. The inputs of seeds and pesticides are considered. Farm manure as an organic fertiliser is only accounted for in terms of direct field emissions; all pre-processes are included in the animal production systems.

## Included activities end
The dataset includes all machine operations and corresponding machine infrastructure and sheds. Machine operations are: soil cultivation, sowing, fertilisation, weed control, pest and pathogen control, harvest, transport from field to farm (1 km) and grading of the potatoes at the farm. Further, direct field emissions are included. The cultivation of green manure during winter before planting potatoes is also included. This activity ends after harvest and grading at the farm gate.

## Geography
Refers to an average production in the Swiss lowlands.

## Technology
Organic production

## Time period
The yield data have been collected for the years 1996-2003.

## Parameters
- fraction, irrigation water, to air: 0.586986; name fraction_IW_to_air; lognormal variance with pedigree 0.0409, pedigree (2,2,2,1,1)
- fraction, irrigation water to surface water: 0.2; name fraction_IW_to_surface_water; lognormal variance with pedigree 0.0886, pedigree (4,3,1,1,4)
- fraction, irrigation water, to ground water: 0.8; name fraction_IW_to_ground_water; lognormal variance with pedigree 0.0886, pedigree (4,3,1,1,4)

## Reference product
- potato, organic: 1 kg; name REF_PRODUCT; CPC 01510: Potatoes; By-product classification allocatable product
  production volume 4.47141e8 kg
    20000 ha (Willer H, Yussefi M (Eds.) (2010). The World of Organic Agriculture. Statistics and Emerging Trends 2007. FiBL, IFOAM.) ; assuming yields as in Switzerland: 22908 kg/ha at 78% water on a wet mass basis
  property water content 3.54545; name REF_PRODUCT_water_content; = (1-REF_PRODUCT_DM)/REF_PRODUCT_DM
  property carbon content, non-fossil 0.41357; name REF_PRODUCT_C_content_non_fossil
    biogene carbon content on a dry matter basis
  property price 0.28 EUR2005; name REF_PRODUCT_price_EUR2005
    Calculated value based on data from United Nations Commodity Trade Statistics Database (comtrade.un.org). UN comtrade category: 70190 Potatoes, fresh or chilled except seed. Year 2005. Using exchange rate of 1EURO = 1.209 USD. Average of price of import into 5 main markets (EU, US, JP, IN and CN).
  property energy content 0 MJ; name REF_PRODUCT_energy_content
    See chapter 'Product Properties' in '01_crop production - yields & inputs CH & Europe_v1.0.pdf', section 'AGRICULTURAL PRODUCTION IN SWITZERLAND' - pdf-document on the dedicated talk page of ecoinvent (www.ecoinvent.org/documentation)
  property water in wet mass 0.78 kg; name REF_PRODUCT_WWM; = 1-REF_PRODUCT_DM
  property carbon content, fossil 0; name REF_PRODUCT_C_content_fossil
    fossil carbon content on a dry matter basis
  property wet mass 1 kg; name REF_PRODUCT_WM
  property dry mass 0.22 kg; name REF_PRODUCT_DM
  property carbon content 0.41357
    carbon content on a dry matter basis (reserved; not for manual entry)
  properties: carbon allocation 0.0909854 kg

## Inputs from technosphere
- liquid manure spreading, by vacuum tanker: 0.00045633 m3; lognormal variance with pedigree 0.0426, pedigree (2,1,5,5,1)
  See chapter 'Yields and Inputs of Arable Crop Production' in '01_crop production - yields & inputs CH & Europe_v1.0.pdf', section 'AGRICULTURAL PRODUCTION IN SWITZERLAND' - pdf-document on the dedicated talk page of ecoinvent (www.ecoinvent.org/documentation)
- tillage, hoeing and earthing-up, potatoes: 8.7305e-5 ha; lognormal variance with pedigree 0.0426, pedigree (2,1,5,5,1)
  (same comment as for liquid manure spreading, by vacuum tanker)
- green manure, organic, until March: 4.3652e-5 ha; lognormal variance with pedigree 0.0426, pedigree (2,1,5,5,1)
  (same comment as for liquid manure spreading, by vacuum tanker)
- packaging, for pesticides: 0.000186222 kg; lognormal variance with pedigree 0.0912, pedigree (4,3,5,5,4)
  Total amount of active substance/s of pesticides needed for the production of potato, organic is calculated to be circa 9.31E-05 kg. Pesticide/s used in this dataset is/are: 'copper oxide'. The total amount of active substance/s is doubled in order to account for the packaging of the dilluted product of pesticide/s that is/are applied. Therefore, 1.86E-04 kg of packaging for pesticides is justified with this exchange.
  properties: carbon content, fossil 0.85714, price 0.0642 EUR2005, wet mass 1 kg, dry mass 1 kg
- potato planting: 4.3652e-5 ha; lognormal variance with pedigree 0.0426, pedigree (2,1,5,5,1)
  (same comment as for liquid manure spreading, by vacuum tanker)
- tillage, harrowing, by rotary harrow: 4.3652e-5 ha; lognormal variance with pedigree 0.0426, pedigree (2,1,5,5,1)
  (same comment as for liquid manure spreading, by vacuum tanker)
- potato haulm cutting: 4.3652e-5 ha; lognormal variance with pedigree 0.0426, pedigree (2,1,5,5,1)
  (same comment as for liquid manure spreading, by vacuum tanker)
- potato seed, organic, for setting: 0.11 kg; name SEED; lognormal variance with pedigree 0.0426, pedigree (2,1,5,5,1)
  (same comment as for liquid manure spreading, by vacuum tanker)
  property dry mass 0.2 kg; name SEED_DM
  property energy content 3.518 MJ; name SEED_energy_content
  property carbon content, non-fossil 0.413567; name SEED_C_content_non_fossil
  note on energy content: See chapter 'Product Properties' in '01_crop production - yields & inputs CH & Europe_v1.0.pdf', section 'AGRICULTURAL PRODUCTION IN SWITZERLAND' - pdf-document on the dedicated talk page of ecoinvent (www.ecoinvent.org/documentation)
- solid manure loading and spreading, by hydraulic loader and spreader: 0.5797 kg; lognormal variance with pedigree 0.0426, pedigree (2,1,5,5,1)
  (same comment as for liquid manure spreading, by vacuum tanker)
- irrigation: 0 m3; name water_irrigation_input; source Siebert, S. 2010; pedigree (1,1,1,1,1)
  Calculated based on literature values (Doll, 2010) and partially modelled at ETH (Pfister, S.).
  property carbon content, non-fossil 0; name C_content_non_fossil
  property water content 9089.91; name water_content
  property wet mass 1000 kg; name WM
  property water in wet mass 999.89 kg; name WWM
  property carbon content, fossil 0; name C_content_fossil
  property dry mass 0.11 kg; name DM
- tillage, currying, by weeder: 8.7305e-5 ha; lognormal variance with pedigree 0.0426, pedigree (2,1,5,5,1)
  (same comment as for liquid manure spreading, by vacuum tanker)
- transport, tractor and trailer, agricultural: 0.001 metric ton*km; lognormal variance with pedigree 0.0426, pedigree (2,1,5,5,1)
  (same comment as for liquid manure spreading, by vacuum tanker)
- harvesting, by complete harvester, ground crops: 4.3652e-5 ha; lognormal variance with pedigree 0.0426, pedigree (2,1,5,5,1)
  (same comment as for liquid manure spreading, by vacuum tanker)
- potato grading: 1 kg; lognormal variance with pedigree 0.0426, pedigree (2,1,5,5,1)
  (same comment as for liquid manure spreading, by vacuum tanker)
- application of plant protection product, by field sprayer: 0.00019207 ha; lognormal variance with pedigree 0.0426, pedigree (2,1,5,5,1)
  (same comment as for liquid manure spreading, by vacuum tanker)
- tillage, harrowing, by spring tine harrow: 4.3652e-5 ha; lognormal variance with pedigree 0.0426, pedigree (2,1,5,5,1)
  (same comment as for liquid manure spreading, by vacuum tanker)
- tillage, ploughing: 4.3652e-5 ha; lognormal variance with pedigree 0.0426, pedigree (2,1,5,5,1)
  (same comment as for liquid manure spreading, by vacuum tanker)
- copper oxide: 9.3111e-5 kg; lognormal variance with pedigree 0.0427, pedigree (2,2,5,5,1)
  (same comment as for liquid manure spreading, by vacuum tanker)
  properties: dry mass 1 kg, wet mass 1 kg
- irrigation: 0.000240841, 1.02229e-5, 0.00215295, 3.52812e-5, 1.7642e-6, 0.000100176, 1.63055e-5, 0.00413729, 7.95285e-5, 2.7181e-5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 m3 (16 entries); source Siebert, S. 2010; lognormal variance with pedigree 0.0447, pedigree (2,2,5,5,1)
  (same comment as for irrigation)
  properties: water content 9089.91, wet mass 1000 kg, dry mass 0.11 kg

## Inputs from nature
- Carbon dioxide, in air [natural resource, in air]: 0.300252 kg; = 44/12 * (REF_PRODUCT_C_content_non_fossil * REF_PRODUCT * REF_PRODUCT_DM - SEED_C_content_non_fossil * SEED * SEED_DM); lognormal variance with pedigree 0.0426, pedigree (2,1,5,5,1)
  Modelled,see chapter 'CO2 binding' in '01_crop production_direct field emissions and natural resources_v1.0.pdf' - pdf-document on the dedicated talk page of ecoinvent (www.ecoinvent.org/documentation)
- Transformation, from annual crop, non-irrigated, extensive [natural resource, land]: 0.43652 m2; lognormal variance with pedigree 0.0526, pedigree (2,1,5,5,1)
  Modelled, see chapter 'Land use' in '01_crop production_direct field emissions and natural resources_v1.0.pdf' - pdf-document on the dedicated talk page of ecoinvent (www.ecoinvent.org/documentation)
- Occupation, annual crop, non-irrigated, extensive [natural resource, land]: 0.20614 m2*year; lognormal variance with pedigree 0.0426, pedigree (2,1,5,5,1)
  (same comment as for Transformation, from annual crop, non-irrigated, extensive)
- Transformation, to annual crop, non-irrigated, extensive [natural resource, land]: 0.43652 m2; lognormal variance with pedigree 0.0526, pedigree (2,1,5,5,1)
  (same comment as for Transformation, from annual crop, non-irrigated, extensive)
- Energy, gross calorific value, in biomass [natural resource, biotic]: 3.4828 MJ; lognormal variance with pedigree 0.0411891, pedigree (2,1,5,1,1)

## Emissions to nature
- Mercury [water, ground-]: 4.729e-10 kg; lognormal variance with pedigree 0.1327, pedigree (2,2,5,5,1)
  Modelled, see chapter 'Emissions of heavy metals to agricultural soil, surface water and ground water' in '01_crop production_direct field emissions and natural resources_v1.0.pdf' - pdf-document on the dedicated talk page of ecoinvent (www.ecoinvent.org/documentation)
- Nickel, ion [water, surface water]: 7.7169e-8 kg; lognormal variance with pedigree 0.1327, pedigree (2,2,5,5,1)
  (same comment as for Mercury)
- Phosphate [water, surface water]: 1.8637e-5 kg; lognormal variance with pedigree 0.0827, pedigree (2,2,5,5,1)
  Modelled, see chapter 'Emissions of phosphorous to the water' in '01_crop production_direct field emissions and natural resources_v1.0.pdf' - pdf-document on the dedicated talk page of ecoinvent (www.ecoinvent.org/documentation)
- Cadmium, ion [water, ground-]: 9.6009e-10 kg; lognormal variance with pedigree 0.1327, pedigree (2,2,5,5,1)
  (same comment as for Mercury)
- Lead [water, surface water]: 3.4792e-8 kg; lognormal variance with pedigree 0.1327, pedigree (2,2,5,5,1)
  (same comment as for Mercury)
- Phosphate [water, ground-]: 5.6322e-6 kg; lognormal variance with pedigree 0.0827, pedigree (2,2,5,5,1)
  (same comment as for Phosphate)
- Lead [soil, agricultural]: 3.9526e-7 kg; lognormal variance with pedigree 0.0827, pedigree (2,2,5,5,1)
  (same comment as for Mercury)
- Water [water, ground-]: 0.00854619 m3; name water_to_water_ground; lognormal variance with pedigree 0.1306, pedigree (4,3,5,5,4)
  Calculated value. See the parameters and their comments to understand the calculation.
  property fraction, origin: unspecified 0; name fraction_origin_unspecified_Wgw
  property fraction, origin: salt water 0; name fraction_origin_salt_water_Wgw
  property fraction, origin: fresh water 1; name fraction_origin_fresh_water_Wgw
- Zinc, ion [water, surface water]: 1.9207e-7 kg; lognormal variance with pedigree 0.1327, pedigree (2,2,5,5,1)
  (same comment as for Mercury)
- Lead [water, ground-]: 9.7048e-9 kg; lognormal variance with pedigree 0.1327, pedigree (2,2,5,5,1)
  (same comment as for Mercury)
- Copper, ion [water, ground-]: 1.5694e-7 kg; lognormal variance with pedigree 0.1327, pedigree (2,2,5,5,1)
  (same comment as for Mercury)
- Chromium, ion [water, ground-]: 7.018e-7 kg; lognormal variance with pedigree 0.1327, pedigree (2,2,5,5,1)
  (same comment as for Mercury)
- Dinitrogen monoxide [air, non-urban air or from high stacks]: 9.08e-5 kg; name N2O; lognormal variance with pedigree 0.0727, pedigree (2,2,5,5,1)
  Modelled, see chapter 'Emissions of N2O to the air' in '01_crop production_direct field emissions and natural resources_v1.0.pdf' - pdf-document on the dedicated talk page of ecoinvent (www.ecoinvent.org/documentation)
- Chromium, ion [water, surface water]: 8.8005e-8 kg; lognormal variance with pedigree 0.1327, pedigree (2,2,5,5,1)
  (same comment as for Mercury)
- Cadmium, ion [water, surface water]: 5.0835e-10 kg; lognormal variance with pedigree 0.1327, pedigree (2,2,5,5,1)
  (same comment as for Mercury)
- Cadmium [soil, agricultural]: 1.901e-8 kg; lognormal variance with pedigree 0.0827, pedigree (2,2,5,5,1)
  (same comment as for Mercury)
- Copper, ion [water, surface water]: 9.6656e-8 kg; lognormal variance with pedigree 0.1327, pedigree (2,2,5,5,1)
  (same comment as for Mercury)
- Nickel [soil, agricultural]: 4.2606e-7 kg; lognormal variance with pedigree 0.0827, pedigree (2,2,5,5,1)
  (same comment as for Mercury)
- Ammonia [air, non-urban air or from high stacks]: 0.000604505 kg; lognormal variance with pedigree 0.0527, pedigree (2,2,5,5,1)
  Modelled with the 'AGRAMMON model' described in '01_crop production_direct field emissions and natural resources_v1.0.pdf' - pdf-document on the dedicated talk page of ecoinvent (www.ecoinvent.org/documentation)
- Mercury [water, surface water]: 3.37e-10 kg; lognormal variance with pedigree 0.1327, pedigree (2,2,5,5,1)
  (same comment as for Mercury)
- Nitrate [water, ground-]: 0.00637099 kg; lognormal variance with pedigree 0.0827, pedigree (2,2,5,5,1)
  Modelled with the 'SALCA-NO3 model' described in '01_crop production_direct field emissions and natural resources_v1.0.pdf' - pdf-document on the dedicated talk page of ecoinvent (www.ecoinvent.org/documentation)
- Phosphorus [water, surface water]: 4.5745e-6 kg; lognormal variance with pedigree 0.0827, pedigree (2,2,5,5,1)
  (same comment as for Phosphate)
- Mercury [soil, agricultural]: 3.2614e-8 kg; lognormal variance with pedigree 0.0827, pedigree (2,2,5,5,1)
  (same comment as for Mercury)
- Zinc, ion [water, ground-]: 1.1585e-6 kg; lognormal variance with pedigree 0.1327, pedigree (2,2,5,5,1)
  (same comment as for Mercury)
- Nitrogen oxides [air, non-urban air or from high stacks]: 1.9068e-5 kg; = 0.21 * N2O; lognormal variance with pedigree 0.0727, pedigree (2,2,5,5,1)
  Modelled, see chapter 'Emissions of NOx to the air' in '01_crop production_direct field emissions and natural resources_v1.0.pdf' - pdf-document on the dedicated talk page of ecoinvent (www.ecoinvent.org/documentation)
- Chromium [soil, agricultural]: -3.7624e-7 kg
  (same comment as for Mercury)
- Water [air, unspecified]: 0.00538878 m3; name water_to_air_unspecified; lognormal variance with pedigree 0.0827, pedigree (2,2,5,5,1)
  Calculated value based on literature values and expert opinion. See comments in the parametres' comment field.
  property fraction, origin: fresh water 1; name fraction_origin_fresh_water
  property fraction, origin: salt water 0; name fraction_origin_salt_water
  property fraction, origin: unspecified 0; name fraction_origin_unspecified
- Zinc [soil, agricultural]: 1.2444e-5 kg; lognormal variance with pedigree 0.0827, pedigree (2,2,5,5,1)
  (same comment as for Mercury)
- Water [water, surface water]: 0.00213655 m3; name water_to_water_surface; lognormal variance with pedigree 0.1306, pedigree (4,3,5,5,4)
  Calculated value. See the parameters and their comments to understand the calculation.
  property fraction, origin: salt water 0; name fraction_origin_salt_water_Wsw
  property fraction, origin: fresh water 1; name fraction_origin_fresh_water_Wsw
- Copper [soil, agricultural]: 7.2468e-5 kg; lognormal variance with pedigree 0.0827, pedigree (2,2,5,5,1)
  (same comment as for Mercury)

## Sampling procedure
Data were compiled from statistics, pilot network, fertilising recommendations, documents from extension services, information provided by retailers and expert knowledge. The production data were verified and adjusted by a group of experts.

## Extrapolations
This dataset has been copied from an original dataset covering the geography CH.

## Review by Hans-Jörg Althaus 2009-01-22
passed
none
