# treatment of used lorry, 16 metric ton

Dataset: EcoSpold 2, unit process
Geography: CH
Time period: 1990-01-01 to 2019-12-31
Technology level: current
Classification: ISIC rev.4 ecoinvent: 3830:Materials recovery
Classification: EcoSpold01Categories: transport systems/road
Tags: Treatment; ConvertedDataset
Scenario: Business-as-Usual
System model: Allocation at the point of substitution
Generated by: Michael Spielmann (obsolete)
Published in: Spielmann M. 2007
Database: ecoinvent
isCopyrightProtected: true
accessRestrictedTo: 1

## General comment
The dataset represents the treatment and disposal of of one used lorry 16 t.
[This dataset was already contained in the ecoinvent database version 2. It was not individually updated during the transfer to ecoinvent version 3. Life Cycle Impact Assessment results may still have changed, as they are affected by changes in the supply chain, i.e. in other datasets. This dataset was generated following the ecoinvent quality guidelines for version 2. It may have been subject to central changes described in the ecoinvent version 3 change report (http://www.ecoinvent.org/database/ecoinvent-version-3/reports-of-changes/), and the results of the central updates were reviewed extensively. The changes added e.g. consistent water flows and other information throughout the database. The documentation of this dataset can be found in the ecoinvent reports of version 2, which are still available via the ecoinvent website. The change report linked above covers all central changes that were made during the conversion process.]

## Included activities start
The activity starts with the disposal of the used lorry.

## Included activities end
The dataset ends with the treatment and disposal of one used lorry 16t. The dataset includes the disposal of plastics, glass, zinc in car shredder residue and until and including the disposal of mineral oil. The dataset does not include the disposal of the bulk material (steel, aluminium and copper) because they are fully recycled and a cut off allocation was made. 50% of all used tyres are used as a secondary fuel in Swiss cement works, consequently was made a cut of allocation and merely take into account an average transport performance.

## Geography
Data represent Swiss conditions

## Technology
no technologies are specified

## Time period
For the disposal of vehicle we merely have taken into account the bulk material used in the vehicle and make a number of assumptions as follows:
- Steel, aluminium and copper are fully recycled and thus we make a cut off allocation
- 50% of all used tyres are used as a secondary fuel in Swiss cement works. Consequently we make a cut of allocation and merely take into account an average transport performance. It should be beared in mind that about 30% of used tyres are ex-ported BUWAL (2000).
- for the remaining materials a complete disposal is assumed.
References:
BUWAL (2000) Informationen zur Entsorgung von Altreifen. pdf file from http://www.umwelt-schweiz.ch/buwal/de/fachgebiete/fg_abfall/abfallwegweiser/altpneu/index.html.

## Reference product
- used lorry, 16 metric ton: -1 unit; CPC 39990: Other wastes n.e.c.; By-product classification Waste
  EcoSpold01Location=CH
  production volume 0.0336675 unit
    This is a placeholder value that does not reflect real-world production volumes. This dataset does not currently require a real-world production volume to work in the database framework, and no actual data were collected yet. This has no negative effect on the results of the ecoinvent database. The placeholder value of this activity was scaled according to the nominal GDP of 2005 (source: United Nations, http://data.un.org/Glossary.aspx?q=GDP+%28current+US%24%29, accessed 20130726) to reflect an appropriate share of the global production volume, which is also a placeholder value.
  property price 0 EUR2005
    Waste products are assigned a price of zero as they are assumed to require further treatment.
  property carbon content, fossil 0.113894
    Calculated from C content in input materials in the infrastructure
  property carbon content, non-fossil 0.0012201
    Calculated from C content in input materials in the infrastructure
  property carbon content 0.115114
    carbon content on a dry matter basis (reserved; not for manual entry)
  properties: wet mass 6800 kg, water in wet mass 0 kg, dry mass 6800 kg, water content 0, carbon allocation 782.778 kg

## By-products
- zinc concentrate: 0 kg; CPC 14290: Other non-ferrous metal ores and concentrates (other than uranium or thorium ores and concentrates); By-product classification allocatable product
  Calculated value from the knowledge of the properties of both products.
  property price 0.38 EUR2005; name ByP_price_EUR2005
    Temporary price data. Calculated as 90% of purchasers price based on: Zinc content in concentrate 53%. Concentrate price per kg Zn 86.5% of refined Zn price (13.5% treatment charges according to CHR Metals Limited 2005: Dynamic cost curves. http://www.minecost.com/dynamic.pdf). 2004 zinc price from USGS (2007) Mineral commodity summaries 2007. <http://minerals.usgs.gov/minerals/pubs/mcs/2007/mcs2007.pdf> [Accessed 25 May 2010]
  property zinc content 0.53; name zinc_C_zinc_concentrate
    Zinc content on a dry matter basis. Value taken from teh "zinc mine operation" /GLO dataset.
  property dry mass 1 kg; name DM_zinc_concentrate
  property carbon content 0
    carbon content on a dry matter basis (reserved; not for manual entry)
  properties: wet mass 1 kg, water content 0, carbon content, non-fossil 0, carbon content, fossil 0, water in wet mass 0 kg, carbon allocation 0 kg
- electricity, for reuse in municipal waste incineration only: 0 kWh; CPC 17100: Electrical energy; By-product classification allocatable product; pedigree (1,1,1,1,1)
  Net electricity generated from this waste and used in internal MSWI plant energy redistribution.
  Uncertainty: uncertainty is calculated from uncertainties in waste composition and uncertainties in energy efficiency and the uncertainty in internal energy demand
  property exergy 3.6 MJ; name E_el_prod_MSWI_exergy
    This exergy property is based on the exergy content of the product.
  property true value relation 3.6; name E_el_prod_MSWI_true_value_relation
    property to calculate "true value" from
  property price 0.1 EUR2005; name E_el_prod_MSWI_price_EUR2005
    Estimated to be the same price as in case of electricity, medium voltage.
- heat, for reuse in municipal waste incineration only: 0 MJ; CPC 17300: Steam and hot water; By-product classification allocatable product; pedigree (1,1,1,1,1)
  Net useful heat generated from this waste and used in internal MSWI plant energy redistribution.
  Uncertainty: uncertainty is calculated from uncertainties in waste composition and uncertainties in energy efficiency and the uncertainty in internal energy demand
  property true value relation 0.1842; name E_th_prod_MSWI_true_value_relation
    property to calculate "true value" from
  property exergy 0.1842 MJ; name E_th_prod_MSWI_exergy
    This exergy property is based on the exergy content of the product.
  property price 0.0106 EUR2005; name E_th_prod_MSWI_price_EUR2005
    Average European district heat price from Ecoheatcool and Euroheat 2005-2006, Ecoheat Work package 1: The European heat market. Final report. 10.6 EUR/GJ i s the price of district heat. http://www.solarthermalworld.org/files/Ecoheatcool%20WP1%20Web.pdf?download

## Inputs from technosphere
All rows: lognormal variance with pedigree 0.0441, pedigree (3,4,5,3,1)
- zinc in car shredder residue: -20 kg
  EcoSpold01Location=CH
  Estimated value. Data is derived from material composition of a lorry.
  Uncertainty: Data is derived from material composition of a lorry.
  production volume 20 kg
    Calculated from the production volume of used lorry, 16 metric ton in proportion to the respective output amounts.
  properties: dry mass 1 kg, wet mass 1 kg
- waste plastic, mixture: -230 kg; source BUWAL 2000
  Estimated value. 50% of all used tyres are used as a secondary fuel in Swiss cement works. It should be beared in mind that about 30% of used tyres are exported BUWAL (2000).
  EcoSpold01Location=CH
  Uncertainty: material composition
  production volume 230 kg
    (same comment as for zinc in car shredder residue)
  properties: carbon content, fossil 0.747344, dry mass 0.847 kg, wet mass 1 kg, water content 0.180638
  note on carbon content, fossil: C content in 1 kg DM was calculated using data in Tab A.2, ecoinvent v2.2 report 13_I
- waste mineral oil: -25.2 kg
  EcoSpold01Location=CH
  Estimated value. Data is derived from material composition of a lorry..
  Uncertainty: Data is derived from material composition of a lorry.
  production volume 25.2 kg
    (same comment as for zinc in car shredder residue)
  properties: water content 0.111111, carbon content, fossil 0.864444, wet mass 1 kg, dry mass 0.9 kg
  note on carbon content, fossil: Tab A.6, ecoinvent v2.2 report 13_I. C content has been calculated after data in the tables, and then referred to 1 kg DM
- waste glass: -45 kg
  (same comment as for zinc in car shredder residue)
  production volume 45 kg
    (same comment as for zinc in car shredder residue)
  properties: wet mass 1 kg, dry mass 1 kg
- waste emulsion paint: -40 kg
  (same comment as for zinc in car shredder residue)
  production volume 40 kg
    (same comment as for zinc in car shredder residue)
  properties: carbon content, fossil 0.27, wet mass 1 kg, dry mass 1 kg
  note on carbon content, fossil: Tab A.4, ecoinvent v2.2 report 13_I. C content has been calculated after data in the tables, and then referred to 1 kg DM

## Sampling procedure
Data is based on the material consumption of vehicles. For the transportation of used tyres an expert estimate is used.

## Extrapolations
This dataset has been extrapolated from year 2000 to the year of the calculation (2019). The uncertainty has been adjusted accordingly.

## Review by Niels Jungbluth 2003-08-27
passed.

## Review by Emilia Moreno Ruiz 2012-02-28
trainee DS, OK, Liliane Klemann
